# amidosulfuron production

Dataset: EcoSpold 2, unit process
Geography: GLO
Time period: 2021-01-01 to 2023-12-31
Technology level: current
Classification: ISIC rev.4 ecoinvent: 2011:Manufacture of basic chemicals
Synonyms: AgrEvo
Scenario: Business-as-Usual
System model: Allocation, cut-off by classification
Generated by: Daria Dellenbach
Database: ecoinvent
isCopyrightProtected: true
accessRestrictedTo: 1

## General comment
This dataset represents the production of 1 kg of amidosulfuron from methane. Emissions are estimated. Energy consumptions and infrastructure are calculated with standard values. A yield of 95% per chemical step was assumed.
Amidosulfuron is an organic substance with the CAS no.: 120923-37-7. It is called '1-(4,6-dimethoxypyrimidin-2-yl)-3-[methyl(methylsulfonyl)sulfamoyl]urea' under IUPAC naming and its molecular formula is: C9H15N5O7S2. It is solid under normal conditions of temperature and pressure, which is soluble in water and ethyl acetate. It is modelled as a pure substance. Amidosulfuron is a herbicide applied to control broad-leaved weeds. It is used post-emergence and mainly on cleavers, in winter wheat, durum wheat, barely, rye and oats. It inhibts the synthesis of the amino acids valine and isoleucine which are necessary for the proteinsynthesis. There are no publicly available information about the consumption of this substance on industrial sites.
Reference(s):
Unger T., (1996). Pesticide Synthesis Handbook, Noyes Publication.
Appleby A.P., Muller F., Carpy, S., (2011): Weed Control, in Ullmanns Encyclopedia of Industrial Chemistry, Weinheim, Wiley-VCH.
ECHA, amidosulfuron, last accessed May 2022, https://echa.europa.eu/substance-information/-/substanceinfo/100.129.777
Chemiepark GENDORF, Umwelterklärung 2016, https://www.gendorf.de/Nachbarn/Umweltschutz/Industrie%20und%20Nachhaltigkeit
Chemiepark GENDORF, Umwelterklärung 2017, https://www.gendorf.de/Nachbarn/Umweltschutz/Industrie%20und%20Nachhaltigkeit
Chemiepark GENDORF, Umwelterklärung 2020, https://www.gendorf.de/Nachbarn/Umweltschutz/Industrie%20und%20Nachhaltigkeit
Hischier, R. (2005) Establishing Life Cycle Inventories of Chemicals Based on Differing Data Availability (9 pp). The International Journal of Life Cycle Assessment, Volume 10, Issue 1, pp 59–67. 10.1065/lca2004.10.181.7

## Included activities start
Cradle to gate. The activity starts when the raw materials enter the process.

## Included activities end
Production of amidosulfuron production including materials, energy uses, infrastructure and emissions.

## Technology
Amidosulfuron is produced in five steps from methane:
CH4 + SO3 → CH4SO3
CH4SO3 + SOCl2 → CH3ClO2S + SO2 + HCl
CH3ClO2S + CH5N → C2H7NSO2 + HCl
C2H7NSO2 + CClNO3S → C3H6N2S2O5 + HCl
C3H6N2O5S2 + C6H9N3O2 → C9H15N5O7S2
C6H9N3O2 (2-amino-2,4-dimethoxy-pyramidine) is produced in from carbon sulfide and ammonia:
CS2+2NH3 -> NH4SCN+H2S
3NH4SCN -> 2CH5N3+H2S+CS2
CH5N3+C5H8O4 -> C4H5N3O2+2CH4O
C4H5N3O2+POCl3 -> C4H3N3Cl2+H2PO3Cl
C4H3N3Cl2+2CH4O -> C6H9N3O2+2HCl
The formed hydrochloric acid is neutralised with sodium hydroxide and released as emission to water as chloride and sodium.
Reference(s):
Unger T., (1996). Pesticide Synthesis Handbook, Noyes Publication.
Appleby A.P., Muller F., Carpy, S., (2011): Weed Control, in Ullmanns Encyclopedia of Industrial Chemistry, Weinheim, Wiley-VCH.

## Reference product
- amidosulfuron: 1 kg; name RP; By-product classification allocatable product; CPC 34663: Herbicides, anti-sprouting products and plant-growth regulators; HS2017 380893: Herbicides, anti-sprouting products and plant-growth regulators; other than containing goods of Subheading [...]; CAS 120923-37-7
  production volume 1.76471e6 kg; name PV_RP; = (63000/0.0357)
    Calculated value. The global production volume is extrapolated from the German production volume using the global average GDP (constant 2017 international USD from 2015-2019). The annual production value of Germany in the year 2017 is 63000 kg. This value is divided by the German share of global GDP, 3.57% (2015-2019).
    References:
    Bundesamt für Verbraucherschutz und Lebensmittelsicherheit (2018): Absatz an Pflanzenschutzmitteln in der Bundesrepublik Deutschland 2017, available here: https://www.bvl.bund.de/SharedDocs/Downloads/04_Pflanzenschutzmittel/01_meldungen_par_64/meld_par_64_2017.pdf?__blob=publicationFile&v=2, accessed 07-06-2022.
    World bank (2022): GDP, available here: https://data.worldbank.org/indicator/NY.GDP.MKTP.PP.KD, accessed 17-05-2022.
  property price 3.57401 EUR2005
    The price is calculated based on price information from Made-in-China (available here: https://molotuschem.en.made-in-china.com/product/CwpAcItuhxkS/China-Agricultural-Chemicals-Pesticides-Amidosulfuron-96-Tc-50-Wdg.html and https://shbosman.en.made-in-china.com/product/XBTQCsdKLirU/China-Agrochemicals-Herbicide-Amidosulfuron-97-TC-50-WDG.html, last accessed 2022-08-10).
    The prices were converted to EUR based on the annual exchange rates published by the European Central Bank (https://sdw.ecb.europa.eu/quickview.do?SERIES_KEY=120.EXR.A.USD.EUR.SP00.A, last accessed on 2022-02-15) and adjusted for inflation relative to 2005 using the producer price index (PPI) of the euro area, published by eurostat (https://appsso.eurostat.ec.europa.eu/nui/show.do?dataset=sts_inpp_a&lang=en, last accessed on 2022-05-04)., last accessed 2022-08-04).
  properties: carbon allocation 0.29266 kg, carbon content 0.29266, carbon content, fossil 0.29266, carbon content, non-fossil 0, dry mass 1 kg, water content 0, water in wet mass 0 kg, wet mass 1 kg

## Inputs from technosphere
- ammonia, anhydrous, liquid: 0.00367925, 0.0158065, 0.00714217, 0.0791664, 0.00334641, 0.000748576, 0.0275115, 0.00236495, 0.00728989 kg (9 suppliers, which the file names only by identifier); sum of these 0.147056 kg; lognormal variance with pedigree 0.010025, pedigree (2,5,2,2,2)
  Calculated based on stoichiometry. See technology comment for the description of the reaction.
  properties: dry mass 1 kg, wet mass 1 kg
- carbon disulfide: 0.654941 kg; lognormal variance with pedigree 0.010025, pedigree (2,5,2,2,2)
  (same comment as for ammonia, anhydrous, liquid)
  properties: carbon content, fossil 0.157895, dry mass 1 kg, heating value, net 32.72 MJ, wet mass 1 kg
- chemical factory, organics: 1.776e-9 unit; lognormal variance with pedigree 0.3494, pedigree (2,5,2,4,4)
  Calculated based on literature data published by the industry. For this activity, no information was readily available concerning infrastructure and land-use. Therefore, the infrastructure is estimated based on data from two chemical factories, the BASF site of Ludwigshafen and the chemical factory in Gendorf (which are both located in Germany), which produce a wide range of chemical substances. Based on this data, the following assumptions are made: the built area amounts to about 4.2 ha, the plant has an average output of 50'000 t/a and a lifespan of fifty years. The estimated infrastructure amount is therefore 4.00 E-10 units per kg of produced chemical.
  Since this process comprises 10 reactions to produce the final product, the default value was scaled up. To produce 1 kg of output, 3.44 kg of intermediate products are necessary. The value was therefore scaled up with the factor 4.44.
  References:
  Althaus H.-J., Chudacoff M., Hischier R., Jungbluth N., Osses M. and Primas A. (2007) Life Cycle Inventories of Chemicals. ecoinvent report No. 8, v2.0. EMPA Dübendorf, Swiss Centre for Life Cycle Inventories, Dübendorf, CH.
  Gendorf (2000) Umwelterklärung 2000, Werk Gendorf. Werk Gendorf, Burgkirchen.
- compressed air, 1000 kPa gauge: 1.42694, 0.580651 m3 (2 suppliers, which the file names only by identifier); sum of these 2.00759 m3; lognormal variance with pedigree 0.05, pedigree (2,5,2,4,4)
  Calculated based on literature data published by the GENDORF Chemical Park. The factory produced an average of 2462760 tonnes of chemical substances (including intermediates) per year in the years 2015-2019. The average consumption of compressed air in the years 2015-2019 was 1113557454 m3 per year. This equals 0.45216 m3/kg chemical produced.
  Since this process comprises 10 reactions to produce the final product, the default value was scaled up. To produce 1 kg of output, 3.44 kg of intermediate products are necessary. The value was therefore scaled up with the factor 4.44.
  References:
  Chemiepark GENDORF, Umwelterklärung 2016, https://www.gendorf.de/Nachbarn/Umweltschutz/Industrie%20und%20Nachhaltigkeit
  Chemiepark GENDORF, Umwelterklärung 2017, https://www.gendorf.de/Nachbarn/Umweltschutz/Industrie%20und%20Nachhaltigkeit
  Chemiepark GENDORF, Umwelterklärung 2020, https://www.gendorf.de/Nachbarn/Umweltschutz/Industrie%20und%20Nachhaltigkeit
- cyanogen chloride: 0.17693 kg; lognormal variance with pedigree 0.010025, pedigree (2,5,2,2,2)
  (same comment as for ammonia, anhydrous, liquid)
  properties: carbon content, fossil 0.195395, dry mass 1 kg, heating value, net 5.92 MJ, wet mass 1 kg
- dimethyl malonate: 0.378391 kg; lognormal variance with pedigree 0.010025, pedigree (2,5,2,2,2)
  (same comment as for ammonia, anhydrous, liquid)
  properties: carbon content, fossil 0.524924, dry mass 1 kg, heating value, net 21.11 MJ, wet mass 1 kg
- electricity, medium voltage: 1.77183 kWh; lognormal variance with pedigree 0.05, pedigree (2,5,2,4,4)
  Calculated based on literature data published by the GENDORF Chemical Park. The factory produced an average of 2462760 tonnes of chemical substances (including intermediates) per year in the years 2015-2019. The average consumption of electricity in the years 2015-2019 was 982796751 kWh per year. This equals 0.39906 kWh/kg chemical produced.
  Since this process comprises 10 reactions to produce the final product, the default value was scaled up. To produce 1 kg of output, 3.44 kg of intermediate products are necessary. The value was therefore scaled up with the factor 4.44.
  References:
  Chemiepark GENDORF, Umwelterklärung 2016, https://www.gendorf.de/Nachbarn/Umweltschutz/Industrie%20und%20Nachhaltigkeit
  Chemiepark GENDORF, Umwelterklärung 2017, https://www.gendorf.de/Nachbarn/Umweltschutz/Industrie%20und%20Nachhaltigkeit
  Chemiepark GENDORF, Umwelterklärung 2020, https://www.gendorf.de/Nachbarn/Umweltschutz/Industrie%20und%20Nachhaltigkeit
- hazardous waste, for incineration: -0.446356, -0.214651, -0.00561084 kg (3 suppliers, which the file names only by identifier); sum of these -0.666618 kg; lognormal variance with pedigree 0.009825, pedigree (2,5,1,2,2)
  (same comment as for ammonia, anhydrous, liquid)
  production volume; name PV_hazwaste; = (BP_hazwaste* PV_RP/RP)
    Calculated from the production volume of the reference product in proportion to the respective output amounts.
  properties: carbon content, fossil 0.554667, dry mass 0.75 kg, heating value, net 17 MJ, water content 0.333333, wet mass 1 kg
  note on carbon content, fossil: Tab A.6, ecoinvent v2.2 report 13_I. C content has been calculated after data in the tables, and then referred to 1 kg DM
  note on heating value, net: Value taken from the general comment of the treatment dataset.
- heat, district or industrial, natural gas: 8.37606 MJ; lognormal variance with pedigree 0.05, pedigree (2,5,2,4,4)
  Calculated based on literature data published by the GENDORF Chemical Park. The factory produced an average of 2462760 tonnes of chemical substances (including intermediates) per year in the years 2015-2019. The average consumption of natural gas in the years 2015-2019 was 4645920000 MJ per year. This equals 1.8865 MJ/kg chemical produced.
  Since this process comprises 10 reactions to produce the final product, the default value was scaled up. To produce 1 kg of output, 3.44 kg of intermediate products are necessary. The value was therefore scaled up with the factor 4.44.
  References:
  Chemiepark GENDORF, Umwelterklärung 2016, https://www.gendorf.de/Nachbarn/Umweltschutz/Industrie%20und%20Nachhaltigkeit
  Chemiepark GENDORF, Umwelterklärung 2017, https://www.gendorf.de/Nachbarn/Umweltschutz/Industrie%20und%20Nachhaltigkeit
  Chemiepark GENDORF, Umwelterklärung 2020, https://www.gendorf.de/Nachbarn/Umweltschutz/Industrie%20und%20Nachhaltigkeit
  properties: heating value, net 1 MJ
- heat, from steam, in chemical industry: 0.784343, 0.138289 MJ (2 suppliers, which the file names only by identifier); sum of these 0.922632 MJ; lognormal variance with pedigree 0.05, pedigree (2,5,2,4,4)
  Calculated based on literature data published by the GENDORF Chemical Park. The factory produced an average of 2462760 tonnes of chemical substances (including intermediates) per year in the years 2015-2019. The average consumption of steam (internal and external sources) in the years 2015-2019 was 511785800 MJ per year. This equals 0.2078 MJ/kg chemical produced.
  Since this process comprises 10 reactions to produce the final product, the default value was scaled up. To produce 1 kg of output, 3.44 kg of intermediate products are necessary. The value was therefore scaled up with the factor 4.44.
  References:
  Chemiepark GENDORF, Umwelterklärung 2016, https://www.gendorf.de/Nachbarn/Umweltschutz/Industrie%20und%20Nachhaltigkeit
  Chemiepark GENDORF, Umwelterklärung 2017, https://www.gendorf.de/Nachbarn/Umweltschutz/Industrie%20und%20Nachhaltigkeit
  Chemiepark GENDORF, Umwelterklärung 2020, https://www.gendorf.de/Nachbarn/Umweltschutz/Industrie%20und%20Nachhaltigkeit
  properties: heating value, net 1 MJ
- methanol: 0.0166763, 0.0535772, 0.103905, 0.00984088 kg (4 suppliers, which the file names only by identifier); sum of these 0.183999 kg; lognormal variance with pedigree 0.01, pedigree (2,5,2,1,2)
  (same comment as for ammonia, anhydrous, liquid)
  properties: carbon content, fossil 0.375, dry mass 1 kg, heating value, net 26.49 MJ, wet mass 1 kg
- methylamine: 0.0813108, 0.0195544 kg (2 suppliers, which the file names only by identifier); sum of these 0.100865 kg; lognormal variance with pedigree 0.010025, pedigree (2,5,2,2,2)
  (same comment as for ammonia, anhydrous, liquid)
  properties: carbon content, fossil 0.386735, dry mass 1 kg, heating value, net 31.23 MJ, wet mass 1 kg
- natural gas, high pressure: 0.057719 m3; lognormal variance with pedigree 0.010025, pedigree (2,5,2,2,2)
  (same comment as for ammonia, anhydrous, liquid)
  property amount in multioutput activity_m3 0 m3; name natural_gas_amount_MO_m3
  properties: carbon content, fossil 0.602381, dry mass 0.84 kg, heating value, gross 40 MJ, heating value, net 39 MJ, wet mass 0.84 kg
  note on carbon content, fossil: An average C content of 0.506 kg C/ m3 has been assumed (this average has been calculated using data in Tab 3.5, ecoinvent v2.2 report 6_V
  note on heating value, net: Literature value, Source: United Nations Statistics Division (2018) International Recommendations for Energy Statistics (IRES). Available at: http://unstats.un.org/unsd/statcom/doc11/BG-IRES.pdf.
- nitrogen, liquid: 0.0516011, 0.0141642 kg (2 suppliers, which the file names only by identifier); sum of these 0.0657653 kg; lognormal variance with pedigree 0.05, pedigree (2,5,2,4,4)
  Calculated based on literature data published by the GENDORF Chemical Park. The factory produced an average of 2462760 tonnes of chemical substances (including intermediates) per year in the years 2015-2019. The average consumption of nitrogen, liquid in the years 2015-2019 was 29168033 m3 per year. This equals 0.014812 kg/kg chemical produced. The density to convert to kg was assumed to be 1.2506 kg/m3.
  Since this process comprises 10 reactions to produce the final product, the default value was scaled up. To produce 1 kg of output, 3.44 kg of intermediate products are necessary. The value was therefore scaled up with the factor 4.44.
  References:
  Chemiepark GENDORF, Umwelterklärung 2016, https://www.gendorf.de/Nachbarn/Umweltschutz/Industrie%20und%20Nachhaltigkeit
  Chemiepark GENDORF, Umwelterklärung 2017, https://www.gendorf.de/Nachbarn/Umweltschutz/Industrie%20und%20Nachhaltigkeit
  Chemiepark GENDORF, Umwelterklärung 2020, https://www.gendorf.de/Nachbarn/Umweltschutz/Industrie%20und%20Nachhaltigkeit
  properties: dry mass 1 kg, wet mass 1 kg
- phosphorus oxychloride: 0.36273, 0.0764104 kg (2 suppliers, which the file names only by identifier); sum of these 0.43914 kg; lognormal variance with pedigree 0.010025, pedigree (2,5,2,2,2)
  (same comment as for ammonia, anhydrous, liquid)
- sodium hydroxide, without water, in 50% solution state: 0.0505443, 0.517615 kg (2 suppliers, which the file names only by identifier); sum of these 0.568159 kg; lognormal variance with pedigree 0.01, pedigree (2,5,2,1,2)
  Sodium hydroxide was added to neutralise the formed acid. Calculated based on stoichiometry. See technology comment for the description of the reaction.
  properties: dry mass 1 kg, heating value, net 3.03 MJ, wet mass 1 kg
- sulfur trioxide: 0.151769, 0.307312 kg (2 suppliers, which the file names only by identifier); sum of these 0.459081 kg; lognormal variance with pedigree 0.010025, pedigree (2,5,2,2,2)
  (same comment as for ammonia, anhydrous, liquid)
  properties: dry mass 1 kg, wet mass 1 kg
- tap water: 0.0999 kg; lognormal variance with pedigree 0.05, pedigree (2,5,2,4,4)
  Calculated based on literature data published by the GENDORF Chemical Park. The factory produced an average of 2462760 tonnes of chemical substances (including intermediates) per year in the years 2015-2019. The average consumption of tap water in the years 2015-2019 was 55352 t per year. This equals 0.0225 kg/kg chemical produced.
  Since this process comprises 10 reactions to produce the final product, the default value was scaled up. To produce 1 kg of output, 3.44 kg of intermediate products are necessary. The value was therefore scaled up with the factor 4.44.
  References:
  Chemiepark GENDORF, Umwelterklärung 2016, https://www.gendorf.de/Nachbarn/Umweltschutz/Industrie%20und%20Nachhaltigkeit
  Chemiepark GENDORF, Umwelterklärung 2017, https://www.gendorf.de/Nachbarn/Umweltschutz/Industrie%20und%20Nachhaltigkeit
  Chemiepark GENDORF, Umwelterklärung 2020, https://www.gendorf.de/Nachbarn/Umweltschutz/Industrie%20und%20Nachhaltigkeit
  properties: carbon content, fossil 0.00178991, dry mass 0.000337476 kg, water content 2962.17, wet mass 1 kg
  note on carbon content, fossil: Bicarbonate content is 2.93 mol/m3. CO2 content is 0.1 mol/m3 (ecoinvent v2.2 report 8, Tab 93.1).
- thionyl chloride: 0.254915, 0.127457 kg (2 suppliers, which the file names only by identifier); sum of these 0.382372 kg; lognormal variance with pedigree 0.010025, pedigree (2,5,2,2,2)
  (same comment as for ammonia, anhydrous, liquid)
  properties: dry mass 1 kg, wet mass 1 kg
- wastewater, average: -4.86548e-8, -8.09639e-6, -1.93601e-6, -2.88262e-8 m3 (4 suppliers, which the file names only by identifier); sum of these -1.01099e-5 m3; lognormal variance with pedigree 0.0498, pedigree (2,5,1,4,4)
  Calculated based on literature data published by the GENDORF Chemical Park. The factory produced an average of 2462760 tonnes of chemical substances (including intermediates) per year in the years 2015-2019. The average ouput of wastewater going to an external wastewater treatment plant in the years 2015-2019 was 5608 m3 per year. This equals 0.000002277 m3/kg chemical produced.
  Since this process comprises 10 reactions to produce the final product, the default value was scaled up. To produce 1 kg of output, 3.44 kg of intermediate products are necessary. The value was therefore scaled up with the factor 4.44.
  References:
  Chemiepark GENDORF, Umwelterklärung 2016, https://www.gendorf.de/Nachbarn/Umweltschutz/Industrie%20und%20Nachhaltigkeit
  Chemiepark GENDORF, Umwelterklärung 2017, https://www.gendorf.de/Nachbarn/Umweltschutz/Industrie%20und%20Nachhaltigkeit
  Chemiepark GENDORF, Umwelterklärung 2020, https://www.gendorf.de/Nachbarn/Umweltschutz/Industrie%20und%20Nachhaltigkeit
  production volume; name PV_wastewater; = (BP_wastewater* PV_RP/RP)
    (same comment as for hazardous waste, for incineration)
  properties: carbon content, non-fossil 0.194039, dry mass 0.346837 kg, water content 2882.2, wet mass 1000 kg
  note on carbon content, non-fossil: 0.0673 kg TOC/m3 (Tab A.17, ecoinvent v2.2 report 13_I). TOC was considered as Total Carbon.

## Inputs from nature
- Water, cooling, unspecified natural origin [natural resource, in water]: 0.0652991 m3; lognormal variance with pedigree 0.05, pedigree (2,5,2,4,4)
  Calculated based on literature data published by the GENDORF Chemical Park. The factory produced an average of 2462760 tonnes of chemical substances (including intermediates) per year in the years 2015-2019. The average amount of cooling water released in the years 2015-2019 was 34408800 t per year. It was assumed that 5% of the cooling water was emitted to air during its use, therefore, to calculate the input of cooling water, the output value reported by GENDORF was scaled up by the factor 1/0.95. This equals 0.014707 m3/kg chemical produced.
  Since this process comprises 10 reactions to produce the final product, the default value was scaled up. To produce 1 kg of output, 3.44 kg of intermediate products are necessary. The value was therefore scaled up with the factor 4.44.
  References:
  Chemiepark GENDORF, Umwelterklärung 2016, https://www.gendorf.de/Nachbarn/Umweltschutz/Industrie%20und%20Nachhaltigkeit
  Chemiepark GENDORF, Umwelterklärung 2017, https://www.gendorf.de/Nachbarn/Umweltschutz/Industrie%20und%20Nachhaltigkeit
  Chemiepark GENDORF, Umwelterklärung 2020, https://www.gendorf.de/Nachbarn/Umweltschutz/Industrie%20und%20Nachhaltigkeit
- Water, river [natural resource, in water]: 0.00428651 m3; lognormal variance with pedigree 0.05, pedigree (2,5,2,4,4)
  Calculated based on literature data published by the GENDORF Chemical Park. The factory produced an average of 2462760 tonnes of chemical substances (including intermediates) per year in the years 2015-2019. The average consumption of river water in the years 2015-2019 was 22000820 t per year. However, since the cooling water is modelled as an input, the amount of river water was adjusted to avoid double counting. 55% of the input amount of cooling water was deducted from the amount of river water, as that is the share of river water versus well water. This equals 0.00096543 m3/kg chemical produced.
  Since this process comprises 10 reactions to produce the final product, the default value was scaled up. To produce 1 kg of output, 3.44 kg of intermediate products are necessary. The value was therefore scaled up with the factor 4.44.
  References:
  Chemiepark GENDORF, Umwelterklärung 2016, https://www.gendorf.de/Nachbarn/Umweltschutz/Industrie%20und%20Nachhaltigkeit
  Chemiepark GENDORF, Umwelterklärung 2017, https://www.gendorf.de/Nachbarn/Umweltschutz/Industrie%20und%20Nachhaltigkeit
  Chemiepark GENDORF, Umwelterklärung 2020, https://www.gendorf.de/Nachbarn/Umweltschutz/Industrie%20und%20Nachhaltigkeit
- Water, well, in ground [natural resource, in water]: 0.00362535 m3; lognormal variance with pedigree 0.05, pedigree (2,5,2,4,4)
  Calculated based on literature data published by the GENDORF Chemical Park. The factory produced an average of 2462760 tonnes of chemical substances (including intermediates) per year in the years 2015-2019. The average consumption of well water in the years 2015-2019 was 18607480 t per year. However, since the cooling water is modelled as an input, the amount of well water was adjusted to avoid double counting. 45% of the input amount of cooling water was deducted from the amount of well water, as that is the share of well water versus river water. This equals 0.00081652 m3/kg chemical produced.
  Since this process comprises 10 reactions to produce the final product, the default value was scaled up. To produce 1 kg of output, 3.44 kg of intermediate products are necessary. The value was therefore scaled up with the factor 4.44.
  References:
  Chemiepark GENDORF, Umwelterklärung 2016, https://www.gendorf.de/Nachbarn/Umweltschutz/Industrie%20und%20Nachhaltigkeit
  Chemiepark GENDORF, Umwelterklärung 2017, https://www.gendorf.de/Nachbarn/Umweltschutz/Industrie%20und%20Nachhaltigkeit
  Chemiepark GENDORF, Umwelterklärung 2020, https://www.gendorf.de/Nachbarn/Umweltschutz/Industrie%20und%20Nachhaltigkeit

## Emissions to nature
- Ammonia [air, unspecified]: 0.000735278 kg; lognormal variance with pedigree 0.049425, pedigree (2,5,2,2,2)
  Calculated losses, based on the boiling point of a chemical, to water or to air. In addition, unreacted chemicals are assumed to go to wastewater treatment, which has a conversion rate in biological treatment of 95% of carbon into carbon dioxide. The remaining 5% are released as emissions to water.
- Carbon dioxide, fossil [air, unspecified]: 0.23614 kg; lognormal variance with pedigree 0.010025, pedigree (2,5,2,2,2)
  Calculated based on the carbon content of unreacted chemical substances. The unreacted chemicals are assumed to go to wastewater treatment, which has a conversion rate in biological treatment of 95% of carbon into carbon dioxide. The remaining 5% are released as emissions to water, unspecified.
- Carbon disulfide [air, unspecified]: 0.000822859 kg; lognormal variance with pedigree 0.049425, pedigree (2,5,2,2,2)
  (same comment as for Ammonia)
- Dimethylamine [air, unspecified]: 0.000504326 kg; lognormal variance with pedigree 0.049425, pedigree (2,5,2,2,2)
  (same comment as for Ammonia)
- Hydrogen sulfide [air, unspecified]: 0.00150681 kg; lognormal variance with pedigree 0.049425, pedigree (2,5,2,2,2)
  (same comment as for Ammonia)
- Methane, fossil [air, unspecified]: 0.000230876 kg; lognormal variance with pedigree 0.049425, pedigree (2,5,2,2,2)
  (same comment as for Ammonia)
- Methanol [air, unspecified]: 0.000888232 kg; lognormal variance with pedigree 0.049425, pedigree (2,5,2,2,2)
  (same comment as for Ammonia)
- Nitrogen [air, unspecified]: 0.0657653 kg; lognormal variance with pedigree 0.0894, pedigree (2,5,2,4,4)
  Calculated value. The amount of nitrogen released to air is equal to the amount of nitrogen entering the activity.
  Since this process comprises 10 reactions to produce the final product, the default value was scaled up. To produce 1 kg of output, 3.44 kg of intermediate products are necessary. The value was therefore scaled up with the factor 4.44.
- Sulfur dioxide [air, unspecified]: 0.194986 kg; lognormal variance with pedigree 0.010025, pedigree (2,5,2,2,2)
  (same comment as for Ammonia)
- Sulfur trioxide [air, unspecified]: 0.000491872 kg; lognormal variance with pedigree 0.049425, pedigree (2,5,2,2,2)
  (same comment as for Ammonia)
- Water [air, unspecified]: 0.0065268 m3; lognormal variance with pedigree 0.0894, pedigree (2,5,2,4,4)
  Calculated based on literature data published by the GENDORF Chemical Park. The factory produced an average of 2462760 tonnes of chemical substances (including intermediates) per year in the years 2015-2019. To determine the emissions of water to air, the difference of all water inputs (from river, well, tap water and cooling) and outputs (wastewater, emissions to water) was calculated. The average ouput of water to air in the years 2015-2019 was 3620444 m3 per year. This equals 0.00147 m3/kg chemical produced. For more information on the other water exchanges please consult the respective exchange comment.
  Since this process comprises 10 reactions to produce the final product, the default value was scaled up. To produce 1 kg of output, 3.44 kg of intermediate products are necessary. The value was therefore scaled up with the factor 4.44.
  References:
  Chemiepark GENDORF, Umwelterklärung 2016, https://www.gendorf.de/Nachbarn/Umweltschutz/Industrie%20und%20Nachhaltigkeit
  Chemiepark GENDORF, Umwelterklärung 2017, https://www.gendorf.de/Nachbarn/Umweltschutz/Industrie%20und%20Nachhaltigkeit
  Chemiepark GENDORF, Umwelterklärung 2020, https://www.gendorf.de/Nachbarn/Umweltschutz/Industrie%20und%20Nachhaltigkeit
- Ammonium [water, unspecified]: 0.00736156 kg; lognormal variance with pedigree 0.049425, pedigree (2,5,2,2,2)
  (same comment as for Ammonia)
- BOD5, Biological Oxygen Demand [water, unspecified]: 0.012187 kg; lognormal variance with pedigree 0.049425, pedigree (2,5,2,2,2)
  Calculated value. The BOD, COD, TOC and BOD5 are calculated based on the amount and type of emissions released to water in the same activity.
- COD, Chemical Oxygen Demand [water, unspecified]: 0.012187 kg; lognormal variance with pedigree 0.049425, pedigree (2,5,2,2,2)
  (same comment as for BOD5, Biological Oxygen Demand)
- Chloride [water, unspecified]: 0.615718 kg; lognormal variance with pedigree 0.049425, pedigree (2,5,2,2,2)
  Calculated losses, based on the boiling point of a chemical, to water or to air. In addition, unreacted chemicals are assumed to go to wastewater treatment, which has a conversion rate in biological treatment of 95% of carbon into carbon dioxide. The remaining 5% are released as emissions to water.
  This value includes as well emissions from acid neutralisation.
- DOC, Dissolved Organic Carbon [water, unspecified]: 0.00338882 kg; lognormal variance with pedigree 0.049425, pedigree (2,5,2,2,2)
  (same comment as for BOD5, Biological Oxygen Demand)
- Methanol [water, surface water]: 0.173494 kg; lognormal variance with pedigree 0.309425, pedigree (2,5,2,2,2)
  (same comment as for Ammonia)
- Phosphate [water, unspecified]: 0.213868 kg; lognormal variance with pedigree 0.049425, pedigree (2,5,2,2,2)
  (same comment as for Ammonia)
- Sodium I [water, surface water]: 0.326571 kg; lognormal variance with pedigree 0.049425, pedigree (2,5,2,2,2)
  Emissions from acid neutralisation.
- TOC, Total Organic Carbon [water, unspecified]: 0.00338882 kg; lognormal variance with pedigree 0.049425, pedigree (2,5,2,2,2)
  (same comment as for BOD5, Biological Oxygen Demand)
- Water [water, unspecified]: 0.0670334 m3; lognormal variance with pedigree 0.0894, pedigree (2,5,2,4,4)
  Calculated based on literature data published by the GENDORF Chemical Park. The factory produced an average of 2462760 tonnes of chemical substances (including intermediates) per year in the years 2015-2019. The amount of water released back to the environment consists of the sum of the amount of process water treated in the internal WWTP that is then released back to the environment and the amount of cooling water released back to the environment. The average ouput of the internal WWTP in the years 2015-2019 was 2628800 m3 and that of cooling water released back to the environment was 34408800 m3. This gives a yearly average of 37037600 m3 emissions of water to water. This equals 0.01504 m3/kg chemical produced.
  Since this process comprises 10 reactions to produce the final product, the default value was scaled up. To produce 1 kg of output, 3.44 kg of intermediate products are necessary. The value was therefore scaled up with the factor 4.44.
  This value includes as well emissions from acid neutralisation.
  References:
  Chemiepark GENDORF, Umwelterklärung 2016, https://www.gendorf.de/Nachbarn/Umweltschutz/Industrie%20und%20Nachhaltigkeit
  Chemiepark GENDORF, Umwelterklärung 2017, https://www.gendorf.de/Nachbarn/Umweltschutz/Industrie%20und%20Nachhaltigkeit
  Chemiepark GENDORF, Umwelterklärung 2020, https://www.gendorf.de/Nachbarn/Umweltschutz/Industrie%20und%20Nachhaltigkeit

## Sampling procedure
Literature data and stoichiometric calculation. This inventory is partially based on a generic model of the production of chemicals. The data generated by this model have been improved with compound-specific data when available.
The model of the production of chemicals is using specific industry or literature data wherever possible and more generic data on chemical production processes to fill compound-specific data gaps when necessary. The basic principles of the model have been published in literature (Hischier, 2005). The model has been updated and extended with newly available data from the chemical industry.
In the model, unreacted fractions are treated in a waste treatment process, and emissions reported are after a waste treatment process that is included in the scope of this dataset. For volatile reactants, a small level of evaporation is assumed. Solvents and catalysts are mostly recycled in closed-loop systems within the scope of the dataset and reported flows are for losses from this system.
The main source of information for the values for heat, electricity, water (process and cooling), nitrogen, chemical factory is industry data from the GENDORF Chemical Park. The values are a 5-year average of data from 2015 to 2019 published by the GENDORF Chemical Park, which is based in Germany and produced an average of 2462760 tonnes of chemical substances in the years 2015-2019.

Reference(s):
Hischier, R. (2005) Establishing Life Cycle Inventories of Chemicals Based on Differing Data Availability (9 pp). The International Journal of Life Cycle Assessment, Volume 10, Issue 1, pp 59–67. 10.1065/lca2004.10.181.7
Chemiepark GENDORF, Umwelterklärung 2016, https://www.gendorf.de/Nachbarn/Umweltschutz/Industrie%20und%20Nachhaltigkeit
Chemiepark GENDORF, Umwelterklärung 2017, https://www.gendorf.de/Nachbarn/Umweltschutz/Industrie%20und%20Nachhaltigkeit
Chemiepark GENDORF, Umwelterklärung 2020, https://www.gendorf.de/Nachbarn/Umweltschutz/Industrie%20und%20Nachhaltigkeit
Unger T., (1996). Pesticide Synthesis Handbook, Noyes Publication.
Appleby A.P., Muller F., Carpy, S., (2011): Weed Control, in Ullmanns Encyclopedia of Industrial Chemistry, Weinheim, Wiley-VCH.
ECHA, amidosulfuron, last accessed May 2022, https://echa.europa.eu/substance-information/-/substanceinfo/100.129.777
