# polar fleece production, energy use only

Dataset: EcoSpold 2, unit process
Geography: CA-QC
Time period: 1997-01-01 to 2023-12-31
Technology level: current
Classification: ISIC rev.4 ecoinvent: 1399:Manufacture of other textiles n.e.c.
Classification: EcoSpold01Categories: plastics/processing
Tags: recontextualization
Scenario: Business-as-Usual
System model: Allocation, cut-off by classification
Generated by: Pascal Lesage
Published in: Hässig, W. 2007
Database: ecoinvent
isCopyrightProtected: true
accessRestrictedTo: 1

## General comment
Data derived from: Laursen, S. E., Hansen, J., Bagh, J., Jensen O. and Werther, I., Environmental Assessment of Textiles. Life Cycle Screening of Textiles containing Cotton, Wool, Viscose, Polyester or Acrylic Fibres, Miljøstyrelsen Miljøprojekt nr. 369, DTI Clothing and Textile, dk-TEKNIK, Danmark, 1997.
[This dataset was already contained in the ecoinvent database version 2. It was not individually updated during the transfer to ecoinvent version 3. Life Cycle Impact Assessment results may still have changed, as they are affected by changes in the supply chain, i.e. in other datasets. This dataset was generated following the ecoinvent quality guidelines for version 2. It may have been subject to central changes described in the ecoinvent version 3 change report (http://www.ecoinvent.org/database/ecoinvent-version-3/reports-of-changes/), and the results of the central updates were reviewed extensively. The changes added e.g. consistent water flows and other information throughout the database. The documentation of this dataset can be found in the ecoinvent reports of version 2, which are still available via the ecoinvent website. The change report linked above covers all central changes that were made during the conversion process.]
Child dataset exchanges identical to GLO dataset. Created to enable linking to regional markets (e.g. for electricity). Data quality indicators adjusted accordingly.

## Included activities end
Estimation of electricity and fuel use for the production steps. No raw materials and transports of raw materials to the plant included. Infrastructure of the production plant not included.

## Geography
Data used has no specific geographical origin (literature values).
Child dataset exchanges identical to GLO dataset. Created to enable linking to regional markets (e.g. for electricity). Data quality indicators adjusted accordingly.

## Technology
Approximation from data of polyester yarn prodcuction. No raw material included.

## Time period
Time of literature publication.

## Parameters
- Quebec gross domestic product 2011: 3.11e11 USD(2011); name quebecGDP2011; lognormal variance with pedigree 0.0006, pedigree (1,1,1,1,1)
  Quebec Gross domestic product for 2011, expressed in 2011 USD. Source: Institut de la statistique du Québec. Converted from CAD to USD using a yearly average exchange rate of 0.989 CAD/USD (Source: bank of Canada).
- world gross domestic product 2011: 7e13 USD(2011); name worldGDP2011; lognormal variance with pedigree 0.0006, pedigree (1,1,1,1,1)
  World Gross domestic product for 2011, expressed in 2011 USD. Source: World Bank.

## Reference product
- polar fleece, energy use only: 1 kg; By-product classification allocatable product; CPC 27922: Nonwovens; HS2017 560393: Nonwovens; whether or not impregnated, coated, covered or laminated, not of man-made filaments, (weighing m[...]
  production volume 0.0177714 kg
    Gross approximation of Quebec production volume using relative value of Quebec GDP to world GDP
  property price 5.2 EUR2005
    Calculated value based on data from United Nations Commodity Trade Statistics Database (comtrade.un.org). UN comtrade category: 540412 Synthetic monofilament, or polypropylene, of 67 decitex/more & of wich no cross-sectinal dimension exceeds 1 mm; strip & the like (eg. Artificial straw) of synthetic textile materials of an apparent width not > 5mm; other than elastomeric.. Year 2009. Using exchange rate of 1EURO = 1.209 USD. Average of price of import into 5 main markets (EU, US, JP, IN and CN).
  properties: carbon allocation 0 kg, carbon content 0

## Inputs from technosphere
- electricity, medium voltage: 8.33 kWh; lognormal variance with pedigree 0.11, pedigree (3,5,5,5,3)
  Data estimated from a related process
  Uncertainty: D
- heat, district or industrial, other than natural gas: 12.92 MJ; lognormal variance with pedigree 0.078, pedigree (4,5,5,5,1)
  Data estimated from a related process
  Uncertainty: D
  properties: heating value, net 1 MJ

## Sampling procedure
Data from Literature used

## Extrapolations
GLO dataset extrapolated from European dataset, which in turn was used to create this child dataset. Exchanges identical to GLO dataset. Created to enable linking to regional markets (e.g. for electricity). Data quality indicators adjusted accordingly.
