# cabbage white production

Dataset: EcoSpold 2, unit process
Geography: IN-UP
Time period: 2015-01-01 to 2023-12-31
Technology level: current
Classification: ISIC rev.4 ecoinvent: 0113:Growing of vegetables and melons, roots and tubers
Scenario: Business-as-Usual
System model: Allocation, cut-off by classification
Generated by: Sigma Das
Database: ecoinvent
isCopyrightProtected: true
accessRestrictedTo: 1

## General comment
This dataset represents the production of 1 kg of fresh White Cabbage during November, 2016- Feburary, 2017 at a farm located in village Lodhipur Rajput, District Moradabad of Uttar Pradesh State in India. In this area, fields are irrigated with ground water using electric pump for surface irrigation. The farm has a yield of 45,000 kg fresh matter per ha for this crop cycle. Sowing date for the crop is 27-November, 2016 and harvesting date is 05-Feburary, 2017. Mineral NP fertilizer input is 205.5-172.5 kg/ha. Organic fertilizer applied amounts to 60,000 kg of manure from cattle dung. Only insecticide used has active ingredient as Chlorantranilipore 30g/ha for which Clothianidin is used as proxy for this dataset. Machinery is used only for soil cultivation with fuel consumption of 16.64 kg/ha using plough and rotary cultivator for soil tillage.

## Included activities start
This activity starts about six weeks after the harvest of the previous crop. The soil is prepared for cultivation in November and sowing of seeds started about three weeks after soil preparation. Thereafter the crop is mature for harvesting in about 2 months.

## Included activities end
The activity ends with the harvesting of the mature White Cabbage.

## Technology
Cultivation of White Cabbage follows conventional production standards

## Time period
Soil cultivating date for the main crop: 07-November, 2016; Harvesting date main crop: 05-Feburary, 2017. The soil cultivation, sowing and harvesting dates are taken as the middle date of the week or fortnight told to the data collector by the farmer. Total time from date of sowing to date of harvesting comes to 70 days. The data is collected for one crop cycle. The cycle of one year is considered for entry in ecoeditor.

## Reference product
- cabbage white: 1 kg; By-product classification allocatable product; CPC 01212: Cabbages; HS2017 070490: Vegetables, brassica; edible, n.e.c. in heading no. 0704, fresh or chilled
  production volume 2.9202e8 kg; = 292.02*1000*1000
    http://agriexchange.apeda.gov.in/India%20Production/India_Productions.aspx?hscode=1071 The value was given in thousand tonnes figure taken is for the State of Uttar Pradesh and considered representative of production in North India.
  property price 0.719 EUR2005
    Calculated from the trade statistics for the year 2005 published by the UN (COMTRADE database, accessed 20151105) as an average of 5 biggest importers of cabbage in the world; UK, DE, CA, USA and JP. Comtrade cathegory: 704: Cabbage, cauliflower, kohlrabi & kale, fresh, chilled.
  properties: carbon allocation 0 kg, carbon content 0

## Inputs from technosphere
- compost: 1.33333 kg; lognormal variance with pedigree 0.0052, pedigree (2,4,3,1,1)
  Home made compost
  property cadmium content 3.6e-7; name Cd_content
  property chromium content 2.23e-5; name Cr_content
  property copper content 5.77e-5; name Cu_content
  property dry mass 0.5 kg; name DM
  property lead content 4.9e-5; name Pb_content
  property mercury content 1.2e-7; name Hg_content
  property nickel content 1.63e-5; name Ni_content
  property nitrogen content 0.014; name N_content
  property phosphorus content 0.0035; name P_content
  property potassium content 0.01; name K_content
  property zinc content 0.000184; name Zn_content
  properties: carbon content, non-fossil 0.183645, water content 1, wet mass 1 kg
- cyclic N-compound: 6.66667e-7 kg; lognormal variance with pedigree 0.0052, pedigree (2,4,3,1,1)
  The data was collected for a hectare area through interview
  properties: carbon content, fossil 0.641962, dry mass 1 kg, wet mass 1 kg
- inorganic nitrogen fertiliser, as N: 0.001507 kg; lognormal variance with pedigree 0.0052, pedigree (2,4,3,1,1)
  The data was collected for a hectare area through interview
  properties: dry mass 1 kg, wet mass 1 kg
- inorganic phosphorus fertiliser, as P2O5: 0.00383333 kg; lognormal variance with pedigree 0.0052, pedigree (2,4,3,1,1)
  The data was collected for a hectare area through interview
  properties: dry mass 1 kg, wet mass 1 kg
- irrigation: 0.0132 m3; lognormal variance with pedigree 0.0052, pedigree (2,4,3,1,1)
  The data was collected for a hectare area through interview
  properties: dry mass 0.11 kg, water content 9089.91, wet mass 1000 kg
- land use change, annual crop: 3.53843e-6 ha; lognormal variance with pedigree 0.0126, pedigree (2,4,3,1,1)
  Calculated Value. This value has been calculated by using the ecoinvent LCI calculation tool for crop production.
- packaging, for fertilisers: 0.0168 kg; lognormal variance with pedigree 0.0532, pedigree (4,3,3,5,4)
  Total amount of active substance/s of fertilisers needed for the production of 'cabbage white' is calculated to be circa 8.40E-03 kg. Fertiliser/s used in this dataset is/are: 'nitrogen fertiliser, as N', 'phosphate fertiliser, as P2O5', 'urea, as N'. The total amount of active substance/s is doubled in order to account for the packaging of the dilluted product of fertiliser/s that is/are applied. Therefore, 1.68E-02 kg of packaging for fertilisers is justified with this exchange.
  properties: carbon content, fossil 0.825301, dry mass 1 kg, heating value, net 25.01 MJ, price 0.0642 EUR2005, wet mass 1 kg
  note on carbon content, fossil: Considering a chemical formula (C2H4)n for polyethylene, carbon content-fossil is calculated to be 0.856286 kg of Carbon per kg of dry mass.
- packaging, for pesticides: 1.33333e-6 kg; lognormal variance with pedigree 0.0532, pedigree (4,3,3,5,4)
  Total amount of active substance/s of pesticides needed for the production of cabbage white is calculated to be circa 6.67E-07 kg. Pesticide/s used in this dataset is/are: 'cyclic N-compound'. The total amount of active substance/s is doubled in order to account for the packaging of the dilluted product of pesticide/s that is/are applied. Therefore, 1.33E-06 kg of packaging for pesticides is justified with this exchange.
  properties: carbon content, fossil 0.85714, dry mass 1 kg, heating value, net 25.97 MJ, price 0.0642 EUR2005, wet mass 1 kg
- tillage, ploughing: 7.08387e-6 ha; lognormal variance with pedigree 0.0052, pedigree (2,4,3,1,1)
  The data was collected for a hectare area through interview
- tillage, rotary cultivator: 1.31127e-5 ha; lognormal variance with pedigree 0.0052, pedigree (2,4,3,1,1)
  The data was collected for a hectare area through interview
- urea: 0.00655931 kg; lognormal variance with pedigree 0.0052, pedigree (2,4,3,1,1)
  The exchange has been updated from 'urea, as N' into 'urea' and therefore its amount has been scaled (multiplied) from 0.0031 kg by 2.1438 kg of 'urea' per kg of 'urea, as N'. Original comment of the exchange is: The data was collected for a hectare area through interview
  properties: carbon content, fossil 0.2, dry mass 1 kg, wet mass 1 kg

## Inputs from nature
- Carbon dioxide, in air [natural resource, in air]: 0.234508 kg; lognormal variance with pedigree 0.0052, pedigree (2,4,3,1,1)
  (same comment as for land use change, annual crop)
- Energy, gross calorific value, in biomass [natural resource, biotic]: 2.717 MJ; lognormal variance with pedigree 0.0052, pedigree (2,4,3,1,1)
  The data was collected for a hectare area through interview
- Occupation, annual crop, irrigated [natural resource, land]: 0.0740741 m2*year; lognormal variance with pedigree 0.0066, pedigree (2,4,3,1,1)
  (same comment as for land use change, annual crop)
- Transformation, from annual crop, irrigated [natural resource, land]: 0.222222 m2; lognormal variance with pedigree 0.0126, pedigree (2,4,3,1,1)
  (same comment as for land use change, annual crop)
- Transformation, to annual crop, irrigated [natural resource, land]: 0.222222 m2; lognormal variance with pedigree 0.0126, pedigree (2,4,3,1,1)
  (same comment as for land use change, annual crop)

## Emissions to nature
- Ammonia [air, non-urban air or from high stacks]: 0.00153699 kg; lognormal variance with pedigree 0.0126, pedigree (2,4,3,1,1)
  (same comment as for land use change, annual crop)
- Carbon dioxide, fossil [air, non-urban air or from high stacks]: 0.00480677 kg; lognormal variance with pedigree 0.0052, pedigree (2,4,3,1,1)
  (same comment as for land use change, annual crop)
- Dinitrogen monoxide [air, non-urban air or from high stacks]: 0.000326251 kg; lognormal variance with pedigree 0.0346, pedigree (2,4,3,1,1)
  (same comment as for land use change, annual crop)
- Nitrogen oxides [air, non-urban air or from high stacks]: 0.000852462 kg; lognormal variance with pedigree 0.0446, pedigree (2,4,3,1,1)
  (same comment as for land use change, annual crop)
- Water [air, non-urban air or from high stacks]: 0.006732 m3; lognormal variance with pedigree 0.0052, pedigree (2,4,3,1,1)
  (same comment as for land use change, annual crop)
- Cadmium II [soil, agricultural]: 4.15768e-7 kg; lognormal variance with pedigree 0.0446, pedigree (2,4,3,1,1)
  (same comment as for land use change, annual crop)
- Chromium III [soil, agricultural]: 1.63829e-5 kg; lognormal variance with pedigree 0.0446, pedigree (2,4,3,1,1)
  (same comment as for land use change, annual crop)
- Clothianidin [soil, agricultural]: 6.66667e-7 kg; lognormal variance with pedigree 0.0376, pedigree (2,4,3,1,1)
  The data was collected for a hectare area through interview
- Copper ion [soil, agricultural]: 3.75156e-5 kg; lognormal variance with pedigree 0.0446, pedigree (2,4,3,1,1)
  (same comment as for land use change, annual crop)
- Lead II [soil, agricultural]: 3.21874e-5 kg; lognormal variance with pedigree 0.0446, pedigree (2,4,3,1,1)
  (same comment as for land use change, annual crop)
- Mercury II [soil, agricultural]: 7.77402e-8 kg; lognormal variance with pedigree 0.0446, pedigree (2,4,3,1,1)
  (same comment as for land use change, annual crop)
- Nickel II [soil, agricultural]: 1.06601e-5 kg; lognormal variance with pedigree 0.0446, pedigree (2,4,3,1,1)
  (same comment as for land use change, annual crop)
- Zinc II [soil, agricultural]: 0.000120206 kg; lognormal variance with pedigree 0.0446, pedigree (2,4,3,1,1)
  (same comment as for land use change, annual crop)
- Cadmium II [water, ground-]: 3.66031e-10 kg; lognormal variance with pedigree 0.0946, pedigree (2,4,3,1,1)
  (same comment as for land use change, annual crop)
- Cadmium II [water, surface water]: 5.96688e-9 kg; lognormal variance with pedigree 0.0946, pedigree (2,4,3,1,1)
  (same comment as for land use change, annual crop)
- Chromium III [water, ground-]: 1.5679e-7 kg; lognormal variance with pedigree 0.0946, pedigree (2,4,3,1,1)
  (same comment as for land use change, annual crop)
- Chromium III [water, surface water]: 5.3016e-7 kg; lognormal variance with pedigree 0.0946, pedigree (2,4,3,1,1)
  (same comment as for land use change, annual crop)
- Copper ion [water, ground-]: 2.66545e-8 kg; lognormal variance with pedigree 0.0946, pedigree (2,4,3,1,1)
  (same comment as for land use change, annual crop)
- Copper ion [water, surface water]: 7.70576e-7 kg; lognormal variance with pedigree 0.0946, pedigree (2,4,3,1,1)
  (same comment as for land use change, annual crop)
- Lead II [water, ground-]: 4.42579e-9 kg; lognormal variance with pedigree 0.0946, pedigree (2,4,3,1,1)
  (same comment as for land use change, annual crop)
- Lead II [water, surface water]: 4.87641e-7 kg; lognormal variance with pedigree 0.0946, pedigree (2,4,3,1,1)
  (same comment as for land use change, annual crop)
- Mercury II [water, ground-]: 9.5872e-12 kg; lognormal variance with pedigree 0.0946, pedigree (2,4,3,1,1)
  (same comment as for land use change, annual crop)
- Mercury II [water, surface water]: 1.50765e-9 kg; lognormal variance with pedigree 0.0946, pedigree (2,4,3,1,1)
  (same comment as for land use change, annual crop)
- Nickel II [water, surface water]: 4.85984e-7 kg; lognormal variance with pedigree 0.0946, pedigree (2,4,3,1,1)
  (same comment as for land use change, annual crop)
- Nitrate [water, ground-]: 0.00791926 kg; lognormal variance with pedigree 0.0446, pedigree (2,4,3,1,1)
  (same comment as for land use change, annual crop)
- Phosphate [water, ground-]: 1.58988e-6 kg; lognormal variance with pedigree 0.0446, pedigree (2,4,3,1,1)
  (same comment as for land use change, annual crop)
- Phosphate [water, surface water]: 5.68877e-6 kg; lognormal variance with pedigree 0.0446, pedigree (2,4,3,1,1)
  (same comment as for land use change, annual crop)
- Phosphorus [water, surface water]: 4.04078e-5 kg; lognormal variance with pedigree 0.0446, pedigree (2,4,3,1,1)
  (same comment as for land use change, annual crop)
- Water [water, ground-]: 0.005148 m3; lognormal variance with pedigree 0.0052, pedigree (2,4,3,1,1)
  (same comment as for land use change, annual crop)
- Water [water, surface water]: 0.00132 m3; lognormal variance with pedigree 0.0052, pedigree (2,4,3,1,1)
  (same comment as for land use change, annual crop)
- Zinc II [water, ground-]: 2.43149e-7 kg; lognormal variance with pedigree 0.0946, pedigree (2,4,3,1,1)
  (same comment as for land use change, annual crop)
- Zinc II [water, surface water]: 1.37132e-6 kg; lognormal variance with pedigree 0.0946, pedigree (2,4,3,1,1)
  (same comment as for land use change, annual crop)

## Sampling procedure
The farmer was identified and contacted by agriculture science faculty familiar with the local farmers in the region. Data was collected directly from the farmer through semi-structured interview using a questionnaire based on the input requirements of the ecoinvent LCI calculation tool for crop production. The farmer does not maintain any written records and has provided the data from recent memory. In this region, typically farmers are unable to provide exact name of active ingredient in the pesticide they use and the same was noted from details given on the pesticide packet. Individual farmer is not able to calculate fuel consumption for his own farm alone and this information has been collected from farming community of the area

## Extrapolations
Ecoinvent LCI calculation tool for crop production was used to calculate field emissions from the cultivation process. Number of wet days have been taken for neighboring region (New Delhi) and rainfall data is Normal rainfall for Western Uttar Pradesh where the farm is located.

## Review by Assumpció ANTON 2018-02-21
Be aware to remove the mention to ALCIG from all flows that bear it. Cite “Ecoinvent LCI calculation tool for crop production” instead
