# phosphoric acid production, dihydrate process

Dataset: EcoSpold 2, unit process
Geography: US
Time period: 1986-01-01 to 2023-12-31
Technology level: current
Classification: ISIC rev.4 ecoinvent: 2012:Manufacture of fertilizers and nitrogen compounds
Tags: ConvertedDataset
Scenario: Business-as-Usual
System model: Allocation, cut-off by classification
Share of production covered: 30 %
Generated by: Alex Primas
Published in: Althaus H.-J. 2004
Database: ecoinvent
isCopyrightProtected: true
accessRestrictedTo: 1

## General comment
The process describes the production of phosphoric acid from phosphate rock with the dyhydrate process in Florida. As products of the multi output process fertiliser grade phosphoric acid (impure with 51% P2O5) and dilute fluosilic acid (22% in H2O) was considered.

## Included activities end
Raw materials, processing chemicals and processing energy, direct emissions to air from process, emissions to air and water from phosphogypsum storage, emission of radioactive substances from gypsum to air and water, land use for phosphogypsum storage and processing ponds, transport of raw materials to the plant, estimation for process infrastructure . The process includes data on emissions and land use from phosphogypsum storage.

## Geography
Data for amount of phosphoric acid production from statisitcs of IFA (International Fertiliser Agency). Data on phosphoric acid process from various studies made in Florida and from different literature sources concerning also other locations other than U.S. Data for processes used in Florida extrapolated for the whole United States. Only production from wet rock considered as in the mayority of the sites in Florida used. Data for production of fluosilic acid from one european study (EFMA). This data was was used for the whole U.S. production.

## Technology
Data refers to wet-phosphoric acid production from phosphate rock by the dihydrate process. Technology with cooling ponds and gypsum stacks as used in Florida was applied. Balanced water management assumed.

## Parameters
- fraction, cooling water, cooling pond system, to air: 0.032 dimensionless; name fraction_CW_CP_to_air; lognormal variance with pedigree 0.0413, pedigree (2,3,1,3,1)
  Calculated based on literature value (Scown, C.D., 2011, Water Footprint of U.S. Transportation Fuels and supplying information of the article) (Vionnet, S., Quantis Water Database - Technical Report, 2012).
- fraction, cooling water, once-through system, to air: 0.004 dimensionless; name fraction_CW_OT_to_air; lognormal variance with pedigree 0.0413, pedigree (2,3,1,3,1)
  (same comment as for fraction, cooling water, cooling pond system, to air)
- fraction, cooling water, recirculating system, to air: 0.771 dimensionless; name fraction_CW_R_to_air; lognormal variance with pedigree 0.0413, pedigree (2,3,1,3,1)
  (same comment as for fraction, cooling water, cooling pond system, to air)
- fraction, cooling water, to air: 0.3875 dimensionless; name fraction_CW_to_air; = (0.5*fraction_CW_OT_to_air)+(0.5*fraction_CW_R_to_air); lognormal variance with pedigree 0.092025, pedigree (4,4,3,2,4)
  Calculated value based on literature value (see comments of the other parametres present in this dataset) and expert opinion. In the case when no industry/literature data are available about the type of cooling or directly fraction, cooling water, to air specific for the process a default assumption is applied. It is assumed that the once-through cooling system is used in 50% of all cases and recirculating system is used in another 50% of all cases.
- fraction, process water, to air: 0.34 dimensionless; name fraction_PW_to_air; lognormal variance with pedigree 0.092025, pedigree (4,4,3,2,4)
  Literature value (Statistics Canada, 2007 & Shaffer, K.H., 2008, Consumptive water use in the Great Lakes Basin, USGS) (Vionnet, S., Quantis Water Database - Technical Report, 2012).

## Reference product
- fluosilicic acid, without water, in 22% solution state: 1 kg; By-product classification allocatable product; CPC 34270: Cyanides, cyanide oxides and complex cyanides; fulminates, cyanates and thiocyanates; silicates; borates; perb[…]; HS2017 2915: Acids; saturated acyclic monocarboxylic acids and their anhydrides, halides, peroxides and peroxyacids; their[...]; CAS 16961-83-4
  production volume 3.76588e8 kg
    Capacity in North America 11.85 Mt P2O5 in 1997, therof 50-60% in Florida.
    Calculated relative to the output of phosphoric acid (0.018 kg / kg acid)
  property price 0.706 EUR2005
    Temporary price data. Calculated as 90% of purchasers price based on: 2005 import and export prices (total trades (USD) divided by total weight (kg) in biggest economies of the world: EU27, USA, Brasil, China, India, Japan and Russia) from UN Commodity Trade Statistics Database (http://data.un.org/Explorer.aspxDatabase [Accessed 2011.06.20]). Commodity: Inorganic acids nes
  properties: allocation factor 0.0498924, carbon allocation 0 kg, carbon content 0, carbon content, fossil 0, carbon content, non-fossil 0, dry mass 1 kg, true value 0.012708, water content 0, water in wet mass 0 kg, wet mass 1 kg

## Inputs from technosphere
- electricity, medium voltage: 0.270001 kWh; = 191/1000*0.51; lognormal variance with pedigree 0.0426, pedigree (2,1,5,5,1)
  It is assumed that the process requires 191 kWh per tonne of P2O5.
  References: Althaus H.-J., Chudacoff M., Hischier R., Jungbluth N., Osses M. and Primas A. (2007) Life Cycle Inventories of Chemicals. ecoinvent report No. 8, v2.0. EMPA Dübendorf, Swiss Centre for Life Cycle Inventories, Dübendorf, CH, from www.ecoinvent.org.
  Uncertainty: A
- heat, district or industrial, natural gas: 8.48171 MJ; lognormal variance with pedigree 0.0602, pedigree (3,2,5,3,3)
  Average of different literature, split is uncertain
  Uncertainty: A
  properties: heating value, net 1 MJ
- heat, district or industrial, other than natural gas: 1.44134 MJ; lognormal variance with pedigree 0.0602, pedigree (3,2,5,3,3)
  Average of different literature, split is uncertain
  Uncertainty: A
  property corresponding fuel use, propane, furnace >100kW 0 MJ; name fuel_use
  properties: heating value, net 1 MJ
  note on corresponding fuel use, propane, furnace >100kW: Lower heating value of the fuel input related to the heat/electricity output, taken directly from ecoinvent v3.0 dataset 'heat production, natural gas, at industrial furnace >100kW, GLO 2000'.
- phosphate rock, beneficiated: 4.60162 kg; = 0.51/(0.32*0.96); lognormal variance with pedigree 0.0412, pedigree (1,3,5,1,1)
  It is assumed that the process is 96% efficient in terms of the phosphate rock input. Phosphate rock has a P2O5 equal to 32% and phosphoric acid has a P2O5 content of 51%.
  References: Althaus H.-J., Chudacoff M., Hischier R., Jungbluth N., Osses M. and Primas A. (2007) Life Cycle Inventories of Chemicals. ecoinvent report No. 8, v2.0. EMPA Dübendorf, Swiss Centre for Life Cycle Inventories, Dübendorf, CH, from www.ecoinvent.org.
  properties: dry mass 1 kg, wet mass 1 kg
- phosphoric acid factory, fertiliser grade: 8.6203e-10 unit; lognormal variance with pedigree 0.448, pedigree (4,5,5,5,4)
  Data from a small plant in Jordania;activityLink introduced to establish a direct link to the corresponding regional supply of this product
  Uncertainty: D
- quicklime, milled, loose: 0.228951 kg; lognormal variance with pedigree 0.0712, pedigree (2,3,5,5,3)
  Data for an average process from literature
  Uncertainty: D
  properties: dry mass 0.99 kg, water content 0.010101, wet mass 1 kg
- sulfuric acid: 3.88745 kg; = 2.75*0.51; lognormal variance with pedigree 0.0707, pedigree (2,4,5,3,3)
  It is assumed that 2.75 kg of sulfuric acid are used per kg of P2O5 in the phosphoric acid, which has a P2O5 content of 51%.
  References: Althaus H.-J., Chudacoff M., Hischier R., Jungbluth N., Osses M. and Primas A. (2007) Life Cycle Inventories of Chemicals. ecoinvent report No. 8, v2.0. EMPA Dübendorf, Swiss Centre for Life Cycle Inventories, Dübendorf, CH, from www.ecoinvent.org.
  Uncertainty: D
  properties: dry mass 1 kg, wet mass 1 kg

## Inputs from nature
- Occupation, construction site [natural resource, land]: 1.38036 m2*year; lognormal variance with pedigree 0.0426, pedigree (2,1,5,5,1)
  Calculated from electricity use
  Uncertainty: C
- Occupation, industrial area [natural resource, land]: 0.000146628 m2*year; lognormal variance with pedigree 0.4006, pedigree (2,5,5,5,5)
  Large variation possible, average value used
  Uncertainty: l
- Transformation, from industrial area [natural resource, land]: 0.00147737 m2; lognormal variance with pedigree 0.2586, pedigree (2,5,5,1,4)
  Related process data used, uncertain distribution
  Uncertainty: R
- Transformation, from pasture, man made [natural resource, land]: 0.000931325 m2; lognormal variance with pedigree 0.406, pedigree (4,5,5,1,5)
  Estimated from weak data, assumptions
  Uncertainty: E
- Transformation, from unspecified [natural resource, land]: 1.15584e-5 m2; lognormal variance with pedigree 0.406, pedigree (4,5,5,1,5)
  Estimated from weak data, assumptions
  Uncertainty: E
- Transformation, to industrial area [natural resource, land]: 0.00141362 m2; lognormal variance with pedigree 0.406, pedigree (4,5,5,1,5)
  Estimated from weak data, assumptions
  Uncertainty: E
- Transformation, to pasture, man made [natural resource, land]: 9.97849e-6 m2; lognormal variance with pedigree 0.406, pedigree (4,5,5,1,5)
  Estimated from weak data, assumptions
  Uncertainty: E
- Transformation, to unspecified [natural resource, land]: 0.000997849 m2; lognormal variance with pedigree 0.406, pedigree (4,5,5,1,5)
  Estimated from weak data, assumptions
  Uncertainty: E
- Water, cooling, unspecified natural origin [natural resource, in water]: 0.353848 m3; name water_cooling_UNO_input; source Byers, W. 2003; lognormal variance with pedigree 0.0512, pedigree (2,3,5,1,1)
  Calculated based on literature, (Vionnet, S., Quantis Water Database - Technical Report, 2012). It includes the process: grinding, processing, filtration, concentration, etc. The process ends when finished phosphoric acid leaves the plant. It is assumed that there is no process water use (the source of information assumes the same).
  property carbon content, fossil 0.0104329; name C_content_fossil
  property carbon content, non-fossil 0; name C_content_non_fossil
  property dry mass 0.1101 kg; name DM
  property water content 9081.65; name water_content
  property water in wet mass 999.89 kg; name WWM
  property wet mass 1000 kg; name WM
- Water, well, in ground [natural resource, in water]: 0.0149705 m3; name water_well_in_ground_input; source Byers, W. 2003; lognormal variance with pedigree 0.052625, pedigree (3,3,5,2,1)
  Data for a specific wet rock process, assumptions
  Calculated based on literature, (Vionnet, S., Quantis Water Database - Technical Report, 2012). It includes the process: grinding, processing, filtration, concentration, etc.
  Uncertainty: D

## Emissions to nature
- Hydrogen fluoride [air, non-urban air or from high stacks]: 0.000146628 kg; lognormal variance with pedigree 0.4006, pedigree (2,5,5,5,5)
  Large variation possible, average value used
  Uncertainty: l
- Lead-210 [air, non-urban air or from high stacks]: 0.000781648 kBq; lognormal variance with pedigree 0.564025, pedigree (3,4,5,2,5)
  Data from one survey, distribution uncertain
  Uncertainty: D
- Particulate Matter, < 2.5 um [air, non-urban air or from high stacks]: 0.000332616 kg; lognormal variance with pedigree 0.4386, pedigree (2,5,5,1,4)
  Related process data used, uncertain distribution
  Uncertainty: R
- Particulate Matter, > 10 um [air, non-urban air or from high stacks]: 0.00041577 kg; lognormal variance with pedigree 0.1786, pedigree (2,5,5,1,4)
  Related process data used, uncertain distribution
  Uncertainty: R
- Particulate Matter, > 2.5 um and < 10um [air, non-urban air or from high stacks]: 0.000471206 kg; lognormal variance with pedigree 0.2586, pedigree (2,5,5,1,4)
  Related process data used, uncertain distribution
  Uncertainty: R
- Polonium-210 [air, non-urban air or from high stacks]: 0.0013665 kBq; lognormal variance with pedigree 0.564025, pedigree (3,4,5,2,5)
  Data from one survey, distribution uncertain
  Uncertainty: D
- Potassium-40 [air, non-urban air or from high stacks]: 7.81648e-5 kBq; lognormal variance with pedigree 0.564025, pedigree (3,4,5,2,5)
  Data from one survey, distribution uncertain
  Uncertainty: D
- Radium-226 [air, non-urban air or from high stacks]: 0.000878661 kBq; lognormal variance with pedigree 0.564025, pedigree (3,4,5,2,5)
  Data from one survey, distribution uncertain
  Uncertainty: D
- Radon-222 [air, non-urban air or from high stacks]: 8.01051 kBq; lognormal variance with pedigree 0.564025, pedigree (3,4,5,2,5)
  Data from one survey, distribution uncertain
  Uncertainty: D
- Silicon tetrafluoride [air, non-urban air or from high stacks]: 9.97849e-6 kg; lognormal variance with pedigree 0.406, pedigree (4,5,5,1,5)
  Estimated from weak data, assumptions
  Uncertainty: E
- Thorium-228 [air, non-urban air or from high stacks]: 1.95135e-5 kBq; lognormal variance with pedigree 0.564025, pedigree (3,4,5,2,5)
  Data from one survey, distribution uncertain
  Uncertainty: D
- Uranium-238 [air, non-urban air or from high stacks]: 6.81863e-5 kBq; lognormal variance with pedigree 0.564025, pedigree (3,4,5,2,5)
  Data from one survey, distribution uncertain
  Uncertainty: D
- Water [air, unspecified]: 0.142206 m3; name water_to_air_unspecified; = (water_cooling_UNO_input*fraction_CW_to_air)+(water_well_in_ground_input*fraction_PW_to_air); lognormal variance with pedigree 0.0807, pedigree (2,2,5,1,1)
  Calculated value based on literature values and expert opinion. See comments in the parametres' comment field.
  property fraction, origin: fresh water 0.0357929; name fraction_origin_fresh_water
  property fraction, origin: salt water 0; name fraction_origin_salt_water
  property fraction, origin: unspecified 0.964207; name fraction_origin_unspecified
- Arsenic ion [water, ground-]: 4.10227e-10 kg; lognormal variance with pedigree 0.704, pedigree (3,4,5,1,1)
  Estimation based on 1 Source, calculated
  Uncertainty: E
- Cadmium II [water, ground-]: 5.87622e-10 kg; lognormal variance with pedigree 0.704, pedigree (3,4,5,1,1)
  Estimation based on 1 Source, calculated
  Uncertainty: E
- Calcium II [water, ground-]: 0.000130275 kg; lognormal variance with pedigree 0.094, pedigree (3,4,5,1,1)
  Estimation based on 1 Source, calculated
  Uncertainty: E
- Chromium III [water, ground-]: 2.05668e-9 kg; lognormal variance with pedigree 0.704, pedigree (3,4,5,1,1)
  Estimation based on 1 Source, calculated
  Uncertainty: E
- Copper ion [water, ground-]: 2.6443e-10 kg; lognormal variance with pedigree 0.704, pedigree (3,4,5,1,1)
  Estimation based on 1 Source, calculated
  Uncertainty: E
- Fluoride [water, ground-]: 9.56271e-6 kg; lognormal variance with pedigree 0.186, pedigree (4,5,5,1,4)
  Estimation based on 1 Source, calculated
  Uncertainty: E
- Lead II [water, ground-]: 4.26857e-9 kg; lognormal variance with pedigree 0.704, pedigree (3,4,5,1,1)
  Estimation based on 1 Source, calculated
  Uncertainty: E
- Lead-210 [water, ground-]: 0.00318757 kBq; lognormal variance with pedigree 0.564025, pedigree (3,4,5,2,5)
  Data from one survey, distribution uncertain
  Uncertainty: D
- Manganese II [water, ground-]: 1.00616e-8 kg; lognormal variance with pedigree 0.704, pedigree (3,4,5,1,1)
  Estimation based on 1 Source, calculated
  Uncertainty: E
- Nickel II [water, ground-]: 3.63106e-9 kg; lognormal variance with pedigree 0.704, pedigree (3,4,5,1,1)
  Estimation based on 1 Source, calculated
  Uncertainty: E
- Phosphate [water, ground-]: 8.06594e-6 kg; lognormal variance with pedigree 0.094, pedigree (3,4,5,1,1)
  Estimation based on 1 Source, calculated
  Uncertainty: E
- Polonium-210 [water, ground-]: 0.00485065 kBq; lognormal variance with pedigree 0.564025, pedigree (3,4,5,2,5)
  Data from one survey, distribution uncertain
  Uncertainty: D
- Potassium-40 [water, ground-]: 0.00038528 kBq; lognormal variance with pedigree 0.564025, pedigree (3,4,5,2,5)
  Data from one survey, distribution uncertain
  Uncertainty: D
- Radium-226 [water, ground-]: 0.00357562 kBq; lognormal variance with pedigree 0.564025, pedigree (3,4,5,2,5)
  Data from one survey, distribution uncertain
  Uncertainty: D
- Sulfate [water, ground-]: 0.000293811 kg; lognormal variance with pedigree 0.094, pedigree (3,4,5,1,1)
  Estimation based on 1 Source, calculated
  Uncertainty: E
- Thorium-228 [water, ground-]: 3.90824e-5 kBq; lognormal variance with pedigree 0.564025, pedigree (3,4,5,2,5)
  Data from one survey, distribution uncertain
  Uncertainty: D
- Uranium-238 [water, ground-]: 0.00163536 kBq; lognormal variance with pedigree 0.564025, pedigree (3,4,5,2,5)
  Data from one survey, distribution uncertain
  Uncertainty: D
- Water [water, unspecified]: 0.226613 m3; name water_to_water_unspecified; = water_cooling_UNO_input*(1-fraction_CW_to_air)+water_well_in_ground_input*(1-fraction_PW_to_air); lognormal variance with pedigree 0.0807, pedigree (2,2,5,1,1)
  (same comment as for Water)
  property fraction, origin: fresh water 0.043601; name fraction_origin_fresh_water_Ww
  property fraction, origin: salt water 0; name fraction_origin_salt_water_Ww
  property fraction, origin: unspecified 0.956399; name fraction_origin_unspecified_Ww
- Zinc II [water, ground-]: 1.69634e-9 kg; lognormal variance with pedigree 0.704, pedigree (3,4,5,1,1)
  Estimation based on 1 Source, calculated
  Uncertainty: E

## Sampling procedure
Production assessed with mixed data from the phosphoric acid production in Florida. Therefore it is difficult to give a precise nuber for the representativity of the data. It was assumed that the data cover about 30-50% of the U.S. production. The total amount of fluosilic acid produced is not known. The production was assessed with weak data from one source. Therefore no representativity of the data can be given for fluosilic acid production.
