# electricity production, wind, <1MW turbine, onshore

Dataset: EcoSpold 2, unit process
Geography: AR
Time period: 2012-01-01 to 2023-12-31
Technology level: modern
Classification: ISIC rev.4 ecoinvent: 3510:Electric power generation, transmission and distribution
Tags: wind power
Scenario: Business-as-Usual
System model: Allocation, cut-off by classification
Generated by: Alejandro P Arena
Published in: Suppen, N. 2017
Database: ecoinvent
isCopyrightProtected: true
accessRestrictedTo: 1

## General comment
This dataset represents the production of high voltage electricity at onshore grid-connected wind power plants with a capacity of less than 1 MW in Argentina during 2014. The operative wind power plants during that year were Sea energy-Necochea and Diadema, with a net electricity production of 0.029 TWH All of them are placed onshore.
The exchanges and parameters for electricity production have been taken from the “electricity production, wind, <1 MW turbine, onshore, GLO, 2008” dataset (accessed: February 2nd, 2018).
Wind load hours have been calculated from the electricity production volume and the installed capacity
The dataset includes operation and maintenance expenditures as well as infrastructure inputs.
This dataset is based on the "electricity production, wind, <1MW turbine, onshore"/ GLO 2008 dataset, in which the class of onshore < 1MW wind turbines is approximated with a 0.8 MW onshore wind turbine consisting of the infrastructure datasets for 'moving parts' and 'fixed parts'. Moving parts are the rotor, the nacelle, electronics, and the network connection. The tower and foundation are considered as fixed parts.
According to The Wind Power Database (2014), total installed wind capacity on-and offshore in Switzerland in the end of 2014 amounted to 60 MW. Out of it, 0% were installed offshore, which are modelled with a 2 MW wind turbine. Percentages of the three onshore wind power plant classes modelled in ecoinvent referring to the total installed capacity (12 windfarms by 12/2014): <1MW 8.8%; 1-3MW 91.2%; >3MW 0% [Retreived from The Wind Power. 2014. Wind power and wind farms database. www.thewindpower.net, Status December 2014].
Literature value/calculated value. Valid for 2014. According to CAMMESA during 2014 only 191 MW were operative: <1MW 3.43 %; 1-3MW 96,57 %. Source: CAMMESA "COMPAÑÍA ADMINISTRADORA DEL MERCADO MAYORISTA ELÉCTRICO SOCIEDAD ANÓNIMA"Supporting documentation available at: http://portalweb.cammesa.com/Memnet1/default.aspx.
Additional information available under request.
A loss of 1% from gross to net is assumed for wind power.

## Included activities start
From operation of the wind power plant to high voltage electricity at the plant. The electricity produced with wind turbines in a wind power plant is connected to medium voltage or high voltage systems, depending on the size of the windfarm. Normally, each wind turbine contains a transformer from low voltage to medium voltage. The network connection additionally transforms the electricity to high voltage electricity. It is assumed here, that there are no stand-alone grid-connected small wind turbines and that all electricity is connected to the network in form of high voltage electricity.

## Included activities end
This activity ends with the production of 1kWh of high voltage electricity produced at the power plant and delivered to the grid.

This dataset includes
- the operation and maintenance of the wind power plant
- change of lubricating oil every year

This dataset doesn't include
- raw materials extraction, decommissioning and waste treatment as these activities are already included in infrastructure datasets
- transformation of the electricity produced in order to deliver in to the grid as this is already included in the infrastructure datasets.

## Technology
Technology of a specific 800 kW wind power plant modelled with a dataset for fixed and moving parts each (the latter including the network connection). Moving parts are the rotor, the nacelle, electronics, and the network connection. The tower and foundation are considered as fixed parts.

## Time period
The Annual Production Volume is valid for the year 2014.

## Parameters
- Installed capacity: 6.55 MW; name capacity_installed; lognormal variance with pedigree 0.0012, pedigree (2,1,1,1,1)
  Literature value. Total installed capacity of operative wind turbines on shore during 2014.
  According to CAMMESA during 2014 only 191 MW were operative: <1MW 3.43 %; 1-3MW 96,57 %. Source: CAMMESA "COMPAÑÍA ADMINISTRADORA DEL MERCADO MAYORISTA ELÉCTRICO SOCIEDAD ANÓNIMA"Supporting documentation available at: http://portalweb.cammesa.com/Memnet1/default.aspxNOTE:
- Percentage of onshore wind power plant class capacity on total: 1 dimensionless; name percentage_class_onshore; lognormal variance with pedigree 0.0037, pedigree (3,2,1,1,2)
  Literature value/calculated value. Percentage of installed capacity with onshore wind turbines < 1MW on total installed wind capacity of this size installed in this geography (see general comment for percentages in other size classes). There are no offshore plants in AR
  According to CAMMESA during 2014 only 191 MW were operative: <1MW 3.43 %; 1-3MW 96,57 %. Source: CAMMESA "COMPAÑÍA ADMINISTRADORA DEL MERCADO MAYORISTA ELÉCTRICO SOCIEDAD ANÓNIMA" Supporting documentation available at: http://portalweb.cammesa.com/Memnet1/default.aspx.
  Additional information available under request
- Wind load hours: 4528.01 hour; name wind_load_hours; = gross_electricity*(1- losses_gross_net)/(capacity_installed*1000); lognormal variance with pedigree 0.0506, pedigree (5,3,1,1,3)
  Calculated value for this wind power plant class, considering the gross electricity production from this wind power plant class, the gross to net losses and the total on-shore installed capacity
  CAMMESA "COMPAÑÍA ADMINISTRADORA DEL MERCADO MAYORISTA ELÉCTRICO SOCIEDAD ANÓNIMA" Informe anual 2014. Supporting documentation available at: http://portalweb.cammesa.com/Memnet1/default.aspx
- distance: 200 km; lognormal variance with pedigree 0.1016, pedigree (4,5,5,4,4)
  Estimation. Data taken from the GLO 2008 dataset.
  Maintenance transport to the power plant. One person travels two times per year over a distance of 200 km each time, one time for check only with a car, one time for change of the lubricating oil with a lorry.
  nan
- gross electricity production: 2.99581e7 kWh; name gross_electricity; lognormal variance with pedigree 0.0018, pedigree (2,1,1,1,2)
  Literature value/statistics. Gross electricity production from <1 MW on-shore grid-connected wind power plants during 2014
  According to CAMMESA during 2014 only 191 MW were operative, with the following shares: <1MW 3.43 %; 1-3MW 96,57 %.
  The source (CAMMESA) provides statistics about net energy exchanges through the electric wholesale market.
  The gross electricity production was calculated from the net electricity production considering the losses due to auxiliary consumption within the power plant using the losses_gross_net parameter (see the comment for the parameter losses from gross electricity production).
  CAMMESA "COMPAÑÍA ADMINISTRADORA DEL MERCADO MAYORISTA ELÉCTRICO SOCIEDAD ANÓNIMA" Supporting documentation available at: http://portalweb.cammesa.com/Memnet1/default.aspx
  Additional information avaialble under request
- losses from gross electricity production: 0.01 dimensionless; name losses_gross_net; lognormal variance with pedigree 0.0113, pedigree (3,3,1,3,3)
  Estimation. The factor for the loss of electricity from gross to net electricity production is an assumption based on experiences, statistics and expertise (1% losses for wind).
  nan
- use of lubricating oil for maintenance: 63 kg; name lubricating_oil_maintenance; lognormal variance with pedigree 0.0912, pedigree (4,4,5,4,4)
  Data taken from the original dataset.
  Literature value. 63kg of lubricating oil are changed every year for a 800 kW wind turbine.(Burger&Bauer 2007, p.41)
  nan

## Reference product
- electricity, high voltage: 1 kWh; By-product classification allocatable product; CPC 17100: Electrical energy; HS2017 271600: Electrical energy
  production volume 4.15779e8 kWh; name APV_electricity; = gross_electricity* (1-losses_gross_net)* percentage_class_onshore
    Calculated/Statistics value.
    The source (CAMMESA) provides statistics about net energy exchanges through the electric wholesale market.
    The gross electricity production was calculated from the net electricity production considering the losses due to auxiliary consumption within the power plant using the losses_gross_net parameter
    (see the comment for the parameter losses from gross electricity production).
    Supporting documentation available at: http://portalweb.cammesa.com/Memnet1/default.aspx
  property price 0.0977 EUR2005
    Temporary price data. Calculated as 90% of purchasers price based on: 94% of the average price (to account for a 6% loss in transformation and transmission) for electricity for industrial consumersin 2005 (excluded taxes). From IEA.
  properties: carbon allocation 0 kg, carbon content 0

## Inputs from technosphere
All rows: source COMPAÑÍA ADMINISTRADORA DEL MERCADO MAYO 2014
- lubricating oil: 1.73917e-5 kg; name lubricating_oil; = lubricating_oil_maintenance*lifetime/(lifetime*(capacity_MW*1000)*wind_load_hours); lognormal variance with pedigree 0.002, pedigree (1,1,3,1,1)
  Calculated value. Lubricating oil use for maintenance, the wind load hours for Argentina.
  properties: carbon content, fossil 0.75, dry mass 1 kg, heating value, net 40.2 MJ, wet mass 1 kg
  note on carbon content, fossil: Lubricating oil is produced from diesel. C-content/dry mass of fats and oils considered 75%, from: ecoinvent v2.2 report, n 15a, pg 40
  note on heating value, net: Literature value, Source: IPCC 2006, 2006 IPCC Guidelines for National Greenhouse Gas Inventories, Prepared by the National Greenhouse Gas Inventories Programme, Eggleston H.S., Buendia L., Miwa K., Ngara T. and Tanabe K. (eds). Published: IGES, Japan
- transport, freight, lorry 7.5-16 metric ton, EURO3: 9.60229e-13 metric ton*km; = ((lubricating_oil/1000)/2)*(distance*2*lifetime/(lifetime*(capacity_MW*1000)*wind_load_hours))
  Calculated value. Two maintenance transports to the power plant with 200 km each. Once a year, the lubricating oil is transported and changed. Calculated value considering the wind load hours for Argentina.
- waste mineral oil: -1.73917e-5 kg; name waste_min_oil_10; = lubricating_oil
  Calculated value considering the wind load hours for Argentina.
  production volume; = APV_electricity* waste_min_oil_10
    Calculated from production volume of reference product using the relative outputs.
    Due to reasons of the parent-child relationship, a safety amount of 400000kg waste mineral oil had to be added.
  properties: carbon content, fossil 0.864444, dry mass 0.9 kg, heating value, net 34.7 MJ, water content 0.111111, wet mass 1 kg
  note on carbon content, fossil: Tab A.6, ecoinvent v2.2 report 13_I. C content has been calculated after data in the tables, and then referred to 1 kg DM
  note on heating value, net: Value taken from the general comment of the treatment dataset.
- wind power plant, 800kW, fixed parts: 1.3803e-8 unit; = 1/(lifetime*(capacity_MW*1000)*wind_load_hours); lognormal variance with pedigree 0.002, pedigree (1,1,3,1,1)
  Calculated value considering the wind load hours for Argentina.
  property capacity [MW] 0.8 MW; name capacity_MW
  properties: lifetime 20 year
  note on lifetime: Estimation/literature value. Today, wind turbine producers often use a lifetime of 20 years for all parts of the wind turbine in their financial calculataions, even if it can be assumed that the foundation could have a longer lifetime.
- wind power plant, 800kW, moving parts: 1.3803e-8 unit; = 1/(lifetime*(capacity_MW*1000)*wind_load_hours); lognormal variance with pedigree 0.002, pedigree (1,1,3,1,1)
  Calculated value considering the wind load hours for Argentina.
  property lifetime 20 year; name lifetime

## Inputs from nature
- Energy, kinetic (in wind), converted [natural resource, in air]: 3.87 MJ

## Sampling procedure
This dataset is based on electricity produced in two wind power plants: HYCHICO P. EOLICO DIADEMA and SEA ENERGY PARQUE EOLICO NECOCHEA. During the reference year the total operative installed capacity of this wind power plant class was 6.55 MW, while their total net electricity production was 29658.5 MWh.

Source: CAMMESA "COMPAÑÍA ADMINISTRADORA DEL MERCADO MAYORISTA ELÉCTRICO SOCIEDAD ANÓNIMA"Supporting documentation available at: http://portalweb.cammesa.com/Memnet1/default.aspxNOTE:

## Extrapolations
The net electricity production volume have been calculated for Argentina for this specific wind power plant class.
The pararmeter “use of lubricating oil for maintenance”has been taken from the "electricity production, wind, <1MW turbine, onshore"/GLO 2008 dataset, (63 kg per year), and the exchange “lubricating oil” has been calculated from that figure.
The exchanges "Energy, kinetic (in wind), converted" and "transport, freight, lorry 7.5-16 metric ton, EURO3" have been taken from the GLO 2008 dataset
The wind load hours have been calculated for this wind power plant class, considering the gross electricity production from this wind power plant class, the gross to net losses and the total on-shore installed capacity
The remaining exchanges and parameters have been calculated and/or extrapolated for Argentina
