# treatment of leachate, SLF, waste graphical paper, wastewater treatment

Dataset: EcoSpold 2, unit process
Geography: CH
Time period: 2010-01-01 to 2023-12-31
Technology level: current
Classification: ISIC rev.4 ecoinvent: 3700:Sewerage
Scenario: Business-as-Usual
System model: Allocation, cut-off by classification
Generated by: Nikolia Stoikou
Database: ecoinvent
isCopyrightProtected: true
accessRestrictedTo: 1

## General comment
This dataset represents the treatment of a wastewater (leachate), that is exclusively generated in another waste treatment. It models the purification in wastewater treatment of (WWT) a leachate, generated during the sanitary landfilling (SLF) of 'waste graphical paper'. Recommended use of this dataset: to be used within the specific chain of treatments for 'waste graphical paper'. The leachate has a content of TOC: 0.6598 kg/m3, COD: 0.72166 kg/m3 and BOD: 0.17084 kg/m3. TOC is equal to C organic present in the leachate, COD is calculated as TOC*1.09375 and BOD is calculated as TOC*0.258928571 . Detailed elemental composition can be found in the properties of the leachate treated. Share of biogenic carbon in the sludge: 100%.

## Included activities start
The activity starts with the leachate being available at the gate of the wastewater treatment facility. Collection and transportation of the leachate to the treatment plant is not included.

## Included activities end
The activity ends with the wastewater being treated and waste-specific emissions released to the environment. Expenditures from treatment of wastewater in waste treatment plant are included as well as relevant infrastructure of the plant. Emissions from any sludge digestion, biogas generation and utilization (heeding specific wastewater composition) are also included. Waste-specific direct emissions of untreated wastewater and required territory-specific infrastructure for sewers are not contained within this dataset but instead in the regional market datasets for this wastewater.

## Geography
The site has mean annual temperature (MAT) of 9.5 degC, mean annual precipitation (MAP) of 1483.00559816076 mm/year, mean annual actual evaporation (EAT) of 528.63778611689 mm/year. In the WWT plant, 0% of its water input are lost due to evaporation from pools, 0.0354% of water is *gained* from organic mass degradation, and 2.09% is removed off site via sludge disposal.
References:
UN data, 2020. Precipitation, Environment Statistics Database, United Nations Statistics Division Available at: http://data.un.org/Data.aspx?q=precipitation&d=ENV&f=variableID%3a6;
World Bank, 2022. Surface area (sq.km), World Bank Group Available at: https://data.worldbank.org/indicator/AG.SRF.TOTL.K2;
MeteoSwiss, 2022. Data on Swiss temperature mean, Federal Department of Home Affairs FDHA. Federal Office of Meteorology and Climatology. Swiss Climate Available at: https://www.MeteoSwiss.admin.ch/home/climate/swiss-climate-in-detail/Swiss-temperature-mean/Data-on-the-Swiss-temperature-mean.html?query=TEMPERATURE+DATA&topic=/content/MeteoSwiss/tags/topics/klima&pageIndex=0&tab=search_tab;
Doka G.,2021. A model for composition-specific life cycle inventories of regionalised wastewater fates, Zurich, Switzerland. http://www.doka.ch/publications.htm)

## Technology
This is an inventory for the disposal of a selected wastewater in Switzerland. The reference unit is 1 m3 wastewater input. This activity represents the treatment of a specific wastewater in a WWT plant (while direct emissions and sewering are heeded in the upstream market dataset for this wastewater). The size of the treatment plant infrastructure is for a national average territory situation. The assumed size of the WWTP treats 90.6 Mio m3 per year. The mixture of WWTP with one, two, or three stages is 0%-11.2%-88.8%. The actual, waste-specific oxygen requirement in the biological stages is 1.426 kg O. The digestion process produces 658.5 litres of biogas with an energy content of 12.8MJ. 23.6% of the biogas is utilized for energy. The remainder is flared. The gross electric efficiency is 0%. The gross thermal efficiency is 0%.

## Reference product
- leachate, SLF, waste graphical paper: -1 m3; By-product classification Waste; CPC 39990: Other wastes n.e.c.
  main reference product of this activity
  production volume 1.01937e7 m3
    calculated in proportion to landfilled waste reference product
  property price 0 EUR2005
    Waste products are assigned a price of zero as they are assumed to require further treatment.
  properties: carbon allocation 0.000790739 kg, carbon content 0.00024133, carbon content, fossil 3.0066e-8, carbon content, non-fossil 0.0002413, dry mass 3.27659 kg, fossil share of carbon 0.00012459, mass concentration, TOC 0.79073 kg/m3, mass concentration, aluminium 0.041657 kg/m3, mass concentration, antimony 5.0501e-6 kg/m3, mass concentration, arsenic 2.5188e-5 kg/m3, mass concentration, barium 0.010611 kg/m3, mass concentration, beryllium 3.8323e-6 kg/m3, mass concentration, boron 0.0043685 kg/m3, mass concentration, cadmium 2.0213e-5 kg/m3, mass concentration, calcium 0.030129 kg/m3, mass concentration, chlorine 0.30992 kg/m3, mass concentration, chromium 1.1062e-5 kg/m3, mass concentration, cobalt 1.6661e-5 kg/m3, mass concentration, copper 1.9988e-5 kg/m3, mass concentration, fluorine 9.5793e-5 kg/m3, mass concentration, hydrogen 0.10541 kg/m3, mass concentration, iron 0.0010964 kg/m3, mass concentration, lead 3.1752e-5 kg/m3, mass concentration, magnesium 0.1792 kg/m3, mass concentration, manganese 0.0038349 kg/m3, mass concentration, mercury 6.4538e-7 kg/m3, mass concentration, molybdenum 3.0715e-5 kg/m3, mass concentration, nickel 3.6974e-5 kg/m3, mass concentration, nitrogen 0.65364 kg/m3, mass concentration, oxygen 0.74345 kg/m3, mass concentration, phophorus 0.00042611 kg/m3, mass concentration, potassium 0.065457 kg/m3, mass concentration, selenium 1.8461e-5 kg/m3, mass concentration, silicon 0.071517 kg/m3, mass concentration, silver 1.5669e-8 kg/m3, mass concentration, sodium 0.22843 kg/m3, mass concentration, strontium 0.00022735 kg/m3, mass concentration, sulfur 0.035183 kg/m3, mass concentration, thallium 6.7487e-6 kg/m3, mass concentration, titanium 0.00058035 kg/m3, mass concentration, zinc 0.00039909 kg/m3, water content 304.195, water in wet mass 996.723 kg, wet mass 1000 kg

## Inputs from technosphere
- aluminium scrap, post-consumer, prepared for melting: -6.80585e-5 kg; lognormal variance with pedigree 0.3107, pedigree (1,1,1,1,1)
  scrap output from used infrastructure for wastewater treatment plant.
  Uncertainty: Uncertainty calculated from wastewater technosphere fate uncertainty and treatment infrastructure uncertainty.
  production volume
    calculated in proportion to wastewater reference product
  properties: dry mass 1 kg, price 0.806 EUR2005, wet mass 1 kg
- aluminium, cast alloy: 6.80585e-5 kg; lognormal variance with pedigree 0.3109, pedigree (1,1,2,1,1)
  For infrastructure for wastewater treatment plant.
  Uncertainty: Uncertainty calculated from wastewater technosphere fate uncertainty and treatment infrastructure uncertainty.
  properties: dry mass 1 kg, wet mass 1 kg
- chemical, inorganic: 4.4292e-5 kg; lognormal variance with pedigree 0.3109, pedigree (1,1,2,1,1)
  (same comment as for aluminium, cast alloy)
  properties: carbon content, fossil 0.003, dry mass 1 kg, wet mass 1 kg
  note on carbon content, fossil: This dataset is an unweighted average of 20 inorganic substances (listed in Tab 88.1, ecoinvent v2.2 report 8, part II), being part of the top100 chemicals included in this database. The C-content has also been calculated as an unweighted average of the C content of the substances composing this dataset.
- chemical, organic: 0.000353256 kg; lognormal variance with pedigree 0.3109, pedigree (1,1,2,1,1)
  (same comment as for aluminium, cast alloy)
  properties: carbon content, fossil 0.628, dry mass 1 kg, heating value, net 19.03 MJ, wet mass 1 kg
  note on carbon content, fossil: This dataset is an unweighted average of 20 organic substances (listed in Tab 88.1, ecoinvent v2.2 report 8, part II), being part of the top100 chemicals included in this database. The C-content has also been calculated as an unweighted average of the C content of the substances composing this dataset.
- concrete, 25MPa: 6.18678e-5 m3; lognormal variance with pedigree 0.3109, pedigree (1,1,2,1,1)
  (same comment as for aluminium, cast alloy)
  properties: cement content 206 kg, dry mass 2285 kg, fly ash content 69 kg, gravel content 1100 kg, sand content 910 kg, water content 0.0538293, wet mass 2408 kg
- copper scrap, sorted, pressed: -8.21023e-5 kg; lognormal variance with pedigree 0.3107, pedigree (1,1,1,1,1)
  (same comment as for aluminium scrap, post-consumer, prepared for melting)
  production volume
    calculated in proportion to wastewater reference product
  properties: dry mass 1 kg, price 2.84 EUR2005, wet mass 1 kg
- copper, cathode: 8.21023e-5 kg; lognormal variance with pedigree 0.3109, pedigree (1,1,2,1,1)
  (same comment as for aluminium, cast alloy)
  properties: copper content 1, dry mass 1 kg, wet mass 1 kg
- electricity, medium voltage: 2.23996 kWh; lognormal variance with pedigree 0.5839, pedigree (1,1,2,1,1)
  processing energy in wastewater treatment plant.
  Uncertainty: Uncertainty calculated from wastewater technosphere fate uncertainty and treatment infrastructure uncertainty.
- excavation, hydraulic digger: 0.0005375 m3; lognormal variance with pedigree 0.3109, pedigree (1,1,2,1,1)
  (same comment as for aluminium, cast alloy)
- extrusion, plastic pipes: 0.000209577 kg; lognormal variance with pedigree 0.3109, pedigree (1,1,2,1,1)
  (same comment as for aluminium, cast alloy)
- glass fibre: 0.000130715 kg; lognormal variance with pedigree 0.3109, pedigree (1,1,2,1,1)
  (same comment as for aluminium, cast alloy)
  properties: dry mass 1 kg, wet mass 1 kg
- heat, district or industrial, natural gas: 3.8835 MJ; lognormal variance with pedigree 0.08055, pedigree (1,1,2,1,1)
  processing energy in wastewater treatment plant.
  Uncertainty: Uncertainty calculated from wastewater technosphere fate uncertainty, wastewater composition uncertainty, and treatment model uncertainty
  properties: heating value, net 1 MJ
- inert waste, for final disposal: -0.00481033 kg; lognormal variance with pedigree 0.2207, pedigree (1,1,1,1,1)
  approximation for waste sand removed from wastewater in treatment plant.
  Uncertainty: Uncertainty calculated from wastewater technosphere fate uncertainty and treatment infrastructure uncertainty.
  production volume
    calculated in proportion to wastewater reference product
  properties: dry mass 0.995 kg, water content 0.00502513, wet mass 1 kg
- iron scrap, sorted, pressed: -0.00055419 kg; lognormal variance with pedigree 0.3107, pedigree (1,1,1,1,1)
  (same comment as for aluminium scrap, post-consumer, prepared for melting)
  production volume
    calculated in proportion to wastewater reference product
  properties: dry mass 1 kg, price 0.175 EUR2005, wet mass 1 kg
- iron sulfate: 0.0037232 kg; lognormal variance with pedigree 1.2872, pedigree (1,1,2,1,1)
  precipitation agent in 3rd stage of wastewater treatment.
  Uncertainty: Uncertainty calculated from wastewater technosphere fate uncertainty, wastewater composition uncertainty, and treatment model uncertainty
  properties: dry mass 1 kg, wet mass 1 kg
- limestone, crushed, washed: 0.00143139 kg; lognormal variance with pedigree 0.3109, pedigree (1,1,2,1,1)
  (same comment as for aluminium, cast alloy)
  properties: carbon content, fossil 0.117257, dry mass 0.998 kg, water content 0.00200401, wet mass 1 kg
  note on carbon content, fossil: Table 3.1, ecoinvent v2.2 report 7, part VII, pg 3. MW CaCO3=100, MW MgCO3=84. C content of limestone is 0.117257 kg/kg DM
- pitch: 3.34891e-5 kg; lognormal variance with pedigree 0.3109, pedigree (1,1,2,1,1)
  (same comment as for aluminium, cast alloy)
  properties: carbon content, fossil 0.83, dry mass 1 kg, heating value, net 28 MJ, wet mass 1 kg
- polyacrylamide: 0.0345404 kg; lognormal variance with pedigree 0.1136, pedigree (1,1,2,1,1)
  approximation for Polyacrylamide flocculant in 2nd stage sludge precipitation.
  Uncertainty: Uncertainty calculated from wastewater technosphere fate uncertainty and treatment infrastructure uncertainty.
  properties: carbon content, fossil 0.51, dry mass 1 kg, heating value, net 23.88 MJ, wet mass 1 kg
- polyethylene, high density, granulate: 0.000208497 kg; lognormal variance with pedigree 0.3109, pedigree (1,1,2,1,1)
  (same comment as for aluminium, cast alloy)
  properties: carbon content, fossil 0.857143, dry mass 1 kg, heating value, net 42.47 MJ, wet mass 1 kg
  note on carbon content, fossil: Polyethylene is formed out of a huge amount of ethylene monomers (C2H4) (ecoinvent v2.2 report 11_II). MW=28 g/mol
- polyethylene, low density, granulate: 1.08029e-6 kg; lognormal variance with pedigree 0.3109, pedigree (1,1,2,1,1)
  For infrastructure for sewer pipes.
  Uncertainty: Uncertainty calculated from wastewater technosphere fate uncertainty and treatment infrastructure uncertainty.
  properties: carbon content, fossil 0.857143, dry mass 1 kg, heating value, net 42.47 MJ, wet mass 1 kg
- reinforcing steel: 0.00528587 kg; lognormal variance with pedigree 0.3109, pedigree (1,1,2,1,1)
  (same comment as for aluminium, cast alloy)
  properties: carbon content, fossil 0.004, dry mass 1 kg, wet mass 1 kg
- sewage sludge, 70% water, WWT-SLF, waste graphical paper: -2.45821 kg; lognormal variance with pedigree 0.0216, pedigree (1,1,1,1,1)
  generated sewage sludge output to municipal incineration.
  Uncertainty: Uncertainty calculated from wastewater technosphere fate uncertainty, wastewater composition uncertainty, and treatment model uncertainty.
  production volume
    calculated in proportion to wastewater reference product
  properties: aluminium content 0.0197229, carbon content, non-fossil 0.260784, dry mass 0.3 kg, heating value, gross 7.42308 MJ, heating value, net 2.71527 MJ, hydrogen content 0.0368013, magnesium content 0.01453, nitrogen content 0.0770506, oxygen content 0.51347, silicon content 0.0406408, water content 2.33333, wet mass 1 kg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
- sewage sludge, 97% water, WWT-SLF, waste graphical paper: -2.73134 kg; lognormal variance with pedigree 5.8e-5, pedigree (1,1,1,1,1)
  generated sewage sludge output to landfarming.
  Uncertainty: Uncertainty calculated from wastewater technosphere fate uncertainty, wastewater composition uncertainty, and treatment model uncertainty.
  production volume
    calculated in proportion to wastewater reference product
  properties: aluminium content 0.0197229, carbon content, fossil 0.00990005, carbon content, non-fossil 0.260784, dry mass 0.03 kg, heating value, gross 7.42308 MJ, hydrogen content 0.0368013, magnesium content 0.01453, nitrogen content 0.0770506, oxygen content 0.51347, silicon content 0.0406408, water content 32.3333, wet mass 1 kg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
- steel, chromium steel 18/8, hot rolled: 0.00055419 kg; lognormal variance with pedigree 0.3109, pedigree (1,1,2,1,1)
  (same comment as for aluminium, cast alloy)
  properties: carbon content, fossil 0.0008, dry mass 1 kg, wet mass 1 kg
  note on carbon content, fossil: Stainless steel model is the grade 304 steel (18/8 stainless, 18% chromium 8% nickel; max. 0.08% C)
- stone wool, packed: 5.83358e-5 kg; lognormal variance with pedigree 0.3109, pedigree (1,1,2,1,1)
  (same comment as for aluminium, cast alloy)
  properties: carbon content, fossil 0.015401, dry mass 1 kg, wet mass 1 kg
- synthetic rubber: 6.2657e-5 kg; lognormal variance with pedigree 0.3109, pedigree (1,1,2,1,1)
  (same comment as for aluminium, cast alloy)
  properties: carbon content, fossil 0.871949, dry mass 1 kg, heating value, net 26.42 MJ, wet mass 1 kg
  note on carbon content, fossil: EPDM (Ethylene-propene-diene terpolymer) rubber is a terpolymer of ethylene, propene, and a diene with the residual unsaturated portion of the diene in the side chain (ecoinvent v2.2 report 7-part XX & Ullmann). Chemical formula (deduced from Evidences of Solvent-Induced Miscibility in Polychloroprene-co-Ethylene-Propene Diene Terpolymer Blends, Dubey et al., Journal of Applied Polymer Science, 2009, 111:1884–1891): C20H35
- tap water: 0.00816221 kg; lognormal variance with pedigree 0.3109, pedigree (1,1,2,1,1)
  (same comment as for aluminium, cast alloy)
  properties: carbon content, fossil 0.00178991, dry mass 0.000337476 kg, water content 2962.17, wet mass 1 kg
  note on carbon content, fossil: Bicarbonate content is 2.93 mol/m3. CO2 content is 0.1 mol/m3 (ecoinvent v2.2 report 8, Tab 93.1).
- waste bitumen: -3.34891e-5 kg; lognormal variance with pedigree 0.3107, pedigree (1,1,1,1,1)
  waste output from used infrastructure for wastewater treatment plant and sewer pipes.
  Uncertainty: Uncertainty calculated from wastewater technosphere fate uncertainty and treatment infrastructure uncertainty.
  production volume
    calculated in proportion to wastewater reference product
  properties: carbon content, fossil 0.842657, dry mass 0.986 kg, heating value, net 40.2 MJ, water content 0.0141988, wet mass 1 kg
  note on heating value, net: Literature value, Source: IPCC 2006, 2006 IPCC Guidelines for National Greenhouse Gas Inventories, Prepared by the National Greenhouse Gas Inventories Programme, Eggleston H.S., Buendia L., Miwa K., Ngara T. and Tanabe K. (eds). Published: IGES, Japan
- waste graphical paper: -0.00979276 kg; lognormal variance with pedigree 0.2207, pedigree (1,1,1,1,1)
  approximation for large waste biomass pieces removed from wastewater in treatment plant.
  Uncertainty: Uncertainty calculated from wastewater technosphere fate uncertainty and treatment model uncertainty
  production volume
    calculated in proportion to wastewater reference product
  properties: carbon content, non-fossil 0.454349, dry mass 0.889174 kg, heating value, gross 18.6815 MJ, heating value, net 15.8796 MJ, water content 0.124639, wet mass 1 kg
- waste mineral wool: -5.83358e-5 kg; lognormal variance with pedigree 0.3107, pedigree (1,1,1,1,1)
  (same comment as for waste bitumen)
  production volume
    calculated in proportion to wastewater reference product
  properties: dry mass 1 kg, wet mass 1 kg
- waste plastic, mixture: -0.00979276 kg; lognormal variance with pedigree 0.2207, pedigree (1,1,1,1,1)
  approximation for waste macroplastic removed from wastewater in treatment plant.
  Uncertainty: Uncertainty calculated from wastewater technosphere fate uncertainty and treatment model uncertainty
  production volume
    calculated in proportion to wastewater reference product
  properties: carbon content, fossil 0.748045, dry mass 0.847 kg, heating value, net 36.3533 MJ, water content 0.180638, wet mass 1 kg
- waste polyethylene/polypropylene product: -0.000209577 kg; lognormal variance with pedigree 0.3107, pedigree (1,1,1,1,1)
  (same comment as for waste bitumen)
  production volume
    calculated in proportion to wastewater reference product
  properties: carbon content, fossil 0.748045, dry mass 0.847 kg, heating value, net 42.47 MJ, water content 0.180638, wet mass 1 kg
  note on carbon content, fossil: Mixed various plastics was used to estimate the C content of this waste (Tab A.2, ecoinvent v2.2 report 13_I)
- waste reinforced concrete: -0.152813 kg; lognormal variance with pedigree 0.3107, pedigree (1,1,1,1,1)
  (same comment as for waste bitumen)
  production volume
    calculated in proportion to wastewater reference product
  properties: dry mass 0.99418 kg, water content 0.00585407, wet mass 1 kg
- waste reinforcement steel: -0.00528587 kg; lognormal variance with pedigree 0.3107, pedigree (1,1,1,1,1)
  (same comment as for waste bitumen)
  production volume
    calculated in proportion to wastewater reference product
  properties: dry mass 1 kg, wet mass 1 kg
- waste rubber, unspecified: -6.2657e-5 kg; lognormal variance with pedigree 0.3107, pedigree (1,1,1,1,1)
  (same comment as for waste bitumen)
  production volume
    calculated in proportion to wastewater reference product
  properties: carbon content, fossil 0.853, dry mass 1 kg, heating value, net 27.19 MJ, wet mass 1 kg
  note on heating value, net: Value taken from the general comment of the treatment dataset.

## Inputs from nature
- Occupation, construction site [natural resource, land]: 9.45256e-5 m2*year; lognormal variance with pedigree 0.3109, pedigree (1,1,2,1,1)
  land use for infrastructure for wastewater treatment plant.
  Uncertainty: Uncertainty calculated from wastewater technosphere fate uncertainty and treatment infrastructure uncertainty.
- Occupation, industrial area [natural resource, land]: 0.00113431 m2*year; lognormal variance with pedigree 0.3109, pedigree (1,1,2,1,1)
  (same comment as for Occupation, construction site)
- Occupation, urban/industrial fallow (non-use) [natural resource, land]: 0.000756205 m2*year; lognormal variance with pedigree 0.3109, pedigree (1,1,2,1,1)
  (same comment as for Occupation, construction site)
- Oxygen [natural resource, in air]: 2.18658 kg; lognormal variance with pedigree 0.1724, pedigree (1,1,2,1,1)
  Oxygen input for wastewater treatment (biological stage + biogas combustion).
  Uncertainty: Uncertainty calculated from wastewater technosphere fate uncertainty, wastewater composition uncertainty, and treatment model uncertainty.
- Transformation, from pasture, man made [natural resource, land]: 4.72628e-5 m2; lognormal variance with pedigree 0.3109, pedigree (1,1,2,1,1)
  (same comment as for Occupation, construction site)
- Transformation, to industrial area [natural resource, land]: 2.83577e-5 m2; lognormal variance with pedigree 0.3109, pedigree (1,1,2,1,1)
  (same comment as for Occupation, construction site)
- Transformation, to urban/industrial fallow (non-use) [natural resource, land]: 1.89051e-5 m2; lognormal variance with pedigree 0.3109, pedigree (1,1,2,1,1)
  (same comment as for Occupation, construction site)

## Emissions to nature
- Antimony ion [air, non-urban air or from high stacks]: 4.06798e-11 kg; lognormal variance with pedigree 1.7502, pedigree (1,1,2,1,1)
  emission from rural wastewater treatment plant.
  Uncertainty: Uncertainty calculated from wastewater technosphere fate uncertainty, wastewater composition uncertainty, and treatment model uncertainty.
- Antimony ion [air, urban air close to ground]: 1.23236e-10 kg; lognormal variance with pedigree 1.7502, pedigree (1,1,2,1,1)
  emission from urban wastewater treatment plant.
  Uncertainty: Uncertainty calculated from wastewater technosphere fate uncertainty, wastewater composition uncertainty, and treatment model uncertainty
- Arsenic ion [air, non-urban air or from high stacks]: 4.01486e-9 kg; lognormal variance with pedigree 1.5322, pedigree (1,1,2,1,1)
  (same comment as for Antimony ion)
- Arsenic ion [air, urban air close to ground]: 1.21626e-8 kg; lognormal variance with pedigree 1.5322, pedigree (1,1,2,1,1)
  (same comment as for Antimony ion)
- Cadmium II [air, non-urban air or from high stacks]: 1.57866e-12 kg; lognormal variance with pedigree 1.6972, pedigree (1,1,2,1,1)
  (same comment as for Antimony ion)
- Cadmium II [air, urban air close to ground]: 4.7824e-12 kg; lognormal variance with pedigree 1.6972, pedigree (1,1,2,1,1)
  (same comment as for Antimony ion)
- Carbon dioxide, fossil [air, non-urban air or from high stacks]: 0.00850864 kg; lognormal variance with pedigree 0.3356, pedigree (1,1,2,1,1)
  emission from rural wastewater treatment plant. Contribution from biogas combustion in WWTP is 100%.
  Uncertainty: Uncertainty calculated from wastewater technosphere fate uncertainty, wastewater composition uncertainty, and treatment model uncertainty.
- Carbon dioxide, fossil [air, urban air close to ground]: 0.0257761 kg; lognormal variance with pedigree 0.3356, pedigree (1,1,2,1,1)
  emission from urban wastewater treatment plant. Contribution from biogas combustion in WWTP is 100%.
  Uncertainty: Uncertainty calculated from wastewater technosphere fate uncertainty, wastewater composition uncertainty, and treatment model uncertainty
- Carbon dioxide, non-fossil [air, non-urban air or from high stacks]: 0.37123 kg; lognormal variance with pedigree 0.191, pedigree (1,1,2,1,1)
  emission from rural wastewater treatment plant. Contribution from biological treatment stage (stage 2) in WWTP is 39.62%. Contribution from biogas combustion in WWTP is 60.38%.
  Uncertainty: Uncertainty calculated from wastewater technosphere fate uncertainty, wastewater composition uncertainty, and treatment model uncertainty.
- Carbon dioxide, non-fossil [air, urban air close to ground]: 1.12461 kg; lognormal variance with pedigree 0.191, pedigree (1,1,2,1,1)
  emission from urban wastewater treatment plant. Contribution from biological treatment stage (stage 2) in WWTP is 39.62%. Contribution from biogas combustion in WWTP is 60.38%.
  Uncertainty: Uncertainty calculated from wastewater technosphere fate uncertainty, wastewater composition uncertainty, and treatment model uncertainty
- Dinitrogen monoxide [air, non-urban air or from high stacks]: 0.000270098 kg; lognormal variance with pedigree 0.4157, pedigree (1,1,2,1,1)
  (same comment as for Antimony ion)
- Dinitrogen monoxide [air, urban air close to ground]: 0.000818235 kg; lognormal variance with pedigree 0.4157, pedigree (1,1,2,1,1)
  (same comment as for Antimony ion)
- Heat, waste [air, non-urban air or from high stacks]: 4.87825 MJ; lognormal variance with pedigree 0.5839, pedigree (1,1,2,1,1)
  emission from rural wastewater treatment plant from digester gas combustion and infrastructure electricity use.
  Uncertainty: Uncertainty calculated from wastewater technosphere fate uncertainty, wastewater composition uncertainty, treatment infrastructure uncertainty, and treatment model uncertainty.
- Heat, waste [air, urban air close to ground]: 14.7782 MJ; lognormal variance with pedigree 0.5839, pedigree (1,1,2,1,1)
  emission from urban wastewater treatment plant from digester gas combustion and infrastructure electricity use.
  Uncertainty: Uncertainty calculated from wastewater technosphere fate uncertainty, wastewater composition uncertainty, and treatment model uncertainty
- Lead II [air, non-urban air or from high stacks]: 2.1465e-13 kg; lognormal variance with pedigree 1.6552, pedigree (1,1,2,1,1)
  (same comment as for Antimony ion)
- Lead II [air, urban air close to ground]: 6.50261e-13 kg; lognormal variance with pedigree 1.6552, pedigree (1,1,2,1,1)
  (same comment as for Antimony ion)
- Mercury II [air, non-urban air or from high stacks]: 2.73544e-13 kg; lognormal variance with pedigree 2.0692, pedigree (1,1,2,1,1)
  (same comment as for Antimony ion)
- Mercury II [air, urban air close to ground]: 8.28676e-13 kg; lognormal variance with pedigree 2.0692, pedigree (1,1,2,1,1)
  (same comment as for Antimony ion)
- Methane, fossil [air, non-urban air or from high stacks]: 1.51574e-5 kg; lognormal variance with pedigree 0.3356, pedigree (1,1,2,1,1)
  (same comment as for Antimony ion)
- Methane, fossil [air, urban air close to ground]: 4.59179e-5 kg; lognormal variance with pedigree 0.3356, pedigree (1,1,2,1,1)
  (same comment as for Antimony ion)
- Methane, non-fossil [air, non-urban air or from high stacks]: 0.000399271 kg; lognormal variance with pedigree 0.3356, pedigree (1,1,2,1,1)
  (same comment as for Antimony ion)
- Methane, non-fossil [air, urban air close to ground]: 0.00120955 kg; lognormal variance with pedigree 0.3356, pedigree (1,1,2,1,1)
  (same comment as for Antimony ion)
- Nitrogen oxides [air, non-urban air or from high stacks]: 0.000902607 kg; lognormal variance with pedigree 0.3858, pedigree (1,1,2,1,1)
  (same comment as for Antimony ion)
- Nitrogen oxides [air, urban air close to ground]: 0.00273436 kg; lognormal variance with pedigree 0.3858, pedigree (1,1,2,1,1)
  (same comment as for Antimony ion)
- Particulate Matter, < 2.5 um [air, non-urban air or from high stacks]: 6.92036e-6 kg; lognormal variance with pedigree 0.1265, pedigree (1,1,2,1,1)
  (same comment as for Antimony ion)
- Particulate Matter, < 2.5 um [air, urban air close to ground]: 2.09646e-5 kg; lognormal variance with pedigree 0.1265, pedigree (1,1,2,1,1)
  (same comment as for Antimony ion)
- Sulfur dioxide [air, non-urban air or from high stacks]: 2.53624e-5 kg; lognormal variance with pedigree 0.633, pedigree (1,1,2,1,1)
  (same comment as for Antimony ion)
- Sulfur dioxide [air, urban air close to ground]: 7.68329e-5 kg; lognormal variance with pedigree 0.633, pedigree (1,1,2,1,1)
  (same comment as for Antimony ion)
- Water [air, non-urban air or from high stacks]: 0.000249731 m3; lognormal variance with pedigree 0.2334, pedigree (1,1,2,1,1)
  emission of water to air from rural wastewater treatment plant due to evaporation and digester gas combustion.
  Uncertainty: Uncertainty calculated from wastewater technosphere fate uncertainty, wastewater composition uncertainty, and treatment model uncertainty.
- Water [air, urban air close to ground]: 0.000756535 m3; lognormal variance with pedigree 0.2334, pedigree (1,1,2,1,1)
  emission of water to air from urban wastewater treatment plant due to evaporation and digester gas combustion.
  Uncertainty: Uncertainty calculated from wastewater technosphere fate uncertainty, wastewater composition uncertainty, and treatment model uncertainty
- Non-hazardous waste disposed [inventory indicator, waste]: 1000 kg
  Inventory indicator for waste mass disposed. To be used in EN15804 "other data" results.
- Aluminium III [water, surface water]: 0.0185687 kg; lognormal variance with pedigree 0.5685, pedigree (1,1,2,1,1)
  (same comment as for Antimony ion)
- Antimony ion [water, surface water]: 2.35126e-6 kg; lognormal variance with pedigree 1.6732, pedigree (1,1,2,1,1)
  (same comment as for Antimony ion)
- Arsenic ion [water, surface water]: 6.67946e-6 kg; lognormal variance with pedigree 1.4892, pedigree (1,1,2,1,1)
  (same comment as for Antimony ion)
- BOD5, Biological Oxygen Demand [water, surface water]: 0.0336233 kg; lognormal variance with pedigree 0.3537, pedigree (1,1,2,1,1)
  (same comment as for Antimony ion)
- Barium II [water, surface water]: 0.00106561 kg; lognormal variance with pedigree 0.8511, pedigree (1,1,2,1,1)
  (same comment as for Antimony ion)
- Beryllium II [water, surface water]: 4.20048e-8 kg; lognormal variance with pedigree 1.7182, pedigree (1,1,2,1,1)
  (same comment as for Antimony ion)
- Boron [water, surface water]: 0.0032867 kg; lognormal variance with pedigree 1.0452, pedigree (1,1,2,1,1)
  (same comment as for Antimony ion)
- COD, Chemical Oxygen Demand [water, surface water]: 0.13671 kg; lognormal variance with pedigree 0.3537, pedigree (1,1,2,1,1)
  (same comment as for Antimony ion)
- Cadmium II [water, surface water]: 4.79317e-7 kg; lognormal variance with pedigree 1.5292, pedigree (1,1,2,1,1)
  (same comment as for Antimony ion)
- Calcium II [water, surface water]: 0.0199049 kg; lognormal variance with pedigree 0.6126, pedigree (1,1,2,1,1)
  (same comment as for Antimony ion)
- Chloride [water, surface water]: 0.259456 kg; lognormal variance with pedigree 0.4906, pedigree (1,1,2,1,1)
  (same comment as for Antimony ion)
- Chromium VI [water, surface water]: 1.54697e-7 kg; lognormal variance with pedigree 1.5662, pedigree (1,1,2,1,1)
  (same comment as for Antimony ion)
- Cobalt II [water, surface water]: 1.87004e-6 kg; lognormal variance with pedigree 1.5652, pedigree (1,1,2,1,1)
  (same comment as for Antimony ion)
- Copper ion [water, surface water]: 8.09774e-7 kg; lognormal variance with pedigree 1.4782, pedigree (1,1,2,1,1)
  (same comment as for Antimony ion)
- DOC, Dissolved Organic Carbon [water, surface water]: 0.0225909 kg; lognormal variance with pedigree 0.3537, pedigree (1,1,2,1,1)
  (same comment as for Antimony ion)
- Fluoride [water, surface water]: 8.01957e-5 kg; lognormal variance with pedigree 1.2972, pedigree (1,1,2,1,1)
  (same comment as for Antimony ion)
- Heat, waste [water, surface water]: 6.13817 MJ; lognormal variance with pedigree 0.3481, pedigree (1,1,2,1,1)
  emission from wastewater treatment plant from degraded organics in biological stage.
  Uncertainty: Uncertainty calculated from wastewater technosphere fate uncertainty, wastewater composition uncertainty, and treatment model uncertainty
- Iron ion [water, surface water]: 0.00115088 kg; lognormal variance with pedigree 1.1632, pedigree (1,1,2,1,1)
  (same comment as for Antimony ion)
- Lead II [water, surface water]: 1.33148e-7 kg; lognormal variance with pedigree 1.4392, pedigree (1,1,2,1,1)
  (same comment as for Antimony ion)
- Magnesium [water, surface water]: 0.136797 kg; lognormal variance with pedigree 0.4604, pedigree (1,1,2,1,1)
  (same comment as for Antimony ion)
- Manganese II [water, surface water]: 0.000104811 kg; lognormal variance with pedigree 0.9856, pedigree (1,1,2,1,1)
  (same comment as for Antimony ion)
- Mercury II [water, surface water]: 2.13592e-8 kg; lognormal variance with pedigree 1.9332, pedigree (1,1,2,1,1)
  (same comment as for Antimony ion)
- Molybdenum VI [water, surface water]: 9.51396e-6 kg; lognormal variance with pedigree 1.4502, pedigree (1,1,2,1,1)
  (same comment as for Antimony ion)
- Nickel II [water, surface water]: 1.44427e-5 kg; lognormal variance with pedigree 1.4142, pedigree (1,1,2,1,1)
  (same comment as for Antimony ion)
- Nitrate [water, surface water]: 1.1547 kg; lognormal variance with pedigree 0.4132, pedigree (1,1,2,1,1)
  (same comment as for Antimony ion)
- Phosphate [water, surface water]: 0.00013806 kg; lognormal variance with pedigree 0.8368, pedigree (1,1,2,1,1)
  (same comment as for Antimony ion)
- Potassium I [water, surface water]: 0.0515382 kg; lognormal variance with pedigree 0.5812, pedigree (1,1,2,1,1)
  (same comment as for Antimony ion)
- Selenium IV [water, surface water]: 4.32674e-6 kg; lognormal variance with pedigree 1.5142, pedigree (1,1,2,1,1)
  (same comment as for Antimony ion)
- Silicon [water, surface water]: 0.0262736 kg; lognormal variance with pedigree 0.5138, pedigree (1,1,2,1,1)
  (same comment as for Antimony ion)
- Silver I [water, surface water]: 7.7941e-11 kg; lognormal variance with pedigree 2.3622, pedigree (1,1,2,1,1)
  (same comment as for Antimony ion)
- Sodium I [water, surface water]: 0.189394 kg; lognormal variance with pedigree 0.5649, pedigree (1,1,2,1,1)
  (same comment as for Antimony ion)
- Strontium II [water, surface water]: 0.000155441 kg; lognormal variance with pedigree 1.1852, pedigree (1,1,2,1,1)
  (same comment as for Antimony ion)
- Sulfate [water, surface water]: 0.0866781 kg; lognormal variance with pedigree 0.6253, pedigree (1,1,2,1,1)
  (same comment as for Antimony ion)
- TOC, Total Organic Carbon [water, surface water]: 0.0369487 kg; lognormal variance with pedigree 0.3537, pedigree (1,1,2,1,1)
  (same comment as for Antimony ion)
- Thallium I [water, surface water]: 1.19807e-6 kg; lognormal variance with pedigree 1.6302, pedigree (1,1,2,1,1)
  (same comment as for Antimony ion)
- Titanium ion [water, surface water]: 3.38628e-5 kg; lognormal variance with pedigree 1.0742, pedigree (1,1,2,1,1)
  (same comment as for Antimony ion)
- Water [water, surface water]: 0.99423 m3; lognormal variance with pedigree 0.000200386, pedigree (1,1,2,1,1)
  release of wastewater (treated or untreated) minus water evaporated to air in treatment plant, heeding any water generation from organic compound degradation in treatment plant.
  Uncertainty: Uncertainty calculated from wastewater technosphere fate uncertainty, wastewater composition uncertainty, and treatment model uncertainty
- Zinc II [water, surface water]: 2.5762e-5 kg; lognormal variance with pedigree 1.1192, pedigree (1,1,2,1,1)
  (same comment as for Antimony ion)
