# bitumen seal production, polymer EP4 flame retardant

Dataset: EcoSpold 2, unit process
Geography: CA-QC
Time period: 1994-01-01 to 2023-12-31
Technology level: current
Classification: EcoSpold01Categories: plastics/others
Classification: ISIC rev.4 ecoinvent: 2399:Manufacture of other non-metallic mineral products n.e.c.
Tags: recontextualization
Scenario: Business-as-Usual
System model: Allocation, cut-off by classification
Generated by: Pascal Lesage
Published in: Kellenberger D. 2007
Database: ecoinvent
isCopyrightProtected: true
accessRestrictedTo: 1

## General comment
The dataset is applicable in the construction building sector. Bitumen sealing is used to protect the construction against water intrusion.
[This dataset was already contained in the ecoinvent database version 2. It was not individually updated during the transfer to ecoinvent version 3. Life Cycle Impact Assessment results may still have changed, as they are affected by changes in the supply chain, i.e. in other datasets. This dataset was generated following the ecoinvent quality guidelines for version 2. It may have been subject to central changes described in the ecoinvent version 3 change report (http://www.ecoinvent.org/database/ecoinvent-version-3/reports-of-changes/), and the results of the central updates were reviewed extensively. The changes added e.g. consistent water flows and other information throughout the database. The documentation of this dataset can be found in the ecoinvent reports of version 2, which are still available via the ecoinvent website. The change report linked above covers all central changes that were made during the conversion process.]
Child dataset exchanges identical to GLO dataset. Created to enable linking to regional markets (e.g. for electricity). Data quality indicators adjusted accordingly.

## Included activities end
The dataset describes the production of bitumen sealing EP4 flam. Included processes are the extrusion of polypropylene foil, the fabrication of the sealing, the infrastructure, the transport by road and rail as well as the disposal of the bitumen cuttings in a municipal incineration. The production of bitumen sealing does not include any chemical processes. This type of bitumen sealing is built around a polyester fleece layer.

## Geography
The data of this dataset is taken from literature studies and producer information.
Child dataset exchanges identical to GLO dataset. Created to enable linking to regional markets (e.g. for electricity). Data quality indicators adjusted accordingly.

## Technology
Simple processes involved, a carrier material is being soaked with bitumen. The bitumen coatings are then gritted with minerals (talcum, sand).

## Time period
The production of bitumen sealing has not changed very much over the years, as there are no chemical processes involved.

## Parameters
- Quebec gross domestic product 2011: 3.11e11 USD(2011); name quebecGDP2011; lognormal variance with pedigree 0.0006, pedigree (1,1,1,1,1)
- world gross domestic product 2011: 7e13 USD(2011); name worldGDP2011; lognormal variance with pedigree 0.0006, pedigree (1,1,1,1,1)
  World Gross domestic product for 2011, expressed in 2011 USD. Source: World Bank.

## Reference product
- bitumen seal, polymer EP4 flame retardant: 1 kg; By-product classification allocatable product; CPC 37940: Bituminous mixtures based on natural and artificial stone materials and bitumen, natural asphalt or related su[…]; HS2017 271500: Bituminous mixtures based on natural asphalt, on natural bitumen, on petroleum bitumen, on mineral tar or o[...]
  production volume 0.0177714 kg
    Gross approximation of Quebec production volume using relative value of Quebec GDP to world GDP.
  property carbon content, fossil 0.596077
    The production of bitumen sealing does not include any chemical processes (ecoinvent v2.2 report 7_part XXIII), C content was then calculated as a weighted average of C content of the different components
  property heating value, net 39.33 MJ
    Value taken from the general comment of the treatment dataset.
  properties: carbon allocation 0.596077 kg, carbon content 0.596077, carbon content, non-fossil 0, dry mass 1 kg, price 1.28 EUR2005, water content 0, water in wet mass 0 kg, wet mass 1 kg

## Inputs from technosphere
- chemical factory, organics: 4e-10 unit; lognormal variance with pedigree 0.3546, pedigree (2,4,5,5,1)
- electricity, medium voltage: 0.42 kWh; lognormal variance with pedigree 0.0532, pedigree (2,3,5,5,1)
- fleece, polyethylene: 0.0273 kg; lognormal variance with pedigree 0.0546, pedigree (2,4,5,5,1)
  properties: carbon content, fossil 0.857143, dry mass 1 kg, heating value, net 42.47 MJ, wet mass 1 kg
  note on carbon content, fossil: Polyethylene is formed out of a huge amount of ethylene monomers (C2H4) (ecoinvent v2.2 report 11_II). MW=28 g/mol
- lime: 0.301 kg; lognormal variance with pedigree 0.052, pedigree (1,1,5,5,1)
  composite
  properties: carbon content, fossil 0.120005, dry mass 1 kg, wet mass 1 kg
- municipal solid waste: -0.0044 kg; lognormal variance with pedigree 0.0346, pedigree (2,4,3,5,3)
  production volume
    Gross approximation of Quebec production volume using relative value of Quebec GDP to world GDP
  properties: carbon content, fossil 0.171549, carbon content, non-fossil 0.261655, dry mass 0.771 kg, heating value, net 11.74 MJ, water content 0.297017, wet mass 1 kg
  note on carbon content, fossil: MSW composition in tab 4.1, ecoinvent v2.2 report 13_I. C content referred to 1 kg DM
  note on heating value, net: Value taken from the general comment of the treatment dataset.
- pitch: 0.57 kg; lognormal variance with pedigree 0.0546, pedigree (2,4,5,5,1)
  properties: carbon content, fossil 0.83, dry mass 1 kg, heating value, net 28 MJ, wet mass 1 kg
- sand: 0.0389 kg; lognormal variance with pedigree 0.0546, pedigree (2,4,5,5,1)
  properties: dry mass 1 kg, wet mass 1 kg
- synthetic rubber: 0.0727 kg; lognormal variance with pedigree 0.0546, pedigree (2,4,5,5,1)
  properties: carbon content, fossil 0.871949, dry mass 1 kg, heating value, net 26.42 MJ, wet mass 1 kg
  note on carbon content, fossil: EPDM (Ethylene-propene-diene terpolymer) rubber is a terpolymer of ethylene, propene, and a diene with the residual unsaturated portion of the diene in the side chain (ecoinvent v2.2 report 7-part XX & Ullmann). Chemical formula (deduced from Evidences of Solvent-Induced Miscibility in Polychloroprene-co-Ethylene-Propene Diene Terpolymer Blends, Dubey et al., Journal of Applied Polymer Science, 2009, 111:1884-1891): C20H35
- waste bitumen sheet: -0.0057 kg; lognormal variance with pedigree 0.0346, pedigree (2,4,3,5,3)
  production volume
    (same comment as for municipal solid waste)
  properties: carbon content, fossil 0.643207, dry mass 0.985 kg, heating value, net 40.2 MJ, water content 0.0152284, wet mass 1 kg
  note on carbon content, fossil: The bitumen sheet is made of 63% bitumen, 24% surface spread and filler (assumed to be pure SiO2), 6% carrier fleece (assumed to be PE) and 7% elastomer (assumed to be PS) (ecoinvent v2.2 report 13_I, pg 40). C content of bitumen, PE and PS from Tab A.6 and A.1 (ecoinvent v2.2 report 13_I, pg 40), respectively. C content of waste also given in the dataset
  note on heating value, net: Literature value, Source: IPCC 2006, 2006 IPCC Guidelines for National Greenhouse Gas Inventories, Prepared by the National Greenhouse Gas Inventories Programme, Eggleston H.S., Buendia L., Miwa K., Ngara T. and Tanabe K. (eds). Published: IGES, Japan

## Emissions to nature
- Benzo(a)pyrene [air, unspecified]: 1.73e-9 kg; lognormal variance with pedigree 0.692, pedigree (1,1,5,5,1)
  estimation
- NMVOC, non-methane volatile organic compounds [air, unspecified]: 0.000854 kg; lognormal variance with pedigree 0.1746, pedigree (2,4,5,5,1)

## Sampling procedure
Literature, database

## Extrapolations
see Geography This dataset has been copied from an original dataset covering the geography RER. The uncertainty has been adjusted accordingly.Child dataset exchanges identical to GLO dataset. Created to enable linking to regional markets (e.g. for electricity). Data quality indicators adjusted accordingly.
