# clay brick production, extruded

Dataset: EcoSpold 2, unit process
Geography: RER
Time period: 1992-01-01 to 2023-12-31
Technology level: current
Classification: ISIC rev.4 ecoinvent: 2392:Manufacture of clay building materials
Classification: EcoSpold01Categories: construction materials/bricks
Synonyms: Ziegel; clay; Ton
Scenario: Business-as-Usual
System model: Allocation, cut-off by classification
Generated by: Daniel Kellenberger (obsolete)
Published in: Kellenberger D. 2007
Database: ecoinvent
isCopyrightProtected: true
accessRestrictedTo: 1

## General comment
This dataset represents the production of 1 kg of brick. Data was obtained from literature values (average data from 12 Swiss brick plants) that were corrected and updated for some flows. Note that no hard coal coke is used within these 12 plants.
includes first ginding process, wet process (includes second ginding, mixing and plastifying), storage, forming (extruding molding method) and cutting, drying, firing, loading, packing and storage
not included: charge of the wastewater and solid waste, it's assumed that the waste heat is totally reused for drying, no hard coal coke is used within these 12 plants
Clay brick. Image source: http://nbss.co.za/wp-content/uploads/2015/06/clay-stock-bricks.jpg, accessed 20151211

## Included activities start
From reception of clay at the factory gate.

## Included activities end
This dataset ends with the storage of the produced and packed brick at the factory. This dataset includes the first ginding process, wet process (second ginding, mixing and plastifying), storage, forming (an extruding molding method) and cutting, drying, firing, loading, packing and storage. The dataset doesn't include the charge of the wastewater and solid waste.

## Geography
Data was obtained from industries of Switzerland, Germany and Austria.

## Technology
This dataset corresponds to a mix of different brick production technologies (different firing fuels) in Austria, Germany and Switzerland.

## Parameters
- fraction, process water, to air: 0.15 dimensionless; name fraction_PW_to_air; lognormal variance with pedigree 0.092025, pedigree (4,4,3,2,4)
  Literature value. In case when no industry/process specific data are available, default evaporation fraction value is used. This value is 15% and is based on literature (Statistics Canada, 2007 & Shaffer, K.H., 2008, Consumptive water use in the Great Lakes Basin, USGS & Shiklomanov, 2003, World Water Resources at the Beginning of the 21st Century) and has been approved by an expert.
- fraction, tap water, to air: 0.15 dimensionless; name fraction_TW_to_air; = fraction_PW_to_air; lognormal variance with pedigree 0.092025, pedigree (4,4,3,2,4)
  Calculated value. See comment in the other parametres present in this dataset. Tap water is considered to be always used as process water, thus process water fractions to air are applied to all tap water input flows to calculate the amount of water consumed in the processes.

## Reference product
- clay brick: 1 kg; name RP; source Hauck, D. 1997; By-product classification allocatable product; CPC 37310: Bricks, blocks, tiles and other ceramic goods of siliceous earths; HS2017 6901: Bricks, blocks, tiles and other ceramic goods of siliceous fossil meals (e.g. kieselguhr, tripolite or diatom[...]
  Ordinary bricks constitute the largest fraction of total brick production. They have a porous body. If there are no special requirements with regard to appearance or resistance to weathering, they are called inner-wall bricks, or backing bricks, and can be solid or hollow. For hollow bricks there are requirements for compression strength (4 - 28 MPa) and brick bulk density of 1.0 -2.2 kg/dm3. (The brick bulk density is calculated by dividing the mass of the dried brick by its volume including all channels, finger holes, and mortar pockets, or frogs.)
  One special variety of brick is the insulating brick used to reduce heat flow. For these the strength specification is between 2 and 28 MPa. The brick density must be only between 0.6 and 1.0 kg/dm3. Adding materials that burn during firing increases the porosity. Insulating brick can be as large as 49 × 30 × 23.8 cm.
  Progress is being made in producing room high building components. These are known as brick planks and are produced as monolithic pieces with an extrusion press.
  If the brick has surface and colour suitable for facing and it is able to withstand frost, the brick is classified as face brick, or facing brick. If the average compression strength is 3 45 MPa, the brick is ranked as extra strong.
  The main product of the Swiss industry is brick. It is usually plastered. If it is used for a visible brick wall aesthetic criterias as colour and structure of the surface have to be fulfilled and a good weathering resistance is necessary.
  EcoSpold01Location=RER
  production volume 9.66036e10 kg; name PV_RP; = 60377265*1.6E+3
    Estimated value. Value of production quantity (m3) is retrieved from EuroStat for the year 2016, accessed on 20231010. Production quantity is 60'377'265 m3, multiplied by the average brick bulk density of 1.6 kg/dm3.
    Reference production quantity: "Non-refractory clay building bricks (excluding of siliceous fossil meals or earths)", EUROPEAN UNION (28), PRODQNT.
    Industry, trade and services>Statistics on the production of manufactured foods (prom)>Sold production, exports and imports (ds-056120). Retrieved from: https://ec.europa.eu/eurostat/databrowser/view/DS-056120__custom_7766536/default/table?lang=en
    Reference brick bulk density: v2 Report 7, Buildings, Part IV, p. 9. For hollow bricks there are requirements for compression strength (4 - 28 MPa) and brick bulk density of 1.0 -2.2 kg/dm3. (The brick bulk density is calculated by dividing the mass of the dried brick by its volume including all channels, finger holes, and mortar pockets, or frogs.)
  property carbon content, fossil 0
    Made mainly from clay, sand and other aditives. All C contained in raw materials is emitted as CO2 ecoinvent v2.2 report 7, part IV
  property carbon content, non-fossil 0
    (same comment as for clay brick)
  property price 0.100565 EUR2005
    Calculated value based on data from United Nations Commodity Trade Statistics Database (comtrade.un.org). UN comtrade category: 69 Ceramic products - Ceramic building bricks. Year 2022. The prices were converted to EUR based on the annual exchange rates published by the European Central Bank (https://sdw.ecb.europa.eu/quickview.do?SERIES_KEY=120.EXR.A.USD.EUR.SP00.A, last accessed on 2023-06-01) and adjusted for inflation relative to 2005 using the producer price index (PPI) of the euro area, published by eurostat (https://ec.europa.eu/eurostat/databrowser/view/STS_INPP_A__custom_6416181/default/table?lang=en, last accessed on 2023-06-01).
  properties: carbon allocation 0 kg, carbon content 0, dry mass 1 kg, water content 0, water in wet mass 0 kg, wet mass 1 kg

## Inputs from technosphere
- EUR-flat pallet: 1.61e-5 unit; lognormal variance with pedigree 0.1381, pedigree (5,5,5,3,1)
  Estimation, based on personal communication: Thomas Ultizsch, Gütegemeinschaft Paletten of 03.09.02. The weight assumed is 22 kg.
  EcoSpold01Location=RER
  Uncertainty: ;
  properties: carbon content, fossil 0.0311351, carbon content, non-fossil 0.58833, dry mass 18.3333 kg, heating value, net 335.11 MJ, water content 0.2, wet mass 22 kg
  note on carbon content, fossil: C content in components of the pallet (ecoinvent v2.2 report 7_part XVIII)
- clay: 1.35 kg; source Bruck, M. 1996; lognormal variance with pedigree 0.1381, pedigree (5,5,5,3,1)
  EcoSpold01Location=CH
  Proxy. Swiss module used as proxy.
  Uncertainty: ;
  properties: dry mass 0.965 kg, water content 0.0362694, wet mass 1 kg
- clay pit infrastructure: 2e-10 unit; lognormal variance with pedigree 0.408, pedigree (3,5,5,1,3)
  EcoSpold01Location=CH
  Estimated, based on improssions from a visit and an air photo of Brickworks Gasser in Rapperswill BE. The flow includes the infrastructure needed at the production place (i.e. buildings, acces) over 50 years.
  Uncertainty: ;
- diesel, burned in building machine: 0.0297 MJ; source Bruck, M. 1996; lognormal variance with pedigree 0.1381, pedigree (5,5,5,3,1)
  Estimation, based on literature values. Diesel is considered as a fuel input for the machinery. Diesel for mining is excluded as it is in the "clay pit" dataset.
  EcoSpold01Location=GLO
  Uncertainty: ;
  properties: heating value, net 1 MJ
- electricity, medium voltage: 0.0394 kWh; source Bruck, M. 1996; lognormal variance with pedigree 0.1381, pedigree (5,5,5,3,1)
  EcoSpold01Location=UCTE
  Estimation, based on literature values. Electricity comes from the electric supply company. It has been excluded one part of the plant's consumption as it's assumed that is produced by itself (by heat-generation from natural gas).
  Uncertainty: ;
- heavy fuel oil: 0.000381 kg; source Bruck, M. 1996; lognormal variance with pedigree 0.1381, pedigree (5,5,5,3,1)
  EcoSpold01Location=RER
  Estimation, based on literature values. It is assumed that the data is "net calorific value" and the efficiency is 0.85. Natural gas is considered as a combustible.
  Further references:
  Frischknecht R., Jungbluth N., Althaus H.-J., Doka G., Dones R., Hellweg S., Hischier R., Humbert S., Margni M., Nemecek T. and Spielmann M. (2007) Implementation of Life Cycle Impact Assessment Methods. Final report ecoinvent Data v2.0 No. 3. Swiss Centre for Life Cycle Inventories, Dübendorf, CH, Online-Version under: www.ecoinvent.ch <http://www.ecoinvent.ch>.
  Uncertainty: ;
  properties: carbon content, fossil 0.849, dry mass 1 kg, heating value, net 41.2 MJ, wet mass 1 kg
- light fuel oil: 0.00541 kg; source Bruck, M. 1996; lognormal variance with pedigree 0.1381, pedigree (5,5,5,3,1)
  Estimation, based on literature values. It is assumed that the data is "net calorific value" and the efficiency is 0.85. Natural gas is considered as a combustible.
  Further references:
  Frischknecht R., Jungbluth N., Althaus H.-J., Doka G., Dones R., Hellweg S., Hischier R., Humbert S., Margni M., Nemecek T. and Spielmann M. (2007) Implementation of Life Cycle Impact Assessment Methods. Final report ecoinvent Data v2.0 No. 3. Swiss Centre for Life Cycle Inventories, Dübendorf, CH, Online-Version under: www.ecoinvent.ch <http://www.ecoinvent.ch>.
  EcoSpold01Location=RER
  Uncertainty: ;
  properties: carbon content, fossil 0.862, dry mass 1 kg, heating value, net 42.6 MJ, wet mass 1 kg
- lime, packed: 0.0233066, 0.000593387 kg (2 suppliers, which the file names only by identifier); sum of these 0.0239 kg; source Bruck, M. 1996; lognormal variance with pedigree 0.1381, pedigree (5,5,5,3,1)
  EcoSpold01Location=CH
  Proxy. Swiss module "limestone, crushed" is assumed. Natural stone flour and granulated lime are used in the process.
  Uncertainty: ;
  properties: carbon content, fossil 0.117492, dry mass 0.998 kg, water content 0.00200401, wet mass 1 kg
  note on carbon content, fossil: Table 3.1, ecoinvent v2.2 report 7, part VII, pg 3. MW CaCO3=100, MW MgCO3=84
- limestone, crushed, for mill: 0.000396 kg; source Bruck, M. 1996; lognormal variance with pedigree 0.1381, pedigree (5,5,5,3,1)
  Proxy, Swiss module is used as proxy.
  Literature value, granulated lime is used in the production process.
  EcoSpold01Location=CH
  Uncertainty: ;
  properties: carbon content, fossil 0.117492, dry mass 0.998 kg, water content 0.00200401, wet mass 1 kg
- lubricating oil: 1.32e-5 kg; name lubricating_oil; source Bruck, M. 1996; lognormal variance with pedigree 0.1381, pedigree (5,5,5,3,1)
  Proxy, lubricating oil is used as proxy for gear lubricant, hydraulic oil and lubricating grease.
  EcoSpold01Location=RER
  Uncertainty: ;
  properties: carbon content, fossil 0.75, dry mass 1 kg, heating value, net 40.2 MJ, wet mass 1 kg
  note on carbon content, fossil: Lubricating oil is produced from diesel. C-content/dry mass of fats and oils considered 75%, from: ecoinvent v2.2 report, n 15a, pg 40
  note on heating value, net: Literature value, Source: IPCC 2006, 2006 IPCC Guidelines for National Greenhouse Gas Inventories, Prepared by the National Greenhouse Gas Inventories Programme, Eggleston H.S., Buendia L., Miwa K., Ngara T. and Tanabe K. (eds). Published: IGES, Japan
- natural gas, high pressure: 0.000220155, 0.0315747 m3 (2 suppliers, which the file names only by identifier); sum of these 0.0317949 m3; source Bruck, M. 1996; lognormal variance with pedigree 0.1381, pedigree (5,5,5,3,1)
  EcoSpold01Location=RER
  Estimation, based on literature values. It is assumed that the data is "net calorific value" and the efficiency is 0.87. Natural gas and propar are considered as a combustible.
  Further references:
  Frischknecht R., Jungbluth N., Althaus H.-J., Doka G., Dones R., Hellweg S., Hischier R., Humbert S., Margni M., Nemecek T. and Spielmann M. (2007) Implementation of Life Cycle Impact Assessment Methods. Final report ecoinvent Data v2.0 No. 3. Swiss Centre for Life Cycle Inventories, Dübendorf, CH, Online-Version under: www.ecoinvent.ch <http://www.ecoinvent.ch>.
  Uncertainty: ;
  properties: carbon content, fossil 0.602381, dry mass 0.84 kg, heating value, gross 40 MJ, heating value, net 36 MJ, wet mass 0.84 kg
  note on carbon content, fossil: An average C content of 0.506 kg C/ m3 has been assumed (this average has been calculated using data in Tab 3.5, ecoinvent v2.2 report 6_V
  note on heating value, net: Literature value, Source: Christoph Meili;Niels Jungbluth;Maresa Bussa (2021) Life cycle inventories of crude oil and natural gas extraction. ESU-services Ltd. commissioned by BAFU & VSG, Schaffhausen, Switzerland, http://esu-services.ch/data/public-lci-reports/
- packaging film, low density polyethylene: 0.000542 kg; source Bruck, M. 1996; lognormal variance with pedigree 0.1381, pedigree (5,5,5,3,1)
  Literature value. Polyethylene foil is used in the process.
  EcoSpold01Location=RER
  Uncertainty: ;
  properties: carbon content, fossil 0.857143, dry mass 1 kg, heating value, net 42.47 MJ, wet mass 1 kg
  note on carbon content, fossil: Polyethylene is formed out of a huge amount of ethylene monomers (C2H4) (ecoinvent v2.2 report 11_II). MW=28 g/mol
- polyethylene, high density, granulate: 8.58e-7 kg; source Bruck, M. 1996; lognormal variance with pedigree 0.1381, pedigree (5,5,5,3,1)
  Literature value. A plastic band is used in the manufacturing process.
  EcoSpold01Location=RER
  Uncertainty: ;
  properties: carbon content, fossil 0.857143, dry mass 1 kg, heating value, net 42.47 MJ, wet mass 1 kg
- polystyrene scrap, post-consumer: 0.000328 kg; source Bruck, M. 1996; lognormal variance with pedigree 0.1381, pedigree (5,5,5,3,1)
  Literature value 0.000328kg. Polystyrol scrap is used to make brick porous.
  Uncertainty: ;
  properties: carbon content, fossil 0.922579, dry mass 1 kg, heating value, net 38.67 MJ, wet mass 1 kg
  note on carbon content, fossil: Tab & Fig 6.12, ecoinvent v2.2 report 7, part XXI. Chemical formula of polystyrene is (C8H8)n
- polystyrene, expandable: 0.000352 kg; source Bruck, M. 1996; lognormal variance with pedigree 0.1381, pedigree (5,5,5,3,1)
  EcoSpold01Location=RER
  Literature value. Polystyrol is used to make brick porous.
  Uncertainty: ;
  properties: carbon content, fossil 0.923077, dry mass 1 kg, heating value, net 38.67 MJ, wet mass 1 kg
  note on carbon content, fossil: Chemical formula of polystyrene is (C8H8)n (ecoinvent v2.2 report 11_II)
- pulverised lignite: 0.0245 MJ; source Bruck, M. 1996; lognormal variance with pedigree 0.1381, pedigree (5,5,5,3,1)
  EcoSpold01Location=DE
  Literature value. Coal dust is used to make brick porous. The net calorific value is 10,51 MJ/kg.
  Uncertainty: ;
  properties: carbon content, fossil 0.660674, dry mass 0.0410138 kg, heating value, net 1 MJ, water content 0.123596, wet mass 0.0460829 kg
  note on carbon content, fossil: 58.8% C and 11% water in wet mass (ecoinvent v2.1 report 6_VI Table 7.1)
- sand: 0.0147 kg; source Bruck, M. 1996; lognormal variance with pedigree 0.1381, pedigree (5,5,5,3,1)
  Proxy. Swiss module used as proxy.
  EcoSpold01Location=CH
  Uncertainty: ;
  properties: dry mass 1 kg, wet mass 1 kg
- sheet rolling, chromium steel: 1.57e-7 kg; source Bruck, M. 1996; lognormal variance with pedigree 0.1381, pedigree (5,5,5,3,1)
  EcoSpold01Location=RER
  Literature value. Chromium steel is used in the process of steel forming.
  Uncertainty: ;
- sheet rolling, steel: 1.57e-5 kg; source Bruck, M. 1996; lognormal variance with pedigree 0.1381, pedigree (5,5,5,3,1)
  EcoSpold01Location=RER
  Literature value. Steel band is used for the packing of bricks on pallets.
  Uncertainty: ;
- steel, low-alloyed, hot rolled: 3.06e-5 kg; source Bruck, M. 1996; lognormal variance with pedigree 0.1381, pedigree (5,5,5,3,1)
  EcoSpold01Location=RER
  Literature value. Steel band is used for the packing of bricks on pallets. A steel mould is used for extruding (forming) the steel.
  Proxy. Steel, low-allowed is used as proxy for roll sleeve and other steel parts of the process materials.
  Uncertainty: ;
  properties: carbon content, fossil 0.005, dry mass 1 kg, wet mass 1 kg
  note on carbon content, fossil: Low alloyed steel composition given in Tab. 3.2 ecoinvent v2.2 report 10_partII. Steel assumed to have a C content of 0.5%
- tap water: 0.0272 kg; name tap_water_input; source Bruck, M. 1996; lognormal variance with pedigree 0.1381, pedigree (5,5,5,3,1)
  Literature value. Water is supplied from public water supply.
  Literature value. Water is supplied from public water supply.
  EcoSpold01Location=RER
  Uncertainty: ;
  properties: carbon content, fossil 0.00178991, dry mass 0.000337476 kg, water content 2962.17, wet mass 1 kg
  note on carbon content, fossil: Bicarbonate content is 2.93 mol/m3. CO2 content is 0.1 mol/m3 (ecoinvent v2.2 report 8, Tab 93.1).
- transport, passenger car: 0.0166 km; source Bruck, M. 1996; lognormal variance with pedigree 0.1381, pedigree (5,5,5,3,1)
  Literature value. Petrol is used as fuel. certain exchanges are proxies (CH for RER), specially for the petrol consumption the proxy "operation, passenger car" has been used;
  Uncertainty: ;
- waste mineral oil: -3.18885e-7, -1.28811e-5 kg (2 suppliers, which the file names only by identifier); sum of these -1.32e-5 kg; = lubricating_oil; lognormal variance with pedigree 0.1001, pedigree (5,5,3,3,1)
  It's assumed that the lubricating oil must be disposed of after use (the lubricating oil is used to lube the machinery and does not become part of the product). Therefore, same amount as lubricating oil input is used to model the waste.
  Uncertainty: ;
  production volume; = PV_RP * BP / RP
    Calculated from production volume of reference product using the relative outputs.
  properties: carbon content, fossil 0.864444, dry mass 0.9 kg, heating value, net 34.7 MJ, water content 0.111111, wet mass 1 kg
  note on carbon content, fossil: Tab A.6, ecoinvent v2.2 report 13_I. C content has been calculated after data in the tables, and then referred to 1 kg DM
  note on heating value, net: Value taken from the general comment of the treatment dataset.
- waste paper, sorted: 0.0302 kg; source Bruck, M. 1996; lognormal variance with pedigree 0.1381, pedigree (5,5,5,3,1)
  Literature value 0.0302kg. Paper degasifying matter is used to make brick porous.
  Uncertainty: ;
  properties: carbon content, non-fossil 0.448889, dry mass 0.9 kg, heating value, net 14.11 MJ, water content 0.111111, wet mass 1 kg
  note on carbon content, non-fossil: The collected waste paper has a biogenic C content of 40.4% (average C-content of waste paper according to Doka 2004)
- wood chips, dry, measured as dry mass: 0.00480825 kg; = 1.0685E-05*450; source Bruck, M. 1996; lognormal variance with pedigree 0.0941, pedigree (5,5,5,3,1)
  Literature value. Recycled saw dust is used as to make bricks porous.
  Proxy. Swiss module used as proxy.
  Literature value. Saw dust is used as subtance to make porous. Dried matter content: 188.6 kg/m3. Humidity: 40%. Density: 1,4*188.6 kg/m3.
  properties: carbon content, non-fossil 0.494, dry mass 1 kg, heating value, net 9.99 MJ, water content 0.4, wet mass 1.4 kg
  note on carbon content, non-fossil: C content of dry mass is 0.494 kgC/kg dry wood (ecoinvent v2.2 report 9).

## Inputs from nature
- Water, well, in ground [natural resource, in water]: 7.36e-5 m3; name water_well_in_ground_input; source Bruck, M. 1996; lognormal variance with pedigree 0.1381, pedigree (5,5,5,3,1)
  Proxy. Swiss module considered as proxy. Water is pumped on the company's ground.
  Uncertainty: ;

## Emissions to nature
- Benzene [air, unspecified]: 2.96e-6 kg; source Bruck, M. 1996; lognormal variance with pedigree 0.2581, pedigree (5,5,5,3,1)
  Literature value. Total measured emissions within the system boundaries.
  Uncertainty: ;
- Carbon dioxide, fossil [air, unspecified]: 0.18 kg; source Bruck, M. 1996; lognormal variance with pedigree 0.1381, pedigree (5,5,5,3,1)
  Literature value. Total measured emissions within the system boundaries (mainly from combustion of the firing process).
  Uncertainty: ;
- Carbon monoxide, fossil [air, unspecified]: 0.000391 kg; source Bruck, M. 1996; lognormal variance with pedigree 0.1381, pedigree (5,5,5,3,1)
  Estimation, based on literature values. Total measured emissions within the system boundaries (mainly from combustion of the firing process).
  Further references:
  Berdowski J., Visschedijk A., Creemers E., Pulles T., Pacyna J., Fudala J. and Querreveld D. (1995) Co-ordinated European Programme on Particulate Matter Emission Inventories, Projections and Guidance (CEPMEIP) from <http://www.air.sk/tno/cepmeip/>.
  Uncertainty: ;
- Formaldehyde [air, unspecified]: 1.64e-5 kg; source Bruck, M. 1996; lognormal variance with pedigree 0.2581, pedigree (5,5,5,3,1)
  Literature value. Total measured emissions within the system boundaries.
  Uncertainty: ;
- Hydrochloric acid [air, unspecified]: 1.22e-5 kg; source Bruck, M. 1996; lognormal variance with pedigree 0.1781, pedigree (5,5,5,3,1)
  (same comment as for Carbon dioxide, fossil)
- Hydrogen fluoride [air, unspecified]: 1.06e-5 kg; source Bruck, M. 1996; lognormal variance with pedigree 0.1781, pedigree (5,5,5,3,1)
  (same comment as for Carbon monoxide, fossil)
- NMVOC, non-methane volatile organic compounds [air, unspecified]: 7.63e-5 kg; source Bruck, M. 1996; lognormal variance with pedigree 0.2581, pedigree (5,5,5,3,1)
  Estimation, based on literature values. Total measured emissions within the system boundaries. It is assumed that an average NMVOC includes about 80% weight of C.
  Uncertainty: ;
- Nitrogen oxides [air, unspecified]: 0.00026 kg; source Bruck, M. 1996; lognormal variance with pedigree 0.1781, pedigree (5,5,5,3,1)
  (same comment as for Carbon dioxide, fossil)
- Particulate Matter, < 2.5 um [air, unspecified]: 1.4e-5 kg; source Bruck, M. 1996; lognormal variance with pedigree 0.4381, pedigree (5,5,5,3,1)
  Estimation, based on literature value. Total measured emissions within the system boundaries. It is assumed that the amount is 100% from combustion and therefore the share is calculated based on the emissions from the combustion. The share is based on EPA-Report: 75% of the total particulates.
  Further references:
  EPA (1998) Brick and Structural Clay Product Manufacturing, Emissions Factor Documentation for AP-42, Final Report, Section 11.3. EPA Contract 68-D2-0159, Work Assignment No. I-0, MRI Project No. 4601-01. U.S. Environmental Protection Agency (EPA), Office of Air Quality Planning and Standards, Research Triangle Park/NC, Online-Version under: <http://www.epa.gov/ttn/chief/ap42/>.
  Uncertainty: ;
- Particulate Matter, > 10 um [air, unspecified]: 4.68e-6 kg; source Bruck, M. 1996; lognormal variance with pedigree 0.1781, pedigree (5,5,5,3,1)
  Estimation, based on literature value. Total measured emissions within the system boundaries. The share is based on EPA-Report: 25% of the total particulates.
  Further references:
  EPA (1998) Brick and Structural Clay Product Manufacturing, Emissions Factor Documentation for AP-42, Final Report, Section 11.3. EPA Contract 68-D2-0159, Work Assignment No. I-0, MRI Project No. 4601-01. U.S. Environmental Protection Agency (EPA), Office of Air Quality Planning and Standards, Research Triangle Park/NC, Online-Version under: <http://www.epa.gov/ttn/chief/ap42/>.
  Uncertainty: ;
- Phenol [air, unspecified]: 1.3e-7 kg; source Bruck, M. 1996; lognormal variance with pedigree 0.2581, pedigree (5,5,5,3,1)
  Literature value. Total measured emissions within the system boundaries.
  Uncertainty: ;
- Sulfur dioxide [air, unspecified]: 9.98e-5 kg; source Bruck, M. 1996; lognormal variance with pedigree 0.2581, pedigree (5,5,5,3,1)
  (same comment as for Carbon monoxide, fossil)
- Water [air, unspecified]: 1.512e-5 m3; name water_to_air_unspecified; = (tap_water_input/1000*fraction_TW_to_air)+(water_well_in_ground_input*fraction_PW_to_air); lognormal variance with pedigree 0.0807, pedigree (2,2,5,1,1)
  Calculated value based on literature values and expert opinion. See comments in the parametres' comment field.
  property fraction, origin: fresh water 1; name fraction_origin_fresh_water
  property fraction, origin: salt water 0; name fraction_origin_salt_water
  property fraction, origin: unspecified 0; name fraction_origin_unspecified
- Water [water, unspecified]: 8.568e-5 m3; name water_to_water_unspecified; = (tap_water_input/1000)*(1-fraction_TW_to_air)+water_well_in_ground_input*(1-fraction_PW_to_air); lognormal variance with pedigree 0.0807, pedigree (2,2,5,1,1)
  (same comment as for Water)
  property carbon content, fossil 0; name C_content_fossil
  property carbon content, non-fossil 0; name C_content_non_fossil
  property dry mass 0 kg; name DM
  property fraction, origin: fresh water 1; name fraction_origin_fresh_water_Ww
  property fraction, origin: salt water 0; name fraction_origin_salt_water_Ww
  property fraction, origin: unspecified 0; name fraction_origin_unspecified_Ww
  property water in wet mass 1000 kg; name WWM
  property wet mass 1000 kg; name WM

## Sampling procedure
The data relates to 12 brick production plants in Germany, Austria and Switzerland; The estimation of infrastructure relates to one company in Switzerland (Ziegelei Gasser AG in Rapperswil BE),
