# quicklime production, milled, loose

Dataset: EcoSpold 2, unit process
Geography: RoW
Time period: 2000-01-01 to 2023-12-31
Technology level: current
Classification: ISIC rev.4 ecoinvent: 2394:Manufacture of cement, lime and plaster
Classification: EcoSpold01Categories: construction materials/additives
Synonyms: Calcium hydroxide; lime; quick; burnt; caustic; Calciumhydroxid
Tags: ConvertedDataset
Scenario: Business-as-Usual
System model: Allocation, cut-off by classification
Share of production covered: 50 %
Generated by: Daniel Kellenberger (obsolete)
Published in: Kellenberger D. 2007
Database: ecoinvent
isCopyrightProtected: true
accessRestrictedTo: 1

## General comment
This dataset represents the production of milled quicklime, from quicklime in pieces.
Infrastructure data are estimated based on a site visit and sketches of the process. The value of the infrastructure is normalized with a annual production capacity of about 23'000 tons of product per year. The estimated lifespan of the machines is 25 years. There are no significant dust emissions as a dust control system is installed. This product exists also packed.
Quicklime is used for acid neutralization, SO2 absorption, sludge stabilization or other industrial alkali applications.

## Included activities start
From quicklime in pieces.

## Included activities end
This activity ends with the milled quicklime, at the plant gate.
This dataset includes the processes: crushing, milling, filtering (cyclone), dedusting, transportation, and storing. One part of the total heating energy for "production" and "administration" is included. Equipment included in the infrastructure: 1 crusher, 1 roller mill, 1 plant for dedusting, 1cyclone, and 1 small silo.

## Geography
data are from only one company in Switzerland (KFN), for some exchanges RER-modules have been used as proxy

## Technology
The company KFN works on a technically high level. Effective dust control systems are installed.

## Parameters
- Quebec gross domestic product 2011: 3.11e11 USD(2011); name quebecGDP2011; lognormal variance with pedigree 0.0006, pedigree (1,1,1,1,1)
  Quebec Gross domestic product for 2011, expressed in 2011 USD. Source: Institut de la statistique du Québec. Converted from CAD to USD using a yearly average exchange rate of 0.989 CAD/USD (Source: bank of Canada).
- quebec production volume: 6.82e8 kg; name PV_Quebec; lognormal variance with pedigree 0.0006, pedigree (1,1,1,1,1)
  2012 limestone production in Quebec. Primary data from the only producer in Quebec (Canada).
- world gross domestic product 2011: 7e13 USD(2011); name worldGDP2011; lognormal variance with pedigree 0.0006, pedigree (1,1,1,1,1)
  World Gross domestic product for 2011, expressed in 2011 USD. Source: World Bank.

## Reference product
- quicklime, milled, loose: 1 kg; By-product classification allocatable product; CPC 37420: Quicklime, slaked lime and hydraulic lime; HS2017 252210: Quicklime; excluding calcium oxide and hydroxide of heading no. 2825; CAS 1305-78-8
  Pulverized limestone (lime, milled, loose) includes all products which are made by grinding and screening industrial grade limestone.
  These products are used in a variety of applications including:
  - Rock Dust - used to suppress coal dust explosions in the coal industry.
  - Agricultural - used to neutralize soil acidity, increase plant nutrients, increase organic matter, increase soil organisms, and increase trace elements.
  - Exhaust Gas Scrubbers - used in industrial and power plants.
  - Scrubber Reagent - used in circulating fluidized bed boilers as a reagent material for sulfur removal.
  - Roofing Materials - used as a filler in asphalt shingles.
  - Drilling Mud Additives - used as an essential component in drilling mud.
  - Glass Stone - used as a primary ingredient in the glass making process.
  - Feed Supplements - used to provide essential minerals for the animal feed industry.
  EcoSpold01Location=CH
  production volume 1.51531e11 kg; name PV_world; = PV_Quebec*worldGDP2011/quebecGDP2011
    Gross approximation of World production volume using relative value of Quebec (Canada) GDP to world GDP. See parameters.
  property carbon content, fossil 0
    Tab 3.3, ecoinvent v2.2 report 7, part VII, pg 5. Ground quicklime
  property carbon content, non-fossil 0
    Tab 3.3, ecoinvent v2.2 report 7, part VII, pg 5. Ground quicklime
  property price 0.077 EUR2005
    Calculated value based on data from United Nations Commodity Trade Statistics Database (comtrade.un.org). UN comtrade category: 252210 Quicklime. Using exchange rate of 1EURO = 1.209 USD. Average of price of import into 5 main markets (EU, US, JP, IN and CN).
  properties: carbon allocation 0 kg, carbon content 0, dry mass 0.99 kg, water content 0.010101, water in wet mass 0.01 kg, wet mass 1 kg

## Inputs from technosphere
- conveyor belt: 8.79e-8 m; lognormal variance with pedigree 0.3706, pedigree (4,3,5,5,1)
  EcoSpold01Location=RER
- electricity, high voltage: 0.0135 kWh; lognormal variance with pedigree 0.0421, pedigree (1,2,5,5,1)
  activityLink added to better reflect the reality of the supply chain
- electricity, medium voltage: 0.000380102, 0.00758219, 0.00018981, 0.0001164, 2.32974e-5, 5.00248e-6, 0.000529441, 0.000782979, 0.00164037, 0.00225041 kWh (10 suppliers, which the file names only by identifier); sum of these 0.0135 kWh; lognormal variance with pedigree 0.0421, pedigree (1,2,5,5,1)
  EcoSpold01Location=CH
- heat, central or small-scale, other than natural gas: 1.91041e-5, 0.0013909 MJ (2 suppliers, which the file names only by identifier); sum of these 0.00141 MJ; lognormal variance with pedigree 0.0421, pedigree (1,2,5,5,1)
  EcoSpold01Location=CH
  properties: heating value, net 1 MJ
- industrial machine, heavy, unspecified: 0.000109 kg; lognormal variance with pedigree 0.3706, pedigree (4,3,5,5,1)
  EcoSpold01Location=RER
- quicklime, in pieces, loose: 1 kg; lognormal variance with pedigree 0.0541, pedigree (3,2,5,5,1)
  Activity link justification: precursor production and consumption occur on the same site.
  EcoSpold01Location=CH
  properties: dry mass 0.99 kg, water content 0.010101, wet mass 1 kg

## Sampling procedure
survey

## Extrapolations
data which are only available for RER have been used as proxy for CH This dataset has been copied from an original dataset covering the geography CH. The uncertainty has been adjusted accordingly.

## Review by Roberto Dones 2003-07-04
Passed

## Review by Bo Weidema 2012-09-28
replaced "electricity, high voltage, hydro, run-of-river" with "electricity, high voltage" + activity link to "electricity production, hydro, run-of-river"

## Review by Emilia Moreno Ruiz 2014-05-19
AL added for quicklime inputs
