# bamboo pole production

Dataset: EcoSpold 2, unit process
Geography: RoW
Time period: 2010-01-01 to 2023-12-31
Technology level: current
Classification: ISIC rev.4 ecoinvent: 162:Manufacture of products of wood, cork, straw and plaiting materials
Scenario: Business-as-Usual
System model: Allocation, cut-off by classification
Generated by: Edwin Zea Escamilla
Database: ecoinvent
isCopyrightProtected: true
accessRestrictedTo: 1

## General comment
This dataset is a weighted average of the existing local datasets (BR, CN, CO, PH). It represents the production of 1 Kg of bamboo pole. Bamboo culm with a water content of u =80 % is used for the production of bamboo pole. The production takes place at a bamboo processing facility and includes technical drying to a final water content of u =20% and trimming of culms. The figures origin from mainly calculations and literature values.
The pole is derived directly from the bamboo culm and is usually trimmed to between 4 and 6 m and treated against fungi and pests using boric acid. Bamboo poles can be used directly for the construction of columns, beams, or struts and are also the main input for other bamboo-based construction materials (BBCM) (Vogtländer et al., 2010, Vogtländer et al., 2014). This dataset was developed with the support of the International Organization for Bamboo and Rattan INBAR
Ref:
Vogtländer, J., P. van der Lugt, and H. Brezet, The sustainability of bamboo products for local and Western European applications. LCAs and land-use. Journal of Cleaner Production, 2010. 18(13): p. 1260-1269.
Vogtländer, J.G., N.M. van der Velden, and P. van der Lugt, Carbon sequestration in LCA, a proposal for a new approach based on the global carbon cycle; cases on wood and on bamboo. Int. J. Life Cycle Assess., 2014. 19(1): p. 13-23.

## Included activities start
From reception of bamboo culm and treatment products at processing facility

## Included activities end
This activity ends with Bamboo Pole (u=20%) at the processing facility. The dataset includes the inputs drying, treatment, trimming processes, as far as they are available. The dataset includes infrastructure. Losses of boric acid to the environment are not included in the dataset. However, they are not expected to be significant.

## Technology
Current production technology

## Reference product
- bamboo pole: 1 kg; name RP; By-product classification allocatable product; CPC 31212: Wood, continuously shaped along any of its edges or faces (including strips and friezes for parquet flooring, […]; HS2017 440921: Wood; bamboo (including unassembled strips and friezes for parquet flooring), continuously shaped along any[...]
  production volume 2.8703e9 kg; name PV_RP; = 5.04E+10*0.3*0.555555556/0.833333333
    The PV pf bamboo pole was calculated on the PV of bamboo culm. Similar to the Ecuadorian dataset, it was assumed that 30 % of the harvested bamboo culms are used for construction materials. The PV was adjusted based on the differences in dry mass of bamboo culm and bamboo pole.
  property heating value, net 17.68 MJ
    Jetsada P. & Panmanas S. (2017),Evaluation of lower heating value and elemental composition of bamboo using near infrared spectroscopy,Energy,Volume 121,Pages 147-158,ISSN 0360-5442,https://doi.org/10.1016/j.energy.2017.01.020.
  property price 0.529363 EUR2005
    Based on expert judgement, price given as 0.64 USD/kg. Converted with an exchange rate of 1EURO = 1.209 USD.
  properties: carbon allocation 0.411667 kg, carbon content 0.494, carbon content, fossil 0, carbon content, non-fossil 0.494, dry mass 0.833333 kg, water content 0.2, water in wet mass 0.166667 kg, wet mass 1 kg

## Inputs from technosphere
- air compressor, screw-type compressor, 300kW: 4.61e-6 unit; lognormal variance with pedigree 0.3044, pedigree (2,3,3,4,2)
  Value calculated as a weighted average of the regional datasets.
- bamboo culm: 1.53 kg; name amount_culm; lognormal variance with pedigree 0.005, pedigree (2,3,3,4,2)
  Value calculated as a weighted average of the regional datasets.
  property wet mass 1 kg; name WM_culm
  properties: carbon content, non-fossil 0.494, dry mass 0.555556 kg, heating value, net 9.87 MJ, water content 0.8
- borax, anhydrous, powder: 3e-5 kg; lognormal variance with pedigree 0.0064, pedigree (2,3,3,5,2)
  Value calculated as a weighted average of the regional datasets.
  properties: dry mass 1 kg, wet mass 1 kg
- boric acid, anhydrous, powder: 0.000219 kg; lognormal variance with pedigree 0.0064, pedigree (2,3,3,5,2)
  Value calculated as a weighted average of the regional datasets.
  properties: dry mass 1 kg, wet mass 1 kg
- electricity, low voltage: 7.29616e-7, 1.3448e-5, 7.27664e-5, 2.82794e-6, 1.09952e-6, 4.8956e-7, 7.67519e-5, 1.82941e-5, 1.10328e-6, 3.77049e-6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 kWh (66 suppliers, which the file names only by identifier); sum of these 0.00128 kWh; lognormal variance with pedigree 0.484, pedigree (3,5,3,5,4)
  Value calculated as a weighted average of the regional datasets.
- electricity, medium voltage: 0.000320525, 0.000408725, 1.43011e-5, 3.63527e-5, 0.000333252, 0.00316956, 0.0041534, 0.00439847, 0.000168958, 0.00224036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 kWh (66 suppliers, which the file names only by identifier); sum of these 0.298 kWh; lognormal variance with pedigree 0.005, pedigree (2,3,3,4,2)
  Value calculated as a weighted average of the regional datasets.
- furnace, wood chips, with silo, 300kW: 5.33e-9 unit; lognormal variance with pedigree 0.354, pedigree (3,5,3,5,4)
  Value calculated as a weighted average of the regional datasets.
- heat, central or small-scale, natural gas: 0.0013 MJ; lognormal variance with pedigree 0.005, pedigree (2,3,3,4,2)
  Value calculated as a weighted average of the regional datasets.
  properties: heating value, net 1 MJ
- power sawing, with catalytic converter: 0.000506 hour; lognormal variance with pedigree 0.005, pedigree (2,3,3,4,2)
  Value calculated as a weighted average of the regional datasets.
- tap water: 1.41701e-5, 4.03068e-5, 1.30705e-5, 0.000544697, 0.00623324, 0.00465451 kg (6 suppliers, which the file names only by identifier); sum of these 0.0115 kg; lognormal variance with pedigree 0.005, pedigree (2,3,3,4,2)
  Value calculated as a weighted average of the regional datasets.
  properties: carbon content, fossil 0.00178991, dry mass 0.000337476 kg, water content 2962.17, wet mass 1 kg
  note on carbon content, fossil: Bicarbonate content is 2.93 mol/m3. CO2 content is 0.1 mol/m3 (ecoinvent v2.2 report 8, Tab 93.1).
- technical wood drying facility: 6.05e-7 unit; lognormal variance with pedigree 0.3044, pedigree (2,3,3,4,2)
  Value calculated as a weighted average of the regional datasets.
- waste bamboo residues: -0.0114 kg; name bamboo_residues
  Value calculated as a weighted average of the regional datasets.
  production volume; = PV_RP*(bamboo_residues/RP)
    Calculated from production volume of reference product using the relative outputs.
  property dry mass 0.833333 kg; name DM_residues
  properties: carbon content, non-fossil 0.494, heating value, net 17.68 MJ, water content 0.2, wet mass 1 kg
  note on heating value, net: Jetsada P. & Panmanas S. (2017),Evaluation of lower heating value and elemental composition of bamboo using near infrared spectroscopy,Energy,Volume 121,Pages 147-158,ISSN 0360-5442,https://doi.org/10.1016/j.energy.2017.01.020.
- wood ash mixture, pure: -8.94062e-5, -5.49108e-5, -1.68297e-6 kg (3 suppliers, which the file names only by identifier); sum of these -0.000146 kg; lognormal variance with pedigree 0.0514, pedigree (3,5,2,4,4)
  Value calculated as a weighted average of the regional datasets.
  production volume; = PV_RP*(wood_ash/RP)
    Calculated from production volume of reference product using the relative outputs.
  properties: carbon content, non-fossil 0.012, dry mass 1 kg, wet mass 1 kg

## Emissions to nature
- Acetaldehyde [air, urban air close to ground]: 1.87e-8 kg; lognormal variance with pedigree 0.484, pedigree (3,5,3,5,4)
  Value calculated as a weighted average of the regional datasets.
- Ammonia [air, urban air close to ground]: 5.31e-7 kg; lognormal variance with pedigree 0.484, pedigree (3,5,3,5,4)
  Value calculated as a weighted average of the regional datasets.
- Arsenic ion [air, urban air close to ground]: 3.07e-10 kg; lognormal variance with pedigree 0.484, pedigree (3,5,3,5,4)
  Value calculated as a weighted average of the regional datasets.
- Benzene [air, urban air close to ground]: 2.79e-7 kg; lognormal variance with pedigree 0.484, pedigree (3,5,3,5,4)
  Value calculated as a weighted average of the regional datasets.
- Benzo(a)pyrene [air, urban air close to ground]: 1.53e-10 kg; lognormal variance with pedigree 0.484, pedigree (3,5,3,5,4)
  Value calculated as a weighted average of the regional datasets.
- Bromine [air, urban air close to ground]: 1.84e-8 kg; lognormal variance with pedigree 0.484, pedigree (3,5,3,5,4)
  Value calculated as a weighted average of the regional datasets.
- Cadmium II [air, urban air close to ground]: 2.15e-10 kg; lognormal variance with pedigree 0.484, pedigree (3,5,3,5,4)
  Value calculated as a weighted average of the regional datasets.
- Calcium II [air, urban air close to ground]: 1.8e-6 kg; lognormal variance with pedigree 0.484, pedigree (3,5,3,5,4)
  Value calculated as a weighted average of the regional datasets.
- Carbon dioxide, non-fossil [air, urban air close to ground]: 0.0313 kg; lognormal variance with pedigree 0.0546, pedigree (3,5,3,5,4)
  Value calculated as a weighted average of the regional datasets.
- Carbon monoxide, non-fossil [air, urban air close to ground]: 0.000153 kg; lognormal variance with pedigree 0.484, pedigree (3,5,3,5,4)
  Value calculated as a weighted average of the regional datasets.
- Chlorine [air, urban air close to ground]: 5.52e-8 kg; lognormal variance with pedigree 0.484, pedigree (3,5,3,5,4)
  Value calculated as a weighted average of the regional datasets.
- Chromium III [air, urban air close to ground]: 1.22e-9 kg; lognormal variance with pedigree 0.484, pedigree (3,5,3,5,4)
  Value calculated as a weighted average of the regional datasets.
- Chromium VI [air, urban air close to ground]: 1.23e-11 kg; lognormal variance with pedigree 0.534, pedigree (3,5,3,5,4)
  Value calculated as a weighted average of the regional datasets.
- Copper ion [air, urban air close to ground]: 6.75e-9 kg; lognormal variance with pedigree 0.484, pedigree (3,5,3,5,4)
  Value calculated as a weighted average of the regional datasets.
- Dinitrogen monoxide [air, urban air close to ground]: 7.67e-7 kg; lognormal variance with pedigree 0.484, pedigree (3,5,3,5,4)
  Value calculated as a weighted average of the regional datasets.
- Dioxins, measured as 2,3,7,8-tetrachlorodibenzo-p-dioxin [air, urban air close to ground]: 9.51e-15 kg; lognormal variance with pedigree 0.484, pedigree (3,5,3,5,4)
  Value calculated as a weighted average of the regional datasets.
- Ethyl benzene [air, urban air close to ground]: 9.21e-9 kg; lognormal variance with pedigree 0.484, pedigree (3,5,3,5,4)
  Value calculated as a weighted average of the regional datasets.
- Fluorine [air, urban air close to ground]: 1.53e-8 kg; lognormal variance with pedigree 0.484, pedigree (3,5,3,5,4)
  Value calculated as a weighted average of the regional datasets.
- Formaldehyde [air, urban air close to ground]: 3.99e-8 kg; lognormal variance with pedigree 0.484, pedigree (3,5,3,5,4)
  Value calculated as a weighted average of the regional datasets.
- Hexachlorobenzene [air, urban air close to ground]: 2.21e-15 kg; lognormal variance with pedigree 0.484, pedigree (3,5,3,5,4)
  Value calculated as a weighted average of the regional datasets.
- Hydrocarbons, aliphatic, alkanes, unspecified [air, urban air close to ground]: 2.79e-7 kg; lognormal variance with pedigree 0.484, pedigree (3,5,3,5,4)
  Value calculated as a weighted average of the regional datasets.
- Hydrocarbons, aliphatic, unsaturated [air, urban air close to ground]: 9.51e-7 kg; lognormal variance with pedigree 0.484, pedigree (3,5,3,5,4)
  Value calculated as a weighted average of the regional datasets.
- Lead II [air, urban air close to ground]: 7.67e-9 kg; lognormal variance with pedigree 0.484, pedigree (3,5,3,5,4)
  Value calculated as a weighted average of the regional datasets.
- Magnesium [air, urban air close to ground]: 1.1e-7 kg; lognormal variance with pedigree 0.484, pedigree (3,5,3,5,4)
  Value calculated as a weighted average of the regional datasets.
- Manganese II [air, urban air close to ground]: 5.22e-8 kg; lognormal variance with pedigree 0.484, pedigree (3,5,3,5,4)
  Value calculated as a weighted average of the regional datasets.
- Mercury II [air, urban air close to ground]: 9.21e-11 kg; lognormal variance with pedigree 0.484, pedigree (3,5,3,5,4)
  Value calculated as a weighted average of the regional datasets.
- Methane, non-fossil [air, urban air close to ground]: 1.38e-6 kg; lognormal variance with pedigree 0.484, pedigree (3,5,3,5,4)
  Value calculated as a weighted average of the regional datasets.
- NMVOC, non-methane volatile organic compounds [air, urban air close to ground]: 3.22e-6 kg; lognormal variance with pedigree 0.174, pedigree (3,5,3,5,4)
  Value calculated as a weighted average of the regional datasets.
- Nickel II [air, urban air close to ground]: 1.84e-9 kg; lognormal variance with pedigree 0.484, pedigree (3,5,3,5,4)
  Value calculated as a weighted average of the regional datasets.
- Nitrogen oxides [air, urban air close to ground]: 3.07e-5 kg; lognormal variance with pedigree 0.484, pedigree (3,5,3,5,4)
  Value calculated as a weighted average of the regional datasets.
- PAH, polycyclic aromatic hydrocarbons [air, urban air close to ground]: 3.41e-9 kg; lognormal variance with pedigree 0.484, pedigree (3,5,3,5,4)
  Value calculated as a weighted average of the regional datasets.
- Particulate Matter, < 2.5 um [air, urban air close to ground]: 2.76e-5 kg; lognormal variance with pedigree 0.214, pedigree (3,5,3,5,4)
  Value calculated as a weighted average of the regional datasets.
- Particulate Matter, > 2.5 um and < 10um [air, urban air close to ground]: 1.53e-6 kg; lognormal variance with pedigree 0.484, pedigree (3,5,3,5,4)
  Value calculated as a weighted average of the regional datasets.
- Pentachlorophenol [air, urban air close to ground]: 2.49e-12 kg; lognormal variance with pedigree 0.484, pedigree (3,5,3,5,4)
  Value calculated as a weighted average of the regional datasets.
- Phosphorus [air, urban air close to ground]: 9.21e-8 kg; lognormal variance with pedigree 0.484, pedigree (3,5,3,5,4)
  Value calculated as a weighted average of the regional datasets.
- Potassium I [air, urban air close to ground]: 7.18e-6 kg; lognormal variance with pedigree 0.484, pedigree (3,5,3,5,4)
  Value calculated as a weighted average of the regional datasets.
- Sodium I [air, urban air close to ground]: 3.99e-7 kg; lognormal variance with pedigree 0.484, pedigree (3,5,3,5,4)
  Value calculated as a weighted average of the regional datasets.
- Sulfur dioxide [air, urban air close to ground]: 7.67e-7 kg; lognormal variance with pedigree 0.484, pedigree (3,5,3,5,4)
  Value calculated as a weighted average of the regional datasets.
- Toluene [air, urban air close to ground]: 9.21e-8 kg; lognormal variance with pedigree 0.484, pedigree (3,5,3,5,4)
  Value calculated as a weighted average of the regional datasets.
- Water [air, unspecified]: 0.000516 m3; lognormal variance with pedigree 0.0078, pedigree (3,3,3,5,2)
  Value calculated as a weighted average of the regional datasets.
- Zinc II [air, urban air close to ground]: 9.21e-8 kg; lognormal variance with pedigree 0.484, pedigree (3,5,3,5,4)
  Value calculated as a weighted average of the regional datasets.
- m-Xylene [air, urban air close to ground]: 3.68e-8 kg; lognormal variance with pedigree 0.484, pedigree (3,5,3,5,4)
  Value calculated as a weighted average of the regional datasets.
- Water [water, ground-]: 7.36e-6 m3; lognormal variance with pedigree 0.0078, pedigree (3,3,3,5,2)
  Value calculated as a weighted average of the regional datasets.
- Water [water, surface water]: 1.84e-6 m3; lognormal variance with pedigree 0.0078, pedigree (3,3,3,5,2)
  Value calculated as a weighted average of the regional datasets.

## Sampling procedure
The dataset is mostly based on literature values and was developed with the support of the International Organization for Bamboo and Rattan INBAR

## Extrapolations
Air emissions resulting from on-site energy production, i.e. the combustion of bamboos residues were calculated based on the dataset “heat production, softwood chips from forest, at furnace 300kW, GLO”

The amounts of flows are weighted averages over all existing local production datasets available for this specific product. The weights are the annual production volumes of the local datasets relative to the sum of all local annual production volumes.
