# milking parlour construction

Dataset: EcoSpold 2, unit process
Geography: CH
Time period: 1994-01-01 to 2023-12-31
Technology level: current
Classification: ISIC rev.4 ecoinvent: 4100:Construction of buildings
Classification: EcoSpold01Categories: agricultural means of production/buildings
Tags: ConvertedDataset
Scenario: Business-as-Usual
System model: Allocation, cut-off by classification
Generated by: Dunja Dux
Published in: Nemecek, T. 2007
Database: ecoinvent
isCopyrightProtected: true
accessRestrictedTo: 1

## General comment
This dataset represents an example of a typical milking parlour. The module includes a herringbone milking parlour 1x4 with 4 milking units, a pipeline milking machine, a milk room and the part of the building around and between the milking rooms (floor, walls, roof and doors). Lifetime of the building is 50 years. The Functional Unit is one complete milking parlour during entire service life.
[This dataset was already contained in the ecoinvent database version 2. It was not individually updated during the transfer to ecoinvent version 3. Life Cycle Impact Assessment results may still have changed, as they are affected by changes in the supply chain, i.e. in other datasets. This dataset was generated following the ecoinvent quality guidelines for version 2. It may have been subject to central changes described in the ecoinvent version 3 change report (http://www.ecoinvent.org/database/ecoinvent-version-3/reports-of-changes/), and the results of the central updates were reviewed extensively. The changes added e.g. consistent water flows and other information throughout the database. The documentation of this dataset can be found in the ecoinvent reports of version 2, which are still available via the ecoinvent website. The change report linked above covers all central changes that were made during the conversion process.]
Obs: The following limitation on the use of individual modules should be noted: to obtain realistic values when applying the modules, building sizes should not differ too widely from the sizes on which the module calculations were based. An acceptable approximation can be achieved for building sizes within a range of about half to twice the value of the calculated size of the modules. A wider difference would not be reasonable, since the type of construction would be too different from the calculated module.
Construction plan for herringbone milking parlour 1x4 incl. milk room.

## Included activities start
From unoccupied land foreseen for a milking parlour.

## Included activities end
This acitivity ends with the final treatment and disposal of the building. The dataset includes the use of construction materials and building machines (hydraulic diggers, skid-steer loaders) for construction and also materials for repair and replacement. Waste disposal is inlcuded for repair, replacement and dismantling materials from the building infrastructure. The dataset doesn't include direct emissions from construction, waste disposal of production and the resources used during utilization phase of the building. Disposal of construction waste such as packing materials and remnants of construction materials were not considered because it represents only a small proportion of the overall disposal quantity.

## Geography
The inventory applies for Swiss agricultural buildings only, because of the solid method of construction.

## Technology
Based on selected examples of this type of housing and buildings commonly found in Switzerland in the year 2000; but not conform to an “average Swiss building style”.

## Reference product
- milking parlour: 1 unit; By-product classification allocatable product; CPC 53269: Other constructions for manufacturing
  EcoSpold01Location=CH
  production volume 0.0336675 unit
    This is a placeholder value that does not reflect real-world production volumes. This dataset does not currently require a real-world production volume to work in the database framework, and no actual data were collected yet. This has no negative effect on the results of the ecoinvent database. The placeholder value of this activity was scaled according to the nominal GDP of 2005 (source: United Nations, http://data.un.org/Glossary.aspx?q=GDP+%28current+US%24%29, accessed 20130726) to reflect an appropriate share of the global production volume, which is also a placeholder value.
  property price 41242.5 EUR2005
    Calculated based on inputs: The price of the product has been calculated as a sum of the values of the material and energy inputs for this product. This value is therefore a rough estimation. It may underestimate the real price since there are additional expenses when producing any product. These expences can include for example labour costs, treatment of waste materials and profit for the producer. Please consider carefully whether this level of data quality is acceptable for your application.
  properties: carbon allocation 0 kg, carbon content 0

## Inputs from technosphere
- aluminium, cast alloy: 62.4 kg; lognormal variance with pedigree 0.0401, pedigree (1,2,5,1,1)
  EcoSpold01Location=RER
  Modelled, based on "Agricultural Buildings" - pdf-document on the dedicated talk page of ecoinvent (www.ecoinvent.org/talk-pages)
  properties: dry mass 1 kg, wet mass 1 kg
- aluminium, wrought alloy: 132.6 kg; lognormal variance with pedigree 0.0401, pedigree (1,2,5,1,1)
  Modelled, based on "Agricultural Buildings" - pdf-document on the dedicated talk page of ecoinvent (www.ecoinvent.org/talk-pages)
  EcoSpold01Location=RER
  properties: dry mass 1 kg, wet mass 1 kg
- calendering, rigid sheets: 22.9 kg; lognormal variance with pedigree 0.0401, pedigree (1,2,5,1,1)
  (same comment as for aluminium, cast alloy)
- cast iron: 1950 kg; lognormal variance with pedigree 0.0401, pedigree (1,2,5,1,1)
  (same comment as for aluminium, cast alloy)
  properties: carbon content, fossil 0.04, dry mass 1 kg, wet mass 1 kg
  note on carbon content, fossil: Cast iron is made by remelting pig iron in small furnaces (e.g. cupola furnaces or electric arc furnaces) and poured into moulds to make castings. It usually contains 2% to 6% carbon (ecoinvent v2.2 report 10_partII). An average content of 4% was considered
- cement mortar: 6140 kg; lognormal variance with pedigree 0.0401, pedigree (1,2,5,1,1)
  EcoSpold01Location=CH
  Modelled, based on "Agricultural Buildings" - pdf-document on the dedicated talk page of ecoinvent (www.ecoinvent.org/talk-pages)
  properties: dry mass 1 kg, wet mass 1 kg
- cement, Portland: 2340 kg; lognormal variance with pedigree 0.0401, pedigree (1,2,5,1,1)
  (same comment as for cement mortar)
  properties: dry mass 1 kg, wet mass 1 kg
- clay brick: 24900 kg; lognormal variance with pedigree 0.0401, pedigree (1,2,5,1,1)
  (same comment as for aluminium, cast alloy)
  properties: dry mass 1 kg, wet mass 1 kg
- concrete, normal strength: 38.8 m3; lognormal variance with pedigree 0.0401, pedigree (1,2,5,1,1)
  (same comment as for cement mortar)
  properties: dry mass 2190 kg, water content 0.086758, wet mass 2380 kg
- copper, cathode: 53.7 kg; lognormal variance with pedigree 0.0401, pedigree (1,2,5,1,1)
  (same comment as for aluminium, wrought alloy)
  properties: dry mass 1 kg, wet mass 1 kg
- electricity, low voltage: 262 kWh; lognormal variance with pedigree 0.0401, pedigree (1,2,5,1,1)
  Modelled, based on "Agricultural Buildings" - pdf-document on the dedicated talk page of ecoinvent (www.ecoinvent.org/talk-pages)
  EcoSpold01Location=CH
- excavation, hydraulic digger: 66.1 m3; lognormal variance with pedigree 0.0401, pedigree (1,2,5,1,1)
  (same comment as for aluminium, cast alloy)
- excavation, skid-steer loader: 10.8 m3; lognormal variance with pedigree 0.0401, pedigree (1,2,5,1,1)
  Modelled, based on "Agricultural Buildings" - pdf-document on the dedicated talk page of ecoinvent (www.ecoinvent.org/talk-pages);activityLink introduced to establish a direct link to the corresponding regional supply of this product
  EcoSpold01Location=RER
- extrusion, plastic film: 192 kg; lognormal variance with pedigree 0.0401, pedigree (1,2,5,1,1)
  (same comment as for aluminium, wrought alloy)
- fibre cement corrugated slab: 284 kg; lognormal variance with pedigree 0.0401, pedigree (1,2,5,1,1)
  (same comment as for electricity, low voltage)
  properties: carbon content, fossil 0.00981818, carbon content, non-fossil 0.01656, dry mass 1 kg, wet mass 1 kg
  note on carbon content, fossil: Tab 5.1, ecoinvent v2.2 report 7, part IX. Fibres (pulp) 3.6%. Fibres (polyvinyl alcohol) 1.8%. C-content/dry mass of natural fibres was considered 46% (from "Evolutionary and Biochemical Aspects", A.D. Kay and T. Vrede (in Global Ecology, 2010, Elsevier B.V., S.E. Jørgensen Ed.)). C-content/dry mass of polyvinyl alcohol ((C2H4O)x) was considered =24/44.
- fibre cement facing tile: 1620 kg; lognormal variance with pedigree 0.0401, pedigree (1,2,5,1,1)
  (same comment as for cement mortar)
  properties: carbon content, fossil 0.0201818, carbon content, non-fossil 0.0115, dry mass 1 kg, wet mass 1 kg
  note on carbon content, fossil: Tab 5.1, ecoinvent v2.2 report 7, part IX. Fibres (pulp) 2.5%. Fibres (polyvinyl alcohol) 3.7%. C-content/dry mass of natural fibres was considered 46% (from "Evolutionary and Biochemical Aspects", A.D. Kay and T. Vrede (in Global Ecology, 2010, Elsevier B.V., S.E. Jørgensen Ed.)). C-content/dry mass of polyvinyl alcohol ((C2H4O)x) was considered =24/44.
- flat glass, uncoated: 121 kg; lognormal variance with pedigree 0.0401, pedigree (1,2,5,1,1)
  (same comment as for aluminium, cast alloy)
  properties: dry mass 1 kg, wet mass 1 kg
- glued laminated timber, MUF-glue: 1.895 m3; lognormal variance with pedigree 0.0401, pedigree (1,2,5,1,1)
  Modelled, based on "Agricultural Buildings" document. The split between PUR-glue and MUF-glue glued laminated timber is made based on the Swiss relative production volumes for the products.
  EcoSpold01Location=RER
  properties: carbon content, fossil 0.01638, carbon content, non-fossil 0.442689, dry mass 403.64 kg, heating value, net 5517.96 MJ, price 298 EUR2005, water content 0.0975126, wet mass 443 kg
- glued laminated timber, PUR-glue: 1.895 m3; lognormal variance with pedigree 0.0401, pedigree (1,2,5,1,1)
  Modelled, based on "Agricultural Buildings" document. The split between PUR-glue and MUF-glue glued laminated timber is made based on the Swiss relative production volumes for the products.
  properties: carbon content, fossil 0.00801, carbon content, non-fossil 0.446904, dry mass 399.46 kg, heating value, net 5409.08 MJ, price 298 EUR2005, water content 0.0989836, wet mass 439 kg
- gravel, round: 20600 kg; lognormal variance with pedigree 0.0401, pedigree (1,2,5,1,1)
  (same comment as for cement mortar)
  properties: dry mass 1 kg, wet mass 1 kg
- lean concrete: 8.31 m3; lognormal variance with pedigree 0.0401, pedigree (1,2,5,1,1)
  (same comment as for electricity, low voltage)
  properties: dry mass 2080 kg, water content 0.0528846, wet mass 2190 kg
- pitch: 9510 kg; lognormal variance with pedigree 0.0401, pedigree (1,2,5,1,1)
  (same comment as for electricity, low voltage)
  properties: carbon content, fossil 0.83, dry mass 1 kg, heating value, net 28 MJ, wet mass 1 kg
- polyethylene, high density, granulate: 192 kg; lognormal variance with pedigree 0.0401, pedigree (1,2,5,1,1)
  (same comment as for aluminium, cast alloy)
  properties: carbon content, fossil 0.857143, dry mass 1 kg, heating value, net 42.47 MJ, wet mass 1 kg
  note on carbon content, fossil: Polyethylene is formed out of a huge amount of ethylene monomers (C2H4) (ecoinvent v2.2 report 11_II). MW=28 g/mol
- polystyrene foam slab: 3.3 kg; lognormal variance with pedigree 0.0401, pedigree (1,2,5,1,1)
  (same comment as for aluminium, cast alloy)
  properties: carbon content, fossil 0.859091, dry mass 1 kg, heating value, net 38.67 MJ, wet mass 1 kg
  note on carbon content, fossil: XPS consists in 91% of polystyrene, 7% of blowing agent and the re-maining 2% are flame retardants (bromine compounds) and other additives (ecoinvent v2.2 report 7, part XIV, pg69). The chemical formula of polystyrene is (C8H8)n. Here, the blowing agent is CO2.
- polyurethane, rigid foam: 33 kg; lognormal variance with pedigree 0.0401, pedigree (1,2,5,1,1)
  (same comment as for aluminium, wrought alloy)
  properties: carbon content, fossil 0.69089, dry mass 1 kg, heating value, net 30.67 MJ, wet mass 1 kg
  note on carbon content, fossil: Polyurethanes (PUR) is the collective name for an extensive group of polymers with very different compositions and correspondingly varied property profiles, though their molecule chain contains all a urethane group (-NH-CO-O-). All PURs are built on a common principle : they are produced by the diisocyanate polyaddition process, that links polyols and (di)isocyanates. In this dataset, an example of typical polyurethane mixture is described (Ullmann, Polyurethanes, Dieterich et al. & ecoinvent v2 report 11_II). C content was calculated as an addition of C contents in its components.
- polyvinylchloride, bulk polymerised: 22.9 kg; lognormal variance with pedigree 0.0401, pedigree (1,2,5,1,1)
  (same comment as for aluminium, wrought alloy)
  properties: carbon content, fossil 0.387097, dry mass 1 kg, heating value, net 21.5 MJ, wet mass 1 kg
  note on carbon content, fossil: Monomer is vynyl chloride, C2H3Cl (ecoinvent v2.2 report 11_II). MW=62 g/mol
- reinforcing steel: 1630 kg; lognormal variance with pedigree 0.0401, pedigree (1,2,5,1,1)
  (same comment as for aluminium, wrought alloy)
  properties: carbon content, fossil 0.004, dry mass 1 kg, wet mass 1 kg
- sanitary ceramics: 4970 kg; lognormal variance with pedigree 0.0401, pedigree (1,2,5,1,1)
  (same comment as for electricity, low voltage)
  properties: dry mass 1 kg, wet mass 1 kg
- sawnwood, softwood, dried (u=20%), planed: 14.8 m3; lognormal variance with pedigree 0.0401, pedigree (1,2,5,1,1)
  (same comment as for aluminium, wrought alloy)
  properties: carbon content, non-fossil 0.494, dry mass 450 kg, heating value, net 6514.84 MJ, water content 0.2, wet mass 540 kg
  note on carbon content, non-fossil: C content of dry mass is 0.494 kgC/kg dry wood (ecoinvent v2.2 report 9)
- sheet rolling, steel: 144 kg; lognormal variance with pedigree 0.0401, pedigree (1,2,5,1,1)
  (same comment as for aluminium, cast alloy)
- steel, chromium steel 18/8, hot rolled: 275 kg; lognormal variance with pedigree 0.0401, pedigree (1,2,5,1,1)
  (same comment as for aluminium, wrought alloy)
  properties: carbon content, fossil 0.0008, dry mass 1 kg, wet mass 1 kg
  note on carbon content, fossil: Stainless steel model is the grade 304 steel (18/8 stainless, 18% chromium 8% nickel; max. 0.08% C)
- steel, low-alloyed, hot rolled: 144 kg; lognormal variance with pedigree 0.0401, pedigree (1,2,5,1,1)
  (same comment as for aluminium, wrought alloy)
  properties: carbon content, fossil 0.005, dry mass 1 kg, wet mass 1 kg
  note on carbon content, fossil: Low alloyed steel composition given in Tab. 3.2 ecoinvent v2.2 report 10_partII. Steel assumed to have a C content of 0.5%
- stone wool: 795 kg; lognormal variance with pedigree 0.0401, pedigree (1,2,5,1,1)
  (same comment as for cement mortar)
  properties: carbon content, fossil 0.015401, dry mass 1 kg, wet mass 1 kg
  note on carbon content, fossil: The chemical composition of the glass fibres used in the rock wool production is similar to the composition of naturally cooled volcano basalt and has a composition listed in Tab. 3.1 and 3.2 in ecoinvent v2.2 report 16, part XIV. Rock wool contains: a minimum of 96% mineral fibres,between 0.5 and 3.0 weight percent of phenolic resin depending on the specific product characteristics, and about 0.2 percent mineral oil (ecoinvent v2.2 report 16, part XIV). An average composition of 1.8% phenolic resin, 0.2% mineral oil, and 98% mineral fibres has been assumed and used to calculate C content of the rock wool
- synthetic rubber: 816 kg; lognormal variance with pedigree 0.0401, pedigree (1,2,5,1,1)
  (same comment as for aluminium, cast alloy)
  properties: carbon content, fossil 0.871949, dry mass 1 kg, heating value, net 26.42 MJ, wet mass 1 kg
  note on carbon content, fossil: EPDM (Ethylene-propene-diene terpolymer) rubber is a terpolymer of ethylene, propene, and a diene with the residual unsaturated portion of the diene in the side chain (ecoinvent v2.2 report 7-part XX & Ullmann). Chemical formula (deduced from Evidences of Solvent-Induced Miscibility in Polychloroprene-co-Ethylene-Propene Diene Terpolymer Blends, Dubey et al., Journal of Applied Polymer Science, 2009, 111:1884–1891): C20H35
- waste bitumen: -9490 kg; lognormal variance with pedigree 0.0001, pedigree (1,2,1,1,1)
  (same comment as for electricity, low voltage)
  production volume
    Calculated from the production volume of milking parlour in proportion to the respective output amounts.
  properties: carbon content, fossil 0.842657, dry mass 0.986 kg, heating value, net 40.2 MJ, water content 0.0141988, wet mass 1 kg
  note on heating value, net: Literature value, Source: IPCC 2006, 2006 IPCC Guidelines for National Greenhouse Gas Inventories, Prepared by the National Greenhouse Gas Inventories Programme, Eggleston H.S., Buendia L., Miwa K., Ngara T. and Tanabe K. (eds). Published: IGES, Japan
- waste bitumen sheet: -25.1 kg; lognormal variance with pedigree 0.0001, pedigree (1,2,1,1,1)
  (same comment as for electricity, low voltage)
  production volume
    (same comment as for waste bitumen)
  properties: carbon content, fossil 0.643207, dry mass 0.985 kg, heating value, net 40.2 MJ, water content 0.0152284, wet mass 1 kg
  note on carbon content, fossil: The bitumen sheet is made of 63% bitumen, 24% surface spread and filler (assumed to be pure SiO2), 6% carrier fleece (assumed to be PE) and 7% elastomer (assumed to be PS) (ecoinvent v2.2 report 13_I, pg 40). C content of bitumen, PE and PS from Tab A.6 and A.1 (ecoinvent v2.2 report 13_I, pg 40), respectively. C content of waste also given in the dataset
- waste brick: -26800 kg; lognormal variance with pedigree 0.0001, pedigree (1,2,1,1,1)
  (same comment as for electricity, low voltage)
  production volume
    (same comment as for waste bitumen)
  properties: dry mass 1 kg, wet mass 1 kg
- waste building wood, chrome preserved: -973 kg; lognormal variance with pedigree 0.0001, pedigree (1,2,1,1,1)
  (same comment as for cement mortar)
  production volume
    (same comment as for waste bitumen)
  properties: carbon content, non-fossil 0.484262, dry mass 0.8 kg, heating value, net 11.63 MJ, water content 0.25, wet mass 1 kg
  note on carbon content, non-fossil: C content per kg DM was calculated using information in Tab A.4, ecoinvent v2.2 report 13_I
- waste bulk iron, excluding reinforcement: -2520 kg; lognormal variance with pedigree 0.0001, pedigree (1,2,1,1,1)
  (same comment as for cement mortar)
  production volume
    (same comment as for waste bitumen)
  properties: dry mass 1 kg, wet mass 1 kg
- waste cement in concrete and mortar: -8480 kg; lognormal variance with pedigree 0.0001, pedigree (1,2,1,1,1)
  (same comment as for electricity, low voltage)
  production volume
    (same comment as for waste bitumen)
  properties: dry mass 0.995 kg, water content 0.00502513, wet mass 1 kg
- waste concrete, not reinforced: -18300 kg; lognormal variance with pedigree 0.0001, pedigree (1,2,1,1,1)
  (same comment as for cement mortar)
  production volume
    (same comment as for waste bitumen)
  properties: dry mass 1 kg, wet mass 1 kg
- waste glass sheet: -5090 kg; lognormal variance with pedigree 0.0001, pedigree (1,2,1,1,1)
  (same comment as for electricity, low voltage)
  production volume
    (same comment as for waste bitumen)
  properties: dry mass 1 kg, wet mass 1 kg
- waste mineral wool: -795 kg; lognormal variance with pedigree 0.0001, pedigree (1,2,1,1,1)
  (same comment as for electricity, low voltage)
  production volume
    (same comment as for waste bitumen)
  properties: dry mass 1 kg, wet mass 1 kg
- waste polyethylene/polypropylene product: -1010 kg; lognormal variance with pedigree 0.0001, pedigree (1,2,1,1,1)
  (same comment as for cement mortar)
  production volume
    (same comment as for waste bitumen)
  properties: carbon content, fossil 0.748045, dry mass 0.847 kg, heating value, net 42.47 MJ, water content 0.180638, wet mass 1 kg
  note on carbon content, fossil: Mixed various plastics was used to estimate the C content of this waste (Tab A.2, ecoinvent v2.2 report 13_I)
- waste polystyrene isolation, flame-retardant: -3.3 kg; lognormal variance with pedigree 0.0001, pedigree (1,2,1,1,1)
  (same comment as for cement mortar)
  production volume
    (same comment as for waste bitumen)
  properties: carbon content, fossil 0.918145, dry mass 0.998012 kg, heating value, net 38.67 MJ, water content 0.00199232, wet mass 1 kg
  note on carbon content, fossil: Polystyrene isolation (EPS) is flame-retarded with hexa-bromo-cyclo-dodecan (C12H18Br6) and contains 0.67 w% bromine (ecoinvent v2.2 report 13_I, pg 39). The rest is polystyrene: (C8H8)n.
- waste polyurethane foam: -33 kg; lognormal variance with pedigree 0.0001, pedigree (1,2,1,1,1)
  (same comment as for cement mortar)
  production volume
    (same comment as for waste bitumen)
  properties: carbon content, fossil 0.641283, dry mass 0.998 kg, heating value, net 30.67 MJ, water content 0.00200401, wet mass 1 kg
  note on carbon content, fossil: Tab A.2, ecoinvent v2.2 report 13_I. Then C content was referred to 1 kg DM
- waste reinforced concrete: -87100 kg; lognormal variance with pedigree 0.0001, pedigree (1,2,1,1,1)
  (same comment as for cement mortar)
  production volume
    (same comment as for waste bitumen)
  properties: dry mass 0.99418 kg, water content 0.00585407, wet mass 1 kg
- waste sealing sheet, polyvinylchloride: -22.9 kg; lognormal variance with pedigree 0.0001, pedigree (1,2,1,1,1)
  (same comment as for electricity, low voltage)
  production volume
    (same comment as for waste bitumen)
  properties: carbon content, fossil 0.435136, dry mass 0.9836 kg, heating value, net 21.5 MJ, water content 0.0166734, wet mass 1 kg
  note on carbon content, fossil: C content in 1 kg DM was calculated using data in Tab A.5, ecoinvent v2.2 report 13_I
- waste wood, untreated: -8330 kg; lognormal variance with pedigree 0.0001, pedigree (1,2,1,1,1)
  (same comment as for cement mortar)
  production volume
    (same comment as for waste bitumen)
  properties: carbon content, non-fossil 0.48632, dry mass 0.8 kg, heating value, net 13.99 MJ, water content 0.25, wet mass 1 kg
  note on carbon content, non-fossil: Tab A.4, ecoinvent v2.2 report 13_I. C content has been referred to 1 kg DM,
  note on heating value, net: Value taken from the general comment of the treatment dataset.
- zinc coat, coils: 30.6 m2; lognormal variance with pedigree 0.0401, pedigree (1,2,5,1,1)
  (same comment as for aluminium, wrought alloy)
- zinc coat, pieces: 104 m2; lognormal variance with pedigree 0.0401, pedigree (1,2,5,1,1)
  (same comment as for aluminium, wrought alloy)

## Inputs from nature
- Occupation, construction site [natural resource, land]: 53.9 m2*year; lognormal variance with pedigree 0.0801, pedigree (1,2,5,1,1)
  Modelled, based on "Agricultural Buildings" - pdf-document on the dedicated talk page of ecoinvent (www.ecoinvent.org/talk-pages)
- Occupation, urban, discontinuously built [natural resource, land]: 2700 m2*year; lognormal variance with pedigree 0.0801, pedigree (1,2,5,1,1)
  (same comment as for Occupation, construction site)
- Transformation, from pasture, man made [natural resource, land]: 53.9 m2; lognormal variance with pedigree 0.1601, pedigree (1,2,5,1,1)
  (same comment as for Occupation, construction site)
- Transformation, to urban, discontinuously built [natural resource, land]: 53.9 m2; lognormal variance with pedigree 0.1601, pedigree (1,2,5,1,1)
  (same comment as for Occupation, construction site)

## Sampling procedure
The inventory is calculated based on a solid database of agricultural buildings.

## Review by Roland Hischier 2003-08-06
Passed.

## Review by Roland Hischier 2011-09-28
Transfer of documentation done.
