# transport, freight, light commercial vehicle

Dataset: EcoSpold 2, unit process
Geography: CH
Time period: 2005-01-01 to 2023-12-31
Technology level: current
Classification: ISIC rev.4 ecoinvent: 4923:Freight transport by road
Scenario: Business-as-Usual
System model: Allocation, cut-off by classification
Share of production covered: 100 %
Generated by: Michael Spielmann (obsolete)
Published in: Spielmann M. 2007
Database: ecoinvent
isCopyrightProtected: true
accessRestrictedTo: 1

## General comment
Inventory refers to the entire transport life cycle. For road infrastructure, expenditures and environmental interventions due to construction of roads have been allocated based on the Gross tonne kilometre performance. Expenditures due to operation of the road infrastructure, as well as land use have been allocated based on the yearly vehicle kilometre performance. For the attribution of vehicle share to the transport performance a vehicle life time performance of 2.39E05 pkm/vehicle has been assumed. The data of the energy use and combustion emissions are average data for the operation of an average Swiss van (fleet average) in the year 2005, comprising various emission technologies.

## Included activities end
operation of vehicle; production and maintenance of vehicles; construction of road. In the energy use and combustion emissions dataset, fuel consumption is included. Direct airborne emissions of gaseous substances, particulate matters and heavy metals are accounted for. Particulate emissions comprise exhaust- and abrasions emissions. Heavy metal emissions to soil and water caused by tyre abrasion are included.

## Geography
The data for vehicle operation and road infrastructure reflect Swiss conditions. Data for vehicle manufacturing and maintenance represents generic European data. Data for the energy use and combustion emissions reflect the Swiss situation.

## Technology
Petrol, various emission treatment standards. Diesel and petrol vehicles.

## Reference product
- transport, freight, light commercial vehicle: 1 metric ton*km; By-product classification allocatable product; CPC 65119: Other road transport services of freight
  production volume 1.17261e9 metric ton*km; name transport_RP_PV
    Not known
    4343 million vehicle-km ; 3.7037 km/tkm (ecoinvent v2 report 14)
  property price 0.59595 EUR2005
    Calculated based on inputs: The price of the product has been calculated as a sum of the values of the material and energy inputs for this product. This value is therefore a rough estimation. It may underestimate the real price since there are additional expenses when producing any product. These expences can include for example labour costs, treatment of waste materials and profit for the producer. Please consider carefully whether this level of data quality is acceptable for your application.
  properties: carbon allocation 0 kg, carbon content 0

## Inputs from technosphere
- diesel, low-sulfur: 0.203629 kg; lognormal variance with pedigree 0.0406, pedigree (1,1,5,1,1)
  Energy use and combustion emissions
  Uncertainty: d
  properties: carbon content, fossil 0.865, dry mass 1 kg, heating value, net 42.8 MJ, wet mass 1 kg
- light commercial vehicle: 1.6835e-5 unit; lognormal variance with pedigree 0.342025, pedigree (3,1,5,2,1)
  Uncertainty: o
- maintenance, light commercial vehicle: 1.6835e-5 unit; lognormal variance with pedigree 0.342025, pedigree (3,1,5,2,1)
  activityLink introduced to establish a direct link to the corresponding regional supply of this product
  Uncertainty: o
- petrol, low-sulfur: 0.120622 kg; lognormal variance with pedigree 0.0406, pedigree (1,1,5,1,1)
  Energy use and combustion emissions
  Uncertainty: d
  properties: carbon content, fossil 0.865, dry mass 1 kg, heating value, net 42.5 MJ, wet mass 1 kg
  note on heating value, net: Based on literature, page 611, Report 17: Jungbluth, N., Chudacoff, M., Dauriat, A., Dinkel, F., Doka, G., Faist Emmenegger, M., Gnansounou, E., Kljun, N., Schleiss, K., Spielmann, M., Stettler, C., Sutter, J. 2007: Life Cycle Inventories of Bioenergy. ecoinvent report No. 17, Swiss Centre for Life Cycle Inventories, Dübendorf, CH.
- road: 0.0056148 m*year; lognormal variance with pedigree 0.342, pedigree (3,1,5,1,1)
  (same comment as for maintenance, light commercial vehicle)
- road maintenance: 0.00146774 m*year; lognormal variance with pedigree 0.342, pedigree (3,1,5,1,1)
  Calculated value based demand factors and underlying assumptions for European road transport services. Values are based on total vkm of all road transport services (RER) and the relative shares of each specific form (e.g. 3.5-7.5t lorry). The value per tkm is then based on the average load factor (see Activity Description). Transport performance data is derived from TREMOVE (2009).
  Uncertainty: o

## Emissions to nature
- Acetaldehyde [air, unspecified]: 3.3144e-5 kg; lognormal variance with pedigree 0.0812, pedigree (2,3,5,1,1)
  Energy use and combustion emissions
  Uncertainty: d
- Ammonia [air, unspecified]: 3.98592e-5 kg; lognormal variance with pedigree 0.0512, pedigree (2,3,5,1,1)
  Energy use and combustion emissions
  Uncertainty: d
- Benzene [air, unspecified]: 9.25295e-5 kg; lognormal variance with pedigree 0.08, pedigree (1,1,5,1,1)
  Energy use and combustion emissions
  Uncertainty: d
- Cadmium II [air, unspecified]: 3.82629e-9 kg; lognormal variance with pedigree 0.756, pedigree (4,5,5,1,1)
  Energy use and combustion emissions
  Uncertainty: t
- Carbon dioxide, fossil [air, unspecified]: 1.00137 kg; lognormal variance with pedigree 0.0406, pedigree (2,1,5,1,1)
  Energy use and combustion emissions
  Uncertainty: o
- Carbon monoxide, fossil [air, unspecified]: 0.0172866 kg; lognormal variance with pedigree 0.69, pedigree (1,1,5,1,1)
  Energy use and combustion emissions
  Uncertainty: d
- Chromium III [air, unspecified]: 4.65259e-8 kg; lognormal variance with pedigree 0.756, pedigree (4,5,5,1,1)
  Energy use and combustion emissions
  Uncertainty: t
- Chromium VI [air, unspecified]: 3.09166e-11 kg; lognormal variance with pedigree 0.756, pedigree (4,5,5,1,1)
  Energy use and combustion emissions
  Uncertainty: o
- Copper ion [air, unspecified]: 2.75133e-6 kg; lognormal variance with pedigree 0.756, pedigree (4,5,5,1,1)
  Energy use and combustion emissions
  Uncertainty: t
- Dinitrogen monoxide [air, unspecified]: 2.18015e-5 kg; lognormal variance with pedigree 0.0812, pedigree (2,3,5,1,1)
  Energy use and combustion emissions
  Uncertainty: d
- Formaldehyde [air, unspecified]: 6.1474e-5 kg; lognormal variance with pedigree 0.0812, pedigree (2,3,5,1,1)
  Energy use and combustion emissions
  Uncertainty: d
- Lead II [air, unspecified]: 1.42159e-7 kg; lognormal variance with pedigree 0.756, pedigree (4,5,5,1,1)
  Energy use and combustion emissions
  Uncertainty: t
- Mercury II [air, unspecified]: 6.18333e-12 kg; lognormal variance with pedigree 0.756, pedigree (4,5,5,1,1)
  Energy use and combustion emissions
  Uncertainty: t
- Methane, fossil [air, unspecified]: 6.40629e-5 kg; lognormal variance with pedigree 0.08, pedigree (1,1,5,1,1)
  Energy use and combustion emissions
  Uncertainty: d
- NMVOC, non-methane volatile organic compounds [air, unspecified]: 0.000655962 kg; lognormal variance with pedigree 0.08, pedigree (1,1,5,1,1)
  Energy use and combustion emissions
  Uncertainty: d
- Nickel II [air, unspecified]: 4.38074e-8 kg; lognormal variance with pedigree 0.756, pedigree (4,5,5,1,1)
  Energy use and combustion emissions
  Uncertainty: t
- Nitrogen oxides [air, unspecified]: 0.00423111 kg; lognormal variance with pedigree 0.08, pedigree (1,1,5,1,1)
  Energy use and combustion emissions
  Uncertainty: d
- PAH, polycyclic aromatic hydrocarbons [air, unspecified]: 1.48148e-9 kg; lognormal variance with pedigree 1.5812, pedigree (2,3,5,1,1)
  Energy use and combustion emissions
  Uncertainty: r
- Particulate Matter, < 2.5 um [air, unspecified]: 4.77e-5 kg; lognormal variance with pedigree 0.3401, pedigree (1,1,5,3,1)
  Energy use and combustion emissions
  Uncertainty: i
- Particulate Matter, > 10 um [air, unspecified]: 5.36814e-5 kg; lognormal variance with pedigree 0.0807, pedigree (1,3,5,3,1)
  Energy use and combustion emissions
  Uncertainty: a
- Particulate Matter, > 2.5 um and < 10um [air, unspecified]: 6.66888e-5 kg; lognormal variance with pedigree 0.1627, pedigree (3,3,5,3,1)
  Energy use and combustion emissions
  Uncertainty: a
- Selenium IV [air, unspecified]: 3.09166e-9 kg; lognormal variance with pedigree 0.756, pedigree (4,5,5,1,1)
  Energy use and combustion emissions
  Uncertainty: t
- Sulfur dioxide [air, unspecified]: 3.24252e-5 kg; lognormal variance with pedigree 0.0406, pedigree (2,1,5,1,1)
  Energy use and combustion emissions
  Uncertainty: o
- Toluene [air, unspecified]: 8.05295e-5 kg; lognormal variance with pedigree 0.08, pedigree (1,1,5,1,1)
  Energy use and combustion emissions
  Uncertainty: d
- Xylenes, unspecified [air, unspecified]: 8.10147e-5 kg; lognormal variance with pedigree 0.08, pedigree (1,1,5,1,1)
  Energy use and combustion emissions
  Uncertainty: d
- Zinc II [air, unspecified]: 1.14474e-6 kg; lognormal variance with pedigree 0.756, pedigree (4,5,5,1,1)
  Energy use and combustion emissions
  Uncertainty: t
- Cadmium II [soil, unspecified]: 3.03655e-10 kg; lognormal variance with pedigree 0.208, pedigree (5,5,5,1,1)
  Energy use and combustion emissions
  Uncertainty: a
- Chromium III [soil, unspecified]: 1.44818e-9 kg; lognormal variance with pedigree 0.208, pedigree (5,5,5,1,1)
  Energy use and combustion emissions
  Uncertainty: a
- Copper ion [soil, unspecified]: 2.03215e-8 kg; lognormal variance with pedigree 0.208, pedigree (5,5,5,1,1)
  Energy use and combustion emissions
  Uncertainty: a
- Lead II [soil, unspecified]: 1.24967e-8 kg; lognormal variance with pedigree 0.208, pedigree (5,5,5,1,1)
  Energy use and combustion emissions
  Uncertainty: a
- Nickel II [soil, unspecified]: 3.92407e-9 kg; lognormal variance with pedigree 0.208, pedigree (5,5,5,1,1)
  Energy use and combustion emissions
  Uncertainty: a
- Zinc II [soil, unspecified]: 8.57592e-7 kg; lognormal variance with pedigree 0.208, pedigree (5,5,5,1,1)
  Energy use and combustion emissions
  Uncertainty: a
- Cadmium II [water, unspecified]: 3.03655e-10 kg; lognormal variance with pedigree 0.468, pedigree (5,5,5,1,1)
  Energy use and combustion emissions
  Uncertainty: a
- Chromium III [water, unspecified]: 1.44818e-9 kg; lognormal variance with pedigree 0.468, pedigree (5,5,5,1,1)
  Energy use and combustion emissions
  Uncertainty: a
- Copper ion [water, unspecified]: 2.03215e-8 kg; lognormal variance with pedigree 0.468, pedigree (5,5,5,1,1)
  Energy use and combustion emissions
  Uncertainty: a
- Lead II [water, unspecified]: 1.24967e-8 kg; lognormal variance with pedigree 0.808, pedigree (5,5,5,1,1)
  Energy use and combustion emissions
  Uncertainty: a
  property carbon content, fossil 0; name C_content_fossil
  property carbon content, non-fossil 0; name C_content_non_fossil
  property dry mass 1 kg; name DM
  property water content 0; name water_content
  property water in wet mass 0 kg; name WWM
  property wet mass 1 kg; name WM
- Nickel II [water, unspecified]: 3.92407e-9 kg; lognormal variance with pedigree 0.808, pedigree (5,5,5,1,1)
  Energy use and combustion emissions
  Uncertainty: a
- Zinc II [water, unspecified]: 8.57592e-7 kg; lognormal variance with pedigree 0.808, pedigree (5,5,5,1,1)
  Energy use and combustion emissions
  Uncertainty: a

## Sampling procedure
Literature data.
