# sand quarry operation, extraction from river bed

Dataset: EcoSpold 2, unit process
Geography: IN
Time period: 2014-04-01 to 2023-12-31
Technology level: current
Classification: ISIC rev.4 ecoinvent: 0810:Quarrying of stone, sand and clay
Synonyms: natural sand; sand; aggregate; river bed sand
Scenario: Business-as-Usual
System model: Allocation, cut-off by classification
Generated by: P V Kiran Ananth
Published in: Kiran Ananth P. V. 2017
Database: ecoinvent
isCopyrightProtected: true
accessRestrictedTo: 1

## General comment
This dataset describes mining of natural sand from riverbed deposits and its processing. Sand quarry operation, extraction from river bed BR have been used as a template for this dataset. All values in the dataset have been reviewed and the actiity considered to be representative of the Indian condition.Pumps dredge the slurry, which consists of sand, water, clay, slit, and gravel, from the river bed. The sand is separated from the slurry and transported by a vessel to the loading ports, where the sand is washed to clean fines and transported to the storage piles. The sand"s coproduct (clay and silt) return to the river during the process not being recovered for economic purpose, furthermore they dont receive any allocation. The dataset includes the sand extraction and processing, as well as equipment maintenance. Machinery is taken into account within the dataset "diesel, burned in building machine", as all machinery runs on diesel. Administration buildings and the quarry’s end of life are not taken into account. Data were collected from literature and some data were retreived from sand quarry operation, extraction from river bed BR 2015 accessed on 12032018.The representativeness of the dataset on a national scale is low.
When rocks erode out of the Rocky Mountains and are carried downstream by streams and rivers, they break apart making sand and gravel. The sand and gravel settles out of the water and form the river bed. As the river channel moves across the landscape, the sand and gravel (aggregate) deposits are left behind.
Sand and gravel have a variety of uses including: road building, construction, concrete production, landscaping, glass manufacturing, sand casting in iron and steel foundries etc.

## Included activities start
From the extraction of sand from the river bed by dredging.

## Included activities end
The activities end with the sand in storage piles at the loading port. Includes the dredging of the slurry (a mix of sand, water, clay, silt, and gravel). The sand is separated from the slurry and transported by a vessel to the loading ports, where the sand is washed to clean fines and transported to the storage piles. The dataset also includes the land use for sand processing (at river bank). Machinery is considered within the dataset "diesel burned in building machine". Administration buildings not included. No dust included because it is a wet process. Sand sorting by grain size is not included.

## Geography
Data represents for Indian Geography. Some data were referred from sand quarry operation, extraction from river bed BR 2015 accessed on 12032018.

## Technology
Some of the data referred from sand quarry operation, extraction from river bed BR 2015 accessed on 12032018.

## Time period
Time period considered between year 2014 and year 2016 as most of the data avialable for above period.

## Parameters
- diesel consumption for port operations: 0.000566 l; name diesel_port; lognormal variance with pedigree 0.0052, pedigree (2,4,1,5,1)
  Data refered from snad quarry operation, extration from river bed accessed on 12032018
  Uncertainty: D
- diesel consumption for pump operation: 0.00025 l; name diesel_pump; lognormal variance with pedigree 0.0126, pedigree (3,5,1,5,1)
  (same comment as for diesel consumption for port operations)
- diesel consumption for transport operation: 0.000572262 l; name diesel_transport; = 8,74E-06/diesel_density*55; lognormal variance with pedigree 0.13, pedigree (1,5,1,5,1)
  (same comment as for diesel consumption for port operations)

## Reference product
- sand: 1 kg; By-product classification allocatable product; CPC 15310: Natural sands; HS2017 250590: Sands; natural, (other than silica and quartz sands), whether or not coloured, (other than metal-bearing sa[...]
  production volume 1.381e9 kg; name sand_PV; = 1381*1000*1000
    As per the Goverment of India Notification S.O. 423(E) dated 10th February 2015, "Quartz" has been declared as "Minor Mineral", hence the production beyond January 2015 is not available with Indian Bureau of Mines. The production of quartz was at 1,381 thousand tonnes in 2014-15 (up to January 2015) as against 1,489 thousand tonnes for the preceding full year.
    Ref:- Indian minerals yearbook 2015 Quartz and Other Silica Minerals Data mentioned has high uncertainty value.
  property price 0.00651133 EUR2005
    Price, average unit value, dollars per metric ton in 2022 of construction sand and gravel of 11 USD/metric ton. Same price for the products "sand" and "gravel, round", since they are quarried together. The price is the annual average free-on-board
    plant prices, usually at the first point of sale or captive use, as reported by construction-sand-and-gravel-producing companies. This value does not include transportation from the plant or yard to the consumer. it does, however, include all costs of mining, processing, in-plant transportation, overhead, and profit. Value retrieved from USGS, Mineral Commodity Summaries 2023, accessed on 20230918: https://pubs.usgs.gov/periodicals/mcs2023/mcs2023-sand-gravel.pdf from https://www.usgs.gov/centers/national-minerals-information-center/construction-sand-and-gravel-statistics-and
    The price was converted to EUR based on the annual exchange rates published by the European Central Bank (https://sdw.ecb.europa.eu/quickview.do?SERIES_KEY=120.EXR.A.USD.EUR.SP00.A, last accessed on 2023-06-01) and adjusted for inflation relative to 2005 using the producer price index (PPI) of the euro area, published by eurostat (https://ec.europa.eu/eurostat/databrowser/view/STS_INPP_A__custom_6416181/default/table?lang=en, last accessed on 2023-06-01).
  property transport distance 55 km; name sand_transport
    Calculated value, internal transport within the industrial process, measured distance mine-port of one industry. Sand mined with barges needs to be transported from the river to the port.
  properties: carbon allocation 0 kg, carbon content 0, carbon content, fossil 0, carbon content, non-fossil 0, dry mass 1 kg, water content 0, water in wet mass 0 kg, wet mass 1 kg

## Inputs from technosphere
- building, hall: 1.13e-7 m2; lognormal variance with pedigree 0.316, pedigree (3,4,3,5,3)
  Data referred from sand quarry operation, extraction from river bed BR 2015 accessed on 12032018. As there were no data record for Indian specific quarry operation
- diesel, burned in building machine: 0.0502194 MJ; = (0.000008/0.025926)+(diesel_pump+diesel_transport+diesel_port)*net_cal_value*35.952; source Duarte, J. 2017; lognormal variance with pedigree 0.0452, pedigree (3,4,5,1,2)
  Diesel consumption for excavator reffered from data collected form 3 units. Weighted average considered. Per hour excavator consumes 10 liter of diesel and excavate 70 m3 of sand. Thus diesel consumption is 8E-05 kg per kg excavation. 0.025926 is conversion factor to convert kg of diesel to heat value. Diesel for transportation, pump & port were refered from sand quarry operation extraction from river bed BR 2015 accessed on 12032018.
  property density 0.84 kg/l; name diesel_density
  property heating value, net 1 MJ; name net_cal_value
  note on heating value, net: Literature value, net heating value, Table 5.1 (Weidema et al., 2013) per liter of diesel (MJ / liter)
- electricity, medium voltage: 0.00013 kWh; lognormal variance with pedigree 0.0458, pedigree (2,4,5,5,2)
  Data referred from sand quarry operation, extraction from river bed BR 2015 accessed on 12032018. As there were no data record for Indian specific quarry operation. Electricity used for building (Administrative work).
- scrap steel: -1.8e-5 kg; name scrap_steel; = steel; lognormal variance with pedigree 0.0206, pedigree (4,4,1,5,3)
  Data referred from sand quarry operation, extraction from river bed BR 2015 accessed on 12032018. As there were no data record for Indian specific quarry operation
  Uncertainty: D
  production volume; = sand_PV * (scrap_steel / sand)
    Calculated from production volume of reference product using the relative outputs.
  properties: dry mass 1 kg, wet mass 1 kg
- steel, low-alloyed, hot rolled: 1.8e-5 kg; name steel; lognormal variance with pedigree 0.0226, pedigree (4,4,3,5,3)
  (same comment as for scrap steel)
  properties: carbon content, fossil 0.005, dry mass 1 kg, wet mass 1 kg
  note on carbon content, fossil: Low alloyed steel composition given in Tab. 3.2 ecoinvent v2.2 report 10_partII. Steel assumed to have a C content of 0.5%
- synthetic rubber: 3.44e-6 kg; name rubber; lognormal variance with pedigree 0.0226, pedigree (4,4,3,5,3)
  (same comment as for scrap steel)
  properties: carbon content, fossil 0.871949, dry mass 1 kg, heating value, net 26.42 MJ, wet mass 1 kg
  note on carbon content, fossil: EPDM (Ethylene-propene-diene terpolymer) rubber is a terpolymer of ethylene, propene, and a diene with the residual unsaturated portion of the diene in the side chain (ecoinvent v2.2 report 7-part XX & Ullmann). Chemical formula (deduced from Evidences of Solvent-Induced Miscibility in Polychloroprene-co-Ethylene-Propene Diene Terpolymer Blends, Dubey et al., Journal of Applied Polymer Science, 2009, 111:1884-1891): C20H35
- waste rubber, unspecified: -3.44e-6 kg; name waste_rubber; = rubber; lognormal variance with pedigree 0.0206, pedigree (4,4,1,5,3)
  (same comment as for scrap steel)
  production volume; = sand_PV * (waste_rubber / sand)
    Calculated from production volume of reference product using the relative outputs.
  properties: carbon content, fossil 0.853, dry mass 1 kg, heating value, net 27.19 MJ, wet mass 1 kg
  note on heating value, net: Value taken from the general comment of the treatment dataset.

## Inputs from nature
- Occupation, mineral extraction site [natural resource, land]: 0.005 m2*year; lognormal variance with pedigree 0.081825, pedigree (2,3,5,2,2)
  Data referred from Environmental Impact Assesment Report collected from 3 units. Weighted average data considered.
- Sand, unspecified [natural resource, in ground]: 1 kg; source Calliari, L. 2000, p. 26; lognormal variance with pedigree 0.0126, pedigree (3,5,3,1,1)
  Calculated value. No losses considered in the process.
- Transformation, from river, natural (non-use) [natural resource, land]: 0.0018 m2; lognormal variance with pedigree 0.161825, pedigree (2,3,5,2,2)
  (same comment as for Occupation, mineral extraction site)
- Transformation, to mineral extraction site [natural resource, land]: 0.0018 m2; lognormal variance with pedigree 0.161825, pedigree (2,3,5,2,2)
  (same comment as for Occupation, mineral extraction site)
- Water, unspecified natural origin [natural resource, in water]: 2.61e-7 m3; name water_input; lognormal variance with pedigree 0.042425, pedigree (2,3,5,2,2)
  (same comment as for Occupation, mineral extraction site)

## Emissions to nature
- Water [water, unspecified]: 2.61e-7 m3; = water_input; lognormal variance with pedigree 0.0424, pedigree (2,3,5,1,2)
  Calculated value.

## Sampling procedure
Data collection is mainly based on Environmental Impact Assesment Report from 3 plants. Some of the data referred from sand quarry operation, extraction from river bed BR 2015 accessed on 12032018. Time period considered between year 2014 and year 2016 as most of the data available for above period. Concerned report from which data retrieved have an activity of extraction of sand from river bed in India (and not an activity close to this one).

## Extrapolations
Some data retrieved from sand quarry operation, extraction from river bed BR 2015 accessed on 12032018. Uncertainty adjusted accordingly.
