# o-aminophenol production

Dataset: EcoSpold 2, unit process
Geography: RoW
Time period: 2010-01-01 to 2023-12-31
Technology level: current
Classification: ISIC rev.4 ecoinvent: 2011:Manufacture of basic chemicals
Synonyms: C6H7NO
Scenario: Business-as-Usual
System model: Allocation, cut-off by classification
Share of production covered: 100 %
Generated by: Jürgen Sutter
Database: ecoinvent
isCopyrightProtected: true
accessRestrictedTo: 1

## General comment
The process “o-aminophenol, at plant, GLO" is modelled for the production of o-aminophenol from o-nitrophenol. Raw materials are modelled with a stoechiometric calculation. Emissions are estimated. Energy consumptions, infrastructure and transports are calculated with standard values.
o-Aminophenol (C6H7NO; CAS 95-55-6, 2-aminophenol, 2-hydroxyaniline, 2-amino-1-hydroxybenzene, C.I. Oxidation Base 17, C.I. 76520) forms white orthorhombic bipyramidal needles when crystallized from water or benzene. Acid – base dissociation constants are pK1 4.72 (water at 21 °C), 4.66 (1 vol % ethyl alcohol in water at 25 °C); pK2 9.66 (water at 15 °C), 9.71 (water at 22 °C) Aminophenols are made either by reduction of nitrophenols or by substitution. Reduction is accomplished with iron or with hydrogen in the presence of a catalyst. The last mentioned is the method of choice today for the production of 2- and 4-aminophenol.
Reduction
Iron Reduction
The reduction of nitrophenols with iron turnings takes place in weakly acidic solution or suspension. Before the iron – iron oxide sludge is separated from the solution the product aminophenol must be made water soluble by adding sodium hydroxide. The resulting sodium aminophenolate is very susceptible to oxidation in aqueous solution; various methods are recommended for its purification (see Section Purification). Subsequent to this, the aminophenols are precipitated from acidic solution by neutralization with base and in the absence of air; reducing agents usually must be added during this procedure.
When 2-nitrophenol is reduced with iron, red insoluble colour lakes are formed as byproducts that decrease the yield. Therefore, the iron reduction of 2-nitrophenol is of minor industrial importance today.
Catalytic Reduction
Catalytic reduction usually takes place in solution, emulsion, or suspension in autoclaves or pressurized vessels; after the catalyst is added, the vessel is pressurized with hydrogen. Water and methanol are the preferred solvents; in water the addition of alkali hydroxide, alkali carbonate, or acid has been recommended. Nickel – preferably Raney nickel – or supported precious metals, such as platinum or palladium on activated carbon, or the oxides of these metals are used as catalysts. The catalyst life can be extended, the catalyst consumption decreased, and the product quality enhanced by adding organic solvents that are not miscible with water. The preferred hydrogen pressure is 2 MPa; the hydrogenation can also be performed at atmospheric pressure or at higher pressure up to 6 MPa. The reaction temperature does not exceed 100 – 110 °C.
Reduction of Nitrobenzene
When reducing nitrobenzene in acidic medium, the intermediate phenylhydroxylamine rearranges to 2- and 4-aminophenol before it is further reduced to aniline. The main product of this reaction is 4-aminophenol; byproducts are 2-aminophenol, aniline, and 4,4′-diaminodiphenyl ether:
In the past, metals in dilute sulfuric acid were used as reducing agents. Today, the reducing agent is hydrogen in the presence of precious-metal catalysts, e.g., palladium or platinum. Other catalysts have been suggested: molybdenum and platinum sulfide, and a platinum – ruthenium mixed catalyst. Either the catalysts are used as their oxides, or they are supported on activated carbon.
Dilute aqueous mineral acid is used as reaction medium, for example, dilute sulfuric acid; acidic salts also can be added to the reduction medium.
In a two-step process, nitrobenzene first is selectively reduced to phenylhydroxylamine with hydrogen in the presence of Raney copper and in an organic solvent, such as 2-propanol. The product rearranges to 4-aminophenol after addition of dilute sulfuric acid.
The addition of wetting agents increases the aminophenol yield; these agents must be water soluble and stable in the presence of sulfuric acid. Quaternary ammonium salts that contain at least one alkyl group with at least ten carbon atoms are suitable, e.g., dodecyltrimethylammonium chloride. The reaction usually is performed below 100 °C, either at atmospheric or at higher pressure. Hydrogen is added during the reaction as consumed. The addition of inert organic solvents further increases the yield of 4-aminophenol and the product quality.
In another variant, only 88 % of the nitrobenzene is reduced; after that, the reaction mixture consists of two phases with the precious-metal catalyst (palladium on activated carbon) remaining in the unreacted nitrobenzene phase. Therefore, phase separation is sufficient as workup, and the nitrobenzene phase can be recycled directly to the next batch. The aqueous sulfuric acid phase contains 4-aminophenol and byproduct aniline. After neutralization, the aniline is stripped, and 4-aminophenol is obtained by crystallization after the aqueous phase is purified with activated carbon.
Electrolytic reduction also is possible; this method causes less concern over pollution than metal – acid reduction systems, but it has not yet found industrial application. Electrolysis of nitrobenzene or phenylhydroxylamine in the presence of sulfuric acid or of azoxybenzene in acid solution yields specifically 4-aminophenol.
Substitution
Substitution of various groups by amino or hydroxyl groups is industrially unimportant for the production of 2- and 4-aminophenol, but this type of reaction is used for the synthesis of 2- or 4-aminophenol derivatives.
However, 3-aminophenol cannot be obtained easily by reduction. It is made mainly by the reaction of 3-aminobenzenesulfonic acid with sodium hydroxide or by the reaction of resorcinol with ammonia. Substitution of the sulfonic acid group in 3-aminobenzenesulfonic acid is accomplished by caustic soda fusion (5 – 6 h; 240 – 245 °C). The product is purified by vacuum distillation.
Alternatively, resorcinol reacts with ammonia, for example, in the presence of diammonium phosphate and arsenic pentoxide or ammonium sulfite to form 3-aminophenol. The compound also may be made by hydrolysis of 3-aminoaniline.
Purification
Generally, aminophenols can be purified by sublimation at reduced pressure and higher temperature. 3-Aminophenol may be purified by vacuum distillation; to obtain a colourless product sulfur dioxide is added during distillation or the distillate is collected under a blanket of an unreactive liquid of lower density, such as water.
Another method for purifying aminophenols is the treatment of their aqueous solutions with activated carbon. During this treatment, sodium sulfite, sodium dithionite, or disodium ethylenediaminotetraacetate is added to increase the quality and stability of the products and to chelate heavy-metal ions that would catalyze oxidation. Addition of sodium dithionite, hydrazine, or sodium hydrosulfite also is recommended during precipitation or crystallization of aminophenols.
Contaminants, which are usually present in the 4-aminophenol made by catalytic reduction, can be reduced or even removed completely by a variety of procedures: treatment with 2-propanol7; with aliphatic, cycloaliphatic or aromatic ketones; with aromatic amines; with toluene or low molecular mass alkyl acetates; with phosphoric acid, hydroxyacetic acid, hydroxypropionic acid, or citric acid; or by extraction with methylene chloride, chloroform, or nitroenzene.
Both 2- and 4-aminophenols are strong reducing agents and are employed as photographic developers under the trade names of Atomal and Ortol (2-aminophenol); Activol, Azol, Certinal, Citol, Paranol, Rodinal, Unal, and Ursol P (4-aminophenol); they may be used alone or in combination with hydroquinone. The oxalate salt of 4-aminophenol is marketed under the name of Kodelon.
The aminophenols are versatile intermediates and are employed in the synthesis of virtually every class of stain and dye. In addition, 2-aminophenol is specifically used for shading leather, fur, and hair from grays and browns to yellowish brown. 3-Aminophenol has found application as a hair colorant and as a coupler molecule in hair dyes. 4-Aminophenol is used as an intermediate in the synthesis of pharmaceuticals, as a wood stain imparting a roselike colour to timber, and as a dyeing agent for fur and feathers.
As a result of the close proximity of the amino and hydroxyl groups on the benzene ring and their ease of condensation with suitable reagents, 2-aminophenol is a principal intermediate in the synthesis of such heterocyclic systems as oxyquinolines, phenoxamines, and benzoxazoles. The last-named compounds have been used as inflammation inhibitors. 3-Aminophenol has found use as a stabilizer of chlorine-containing thermoplastics, although its major use is as an intermediate in the production of 4-amino-2-hydroxybenzoic acid, a tuberculostat. Similarly, nitrogen-substituted 4-aminophenols have long been known as antipyretics and analgesics, and the production of these derivatives is a major use of 4-aminophenol.
Frischknecht R., Jungbluth N., Althaus H.-J., Doka G., Dones R., Heck T., Hellweg S., Hischier R., Nemecek T., Rebitzer G. and Spielmann M. (2007) Overview and Methodology. Final report ecoinvent v2.0 No. 1. Swiss Centre for Life Cycle Inventories, Dübendorf, CH, retrieved from: www.ecoinvent.org.
Gendorf (2000) Umwelterklärung 2000, Werk Gendorf. Werk Gendorf, Burgkirchen as pdf-File under: http://www.gendorf.de/pdf/umwelterklaerung2000.pdf
Stephen C. Mitchell/Rosemary H. Waring: Aminophenols. Published online: 2000. In: Ullmann's Encyclopedia of Industrial Chemistry, Seventh Edition, 2004 Electronic Release (ed. Fiedler E., Grossmann G., Kersebohm D., Weiss G. and Witte C.). 7 th Electronic Release Edition. Wiley InterScience, New York, Online-Version under: DOI: 10.1002/14356007.a02_099

## Included activities end
production of o-aminophenol including materials, energy uses, infrastructure, and emissions

## Geography
The inventory is modelled for the world.

## Technology
reduction of o-nitrophenol

## Time period
Time of publications

## Parameters
- fraction, cooling water, cooling pond system, to air: 0.032 dimensionless; name fraction_CW_CP_to_air; lognormal variance with pedigree 0.0413, pedigree (2,3,1,3,1)
  Calculated based on literature value (Scown, C.D., 2011, Water Footprint of U.S. Transportation Fuels and supplying information of the article) (Vionnet, S., Quantis Water Database - Technical Report, 2012).
- fraction, cooling water, once-through system, to air: 0.004 dimensionless; name fraction_CW_OT_to_air; lognormal variance with pedigree 0.0413, pedigree (2,3,1,3,1)
  (same comment as for fraction, cooling water, cooling pond system, to air)
- fraction, cooling water, recirculating system, to air: 0.771 dimensionless; name fraction_CW_R_to_air; lognormal variance with pedigree 0.0413, pedigree (2,3,1,3,1)
  (same comment as for fraction, cooling water, cooling pond system, to air)
- fraction, cooling water, to air: 0.3875 dimensionless; name fraction_CW_to_air; = (0.5*fraction_CW_OT_to_air)+(0.5*fraction_CW_R_to_air); lognormal variance with pedigree 0.092025, pedigree (4,4,3,2,4)
  Calculated value based on literature value (see comments of the other parametres present in this dataset) and expert opinion. In the case when no industry/literature data are available about the type of cooling or directly fraction, cooling water, to air specific for the process a default assumption is applied. It is assumed that the once-through cooling system is used in 50% of all cases and recirculating system is used in another 50% of all cases.

## Reference product
- o-aminophenol: 1 kg; By-product classification allocatable product; CPC 34139: Other alcohols, phenols, phenol-alcohols, and their halogenated, sulphonated, nitrated or nitrosated derivativ[…]; HS2017 290722: Polyphenols; hydroquinone (quinol) and its salts; CAS 95-55-6
  EcoSpold01Location=RER
  production volume 6.7e6 kg
    Expert judgement
  property carbon content, fossil 0.660382
    Calculated based on molecular structure. See tab "chemicals".
  property heating value, net 27.78 MJ
    LHV is calculated based on the elemental composition of the substance. Based on the name of the substance, the chemical formula of the substance is manually found to be: C6H7NO.
  property price 1.65967 EUR2005
    Calculated based on inputs: The price of the product has been calculated as a sum of the values of the material and energy inputs for this product. This value is therefore a rough estimation. It may underestimate the real price since there are additional expenses when producing any product. These expences can include for example labour costs, treatment of waste materials and profit for the producer. Please consider carefully whether this level of data quality is acceptable for your application.
  properties: carbon allocation 0.660382 kg, carbon content 0.660382, carbon content, non-fossil 0, dry mass 1 kg, water content 0, water in wet mass 0 kg, wet mass 1 kg

## Inputs from technosphere
- chemical factory, organics: 4e-10 unit; lognormal variance with pedigree 0.3846, pedigree (2,4,5,5,4)
  Calculated based on literature data published by the industry. For this activity, no information was readily available concerning infrastructure and land-use. Therefore, the infrastructure is estimated based on data from two chemical factories, the BASF site of Ludwigshafen and the chemical factory in Gendorf (which are both located in Germany), which produce a wide range of chemical substances. Based on this data, the following assumptions are made: the built area amounts to about 4.2 ha, the plant has an average output of 50'000 t/a and a lifespan of fifty years. The estimated infrastructure amount is therefore 4.00 E-10 units per kg of produced chemical.
  References:
  Althaus H.-J., Chudacoff M., Hischier R., Jungbluth N., Osses M. and Primas A. (2007) Life Cycle Inventories of Chemicals. ecoinvent report No. 8, v2.0. EMPA Dübendorf, Swiss Centre for Life Cycle Inventories, Dübendorf, CH.
  Gendorf (2000) Umwelterklärung 2000, Werk Gendorf. Werk Gendorf, Burgkirchen.
  EcoSpold01Location=RER
  Uncertainty: Estimation
- electricity, medium voltage: 0.013262, 0.264547, 0.088887, 0.00406128, 0.00081286, 0.000174539, 0.0273186 kWh (7 suppliers, which the file names only by identifier); sum of these 0.399063 kWh; lognormal variance with pedigree 0.0852, pedigree (2,4,5,5,4)
  Calculated based on literature data published by the GENDORF Chemical Park. The factory produced an average of 2462760 tonnes of chemical substances (including intermediates) per year in the years 2015-2019. The average consumption of electricity in the years 2015-2019 was 982796751 kWh per year. This equals 0.39906 kWh/kg chemical produced.
  References:
  Chemiepark GENDORF, Umwelterklärung 2016, https://www.gendorf.de/Nachbarn/Umweltschutz/Industrie%20und%20Nachhaltigkeit
  Chemiepark GENDORF, Umwelterklärung 2017, https://www.gendorf.de/Nachbarn/Umweltschutz/Industrie%20und%20Nachhaltigkeit
  Chemiepark GENDORF, Umwelterklärung 2020, https://www.gendorf.de/Nachbarn/Umweltschutz/Industrie%20und%20Nachhaltigkeit
  EcoSpold01Location=UCTE
  Uncertainty: Estimation
- heat, district or industrial, natural gas: 0.0304984, 1.85597 MJ (2 suppliers, which the file names only by identifier); sum of these 1.88647 MJ; lognormal variance with pedigree 0.0852, pedigree (2,4,5,5,4)
  Calculated based on literature data published by the GENDORF Chemical Park. The factory produced an average of 2462760 tonnes of chemical substances (including intermediates) per year in the years 2015-2019. The average consumption of natural gas in the years 2015-2019 was 4645920000 MJ per year. This equals 1.8865 MJ/kg chemical produced.
  References:
  Chemiepark GENDORF, Umwelterklärung 2016, https://www.gendorf.de/Nachbarn/Umweltschutz/Industrie%20und%20Nachhaltigkeit
  Chemiepark GENDORF, Umwelterklärung 2017, https://www.gendorf.de/Nachbarn/Umweltschutz/Industrie%20und%20Nachhaltigkeit
  Chemiepark GENDORF, Umwelterklärung 2020, https://www.gendorf.de/Nachbarn/Umweltschutz/Industrie%20und%20Nachhaltigkeit
  properties: heating value, net 1 MJ
- heat, from steam, in chemical industry: 0.20781 MJ; lognormal variance with pedigree 0.0852, pedigree (2,4,5,5,4)
  EcoSpold01Location=RER
  Calculated based on literature data published by the GENDORF Chemical Park. The factory produced an average of 2462760 tonnes of chemical substances (including intermediates) per year in the years 2015-2019. The average consumption of steam (internal and external sources) in the years 2015-2019 was 511785800 MJ per year. This equals 0.2078 MJ/kg chemical produced.
  References:
  Chemiepark GENDORF, Umwelterklärung 2016, https://www.gendorf.de/Nachbarn/Umweltschutz/Industrie%20und%20Nachhaltigkeit
  Chemiepark GENDORF, Umwelterklärung 2017, https://www.gendorf.de/Nachbarn/Umweltschutz/Industrie%20und%20Nachhaltigkeit
  Chemiepark GENDORF, Umwelterklärung 2020, https://www.gendorf.de/Nachbarn/Umweltschutz/Industrie%20und%20Nachhaltigkeit
  Uncertainty: Estimation
  properties: heating value, net 1 MJ
- hydrogen, gaseous, medium pressure, merchant: 0.0355936, 0.0223494 kg (2 suppliers, which the file names only by identifier); sum of these 0.057943 kg; lognormal variance with pedigree 0.0655, pedigree (4,5,5,1,1)
  As there was no data available for the production of o-aminophenol, the values for the consumption of the raw materials are calculated with an assumed yield of 95 % (Frischknecht et al. 2007).
  EcoSpold01Location=RER
  Uncertainty: Stoechiometric calculation
  properties: dry mass 1 kg, heating value, net 120.21 MJ, wet mass 1 kg
- o-nitrophenol: 1.3423 kg; lognormal variance with pedigree 0.0655, pedigree (4,5,5,1,1)
  (same comment as for hydrogen, gaseous, medium pressure, merchant)
  properties: carbon content, fossil 0.518048, dry mass 1 kg, heating value, net 20.05 MJ, wet mass 1 kg
  note on carbon content, fossil: Calculated based on molecular structure. See tab "chemicals".
- wastewater, average: -2.26904e-6, -8.07865e-9 m3 (2 suppliers, which the file names only by identifier); sum of these -2.27712e-6 m3; lognormal variance with pedigree 0.0452, pedigree (2,4,1,5,4)
  Calculated based on literature data published by the GENDORF Chemical Park. The factory produced an average of 2462760 tonnes of chemical substances (including intermediates) per year in the years 2015-2019. The average ouput of wastewater going to an external wastewater treatment plant in the years 2015-2019 was 5608 m3 per year. This equals 0.000002277 m3/kg chemical produced.
  References:
  Chemiepark GENDORF, Umwelterklärung 2016, https://www.gendorf.de/Nachbarn/Umweltschutz/Industrie%20und%20Nachhaltigkeit
  Chemiepark GENDORF, Umwelterklärung 2017, https://www.gendorf.de/Nachbarn/Umweltschutz/Industrie%20und%20Nachhaltigkeit
  Chemiepark GENDORF, Umwelterklärung 2020, https://www.gendorf.de/Nachbarn/Umweltschutz/Industrie%20und%20Nachhaltigkeit
  properties: carbon content, non-fossil 0.194039, dry mass 0.346837 kg, mass concentration, TOC 0.1091 kg/m3, mass concentration, calcium 0.039453 kg/m3, mass concentration, chlorine 0.030031 kg/m3, mass concentration, hydrogen 0.013365 kg/m3, mass concentration, nitrogen 0.031015 kg/m3, mass concentration, oxygen 0.069824 kg/m3, mass concentration, sodium 0.06456 kg/m3, mass concentration, sulfur 0.015602 kg/m3, water content 2882.2, wet mass 1000 kg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
  note on carbon content, non-fossil: 0.0673 kg TOC/m3 (Tab A.17, ecoinvent v2.2 report 13_I). TOC was considered as Total Carbon.

## Inputs from nature
- Water, cooling, unspecified natural origin [natural resource, in water]: 0.014707 m3; lognormal variance with pedigree 0.0852, pedigree (2,4,5,5,4)
  Calculated based on literature data published by the GENDORF Chemical Park. The factory produced an average of 2462760 tonnes of chemical substances (including intermediates) per year in the years 2015-2019. The average amount of cooling water released in the years 2015-2019 was 34408800 t per year. It was assumed that 5% of the cooling water was emitted to air during its use, therefore, to calculate the input of cooling water, the output value reported by GENDORF was scaled up by the factor 1/0.95. This equals 0.014707 m3/kg chemical produced.
  References:
  Chemiepark GENDORF, Umwelterklärung 2016, https://www.gendorf.de/Nachbarn/Umweltschutz/Industrie%20und%20Nachhaltigkeit
  Chemiepark GENDORF, Umwelterklärung 2017, https://www.gendorf.de/Nachbarn/Umweltschutz/Industrie%20und%20Nachhaltigkeit
  Chemiepark GENDORF, Umwelterklärung 2020, https://www.gendorf.de/Nachbarn/Umweltschutz/Industrie%20und%20Nachhaltigkeit
  Uncertainty: Estimation
- Water, river [natural resource, in water]: 0.000965426 m3; lognormal variance with pedigree 0.0852, pedigree (2,4,5,5,4)
  Calculated based on literature data published by the GENDORF Chemical Park. The factory produced an average of 2462760 tonnes of chemical substances (including intermediates) per year in the years 2015-2019. The average consumption of river water in the years 2015-2019 was 22000820 t per year. However, since the cooling water is modelled as an input, the amount of river water was adjusted to avoid double counting. 55% of the input amount of cooling water was deducted from the amount of river water, as that is the share of river water versus well water. This equals 0.00096543 m3/kg chemical produced.
  References:
  Chemiepark GENDORF, Umwelterklärung 2016, https://www.gendorf.de/Nachbarn/Umweltschutz/Industrie%20und%20Nachhaltigkeit
  Chemiepark GENDORF, Umwelterklärung 2017, https://www.gendorf.de/Nachbarn/Umweltschutz/Industrie%20und%20Nachhaltigkeit
  Chemiepark GENDORF, Umwelterklärung 2020, https://www.gendorf.de/Nachbarn/Umweltschutz/Industrie%20und%20Nachhaltigkeit
- Water, well, in ground [natural resource, in water]: 0.000816522 m3; lognormal variance with pedigree 0.0852, pedigree (2,4,5,5,4)
  Calculated based on literature data published by the GENDORF Chemical Park. The factory produced an average of 2462760 tonnes of chemical substances (including intermediates) per year in the years 2015-2019. The average consumption of well water in the years 2015-2019 was 18607480 t per year. However, since the cooling water is modelled as an input, the amount of well water was adjusted to avoid double counting. 45% of the input amount of cooling water was deducted from the amount of well water, as that is the share of well water versus river water. This equals 0.00081652 m3/kg chemical produced.
  References:
  Chemiepark GENDORF, Umwelterklärung 2016, https://www.gendorf.de/Nachbarn/Umweltschutz/Industrie%20und%20Nachhaltigkeit
  Chemiepark GENDORF, Umwelterklärung 2017, https://www.gendorf.de/Nachbarn/Umweltschutz/Industrie%20und%20Nachhaltigkeit
  Chemiepark GENDORF, Umwelterklärung 2020, https://www.gendorf.de/Nachbarn/Umweltschutz/Industrie%20und%20Nachhaltigkeit

## Emissions to nature
- Carbon dioxide, fossil [air, urban air close to ground]: 0.12747 kg; lognormal variance with pedigree 0.1786, pedigree (4,5,5,5,5)
  The remaining amount of unreacted o-nitropohenol is assumed to leave the production process with the wastewater. Further it is assumed that this wastewater is treated in a internal wastewater plant. The removal efficiency for o-nitropohenol is assumed with 100%. The carbon contained in the removed o-nitropohenol is accounted as CO2 emissions to air. The nitrogen in the removed o-nitropohenol is accounted as nitrogen emission to air.
  Uncertainty: Estimation
- Hydrogen [air, urban air close to ground]: 0.12747 kg; lognormal variance with pedigree 0.1786, pedigree (4,5,5,5,5)
  There was no data available on process emissions to air for the production of o-aminophenol. As approximation the air emissions occurring from the purge vent, the distillation vent and fugitive emission sources were estimated to 0.2% of the hydrogen input. The remaining hydrogen is considered to be oxidated to water.
  Uncertainty: Estimation
- Water [air, unspecified]: 0.00147008 m3; lognormal variance with pedigree 0.1246, pedigree (2,4,5,5,4)
  Calculated based on literature data published by the GENDORF Chemical Park. The factory produced an average of 2462760 tonnes of chemical substances (including intermediates) per year in the years 2015-2019. To determine the emissions of water to air, the difference of all water inputs (from river, well, tap water and cooling) and outputs (wastewater, emissions to water) was calculated. The average ouput of water to air in the years 2015-2019 was 3620444 m3 per year. This equals 0.00147 m3/kg chemical produced. For more information on the other water exchanges please consult the respective exchange comment.
  References:
  Chemiepark GENDORF, Umwelterklärung 2016, https://www.gendorf.de/Nachbarn/Umweltschutz/Industrie%20und%20Nachhaltigkeit
  Chemiepark GENDORF, Umwelterklärung 2017, https://www.gendorf.de/Nachbarn/Umweltschutz/Industrie%20und%20Nachhaltigkeit
  Chemiepark GENDORF, Umwelterklärung 2020, https://www.gendorf.de/Nachbarn/Umweltschutz/Industrie%20und%20Nachhaltigkeit
  property fraction, origin: fresh water 0; name fraction_origin_fresh_water
  property fraction, origin: salt water 0; name fraction_origin_salt_water
  property fraction, origin: unspecified 1; name fraction_origin_unspecified
- Water [water, unspecified]: 0.0150391 m3; lognormal variance with pedigree 0.1246, pedigree (2,4,5,5,4)
  Calculated based on literature data published by the GENDORF Chemical Park. The factory produced an average of 2462760 tonnes of chemical substances (including intermediates) per year in the years 2015-2019. The amount of water released back to the environment consists of the sum of the amount of process water treated in the internal WWTP that is then released back to the environment and the amount of cooling water released back to the environment. The average ouput of the internal WWTP in the years 2015-2019 was 2628800 m3 and that of cooling water released back to the environment was 34408800 m3. This gives a yearly average of 37037600 m3 emissions of water to water. This equals 0.01504 m3/kg chemical produced.
  References:
  Chemiepark GENDORF, Umwelterklärung 2016, https://www.gendorf.de/Nachbarn/Umweltschutz/Industrie%20und%20Nachhaltigkeit
  Chemiepark GENDORF, Umwelterklärung 2017, https://www.gendorf.de/Nachbarn/Umweltschutz/Industrie%20und%20Nachhaltigkeit
  Chemiepark GENDORF, Umwelterklärung 2020, https://www.gendorf.de/Nachbarn/Umweltschutz/Industrie%20und%20Nachhaltigkeit
  property fraction, origin: fresh water 0; name fraction_origin_fresh_water_Ww
  property fraction, origin: salt water 0; name fraction_origin_salt_water_Ww
  property fraction, origin: unspecified 1; name fraction_origin_unspecified_Ww

## Sampling procedure
Literature data

## Extrapolations
Emissions are modelled with standard methods.
