# transport, pipeline, long distance, natural gas

Dataset: EcoSpold 2, unit process
Geography: RER w/o DE+NL+RU
Time period: 2000-01-01 to 2023-12-31
Technology level: current
Classification: EcoSpold01Categories: natural gas/production
Classification: ISIC rev.4 ecoinvent: 4930:Transport via pipeline
Scenario: Business-as-Usual
System model: Allocation, cut-off by classification
Share of production covered: 100 %
Generated by: Mireille Faist Emmenegger
Published in: Faist Emmenegger, Mireille 2015
Database: ecoinvent
isCopyrightProtected: true
accessRestrictedTo: 1

## General comment
The average composition (for the leakages) of the gas corresponds to the module "natural gas, at long distance transport RER".
This dataset describes the transport from the Germany to importing countries in Europe. Leakages per 1'000 km are based on on data collected by Marcogaz by several natural gas companies..
[This dataset is meant to replace the following datasets:
- transport, pipeline, long distance, natural gas, RER w/o DE+NL+NO, 1994 - 2000]

## Included activities end
This dataset describes the energy consumption and the emissions linked to the transport of 1 tkm average natural gas in Europe.

## Geography
The data for emissions and for energy requirements is based on the environmental report of a Dutch company as in the ecoinvent v2 datasets.

## Technology
Long-distance gas transport onshore with average compressor station.

## Time period
The data for emissions is from 1994, the data for energy requirements from 2001.

## Reference product
- transport, pipeline, long distance, natural gas: 1 metric ton*km; By-product classification allocatable product; CPC 65131: Transport services via pipeline of petroleum and natural gas
  EcoSpold01Location=RER
  production volume 1.472e10 metric ton*km; name RP_PV_1; = 23e+9*0.8*800/1000
    23 e9 Nm3 exported in 2013. Assumption: average 800 km distance transported, density 0.8 kg/Nm3
  property price 0.106 EUR2005
    Same calculations in file R61. The variations is due to industry price per MJ, which has been updated to prices in EU27 in 2005 (http://epp.eurostat.ec.europa.eu/tgm/table.do?tab=table&init=1&language=en&pcode=ten00112&plugin=1).
  properties: carbon allocation 0 kg, carbon content 0

## Inputs from technosphere
- natural gas, burned in gas turbine: 0.781488 MJ; = 0.788*(36.0/36.3)
  Based on information from industry experts (German and Swiss data from 2001, ecoinvent report version 2). Value from tab. 7.14 in Faist Emmengger et al. (2007) reintroduced for v3.9 to reflect that the reference product of 'natural gas, burned in gas turbine' was changed back to the fuel input (rather than the output of electricity). The amount is corrected for the difference in NCV (v2: 36.3 vs. v3.9: 36.0 MJ/m3) assumed in the supplying datasets.
- natural gas, high pressure: 1.18861e-5, 7.25256e-6, 4.95663e-5, 2.26246e-6, 2.17852e-5, 1.51647e-5, 3.52418e-6, 4.15247e-6, 3.35833e-6, 7.65298e-7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 m3 (19 suppliers, which the file names only by identifier); sum of these 0.0002375 m3; = methane_losses/0.7; lognormal variance with pedigree 0.0418, pedigree (2,3,5,1,1)
  EcoSpold01Location=DE
  calculated based on leakage (methane losses) and methane content in gas.
  Uncertainty: published data 1994
  properties: carbon content, fossil 0.602381, dry mass 0.84 kg, heating value, net 36 MJ, wet mass 0.84 kg
  note on carbon content, fossil: An average C content of 0.506 kg C/ m3 has been assumed (this average has been calculated using data in Tab 3.5, ecoinvent v2.2 report 6_V
  note on heating value, net: Literature value, Source: Christoph Meili;Niels Jungbluth;Maresa Bussa (2021) Life cycle inventories of crude oil and natural gas extraction. ESU-services Ltd. commissioned by BAFU & VSG, Schaffhausen, Switzerland, http://esu-services.ch/data/public-lci-reports/
- pipeline, natural gas, long distance, high capacity, offshore: 5.95e-10 km; lognormal variance with pedigree 0.3186, pedigree (3,3,4,1,3)
  based on estimated standard capacity and statistics
  EcoSpold01Location=GLO
  Uncertainty: based on estimated standard capacity and statistics
- pipeline, natural gas, long distance, low capacity, onshore: 2.38e-9 km; lognormal variance with pedigree 0.3186, pedigree (3,3,4,1,3)
  EcoSpold01Location=GLO
  based on estimated standard capacity and statistics
  Uncertainty: based on estimated standard capacity and statistics
- waste mineral oil: -1.16e-6 kg; name waste_min_oil; lognormal variance with pedigree 0.0113, pedigree (2,3,1,3,1)
  based on dutch data. Originates from the condensing of natural gas in the pipelines.
  EcoSpold01Location=CH
  Uncertainty: based on dutch data
  production volume; = waste_min_oil* RP_PV_1
    Calculated from the production volume of transport, pipeline, long distance, natural gas in proportion to the respective output amounts.
  properties: carbon content, fossil 0.864444, dry mass 0.9 kg, heating value, net 34.7 MJ, water content 0.111111, wet mass 1 kg
  note on carbon content, fossil: Tab A.6, ecoinvent v2.2 report 13_I. C content has been calculated after data in the tables, and then referred to 1 kg DM
  note on heating value, net: Value taken from the general comment of the treatment dataset.

## Emissions to nature
- Butane [air, non-urban air or from high stacks]: 4.75e-7 kg; = 0.00019*0.002/0.8; lognormal variance with pedigree 0.1686, pedigree (2,5,5,1,1)
  calculated based on leakage 0.019% (per 1'000km), gas composition and density 0.8 kg / m3 (conversion to tkm)
  Uncertainty: calculated based on leakage and average gas composition
- Carbon dioxide, fossil [air, non-urban air or from high stacks]: 1.425e-6 kg; = 0.00019*0.006/0.8; lognormal variance with pedigree 0.0492, pedigree (2,5,5,1,1)
  (same comment as for Butane)
- Chlorodifluoromethane [air, non-urban air or from high stacks]: 6.93e-8 kg; lognormal variance with pedigree 0.0493, pedigree (2,3,4,3,1)
  dutch environmental report.Emissions originating from the cooling of compressor stations.
  Uncertainty: dutch environmental report
- Ethane [air, non-urban air or from high stacks]: 6.175e-6 kg; = 0.00019*0.026/0.8; lognormal variance with pedigree 0.1686, pedigree (2,5,5,1,1)
  (same comment as for Butane)
- Mercury II [air, non-urban air or from high stacks]: 2.375e-12 kg; = 0.00019*1e-8/0.8; lognormal variance with pedigree 0.706025, pedigree (4,5,5,2,1)
  (same comment as for Butane)
- Methane, bromochlorodifluoro-, Halon 1211 [air, non-urban air or from high stacks]: 2.24e-8 kg; lognormal variance with pedigree 0.0493, pedigree (2,3,4,3,1)
  dutch environmental report..Emissions originating from the cooling of compressor stations.
  Uncertainty: dutch environmental report
- Methane, fossil [air, non-urban air or from high stacks]: 0.00016625 kg; name methane_losses; = 0.00019*0.7/0.8; lognormal variance with pedigree 0.1686, pedigree (2,5,5,1,1)
  (same comment as for Butane)
- NMVOC, non-methane volatile organic compounds [air, non-urban air or from high stacks]: 2.375e-7 kg; = 0.00019*0.001/0.8; lognormal variance with pedigree 0.1886, pedigree (2,5,5,1,1)
  (same comment as for Butane)
- Propane [air, non-urban air or from high stacks]: 1.425e-6 kg; = 0.00019*0.006/0.8; lognormal variance with pedigree 0.1686, pedigree (2,5,5,1,1)
  (same comment as for Butane)

## Sampling procedure
statistics
