# photovoltaics, electric installation for 3kWp module, at building

Dataset: EcoSpold 2, unit process
Geography: CH
Time period: 1992-01-01 to 2023-12-31
Technology level: current
Classification: ISIC rev.4 ecoinvent: 4390:Other specialized construction activities
Tags: infrastructure; photovoltaic power
Scenario: Business-as-Usual
System model: Allocation, cut-off by classification
Generated by: Niels Jungbluth
Published in: Jungbluth N. 2012
Database: ecoinvent
isCopyrightProtected: true
accessRestrictedTo: 1

## General comment
This infrastructure dataset represents the production of different components and their commissioning for the electric installation of a 3kWp building integrated photovoltaic plant. The electric installation includes all parts between the panel and the grid, but not the inverter as it is modeled in a separate dataset due to its importance. It therefore provides the parts for the connection of the 3kWp PV installation to the grid.
The different parts considered are:
- lightning protection
- cabling in the PV panel area
- fuse box
- cabling from the PV panels to inverter
- cabling from the inverter to the electric meter

## Included activities start
From delivery of the needed materials and parts.

## Included activities end
This activity ends with the finished components of the electric installation.

This dataset includes:
- Materials for the production of the different parts
- Energy use for metal processing (copper wire drawing)
- decommissioning of the installation parts

This dataset doesn't include the energy use for the mounting of the electric installations as this is included in the assembly of all parts for a 3kWp PV plant.
It doesn't include the inverter, as this is modelled in a separate dataset due to its importance.

## Geography
Production in CH.

## Technology
All electric installations for a photovoltaic system with a capacity of 3kWp. The included materials are summarized in the following table.
Source of the table: Jungbluth et al. 2012, p.118

## Time period
The calculation of the annual production volume of the reference product is based on data from 2008. It does not represent an average of the time period 1992-2008.

## Reference product
- photovoltaics, electric installation for 3kWp module, at building: 1 unit; By-product classification allocatable product; CPC 5461: Electrical installation services
  EcoSpold01Location=CH
  production volume 4233.33 unit; name apv_electric_installation
    Not known.
    Production of different components of the electric installation for a 3kWp photovoltaic plant. Total installed capacity in 2000: 12.7MWp in CH. GLO installed PV-power 711MWp (Tab 11.3, ecoinvent v2 report 6_XII)
  property price 71.4311 EUR2005
    Calculated based on inputs: The price of the product has been calculated as a sum of the values of the material and energy inputs for this product. This value is therefore a rough estimation. It may underestimate the real price since there are additional expenses when producing any product. These expences can include for example labour costs, treatment of waste materials and profit for the producer. Please consider carefully whether this level of data quality is acceptable for your application.
  properties: carbon allocation 0 kg, carbon content 0

## Inputs from technosphere
- brass: 0.02 kg; source Schwarz U. 1992; lognormal variance with pedigree 0.089625, pedigree (4,3,5,2,4)
  Literature value. Used in the fuse box.
  See also tab. 11.29 in Jungbluth et al. 2012.
  EcoSpold01Location=CH
  properties: dry mass 1 kg, wet mass 1 kg
- copper, cathode: 14.7 kg; name copper; source Schwarz U. 1992; lognormal variance with pedigree 0.089625, pedigree (4,3,5,2,4)
  Literature value. Used in the lightning protection of the PV plant, in wires, in cable lugs, in wire protections, in grounding wires, and in the switch.
  See also tab. 11.29 in Jungbluth et al. 2012.
  EcoSpold01Location=RER
  properties: dry mass 1 kg, wet mass 1 kg
- epoxy resin, liquid: 0.002 kg; name epoxy; source Schwarz U. 1992; lognormal variance with pedigree 0.089625, pedigree (4,3,5,2,4)
  EcoSpold01Location=RER
  Literature value. Used in the fuse box.
  See also tab. 11.29 in Jungbluth et al. 2012.
  properties: carbon content, fossil 0.42325, dry mass 1 kg, heating value, net 12.82 MJ, wet mass 1 kg
- nylon 6: 0.23 kg; name nylon_6; source Schwarz U. 1992; lognormal variance with pedigree 0.089625, pedigree (4,3,5,2,4)
  Literature value. Proxy for all plastics used in all parts.
  See also tab. 11.29 in Jungbluth et al. 2012.
  EcoSpold01Location=RER
  properties: carbon content, fossil 0.637168, dry mass 1 kg, heating value, net 30.9 MJ, wet mass 1 kg
  note on carbon content, fossil: It is a chain of caprolactam molecules, originating from aminocarboxylic acids - here caproic acid or caprolactam. The structure of nylon 6 is -(NH-(CH2)5-CO)n-, C6H11NO (ecoinvent v2.2 report 11_II). MW=113 g/mol
  note on heating value, net: Assumed equal to Nylon-66. Reference: Walters, R. N., Hackett, S. M. and Lyon, R. E. (2000) ‘Heats of combustion of high temperature polymers’, Fire and Materials, 24(5), pp. 245–252. doi: 10.1002/1099-1018(200009/10)24:5<245::AID-FAM744>3.0.CO;2-7.
- polycarbonate: 0.2 kg; source Schwarz U. 1992; lognormal variance with pedigree 0.089625, pedigree (4,3,5,2,4)
  (same comment as for epoxy resin, liquid)
  properties: carbon content, fossil 0.755906, dry mass 1 kg, heating value, net 29.57 MJ, wet mass 1 kg
  note on carbon content, fossil: Polycarbonate means here 2,2-bis(4-hydroxyphenyl)propane polycarbonate – also called bisphenol A polycarbonate ( -(O-C6H4-C(CH3)2-C6H4-O-CO)n- (ecoinvent v2.2 report 11_II), C16H14O3, MW=254 g/mol.
- polyethylene, high density, granulate: 14.41 kg; name hdpe; source Schwarz U. 1992; lognormal variance with pedigree 0.089625, pedigree (4,3,5,2,4)
  EcoSpold01Location=RER
  Literature value. Used in
  - the (grounding) wires and the heat shrink tube from PV panel to inverter
  - the fuse box
  - the cabling at PV panel area
  - the grounding wires from inverter to electric meter.
  The Radox 125-cable cladding is approximated with HDPE-plastic.
  See also tab. 11.29 in Jungbluth et al. 2012.
  properties: carbon content, fossil 0.857143, dry mass 1 kg, heating value, net 42.47 MJ, wet mass 1 kg
  note on carbon content, fossil: Polyethylene is formed out of a huge amount of ethylene monomers (C2H4) (ecoinvent v2.2 report 11_II). MW=28 g/mol
- polyvinylchloride, bulk polymerised: 2.13 kg; name pvc; source Schwarz U. 1992; lognormal variance with pedigree 0.089625, pedigree (4,3,5,2,4)
  Literature value. Used in the cabling at the PV panel area as PVC-isolation tube.
  See also tab. 11.29 in Jungbluth et al. 2012.
  EcoSpold01Location=RER
  properties: carbon content, fossil 0.387097, dry mass 1 kg, heating value, net 21.5 MJ, wet mass 1 kg
  note on carbon content, fossil: Monomer is vynyl chloride, C2H3Cl (ecoinvent v2.2 report 11_II). MW=62 g/mol
- scrap copper: -0.02 kg; name scrap_copper; = brass
  Calculated value. Proxy for the treatment of brass.
  production volume; = apv_electric_installation* scrap_copper
    Calculated from production volume of reference product using the relative outputs.
  properties: dry mass 1 kg, wet mass 1 kg
- scrap steel: -0.9 kg; name scrap_steel; = steel_low_alloyed_hot_rolled+zinc
  Calculated value
  production volume; = apv_electric_installation* scrap_steel
    Calculated from production volume of reference product using the relative outputs.
  properties: dry mass 1 kg, wet mass 1 kg
- steel, low-alloyed, hot rolled: 0.86 kg; name steel_low_alloyed_hot_rolled; source Schwarz U. 1992; lognormal variance with pedigree 0.089625, pedigree (4,3,5,2,4)
  Literature value. Used in the fuse box.
  See also tab. 11.29 in Jungbluth et al. 2012.
  EcoSpold01Location=RER
  properties: carbon content, fossil 0.005, dry mass 1 kg, wet mass 1 kg
  note on carbon content, fossil: Low alloyed steel composition given in Tab. 3.2 ecoinvent v2.2 report 10_partII. Steel assumed to have a C content of 0.5%
- waste electric wiring: -29.34 kg; name waste_electric_wiring; = copper+hdpe+nylon_6
  Calculated value. All materials used in and for wires are summed up in this value.
  EcoSpold01Location=CH
  production volume; = apv_electric_installation* waste_electric_wiring
    Calculated from the production volume of electric installation, photovoltaic plant in proportion to the respective output amounts.
  properties: carbon content, fossil 0.34, dry mass 1 kg, wet mass 1 kg
  note on carbon content, fossil: The waste contains 0.615kg cable insulation (Wire insulation is calculated as 66.3% PVC, 31.2% PE and contains 2.5% copper) and 0.385kg copper (ecoinvent v2.2 report 13_I). So, 40% copper and 40%PVC, 20%PE. C contents in PVC and PE from tab A.1, ecoinvent v2.2 report 13_I
- waste polyethylene/polypropylene product: -0.202 kg; name waste_polyethypolypropy; = epoxy+polycarbonate
  Calculated value. Proxy for the treatment of epoxy and polycarbonate
  production volume; = apv_electric_installation* waste_polyethypolypropy
    Calculated from production volume of reference product using the relative outputs.
  properties: carbon content, fossil 0.748045, dry mass 0.847 kg, heating value, net 42.47 MJ, water content 0.180638, wet mass 1 kg
  note on carbon content, fossil: Mixed various plastics was used to estimate the C content of this waste (Tab A.2, ecoinvent v2.2 report 13_I)
- waste polyvinylchloride: -2.13 kg; name waste_pvc; = pvc
  Calculated value
  production volume; = apv_electric_installation* scrap_copper
    Calculated from production volume of reference product using the relative outputs.
  properties: carbon content, fossil 0.440882, dry mass 0.998 kg, heating value, net 21.51 MJ, water content 0.00200401, wet mass 1 kg
  note on heating value, net: Value taken from the general comment of the treatment dataset.
- wire drawing, copper: 14.7 kg; = copper; lognormal variance with pedigree 0.042, pedigree (1,1,5,5,1)
  EcoSpold01Location=RER
  Calculated value
- zinc: 0.04 kg; source Schwarz U. 1992; lognormal variance with pedigree 0.089625, pedigree (4,3,5,2,4)
  EcoSpold01Location=RER
  Literature value. Used in the fuse box
  See also tab. 11.29 in Jungbluth et al. 2012.
  properties: dry mass 1 kg, wet mass 1 kg

## Sampling procedure
Detailed analysis of materials for one product in a diploma thesis.

## Review by Roberto Dones 2007-08-23
Passed.
none
