# hydrogen compression, from low to medium pressure

Dataset: EcoSpold 2, unit process
Geography: RER
Time period: 2023-01-01 to 2023-12-31
Technology level: current
Classification: ISIC rev.4 ecoinvent: 3520:Manufacture of gas; distribution of gaseous fuels through mains
Scenario: Business-as-Usual
System model: Allocation, cut-off by classification
Generated by: Iasonas Ioannou
Database: ecoinvent
isCopyrightProtected: true
accessRestrictedTo: 1

## General comment
This dataset represents the compression of hydrogen, gaseous, low pressure at 25 bar to medium pressure gaseous hydrogen at 200 bar. The pressure of 200 bar is recommended as the functional unit by the IEA Hydrogen Task 36 (Iribarren et al, 2018).
References:
A. Valente, D. Iribarren and J. Dufour (2021): Comparative life cycle sustainability assessment of renewable and conventional hydrogen. Science of The Total Environment, 756, 144132.
Iribarren, D., Valente, A., Dufour, J., 2018. IEA Hydrogen Task 36 – Life Cycle Sustainability Assessment of Hydrogen Energy Systems – Final Report. IEA Hydrogen, Bethesda.

## Included activities start
This activity starts with hydrogen, gaseous, low pressure (25bar) at the factory gate. The dataset includes electricity to compress hydrogen and cooling water, and water release, for the intermediate cooling.

## Included activities end
This activity ends with hydrogen, gaseous, medium pressure (200 bar) at the factory gate ready for further processing or transport.

## Technology
This dataset represents the compression of hydrogen, gaseous, low pressure at 25 bar to medium pressure at 200 bar.
The electricity and cooling needed for conversion was calculated based on literature.
Reference:
Antonini C., Treyer K., Streb A., van der Spek M., Bauer C., Mazzotti M. (2020): Hydrogen production from natural gas and biomethane with carbon capture and storage – A techno-environmental analysis, Sustainable Energy Fuels.

## Parameters
- fraction, cooling water, once-through system, to air: 0.004 dimensionless; name fraction_CW_OT_to_air; lognormal variance with pedigree 0.0413, pedigree (2,3,1,3,1)
  Calculated based on literature value (Scown, C.D., 2011, Water Footprint of U.S. Transportation Fuels and supplying information of the article) (Vionnet, S., Quantis Water Database - Technical Report, 2012).

## Reference product
- hydrogen, gaseous, medium pressure, merchant: 1 kg; By-product classification allocatable product; CPC 34210: Hydrogen, nitrogen, oxygen, carbon dioxide and rare gases; inorganic oxygen compounds of non-metals n.e.c.; HS2017 280410: Hydrogen; CAS 1333-74-0
  production volume 7.443e8 kg; = 8.27E9*0.9*0.1
    The European production volume of pure hydrogen in 2021 is 8.27 Mt, over 90% are produced by steam methane refoming.
    According to the same source, about 90% of hydrogen are produced directly within the plant, it is assumed that only 10% reach the merchant market and are therefore compressed.
    References:
    Hydrogen Europe (2022): Clean hydrogen monitor 2022, available here: https://hydrogeneurope.eu/clean-hydrogen-monitor-2022/.
    Hydrogen Europe (2021): Clean hydrogen monitor 2021, available here: https://hydrogeneurope.eu/product/clean-hydrogen-monitor-report-2021/"
  property heating value, net 120.21 MJ
    LHV is calculated based on the elemental composition of the substance. Based on the CAS number of the substance (001333-74-0), the chemical formula of the substance is found to be: H2, (PubChem 2020).
    Reference: Kim, S., Chen, J., Cheng, T., Gindulyte, A., He, J., He, S., Li, Q., Shoemaker, B. A., Thiessen, P. A., Yu, B., Zaslavsky, L., Zhang, J., & Bolton, E. E. (2019). PubChem 2019 update: improved access to chemical data. Nucleic acids research, 47(D1), D1102–D1109. https://doi.org/10.1093/nar/gky1033
  property price 2.68 EUR2005
    Calculated value based on data from United Nations Commodity Trade Statistics Database (comtrade.un.org). UN comtrade category: 280410 Hydrogen. Year 2005. Using exchange rate of 1EURO = 1.209 USD. Average of price of import into 5 main markets (EU, US, JP, IN and CN). Cross reference; Literature (http://www.ttcorp.com/pdf/marketReport.pdf). The price of hydrogen, liquid is 5-10 USD/kg.
  properties: carbon allocation 0 kg, carbon content 0, carbon content, fossil 0, carbon content, non-fossil 0, dry mass 1 kg, water content 0, water in wet mass 0 kg, wet mass 1 kg

## Inputs from technosphere
- electricity, medium voltage: 1.25 kWh; lognormal variance with pedigree 0.0044, pedigree (2,4,1,4,2)
  Electricity required to compress low pressure hydrogen (at 25 bar) to medium pressure hydrogen (at 200 bar).
  It is assumed that the excess electricity from steam methane reforming is used to compress hydrogen to medium pressure.
  Based on Antonini C., Treyer K., Streb A., van der Spek M., Bauer C., Mazzotti M. (2020): Hydrogen production from natural gas and biomethane with carbon capture and storage - A techno-environmental analysis, Sustainable Energy Fuels.
  .
- hydrogen, gaseous, low pressure: 1 kg; lognormal variance with pedigree 0.0113, pedigree (2,4,1,3,3)
  Input of hydrogen.
  properties: dry mass 1 kg, heating value, net 120.21 MJ, wet mass 1 kg

## Inputs from nature
- Water, cooling, unspecified natural origin [natural resource, in water]: 0.095 m3; name water_cooling_UNO_input; lognormal variance with pedigree 0.0118, pedigree (2,5,1,5,2)
  Cooling for two-stage compression based on thermodynamic considerations for compression units with a 75% adiabatic efficiency: hydrogen, gaseous at 25 bar and 35 °C to hydrogen, gaseous at 200 bar and 25 °C. The two-stage intermediate compression and cooling is based on the work by Antonini et al. (2020)
  References:
  Antonini C., Treyer K., Streb A., van der Spek M., Bauer C., Mazzotti M. (2020): Hydrogen production from natural gas and biomethane with carbon capture and storage - A techno-environmental analysis, Sustainable Energy Fuels.

## Emissions to nature
- Water [air, unspecified]: 0.00038 m3; name water_to_air_unspecified; = (water_cooling_UNO_input*fraction_CW_OT_to_air); lognormal variance with pedigree 0.0512, pedigree (2,5,1,5,2)
  Calculated value based on literature values and expert opinion. See comments in the parametres' comment field.
- Water [water, unspecified]: 0.09462 m3; name water_to_water_unspecified; = water_cooling_UNO_input*(1-fraction_CW_OT_to_air); lognormal variance with pedigree 0.0512, pedigree (2,5,1,5,2)
  (same comment as for Water)

## Sampling procedure
This dataset is based on literature data. The technology is representative for compressing hydrogen Globally and regionalised through the input feedstocks.

Reference:
Antonini C., Treyer K., Streb A., van der Spek M., Bauer C., Mazzotti M. (2020): Hydrogen production from natural gas and biomethane with carbon capture and storage – A techno-environmental analysis, Sustainable Energy Fuels.
