# heat production, natural gas, at boiler condensing modulating >100kW

Dataset: EcoSpold 2, unit process
Geography: RoW
Time period: 2000-01-01 to 2023-12-31
Technology level: current
Classification: ISIC rev.4 ecoinvent: 3530:Steam and air conditioning supply
Classification: EcoSpold01Categories: natural gas/heating systems
Synonyms: Brennwerttechnik
Tags: ConvertedDataset
Scenario: Business-as-Usual
System model: Allocation, cut-off by classification
Generated by: Thomas Heck
Published in: Faist Emmenegger, M. 2007
Database: ecoinvent
isCopyrightProtected: true
accessRestrictedTo: 1

## General comment
NOx and CO emissions derived from measurements under controlled conditions; no adjustment to real operation made due to lack of information. Other emission data from different references.
[This dataset was already contained in the ecoinvent database version 2. It was not individually updated during the transfer to ecoinvent version 3. Life Cycle Impact Assessment results may still have changed, as they are affected by changes in the supply chain, i.e. in other datasets. This dataset was generated following the ecoinvent quality guidelines for version 2. It may have been subject to central changes described in the ecoinvent version 3 change report (http://www.ecoinvent.org/database/ecoinvent-version-3/reports-of-changes/), and the results of the central updates were reviewed extensively. The changes added e.g. consistent water flows and other information throughout the database. The documentation of this dataset can be found in the ecoinvent reports of version 2, which are still available via the ecoinvent website. The change report linked above covers all central changes that were made during the conversion process.]

## Included activities end
The module includes fuel input from high pressure (RER) network, infrastructure (boiler), emissions to air and water, and electricity needed for operation.

## Geography
Emission data extrapolated from Switzerland to Europe (RER).

## Technology
Models on market

## Reference product
- heat, district or industrial, natural gas: 1 MJ; By-product classification allocatable product; CPC 17300: Steam and hot water
  EcoSpold01Location=RER
  production volume 8.77582e10 MJ
    Assumption. The original value was altered in order to model the correct shares of district/industrial heat producing datasets on the market for heat, district or industrial, natural gas. See talk pages for further discussion.
    //Original comment and value:
    Consumption in industry and heat plants (IEA Balance tables: 22.1 EJ net calorific value = 24.5 EJ gross calorific value) minus the amount used for steam in the chemical industry (7.3EJ), divided evenly over 4 boiler types, multiplied by the conversion efficiency of the boiler type on a gross calorific value basis (91.8%)
    3.9439E+12
  property price 0.0106 EUR2005
    Average European district heat price from Ecoheatcool and Euroheat 2005-2006, Ecoheat Work package 1: The European heat market. Final report. 10.6 EUR/GJ i s the price of district heat. http://www.solarthermalworld.org/files/Ecoheatcool%20WP1%20Web.pdf?download
  properties: Corresponding fuel use 0.980392 MJ, carbon allocation 0 kg, carbon content 0, heating value, net 1 MJ

## Inputs from technosphere
- electricity, low voltage: 0.000221554, 2.22596e-6, 3.50046e-5, 0.000726567, 7.17157e-5, 1.83109e-5, 1.82473e-8, 4.46702e-7, 1.23924e-5 kWh (9 suppliers, which the file names only by identifier); sum of these 0.00108824 kWh; lognormal variance with pedigree 0.162, pedigree (1,1,5,5,1)
  EcoSpold01Location=UCTE
  range of electricity for pumps etc., different literature
- industrial furnace, natural gas: 2.7451e-9 unit; lognormal variance with pedigree 0.082, pedigree (1,1,5,5,1)
  EcoSpold01Location=RER
  uncertainty of life time and extrapolation to range of capacity
- natural gas, high pressure: 0.000218418, 0.000368443, 0.000803688, 0.00026896, 6.28549e-5, 0.0003741, 0.000358977, 0.000943939, 3.19948e-5, 0.000364423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 m3 (37 suppliers, which the file names only by identifier); sum of these 0.0272331 m3; = 1/1.02/NG_LHV; lognormal variance with pedigree 0.042, pedigree (1,1,5,5,1)
  EcoSpold01Location=RER
  Adjusted with a LHV of 36 MJ/m3
  properties: carbon content, fossil 0.602381, dry mass 0.84 kg, heating value, gross 40 MJ, heating value, net 36 MJ, wet mass 0.84 kg
  note on carbon content, fossil: An average C content of 0.506 kg C/ m3 has been assumed (this average has been calculated using data in Tab 3.5, ecoinvent v2.2 report 6_V
  note on heating value, net: Literature value, Source: Christoph Meili;Niels Jungbluth;Maresa Bussa (2021) Life cycle inventories of crude oil and natural gas extraction. ESU-services Ltd. commissioned by BAFU & VSG, Schaffhausen, Switzerland, http://esu-services.ch/data/public-lci-reports/

## Emissions to nature
- Acetaldehyde [air, urban air close to ground]: 9.80392e-10 kg; lognormal variance with pedigree 1.122, pedigree (1,1,5,5,1)
  rough estimate, high uncertainty
- Acetic acid [air, urban air close to ground]: 1.47059e-7 kg; lognormal variance with pedigree 1.122, pedigree (1,1,5,5,1)
  rough estimate, high uncertainty
- Benzene [air, urban air close to ground]: 3.92157e-7 kg; lognormal variance with pedigree 1.122, pedigree (1,1,5,5,1)
  rough estimate, high uncertainty
- Benzo(a)pyrene [air, urban air close to ground]: 9.80392e-12 kg; lognormal variance with pedigree 1.122, pedigree (1,1,5,5,1)
  rough estimate, high uncertainty
- Butane [air, urban air close to ground]: 6.86275e-7 kg; lognormal variance with pedigree 1.122, pedigree (1,1,5,5,1)
  rough estimate, high uncertainty
- Carbon dioxide, fossil [air, urban air close to ground]: 0.054902 kg; lognormal variance with pedigree 0.042, pedigree (1,1,5,5,1)
  composition of natural gas
- Carbon monoxide, fossil [air, urban air close to ground]: 2.84314e-6 kg; lognormal variance with pedigree 0.802, pedigree (1,1,5,5,1)
  calculated based on (SVGW 2002)
- Dinitrogen monoxide [air, urban air close to ground]: 4.90196e-7 kg; lognormal variance with pedigree 1.122, pedigree (1,1,5,5,1)
  rough estimate, high uncertainty
- Dioxins, measured as 2,3,7,8-tetrachlorodibenzo-p-dioxin [air, urban air close to ground]: 2.94118e-17 kg; lognormal variance with pedigree 1.122, pedigree (1,1,5,5,1)
  rough estimate, high uncertainty
- Formaldehyde [air, urban air close to ground]: 9.80392e-8 kg; lognormal variance with pedigree 1.122, pedigree (1,1,5,5,1)
  rough estimate, high uncertainty
- Mercury II [air, urban air close to ground]: 2.94118e-11 kg; lognormal variance with pedigree 0.692, pedigree (1,1,5,5,1)
  trace element in natural gas
- Methane, fossil [air, urban air close to ground]: 1.96078e-6 kg; lognormal variance with pedigree 1.122, pedigree (1,1,5,5,1)
  rough estimate, high uncertainty
- Nitrogen oxides [air, urban air close to ground]: 1.26471e-5 kg; lognormal variance with pedigree 0.232, pedigree (1,1,5,5,1)
  calculated based on (SVGW 2002)
- PAH, polycyclic aromatic hydrocarbons [air, urban air close to ground]: 9.80392e-9 kg; lognormal variance with pedigree 1.122, pedigree (1,1,5,5,1)
  rough estimate, high uncertainty
- Particulate Matter, < 2.5 um [air, urban air close to ground]: 9.80392e-8 kg; lognormal variance with pedigree 0.162, pedigree (1,1,5,5,1)
  literature
- Pentane [air, urban air close to ground]: 1.17647e-6 kg; lognormal variance with pedigree 1.122, pedigree (1,1,5,5,1)
  rough estimate, high uncertainty
- Propane [air, urban air close to ground]: 1.96078e-7 kg; lognormal variance with pedigree 1.122, pedigree (1,1,5,5,1)
  rough estimate, high uncertainty
- Propionic acid [air, urban air close to ground]: 1.96078e-8 kg; lognormal variance with pedigree 1.122, pedigree (1,1,5,5,1)
  rough estimate, high uncertainty
- Sulfur dioxide [air, urban air close to ground]: 4.90196e-7 kg; lognormal variance with pedigree 0.042, pedigree (1,1,5,5,1)
  composition of natural gas
- Toluene [air, urban air close to ground]: 1.96078e-7 kg; lognormal variance with pedigree 1.122, pedigree (1,1,5,5,1)
  rough estimate, high uncertainty
- Nitrate [water, surface water]: 1.27451e-7 kg; lognormal variance with pedigree 0.342, pedigree (1,1,5,5,1)
  literature, range of values
- Nitrite [water, surface water]: 2.94118e-9 kg; lognormal variance with pedigree 0.342, pedigree (1,1,5,5,1)
  literature, range of values
- Sulfate [water, surface water]: 4.90196e-8 kg; lognormal variance with pedigree 0.342, pedigree (1,1,5,5,1)
  literature, range of values
- Sulfite [water, surface water]: 4.90196e-8 kg; lognormal variance with pedigree 0.342, pedigree (1,1,5,5,1)
  literature, range of values

## Sampling procedure
Literature, manufacturers; CO and NOx emissions from (SVGW 2002), sample size (number of selected devices for which emission values are given in SVGW list): CO 107 , NOx 107 .

## Extrapolations
see Geography This dataset has been copied from an original dataset covering the geography RER. The uncertainty has been adjusted accordingly.

## Review by Michael Spielmann (obsolete) 2003-07-06
Preliminary passed, based on a review of a first draft of the final report. Data have to be validated again after review of the written report.
