# toluene diisocyanate production

Dataset: EcoSpold 2, unit process
Geography: RoW
Time period: 2020-01-01 to 2026-12-31
Technology level: current
Classification: ISIC rev.4 ecoinvent: 2013:Manufacture of plastics and synthetic rubber in primary forms
Classification: EcoSpold01Categories: plastics/monomers
Synonyms: Tolylene-2,4-diisocyanate; 2,4-Toluene diisocyanate; 2,4-Diisocyanato-1-methylbenzene
Scenario: Business-as-Usual
System model: Allocation, cut-off by classification
Share of production covered: 100 %
Generated by: ISOPA
Published in: ISOPA 2021
Database: ecoinvent
isCopyrightProtected: true
accessRestrictedTo: 1

## General comment
This dataset represents the average production of 1 kg of toluene diisocyanate (TDI). At the same time, the formed hydrochloric acid is treated as a valuable by-product. This dataset was extrapolated from the European dataset (ISOPA, 2021), and thus the European average production technology was applied.
TDI (CAS: 584-84-9), an aromatic diisocyanate, is a white to pale yellow liquid with a pungent odour.TDI is mainly used in the industrial production of flexible polyurethane foams.
The industrial preparation of isocyanates is carried out with the reaction of an amine with phosgene in an aromatic solvent. In more detail, the production scheme for TDI can be breakdown into the following chemical reactions:
Nitration of toluene: C6H5CH3 + 2 HNO3 --> C7H6N2O4 + 2 H2O
Hydrogenation of dinitrotoluene: C7H6N2O4 + 6 H2 --> C7H10N2 + 4 H2O
Toluene diamine phosgenation: C7H10N2 + 2 COCl2 --> C9H6N2O2 + 4 HCl
Hence, toluene is the primary raw material for the production of TDI, while dinitrotoluene can also be used as a starting material, i.e., bypassing the nitration step.
This dataset is based on industry data from three different TDI producers with three plants in two different European countries, which participated in the data collection.
References:
Christian Six, Frank Richter (2011): Isocyanates, organic, Ullmann's Encyclopedia of Industrial Chemistry, Wiley-VCH.
Heino Falcke, Simon Holbrook, Iain Clenahan,Alfredo Lopez Carretero, Teoman Sanalan,
Thomas Brinkmann, Joze Roth, Benoit Zerger
Serge Roudier, Luis Delgado Sancho (2017): Best Available Techniques (BAT) Reference Document for the Production of large Volume Organic Chemicals
2021, ISOPA , Eco-profile of toluene diisocyanate (TDI) and methylene diphenyl diisocyanate (MDI) , 3 - SeparatePublication
G. Margaret Wells, “Handbook of Petrochemicals and Processes”, 2nd edition, Ashgate, 1999
[This dataset is meant to replace the following datasets:]

## Included activities start
The activity starts when the raw materials enter the process.

## Included activities end
This activity ends once the products, i.e., 1 kg of toluene diisocyanate and 0.86 kg of hydrochloric acid, are at the production site gate. Materials entering the process are included as well as energy uses, infrastructure and emissions.

## Geography
This dataset was extrapolated from the European dataset (ISOPA, 2021). Therefore, the European average production technology was applied. Representative 100% of European (EU-28) production of toluene diisocyanate.

## Technology
This inventory represents the average production of toluene diisocyanate, provided as a generic dataset in which TDI production covers both (1) toluene and (2) dinitrotoluene as raw materials.
In more detail, the chemical processes involved in the TDI production are described below.
First, toluene, as the primary raw material for the industrial manufacturing of TDI, undergoes catalytic nitration, yielding approximately an 80:20 mixture of 2,4- and 2,6-dinitrotoluene (DNT) isomers. Hence, plants may start the production of TDI with either toluene or the respective mixture of DNT isomers.
Nitration of toluene: C6H5CH3 + 2 HNO3 --> C7H6N2O4 + 2 H2O
A hydrogenation step follows, where the DNT mixture is converted to diaminotoluene (TDA) isomers.
Hydrogenation of dinitrotoluene: C7H6N2O4 + 6 H2 --> C7H10N2 + 4 H2O
The corresponding TDA mixture is subsequently treated with phosgene to produce a TDI isomer mixture in solution, along with HCl byproduct.
Toluene diamine phosgenation: C7H10N2 + 2 COCl2 --> C9H6N2O2 + 4 HCl
In absence of phosgene in the form of a raw material, this intermediate is produced on-side from carbon monoxide and chlorine.
Phosgene production: CO + Cl2 --> COCl2
The solution is then purified via distillation, in which the 80:20 TDI isomer composition is maintained. Finally, a fractionation step is carried out, which yields a stream with 100% 2,4-TDI and another stream with a 65:35 mixture of 2,4- and 2,6-TDI isomers.
References:
2021, ISOPA , Eco-profile of toluene diisocyanate (TDI) and methylene diphenyl diisocyanate (MDI) , 3 - SeparatePublication

## Time period
Data collection for production was collected as 12-month averages representing the year 2018. The inventory creation and calculation stage was concluded in 2020, while the technology is not expected to change until 2026.

## Reference product
- toluene diisocyanate: 1 kg; name RP; By-product classification allocatable product; CPC 34150: Amine-function compounds; oxygen-function amino-compounds, except lysine and its esters and salts thereof and […]; HS2017 292910: Nitrogen-function compounds; n.e.c. in chapter 29, isocyanates; CAS 584-84-9
  EcoSpold01Location=RER
  production volume 2.83618e9 kg; name PV_RP; = 3.36E+9
    The annual Global production capacity of toluene diisocyanate is 3.36E9 kg.
    References:
    ECTC chemical technologies (2019): Isocyanates production: Global and Russian Isocyanate Market Overview, available here: https://ect-center.com/blog-en/global-isocyanate-market
  property carbon content, fossil 0.62069
    Toluene diisocyanate (TDI; CH3-C6H3-(N=C=O)2 (ecoinvent v2.2 report 11_II), C9H6N2O2. MW=174 g/mol
  property heating value, net 22.98 MJ
    LHV is calculated based on the elemental composition of the substance. Based on the name of the substance, the chemical formula of the substance is assumed to be: C9H6N2O2
  property price 1.66604 EUR2005
    Based on Echemi and ChemAnalyst (available here: https://www.echemi.com/productsInformation/pd20170215195139318-toluene-diisocyanate.html, https://www.chemanalyst.com/Pricing-data/toluene-diisocyanate-35, accessed 2022-06-17).
    The prices were converted to EUR based on the annual exchange rates published by the European Central Bank (https://sdw.ecb.europa.eu/quickview.do?SERIES_KEY=120.EXR.A.USD.EUR.SP00.A, last accessed on 2022-02-15) and adjusted for inflation relative to 2005 using the producer price index (PPI) of the euro area, published by eurostat (https://appsso.eurostat.ec.europa.eu/nui/show.do?dataset=sts_inpp_a&lang=en, last accessed on 2022-05-04).
  properties: allocation factor 0.938495, carbon allocation 0.62069 kg, carbon content 0.62069, carbon content, non-fossil 0, dry mass 1 kg, true value 1.66604, water content 0, water in wet mass 0 kg, wet mass 1 kg

## Inputs from technosphere
- 2,4-dinitrotoluene: 0.614839 kg; lognormal variance with pedigree 0.0118, pedigree (2,3,1,5,3)
  Industrial data, representative for 100 % of European (EU-28) production capacity, based on production volumes
  properties: carbon content, fossil 0.461617, dry mass 1 kg, heating value, net 17.98 MJ, wet mass 1 kg
- activated carbon, granular: 2.71225e-5 kg; lognormal variance with pedigree 0.0118, pedigree (2,3,1,5,3)
  (same comment as for 2,4-dinitrotoluene)
  property carbon content, fossil 0.81; name GAC_C_content_fossil
  property carbon content, non-fossil 0; name GAC_C_content_non_fossil
  property dry mass 0.97 kg; name GAC_DM
  property heating value, net 30.23 MJ; name GAC_Net_Heat_Value
  property water content 0.030928; name GAC_water_content
  property water in wet mass 0.03 kg; name GAC_WWM
  property wet mass 1 kg; name GAC_WM
  note on carbon content, fossil: Literature value. From Biomass and Bioenergy: Processing and Properties (2014) edited by Khalid Rehman Hakeem, Mohammad Jawaid, Umer Rashid (p. 252). Carbon content is in the range of 72-90%, an average value of 81% is taken.
- ammonia, anhydrous, liquid: 3.52593e-6, 6.84455e-6, 7.58674e-5, 3.20696e-6, 7.17382e-7, 2.63651e-5, 2.2664e-6, 6.98612e-6 kg (8 suppliers, which the file names only by identifier); sum of these 0.00012578 kg; lognormal variance with pedigree 0.0118, pedigree (2,3,1,5,3)
  (same comment as for 2,4-dinitrotoluene)
  properties: dry mass 1 kg, wet mass 1 kg
- carbon monoxide: 0.324551 kg; lognormal variance with pedigree 0.0118, pedigree (2,3,1,5,3)
  (same comment as for 2,4-dinitrotoluene)
  properties: carbon content, fossil 0.428571, dry mass 1 kg, heating value, net 12.99 MJ, wet mass 1 kg
- chemical factory, organics: 6.46623e-10 unit; lognormal variance with pedigree 0.3112, pedigree (2,3,1,5,3)
  Calculated based on literature data published by the industry. For this activity, no information was readily available concerning infrastructure and land-use. Therefore, the infrastructure is estimated based on data from two chemical factories, the BASF site of Ludwigshafen and the chemical factory in Gendorf (which are both located in Germany), which produce a wide range of chemical substances. Based on this data, the following assumptions are made: the built area amounts to about 4.2 ha, the plant has an average output of 50'000 t/a and a lifespan of fifty years. The estimated infrastructure amount is therefore 4.00 E-10 units per kg of produced chemical.
  Since this process comprises 2 reactions to produce the final product, the default value was scaled up. To produce 1 kg of output, 0.73 kg of intermediate products are necessary. The value was therefore scaled up with the factor 1.73.
  References:
  Althaus H.-J., Chudacoff M., Hischier R., Jungbluth N., Osses M. and Primas A. (2007) Life Cycle Inventories of Chemicals. ecoinvent report No. 8, v2.0. EMPA Dübendorf, Swiss Centre for Life Cycle Inventories, Dübendorf, CH.
  Gendorf (2000) Umwelterklärung 2000, Werk Gendorf. Werk Gendorf, Burgkirchen.
- chlorine, gaseous: 0.81659 kg; lognormal variance with pedigree 0.0118, pedigree (2,3,1,5,3)
  (same comment as for 2,4-dinitrotoluene)
  properties: dry mass 1 kg, wet mass 1 kg
- compressed air, 1000 kPa gauge: 0.00784571 m3; lognormal variance with pedigree 0.0118, pedigree (2,3,1,5,3)
  (same comment as for 2,4-dinitrotoluene)
- electricity, medium voltage: 0.0190507, 0.380019, 0.127685, 0.00583398, 0.00116767, 0.000250724, 0.0392429 kWh (7 suppliers, which the file names only by identifier); sum of these 0.57325 kWh; lognormal variance with pedigree 0.0118, pedigree (2,3,1,5,3)
  Average electricity consumption for the production of toluene diisocyanate.
  Industrial data, representative for 100 % of European (EU-28) production capacity, based on production volumes
- hazardous waste, for incineration: -0.0360382 kg; name BP_HazInc; lognormal variance with pedigree 0.0118, pedigree (2,3,1,5,3)
  (same comment as for 2,4-dinitrotoluene)
  production volume; = PV_RP * ( BP_HazInc / RP)
    Calculated from production volume of reference product using the relative outputs.
  properties: carbon content, fossil 0.554667, dry mass 0.75 kg, heating value, net 17 MJ, water content 0.333333, wet mass 1 kg
  note on carbon content, fossil: Tab A.6, ecoinvent v2.2 report 13_I. C content has been calculated after data in the tables, and then referred to 1 kg DM
  note on heating value, net: Value taken from the general comment of the treatment dataset.
- hazardous waste, for underground deposit: -0.00141713 kg; name BP_HazDeposit; lognormal variance with pedigree 0.0118, pedigree (2,3,1,5,3)
  (same comment as for 2,4-dinitrotoluene)
  production volume; = PV_RP * ( BP_HazDeposit / RP)
    Calculated from production volume of reference product using the relative outputs.
  properties: carbon content, fossil 0.554667, dry mass 1 kg, wet mass 1 kg
  note on carbon content, fossil: Tab A.6, ecoinvent v2.2 report 13_I, average hazardous waste composition was used, and referred to 0% water mass. No waste-specific emission are currently inventoried for underground deposits. Accordingly, no waste composition must be specified. For generic, average waste to underground deposit deposition in a 200 liter steel drum without cement solidification is assumed (ecoinvent v2.2 report 13_I).
- heat, district or industrial, natural gas: 0.00706981, 0.430232 MJ (2 suppliers, which the file names only by identifier); sum of these 0.437302 MJ; lognormal variance with pedigree 0.0118, pedigree (2,3,1,5,3)
  Average natural gas heat consumption for the production of toluene diisocyanate.
  Industrial data, representative for 100 % of European (EU-28) production capacity, based on production volumes
  properties: heating value, net 1 MJ
- heat, from steam, in chemical industry: 8.22197 MJ; = 3.18574865505617*2.75; lognormal variance with pedigree 0.0118, pedigree (2,3,1,5,3)
  Average, and aggregated, steam consumption for the production of toluene diisocyanate (3.18 kg per kg). Here, an energy content of 2.75 MJ per kg of steam was used.
  Industrial data, representative for 100 % of European (EU-28) production capacity, based on production volumes
  properties: heating value, net 1 MJ
- hydrogen peroxide, without water, in 50% solution state: 0.00935393 kg; lognormal variance with pedigree 0.0118, pedigree (2,3,1,5,3)
  (same comment as for 2,4-dinitrotoluene)
  properties: dry mass 1 kg, heating value, net 7.13 MJ, wet mass 1 kg
- hydrogen, gaseous, medium pressure, merchant: 0.0439929, 0.0276235 kg (2 suppliers, which the file names only by identifier); sum of these 0.0716164 kg; lognormal variance with pedigree 0.0118, pedigree (2,3,1,5,3)
  (same comment as for 2,4-dinitrotoluene)
  properties: dry mass 1 kg, heating value, net 120.21 MJ, wet mass 1 kg
- inert waste, for final disposal: -0.00447341 kg; name BP_InertDeposit; lognormal variance with pedigree 0.0118, pedigree (2,3,1,5,3)
  (same comment as for 2,4-dinitrotoluene)
  production volume; = PV_RP * ( BP_InertDeposit / RP)
    Calculated from production volume of reference product using the relative outputs.
  properties: dry mass 0.995 kg, water content 0.00502513, wet mass 1 kg
- iron(III) chloride, without water, in 40% solution state: 0.000751581 kg; lognormal variance with pedigree 0.0118, pedigree (2,3,1,5,3)
  (same comment as for 2,4-dinitrotoluene)
  properties: dry mass 1 kg, wet mass 1 kg
- nitric acid, without water, in 50% solution state: 0.0170099, 0.0628518, 0.191897, 0.103577, 0.0301153, 0.0251805, 0.025274, 0.0817368 kg (8 suppliers, which the file names only by identifier); sum of these 0.537642 kg; lognormal variance with pedigree 0.0118, pedigree (2,3,1,5,3)
  (same comment as for 2,4-dinitrotoluene)
  properties: dry mass 1 kg, wet mass 1 kg
- nitrogen, liquid: 0.0461984 kg; lognormal variance with pedigree 0.0118, pedigree (2,3,1,5,3)
  (same comment as for 2,4-dinitrotoluene)
  properties: dry mass 1 kg, wet mass 1 kg
- o-dichlorobenzene: 0.00048188 kg; lognormal variance with pedigree 0.0118, pedigree (2,3,1,5,3)
  (same comment as for 2,4-dinitrotoluene)
  properties: carbon content, fossil 0.493151, dry mass 1 kg, heating value, net 18.15 MJ, wet mass 1 kg
- soda ash, dense: 0.00200322 kg; lognormal variance with pedigree 0.0118, pedigree (2,3,1,5,3)
  (same comment as for 2,4-dinitrotoluene)
  properties: carbon content, fossil 0.11322, dry mass 1 kg, heating value, net 3.43 MJ, wet mass 1 kg
- sodium hydroxide, without water, in 50% solution state: 0.0290825 kg; lognormal variance with pedigree 0.0118, pedigree (2,3,1,5,3)
  (same comment as for 2,4-dinitrotoluene)
  properties: dry mass 1 kg, heating value, net 3.03 MJ, wet mass 1 kg
- sulfuric acid: 0.00580706 kg; lognormal variance with pedigree 0.0118, pedigree (2,3,1,5,3)
  (same comment as for 2,4-dinitrotoluene)
  properties: dry mass 1 kg, wet mass 1 kg
- tap water: 0.00455693, 0.00694665, 0.0129621, 0.034919, 0.0042033, 0.175167, 2.00453 kg (7 suppliers, which the file names only by identifier); sum of these 2.24328 kg; lognormal variance with pedigree 0.0118, pedigree (2,3,1,5,3)
  (same comment as for 2,4-dinitrotoluene)
  properties: carbon content, fossil 0.00178991, dry mass 0.000337476 kg, water content 2962.17, wet mass 1 kg
  note on carbon content, fossil: Bicarbonate content is 2.93 mol/m3. CO2 content is 0.1 mol/m3 (ecoinvent v2.2 report 8, Tab 93.1).
- toluene, liquid: 0.233941 kg; lognormal variance with pedigree 0.0118, pedigree (2,3,1,5,3)
  (same comment as for 2,4-dinitrotoluene)
  properties: carbon content, fossil 0.913043, dry mass 1 kg, heating value, net 38.17 MJ, wet mass 1 kg
- wastewater, average: -0.0402369, -0.000143259 m3 (2 suppliers, which the file names only by identifier); sum of these -0.0403802 m3; lognormal variance with pedigree 0.0118, pedigree (2,3,1,5,3)
  (same comment as for 2,4-dinitrotoluene)
  production volume; = PV_RP*BP_wastewater_total/RP
    Calculated from production volume of reference product using the relative outputs.
  properties: carbon content, non-fossil 0.194039, dry mass 0.346837 kg, water content 2882.2, wet mass 1000 kg
  note on carbon content, non-fossil: 0.0673 kg TOC/m3 (Tab A.17, ecoinvent v2.2 report 13_I). TOC was considered as Total Carbon.
- water, deionised: 0.188624 kg; name DeiW; lognormal variance with pedigree 0.0118, pedigree (2,3,1,5,3)
  (same comment as for 2,4-dinitrotoluene)
  properties: wet mass 1 kg

## Inputs from nature
- Water, cooling, unspecified natural origin [natural resource, in water]: 0.123679 m3; name CW_Relooped; lognormal variance with pedigree 0.0118, pedigree (2,3,1,5,3)
  (same comment as for 2,4-dinitrotoluene)
- Water, lake [natural resource, in water]: 1.5916e-8 m3; name LakeW; lognormal variance with pedigree 0.0512, pedigree (2,3,1,5,3)
  (same comment as for 2,4-dinitrotoluene)
- Water, river [natural resource, in water]: 0.0406621 m3; name RiverW; lognormal variance with pedigree 0.0512, pedigree (2,3,1,5,3)
  (same comment as for 2,4-dinitrotoluene)

## Emissions to nature
- Nitrogen [air, unspecified]: 0.0461984 kg; lognormal variance with pedigree 0.0033, pedigree (2,2,1,5,1)
  (same comment as for 2,4-dinitrotoluene)
- Water [air, unspecified]: 0.00271385 m3; = ( ( DeiW/1000 + TapW/1000 + RiverW + LakeW ) - BP_wastewater_total ) + ( CW_Relooped - CW_Relooped_AL); lognormal variance with pedigree 0.0427, pedigree (2,2,1,5,1)
  (same comment as for 2,4-dinitrotoluene)
  property fraction, origin: fresh water 0.00646429; name fraction_origin_fresh_water
  property fraction, origin: salt water 0.000772255; name fraction_origin_salt_water
  property fraction, origin: unspecified 0.992763; name fraction_origin_unspecified
- Water [water, unspecified]: 0.123679 m3; name CW_Relooped_AL; lognormal variance with pedigree 0.0427, pedigree (2,2,1,5,1)
  (same comment as for 2,4-dinitrotoluene)
  property carbon content, fossil 0; name C_content_fossil
  property carbon content, non-fossil 0; name C_content_non_fossil
  property dry mass 0 kg; name DM
  property fraction, origin: fresh water 0.0098171; name fraction_origin_fresh_water_Ww
  property fraction, origin: salt water 0.0011728; name fraction_origin_salt_water_Ww
  property fraction, origin: unspecified 0.98901; name fraction_origin_unspecified_Ww
  property water in wet mass 1000 kg; name WWM
  property wet mass 1000 kg; name WM

## Sampling procedure
Industry data, representative 100 % of European (EU-28) production capacity, based on production volumes in 2018.

The industrial data used originate from three different TDI producers, with three plant, in two different European countries.

## Extrapolations
This dataset has been copied from an original dataset covering the geography RER. The uncertainty has been adjusted accordingly.

The catalyst and stabilizer use, with a representation on dry mass input lower than 0.01%, was cut-off. Furthermore, an exchange representing unreacted raw materials that are recycled to the process after treatment, with a representation of 3.3% on dry mass output, was cut-off.
