# maintenance, transmission network, electricity, high voltage direct current land cable

Dataset: EcoSpold 2, unit process
Geography: RoW
Time period: 1998-01-01 to 2023-12-31
Technology level: current
Classification: ISIC rev.4 ecoinvent: 4220:Construction of utility projects
Classification: EcoSpold01Categories: electricity/distribution
Scenario: Business-as-Usual
System model: Allocation, cut-off by classification
Generated by: Heidi Hottenroth
Published in: Jorge, R. 2012
Database: ecoinvent
isCopyrightProtected: true
accessRestrictedTo: 1

## General comment
This dataset represents the maintenance of 1 km and year of an high voltage direct current land cable (Cu conductor 400 kV).
Literature data given for the entire lifetime per km was divided by lifetime (40 a) to get yearly values.
Source: Jorge, R., Hawkins, T.R., Hertwich, E..G (2012): Life cycle assessment of electricity transmission and distribution - part 1: power lines and cables. Int J Life Cycle Assess 17: 9-15. supplementary matierial p.15, table S14.

## Included activities start
The activity starts with the replacement of oil and transport services for maintenance activities.

## Included activities end
The activity ends with the disposal of displaced oil.

## Geography
The scope of the underlying literature source is Europe. Uncertainty was adjusted accordingly.

## Technology
Maintenance is comprised of the replacement of oil

## Time period
refers to publication date of literature sources

## Reference product
- maintenance, transmission network, electricity, high voltage direct current land cable: 1 km*year; name RP; By-product classification allocatable product; CPC 54242: General construction services of long-distance communication and power lines (cables)
  production volume 2525 km*year; name PV_RP
    calculated according to https://en.wikipedia.org/wiki/List_of_HVDC_projects retrieved on 09.10.2020
    Cumulated global length of land cables in the years 1992-2012
  properties: carbon allocation 0 kg, carbon content 0, price 4 EUR2005

## Inputs from technosphere
- diesel, burned in agricultural machinery: 935 MJ; = 100*10*37,4/40; lognormal variance with pedigree 0.0212, pedigree (4,4,4,5,2)
  Calcualted value. For tractor use of 100 h/40 a with 10 l/h; heating value diesel: 37.4 MJ/l
- lubricating oil: 0.5 kg; name oil; = 20/40; lognormal variance with pedigree 0.0212, pedigree (4,4,4,5,2)
  Calculated value. Literature value from S13 in Jorge et al. (2012) devided by lifetime of 40 a. Insulation oil for cable (20 kg/(km*40a)
  properties: carbon content, fossil 0.75, dry mass 1 kg, wet mass 1 kg
  note on carbon content, fossil: Lubricating oil is produced from diesel. C-content/dry mass of fats and oils considered 75%, from: ecoinvent v2.2 report, n 15a, pg 40
- transport, passenger car: 150 km; = 6000/40; lognormal variance with pedigree 0.0212, pedigree (4,4,4,5,2)
  Calculated value. 6000 km/km for passenger transports during 40 a.
- waste mineral oil: -0.5 kg; name BP_oil; = oil; lognormal variance with pedigree 0.0186, pedigree (4,4,1,5,2)
  Waste generated by this activity. Based on the amount of the corresponding material inputs.
  production volume; = abs(BP_oil/RP)*PV_RP
    Calculated from production volume of reference product using the relative outputs.
  properties: carbon content, fossil 0.75, dry mass 1 kg, wet mass 1 kg
  note on carbon content, fossil: Tab A.6, ecoinvent v2.2 report 13_I. C content has been calculated after data in the tables, and then referred to 1 kg DM

## Extrapolations
The dataset is extrapolated from the respective regional dataset with uncertainty adjusted.
