# polyethylene terephthalate, granulate, bottle grade, recycled to generic market for bottle grade PET granulate

Dataset: EcoSpold 2, unit process
Geography: CH
Time period: 2014-01-01 to 2023-12-31
Technology level: current
Classification: ISIC rev.4 ecoinvent: 2013:Manufacture of plastics and synthetic rubber in primary forms
Scenario: Business-as-Usual
System model: Allocation, cut-off by classification
Generated by: Thomas Kägi
Database: ecoinvent
isCopyrightProtected: true
accessRestrictedTo: 1

## General comment
This is a renaming activity linking recycled polyethylene terephthalate (PET), bottle grade, granulate to the generic market for bottle grade PET granulate.
The transport distances are taken for commodity class NTS 08 (Chemicals, chemical products, and man-made fibers; rubber and plastic products; nuclear fuel)
from a model based on statistics on transport of goods in Switzerland (Valsasina, 2016, Default transport data per commodity group for Switzerland, ecoinvent, www.ecoinvent.org).

## Reference product
- polyethylene terephthalate, granulate, bottle grade: 1 kg; By-product classification allocatable product; CPC 34710: Polymers of ethylene, in primary forms; HS2017 390130: Ethylene polymers; in primary forms, ethylene-vinyl acetate copolymers; CAS 25038-59-9
  production volume 0.001 kg
    Recycled granulates assumed to represent negligible share of oveall global market for granulate (about 2% closed-loop recycling for plastic packaging material according WRF 2016), hence production volume here set to low arbitrarily amount to link the recycled product to the generic market.
  properties: carbon allocation 0.625 kg, carbon content 0.625, carbon content, fossil 0.625, carbon content, non-fossil 0, dry mass 1 kg, heating value, net 22.95 MJ, price 1.29 EUR2005, water content 0, water in wet mass 0 kg, wet mass 1 kg

## Inputs from technosphere
- polyethylene terephthalate, granulate, bottle grade, recycled: 1 kg
  properties: carbon content, fossil 0.625, dry mass 1 kg, heating value, net 22.95 MJ, wet mass 1 kg
  note on heating value, net: Assumed equal to "polyethylene terephthalate, granulate, amorphous"
