# electricity, low voltage, residual mix

Dataset: EcoSpold 2, unit process
Geography: BA
Time period: 2022-01-01 to 2023-12-31
Technology level: current
Classification: ISIC rev.4 ecoinvent: 3510:Electric power generation, transmission and distribution
Scenario: Business-as-Usual
System model: Allocation, cut-off by classification
Generated by: [System]
Published in: Association of Issuing Bodies (AIB) 2023
Database: ecoinvent
isCopyrightProtected: true
accessRestrictedTo: 1

## General comment
This dataset describes the residual mix on the low voltage level in Bosnia and Herzegovina. The residual mix is a virtual mix. It represents the energy mix of untracked consumption , i.e., electricity consumption that is not explicitly tracked through mechanisms such as Guarantees of Origin (GO). The shares have been calculated based on statistics from AIB (2023) following the methodology of grexel (2020).
The calculation area considered for the calculation of the residual mixes covers all members of EU28, Iceland, Norway, Serbia and Switzerland.
The residual mix of a country is calculated based on the domestic residual mix. The domestic residual mix represents the sum of all domestic electricity production considering imports and export outside the calculation area and issued and expired attributes.
In countries for which the volume of untracked consumption is smaller than the volume of the domestic residual mix, the composition of the residual mix is equal to the composition of the domestic residual mix. In countries for which the volume of untracked consumption is larger than the volume of the domestic residual mix, the European Attribute Mix (EAM) is used to account for the deficits. Thus, in countries with a deficit in their domestic residual mix, the residual mix is equal to the domestic residual mix plus the respective amount taken from the EAM. For a detailed description of the methodology refer to grexel (2020).
The composition of the residual mix of this activity is valid for the year 2022.
Sources:
- AIB (2023), Association of Issuing Bodies, European Residual Mixes, Results of the calculation of Residual Mixes for the calendar year 2022, Version 1.0, 2022-06-01, https://www.aib-net.org/facts/European-residual-mix/2022
- grexel (2020), Issuance Based Residual Mix Calculation Methodology, Published 31.03.2020, Version 1.1, https://www.aib-net.org/sites/default/files/assets/facts/residual-mix/2022/RM%20EAM%20IB%20Calculation%20Methodology%20V1_2.pdf

## Included activities start
This activity starts from 1kWh of electricity from untracked consumption.

## Included activities end
This activity ends with the transport of 1 kWh of low voltage electricity from untracked consumption in the transmission network over aerial lines and cables.
This dataset includes: - electricity inputs of the untracked consumption in this country - the transmission network - direct emissions to air (ozone and N2O). - electricity losses during transmission This dataset doesn't include - electricity losses during transformation, as these are included in the dataset for transformation - - SF6 emissions during the transmission, as these are allocated to the residual mix dataset for medium voltage. - SF6 emissions during production and deconstruction of the switchgear, as these are accounted for in the transmission network dataset.

## Technology
Average technology used to transmit and distribute electricity. Includes underground and overhead lines. Electricity production according to related technology datasets.
Electricity from untracked consumption. Average technology used to transmit and distribute electricity. Includes underground and overhead lines. Electricity production according to related technology datasets. Definition of the voltage levels: - High voltage level above 24 kV (large scale industry) - Medium voltage level between 1 kV and 24 kV (medium to small scale industry, service sector and public buildings) - Low voltage level below 1 kV (Households)

## Time period
The annual production volumes of this market are taken from AIB (2023). 2022 European Residual Mix - Results of the calculation of Residual Mixes for the calendar year 2021 (Version 1.0, 2023-06-01) and are valid for the year 2021. The data on the European residual mixes is based on the transactions of guarantees of origin representing the time period of 1.4.2022 - 31.3.2023.

## Reference product
- electricity, low voltage: 1 kWh; By-product classification allocatable product; CPC 17100: Electrical energy; HS2017 271600: Electrical energy
  production volume 6.52869 kWh
    Calculated value. Shares calculated based on Tab 3. of AIB (2023), Association of Issuing Bodies, European Residual Mixes, Results of the calculation of Residual Mixes for the calendar year 2022, Version 1.0, 2023-06-10, https://www.aib-net.org/facts/European-residual-mix/2022
  property price 0.107 EUR2005
    Temporary price data. Calculated as 90% of purchasers price based on: IEA Key world energy statistics 2004 (www.iea.org/textbase/nppdf/free/2004/keyworld2004.pdf)
  properties: carbon allocation 0 kg, carbon content 0

## Inputs from technosphere
- distribution network, electricity, low voltage: 8.74049e-8 km; = 128646/(36796000000*40); lognormal variance with pedigree 0.1821, pedigree (3,2,5,4,3)
  Estimation. Data overtaken from Switzerland.
  Swiss data are calculated values based on the electricity transported in this voltage level (36796 GWh) and the total low voltage power line length in Switzerland (cables and aerial lines - 128646 km). Lifetime is assumed to be 40 years.
  See Itten&Frischknecht 2012, Tab. 4.1 and Tab. 4.3.
- electricity, low voltage: 0.00341221, 0.0411125, 0.00321092 kWh (3 suppliers, which the file names only by identifier); sum of these 0.0477356 kWh
  (same comment as for electricity, low voltage)
- electricity, low voltage: 0.00273978 kWh
  SF6 (sulphur hexafluoride) is used as quenching and insulation gas in gas-insulated switchgear. SF6 has physically ideal properties for the use in high and medium voltage switchgear.
- electricity, low voltage: 0.990637 kWh
  Most of SF6-emissions (ca. 95%) are caused by the high voltage level switchgear, which are allocated to the electricity demand on medium voltage.
- sulfur hexafluoride, liquid: 6.27e-9 kg; = sf6_emISsions; lognormal variance with pedigree 0.0102, pedigree (1,1,4,1,1)
  Literature value/estimation.
  properties: dry mass 1 kg, wet mass 1 kg

## Emissions to nature
- Sulfur hexafluoride [air, unspecified]: 6.27e-9 kg; name sf6_emISsions; lognormal variance with pedigree 0.098675, pedigree (3,3,5,2,2)
  The emission rate of 1.0% has been taken from UBA (1999) Schwefelhexafluorid. Retrieved 14.8.2002 from: http://www.ubavie.gv.at/publikationen/uba-aktuell/archiv/1999/08/SF6.html.
