# textile production, jute, weaving

Dataset: EcoSpold 2, unit process
Geography: RoW
Time period: 2016-04-01 to 2023-03-31
Technology level: current
Classification: ISIC rev.4 ecoinvent: 1312:Weaving of textiles
Classification: EcoSpold01Categories: textiles/processing
Scenario: Business-as-Usual
System model: Allocation, cut-off by classification
Generated by: [System]
Published in: Faist Emmenegger, M. 2018
Database: ecoinvent
isCopyrightProtected: true
accessRestrictedTo: 1

## General comment
Inventory refers to 1 kg woven Jute textile The process involves winding, beaming, weaving, and calendaring. Cut pieces and threads are produced as byproducts, however, in a negligible amount.
The process starts with arrival of yarn to weaving section, beaming process follows when spool winding ends. To improve the quality of woven cloth and weaving efficiency, the wrap yarns are coated with sizing (starch paste). Adequate moisture is essential in this process. Weaving involves interlacement of two sets of threads, called "wrap" and "weft" yarns, to produce the fabric of desired quality, followed by damping (done manually) in which the rolled woven cloth is unrolled, and water is sprinkled on it continuously to provide desired moisture. After damping the damped fabric passes through pairs of heavy rollers, which renders the threads in fabric, flattened and improves the quality and appearance (calendaring). The last step is lapping in which Hessian fabrics are folded into the required size used in "Bale press" operation on the lapping machine.
This inventory is a weighted average from data in India and Bangladesh.

## Included activities start
The activity starts with reception of Jute yarn.

## Included activities end
This activity ends with 1 kg jute textile as the final product of the weaving process.

## Reference product
- textile, jute: 1 kg; By-product classification allocatable product; CPC 26570: Woven fabrics of jute and other textile bast fibres (except flax, true hemp and ramie); HS2017 531010: Fabrics, woven; of jute or of other textile bast fibres of heading no. 5303, unbleached
  production volume 5.05374e8 kg
    From the Fibre Year report 2017 for 2015 using a ratio of fabric to fibre of 950/1400
  property heating value, net 14.87 MJ
    LHV is calculated based on the Carbon content of the product. More details can be found on the respective documentation.
  property price 1.05 EUR2005
    Average 2005 prices for EU27, USA, China, Japan and India from Import/Export data (US$ and tonnes) in UN Commodity Trade Statistics Database; Commodity: Fabrics, woven of jute or other textile bast fibres of heading 2640
  properties: carbon allocation 0.490909 kg, carbon content 0.490909, carbon content, fossil 0, carbon content, non-fossil 0.490909, dry mass 1 kg, water content 0, water in wet mass 0 kg, wet mass 1 kg

## Inputs from technosphere
- building, hall: 6.89918e-5 m2; = 627840000*3.88681138820189E-05/(627840000+950000000)+950000000*0.0000889 /(627840000+950000000); lognormal variance with pedigree 0.3046, pedigree (2,1,3,5,1)
  square meters of building divided by production per year and life time of the plant
- chemical, organic: 3.97911e-5 kg; lognormal variance with pedigree 0.0146, pedigree (4,4,3,5,1)
  Sodium carbonate, used for preparing sizing solution
  properties: carbon content, fossil 0.628, dry mass 1 kg, heating value, net 19.03 MJ, wet mass 1 kg
  note on carbon content, fossil: This dataset is an unweighted average of 20 organic substances (listed in Tab 88.1, ecoinvent v2.2 report 8, part II), being part of the top100 chemicals included in this database. The C-content has also been calculated as an unweighted average of the C content of the substances composing this dataset.
- electricity, low voltage: 0.00175746, 0.00950952, 0.000369571, 0.000143691, 0.0100304, 0.00239078, 0.000144183, 0.00049275, 0.000196884, 0.088528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 kWh (46 suppliers, which the file names only by identifier); sum of these 0.250684 kWh; lognormal variance with pedigree 0.0066, pedigree (1,4,3,5,1)
  sum of electricity used for
  Beaming
  Weaving
  Damping
  Calendering
  Lapping
  Compressor
- electricity, medium voltage: 7.69963e-5, 6.84818e-6, 0.000597087, 0.000782424, 0.000828591, 0.000422043, 5.82906e-5, 0.000368936, 1.55737e-5, 0.00249343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 kWh (46 suppliers, which the file names only by identifier); sum of these 0.0842925 kWh; lognormal variance with pedigree 0.0126, pedigree (4,1,3,5,1)
  Industry data. The electricity data from the industry is available for a combined process of yarn and jute fabric production. Thus, the value is seperated using the ratio of the electricity consumption of the specific machinaries from the article Sharif et al 2016.
- maize starch: 0.00102542 kg; lognormal variance with pedigree 0.0146, pedigree (4,4,3,5,1)
  used for preparing sizing solution
  properties: carbon content, non-fossil 0.46, dry mass 0.86 kg, heating value, net 11.64 MJ, water content 0.162791, wet mass 1 kg
  note on carbon content, non-fossil: C-content of starch is considered 46% on dry mass basis (from "Evolutionary and Biochemical Aspects", A.D. Kay and T. Vrede (in Global Ecology, 2010, Elsevier B.V., S.E. Jørgensen Ed.)).
- salicylic acid: 3.97911e-5 kg; lognormal variance with pedigree 0.0146, pedigree (4,4,3,5,1)
  used for preparing sizing solution
  properties: heating value, net 23.71 MJ
- yarn, jute: 1 kg; lognormal variance with pedigree 0.0066, pedigree (1,4,3,5,1)
  properties: carbon content, non-fossil 0.490909, dry mass 1 kg, heating value, net 14.87 MJ, wet mass 1 kg

## Inputs from nature
- Water, well, in ground [natural resource, in water]: 0.000138195 m3; name water; lognormal variance with pedigree 0.0066, pedigree (1,4,3,5,1)
  used for damping and preparing sizing solution. This is completly absorbed in fabric hence no output of water to air or wastewater considered here.

## Extrapolations
Data is a weighted average from Indian and Bangladesh primary data.
