# treatment of scrap tin sheet, sanitary landfill

Dataset: EcoSpold 2, unit process
Geography: RoW
Time period: 1994-01-01 to 2023-12-31
Technology level: current
Classification: ISIC rev.4 ecoinvent: 3821:Treatment and disposal of non-hazardous waste
Scenario: Business-as-Usual
System model: Allocation, cut-off by classification
Generated by: Nikolia Stoikou
Database: ecoinvent
isCopyrightProtected: true
accessRestrictedTo: 1

## General comment
This dataset represents the activity of waste disposal of 'scrap tin sheet' in a sanitary landfill. Recommended use of this dataset: For disposal of tin sheet packaging (tin cans, paint buckets) but without paper parts (please inventory any paper separately), which go to disposal as part of communal waste. Larger amounts of separated tin sheet will not be disposed in incinerators or landfills, but rather go to recycling. Inventoried waste contains several fractions: 99.8% tin sheet inert; 0.195% tin volatile; . Waste composition (wet, in ppmw): H2O na; O na; H na; C na; S na; N na; P na; B na; Cl 750; Br na; F na; I na; Ag na; As na; Ba na; Cd 30; Co na; Cr na; Cu 199; Hg na; Mn na; Mo na; Ni na; Pb 380; Sb na; Se na; Sn 3900; V na; Zn 202; Be na; Sc na; Sr na; Ti na; Tl na; W na; Si na; Fe 994570; Ca na; Al na; K na; Mg na; Na na. Share of carbon in initial waste waste that is biogenic 60.4%. Share of metals in waste not oxidised and bulk-recyclable (exclude very small or thin parts) Iron: 100%; Alu: 0%; Copper: 0%. Overall degradability of waste during 100 years: 50%. Degradability of composing waste fractions: tin sheet inert: 50%; tin volatile: 50%; . 0 kg waste mass remains in the landfill even after the long term period.

## Included activities start
The activity starts with the waste being available at the gate of the treatment facility. Collection and transportation of the waste to the treatment plant is not included.

## Included activities end
The activity ends with the waste being treated and waste-specific emissions from the landfill are released to the environment (air due to landfil gas, water due to landfil leachate, and subsequent into groundwater).

## Geography
The site has mean annual temperature (MAT) of 16.743579766537 degC, mean annual precipitation (MAP) of 1250.84108527132 mm/year, and net infiltration of 790.252035689178 mm/year.The leachate percolating through the landfill has an average residence time of 6.33 years.
References
UN data, 2020. Precipitation, Environment Statistics Database, United Nations Statistics Division Available at: http://data.un.org/Data.aspx?q=precipitation&d=ENV&f=variableID%3a6;
World Bank, 2022. Surface area (sq.km), World Bank Group Available at: https://data.worldbank.org/indicator/AG.SRF.TOTL.K2;
Doka G.,2021. A model for composition-specific life cycle inventories of regionalised wastewater fates, Zurich, Switzerland. http://www.doka.ch/publications.htm

## Technology
This is an inventory for a sanitary (controlled) landfill for municipal solid waste. Ultimate average landfill height is 20 meters. Operation phase duration is 30 years. The total raw landfill gas mass produced in the landfill from this waste is 0.00001239 kg. The total CH4 mass in the raw landfill gas is 0 kg. Percentage of landfill gas directly emitted is 47w%. Percentage of landfill gas captured and flared is 18.02w%. Percentage of landfill gas captured and utilised is 34.98%. Conversion efficiencies are 27.8e% for electricity and 13.5e% for useful heat. Leachate collected during the first 100 years is collected and treated region-specifically before emission. Based on average waste composition and climate data the end of carbonate phase is estimated to be reached 2'863 years after waste deposition.

## Reference product
- scrap tin sheet: -1 kg; By-product classification Waste; CPC 39366: Waste and scrap of tin; HS2017 800200: Tin; waste and scrap
  Main reference product of this activity
  production volume 1067.88 kg
    Calculated as sum of all the global producing activities in the database
  property price 0 EUR2005
    Waste products are assigned a price of zero as they are assumed to require further treatment.
  properties: cadmium content 2.99992e-5, carbon allocation 0 kg, carbon content 0, carbon content, fossil 0, carbon content, non-fossil 0, chlorine content 0.00074998, copper content 0.000198995, dry mass 1 kg, hydrogen content 1.61998e-6, iron content 0.994539, lead content 0.00037999, nitrogen content 4.80848e-6, oxygen content 0.000588462, tin content 0.00389989, water content 0, water in wet mass 0 kg, wet mass 1 kg, zinc content 0.000201995

## Inputs from technosphere
- cast iron: 1.4775e-6 kg; lognormal variance with pedigree 0.32902, pedigree (1,1,4,1,1)
  For sewer auxiliary materials.
  Uncertainty: Uncertainty calculated from uncertainty in base parameters.
  properties: carbon content, fossil 0.04, dry mass 1 kg, wet mass 1 kg
- concrete, 30MPa: 6.32495e-10, 2.93771e-9, 1.24314e-7, 1.22422e-8, 3.017e-9 m3 (5 suppliers, which the file names only by identifier); sum of these 1.43144e-7 m3; lognormal variance with pedigree 0.32902, pedigree (1,1,4,1,1)
  For leachate collection tanks and sewer pipe.
  Uncertainty: Uncertainty calculated from uncertainty in base parameters.
  properties: dry mass 2205 kg, water content 0.0816327, wet mass 2385 kg
- diesel, burned in building machine: 0.0484691 MJ; lognormal variance with pedigree 0.32902, pedigree (1,1,4,1,1)
  For waste distribution and compaction, construction diesel for base and compartment seals, for access street and sewer construction.
  Uncertainty: Uncertainty calculated from uncertainty in base parameters.
  properties: heating value, net 1 MJ
- electricity, low voltage: 5.43961e-9, 3.64989e-9, 5.7222e-7, 6.43825e-9, 7.23264e-9, 5.34534e-9, 9.03154e-9, 2.5543e-8, 6.58121e-9, 7.93639e-9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 kWh (30 suppliers, which the file names only by identifier); sum of these 1.50256e-5 kWh; lognormal variance with pedigree 0.028759, pedigree (1,1,4,1,1)
  Administrative building electricity consumption.
  Uncertainty: Uncertainty calculated from uncertainty in base parameters.
- excavation, hydraulic digger: 0.000388408 m3; lognormal variance with pedigree 0.32902, pedigree (1,1,4,1,1)
  Excavation work for landfill construction, sewer construction and recultivation.
  Uncertainty: Uncertainty calculated from uncertainty in base parameters.
- excavation, skid-steer loader: 0.000388408 m3; lognormal variance with pedigree 0.32902, pedigree (1,1,4,1,1)
  (same comment as for excavation, hydraulic digger)
- extrusion, plastic pipes: 8.50841e-5 kg; lognormal variance with pedigree 0.32902, pedigree (1,1,4,1,1)
  For base and interior drain system of landfill, sewer auxiliary materials.
  Uncertainty: Uncertainty calculated from uncertainty in base parameters.
- gravel, round: 4.17081e-5, 0.160374 kg (2 suppliers, which the file names only by identifier); sum of these 0.160416 kg; lognormal variance with pedigree 0.32902, pedigree (1,1,4,1,1)
  For base and flank gravel beds and concrete, for access street, for drainage beds, for recultivation layer.
  Uncertainty: Uncertainty calculated from uncertainty in base parameters.
  properties: dry mass 1 kg, wet mass 1 kg
- heat, district or industrial, other than natural gas: 0.00161303 MJ; lognormal variance with pedigree 0.028759, pedigree (1,1,4,1,1)
  Administrative building space heat demand.
  Uncertainty: Uncertainty calculated from uncertainty in base parameters.
  property corresponding fuel use, propane, furnace >100kW 0 MJ; name fuel_use
  properties: heating value, net 1 MJ
  note on corresponding fuel use, propane, furnace >100kW: Lower heating value of the fuel input related to the heat/electricity output, taken directly from ecoinvent v3.0 dataset "heat production, natural gas, at industrial furnace >100kW, GLO 2000".
- leachate, SLF, scrap tin sheet: -0.00396608 m3
  Landfill leachate captured during short-term sent to wastewater treatment.
  production volume
    calculated in proportion to landfilled waste input
  properties: dry mass 1.91729 kg, fossil share of carbon 1, mass concentration, TOC 5.07991e-8 kg/m3, mass concentration, cadmium 6.6668e-7 kg/m3, mass concentration, chlorine 0.000186838 kg/m3, mass concentration, copper 1.23071e-7 kg/m3, mass concentration, hydrogen 7.08666e-9 kg/m3, mass concentration, iron 0.00172527 kg/m3, mass concentration, lead 2.82774e-7 kg/m3, mass concentration, nitrogen 1.12626e-6 kg/m3, mass concentration, oxygen 2.57424e-6 kg/m3, mass concentration, tin 2.9024e-6 kg/m3, mass concentration, zinc 1.20855e-6 kg/m3, water content 520.569, wet mass 1000 kg
- pitch: 0.000284035, 6.27566e-6, 2.39916e-6, 0.000110115, 1.81756e-5, 0.00160568, 0.000364896 kg (7 suppliers, which the file names only by identifier); sum of these 0.00239157 kg; lognormal variance with pedigree 0.32902, pedigree (1,1,4,1,1)
  For base and compartment seals and access street construction.
  Uncertainty: Uncertainty calculated from uncertainty in base parameters.
  properties: carbon content, fossil 0.83, dry mass 1 kg, heating value, net 28 MJ, wet mass 1 kg
- polyethylene, high density, granulate: 0.00026895 kg; lognormal variance with pedigree 0.32902, pedigree (1,1,4,1,1)
  For base and compartment seals, for base and interior drain system of landfill, sewer auxiliary materials.
  Uncertainty: Uncertainty calculated from uncertainty in base parameters.
  properties: carbon content, fossil 0.857143, dry mass 1 kg, heating value, net 42.47 MJ, wet mass 1 kg
- polypropylene, granulate: 2.23864e-7 kg; lognormal variance with pedigree 0.32902, pedigree (1,1,4,1,1)
  (same comment as for cast iron)
  properties: carbon content, fossil 0.857143, dry mass 1 kg, heating value, net 32.78 MJ, wet mass 1 kg
  note on heating value, net: Value extracted from "treatment of waste polypropylene, open burning"
- polyvinylchloride, bulk polymerised: 2.23864e-7 kg; lognormal variance with pedigree 0.32902, pedigree (1,1,4,1,1)
  (same comment as for cast iron)
  properties: carbon content, fossil 0.387097, dry mass 1 kg, heating value, net 21.5 MJ, wet mass 1 kg
- reinforcing steel: 8.73069e-6 kg; lognormal variance with pedigree 0.32902, pedigree (1,1,4,1,1)
  (same comment as for cast iron)
  properties: carbon content, fossil 0.004, dry mass 1 kg, wet mass 1 kg
- sand: 1.01342e-6, 1.21339e-8, 6.59492e-5, 5.26121e-9 kg (4 suppliers, which the file names only by identifier); sum of these 6.698e-5 kg; lognormal variance with pedigree 0.32902, pedigree (1,1,4,1,1)
  (same comment as for cast iron)
  properties: dry mass 1 kg, wet mass 1 kg
- steel, chromium steel 18/8, hot rolled: 3.04455e-6 kg; lognormal variance with pedigree 0.32902, pedigree (1,1,4,1,1)
  (same comment as for cast iron)
  properties: carbon content, fossil 0.0008, dry mass 1 kg, wet mass 1 kg
- synthetic rubber: 8.95455e-8 kg; lognormal variance with pedigree 0.32902, pedigree (1,1,4,1,1)
  (same comment as for cast iron)
  properties: carbon content, fossil 0.871949, dry mass 1 kg, heating value, net 26.42 MJ, wet mass 1 kg
- tap water: 3.46052e-6, 6.45716e-6, 1.73951e-5, 2.0939e-6, 8.72606e-5, 0.000998568, 0.000745655 kg (7 suppliers, which the file names only by identifier); sum of these 0.00186089 kg; lognormal variance with pedigree 0.32902, pedigree (1,1,4,1,1)
  (same comment as for cast iron)
  properties: carbon content, fossil 0.00178991, dry mass 0.000337476 kg, water content 2962.17, wet mass 1 kg

## Inputs from nature
- Organic carbon, placed in landfill [inventory indicator, waste]: 1.88085e-6 kg; lognormal variance with pedigree 0.57748, pedigree (1,1,4,1,1)
  Mass of organic carbon in waste (without inorganic carbon), initially (year 1) put in sanitary landfill. The exchange represents a flow that is within the technosphere. This exchange should only be used to apply ecofactors for the Swiss LCIA method of Ecological Scarcity and not any other purpose.
  Uncertainty: uncertainty is derived from uncertainty in waste composition and flows.
- Waste mass, total, placed in landfill [inventory indicator, waste]: 1.00171 kg
  Mass of waste initially (year 1) put in sanitary landfill. The exchange represents a flow that is within the technosphere. This exchange should only be used to apply ecofactors for the Swiss LCIA method of Ecological Scarcity and not any other purpose.
- Occupation, construction site [natural resource, land]: 0.000250427 m2*year; lognormal variance with pedigree 0.32902, pedigree (1,1,4,1,1)
  For construction phase of the landfill.
  Uncertainty: Uncertainty calculated from uncertainty in base parameters.
- Occupation, dump site [natural resource, land]: 0.00150256 m2*year; lognormal variance with pedigree 0.32902, pedigree (1,1,4,1,1)
  For landfill operation phase.
  Uncertainty: Uncertainty calculated from uncertainty in base parameters.
- Occupation, shrub land, sclerophyllous [natural resource, land]: 0.000250427 m2*year; lognormal variance with pedigree 0.32902, pedigree (1,1,4,1,1)
  Restoration and aftercare phase.
  Uncertainty: Uncertainty calculated from uncertainty in base parameters.
- Occupation, traffic area, road network [natural resource, land]: 0.00185316 m2*year; lognormal variance with pedigree 0.32902, pedigree (1,1,4,1,1)
  For access road.
  Uncertainty: Uncertainty calculated from uncertainty in base parameters.
- Transformation, from dump site, sanitary landfill [natural resource, land]: 5.00853e-5 m2; lognormal variance with pedigree 0.32902, pedigree (1,1,4,1,1)
  Conversion after landfill operation.
  Uncertainty: Uncertainty calculated from uncertainty in base parameters.
- Transformation, from pasture, man made [natural resource, land]: 6.01024e-5 m2; lognormal variance with pedigree 0.32902, pedigree (1,1,4,1,1)
  Original conversion of landfill area and access road.
  Uncertainty: Uncertainty calculated from uncertainty in base parameters.
- Transformation, from shrub land, sclerophyllous [natural resource, land]: 5.00853e-5 m2; lognormal variance with pedigree 0.32902, pedigree (1,1,4,1,1)
  After restoration.
  Uncertainty: Uncertainty calculated from uncertainty in base parameters.
- Transformation, to dump site, sanitary landfill [natural resource, land]: 5.00853e-5 m2; lognormal variance with pedigree 0.32902, pedigree (1,1,4,1,1)
  Conversion to landfill area.
  Uncertainty: Uncertainty calculated from uncertainty in base parameters.
- Transformation, to forest, unspecified [natural resource, land]: 5.00853e-5 m2; lognormal variance with pedigree 0.32902, pedigree (1,1,4,1,1)
  Conversion to forest after renaturation.
  Uncertainty: Uncertainty calculated from uncertainty in base parameters.
- Transformation, to shrub land, sclerophyllous [natural resource, land]: 5.00853e-5 m2; lognormal variance with pedigree 0.32902, pedigree (1,1,4,1,1)
  Initial restoration and renaturation.
  Uncertainty: Uncertainty calculated from uncertainty in base parameters.
- Transformation, to traffic area, road network [natural resource, land]: 1.00171e-5 m2; lognormal variance with pedigree 0.32902, pedigree (1,1,4,1,1)
  Construction of access road.
  Uncertainty: Uncertainty calculated from uncertainty in base parameters.

## Emissions to nature
- Cadmium II [air, non-urban air or from high stacks]: 1.7683e-8 kg; lognormal variance with pedigree 1.8526, pedigree (1,1,4,1,1)
  Emission from direct release or combustion of landfill biogas.
  Uncertainty: Uncertainty calculated from uncertainty of the waste composition of this waste, uncertainty in waste decomposition and short-term leaching in landfill-
- Carbon dioxide, fossil [air, non-urban air or from high stacks]: 2.9601e-6 kg; lognormal variance with pedigree 0.58965, pedigree (1,1,4,1,1)
  (same comment as for Cadmium II)
- Carbon monoxide, fossil [air, non-urban air or from high stacks]: 1.80599e-10 kg; lognormal variance with pedigree 1.2366, pedigree (1,1,4,1,1)
  (same comment as for Cadmium II)
- Copper ion [air, non-urban air or from high stacks]: 1.39214e-10 kg; lognormal variance with pedigree 2.4845, pedigree (1,1,4,1,1)
  (same comment as for Cadmium II)
- Heat, waste [air, non-urban air or from high stacks]: 1.73265e-5 MJ
  Emission from direct release or incineration of landfill biogas.
- Hydrochloric acid [air, non-urban air or from high stacks]: 1.06608e-5 kg; lognormal variance with pedigree 1.0297, pedigree (1,1,4,1,1)
  (same comment as for Cadmium II)
- Iron ion [air, non-urban air or from high stacks]: 1.70807e-6 kg; lognormal variance with pedigree 1.4981, pedigree (1,1,4,1,1)
  (same comment as for Cadmium II)
- Lead II [air, non-urban air or from high stacks]: 3.73189e-10 kg; lognormal variance with pedigree 2.3551, pedigree (1,1,4,1,1)
  (same comment as for Cadmium II)
- Methane, fossil [air, non-urban air or from high stacks]: 3.84141e-7 kg; lognormal variance with pedigree 0.63018, pedigree (1,1,4,1,1)
  (same comment as for Cadmium II)
- NMVOC, non-methane volatile organic compounds [air, non-urban air or from high stacks]: 3.41673e-12 kg; lognormal variance with pedigree 0.63018, pedigree (1,1,4,1,1)
  (same comment as for Cadmium II)
- Nitrogen oxides [air, non-urban air or from high stacks]: 4.27668e-10 kg
  Emission from direct release or combustion of landfill biogas.
- Particulate Matter, < 2.5 um [air, non-urban air or from high stacks]: 6.06296e-11 kg; lognormal variance with pedigree 0.89082, pedigree (1,1,4,1,1)
  (same comment as for Cadmium II)
- Tin ion [air, non-urban air or from high stacks]: 2.87281e-9 kg; lognormal variance with pedigree 2.0904, pedigree (1,1,4,1,1)
  (same comment as for Cadmium II)
- Zinc II [air, non-urban air or from high stacks]: 1.06448e-9 kg; lognormal variance with pedigree 2.2206, pedigree (1,1,4,1,1)
  (same comment as for Cadmium II)
- Non-hazardous waste disposed [inventory indicator, waste]: 1.00171 kg
  Inventory indicator for waste mass disposed in landfill. To be used in EN15804 "other data" results.
- Ammonium [water, ground-, long-term]: 3.17558e-16 kg; lognormal variance with pedigree 2.1071, pedigree (1,1,4,1,1)
  Emissions from long-term leachate (>100a).
  Uncertainty: Uncertainty calculated from uncertainty of the waste composition of this waste, uncertainty in waste decomposition and short-term leaching in landfill
- BOD5, Biological Oxygen Demand [water, ground-, long-term]: 1.94827e-7 kg; lognormal variance with pedigree 0.59231, pedigree (1,1,4,1,1)
  Emissions from long-term leachate (>100a).
  Uncertainty: Uncertainty calculated from uncertainty of the waste composition of this waste, uncertainty in waste decomposition and short-term leaching in landfill.
- COD, Chemical Oxygen Demand [water, ground-, long-term]: 8.22978e-7 kg; lognormal variance with pedigree 0.59231, pedigree (1,1,4,1,1)
  (same comment as for Ammonium)
- Cadmium II [water, ground-, long-term]: 2.74556e-5 kg; lognormal variance with pedigree 1.1309, pedigree (1,1,4,1,1)
  (same comment as for Ammonium)
- Chloride [water, ground-, long-term]: 7.4998e-13 kg; lognormal variance with pedigree 2.625, pedigree (1,1,4,1,1)
  (same comment as for Ammonium)
- Copper ion [water, ground-, long-term]: 0.000198529 kg; lognormal variance with pedigree 0.8785, pedigree (1,1,4,1,1)
  (same comment as for Ammonium)
- DOC, Dissolved Organic Carbon [water, ground-, long-term]: 7.52437e-7 kg; lognormal variance with pedigree 0.59231, pedigree (1,1,4,1,1)
  (same comment as for Ammonium)
- Iron ion [water, ground-, long-term]: 0.988033 kg; lognormal variance with pedigree 0.00800717, pedigree (1,1,4,1,1)
  (same comment as for Ammonium)
- Lead II [water, ground-, long-term]: 0.000378923 kg; lognormal variance with pedigree 0.79276, pedigree (1,1,4,1,1)
  (same comment as for Ammonium)
- Nitrate [water, ground-, long-term]: 3.33963e-17 kg; lognormal variance with pedigree 2.1071, pedigree (1,1,4,1,1)
  (same comment as for Ammonium)
- Nitrite [water, ground-, long-term]: 1.72838e-17 kg; lognormal variance with pedigree 2.1071, pedigree (1,1,4,1,1)
  (same comment as for Ammonium)
- Nitrogen, organic bound [water, ground-, long-term]: 5.19028e-16 kg; lognormal variance with pedigree 2.1071, pedigree (1,1,4,1,1)
  (same comment as for Ammonium)
- TOC, Total Organic Carbon [water, ground-, long-term]: 7.52437e-7 kg; lognormal variance with pedigree 0.59231, pedigree (1,1,4,1,1)
  (same comment as for Ammonium)
- Tin ion [water, ground-, long-term]: 0.00388895 kg; lognormal variance with pedigree 0.49104, pedigree (1,1,4,1,1)
  (same comment as for Ammonium)
- Zinc II [water, ground-, long-term]: 0.000197416 kg; lognormal variance with pedigree 0.87658, pedigree (1,1,4,1,1)
  (same comment as for Ammonium)
