# evaporation of natural gas, import from AE

Dataset: EcoSpold 2, unit process
Geography: RoW
Time period: 2021-01-01 to 2023-12-31
Technology level: current
Classification: ISIC rev.4 ecoinvent: 3520:Manufacture of gas; distribution of gaseous fuels through mains
Scenario: Business-as-Usual
System model: Allocation, cut-off by classification
Share of production covered: 100 %
Generated by: Maresa Bussa
Published in: Bussa, M. 2023
Database: ecoinvent
isCopyrightProtected: true
accessRestrictedTo: 1

## General comment
This dataset describes the gasification of liquefied natural gas [m3] from United Arab Emirates in an evaporation plant in the geography of Global (GLO).
The reference flow refers to 1 standard cubic meter of natural gas in the gaseous state. The volume of liquified natural gas is around 1/600th of the gaseous volume at standard conditions. Evaporation of natural gas is the process used to transform liquefied natural gas (LNG), delivered by oversea tanker transport, to gaseous natural gas.
According to Bussa et al. (2023), there are various regasification technologies to vaporize LNG, with the most common heat sources being ambient air, sea water, and natural gas. The technology selection depends on the geographical and meteorological conditions of the location. The technology mix in Europe (also assumed for other geographies in the database) is made up of 60% open rack vaporizers (ORV) and 40% submerged combustion vaporizers (Agarwal et al. 2017). After the LNG has been evaporated, it can be feed into the natural gas distribution network.
Reference(s):
M. Bussa, N. Jungbluth, C. Meili (2023) Life cycle inventories for long-distance transport and distribution of natural gas. ESU-services Ltd. Schaffhausen, Switzerland. Available from: http://esu-services.ch/data/public-lci-reports/

## Included activities start
The activity starts with the arrival of the liquefied natural gas (LNG) to the evaporation facility in the receiving region.

## Included activities end
The activity ends with the supply of natural gas, high pressure, ready for further transmission or distribution. The needed input of natural gas, the energy and water consumption, emissions due to gas leakage, as well as the infrastructure is considered.

## Geography
Global region

## Technology
Various regasification technologies to evaporate LNG are available; common heat sources are ambient air, sea water and natural gas. The selected technology depends on the geographical and meteorological conditions of the location. Open rack vaporizers (ORV) use seawater to vaporize the LNG. Sodium hypochlorite is added to the seawater inlet stream to avoid algae growth within the heat exchanger tubes. The colder seawater is then, together with the sodium hypochlorite, discharged to the sea. Seawater is only an effective heat source for vaporizing LNG if its temperature is higher 5 °C. In submerged combustion vaporizers (SCV), LNG flows in tubes through a water bath, which is heated by burning natural gas. SCVs are mainly used for peak shaving purposes. The technology mix in Europe (assumed the same for all geographies in the database) is calculated based on the shares of technologies used: 60 % open rack vaporizers (ORV) and 40 % submerged combustion vaporizers (Agarwal et al. 2017). Methane emissions from the evaporation are estimated as 3.5E-04 kg methane/m3 (Schori et al. 2012).

## Time period
Data on energy use for the evaporation stems of a review of common technologies from 2017 and 2019.

## Reference product
- natural gas, high pressure: 1 m3; name RP_amount; By-product classification allocatable product; CPC 12020: Natural gas, liquefied or in the gaseous state; HS2017 271121: Petroleum gases and other gaseous hydrocarbons; in gaseous state, natural gas; CAS 8006-14-2
  Output
  production volume 5.54867e9 m3
    Annual production volume (expressed in m3 at standard conditions, i.e., in gaseous form) based on LNG trade movements in 2021, from bp Statistical Review of World Energy June 2022.
  property heating value, gross 40 MJ
    At standard conditions; based on Meili et al. (2022) section 5.2
  property heating value, net 36 MJ
    At standard conditions; based on Meili et al. (2022) section 5.2
  property price 0.16673 EUR2005
    Calculated value based on data from the United Nations Commodity Trade Statistics Database (http://data.un.org/Data.aspx?q=natural+gas&d=ComTrade&f=_l1Code%3a28%3bcmdCode%3a271121; accessed 12 October 2023). UN Comtrade category: 271121 - Natural gas in gaseous state. An average for 2019-2021 was used and adjusted for inflation to the year 2005. The average price of imports and exports into the four main markets (EU, US, JP, and CN) was determined. Density of natural gas of 0.735 kg/m³ for unit conversion was used.
  properties: amount in multioutput activity_m3 0 m3, carbon allocation 0.544635 kg, carbon content 0.741, carbon content, fossil 0.741, carbon content, non-fossil 0, dry mass 0.735 kg, water content 0, water in wet mass 0 kg, wet mass 0.735 kg

## Inputs from technosphere
- natural gas processing plant: 7.89e-13 unit; lognormal variance with pedigree 0.0512951, pedigree (5,3,3,3,3)
  Estimate for Europe, as described in Bussa et al. 2023
- natural gas, burned in gas turbine: 0.24768 MJ; lognormal variance with pedigree 0.0169951, pedigree (4,2,2,3,3)
  Qualified estimates from different gas companies, as described in Bussa et al. 2023
- natural gas, liquefied: 1.00026 m3; = RP_amount+0.735*CH4_toAir; lognormal variance with pedigree 0.00059512, pedigree (1,1,1,1,1)
  Calculated based on main output and CH4 leakage
  properties: carbon content, fossil 0.741, dry mass 0.735 kg, heating value, gross 40 MJ, heating value, net 36 MJ, wet mass 0.735 kg
  note on carbon content, fossil: Set equal to that of 'natural gas, high pressure' (based on composition in Bussa et al. (2021), tab. 3.1).
  note on heating value, gross: Set equal to that of 'natural gas, high pressure' (at standard conditions; based on Meili et al. 2022, section 5.2)
- sodium hypochlorite, without water, in 15% solution state: 0.00390964, 0.0296904 kg (2 suppliers, which the file names only by identifier); sum of these 0.0336 kg; lognormal variance with pedigree 0.0266951, pedigree (4,5,3,3,3)
  Environmental report of Greek site, as described in Bussa et al. 2023
  properties: dry mass 1 kg, wet mass 1 kg

## Inputs from nature
- Water, salt, ocean [natural resource, in water]: 6.42 m3; lognormal variance with pedigree 0.0672005, pedigree (4,5,3,3,3)
  Environmental report of Greek site, as described in Bussa et al. 2023

## Emissions to nature
- Methane, fossil [air, non-urban air or from high stacks]: 0.00035 kg; name CH4_toAir; lognormal variance with pedigree 0.0503005, pedigree (2,3,4,1,1)
  Calculated based on leakage and average gas composition, as described in Bussa et al. 2023
- Hypochlorite [water, ocean]: 0.0232219 kg; = NaOCl_amount*((15.999+35.45)/74.442); lognormal variance with pedigree 0.0672005, pedigree (4,5,3,3,3)
  Based on input of sodium hypochlorite
- Sodium I [water, ocean]: 0.0103767 kg; = NaOCl_amount*(22.990/74.442); lognormal variance with pedigree 0.0672005, pedigree (4,5,3,3,3)
  Based on input of sodium hypochlorite
- Water [water, ocean]: 6.42 m3; lognormal variance with pedigree 0.0672005, pedigree (4,5,3,3,3)
  Based on water input.

## Sampling procedure
Literature. The energy use of the evaporation process is based on the average values of different scientific publications summarized in Pospíšil et al. 2019 (qualified estimates). The material consumption of the evaporation process calculated based on figures given in an environmental study for a LNG terminal in Greece (Asprofos Engineering 2014) (qualified estimates). The infrastructure requirements are based on rough estimates. Reference(s): Pospíšil J., Charvát P., Arsenyeva O., Klimeš L., Špiláček M. and Klemeš J. J. (2019) Energy demand of liquefaction and regasification of natural gas and the potential of LNG for operative thermal energy storage. In: Renewable and Sustainable Energy Reviews, 99, pp. 1-15, 10.1016/j.rser.2018.09.027 Asprofos Engineering 2014 Asprofos Engineering (2014) Cumulative Impacts Assessment for the 2nd Upgrade of the LNG Terminal in Revithoussa Island, Greece.

## Extrapolations
The technology mix in Europe, i.e., 60% open rack vaporizers (ORV) and 40% submerged combustion vaporizers according to Agarwal et al. (2017; in Bussa et al. 2023), is also assumed for other geographies in the database.
