# maize seed production, organic, at farm

Dataset: EcoSpold 2, unit process
Geography: RoW
Time period: 2000-01-01 to 2023-12-31
Technology level: current
Classification: ISIC rev.4 ecoinvent: 0111:Growing of cereals (except rice), leguminous crops and oil seeds
Synonyms: corn; Zea mays L.
Scenario: Business-as-Usual
System model: Allocation, cut-off by classification
Generated by: Thomas Nemecek
Published in: Nemecek, T. 2007
Database: ecoinvent
isCopyrightProtected: true
accessRestrictedTo: 1

## General comment
This dataset represents the production of 1 kg of maize seed (fresh matter). The yield is 2600 kg/ha at a moisture content at storage of 14%.
[This dataset was already contained in the ecoinvent database version 2. It was not individually updated during the transfer to ecoinvent version 3. Life Cycle Impact Assessment results may still have changed, as they are affected by changes in the supply chain, i.e. in other datasets. This dataset was generated following the ecoinvent quality guidelines for version 2. It may have been subject to central changes described in the ecoinvent version 3 change report (http://www.ecoinvent.org/database/ecoinvent-version-3/reports-of-changes/), and the results of the central updates were reviewed extensively. The changes added e.g. consistent water flows and other information throughout the database. The documentation of this dataset can be found in the ecoinvent reports of version 2, which are still available via the ecoinvent website. The change report linked above covers all central changes that were made during the conversion process.]

## Included activities start
This activity starts after the harvest of the previous crop. The inputs of seeds is considered. Farm manure as an organic fertiliser is only accounted for in terms of direct field emissions; all pre-processes are included in the animal production systems.

## Included activities end
The dataset includes all machine operations and corresponding machine infrastructure and sheds. Machine operations are: soil cultivation, sowing, fertilisation, weed control, combine-harvest, transport from field to regional processing centre (10 km) and drying of grains. Further, direct field emissions are included. This activity ends after drying of grains at the regional processing centre.

## Geography
Values refer to the situation in Switzerland.

## Technology
Organic production

## Parameters
- fraction, irrigation water to surface water: 0.2 dimensionless; name fraction_IW_to_surface_water; lognormal variance with pedigree 0.0886, pedigree (4,3,1,1,4)
- fraction, irrigation water, to air: 0.586986 dimensionless; name fraction_IW_to_air; lognormal variance with pedigree 0.0409, pedigree (2,2,2,1,1)
- fraction, irrigation water, to ground water: 0.8 dimensionless; name fraction_IW_to_ground_water; lognormal variance with pedigree 0.0886, pedigree (4,3,1,1,4)

## Reference product
- maize seed, organic, at farm: 1 kg; name REF_PRODUCT; By-product classification allocatable product; CPC 01121: Maize (corn), seed; HS2017 100510: Cereals; maize (corn), seed
  production volume 2.27249e6 kg
    Calculated as 0.003215 kg seed / kg maize grain yield and 0.00055 kg seed / kg silage
  property carbon content, non-fossil 0.46957; name REF_PRODUCT_C_content_non_fossil
    biogene carbon content on a dry matter basis
    Composition data obtained from Corn Grain Whole, in (http://beefmagazine.com/images/2009%20feed%20table.pdf). First, composition data were refered to 1 kg dry mass. Then, C-contents were calculated considering a C-content/dry mass of 46% in carbohydrates (including fibres), 53% in proteins and 75% in fats. All data from 'Evolutionary and Biochemical Aspects', A.D. Kay and T. Vrede (in Global Ecology, 2010, Elsevier B.V., S.E. Jørgensen Ed.).
  property dry mass 0.88 kg; name REF_PRODUCT_DM
  property energy content 15.9272 MJ; name REF_PRODUCT_energy_content
    See chapter 'Product Properties' in '01_crop production - yields & inputs CH & Europe_v1.0.pdf', section 'AGRICULTURAL PRODUCTION IN SWITZERLAND' - pdf-document on the dedicated talk page of ecoinvent (www.ecoinvent.org/documentation)
  property price 0.180202 EUR2005
    Calculated based on inputs: The price of the product has been calculated as a sum of the values of the material and energy inputs for this product. This value is therefore a rough estimation. It may underestimate the real price since there are additional expenses when producing any product. These expences can include for example labour costs, treatment of waste materials and profit for the producer. Please consider carefully whether this level of data quality is acceptable for your application.
  properties: carbon allocation 0.413222 kg, carbon content 0.46957, carbon content, fossil 0, water content 0.136364, water in wet mass 0.12 kg, wet mass 1 kg

## Inputs from technosphere
- combine harvesting: 0.00038462 ha; lognormal variance with pedigree 0.0426, pedigree (2,1,5,5,1)
  Based on the inventory for commercial crop production 'maize production, organic CH'. Adaptations: see '01_crop production - seed production & processing_v1.0.pdf' - pdf-document on the dedicated talk page of ecoinvent (www.ecoinvent.org/documentation)
- drying of bread grain, seed and legumes: 0.35385 l; lognormal variance with pedigree 0.0426, pedigree (2,1,5,5,1)
  (same comment as for combine harvesting)
- electricity, low voltage: 0.00056967, 2.54292e-5, 0.000399891, 0.00830025, 0.000819275, 5.1031e-6, 0.00188116, 0.00285765, 0.00014157 kWh (9 suppliers, which the file names only by identifier); sum of these 0.015 kWh; lognormal variance with pedigree 0.0426, pedigree (2,1,5,5,1)
  (same comment as for combine harvesting)
- green manure, organic, until April: 0.00038462 ha; lognormal variance with pedigree 0.0426, pedigree (2,1,5,5,1)
  (same comment as for combine harvesting)
- irrigation: 6.03753e-6, 0.0141588, 0.000120741, 0.00736792, 9.30199e-5, 0.000249404, 0.000342826, 0.0265787, 5.44125e-5, 0.00326995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 m3 (16 suppliers, which the file names only by identifier); sum of these 0.0550005 m3; source Siebert, S. 2010; lognormal variance with pedigree 0.0447, pedigree (2,2,5,5,1)
  Calculated based on literature values (Doll, 2010) and partially modelled at ETH (Pfister, S.).
  properties: dry mass 0.11 kg, water content 9089.91, wet mass 1000 kg
- liquid manure spreading, by vacuum tanker: 0.017828 m3; lognormal variance with pedigree 0.0426, pedigree (2,1,5,5,1)
  (same comment as for combine harvesting)
- maize seed, organic, for sowing: 0.0057692 kg; name SEED; lognormal variance with pedigree 0.0426, pedigree (2,1,5,5,1)
  (same comment as for combine harvesting)
  property carbon content, non-fossil 0.46957; name SEED_C_content_non_fossil
  property dry mass 0.88 kg; name SEED_DM
  property energy content 15.9272 MJ; name SEED_energy_content
  properties: water content 0.136364, wet mass 1 kg
  note on carbon content, non-fossil: biogene carbon content on a dry matter basis Composition data obtained from Corn Grain Whole, in (http://beefmagazine.com/images/2009%20feed%20table.pdf). First, composition data were refered to 1 kg dry mass. Then, C-contents were calculated considering a C-content/dry mass of 46% in carbohydrates (including fibres), 53% in proteins and 75% in fats. All data from 'Evolutionary and Biochemical Aspects', A.D. Kay and T. Vrede (in Global Ecology, 2010, Elsevier B.V., S.E. Jørgensen Ed.).
  note on energy content: See chapter 'Product Properties' in '01_crop production - yields & inputs CH & Europe_v1.0.pdf', section 'AGRICULTURAL PRODUCTION IN SWITZERLAND' - pdf-document on the dedicated talk page of ecoinvent (www.ecoinvent.org/documentation)
- mowing, by rotary mower: 0.0023077 ha; lognormal variance with pedigree 0.0426, pedigree (2,1,5,5,1)
  (same comment as for combine harvesting)
- solid manure loading and spreading, by hydraulic loader and spreader: 7.0661 kg; lognormal variance with pedigree 0.0426, pedigree (2,1,5,5,1)
  (same comment as for combine harvesting)
- sowing: 0.0013462 ha; lognormal variance with pedigree 0.0426, pedigree (2,1,5,5,1)
  (same comment as for combine harvesting)
- tillage, harrowing, by spring tine harrow: 0.0011538 ha; lognormal variance with pedigree 0.0426, pedigree (2,1,5,5,1)
  (same comment as for combine harvesting)
- tillage, ploughing: 0.00038462 ha; lognormal variance with pedigree 0.0426, pedigree (2,1,5,5,1)
  (same comment as for combine harvesting)
- transport, tractor and trailer, agricultural: 0.01 metric ton*km; lognormal variance with pedigree 0.0426, pedigree (2,1,5,5,1)
  (same comment as for combine harvesting)

## Inputs from nature
- Carbon dioxide, in air [natural resource, in air]: 1.5064 kg; = 44/12 * (REF_PRODUCT_C_content_non_fossil * REF_PRODUCT * REF_PRODUCT_DM - SEED_C_content_non_fossil * SEED * SEED_DM); lognormal variance with pedigree 0.1327, pedigree (2,2,5,5,1)
  (same comment as for combine harvesting)
- Energy, gross calorific value, in biomass [natural resource, biotic]: 16.204 MJ; lognormal variance with pedigree 0.12706, pedigree (2,1,5,1,1)
- Occupation, annual crop, non-irrigated, extensive [natural resource, land]: 1.9231 m2*year; lognormal variance with pedigree 0.0426, pedigree (2,1,5,5,1)
  (same comment as for combine harvesting)
- Transformation, from annual crop, non-irrigated, extensive [natural resource, land]: 3.8462 m2; lognormal variance with pedigree 0.0526, pedigree (2,1,5,5,1)
  (same comment as for combine harvesting)
- Transformation, to annual crop, non-irrigated, extensive [natural resource, land]: 3.8462 m2; lognormal variance with pedigree 0.0526, pedigree (2,1,5,5,1)
  (same comment as for combine harvesting)

## Emissions to nature
- Ammonia [air, non-urban air or from high stacks]: 0.0167804 kg; lognormal variance with pedigree 0.0527, pedigree (2,2,5,5,1)
  (same comment as for combine harvesting)
- Dinitrogen monoxide [air, non-urban air or from high stacks]: 0.00154 kg; name N2O; lognormal variance with pedigree 0.0727, pedigree (2,2,5,5,1)
  (same comment as for combine harvesting)
- Nitrogen oxides [air, non-urban air or from high stacks]: 0.0003234 kg; = 0.21 * N2O; lognormal variance with pedigree 0.0727, pedigree (2,2,5,5,1)
  (same comment as for combine harvesting)
- Water [air, unspecified]: 0.0184417 m3; name water_to_air_unspecified; lognormal variance with pedigree 0.0827, pedigree (2,2,5,5,1)
  Calculated value based on literature values and expert opinion. See comments in the parametres' comment field.
  property fraction, origin: fresh water 1; name fraction_origin_fresh_water
  property fraction, origin: salt water 0; name fraction_origin_salt_water
  property fraction, origin: unspecified 0; name fraction_origin_unspecified
- Cadmium II [soil, agricultural]: 3.1684e-7 kg; lognormal variance with pedigree 0.0827, pedigree (2,2,5,5,1)
  (same comment as for combine harvesting)
- Chromium III [soil, agricultural]: 1.3152e-7 kg; lognormal variance with pedigree 0.0827, pedigree (2,2,5,5,1)
  (same comment as for combine harvesting)
- Copper ion [soil, agricultural]: 5.3802e-5 kg; lognormal variance with pedigree 0.0827, pedigree (2,2,5,5,1)
  (same comment as for combine harvesting)
- Lead II [soil, agricultural]: 6.03e-6 kg; lognormal variance with pedigree 0.0827, pedigree (2,2,5,5,1)
  (same comment as for combine harvesting)
- Mercury II [soil, agricultural]: 8.7129e-7 kg; lognormal variance with pedigree 0.0827, pedigree (2,2,5,5,1)
  (same comment as for combine harvesting)
- Nickel II [soil, agricultural]: 7.5533e-6 kg; lognormal variance with pedigree 0.0827, pedigree (2,2,5,5,1)
  (same comment as for combine harvesting)
- Zinc II [soil, agricultural]: 0.00021784 kg; lognormal variance with pedigree 0.0827, pedigree (2,2,5,5,1)
  (same comment as for combine harvesting)
- Cadmium II [water, ground-]: 1.0872e-8 kg; lognormal variance with pedigree 0.1327, pedigree (2,2,5,5,1)
  (same comment as for combine harvesting)
- Cadmium II [water, surface water]: 7.8839e-9 kg; lognormal variance with pedigree 0.1327, pedigree (2,2,5,5,1)
  (same comment as for combine harvesting)
- Chromium III [water, ground-]: 7.0072e-6 kg; lognormal variance with pedigree 0.1327, pedigree (2,2,5,5,1)
  (same comment as for combine harvesting)
- Chromium III [water, surface water]: 1.2034e-6 kg; lognormal variance with pedigree 0.1327, pedigree (2,2,5,5,1)
  (same comment as for combine harvesting)
- Copper ion [water, ground-]: 1.3631e-6 kg; lognormal variance with pedigree 0.1327, pedigree (2,2,5,5,1)
  (same comment as for combine harvesting)
- Copper ion [water, surface water]: 1.1498e-6 kg; lognormal variance with pedigree 0.1327, pedigree (2,2,5,5,1)
  (same comment as for combine harvesting)
- Lead II [water, ground-]: 1.1231e-7 kg; lognormal variance with pedigree 0.1327, pedigree (2,2,5,5,1)
  (same comment as for combine harvesting)
- Lead II [water, surface water]: 5.5145e-7 kg; lognormal variance with pedigree 0.1327, pedigree (2,2,5,5,1)
  (same comment as for combine harvesting)
- Mercury II [water, ground-]: 4.2532e-9 kg; lognormal variance with pedigree 0.1327, pedigree (2,2,5,5,1)
  (same comment as for combine harvesting)
- Mercury II [water, surface water]: 4.151e-9 kg; lognormal variance with pedigree 0.1327, pedigree (2,2,5,5,1)
  (same comment as for combine harvesting)
- Nickel II [water, surface water]: 1.0932e-6 kg; lognormal variance with pedigree 0.1327, pedigree (2,2,5,5,1)
  (same comment as for combine harvesting)
- Nitrate [water, ground-]: 0.0811909 kg; lognormal variance with pedigree 0.0827, pedigree (2,2,5,5,1)
  (same comment as for combine harvesting)
- Phosphate [water, ground-]: 4.9735e-5 kg; lognormal variance with pedigree 0.0827, pedigree (2,2,5,5,1)
  (same comment as for combine harvesting)
- Phosphate [water, surface water]: 4.9735e-5 kg; lognormal variance with pedigree 0.0827, pedigree (2,2,5,5,1)
  (same comment as for combine harvesting)
- Phosphorus [water, surface water]: 5.52e-5 kg; lognormal variance with pedigree 0.0827, pedigree (2,2,5,5,1)
  (same comment as for combine harvesting)
- Water [water, ground-]: 0.0292471 m3; name water_to_water_ground; lognormal variance with pedigree 0.1306, pedigree (4,3,5,5,4)
  Calculated value. See the parameters and their comments to understand the calculation.
  property fraction, origin: fresh water 1; name fraction_origin_fresh_water_Wgw
  property fraction, origin: salt water 0; name fraction_origin_salt_water_Wgw
  property fraction, origin: unspecified 0; name fraction_origin_unspecified_Wgw
- Water [water, surface water]: 0.00731177 m3; name water_to_water_surface; lognormal variance with pedigree 0.1306, pedigree (4,3,5,5,4)
  Calculated value. See the parameters and their comments to understand the calculation.
  property fraction, origin: fresh water 1; name fraction_origin_fresh_water_Wsw
  property fraction, origin: salt water 0; name fraction_origin_salt_water_Wsw
- Zinc II [water, ground-]: 1.113e-5 kg; lognormal variance with pedigree 0.1327, pedigree (2,2,5,5,1)
  (same comment as for combine harvesting)
- Zinc II [water, surface water]: 2.5273e-6 kg; lognormal variance with pedigree 0.1327, pedigree (2,2,5,5,1)
  (same comment as for combine harvesting)

## Sampling procedure
Data derived from literature, recommendations and expert information

## Extrapolations
none This dataset has been copied from an original dataset covering the geography CH.

## Review by Hans-Jörg Althaus 2007-11-07
passed
none
