# aluminium alloy production, AlLi

Dataset: EcoSpold 2, unit process
Geography: RoW
Time period: 2013-01-01 to 2023-12-31
Technology level: current
Classification: ISIC rev.4 ecoinvent: 2420:Manufacture of basic precious and other non-ferrous metals
Synonyms: Aluminium lithium; direct chilled vertical casting; Aluminium alloy
Tags: single enterprise data
Scenario: Business-as-Usual
System model: Allocation, cut-off by classification
Share of production covered: 100 %
Generated by: Marylène Dussault
Database: ecoinvent
isCopyrightProtected: true
accessRestrictedTo: 1

## General comment
This dataset represents the manufacturing of aluminium alloyed billets and ingots. Aluminum scrap of the same alloy is used as the main aluminium bearing input. Aluminium scrap from external source accounts for 60% of secondary aluminium in final product, while 40% of secondary aluminium is from internal sources (remelting of internal scrap in closed loop - accounted in the primary aluminium input). Primary aluminium slab is used as aluminium input up to 30%. Aluminium losses, through blast furnace slag, are accounted for. Aluminum based alloys, metal powder and pure metals are added to obtain desired alloy composition. Final product is cast by direct chilled vertical casting. This alloy is mainly used in the aeronautic sector. This dataset is based on data from the one facility in Quebec region.

## Included activities start
Activity starts with the arrival of aluminium scrap and primary aluminium ingots, which have been previously preheated, at induction furnace.

## Included activities end
This activity ends with the casting in ingot by direct chilled vertical casting and cooling. The dataset includes material and energy related to the alloy production and casting: scrap and primary metal input, preheating, induction melting, alloying, degassing, water use and ingot casting). It also includes waste treatment and onsite wastewater treatment. Infrastructure is estimated using an available ecoinvent 3.0 dataset.

## Parameters
- electricity process and auxiliairies: 2.9707 kWh; name kWh_process; lognormal variance with pedigree 0.0032, pedigree (2,4,1,1,1)
  Measured value. Electricity requirements for process and auxiliairies (heating, maintenance of furnace when no production, etc.).
- electricity wastewater treatment: 0.0843 kWh; name kWh_ww; lognormal variance with pedigree 0.0032, pedigree (2,4,1,1,1)
  Measured value. Electricity input for insitu wastewater treatment. Based on total water used in process. Note that around 42% of total water used in the process is treated, cooled and reused in closed loop.

## Reference product
- copper, cathode: 1 kg; name copper; By-product classification allocatable product; CPC 41413: Refined copper and copper alloys, unwrought; master alloys of copper; HS2017 740311: Copper; refined, unwrought, cathodes and sections of cathodes; CAS 7440-50-8
  Measured value. Based on reported copper waste send to recycling.
  production volume 8.77091 kg; = ref_pv* copper/ ref
    Calculated from production volume of reference product using the relative outputs.
  property price 3.57105 EUR2005
    Price calculated as 5-year market average (2015-2019; USD/kg; USGS [2020]) and converted to EUR2005 (USD2019/EUR2005 exchange rate: 0.62; Official Data Foundation [2020] and Macrotrends [2020]).
    References:
    Official Data Foundation (2020). Inflation Calculator [Online]. Available from: https://www.officialdata.org/us/inflation/2005?endYear=2019&amount=1 [Accessed 28/07/2020]
    USGS (2020). Mineral Commodity Summaries 2020 [Online]. Available from: https://pubs.usgs.gov/periodicals/mcs2020/mcs2020.pdf [Accessed 28/07/2020]
    Macrotrends (2020). Euro Dollar Exchange Rate (EUR USD) - Historical Chart [Online]. Available from: https://www.macrotrends.net/2548/euro-dollar-exchange-rate-historical-chart [Accessed 28/07/2020]
  properties: allocation factor 2.14262e-6, carbon allocation 0 kg, carbon content 0, carbon content, fossil 0, carbon content, non-fossil 0, dry mass 1 kg, true value 7.71346e-6, water content 0, water in wet mass 0 kg, wet mass 1 kg

## Inputs from technosphere
- aluminium casting facility: 1.52761e-10 unit; lognormal variance with pedigree 0.0907, pedigree (5,4,4,3,4)
  Estimated value. Taken directly from ecoivent v.2.2 "aluminium, secondary" dataset. The land use, the machinery and buildings for an aluminium casting facility. The process used represents a facility with annual production of 130000 ton/yr for 50 yrs. The production levels were set according to the reference flow.
- aluminium scrap, new: 0.196562, 0.196562 kg (2 suppliers, which the file names only by identifier); sum of these 0.393124 kg; lognormal variance with pedigree 0.0112, pedigree (2,4,4,1,1)
  Calculated value. Input of main aluminum source for the given reference flow. Include scrap input in final product from external sources. Value is based on primary data.
  properties: dry mass 1 kg, wet mass 1 kg
- aluminium, primary, ingot: 0.0888554, 0.489356 kg (2 suppliers, which the file names only by identifier); sum of these 0.578211 kg; = 0.547288+(slag* Al_slag); lognormal variance with pedigree 0.0112, pedigree (2,4,4,1,1)
  Calculated value. Based on reported content of primary aluminium from cold slabs in final product, aluminium losses in slag and internal aluminium recycling (remelting of internal scrap in closed loop).
  properties: dry mass 1 kg, wet mass 1 kg
- blast furnace slag: -0.128458 kg; name slag; lognormal variance with pedigree 0.0432, pedigree (2,4,1,1,4)
  Approximated process. Represents slag. Value is based on primary data.
  production volume; = ref_pv* slag / ref
    Calculated from production volume of reference product using the relative outputs.
  property aluminium content 0.275; name Al_slag
  properties: dry mass 1 kg, wet mass 1 kg
  note on aluminium content: aluminium content on a dry matter basis varies between 25 and 30%
- blast furnace sludge: -6.18292e-7, -2.46696e-8, -2.15113e-6, -7.02555e-7 kg (4 suppliers, which the file names only by identifier); sum of these -3.49664e-6 kg; lognormal variance with pedigree 0.1232, pedigree (2,4,1,1,5)
  Approximated process. Represents metallic containing sludge. Value based on primary data.
  production volume; = ref_pv * sludge / ref
    Calculated from production volume of reference product using the relative outputs.
  properties: carbon content, fossil 0.339168, dry mass 0.914 kg, water content 0.0940919, wet mass 1 kg
- copper, cathode: 0.0327345 kg; lognormal variance with pedigree 0.0112, pedigree (2,4,4,1,1)
  Measured value. Input of metals as alloy additives for the given reference flow.
  properties: dry mass 1 kg, wet mass 1 kg
- diesel, burned in diesel-electric generating set, 10MW: 0.0338083 MJ; = L_fuel_input* NHV_diesel*42.8* density_diesel; lognormal variance with pedigree 0.0086, pedigree (1,1,4,1,1)
  Calculated value. Based on primary data for onsite treatement of wastewater.
  Uncertainty: C
  property density 0.84 kg/l; name density_diesel
  property fuel input in physical units, L 0.000948 l; name L_fuel_input
  property heating value, net 1 MJ; name NHV_diesel
  note on fuel input in physical units, L: Measured value. Diesel input used for insitu wastewater treatment. Based on total water used in process. Note that around 42% of total water used in the process is treated, cooled and reused in closed loop.
- electricity, medium voltage: 0.0853181, 1.7019, 0.0426049, 0.0261273, 0.368401, 0.00522935, 0.00112286, 0.118839, 0.175748, 0.505129 kWh (10 suppliers, which the file names only by identifier); sum of these 3.03042 kWh; = kWh_ww+ kWh_process; lognormal variance with pedigree 0.0086, pedigree (1,1,4,1,1)
  Calculated value. Electricity requirements for process and auxiliairies (heating, maintenance of furnace when no production, etc.) and for wastewater treatment.
  Uncertainty: C
- ethylene glycol: 1.0973e-8, 1.81466e-7 kg (2 suppliers, which the file names only by identifier); sum of these 1.92439e-7 kg; lognormal variance with pedigree 0.0112, pedigree (2,4,4,1,1)
  Measured value. Represents glycol with and without inhibitors. Value reported in volume, a density of 1132 kg/m3 was used.
  properties: carbon content, fossil 0.387097, dry mass 1 kg, heating value, net 23.44 MJ, wet mass 1 kg
- hazardous waste, for underground deposit: -0.000515789, -0.00800759 kg (2 suppliers, which the file names only by identifier); sum of these -0.00852338 kg; lognormal variance with pedigree 0.0032, pedigree (2,4,1,1,1)
  Measured value. Represents many types of hazardous wastes that are send to secure landfill. Wastes includes oil, fluoridric acid contamined solids, oil contaminated solids, disposal of HF contaminated rinsing water and "liquides pauvres" (no translation was found).
  production volume; = ref_pv* hwaste / ref
    Calculated from production volume of reference product using the relative outputs.
  properties: carbon content, fossil 0.554667, dry mass 1 kg, wet mass 1 kg
  note on carbon content, fossil: Tab A.6, ecoinvent v2.2 report 13_I, average hazardous waste composition was used, and referred to 0% water mass. No waste-specific emission are currently inventoried for underground deposits. Accordingly, no waste composition must be specified. For generic, average waste to underground deposit deposition in a 200 liter steel drum without cement solidification is assumed (ecoinvent v2.2 report 13_I).
- heat, district or industrial, natural gas: 0.269327, 0.728672 MJ (2 suppliers, which the file names only by identifier); sum of these 0.997999 MJ; = fuel_input*LHV*37.3*fuel_use; lognormal variance with pedigree 0.0086, pedigree (1,1,4,1,1)
  Calculated value. Based on primary data for process and heating of facility.
  Uncertainty: C
  properties: Corresponding fuel use 1.11 MJ, fuel input in m3 0.0243 m3, heating value, net 1 MJ
  note on Corresponding fuel use: Estimated value. Factor used to account for heat losses from furnace.
  note on heating value, net: Literature value. Net calorific value MJ/m3; value was taken from http://www.fpl.fs.fed.us/documnts/pdf2009/fpl_2009_bergman002.pdf
- inert waste: -0.000755771, -0.000214411 kg (2 suppliers, which the file names only by identifier); sum of these -0.000970182 kg; lognormal variance with pedigree 0.0432, pedigree (2,4,1,1,4)
  Approximated process. Represents reported solids waste from the gutters and non recyclable wastes. Value based on primary data.
  production volume; = ref_pv * (waste / ref)
    Calculated from production volume of reference product using the relative outputs.
  properties: dry mass 1 kg, wet mass 1 kg
- iron scrap, unsorted: -5.20776e-6 kg; name scrap; lognormal variance with pedigree 0.0032, pedigree (2,4,1,1,1)
  Extrapolated process. The process represents a proxy for a metallic metal wastes which include iron, copper and aluminium.
  production volume; = ref_pv * scrap / ref
    Calculated from production volume of reference product using the relative outputs.
  properties: dry mass 1 kg, price 0.149 EUR2005, wet mass 1 kg
- lithium chloride: 0.00165409 kg; lognormal variance with pedigree 0.0126, pedigree (3,4,4,1,1)
  Measured value. Chloride salts add to prevent oxydation during melting and alloying.
  properties: dry mass 1 kg, wet mass 1 kg
- lubricating oil: 0.00019849, 0.000942255 kg (2 suppliers, which the file names only by identifier); sum of these 0.00114074 kg; lognormal variance with pedigree 0.0112, pedigree (2,4,4,1,1)
  Measured value. Represents use of different lubrificating oil and grease.
  properties: carbon content, fossil 0.75, dry mass 1 kg, heating value, net 40.2 MJ, wet mass 1 kg
  note on carbon content, fossil: Lubricating oil is produced from diesel. C-content/dry mass of fats and oils considered 75%, from: ecoinvent v2.2 report, n 15a, pg 40
  note on heating value, net: Literature value, Source: IPCC 2006, 2006 IPCC Guidelines for National Greenhouse Gas Inventories, Prepared by the National Greenhouse Gas Inventories Programme, Eggleston H.S., Buendia L., Miwa K., Ngara T. and Tanabe K. (eds). Published: IGES, Japan
- magnesium: 0.00198391 kg; lognormal variance with pedigree 0.0112, pedigree (2,4,4,1,1)
  Measured value. Input of metals as alloy additives for the given reference flow.
  properties: dry mass 1 kg, wet mass 1 kg
- potassium chloride: 0.000200509, 0.00241774 kg (2 suppliers, which the file names only by identifier); sum of these 0.00261825 kg; lognormal variance with pedigree 0.0126, pedigree (3,4,4,1,1)
  The exchange has been updated from "potassium chloride, as K2O" into "potassium chloride" and therefore its amount has been scaled (multiplied) from 0.0017 kg by 1.5829 kg of "potassium chloride" per kg of "potassium chloride, as K2O". Original comment of the exchange is: Measured value. Chloride salts add to prevent oxydation during melting and alloying.
  properties: dry mass 1 kg, wet mass 1 kg
- refractory spent pot liner from Al electrolysis: -4.29611e-10, -2.18844e-9, -3.57813e-10 kg (3 suppliers, which the file names only by identifier); sum of these -2.97587e-9 kg; lognormal variance with pedigree 0.0112, pedigree (2,4,1,1,3)
  Measured value. Based on reported waste per year for this process. Assumed that "refractories" were "refractory spent pot liner"
  production volume; = ref_pv * w_refractory / ref
    Calculated from production volume of reference product using the relative outputs.
  properties: dry mass 1 kg, wet mass 1 kg
- refractory, basic, packed: 2.97587e-9 kg; = w_refractory; lognormal variance with pedigree 0.0086, pedigree (1,1,4,1,1)
  Calculated Value. Based on known amount of refractory waste per year for this process.
  Uncertainty: C
  properties: dry mass 1 kg, wet mass 1 kg
- silver: 0.00297587 kg; lognormal variance with pedigree 0.0112, pedigree (2,4,4,1,1)
  Measured value. Input of metals as alloy additives for the given reference flow.
  properties: dry mass 1 kg, wet mass 1 kg
- sodium hydroxide, without water, in 50% solution state: 1.60607e-6, 1.64475e-5 kg (2 suppliers, which the file names only by identifier); sum of these 1.80536e-5 kg; lognormal variance with pedigree 0.0112, pedigree (2,4,4,1,1)
  Measured value. Chemical input for insitu wastewater treatment. Based on total water used in process. Note that around 45% of total water used in the process is treated, cooled and reused in closed loop.
  properties: dry mass 1 kg, heating value, net 3.03 MJ, wet mass 1 kg
- sodium hypochlorite, without water, in 15% solution state: 5.70186e-6, 4.33007e-5 kg (2 suppliers, which the file names only by identifier); sum of these 4.90026e-5 kg; lognormal variance with pedigree 0.0112, pedigree (2,4,4,1,1)
  Measured value. Chemical input for insitu wastewater treatment. Based on total water used in process. Note that around 42% of total water used in the process is treated, cooled and reused in closed loop.
  properties: dry mass 1 kg, wet mass 1 kg
- spent antifreezer liquid: -1.92439e-7 kg; name antifreeze; = glycol; lognormal variance with pedigree 0.0006, pedigree (1,1,1,1,1)
  Calculated value. Spent glycol.
  Uncertainty: C
  production volume; = ref_pv* antifreeze / ref
    Calculated from production volume of reference product using the relative outputs.
  properties: carbon content, fossil 0.431328, dry mass 0.482 kg, heating value, net 0.56 MJ, water content 1.07469, wet mass 1 kg
  note on heating value, net: Value taken from the general comment of the treatment dataset.
- tap water: 0.00175443, 0.00267448, 0.00499045, 0.0134439, 0.0674399, 0.771748, 0.576283 kg (7 suppliers, which the file names only by identifier); sum of these 1.43834 kg; lognormal variance with pedigree 0.0112, pedigree (2,4,4,1,1)
  Measured value. Represents tap water used for process and auxiliairies. Also includes water used for cleaning tanks which is disposed as hazadous wastes. Does not include closed-loop process water.
  properties: carbon content, fossil 0.00178991, dry mass 0.000337476 kg, water content 2962.17, wet mass 1 kg
  note on carbon content, fossil: Bicarbonate content is 2.93 mol/m3. CO2 content is 0.1 mol/m3 (ecoinvent v2.2 report 8, Tab 93.1).
- titanium: 0.00297587 kg; lognormal variance with pedigree 0.0112, pedigree (2,4,4,1,1)
  Measured value. Input of metals for alloy additives of the given reference flow.
- waste mineral oil: -7.75171e-6, -0.000819868, -0.000313124 kg (3 suppliers, which the file names only by identifier); sum of these -0.00114074 kg; = min_oil; lognormal variance with pedigree 0.0006, pedigree (1,1,1,1,1)
  Calculated value. Waste oil which includes oil separated from oily wastewater.
  Uncertainty: C
  production volume; = ref_pv *oil/ ref
    Calculated from production volume of reference product using the relative outputs.
  properties: carbon content, fossil 0.864444, dry mass 0.9 kg, heating value, net 34.7 MJ, water content 0.111111, wet mass 1 kg
  note on carbon content, fossil: Tab A.6, ecoinvent v2.2 report 13_I. C content has been calculated after data in the tables, and then referred to 1 kg DM
- wastewater, average: -6.55893e-6, -0.00109144, -0.000260985 m3 (3 suppliers, which the file names only by identifier); sum of these -0.00135898 m3; lognormal variance with pedigree 0.1232, pedigree (2,4,1,1,5)
  Measured value. Represents process wastewater treated onsite purged to municipal sewers. Wastewater send to sewer represents 55% of total water used.
  production volume; = ref_pv * wastewater / ref
    Calculated from production volume of reference product using the relative outputs.
  properties: carbon content, non-fossil 0.194039, dry mass 0.346837 kg, water content 2882.2, wet mass 1000 kg
  note on carbon content, non-fossil: 0.0673 kg TOC/m3 (Tab A.17, ecoinvent v2.2 report 13_I). TOC was considered as Total Carbon.
- zirconium oxide: 0.00109115 kg; lognormal variance with pedigree 0.0112, pedigree (2,4,4,1,1)
  Extrapolated process. Zirconium oxyde is used as a proxy for zirconium. Value based on measurements and used as metal alloy additive for the given reference flow.
  properties: dry mass 1 kg, wet mass 1 kg

## Emissions to nature
- Water [air, non-urban air or from high stacks]: 7.29087e-5 m3; lognormal variance with pedigree 0.058, pedigree (4,4,4,1,1)
  Calculated value. Estimation of evaporated water during direct chilled casting. Calculation based on difference of water inputs and outputs.

## Sampling procedure
Primary data collected from one manufacturing facility in Québec region .

## Extrapolations
This dataset is based on primary data from one facility for given region and technology and extrapolated to the entire global production. Uncertainty have been adjusted accordingly.
