# cottonseed production, for sowing, organic

Dataset: EcoSpold 2, unit process
Geography: RoW
Time period: 1997-01-01 to 2023-12-31
Technology level: current
Classification: EcoSpold01Categories: agricultural means of production/seed
Classification: ISIC rev.4 ecoinvent: 0164:Seed processing for propagation
Scenario: Business-as-Usual
System model: Allocation, cut-off by classification
Share of production covered: 100 %
Generated by: Avraam Symeonidis
Database: ecoinvent
isCopyrightProtected: true
accessRestrictedTo: 1

## General comment
Inventory refers to the production of 1kg of cotton seed, organic meant to be used for sowing.

## Included activities start
Activity starts with the cotton seed arriving in the processing plant.

## Included activities end
Activity includes, treatment (pre-cleaning, cleaning, eventually drying, chemical dressing and bag filling), and storing of the seed in the processing centre. The activity ends with the cotto-seeds ready for transprotation.

## Reference product
- cottonseed, organic, for sowing: 1 kg; By-product classification allocatable product; CPC 01431: Cottonseed, seed for planting; HS2017 120721: Oil seeds; cotton seeds, seed, whether or not broken
  production volume 163000 kg; = 4.93E+05
    The production volume is calculated to be the amount consumed by relevant datasets in the database on a global scale.
  property carbon content, non-fossil 0.475
    Biogenic carbon content of vegetation on a dry mass basis (47.5% DM) derived from FAOSTAT.
    Reference: http://www.fao.org/forestry/17111/en
  property price 0.151244 EUR2005
    Calculated based on inputs: The price of the product has been calculated as a sum of the values of the material and energy inputs for this product. This value is therefore a rough estimation. It may underestimate the real price since there are additional expenses when producing any product. These expences can include for example labour costs, treatment of waste materials and profit for the producer. Please consider carefully whether this level of data quality is acceptable for your application.
  properties: carbon allocation 0.4655 kg, carbon content 0.475, carbon content, fossil 0, dry mass 0.98 kg, water content 0.0204082, water in wet mass 0.02 kg, wet mass 1 kg

## Inputs from technosphere
- building, multi-storey: 2e-5 m3; lognormal variance with pedigree 0.0426, pedigree (2,1,5,5,1)
  EcoSpold01Location=RER
  See chapter 'Seed Production' in "01_crop production - yields & inputs US_v1.0.pdf" - pdf-document on the dedicated talk page of ecoinvent (www.ecoinvent.org/documentation)
- cottonseed, organic: 1 kg; lognormal variance with pedigree 0.0426, pedigree (2,1,5,5,1)
  See chapter 'Seed Production' in "01_crop production - yields & inputs US_v1.0.pdf" - pdf-document on the dedicated talk page of ecoinvent (www.ecoinvent.org/documentation)
  properties: carbon content, non-fossil 0.475, dry mass 0.923 kg, water content 0.083424, wet mass 1 kg
  note on carbon content, non-fossil: Biogenic carbon content of vegetation on a dry mass basis (47.5% DM) derived from FAOSTAT. Reference: http://www.fao.org/forestry/17111/en
- diphenylether-compound: 0.0001 kg; lognormal variance with pedigree 0.0526, pedigree (2,1,5,5,1)
  See chapter 'Seed Production' in "01_crop production - yields & inputs US_v1.0.pdf" - pdf-document on the dedicated talk page of ecoinvent (www.ecoinvent.org/documentation)
  EcoSpold01Location=RER
  properties: carbon content, fossil 0.560061, dry mass 1 kg, wet mass 1 kg
  note on carbon content, fossil: C content of diphenylether-compounds was calculated after the C content of thepesticides aclonifen and diflufenican classified as diphenylether-compound in Tab 2.25 of Sutter 2010
- electricity, low voltage: 0.000388906, 0.00210435, 8.17818e-5, 3.17973e-5, 0.00221961, 0.000529053, 3.1906e-5, 0.00010904, 4.35682e-5, 0.0195902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 kWh (51 suppliers, which the file names only by identifier); sum of these 0.058 kWh; lognormal variance with pedigree 0.0426, pedigree (2,1,5,5,1)
  EcoSpold01Location=US
  See chapter 'Seed Production' in "01_crop production - yields & inputs US_v1.0.pdf" - pdf-document on the dedicated talk page of ecoinvent (www.ecoinvent.org/documentation)

## Inputs from nature
- Occupation, construction site [natural resource, land]: 8e-6 m2*year; lognormal variance with pedigree 0.0826, pedigree (2,1,5,5,1)
  (same comment as for cottonseed, organic)
- Occupation, industrial area [natural resource, land]: 0.0002 m2*year; lognormal variance with pedigree 0.0826, pedigree (2,1,5,5,1)
  (same comment as for cottonseed, organic)
- Transformation, from unspecified [natural resource, land]: 4e-6 m2; lognormal variance with pedigree 0.1626, pedigree (2,1,5,5,1)
  (same comment as for cottonseed, organic)
- Transformation, to industrial area [natural resource, land]: 4e-6 m2; lognormal variance with pedigree 0.1626, pedigree (2,1,5,5,1)
  (same comment as for cottonseed, organic)

## Extrapolations
This dataset is extrapolated from the dataset of conventional cotton-seed production, for sowing.
