# selective coating, copper sheet, black chrome

Dataset: EcoSpold 2, unit process
Geography: RoW
Time period: 2000-01-01 to 2023-12-31
Technology level: current
Classification: ISIC rev.4 ecoinvent: 2592:Treatment and coating of metals; machining
Classification: EcoSpold01Categories: metals/refinement
Synonyms: KROSOL
Tags: ConvertedDataset
Scenario: Business-as-Usual
System model: Allocation, cut-off by classification
Share of production covered: 75 %
Generated by: Niels Jungbluth
Published in: Althaus H.-J. 2000
Database: ecoinvent
isCopyrightProtected: true
accessRestrictedTo: 1

## General comment
Inventory for selective coatings of solar absorbers. For black chrome and black nickel the solar absorbance is a=0.91~0.98 and thermal emittance is e=0.06~0.14.
[This dataset was already contained in the ecoinvent database version 2. It was not individually updated during the transfer to ecoinvent version 3. Life Cycle Impact Assessment results may still have changed, as they are affected by changes in the supply chain, i.e. in other datasets. This dataset was generated following the ecoinvent quality guidelines for version 2. It may have been subject to central changes described in the ecoinvent version 3 change report (http://www.ecoinvent.org/database/ecoinvent-version-3/reports-of-changes/), and the results of the central updates were reviewed extensively. The changes added e.g. consistent water flows and other information throughout the database. The documentation of this dataset can be found in the ecoinvent reports of version 2, which are still available via the ecoinvent website. The change report linked above covers all central changes that were made during the conversion process.]

## Included activities start
The activity starts with the sheet entering the process. The material on which this activity is applied it is not included as input.

## Included activities end
Gate to gate inventory for the process including infrastructure, wastes, effluents. Not including packages.

## Geography
Production plants data for US, DK. No data for Gibo-Solar PL (DE).

## Technology
Black chrome coating with nickel underlay. Alkaline cleaning of copper to remove any oils on the surface. Neutralizing with the acid to remove any oxidation. Plating nickel on copper. Plating black chrome on the nickel plated copper. Wash and dry.

## Time period
Data for the production in these years.

## Parameters
- fraction, process water, to air: 0.15 dimensionless; lognormal variance with pedigree 0.092025, pedigree (4,4,3,2,4)
- fraction, tap water, to air: 0.15 dimensionless; lognormal variance with pedigree 0.092025, pedigree (4,4,3,2,4)

## Reference product
- selective coat, copper sheet, black chrome: 1 m2; By-product classification allocatable product; CPC 88731: Metal treatment and coating services
  EcoSpold01Location=RER
  production volume 433174 m2
    Upscaled with a factor 3.18 from the EU production volume of 1.2 Mio. m2 per year according to Ecoinvent v.2 report 10, section 8.2. Equally distributed over the 6 types of 'selective coating'.
  property price 0.61967 EUR2005
    Calculated based on inputs: The price of the product has been calculated as a sum of the values of the material and energy inputs for this product. This value is therefore a rough estimation. It may underestimate the real price since there are additional expenses when producing any product. These expences can include for example labour costs, treatment of waste materials and profit for the producer. Please consider carefully whether this level of data quality is acceptable for your application.
  properties: carbon allocation 0 kg, carbon content 0

## Inputs from technosphere
- boric acid, anhydrous, powder: 0.000188 kg; lognormal variance with pedigree 0.0427, pedigree (2,2,5,5,1)
  EcoSpold01Location=RER
  Questionnaires
  Uncertainty: Questionnaires
  properties: dry mass 1 kg, wet mass 1 kg
- chemical, inorganic: 0.000685 kg; lognormal variance with pedigree 0.0427, pedigree (2,2,5,5,1)
  Questionnaire, coating, proprietary mix plating solution
  EcoSpold01Location=GLO
  Uncertainty: Questionnaire, coating, proprietary mix plating solution
  properties: carbon content, fossil 0.003, dry mass 1 kg, wet mass 1 kg
  note on carbon content, fossil: This dataset is an unweighted average of 20 inorganic substances (listed in Tab 88.1, ecoinvent v2.2 report 8, part II), being part of the top100 chemicals included in this database. The C-content has also been calculated as an unweighted average of the C content of the substances composing this dataset.
- chromium trioxide, flakes: 0.00972 kg; lognormal variance with pedigree 0.0427, pedigree (2,2,5,5,1)
  Questionnaires
  EcoSpold01Location=RER
  Uncertainty: Questionnaires
  properties: dry mass 1 kg, wet mass 1 kg
- electricity, medium voltage: 0.089237, 1.78008, 0.0445619, 0.0273274, 0.00546955, 0.00117444, 0.183821, 0.528331 kWh (8 suppliers, which the file names only by identifier); sum of these 2.66 kWh; lognormal variance with pedigree 0.0427, pedigree (2,2,5,5,1)
  EcoSpold01Location=UCTE
  Questionnaires, electricity use in the factory
  Uncertainty: Questionnaires, electricity use in the factory
- fluosilicic acid, without water, in 22% solution state: 0.000312 kg; lognormal variance with pedigree 0.0427, pedigree (2,2,5,5,1)
  EcoSpold01Location=RER
  Questionnaires
  Uncertainty: Questionnaires
  properties: dry mass 1 kg, wet mass 1 kg
- hazardous waste, for underground deposit: -0.2 kg; lognormal variance with pedigree 0.0027, pedigree (2,2,1,5,1)
  EcoSpold01Location=DE
  Water is evaporated or recycled
  Uncertainty: Water is evaporated or recycled
  production volume
    Calculated from the production volume of selective coat, copper sheet, black chrome in proportion to the respective output amounts.
  properties: carbon content, fossil 0.554667, dry mass 1 kg, wet mass 1 kg
  note on carbon content, fossil: Tab A.6, ecoinvent v2.2 report 13_I, average hazardous waste composition was used, and referred to 0% water mass. No waste-specific emission are currently inventoried for underground deposits. Accordingly, no waste composition must be specified. For generic, average waste to underground deposit deposition in a 200 liter steel drum without cement solidification is assumed (ecoinvent v2.2 report 13_I).
- heat, district or industrial, natural gas: 5.168 MJ; lognormal variance with pedigree 0.0427, pedigree (2,2,5,5,1)
  Questionnaire
  EcoSpold01Location=RER
  Uncertainty: Questionnaire
  properties: heating value, net 1 MJ
- metal coating facility: 3.33e-7 unit; lognormal variance with pedigree 0.63, pedigree (5,5,5,5,5)
  Estimation
  EcoSpold01Location=RER
  Uncertainty: Estimation
- nickel, class 1: 0.0202 kg; lognormal variance with pedigree 0.0427, pedigree (2,2,5,5,1)
  EcoSpold01Location=GLO
  Questionnaires
  Uncertainty: Questionnaires
  properties: dry mass 1 kg, wet mass 1 kg
- soap: 0.00204 kg; lognormal variance with pedigree 0.0427, pedigree (2,2,5,5,1)
  Questionnaires
  EcoSpold01Location=RER
  Uncertainty: Questionnaires
  properties: carbon content, non-fossil 0.692237, dry mass 0.87 kg, heating value, net 17.93 MJ, water content 0.149425, wet mass 1 kg
  note on carbon content, non-fossil: Soap (CnH2n+1 COO Na) is produced by a combined saponification and neutralisation process performed on a blend of oleochemical feedstocks comprised of short chain (C12-14, derived from coconut or palm kernel oil) and long chain (C16-18, from tallow or palm oil) esters.The ratio of short to long fatty acid chains is 20:80 (ecoinvent v2.2 report 12). Short fatty acid has been estimated as C12.5H(2*12.5+1); MW R=176 g/mol. Long fatty acid has been estimated as C16H(2*16+1); MW R=225 g/mol. MW of COONa=67 g/mol
- sulfuric acid: 0.00367 kg; lognormal variance with pedigree 0.0427, pedigree (2,2,5,5,1)
  EcoSpold01Location=RER
  Questionnaires
  Uncertainty: Questionnaires
  properties: dry mass 1 kg, wet mass 1 kg
- tap water: 0.017299, 0.0263709, 0.0492068, 0.13256, 0.66497, 7.60959 kg (6 suppliers, which the file names only by identifier); sum of these 8.5 kg; source Benveniste, G. 2007; lognormal variance with pedigree 0.0546, pedigree (3,3,5,5,1)
  Questionnaires
  Calculated based on literature, (Vionnet, S., Quantis Water Database - Technical Report, 2012). Thickness of the coating layer is 2microm. The process starts when untreated surface enters the coating plant. It includes the processes: pre-treatment (cleaning) and coating itself.
  EcoSpold01Location=RER
  Uncertainty: Questionnaires
  properties: carbon content, fossil 0.00178991, dry mass 0.000337476 kg, water content 2962.17, wet mass 1 kg
  note on carbon content, fossil: Bicarbonate content is 2.93 mol/m3. CO2 content is 0.1 mol/m3 (ecoinvent v2.2 report 8, Tab 93.1).
- wastewater from black chrome coating: -0.00849 m3; lognormal variance with pedigree 0.0027, pedigree (2,2,1,5,1)
  EcoSpold01Location=CH
  Questionnaires
  Uncertainty: Questionnaires
  production volume
    (same comment as for hazardous waste, for underground deposit)
  properties: carbon content, fossil 0.00256552, dry mass 0.337476 kg, water content 2962.17, wet mass 1000 kg
  note on carbon content, fossil: COD= 0.002 kg/m3 (Tab A.18, ecoinvent v2.2 report 13_I). COD was converted to TOC, using conversion factors in Tab 4.10 (ecoinvent v2.2 report 13_IV). TOC was considered as Total Carbon.

## Emissions to nature
- Chromium III [air, urban air close to ground]: 1.5e-6 kg; lognormal variance with pedigree 0.6927, pedigree (2,2,5,5,1)
  Questionnaires
  Uncertainty: Questionnaires
- Nickel II [air, urban air close to ground]: 3e-7 kg; lognormal variance with pedigree 0.6927, pedigree (2,2,5,5,1)
  Questionnaires
  Uncertainty: Questionnaires
- Water [air, unspecified]: 0.001275 m3; lognormal variance with pedigree 0.0827, pedigree (2,2,5,5,1)
  Calculated value based on literature values and expert opinion. See comments in the parametres' comment field.
- Water [water, unspecified]: 0.000612147 m3; lognormal variance with pedigree 0.0827, pedigree (2,2,5,5,1)
  (same comment as for Water)
  property carbon content, fossil 0; name C_content_fossil
  property carbon content, non-fossil 0; name C_content_non_fossil
  property dry mass 0 kg; name DM
  property water in wet mass 1000 kg; name WWM
  property wet mass 1000 kg; name WM

## Sampling procedure
Personal communication and public information

## Extrapolations
Data for 2 out of 3 companies. Assessment with European electricity mix. This dataset has been copied from an original dataset covering the geography RER. The uncertainty has been adjusted accordingly.

## Review by Hans-Jörg Althaus 2003-07-23
Passed.
