# steel production, electric, chromium steel 18/8

Dataset: EcoSpold 2, unit process
Geography: RoW
Time period: 2013-01-01 to 2023-12-31
Technology level: current
Classification: ISIC rev.4 ecoinvent: 2410:Manufacture of basic iron and steel
Scenario: Business-as-Usual
System model: Allocation, cut-off by classification
Generated by: Johannes Müller
Published in: Remus, R. 2013
Database: ecoinvent
isCopyrightProtected: true
accessRestrictedTo: 1

## General comment
Background:
This activity represents the production of stainless steel (Type 304, aka. 18/8; assumed composition 68.6% Fe, 9.3% Ni, 19.0% Cr and 0.08% C) in a two-stage process. Raw materials (charge chrome, pig iron, carbon steel scrap and ferronickel) are loaded into an electric arc furnace (EAF) and melted together. The composition of the charge corresponds to that of the desired steel product, besides the carbon content. The molten metal is then removed from the EAF and transferred to an argon-oxygen decarburisation (AOD) refining vessel, in which the amounts of impurities, principally carbon, are reduced to the desired levels. The purified molten metal is then continuously cast into stainless steel slabs (Norgate et al., 2004).
Modelling approach:
Data on the use of electricity, oxygen, argon and electrodes were taken from Norgate et al. (2004) and are specific to stainless steel production. The amounts of steel by-products (dusts, sludges and slags) that are produced are based on measured data from plants worldwide reported by worldsteel (2010). Also based on worldsteel (2010), the following internal recycling rates (i.e. returned as an input to the process after it has been produced) were assumed: EAF slag, 3%; secondary metallurgy slag, 14%; and dust, 10%. All other data were taken from the IPPC Best Available Technology report from the European Commission (Remus et al., 2013) and are representative of typical low- and un-alloyed steel production in an electric arc furnace in Europe. Note that where only data ranges were provided, the geometric mean of reported values was used here.
References:
Norgate, Jahanshahi, S. & Rankin, W. J. (2004). Alternative routes to stainless steel - a life cycle approach. Proceedings: Tenth International Ferroalloys Congress; INFACON X: ‘Transformation through Technology’, 1 – 4 February 2004, Cape Town, South Africa.
Remus, R., Aguado-Monsonet, M. A., Roudier, S. & Samcho, L. D. (2013). JRC reference report - Best available techniques (BAT) reference document for iron and steel production. Joint Research Centre - European Commission, Luxemboug.
Worldsteel (2010). Steel industry by-products. World Steel Association: Brussels, Belgium.

## Included activities start
At the gate of the steelmaking plant with the arrival of the ferrous scrap.

## Included activities end
At the gate of the steelmaking plant with the cast steel ready for transport to manufacturers and fabricators.

## Geography
Data are taken from electric arc furnace plants across Europe and are considered representative of the average situation globally.

## Technology
Represents average European technology; furnace with 4th hole and secondary metallurgy

## Time period
Data are mostly compiled from reports published between 2005 and 2010 but are considered representative of modern operations.

## Parameters
- electricity, electric arc furnace: 0.42361 kWh; name kWh_EAF; lognormal variance with pedigree 0.0034, pedigree (2,3,2,5,1)
- electricity, ladler furnace: 0.113121 kWh; name kWh_ladler; lognormal variance with pedigree 0.0033, pedigree (2,4,1,3,1)
  Measured value. Electricity consumption for ladler furnace for alloying based on reported value from one facility in Qc region.
- fraction, cooling water, cooling pond system, to air: 0.032 dimensionless; name fraction_CW_CP_to_air; lognormal variance with pedigree 0.0413, pedigree (2,3,1,3,1)
  Calculated based on literature value (Scown, C.D., 2011, Water Footprint of U.S. Transportation Fuels and supplying information of the article) (Vionnet, S., Quantis Water Database - Technical Report, 2012).
- fraction, cooling water, once-through system, to air: 0.004 dimensionless; name fraction_CW_OT_to_air; lognormal variance with pedigree 0.0413, pedigree (2,3,1,3,1)
  (same comment as for fraction, cooling water, cooling pond system, to air)
- fraction, cooling water, recirculating system, to air: 0.771 dimensionless; name fraction_CW_R_to_air; lognormal variance with pedigree 0.0413, pedigree (2,3,1,3,1)
  (same comment as for fraction, cooling water, cooling pond system, to air)
- fraction, cooling water, to air: 0.56 dimensionless; name fraction_CW_to_air; lognormal variance with pedigree 0.041425, pedigree (2,3,2,2,1)
- fraction, process water, to air: 0.095 dimensionless; name fraction_PW_to_air; lognormal variance with pedigree 0.092025, pedigree (4,4,3,2,4)

## Reference product
- steel, chromium steel 18/8: 1 kg; name RP; By-product classification allocatable product; CPC 41122: Alloy steel in ingots or other primary forms and semi-finished products of alloy steel; HS2017 7218: Stainless steel in ingots or other primary forms; semi-finished products of stainless steel; CAS 12597-69-2
  production volume 4.5413e10 kg; name PV
    Assumed to represent the production of stainless steel. Global stainless steel production in 2019 was 52.218 Mt (ISSF, 2021).
    References
    International Stainless Steel Forum (ISSF) (2021). Stainless Steel in Figures 2021 [online]. Available from: https://www.worldstainless.org/files/issf/non-image-files/PDF/ISSF_Stainless_Steel_in_Figures_2021_English_public_version.pdf (accessed 21.07.2021).
    worldsteel (2020). Steel Statistical Yearbook 2020 [online]. Available from: https://www.worldsteel.org/en/dam/jcr:5001dac8-0083-46f3-aadd-35aa357acbcc/Steel%2520Statistical%2520Yearbook%25202020%2520%2528concise%2520version%2529.pdf (accessed 20.07.2021).
  property heating value, net 0 MJ
    Non combustible products are assumed to have an LHV equal to zero (0).
  properties: carbon allocation 0.0008 kg, carbon content 0.0008, carbon content, fossil 0.0008, carbon content, non-fossil 0, dry mass 1 kg, price 0.468 EUR2005, water content 0, water in wet mass 0 kg, wet mass 1 kg

## Inputs from technosphere
- anode, for metal electrolysis: 0.004 kg; lognormal variance with pedigree 0.0034, pedigree (2,3,2,5,1)
  Represents the average amount of electrodes used in stainless steel production in Australia. Source: Norgate, Jahanshahi, S. & Rankin, W. J. (2004). Alternative routes to stainless steel - a life cycle approach. Proceedings: Tenth International Ferroalloys Congress; INFACON X: ‘Transformation through Technology’, 1 – 4 February 2004, Cape Town, South Africa.
  properties: carbon content, fossil 0.865971, dry mass 1 kg, wet mass 1 kg
  note on carbon content, fossil: The main component of the anode is carbon, coming from bitumen and petroleum coke (ecoinvent v2.2 report 10). The C content in those components of the anode has been taken into account to calculate the anode final C content.
- argon, liquid: 0.032 kg; lognormal variance with pedigree 0.0044, pedigree (2,4,1,4,2)
  Represents the average amount of argon used in stainless steel production in Australia. Source: Norgate, Jahanshahi, S. & Rankin, W. J. (2004). Alternative routes to stainless steel - a life cycle approach. Proceedings: Tenth International Ferroalloys Congress; INFACON X: ‘Transformation through Technology’, 1 – 4 February 2004, Cape Town, South Africa.
  properties: dry mass 1 kg, wet mass 1 kg
- electric arc furnace converter: 4e-11 unit; lognormal variance with pedigree 0.5, pedigree (5,5,5,5,5)
  Source: Classen et al. (2009)
- electric arc furnace dust: -0.0183984, -0.000728999 kg (2 suppliers, which the file names only by identifier); sum of these -0.0191274 kg; lognormal variance with pedigree 0.004425, pedigree (2,3,3,2,2)
  Amount reported by worldsteel (2010) and is representative of the average global situation in 2009. Also based on worldsteel (2010), an internal recovery (recycling) rate of 10% is assumed. Source: Worldsteel (2010). Steel industry by-products. World Steel Association: Brussels, Belgium.
  production volume; = PV * EAF_dust_amount / RP
    Calculated from production volume of reference product using the relative outputs.
  properties: calcium content 0.052289, carbon content, fossil 0.0155074, chlorine content 0.0108651, dry mass 0.999 kg, iron content 0.259042, magnesium content 0.0130343, manganese content 0.0192227, oxygen content 0.492232, silicon content 0.0210985, tungsten content 0.00866025, wet mass 1 kg, zinc content 0.0646031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
  note on calcium content: The value of 'calcium content' is documented in Turner & Symeonidis, 2020. Reference: Turner David & Symeonidis Avraam, 2020, Life cycle inventories of the treatment of iron and steelmaking by-products, ecoinvent association, Zürich, Switzerland
  note on carbon content, fossil: The value of 'carbon content, fossil' is documented in Turner & Symeonidis, 2020. Reference: Turner David & Symeonidis Avraam, 2020, Life cycle inventories of the treatment of iron and steelmaking by-products, ecoinvent association, Zürich, Switzerland
  note on chlorine content: The value of 'chlorine content' is documented in Turner & Symeonidis, 2020. Reference: Turner David & Symeonidis Avraam, 2020, Life cycle inventories of the treatment of iron and steelmaking by-products, ecoinvent association, Zürich, Switzerland
  note on iron content: The value of 'iron content' is documented in Turner & Symeonidis, 2020. Reference: Turner David & Symeonidis Avraam, 2020, Life cycle inventories of the treatment of iron and steelmaking by-products, ecoinvent association, Zürich, Switzerland
  note on magnesium content: The value of 'magnesium content' is documented in Turner & Symeonidis, 2020. Reference: Turner David & Symeonidis Avraam, 2020, Life cycle inventories of the treatment of iron and steelmaking by-products, ecoinvent association, Zürich, Switzerland
  note on manganese content: The value of 'manganese content' is documented in Turner & Symeonidis, 2020. Reference: Turner David & Symeonidis Avraam, 2020, Life cycle inventories of the treatment of iron and steelmaking by-products, ecoinvent association, Zürich, Switzerland
  note on oxygen content: The value of 'oxygen content' is documented in Turner & Symeonidis, 2020. Reference: Turner David & Symeonidis Avraam, 2020, Life cycle inventories of the treatment of iron and steelmaking by-products, ecoinvent association, Zürich, Switzerland
  note on silicon content: The value of 'silicon content' is documented in Turner & Symeonidis, 2020. Reference: Turner David & Symeonidis Avraam, 2020, Life cycle inventories of the treatment of iron and steelmaking by-products, ecoinvent association, Zürich, Switzerland
  note on tungsten content: The value of 'tungsten content' is documented in Turner & Symeonidis, 2020. Reference: Turner David & Symeonidis Avraam, 2020, Life cycle inventories of the treatment of iron and steelmaking by-products, ecoinvent association, Zürich, Switzerland
  note on zinc content: The value of 'zinc content' is documented in Turner & Symeonidis, 2020. Reference: Turner David & Symeonidis Avraam, 2020, Life cycle inventories of the treatment of iron and steelmaking by-products, ecoinvent association, Zürich, Switzerland
- electric arc furnace secondary metallurgy slag: -0.01924 kg; name EAF_SM_slag_amount; lognormal variance with pedigree 0.004425, pedigree (2,3,3,2,2)
  Amount reported by worldsteel (2010) and is representative of the average global situation in 2009. Also based on worldsteel (2010), an internal recovery (recycling) rate of 14% is assumed. Source: Worldsteel (2010). Steel industry by-products. World Steel Association: Brussels, Belgium.
  production volume; = PV * EAF_SM_slag_amount / RP
    Calculated from production volume of reference product using the relative outputs.
  properties: aluminium content 0.0530427, calcium content 0.312637, dry mass 0.995 kg, fluorine content 0.0129487, iron content 0.0199153, magnesium content 0.0427775, manganese content 0.00556519, oxygen content 0.476841, silicon content 0.0601451, sulfur content 0.00614898, water content 0.00502513, wet mass 1 kg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
  note on aluminium content: The value of 'aluminium content' is documented in Turner & Symeonidis, 2020. Reference: Turner David & Symeonidis Avraam, 2020, Life cycle inventories of the treatment of iron and steelmaking by-products, ecoinvent association, Zürich, Switzerland
  note on fluorine content: The value of 'fluorine content' is documented in Turner & Symeonidis, 2020. Reference: Turner David & Symeonidis Avraam, 2020, Life cycle inventories of the treatment of iron and steelmaking by-products, ecoinvent association, Zürich, Switzerland
  note on sulfur content: The value of 'sulfur content' is documented in Turner & Symeonidis, 2020. Reference: Turner David & Symeonidis Avraam, 2020, Life cycle inventories of the treatment of iron and steelmaking by-products, ecoinvent association, Zürich, Switzerland
- electric arc furnace slag: -0.145801, -6.47503e-5 kg (2 suppliers, which the file names only by identifier); sum of these -0.145866 kg; lognormal variance with pedigree 0.004425, pedigree (2,3,3,2,2)
  Amount reported by worldsteel (2010) and is representative of the average global situation in 2009. Also based on worldsteel (2010), an internal recovery (recycling) rate of 3% is assumed. Source: Worldsteel (2010). Steel industry by-products. World Steel Association: Brussels, Belgium.
  production volume; = PV * EAF_slag_amount / RP
    Calculated from production volume of reference product using the relative outputs.
  properties: aluminium content 0.0371314, calcium content 0.251088, chromium content 0.0282022, dry mass 0.995 kg, fluorine content 0.02, iron content 0.158855, magnesium content 0.0502306, manganese content 0.0350676, oxygen content 0.317802, silicon content 0.0836324, water content 0.00502513, wet mass 1 kg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
  note on chromium content: The value of 'chromium content' is documented in Turner & Symeonidis, 2020. Reference: Turner David & Symeonidis Avraam, 2020, Life cycle inventories of the treatment of iron and steelmaking by-products, ecoinvent association, Zürich, Switzerland
- electricity, medium voltage: 0.0207705, 0.414325, 0.139212, 0.00636064, 0.00127308, 0.000273358, 0.0427855 kWh (7 suppliers, which the file names only by identifier); sum of these 0.625 kWh; lognormal variance with pedigree 0.0512, pedigree (2,3,5,5,3)
  Represents the average amount of electricity used in stainless steel production in Australia. Source: Norgate, Jahanshahi, S. & Rankin, W. J. (2004). Alternative routes to stainless steel - a life cycle approach. Proceedings: Tenth International Ferroalloys Congress; INFACON X: ‘Transformation through Technology’, 1 – 4 February 2004, Cape Town, South Africa.
  Uncertainty: Calculated variable. Uncertainty will be determined from propagation of uncertainty factors of underlying variables. Uncertainty of actual relation between variables not accounted for at this time, although this could be included in a future update.
- ferrochromium, high-carbon, 68% Cr: 0.26471 kg; lognormal variance with pedigree 0.0512, pedigree (2,5,5,5,1)
  Source: Classen et al. (2009)
  properties: carbon content, fossil 0.07, dry mass 1 kg, heating value, net 2.12 MJ, wet mass 1 kg
  note on carbon content, fossil: Ferrochromium is a master alloy of iron and chromium, containing 45 – 95 % Cr and various amounts of iron, carbon, and other elements. High-carbon ferrochromium (HC ferrochromium) contains 4 – 10 % C (ecoinvent v2.2 report 20_part VI). An average content of 7% C was considered
- ferronickel: 0.32 kg; lognormal variance with pedigree 0.0512, pedigree (2,5,5,5,1)
  Source: Classen et al. (2009)
  properties: carbon content, fossil 0.0165, dry mass 1 kg, wet mass 1 kg
  note on carbon content, fossil: Ferronickel (CAS 11133-76-9) is a market product of the nickel industry. It consists of an alloy of iron with nickel, with a nickel content of 20 - 50 %, and a C content of 1.5 - 1.8% (Tab. 3.2 ecoinvent v2.2 report 20_part IV). An average C content of 1.65% was considered
- hard coal: 0.000605867, 0.000143768, 0.00428787, 0.001007, 0.000618273, 0.000903277, 0.00133617, 0.000262927 kg (8 suppliers, which the file names only by identifier); sum of these 0.00916515 kg; lognormal variance with pedigree 0.0034, pedigree (2,3,2,5,1)
  geometric mean of Remus et al. (2013) data range
  properties: carbon content, fossil 0.845, dry mass 0.94 kg, heating value, net 27.91 MJ, water content 0.0638298, wet mass 1 kg
  note on carbon content, fossil: C content 75-94% (specified in Tab 1.1, report 6, part VI). A mean content of 0.845 kg C/ kg dry hard coal was considered
  note on heating value, net: Based on the Characterization factor of Hard coal in the CED method
- inert waste, for final disposal: -0.00678233 kg; name EAF_inert_amount; lognormal variance with pedigree 0.004425, pedigree (2,3,3,2,2)
  Represents used refractories, etc.
  production volume; = PV * EAF_inert_amount / RP
    Calculated from production volume of reference product using the relative outputs.
  properties: dry mass 0.995 kg, water content 0.00502513, wet mass 1 kg
- iron scrap, sorted, pressed: 0.55079 kg; lognormal variance with pedigree 0.010425, pedigree (2,3,4,2,2)
  geometric mean of Remus et al. (2013) data range minus amount of ferrochromium and ferronickel
  properties: dry mass 1 kg, wet mass 1 kg
- natural gas, high pressure: 5.7777e-5, 9.74627e-5, 0.000212596, 7.11469e-5, 1.66267e-5, 9.8959e-5, 9.49587e-5, 0.000249696, 9.63993e-5, 0.000149103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 m3 (37 suppliers, which the file names only by identifier); sum of these 0.00748255 m3; lognormal variance with pedigree 0.0034, pedigree (2,3,2,5,1)
  geometric mean of Remus et al. (2013) data range (MJ:m3 conversion based on LHV value from: https://www.engineeringtoolbox.com/fuels-higher-calorific-values-d_169.html)
  properties: carbon content, fossil 0.602381, dry mass 0.84 kg, heating value, gross 40 MJ, heating value, net 36 MJ, wet mass 0.84 kg
  note on carbon content, fossil: An average C content of 0.506 kg C/ m3 has been assumed (this average has been calculated using data in Tab 3.5, ecoinvent v2.2 report 6_V
  note on heating value, net: Literature value, Source: Christoph Meili;Niels Jungbluth;Maresa Bussa (2021) Life cycle inventories of crude oil and natural gas extraction. ESU-services Ltd. commissioned by BAFU & VSG, Schaffhausen, Switzerland, http://esu-services.ch/data/public-lci-reports/
- nitrogen, liquid: 0.00359723 kg; lognormal variance with pedigree 0.0572, pedigree (2,3,5,5,3)
  geometric mean of Remus et al. (2013) data range (m3:kg conversion based on: http://www.airproducts.com/Products/Gases/gas-facts/conversion-formulas/weight-and-volume-equivalents/nitrogen.aspx)
  properties: dry mass 1 kg, wet mass 1 kg
- oxygen, liquid: 0.036 kg; lognormal variance with pedigree 0.0034, pedigree (2,3,2,5,1)
  Represents the average amount of oxygen used in stainless steel production in Australia. Source: Norgate, Jahanshahi, S. & Rankin, W. J. (2004). Alternative routes to stainless steel - a life cycle approach. Proceedings: Tenth International Ferroalloys Congress; INFACON X: ‘Transformation through Technology’, 1 – 4 February 2004, Cape Town, South Africa.
  properties: dry mass 1 kg, wet mass 1 kg
- quicklime, in pieces, loose: 0.0591608 kg; lognormal variance with pedigree 0.0034, pedigree (2,3,2,5,1)
  geometric mean of Remus et al. (2013) data range
  properties: dry mass 0.99 kg, water content 0.010101, wet mass 1 kg
- refractory, basic, packed: 0.0154919 kg; lognormal variance with pedigree 0.0034, pedigree (2,3,2,5,1)
  geometric mean of Remus et al. (2013) data range
  properties: dry mass 1 kg, wet mass 1 kg

## Inputs from nature
- Water, cooling, unspecified natural origin [natural resource, in water]: 0.00654217 m3; name water_cooling_UNO_input; source Byers, W. 2003; lognormal variance with pedigree 0.0152, pedigree (2,3,3,5,1)
  geometric mean of Remus et al. (2013) data range
  property carbon content, fossil 0.0104329; name C_content_fossil
  property carbon content, non-fossil 0; name C_content_non_fossil
  property dry mass 0.1101 kg; name DM
  property water content 9081.65; name water_content
  property water in wet mass 999.89 kg; name WWM
  property wet mass 1000 kg; name WM

## Emissions to nature
- Benzene [air, unspecified]: 3.63318e-7 kg; lognormal variance with pedigree 0.1234, pedigree (2,3,2,5,1)
  geometric mean of Remus et al. (2013) data range
- Cadmium II [air, unspecified]: 1.21655e-8 kg; lognormal variance with pedigree 0.6534, pedigree (2,3,2,5,1)
  geometric mean of Remus et al. (2013) data range
- Carbon dioxide, fossil [air, unspecified]: 0.0441472 kg; = (( ccf_hardcoal* n_hardcoal) + ( ccf_naturalgas * n_naturalgas) - ( ccf_carbonmonoxide * n_carbonmonoxide)) / ccf_carbondioxide; lognormal variance with pedigree 0.2106, pedigree (5,5,5,5,5)
  Calculated Value. Carbon dioxide emission is calculated as the sum of carbon in hard coal and natural gas minus the emissions of carbon monoxide.
  property carbon content, fossil 0.272916; name ccf_carbondioxide
- Carbon monoxide, fossil [air, unspecified]: 0.000474342 kg; name n_carbonmonoxide; lognormal variance with pedigree 0.6534, pedigree (2,3,2,5,1)
  geometric mean of Remus et al. (2013) data range
  property carbon content, fossil 0.428805; name ccf_carbonmonoxide
- Chromium III [air, unspecified]: 1.83303e-7 kg; lognormal variance with pedigree 0.6534, pedigree (2,3,2,5,1)
  geometric mean of Remus et al. (2013) data range
- Copper ion [air, unspecified]: 7.48999e-8 kg; lognormal variance with pedigree 0.6534, pedigree (2,3,2,5,1)
  geometric mean of Remus et al. (2013) data range
- Dioxins, measured as 2,3,7,8-tetrachlorodibenzo-p-dioxin [air, unspecified]: 4.89898e-13 kg; lognormal variance with pedigree 0.3034, pedigree (2,3,2,5,1)
  geometric mean of Remus et al. (2013) data range
- Hexachlorobenzene [air, unspecified]: 1.54919e-9 kg; lognormal variance with pedigree 0.1234, pedigree (2,3,2,5,1)
  geometric mean of Remus et al. (2013) data range
- Hydrocarbons, aromatic [air, unspecified]: 7.7008e-5 kg; lognormal variance with pedigree 0.0434, pedigree (2,3,2,5,1)
  assume same as existing dataset
- Hydrochloric acid [air, unspecified]: 5.31037e-6 kg; lognormal variance with pedigree 0.0434, pedigree (2,3,2,5,1)
  geometric mean of Remus et al. (2013) data range
- Hydrogen fluoride [air, unspecified]: 2.44949e-8 kg; lognormal variance with pedigree 0.0434, pedigree (2,3,2,5,1)
  geometric mean of Remus et al. (2013) data range
- Lead II [air, unspecified]: 4.62331e-7 kg; lognormal variance with pedigree 0.6534, pedigree (2,3,2,5,1)
  geometric mean of Remus et al. (2013) data range
- Mercury II [air, unspecified]: 2e-8 kg; lognormal variance with pedigree 0.6534, pedigree (2,3,2,5,1)
  geometric mean of Remus et al. (2013) data range
- Nickel II [air, unspecified]: 7.74597e-8 kg; lognormal variance with pedigree 0.6534, pedigree (2,3,2,5,1)
  geometric mean of Remus et al. (2013) data range
- Nitrogen oxides [air, unspecified]: 7.73305e-5 kg; lognormal variance with pedigree 0.0434, pedigree (2,3,2,5,1)
  geometric mean of Remus et al. (2013) data range
- PAH, polycyclic aromatic hydrocarbons [air, unspecified]: 9.34345e-8 kg; lognormal variance with pedigree 0.3034, pedigree (2,3,2,5,1)
  geometric mean of Remus et al. (2013) data range
- Particulate Matter, < 2.5 um [air, unspecified]: 1.47224e-5 kg; lognormal variance with pedigree 0.3034, pedigree (2,3,2,5,1)
  geometric mean of Remus et al. (2013) data range (assume 42.5% of total dust emissions [Classen et al. 2009])
- Particulate Matter, > 10 um [air, unspecified]: 5.19615e-6 kg; lognormal variance with pedigree 0.0434, pedigree (2,3,2,5,1)
  geometric mean of Remus et al. (2013) data range (assume 15% of total dust emissions [Classen et al. 2009])
- Particulate Matter, > 2.5 um and < 10um [air, unspecified]: 1.47224e-5 kg; lognormal variance with pedigree 0.1234, pedigree (2,3,2,5,1)
  (same comment as for Particulate Matter, < 2.5 um)
- Polychlorinated biphenyls [air, unspecified]: 2.23607e-10 kg; lognormal variance with pedigree 0.3034, pedigree (2,3,2,5,1)
  geometric mean of Remus et al. (2013) data range
- Sulfur dioxide [air, unspecified]: 3.24037e-5 kg; lognormal variance with pedigree 0.0034, pedigree (2,3,2,5,1)
  geometric mean of Remus et al. (2013) data range
- Water [air, unspecified]: 0.00292117 m3; name water_to_air_unspecified; lognormal variance with pedigree 0.0427, pedigree (2,2,1,5,1)
  assume same as existing dataset
  property fraction, origin: fresh water 0; name fraction_origin_fresh_water
  property fraction, origin: salt water 0; name fraction_origin_salt_water
  property fraction, origin: unspecified 1; name fraction_origin_unspecified
- Zinc II [air, unspecified]: 2.19089e-6 kg; lognormal variance with pedigree 0.6534, pedigree (2,3,2,5,1)
  geometric mean of Remus et al. (2013) data range
- Water [water, unspecified]: 0.0022952 m3; name water_to_water_unspecified; lognormal variance with pedigree 0.0427, pedigree (2,2,1,5,1)
  assume same as existing dataset
  property fraction, origin: fresh water 0; name fraction_origin_fresh_water_Ww
  property fraction, origin: salt water 0; name fraction_origin_salt_water_Ww
  property fraction, origin: unspecified 1; name fraction_origin_unspecified_Ww

## Sampling procedure
Data were taken from direct measurements at blast furnace plants across Europe.

Note that there may be mass imbalances in the dataset. This is because the values represent the average situation in steelmaking many different plants and have not been augmented or adjusted. Similarily, these values represent the situation post-ventilation/off-gas management, i.e. it is not the mass of carbon, for instance, that is produced that is reported but the amount that is actually, on average, emitted to the environment considering an average mix of steelmaking, technologies, off-gas management approaches, and internal recovery (recycling) or utilisation rates at integrated steelmakers in Europe.

It should also be noted that data on radionucleid emissions to air, e.g. of Pollonium 210 and Lead 210, were not available and have therefore not been inventoried here.

## Extrapolations
This dataset is extrapolated from data collected from European sites; the uncertainty has been adjusted accordingly.
