# sunn hemp production

Dataset: EcoSpold 2, unit process
Geography: RoW
Time period: 2016-05-05 to 2023-05-06
Technology level: current
Classification: EcoSpold01Categories: agricultural production/plant production
Classification: ISIC rev.4 ecoinvent: 0116:Growing of fibre crops
Scenario: Business-as-Usual
System model: Allocation, cut-off by classification
Generated by: Archana Datta
Published in: Faist Emmenegger, M. 2018
Database: ecoinvent
isCopyrightProtected: true
accessRestrictedTo: 1

## General comment
This inventory dataset covers the field activity for the production of 1 kg of Sunnhemp plant (green mater) in India in 2016-17 through Sunnhemp cultivation. This process also yield seeds as byproduct which are used for green manure. The farm has a yield of 15,000 kg fresh green matter per ha for this crop cycle. Mineral NPK fertilizer input is 20-40-20 kg/ha.
The farming dataset, covers soil preparation (fall tillage), inputs of seeds, application of mineral and organic fertilizers, spraying pesticides, irrigation water and ends with the harvesting of Sunnhemp plant.
Insects-pest and diseases do not affect Sunnhemp crop easily. They can be applied when required. Sunnhemp as a rotational crop and being a legume it has potential to meet its requirement of nitrogen by fixation of atmospheric nitrogen by bacteriods located in the nodules in the root and this is good for soil renovation. For better crop , manuring with farm yard manure or cakes is recommended. Application of fertilizers is recommended at combination of 20 kg N, 40 kg P and 20 kg K per has been optimised for best results. Usually, Sunnhemp crop can be grown in rain-fed and irrigated conditions both, but in irrigated condition, higher production can be obtained. Two irrigations favour the production of good quality fibre.
Machinery and fixed overhead are excluded from life cycle inventory for the activity, since the machineries and fixed overheads provide services over several years, and their impacts per kg of Sunnhemp plant is very low.

## Included activities start
This activity begins from land preparation for sowing.

## Included activities end
The activity ends at the harvesting of the mature sunnhemp plant.

## Geography
This dataset is a copy of Indian dataset

## Time period
Soil cultivating date for main crop: 5 May 2016; harvest date of main crop: 15 Aug 2016

## Reference product
- sunn hemp plant, harvested: 1 kg; name refpro; By-product classification allocatable product; CPC 01929: Other fibre crops, raw, n.e.c.; HS2017 530500: Coconut, abaca (Manila hemp or Musa textilis Nee), ramie and other vegetable textile fibres n.e.c., raw or [...]
  Reference product: Sunnhemp plant, harvested
  production volume 7.5149e7 kg; name RP_PV_1; = 93949*1000
    Global production volume for “Hempseed” is 93949000 kg as reported in FAOSTAT. Value refer to year 2016.
    Reference:
    FAOSTAT, accessed at: http://www.fao.org/faostat/en/#data/QC on 4/4/2018
  property price 0.849076 EUR2005
    Calculated value. The data is taken from Ministry of Agriculture and Forestry of Alberta Canada (Ministry of Agriculture and Forestry of Alberta Canada. Industrial Hemp Enterprise (2017). Retrieved from: http://www1.agric.gov.ab.ca/$department/deptdocs.nsf/all/agdex126, accessed 15Feb2018). The source reports an average cost of production of 500 USD per acre. The yeald per acre is 1074 pounds which equals to 487kg.
  properties: carbon allocation 0.45144 kg, carbon content 0.475, carbon content, fossil 0, carbon content, non-fossil 0.475, dry mass 0.9504 kg, water content 0.0521886, water in wet mass 0.0496 kg, wet mass 1 kg

## Inputs from technosphere
- ammonia, anhydrous, liquid: 3.0078e-9, 1.29219e-8, 6.47189e-8, 2.73571e-9, 6.11964e-10, 2.24908e-8, 1.93335e-9, 5.95952e-9 kg (8 suppliers, which the file names only by identifier); sum of these 1.1438e-7 kg; lognormal variance with pedigree 0.0078, pedigree (3,3,3,5,2)
  Calculated Value. This value has been calculated by using the Ecoinvent LCI calculation tool for crop production.
  properties: dry mass 1 kg, wet mass 1 kg
- ammonium nitrate: 6.65958e-8, 3.54994e-8, 1.2051e-7, 4.61866e-8 kg (4 suppliers, which the file names only by identifier); sum of these 2.68792e-7 kg; lognormal variance with pedigree 0.0078, pedigree (3,3,3,5,2)
  The exchange has been updated from 'ammonium nitrate, as N' into 'ammonium nitrate' and therefore its amount has been scaled (multiplied) from 0 kg by 2.8573 kg of 'ammonium nitrate' per kg of 'ammonium nitrate, as N'.
  properties: dry mass 1 kg, wet mass 1 kg
- ammonium sulfate: 6.73941e-6, 2.06809e-6 kg (2 suppliers, which the file names only by identifier); sum of these 8.8075e-6 kg; lognormal variance with pedigree 0.0078, pedigree (3,3,3,5,2)
  (same comment as for ammonia, anhydrous, liquid)
  properties: dry mass 1 kg, wet mass 1 kg
- benzimidazole-compound: 0.000133333 kg; lognormal variance with pedigree 0.0078, pedigree (3,3,3,5,2)
  The data was collected for a hectare area through interview
  properties: carbon content, fossil 0.529668, dry mass 1 kg, wet mass 1 kg
- inorganic nitrogen fertiliser, as N: 2.87523e-8, 6.74692e-6, 8.00344e-7, 8.59436e-6, 1.96588e-6, 8.32529e-7, 7.673e-6, 7.20524e-7, 5.05483e-6, 5.17112e-7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 kg (29 suppliers, which the file names only by identifier); sum of these 0.000795003 kg; lognormal variance with pedigree 0.0078, pedigree (3,3,3,5,2)
  This exchange is an aggregation of amounts:
  5.29334945124156E-4. Comment:
  8.096482080397373E-5. Comment:
  8.096482080397373E-5. Comment:
  8.21017269402988E-5. Comment:
  2.098748849888653E-6. Comment:
  1.9537681647165734E-5. Comment:
  properties: dry mass 1 kg, wet mass 1 kg
- inorganic phosphorus fertiliser, as P2O5: 2.03562e-5, 4.51835e-5, 0.000390912, 1.26156e-5, 3.09817e-6, 4.38719e-6, 1.09453e-5, 1.43763e-6, 7.04599e-6, 1.67992e-7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 kg (29 suppliers, which the file names only by identifier); sum of these 0.00266425 kg; lognormal variance with pedigree 0.0078, pedigree (3,3,3,5,2)
  This exchange is an aggregation of amounts:
  1.184562774356624E-5. Comment:
  2.1769908938966694E-4. Comment:
  9.777801564178881E-4. Comment:
  9.777801564178881E-4. Comment:
  4.79144343686736E-4. Comment:
  properties: dry mass 1 kg, wet mass 1 kg
- inorganic potassium fertiliser, as K2O: 2.32615e-6, 7.55026e-7, 2.61483e-7, 1.11844e-5, 3.36431e-7, 1.29576e-6, 5.60163e-7, 2.10963e-8, 3.24939e-5, 1.89312e-6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 kg (29 suppliers, which the file names only by identifier); sum of these 0.000389613 kg; lognormal variance with pedigree 0.0078, pedigree (3,3,3,5,2)
  (same comment as for ammonia, anhydrous, liquid)
  properties: dry mass 1 kg, wet mass 1 kg
- irrigation: 1.18258e-5, 0.000236496, 0.0144316, 0.000182199, 0.000488512, 0.000671499, 0.05206, 0.000106579, 2.74105e-6, 0.0064049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 m3 (16 suppliers, which the file names only by identifier); sum of these 0.08 m3; lognormal variance with pedigree 0.0078, pedigree (3,3,3,5,2)
  4-6 times per crop. The data was collected for a hectare area through interview.
  properties: dry mass 0.11 kg, water content 9089.91, wet mass 1000 kg
- linseed seed, at farm: 0.00266667 kg; lognormal variance with pedigree 0.0078, pedigree (3,3,3,5,2)
  data for sunnhemp seeds
  properties: carbon content, non-fossil 1, dry mass 1 kg, wet mass 1 kg
- packaging, for fertilisers: 0.0106667 kg; lognormal variance with pedigree 0.0532, pedigree (4,3,3,5,4)
  Total amount of active substance/s of fertilisers needed for the production of 'hemp' is calculated to be circa 5.33E-03 kg. Fertiliser/s used in this dataset is/are: 'ammonia, liquid', 'ammonium nitrate, as N', 'ammonium sulfate, as N', 'nitrogen fertiliser, as N', 'phosphate fertiliser, as P2O5', 'phosphate rock, as P2O5, beneficiated, dry', 'potassium chloride, as K2O', 'potassium fertiliser, as K2O', 'potassium sulfate, as K2O', 'urea, as N'. The total amount of active substance/s is doubled in order to account for the packaging of the dilluted product of fertiliser/s that is/are applied. Therefore, 1.07E-02 kg of packaging for fertilisers is justified with this exchange.
  properties: carbon content, fossil 0.825301, dry mass 1 kg, heating value, net 25.01 MJ, price 0.0642 EUR2005, wet mass 1 kg
  note on carbon content, fossil: Considering a chemical formula (C2H4)n for polyethylene, carbon content-fossil is calculated to be 0.856286 kg of Carbon per kg of dry mass.
- packaging, for pesticides: 0.000533333 kg; lognormal variance with pedigree 0.0532, pedigree (4,3,3,5,4)
  Total amount of active substance/s of pesticides needed for the production of hemp is calculated to be circa 2.67E-04 kg. Pesticide/s used in this dataset is/are: 'benzimidazole-compound', 'pendimethalin', 'pesticide, unspecified'. The total amount of active substance/s is doubled in order to account for the packaging of the dilluted product of pesticide/s that is/are applied. Therefore, 5.33E-04 kg of packaging for pesticides is justified with this exchange.
  properties: carbon content, fossil 0.85714, dry mass 1 kg, heating value, net 25.97 MJ, price 0.0642 EUR2005, wet mass 1 kg
- pendimethalin: 6.66667e-5 kg; lognormal variance with pedigree 0.0078, pedigree (3,3,3,5,2)
  The data was collected for a hectare area through interview
  properties: carbon content, fossil 0.55516, dry mass 1 kg, wet mass 1 kg
- pesticide, unspecified: 6.66667e-5 kg; lognormal variance with pedigree 0.0078, pedigree (3,3,3,5,2)
  The data was collected for a hectare area through interview
  properties: carbon content, fossil 0.486978, dry mass 1 kg, wet mass 1 kg
- phosphate rock, beneficiated: 9.72632e-8, 9.72632e-8, 3.31765e-8, 7.32634e-6 kg (4 suppliers, which the file names only by identifier); sum of these 7.55404e-6 kg; lognormal variance with pedigree 0.0078, pedigree (3,3,3,5,2)
  The exchange has been updated from 'phosphate rock, as P2O5, beneficiated, dry' into 'phosphate rock, beneficiated' and therefore its amount has been scaled (multiplied) from 0 kg by 3.125 kg of 'phosphate rock, beneficiated' per kg of 'phosphate rock, as P2O5, beneficiated, dry'. Original comment of the exchange is: Calculated Value. This value has been calculated by using the Ecoinvent LCI calculation tool for crop production.
  properties: dry mass 1 kg, wet mass 1 kg
- potassium chloride: 0.000113612, 0.00136994 kg (2 suppliers, which the file names only by identifier); sum of these 0.00148355 kg; lognormal variance with pedigree 0.0078, pedigree (3,3,3,5,2)
  The exchange has been updated from 'potassium chloride, as K2O' into 'potassium chloride' and therefore its amount has been scaled (multiplied) from 0.0009 kg by 1.5829 kg of 'potassium chloride' per kg of 'potassium chloride, as K2O'. Original comment of the exchange is: Calculated Value. This value has been calculated by using the Ecoinvent LCI calculation tool for crop production.
  properties: dry mass 1 kg, wet mass 1 kg
- potassium sulfate: 2.08696e-6, 9.90704e-6 kg (2 suppliers, which the file names only by identifier); sum of these 1.1994e-5 kg; lognormal variance with pedigree 0.0078, pedigree (3,3,3,5,2)
  The exchange has been updated from 'potassium sulfate, as K2O' into 'potassium sulfate' and therefore its amount has been scaled (multiplied) from 0 kg by 1.85 kg of 'potassium sulfate' per kg of 'potassium sulfate, as K2O'. Original comment of the exchange is: Calculated Value. This value has been calculated by using the Ecoinvent LCI calculation tool for crop production.
  properties: dry mass 1 kg, wet mass 1 kg
- tillage, harrowing, by rotary harrow: 0.000102261 ha; lognormal variance with pedigree 0.0078, pedigree (3,3,3,5,2)
  The data was collected for a hectare area through interview. The tillage activity was scaled based on the diesel used for tillage in the ecoinvent dataset and the diesel consumption data collected in the project
- urea: 0.000530973, 6.71532e-5, 8.32477e-5, 0.000453413 kg (4 suppliers, which the file names only by identifier); sum of these 0.00113479 kg; lognormal variance with pedigree 0.0078, pedigree (3,3,3,5,2)
  The exchange has been updated from 'urea, as N' into 'urea' and therefore its amount has been scaled (multiplied) from 0.0005 kg by 2.1438 kg of 'urea' per kg of 'urea, as N'. Original comment of the exchange is: The data was collected for a hectare area through interview.
  properties: carbon content, fossil 0.2, dry mass 1 kg, wet mass 1 kg
- waste wood, untreated: -0.000261797, -0.19509, -0.00358081, -0.00151943, -0.06164, -0.0024021, -0.0288391 kg (7 suppliers, which the file names only by identifier); sum of these -0.293333 kg; lognormal variance with pedigree 0.0192, pedigree (4,5,1,5,2)
  The data was collected for a hectare area through interview. This exchange is an aggregation of amounts:
  0.26666666666666666. Comment: byproduct- Sticks, Used in burning as fuel
  0.02666666666666667. Comment: byproduct-seeds, used as green manure
  production volume; = RP_PV_1* Wastewood/ refpro
    Calculated from production volume of reference product using the relative outputs.
  properties: heating value, net 13.99 MJ
  note on heating value, net: Value taken from the general comment of the treatment dataset.

## Inputs from nature
- Carbon dioxide, in air [natural resource, in air]: 0.967346 kg; lognormal variance with pedigree 0.0064, pedigree (3,3,3,4,2)
  (same comment as for ammonia, anhydrous, liquid)
- Energy, gross calorific value, in biomass [natural resource, biotic]: 11.25 MJ; lognormal variance with pedigree 0.0078, pedigree (3,3,3,5,2)
  (same comment as for ammonia, anhydrous, liquid)
- Occupation, annual crop, irrigated [natural resource, land]: 0.666667 m2*year; lognormal variance with pedigree 0.0092, pedigree (3,3,3,5,2)
  (same comment as for ammonia, anhydrous, liquid)
- Transformation, from annual crop, irrigated [natural resource, land]: 0.666667 m2; lognormal variance with pedigree 0.0152, pedigree (3,3,3,5,2)
  (same comment as for ammonia, anhydrous, liquid)
- Transformation, to annual crop, irrigated [natural resource, land]: 0.666667 m2; lognormal variance with pedigree 0.0152, pedigree (3,3,3,5,2)
  (same comment as for ammonia, anhydrous, liquid)

## Emissions to nature
- Ammonia [air, non-urban air or from high stacks]: 0.000196028 kg; lognormal variance with pedigree 0.0246, pedigree (4,5,3,5,2)
  (same comment as for ammonia, anhydrous, liquid)
- Carbon dioxide, fossil [air, non-urban air or from high stacks]: 0.00124739 kg; lognormal variance with pedigree 0.0212, pedigree (4,5,3,5,2)
  (same comment as for ammonia, anhydrous, liquid)
- Carbon dioxide, from soil or biomass stock [air, non-urban air or from high stacks]: 0.022 kg; = 330/15000
  Global average LUC emissions according 2nd edition of the Quantis-modified tool developed by Blonk Consultants 'WFLDB-adapted-Blonk 2014 direct-land-use-change-assessment-tool_2015-05-18a.xlsx', tab. 'Country & land use unknown'. The emission are based on the relative change in production areas in all countries for a given crop. The weighted average is used which takes into acount relative difference in crop expansion into primary forest, secondary forest, grassland, perennial and annual land. The amount of 330 kg of CO2 per ha*year (taken from the tool) is divided with the yield of seed-cotton, 15000 kg per ha.
- Dinitrogen monoxide [air, non-urban air or from high stacks]: 3.90336e-5 kg; lognormal variance with pedigree 0.0506, pedigree (4,5,3,5,2)
  (same comment as for ammonia, anhydrous, liquid)
- Nitrogen oxides [air, non-urban air or from high stacks]: 8.17709e-5 kg; lognormal variance with pedigree 0.0606, pedigree (4,5,3,5,2)
  (same comment as for ammonia, anhydrous, liquid)
- Water [air, non-urban air or from high stacks]: 0.0408 m3; lognormal variance with pedigree 0.0212, pedigree (4,5,3,5,2)
  (same comment as for ammonia, anhydrous, liquid)
- Cadmium II [soil, agricultural]: 1.93676e-8 kg; lognormal variance with pedigree 0.0606, pedigree (4,5,3,5,2)
  (same comment as for ammonia, anhydrous, liquid)
- Carbendazim [soil, agricultural]: 0.000133333 kg; lognormal variance with pedigree 0.0536, pedigree (4,5,3,5,2)
  (same comment as for ammonia, anhydrous, liquid)
- Chromium III [soil, agricultural]: -2.60734e-6 kg
  (same comment as for ammonia, anhydrous, liquid)
- Copper ion [soil, agricultural]: -5.50291e-6 kg
  (same comment as for ammonia, anhydrous, liquid)
- Lead II [soil, agricultural]: -6.78805e-7 kg
  (same comment as for ammonia, anhydrous, liquid)
- Mercury II [soil, agricultural]: -2.67924e-8 kg
  (same comment as for ammonia, anhydrous, liquid)
- Nickel II [soil, agricultural]: -1.67049e-6 kg
  (same comment as for ammonia, anhydrous, liquid)
- Pendimethalin [soil, agricultural]: 6.66667e-5 kg; lognormal variance with pedigree 0.0536, pedigree (4,5,3,5,2)
  (same comment as for ammonia, anhydrous, liquid)
- Zinc II [soil, agricultural]: -2.07781e-5 kg
  (same comment as for ammonia, anhydrous, liquid)
- Cadmium II [water, ground-]: 2.49294e-9 kg; lognormal variance with pedigree 0.1106, pedigree (4,5,3,5,2)
  (same comment as for ammonia, anhydrous, liquid)
- Cadmium II [water, surface water]: 2.07459e-8 kg; lognormal variance with pedigree 0.1106, pedigree (4,5,3,5,2)
  (same comment as for ammonia, anhydrous, liquid)
- Chromium III [water, ground-]: 1.22301e-6 kg; lognormal variance with pedigree 0.1106, pedigree (4,5,3,5,2)
  (same comment as for ammonia, anhydrous, liquid)
- Chromium III [water, surface water]: 2.4104e-6 kg; lognormal variance with pedigree 0.1106, pedigree (4,5,3,5,2)
  (same comment as for ammonia, anhydrous, liquid)
- Copper ion [water, ground-]: 1.66503e-7 kg; lognormal variance with pedigree 0.1106, pedigree (4,5,3,5,2)
  (same comment as for ammonia, anhydrous, liquid)
- Copper ion [water, surface water]: 1.61174e-6 kg; lognormal variance with pedigree 0.1106, pedigree (4,5,3,5,2)
  (same comment as for ammonia, anhydrous, liquid)
- Lead II [water, ground-]: 6.98128e-9 kg; lognormal variance with pedigree 0.1106, pedigree (4,5,3,5,2)
  (same comment as for ammonia, anhydrous, liquid)
- Lead II [water, surface water]: 3.93366e-7 kg; lognormal variance with pedigree 0.1106, pedigree (4,5,3,5,2)
  (same comment as for ammonia, anhydrous, liquid)
- Mercury II [water, ground-]: 3.28251e-11 kg; lognormal variance with pedigree 0.1106, pedigree (4,5,3,5,2)
  (same comment as for ammonia, anhydrous, liquid)
- Mercury II [water, surface water]: 3.19569e-9 kg; lognormal variance with pedigree 0.1106, pedigree (4,5,3,5,2)
  (same comment as for ammonia, anhydrous, liquid)
- Nickel II [water, surface water]: 1.17001e-6 kg; lognormal variance with pedigree 0.1106, pedigree (4,5,3,5,2)
  (same comment as for ammonia, anhydrous, liquid)
- Nitrate [water, ground-]: 0.00569566 kg; lognormal variance with pedigree 0.0606, pedigree (4,5,3,5,2)
  (same comment as for ammonia, anhydrous, liquid)
- Phosphate [water, ground-]: 1.43089e-5 kg; lognormal variance with pedigree 0.0606, pedigree (4,5,3,5,2)
  (same comment as for ammonia, anhydrous, liquid)
- Phosphate [water, surface water]: 3.93494e-5 kg; lognormal variance with pedigree 0.0606, pedigree (4,5,3,5,2)
  (same comment as for ammonia, anhydrous, liquid)
- Phosphorus [water, surface water]: 0.000237479 kg; lognormal variance with pedigree 0.0606, pedigree (4,5,3,5,2)
  (same comment as for ammonia, anhydrous, liquid)
- Water [water, ground-]: 0.0312 m3; lognormal variance with pedigree 0.0212, pedigree (4,5,3,5,2)
  (same comment as for ammonia, anhydrous, liquid)
- Water [water, surface water]: 0.008 m3; lognormal variance with pedigree 0.0212, pedigree (4,5,3,5,2)
  (same comment as for ammonia, anhydrous, liquid)
- Zinc II [water, ground-]: 6.15366e-7 kg; lognormal variance with pedigree 0.1106, pedigree (4,5,3,5,2)
  (same comment as for ammonia, anhydrous, liquid)
- Zinc II [water, surface water]: 1.60354e-6 kg; lognormal variance with pedigree 0.1106, pedigree (4,5,3,5,2)
  (same comment as for ammonia, anhydrous, liquid)

## Sampling procedure
Data has been collected through field visit and interview. Data has been obtained from a Sunnhemp Research Station in Uttar Pradesh (North India) as they have been researching for the improvement and promotion of Sunnhemp cultivation technology in India, and expressed willingness to share the data.

## Extrapolations
The data on inputs to the field activites are collected directly from the farmers and farming experts. However, the emission data were not readily available for India. Hence, Ecoinvent LCI calculation tool for crop production was used to calculate field emissions from the cultivation process. The data has been approximated using hemp as proxy since the tool at this stage could not support non existing crops in ecoeditor.
