# transport, freight, inland waterways, barge tanker

Dataset: EcoSpold 2, unit process
Geography: RoW
Time period: 1998-01-01 to 2023-12-31
Technology level: current
Classification: ISIC rev.4 ecoinvent: 5022:Inland freight water transport
Classification: EcoSpold01Categories: transport systems/ship
Scenario: Business-as-Usual
System model: Allocation, cut-off by classification
Share of production covered: 0 %
Generated by: Michael Spielmann (obsolete)
Published in: Spielmann M. 2007
Database: ecoinvent
isCopyrightProtected: true
accessRestrictedTo: 1

## General comment
Based on "transport, freight, inland waterways, barge tanker RER 2000". Inventory refers to the entire transport life cycle. Port infrastructure expenditures and environmental interventions are allocated based the yearly throughput (0.04). Vessel manufacturing is allocated based on the total kilometric performance (867'000km) and its transport performance (1200/unit). For each transport activity 2 ports are required. The data of the energy use and combustion emissions represent the transport of good with a barge tanker with a carrying capacity not less than 50 tonnes operating on inland waterways.

## Included activities start
Transport starting with the production of one barge tanker. Service of the energy use and combustion emissions starts with the consumption of fuel for propelling.

## Included activities end
The module calls the modules addressing: production and maintenance of tanker; construction of port. In addition canal construction is called. The activity of energy use and combustion emisssions ends with the service of transporting 1 ton over a distance of 1 km. The dataset includes the consumption fo fuel, airborne gaseous emissions, particulate emissions, heay metal emissions and persistent organic compunds (POPs) emissions until and including the disposal of bilge oil.

## Geography
Extrapolated from "transport, freight, inland waterways, barge tanker RER 2000". Data from one port in Netherlands is employed as an estimate for international water transportation. Canal inventories represent one German canal. Data of the energy use and combustion emissions is representative for the European Rhine-Fleet.

## Technology
diesel engine technology. The data of the energy use and combustion emissions represent a barge tanker navigates in inland waterways (strecht of water, not part of the sea) and with the capacity of not less than 50 tonnes. The fuel used is exclusively diesel. Exhaust emissions from inland waterway vessels - predominately powered by diesel engines - are characterized by similar emission profiles as diesel engines of heavy duty vehicles. For heavy metal emissions are employed the same figures as for hevy-duty vehicle diesel engines.

## Reference product
- transport, freight, inland waterways, barge tanker: 1 metric ton*km; name RP_amount_1; By-product classification allocatable product; CPC 65222: Inland water transport services of freight by tankers
  EcoSpold01Location=RER
  production volume 2.67763 metric ton*km; name RP_PV_1
    This is a placeholder value that does not reflect real-world production volumes. This dataset does not currently require a real-world production volume to work in the database framework, and no actual data were collected yet. This has no negative effect on the results of the ecoinvent database.
  property price 0.0105699 EUR2005
    Calculated based on inputs: The price of the product has been calculated as a sum of the values of the material and energy inputs for this product. This value is therefore a rough estimation. It may underestimate the real price since there are additional expenses when producing any product. These expences can include for example labour costs, treatment of waste materials and profit for the producer. Please consider carefully whether this level of data quality is acceptable for your application.
  properties: carbon allocation 0 kg, carbon content 0

## Inputs from technosphere
- barge tanker: 1.28e-9 unit; lognormal variance with pedigree 0.052, pedigree (1,1,5,5,1)
  EcoSpold01Location=RER
  Calculated value derived from other dataset.
- bilge oil: -4.37e-5 kg; name BP_amount_1; lognormal variance with pedigree 0.042, pedigree (1,1,1,5,1)
  Estimation. Uncertainty range accounts for a factor between 0.4 and 0.9 % of the specific fuel consumption. Energy use and combustion emissions
  production volume; = RP_PV_1 * (BP_amount_1 / RP_amount_1)
    Calculated from production volume of reference product using the relative outputs.
  property carbon content, fossil 0.84; name C_content_fossil
  property carbon content, non-fossil 0; name C_content_non_fossil
  property dry mass 0.1 kg; name DM
  property water content 9; name water_content
  property water in wet mass 0.9 kg; name WWM
  property wet mass 1 kg; name WM
  properties: heating value, net 1.92 MJ
  note on heating value, net: Value taken from the general comment of the treatment dataset.
- canal: 0.000116 m*year; lognormal variance with pedigree 0.162, pedigree (1,1,5,5,1)
  Calculated value derived from other dataset.
  EcoSpold01Location=RER
- diesel: 1.80013e-5, 0.00746238, 7.65117e-5, 0.000755723, 5.29353e-5, 0.000374448 kg (6 suppliers, which the file names only by identifier); sum of these 0.00874 kg; source Frischknecht R. 1996; lognormal variance with pedigree 0.072, pedigree (1,1,5,5,1)
  Estimation. Based in various literature values. The average fuel consumption is calculated by employing carrying capacity specific fuel consumption available from Dorland (2000) as quoted in Bickel (2001). The class specific fuel consumption is aggregated using the total carrying capacity of each class ZKR (2003) as allocation factor. Energy use and combustion emissions
  Further references:
  Dorland C. and Olsthoorn A. A. (2000) Inland shipping emission factors. Report for ExternE Core/Transport task 5.3, Amsterdam
  Bickel P. and Friedrich R. (2001) Environmental External Costs of Transport. Springer-Verlag Berlin and Heidelberg GmbH & Co. KG, Berlin - Germany
  ZKR (2003) Wirtschaftliche Entwicklung der Rheinschifffahrt 2000. Rhein und Binnenschifffahrtsstatistik. Download of June from mediaplan.ovh.net/~ccrzkr/Files/ra2001statde.pdf.
  Borken J., Patyk A. and Reinhardt G. A. (1999) Basisdaten für ökologische Bilanzierungen: Einsatz von Nutzfahrzeugen in Transport, Landwirtschaft und Bergbau. Vieweg, Braunschweig/Wiesbaden
  Bialonski W. (1990) Spezifischer Energieeinsatz im Verkehr - Ermittlung und Vergleich der spezifischen Energieverbräuche. Forschungsbericht FE Nr. 90 247/88, im Auftrag des Bundesministers für Verkehr (ausgeführt am Verkehrswissenschaftlichen Institut der Rheinisch-Westfälischen Technischen Hochschule Aachen), Bonn
  properties: carbon content, fossil 0.865, dry mass 1 kg, heating value, net 42.8 MJ, wet mass 1 kg
- maintenance, barge: 1.28e-9 unit; lognormal variance with pedigree 0.052, pedigree (1,1,5,5,1)
  Calculated value derived from other dataset.
  EcoSpold01Location=RER
- port facilities: 1.45e-14 unit; lognormal variance with pedigree 0.082, pedigree (1,1,5,5,1)
  Calculated value derived from other dataset.
  EcoSpold01Location=RER

## Emissions to nature
- Ammonia [air, non-urban air or from high stacks]: 4.53e-7 kg; lognormal variance with pedigree 0.162, pedigree (1,1,5,5,1)
  Estimation. Based on the emission of heavy fuel oil burned in industrial furnance. Energy use and combustion emissions
- Benzene [air, non-urban air or from high stacks]: 1.66e-7 kg; source Dorland C. 2000; lognormal variance with pedigree 0.162, pedigree (1,1,5,5,1)
  Calculated value. It's calculated from VOC split of diesel engines. It's applied the fractions as employed for diesel concepts of heavy-duty vehicles.In this project it's employed the figures from Dorland (2000) as quoted in Bickel (2001). Energy use and combustion emissions
  Further references:
  Bickel P. and Friedrich R. (2001) Environmental External Costs of Transport. Springer-Verlag Berlin and Heidelberg GmbH & Co. KG, Berlin - Germany
- Benzo(a)pyrene [air, non-urban air or from high stacks]: 6.73e-14 kg; source Borken J. 1999; lognormal variance with pedigree 0.342, pedigree (1,1,5,5,1)
  Literature value. In Jens Borken et al. (1999)emission indices for Persistent Organic Compounds (POPs) are reported and applied in this project and for Benzo(a)pyrene 7.70E-06 g/kg fuel (180 ng/MJ) is taken into account. Energy use and combustion emissions
  Further references:
  Borken J., Patyk A. and Reinhardt G. A. (1999) Basisdaten für ökologische Bilanzierungen: Einsatz von Nutzfahrzeugen in Transport, Landwirtschaft und Bergbau. Vieweg, Braunschweig/Wiesbaden
- Cadmium II [air, non-urban air or from high stacks]: 8.74e-11 kg; source Jungbluth, N. 2003; lognormal variance with pedigree 0.692, pedigree (1,1,5,5,1)
  Calculated value; standard basic uncertainty for heavy metals. In this project we use the same figures as we employed for heavy-duty vehicle diesel engines. Heavy metal emission indices of diesel fuels EEA (2000) and Jungbluth (2003) are applyed. Energy use and combustion emissions
  Further references:
  EEA (2000) Computer programme to calculate emissions from road transport. Methodology and emission factors (Version 2.1). 49. European Environment Agency, Copenhagen
  Jungbluth N. (2003) Erdöl. In: Sachbilanzen von Energiesystemen: Grundlagen für den ökologischen Vergleich von Energiesystemen und den Einbezug von Energiesystemen in Ökobilanzen für die Schweiz (ed. Dones R.). Final report ecoinvent 2000 No. 6, Paul Scherrer Institut Villigen, Swiss Centre for Life Cycle Inventories, Duebendorf, CH, Online-Version under: www.ecoinvent.ch <http://www.ecoinvent.ch>.
- Carbon dioxide, fossil [air, non-urban air or from high stacks]: 0.0275 kg; source Jungbluth, N. 2003; lognormal variance with pedigree 0.042, pedigree (1,1,5,5,1)
  Calculated value from carbon content in diesel. The CO2 emission index is determined as 3172 g/kg, assuming a C-content of 86.5 M% in Jungbluth (2003). Energy use and combustion emissions
- Carbon monoxide, fossil [air, non-urban air or from high stacks]: 2.36e-5 kg; source Dorland C. 2000; lognormal variance with pedigree 0.162, pedigree (1,1,5,5,1)
  Literature value. In this project it's employed the figures from Dorland (2000) as quoted in Bickel (2001). Energy use and combustion emissions
  Further references:
  Bickel P. and Friedrich R. (2001) Environmental External Costs of Transport. Springer-Verlag Berlin and Heidelberg GmbH & Co. KG, Berlin - Germany
- Chromium III [air, non-urban air or from high stacks]: 4.37e-10 kg; source Jungbluth, N. 2003; lognormal variance with pedigree 0.692, pedigree (1,1,5,5,1)
  (same comment as for Cadmium II)
- Copper ion [air, non-urban air or from high stacks]: 1.49e-8 kg; source Jungbluth, N. 2003; lognormal variance with pedigree 0.692, pedigree (1,1,5,5,1)
  (same comment as for Cadmium II)
- Dinitrogen monoxide [air, non-urban air or from high stacks]: 2.89e-6 kg; source Dorland C. 2000; lognormal variance with pedigree 0.162, pedigree (1,1,5,5,1)
  (same comment as for Carbon monoxide, fossil)
- Dioxins, measured as 2,3,7,8-tetrachlorodibenzo-p-dioxin [air, non-urban air or from high stacks]: 5.23e-19 kg; source Borken J. 1999; lognormal variance with pedigree 1.122, pedigree (1,1,5,5,1)
  Literature value. In Jens Borken et al. (1999) emission indices for Persistent Organic Compounds (POPs) are reported and applied in this project. For Dioxin an emission index of 5.99E-11 TEQ ng/kg fuel. Energy use and combustion emissions
  Further references:
  Borken J., Patyk A. and Reinhardt G. A. (1999) Basisdaten für ökologische Bilanzierungen: Einsatz von Nutzfahrzeugen in Transport, Landwirtschaft und Bergbau. Vieweg, Braunschweig/Wiesbaden
- Hydrochloric acid [air, non-urban air or from high stacks]: 9.25e-9 kg; lognormal variance with pedigree 0.082, pedigree (1,1,5,5,1)
  Calculated value from Cl content in heavy fuel oil. Energy use and combustion emissions
- Lead II [air, non-urban air or from high stacks]: 1.75e-10 kg; source Jungbluth, N. 2003; lognormal variance with pedigree 0.692, pedigree (1,1,5,5,1)
  (same comment as for Cadmium II)
- Mercury II [air, non-urban air or from high stacks]: 6.12e-13 kg; source Jungbluth, N. 2003; lognormal variance with pedigree 0.692, pedigree (1,1,5,5,1)
  (same comment as for Cadmium II)
- Methane, fossil [air, non-urban air or from high stacks]: 2.1e-7 kg; source Dorland C. 2000; lognormal variance with pedigree 0.162, pedigree (1,1,5,5,1)
  (same comment as for Benzene)
- NMVOC, non-methane volatile organic compounds [air, non-urban air or from high stacks]: 8.74e-6 kg; lognormal variance with pedigree 0.082, pedigree (1,1,5,5,1)
  Literature value. Energy use and combustion emissions
- Nickel II [air, non-urban air or from high stacks]: 6.12e-10 kg; source Jungbluth, N. 2003; lognormal variance with pedigree 0.692, pedigree (1,1,5,5,1)
  (same comment as for Cadmium II)
- Nitrogen oxides [air, non-urban air or from high stacks]: 0.000437 kg; source Dorland C. 2000; lognormal variance with pedigree 0.082, pedigree (1,1,5,5,1)
  (same comment as for Carbon monoxide, fossil)
- Particulate Matter, < 2.5 um [air, non-urban air or from high stacks]: 8.06e-6 kg; source Dorland C. 2000; lognormal variance with pedigree 0.342, pedigree (1,1,5,5,1)
  Calculate value; split results from PM split of diesel road vehicle exhaust emissions. Dorland (2000) as quoted in Bickel (2001) reported a PM10 emission index of 1 g/kg fuel which is employed in this project. It's employed the same size distribution as for heavy-duty vehicle diesel engines. Energy use and combustion emissions
  Further references:
  Bickel P. and Friedrich R. (2001) Environmental External Costs of Transport. Springer-Verlag Berlin and Heidelberg GmbH & Co. KG, Berlin - Germany
- Particulate Matter, > 10 um [air, non-urban air or from high stacks]: 3.45e-7 kg; source Dorland C. 2000; lognormal variance with pedigree 0.082, pedigree (1,1,5,5,1)
  (same comment as for Particulate Matter, < 2.5 um)
- Particulate Matter, > 2.5 um and < 10um [air, non-urban air or from high stacks]: 6.73e-7 kg; source Dorland C. 2000; lognormal variance with pedigree 0.162, pedigree (1,1,5,5,1)
  (same comment as for Particulate Matter, < 2.5 um)
- Selenium IV [air, non-urban air or from high stacks]: 8.74e-11 kg; source Jungbluth, N. 2003; lognormal variance with pedigree 0.692, pedigree (1,1,5,5,1)
  (same comment as for Cadmium II)
- Sulfur dioxide [air, non-urban air or from high stacks]: 5.24e-6 kg; source Jungbluth, N. 2003; lognormal variance with pedigree 0.082, pedigree (1,1,5,5,1)
  Calculated value from sulphur content in diesel fuel. In Jungbluth (2003) a S-content of 0.05 M% for diesel is reported, resulting in an emission index of 1 g/kg SO2. Energy use and combustion emissions
- Toluene [air, non-urban air or from high stacks]: 6.99e-8 kg; source Dorland C. 2000; lognormal variance with pedigree 0.162, pedigree (1,1,5,5,1)
  Calculated value. It's calculated from VOC split of diesel engines. It's applied the fractions as employed for diesel concepts of heavy-duty vehicles. In this project it's employed the figures from Dorland (2000) as quoted in Bickel (2001). Energy use and combustion emissions
  Further references:
  Bickel P. and Friedrich R. (2001) Environmental External Costs of Transport. Springer-Verlag Berlin and Heidelberg GmbH & Co. KG, Berlin - Germany
- Xylenes, unspecified [air, non-urban air or from high stacks]: 6.99e-8 kg; lognormal variance with pedigree 0.162, pedigree (1,1,5,5,1)
  Calculated value. It's calculated from VOC split of diesel engines. It's applied the fractions as employed for diesel concepts of heavy-duty vehicles. Energy use and combustion emissions
- Zinc II [air, non-urban air or from high stacks]: 8.74e-9 kg; source Jungbluth, N. 2003; lognormal variance with pedigree 0.692, pedigree (1,1,5,5,1)
  (same comment as for Cadmium II)

## Sampling procedure
National statistics, literature studies

## Extrapolations
see geography This dataset has been copied from an original dataset covering the geography RER. The uncertainty has been adjusted accordingly.

## Review by Niels Jungbluth 2003-08-20
passed.

## Review by Carl Vadenbo 2012-06-29
In preparation for the release of ecoinvent v3.0, the datasets 'operation, barge tanker, RER' and 'transport, barge tanker, RER' in ecoinvent v2.2 were merged and extrapolated into the dataset 'transport, freight, inland waterways, barge tanker, GLO 1998-2000'. The amounts of the exchanges were reviewed and were found to correspond to the disaggregated datasets. The uncertainty information has only been adjusted for geographical representativeness in GLO, and consequently needs to be revised before subsequent releases of the database. Despite this shortcoming, the new dataset was accepted for inclusion into the ecoinvent database on 2012.07.04.
