# magnesium, for reuse in zirconium sponge production, to generic market for magnesium

Dataset: EcoSpold 2, unit process
Geography: FR
Time period: 2021-01-01 to 2023-12-31
Technology level: current
Classification: ISIC rev.4 ecoinvent: 2420:Manufacture of basic precious and other non-ferrous metals
Scenario: Business-as-Usual
System model: Allocation, cut-off by classification
Generated by: Efstathios Kakkos
Database: ecoinvent
isCopyrightProtected: true
accessRestrictedTo: 1

## General comment
This activity links magnesium, obtained from the electrolysis of magnesium chloride that is produced during the production of zirconium sponge, to the market for magnesium.
As the magnesium that is recovered through the electrolysis of magnesium chloride is exclusively reused for the production of zirconium sponge, it is assumed that it actually does not supply the market for magnesium. For this reason, the production volume is a dummy value.
The purpose of this activity is to link the recovered magnesium to the market for magnesium in the Consequential system model. In that system model, the activities that are consuming magnesium recovered through the electrolysis of magnesium chloride get instead supplied by the marginal suppliers of magnesium.

## Reference product
- magnesium: 1 kg; By-product classification allocatable product; CPC 41601: Tungsten, molybdenum, tantalum, magnesium, cobalt, cadmium, titanium, zirconium, beryllium, gallium, hafnium, […]; HS2017 810490: Magnesium; articles n.e.c. in heading no. 8104; CAS 7439-95-4
  production volume 1.068 kg; = 4*0.267
    Dummy value used, as this activity is assumed to not supply the market for magnesium. The scaling factor corresponds to France's share of the global production volume of magnesium recovered through the electrolysis of magnesium chloride, produced during the production of zirconium sponge (26.7%).
  property price 1.79941 EUR2005
    Price calculated based on the annual average price of magnesium metal reported in the USGS Minerals Yearbooks for Magnesium (2011 to 2019) in China, for the years 2010 to 2018.
    The prices were converted to EUR based on the annual exchange rates published by the European Central Bank (https://sdw.ecb.europa.eu/quickview.do?SERIES_KEY=120.EXR.A.USD.EUR.SP00.A, last accessed on 2022-02-15) and adjusted for inflation relative to 2005 using the producer price index (PPI) of the euro area, published by eurostat (https://appsso.eurostat.ec.europa.eu/nui/show.do?dataset=sts_inpp_a&lang=en, last accessed on 2022-05-04).
    Reference:
    USGS (2022). Magnesium Statistics and Information, USGS Minerals Yearbook (2011 to 2019). https://www.usgs.gov/centers/national-minerals-information-center/magnesium-statistics-and-information (last accessed on 2022-07-04).
  properties: carbon allocation 0 kg, carbon content 0, carbon content, fossil 0, carbon content, non-fossil 0, dry mass 1 kg, water content 0, water in wet mass 0 kg, wet mass 1 kg

## Inputs from technosphere
- magnesium, for reuse in zirconium sponge production: 1 kg
  properties: dry mass 1 kg, magnesium content 1, price 11 EUR2005, wet mass 1 kg
