# yarn production, kenaf

Dataset: EcoSpold 2, unit process
Geography: RoW
Time period: 2014-04-01 to 2023-03-31
Technology level: current
Classification: EcoSpold01Categories: textiles/processing
Classification: ISIC rev.4 ecoinvent: 1311:Preparation and spinning of textile fibres
Scenario: Business-as-Usual
System model: Allocation, cut-off by classification
Generated by: Archana Datta
Published in: Faist Emmenegger, M. 2018
Database: ecoinvent
isCopyrightProtected: true
accessRestrictedTo: 1

## General comment
This dataset is a copy of the respective Indian one. his dataset represents the production of 1 kg of Kenaf yarn from Kenaf fibre
The inventory includes softening, carding, drawing and spinning of kenaf fibre. The processing chain starts with softener machine which is used to soften and split up raw Kenaf fibres at the initial stage. Then the extraneous matter is removed from the kenaf fibre by carding machine. Kenaf requires 3 carding operations. In the next step drawing machines are used to blend and equalize silver of the fibre in three stages. Spinning machines are used then to elongate Slivers and fibres are twisted into yarn. Then on windings machines, spool and cops are wound for beaming and weaving operations, where wrapping of warp and weft yarn are done respectively.
The inventory is mainly based on industrial data collected from a spinning mill in West Bengal. The main inputs are Kenaf fibre, castor oil, water and energy. The waste of yarn is minimised using many preventive measures, some fibre converts into caddies and dust which is being reused in the same production process. It is important to note here that the energy data is calculated based on available secondary data for energy requirement of a kenaf processing machines.

## Included activities start
The process begins with softening with water and oil emuslsion on softening machine,goes through 3 Carding and 3 drawing operations. Data excludes machinery transport and packaging details

## Included activities end
The process ends with spinning yarn ready for weaving. The machinery involved in the process is physically not present due to lack of data, however the energy/electricity necessary to operate the machinery is part of the dataset.

## Geography
This dataset is a copy of Indian dataset

## Technology
The processing chain starts with softener machine which is used to Soften and Split up raw Kenaf fibres at the initial stage. Then the extraneous matter is removed from the kenaf fibre by carding machine. Kenaf requires 3 carding operations. In the next step drawing machines are used to blend and equalize silver of the fibre in three stages. Spinning machines are used then to elongate Slivers and fibres are twisted into yarn. Then on windings machines, spool and cops are wound for beaming and weaving operations, where wrapping of warp and weft yarn are done respectively.

## Reference product
- yarn, kenaf: 1 kg; name RP_amount_1; By-product classification allocatable product; CPC 26380: Yarn of vegetable textile fibres other than cotton (including flax, jute, coir and true hemp); paper yarn; HS2017 530890: Yarn; of vegetable textile fibres n.e.c. in heading no. 5306, 5307 and 5308
  production volume 1.441e8 kg; name RP_PV_1
    It is assumed that entire volume of fibre is converted to yarn. The World annual production for Kenaf & Allied fibres in year 2010 is taken as the annual production volume here. Source: http://jute.org/IJSG%20Publications/Jute%20&%20kenaf%20Stat%20at%20a%20glance_ijsg.pdf
  property carbon content, fossil 0
    Kenaf fibers are considered to have a 46% C-content in dry mass. Source: "Evolutionary and Biochemical Aspects", A.D. Kay and T. Vrede (in Global Ecology, 2010, Elsevier B.V., S.E. Jørgensen Ed.
  property carbon content, non-fossil 0.46
    Kenaf fibers are considered to have a 46% C-content in dry mass (from "Evolutionary and Biochemical Aspects", A.D. Kay and T. Vrede (in Global Ecology, 2010, Elsevier B.V., S.E. Jørgensen Ed.))
  property heating value, net 14.87 MJ
    LHV is calculated based on the Carbon content of the product. More details can be found on the respective documentation.
  property price 0.712 EUR2005
    Approximation. Average 2005 prices for EU27, USA, China, Japan and India from Import/Export data (US$ and tonnes) in UN Commodity Trade Statistics Database; Commodity: Yarn of jute or of other textile bast fibres of heading 264.0
  properties: carbon allocation 0.46 kg, carbon content 0.46, dry mass 1 kg, water content 0, water in wet mass 0 kg, wet mass 1 kg

## Inputs from technosphere
- building, hall: 3.88681e-5 m2; = 20000/(857601*12*50); lognormal variance with pedigree 0.3106, pedigree (2,1,4,5,1)
  square meters of building divided by production per year and life time of the plant
- electricity, low voltage: 0.00475344, 0.0257206, 0.000999586, 0.000388645, 0.0271294, 0.0064664, 0.000389974, 0.00133275, 0.000532517, 0.239444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 kWh (47 suppliers, which the file names only by identifier); sum of these 0.68 kWh; lognormal variance with pedigree 0.0126, pedigree (1,4,4,5,1)
  This is the sum of electricity used for softening, drawing, carding and spinning. In India power is supplied as single-phase supply of 230V supply through two wires and 3-phase supply is 415 V. For industry, the supply if 3-phase.
- fibre, kenaf: 1.025 kg; lognormal variance with pedigree 0.0126, pedigree (1,4,4,5,1)
  properties: carbon content, non-fossil 0.46, dry mass 0.910747 kg, heating value, net 12.47 MJ, water content 0.098, wet mass 1 kg
- vegetable oil, refined: 0.03 kg; lognormal variance with pedigree 0.0126, pedigree (1,4,4,5,1)
  Castor oil is used for softening process. It is assumed that the oil used to soften the fibers remain in the final product after the process.
  properties: carbon content, non-fossil 0.768, dry mass 1 kg, heating value, net 38.4 MJ, wet mass 1 kg
  note on heating value, net: Values is approximated from HHV from "vegetable oil, crude". Source: Radovanovic,M.; Zivanovic,T.; Stojiljkovic,D.; Jovanovic,V.; Jerinic,N.; Knezevic,S. et.al. Utilization of sunflower husk as a fuel for industrial boilers - 20 years experience. Proc. 5th Eur. Conf. on Industrial Furnaces&Boilers 2000,vol.2,p.221-233. Available at: https://phyllis.nl/Biomass/View/2152
- waste yarn and waste textile: -0.025 kg; name BP_amount_2; lognormal variance with pedigree 0.0132, pedigree (4,4,1,5,2)
  This is the final waste that is ultimatelly landfilled. expert judgement based on company data
  production volume; = RP_PV_1* BP_amount_2/ RP_amount_1
    Calculated from production volume of reference product using the relative outputs.
  properties: carbon content, non-fossil 0.44455, dry mass 0.97917 kg, heating value, net 13.14 MJ, water content 0.0212731, wet mass 1 kg
- wastewater, average: -7.70017e-7, -0.000128134, -3.06395e-5, -4.56207e-7 m3 (4 suppliers, which the file names only by identifier); sum of these -0.00016 m3; = water*.8; lognormal variance with pedigree 0.0126, pedigree (4,4,1,5,1)
  considering default value of 80% wastewater generation.
  production volume; = RP_PV_1* BP_amount_1/ RP_amount_1
    Calculated from production volume of reference product using the relative outputs.
  properties: carbon content, non-fossil 0.194039, dry mass 0.346837 kg, water content 2882.2, wet mass 1000 kg
  note on carbon content, non-fossil: 0.0673 kg TOC/m3 (Tab A.17, ecoinvent v2.2 report 13_I). TOC was considered as Total Carbon.

## Inputs from nature
- Water, well, in ground [natural resource, in water]: 0.0002 m3; name water; = 0.2/1000; lognormal variance with pedigree 0.0126, pedigree (1,4,4,5,1)
  Water is used only for Softening operations. Data was collected for 1000 Kg of Kenaf yarn processed and water consumption was found to be 200 kgs.

## Emissions to nature
- Water [air, urban air close to ground]: 4e-5 m3; = water*.2; lognormal variance with pedigree 0.0206, pedigree (4,4,4,5,1)
  considering default value of 20% evaporation rate

## Sampling procedure
Field visit and interviews from representative mills in West Bengal (East India) was chosen to provide data based on its technical representativeness of the current state of business and their willingness to participate.
