# transport, passenger train

Dataset: EcoSpold 2, unit process
Geography: AT
Time period: 2000-01-01 to 2023-12-31
Technology level: current
Classification: ISIC rev.4 ecoinvent: 4911:Passenger rail transport, interurban
Classification: EcoSpold01Categories: transport systems/train
Scenario: Business-as-Usual
System model: Allocation, cut-off by classification
Share of production covered: 1 %
Generated by: Michael Spielmann (obsolete)
Published in: Spielmann M. 2007
Database: ecoinvent
isCopyrightProtected: true
accessRestrictedTo: 1

## General comment
The dataset represents the entire transport life cycle of a passenger train in Austria. Data of the energy use and operation emissions for the operation of average trains in Austria (regional trains, S-Bahn, long distance-trains), the data has been determined top down by International Rail Statistics. Particulate emissions due to abrasion of rail tracks, wheels, brakes and overhead contact line is included according to Swiss situation. Emission of sulphur hexafluoride (SF6) occurring during conversion at traction substations are accounted for.

## Included activities start
The dataset starts when the infrastructure input (train and railway tracks) starts to be used for passenger transport.

## Included activities end
The dataset ends with the service of transporting 1 passenger over a distance of 1 km by a long-distance train. The dataset includes the production, the maintenance and the energy use and operation emissions of a long-distance train, the construction of a railway track. The inventory of the energy use and operation emissions includes the actual energy consumption (26000 t Diesel and 945 GWh of electricity) due to traction of passenger trains.

## Geography
Data of the energy use and operation emissions refers to average transport conditions

## Technology
Demand factors of various transport components required to fulfill the functional unit of one pkm. In order to account for the fact that the same rail tracks are used for both passenger and goods transportation are applied allocation factors. For the energy use and operation emissions data, all technologies are included, the train is operated with the country electricity mix.

## Time period
For the energy use and operation emissions, all data is based on situation in the year 2000, except the specific energy consumption per pkm (year 2007)

## Reference product
- transport, passenger train: 1 person*km; By-product classification allocatable product; CPC 641: Local transport and sightseeing transportation services of passengers
  EcoSpold01Location=AT
  production volume 8.586e9 person*km
    8758 Mio. pkm in 2007
    UIC statistical synopsis 2005 http://www.uic.org/IMG/xls/synth2005-2.xls
  property price 0.0208844 EUR2005
    Calculated based on inputs: The price of the product has been calculated as a sum of the values of the material and energy inputs for this product. This value is therefore a rough estimation. It may underestimate the real price since there are additional expenses when producing any product. These expences can include for example labour costs, treatment of waste materials and profit for the producer. Please consider carefully whether this level of data quality is acceptable for your application.
  properties: carbon allocation 0 kg, carbon content 0

## Inputs from technosphere
All rows: lognormal variance with pedigree 0.04, pedigree (1,1,5,1,1)
- diesel: 0.0029687 kg
  Energy use and operation emissions
  properties: carbon content, fossil 0.865, dry mass 1 kg, heating value, net 42.8 MJ, wet mass 1 kg
  note on carbon content, fossil: C-content of diesel is 86.5% (ecoinvent v2.2 report 6_IV, Tab 3.14)
- electricity, high voltage: 0.1079 kWh
  Energy use and operation emissions
- maintenance, train, passenger, long distance: 5.3472e-10 unit
  Calculated value, required to fulfill the functional unit of one pkm.
- railway track: 0.00011808 m*year
  Calculated value, required to fulfill the functional unit of one pkm.
  EcoSpold01Location=CH
- train, passenger, long-distance: 5.3472e-10 unit
  EcoSpold01Location=CH
  Calculated value, required to fulfill the functional unit of one pkm.

## Emissions to nature
All rows: lognormal variance with pedigree 0.04, pedigree (1,1,5,1,1)
- Ammonia [air, unspecified]: 5.9199e-8 kg
  Energy use and operation emissions
- Benzene [air, unspecified]: 2.9687e-7 kg
  Energy use and operation emissions
- Cadmium II [air, unspecified]: 2.9687e-11 kg
  Energy use and operation emissions
- Carbon dioxide, fossil [air, unspecified]: 0.0093403 kg
  Energy use and operation emissions
- Carbon monoxide, fossil [air, unspecified]: 4.6921e-5 kg
  Energy use and operation emissions
- Chromium III [air, unspecified]: 1.4865e-10 kg
  Energy use and operation emissions
- Copper ion [air, unspecified]: 5.0429e-9 kg
  Energy use and operation emissions
- Dinitrogen monoxide [air, unspecified]: 2.9687e-7 kg
  Energy use and operation emissions
- Lead II [air, unspecified]: 3.2669e-13 kg
  Energy use and operation emissions
- Mercury II [air, unspecified]: 5.9199e-14 kg
  Energy use and operation emissions
- Methane, fossil [air, unspecified]: 3.8589e-7 kg
  Energy use and operation emissions
- NMVOC, non-methane volatile organic compounds [air, unspecified]: 1.5041e-5 kg
  Energy use and operation emissions
- Nickel II [air, unspecified]: 2.0785e-10 kg
  Energy use and operation emissions
- Nitrogen oxides [air, unspecified]: 0.00016313 kg
  Energy use and operation emissions
- Particulate Matter, < 2.5 um [air, unspecified]: 3.8088e-6 kg
  Energy use and operation emissions
- Particulate Matter, > 10 um [air, unspecified]: 1.1715e-5 kg
  Energy use and operation emissions
- Particulate Matter, > 2.5 um and < 10um [air, unspecified]: 1.0706e-5 kg
  Energy use and operation emissions
- Selenium IV [air, unspecified]: 2.9687e-11 kg
  Energy use and operation emissions
- Sulfur dioxide [air, unspecified]: 1.7804e-6 kg
  Energy use and operation emissions
- Sulfur hexafluoride [air, unspecified]: 4.7477e-9 kg
  Energy use and operation emissions
- Toluene [air, unspecified]: 1.1884e-7 kg
  Energy use and operation emissions
- Xylenes, unspecified [air, unspecified]: 1.1884e-7 kg
  Energy use and operation emissions
- Zinc II [air, unspecified]: 2.9687e-9 kg
  Energy use and operation emissions
- Iron ion [soil, unspecified]: 2.8132e-5 kg
  Energy use and operation emissions

## Sampling procedure
International railway statistics

## Extrapolations
see Technology and Geography

## Review by Christian Bauer 2010-02-07
passed

## Review by Roland Hischier 2011-09-28
Transfer of documentation done.

## Review by Carl Vadenbo 2012-06-29
In preparation for the release of ecoinvent v3.0, the datasets 'operation, average train AT' and 'transport, average train AT' in ecoinvent v2.2 were merged into the dataset 'transport, passenger train, AT 2008'. The amounts of the exchanges were reviewed and were found to correspond to the disaggregated datasets. The field Included Activities End and the uncertainty information need to be revised before subsequent releases of the database. Despite this shortcoming, the new dataset was accepted for inclusion into the ecoinvent database on 2012.07.04.
