# transport, freight train, steam

Dataset: EcoSpold 2, unit process
Geography: RoW
Time period: 1999-01-01 to 2023-12-31
Technology level: current
Classification: ISIC rev.4 ecoinvent: 4912:Freight rail transport
Scenario: Business-as-Usual
System model: Allocation, cut-off by classification
Generated by: Frédéric Gindroz
Published in: Röder, A. 2007
Database: ecoinvent
isCopyrightProtected: true
accessRestrictedTo: 1

## General comment
Based on Chinese railway steam freight transport. Inventory refers to the entire transport life cycle. For rail infrastructure, expenditures and environmental interventions due to construction of roads have been allocated based on the gross tonne kilometre performance in Europe.

## Included activities start
The dataset starts with the production of a locomotive.

## Included activities end
Based on Chinese railway freight transport; it includes operation of steam train only. This dataset calls the modules 'production, maintenance of vehicles'; 'construction of railway tracks'.

## Geography
Extrapolated from "transport, freight train, stream, CN 2004"

## Technology
Average technology

## Reference product
- transport, freight train: 1 metric ton*km; name RP_amount_1; By-product classification allocatable product; CPC 6512: Railway transport services of freight
  production volume 1.80042e10 metric ton*km; name RP_PV_1
    Unknown UIC statistical synopsis 2005 http://www.uic.org/IMG/xls/synth2005-2.xls
  properties: carbon allocation 0 kg, carbon content 0, price 0.026 EUR2005

## Inputs from technosphere
- goods wagon: 4.59e-8 unit; lognormal variance with pedigree 0.062, pedigree (1,1,5,5,1)
  Calculated value, required to fulfill the functional unit of one tkm fright transport.
- hard coal: 0.00494372, 0.00117311, 0.00384912, 0.00821686, 0.00504495, 0.0073705, 0.0109028, 0.00214542, 0.00305351 kg (9 suppliers, which the file names only by identifier); sum of these 0.0467 kg; lognormal variance with pedigree 0.162, pedigree (1,1,5,5,1)
  Estimated value. The steam locomotive dataset is modelled in first approximation by assuming a factor of 4 in fuel (equivalent) utilization compared with a diesel locomotive, based on consideration of likely actual efficiencies (mix of first generation steam locomotives with typical drawbar thermal efficiency of approximately 7% and some second generation with superheating with efficiency up to 15%). Further correction has been applied using the factor 2.67. Energy use and operations emissions
  properties: carbon content, fossil 0.845, dry mass 0.94 kg, heating value, net 27.91 MJ, water content 0.0638298, wet mass 1 kg
  note on carbon content, fossil: C content 75-94% (specified in Tab 1.1, report 6, part VI). A mean content of 0.845 kg C/ kg dry hard coal was considered
  note on heating value, net: Based on the Characterization factor of Hard coal in the CED method
- hard coal ash: -3.04393e-6, -4.80485e-6, -6.76074e-6, -4.75603e-6, -1.00888e-6, -7.08262e-6, -4.16716e-5, -0.0138474, -0.000321599, -2.82296e-5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 kg (14 suppliers, which the file names only by identifier); sum of these -0.0149 kg; lognormal variance with pedigree 0.302, pedigree (1,1,1,5,1)
  Estimated value. Emissions from the steam locomotive have been roughly estimated adjusting the emission rates (per MJ) from “hard coal, burned in coal mine power plant (CN)” by the average LHV (24 MJ/kg bituminous coal assumed to be used for locomotives vs. 12 MJ/kg poor quality coal for small power plants). Coal for steam locomotives has a presumably lower ash content (say approximately 25% of coal weight) compared with coal for small coal mine plants (up to 50% of coal weight (Dones et al. 2003)), the retention efficiency is likely lower. Energy use and operation emissions
  production volume; = RP_PV_1* BP_amount_1/ RP_amount_1
    Calculated from production volume of reference product using the relative outputs.
  properties: dry mass 1 kg, wet mass 1 kg
- locomotive: 7.11e-10 unit; lognormal variance with pedigree 0.062, pedigree (1,1,5,5,1)
  Calculated value, required to fulfill the functional unit of one tkm fright transport.
- maintenance, goods wagon: 4.59e-8 unit; lognormal variance with pedigree 0.112, pedigree (1,1,5,5,1)
  Calculated value, required to fulfill the functional unit of one tkm fright transport.
- maintenance, locomotive: 7.11e-10 unit; lognormal variance with pedigree 0.112, pedigree (1,1,5,5,1)
  Calculated value, required to fulfill the functional unit of one tkm fright transport.
- railway track: 9.26625e-5 m*year; lognormal variance with pedigree 0.112, pedigree (1,1,5,5,1)
  Calculated value, required to fulfill the functional unit of one tkm fright transport.

## Emissions to nature
- Antimony ion [air, unspecified]: 4.43e-9 kg; lognormal variance with pedigree 1.092, pedigree (1,1,5,5,1)
  Estimated value. Emissions from the steam locomotive have been roughly estimated adjusting the emission rates (per MJ) from “hard coal, burned in coal mine power plant (CN)” by the average LHV (24 MJ/kg bituminous coal assumed to be used for locomotives vs. 12 MJ/kg poor quality coal for small power plants). Additionally, to somewhat take into account the less efficient combustion characteristics, emissions rates have been modified upwards using a factor 2 greater than the, corresponding ones (per MJ) from a small power plants. Energy use and operation emissions
- Arsenic ion [air, unspecified]: 2.7e-8 kg; lognormal variance with pedigree 1.092, pedigree (1,1,5,5,1)
  (same comment as for Antimony ion)
- Barium II [air, unspecified]: 2.72e-7 kg; lognormal variance with pedigree 1.092, pedigree (1,1,5,5,1)
  (same comment as for Antimony ion)
- Benzene [air, unspecified]: 4.86e-7 kg; lognormal variance with pedigree 0.392, pedigree (1,1,5,5,1)
  (same comment as for Antimony ion)
- Benzo(a)pyrene [air, unspecified]: 4.48e-13 kg; lognormal variance with pedigree 0.392, pedigree (1,1,5,5,1)
  (same comment as for Antimony ion)
- Boron [air, unspecified]: 1.57e-6 kg; lognormal variance with pedigree 1.092, pedigree (1,1,5,5,1)
  (same comment as for Antimony ion)
- Bromine [air, unspecified]: 1.28e-6 kg; lognormal variance with pedigree 0.432, pedigree (1,1,5,5,1)
  (same comment as for Antimony ion)
- Butane [air, unspecified]: 4.25e-8 kg; lognormal variance with pedigree 0.392, pedigree (1,1,5,5,1)
  (same comment as for Antimony ion)
- Cadmium II [air, unspecified]: 2.59e-9 kg; lognormal variance with pedigree 1.092, pedigree (1,1,5,5,1)
  (same comment as for Antimony ion)
- Carbon dioxide, fossil [air, unspecified]: 0.106 kg; lognormal variance with pedigree 0.072, pedigree (1,1,5,5,1)
  Estimated value. Emissions from the steam locomotive have been roughly estimated adjusting the emission rates (per MJ) from “hard coal, burned in coal mine power plant (CN)” by the average LHV (24 MJ/kg bituminous coal assumed to be used for locomotives vs. 12 MJ/kg poor quality coal for small power plants). Energy use and operation emissions
- Carbon monoxide, fossil [air, unspecified]: 8.96e-5 kg; lognormal variance with pedigree 1.092, pedigree (1,1,5,5,1)
  (same comment as for Antimony ion)
- Chromium III [air, unspecified]: 2.55e-8 kg; lognormal variance with pedigree 1.092, pedigree (1,1,5,5,1)
  (same comment as for Antimony ion)
- Chromium VI [air, unspecified]: 3.16e-9 kg; lognormal variance with pedigree 0.722, pedigree (1,1,5,5,1)
  (same comment as for Antimony ion)
- Cobalt II [air, unspecified]: 1.06e-8 kg; lognormal variance with pedigree 1.092, pedigree (1,1,5,5,1)
  (same comment as for Antimony ion)
- Copper ion [air, unspecified]: 3.42e-8 kg; lognormal variance with pedigree 1.092, pedigree (1,1,5,5,1)
  (same comment as for Antimony ion)
- Dinitrogen monoxide [air, unspecified]: 1.12e-6 kg; lognormal variance with pedigree 0.272, pedigree (1,1,5,5,1)
  (same comment as for Antimony ion)
- Dioxins, measured as 2,3,7,8-tetrachlorodibenzo-p-dioxin [air, unspecified]: 1.57e-14 kg; lognormal variance with pedigree 0.722, pedigree (1,1,5,5,1)
  (same comment as for Antimony ion)
- Ethane [air, unspecified]: 9.18e-8 kg; lognormal variance with pedigree 0.392, pedigree (1,1,5,5,1)
  (same comment as for Antimony ion)
- Formaldehyde [air, unspecified]: 1.3e-7 kg; lognormal variance with pedigree 0.392, pedigree (1,1,5,5,1)
  (same comment as for Antimony ion)
- Hydrocarbons, aliphatic, alkanes, unspecified [air, unspecified]: 4.9e-7 kg; lognormal variance with pedigree 0.392, pedigree (1,1,5,5,1)
  (same comment as for Antimony ion)
- Hydrocarbons, aliphatic, unsaturated [air, unspecified]: 4.84e-7 kg; lognormal variance with pedigree 0.392, pedigree (1,1,5,5,1)
  (same comment as for Antimony ion)
- Hydrochloric acid [air, unspecified]: 6.84e-5 kg; lognormal variance with pedigree 0.502, pedigree (1,1,5,5,1)
  (same comment as for Antimony ion)
- Hydrogen fluoride [air, unspecified]: 6.11e-6 kg; lognormal variance with pedigree 0.502, pedigree (1,1,5,5,1)
  (same comment as for Antimony ion)
- Iodine [air, unspecified]: 6.55e-7 kg; lognormal variance with pedigree 0.502, pedigree (1,1,5,5,1)
  (same comment as for Antimony ion)
- Lead II [air, unspecified]: 1.42e-7 kg; lognormal variance with pedigree 1.092, pedigree (1,1,5,5,1)
  (same comment as for Antimony ion)
- Lead-210 [air, unspecified]: 0.000272 kBq; lognormal variance with pedigree 1.092, pedigree (1,1,5,5,1)
  (same comment as for Antimony ion)
- Manganese II [air, unspecified]: 1.35e-7 kg; lognormal variance with pedigree 1.092, pedigree (1,1,5,5,1)
  (same comment as for Antimony ion)
- Mercury II [air, unspecified]: 7.16e-9 kg; lognormal variance with pedigree 1.092, pedigree (1,1,5,5,1)
  (same comment as for Antimony ion)
- Methane, fossil [air, unspecified]: 1.12e-6 kg; lognormal variance with pedigree 0.392, pedigree (1,1,5,5,1)
  (same comment as for Carbon dioxide, fossil)
- Molybdenum VI [air, unspecified]: 4.82e-9 kg; lognormal variance with pedigree 1.092, pedigree (1,1,5,5,1)
  (same comment as for Antimony ion)
- Nickel II [air, unspecified]: 7.47e-8 kg; lognormal variance with pedigree 1.092, pedigree (1,1,5,5,1)
  (same comment as for Antimony ion)
- Nitrogen oxides [air, unspecified]: 0.000457 kg; lognormal variance with pedigree 0.272, pedigree (1,1,5,5,1)
  (same comment as for Carbon dioxide, fossil)
- PAH, polycyclic aromatic hydrocarbons [air, unspecified]: 2.24e-9 kg; lognormal variance with pedigree 0.722, pedigree (1,1,5,5,1)
  (same comment as for Antimony ion)
- Particulate Matter, < 2.5 um [air, unspecified]: 0.00113 kg; lognormal variance with pedigree 0.722, pedigree (1,1,5,5,1)
  Estimated value. Emissions from the steam locomotive have been roughly estimated adjusting the emission rates (per MJ) from “hard coal, burned in coal mine power plant (CN)” by the average LHV (24 MJ/kg bituminous coal assumed to be used for locomotives vs. 12 MJ/kg poor quality coal for small power plants). Coal for steam locomotives has a presumably lower ash content (say approximately 25% of coal weight) compared with coal for small coal mine plants (up to 50% of coal weight (Dones et al. 2003)), the retention efficiency is likely lower. Considering also that these locomotives are used mostly within Coal Bureaus, therefore in already highly polluted areas, and that pictures of some steam locomotive show dark and abundant plumes, the PM emission is likely high. Due to the assumptions on ash content, the disposal of ashes has been halved for the locomotive compared to small plants. Energy use and operation emissions
- Particulate Matter, > 10 um [air, unspecified]: 0.000281 kg; lognormal variance with pedigree 0.392, pedigree (1,1,5,5,1)
  (same comment as for Particulate Matter, < 2.5 um)
- Particulate Matter, > 2.5 um and < 10um [air, unspecified]: 0.000132 kg; lognormal variance with pedigree 0.612, pedigree (1,1,5,5,1)
  (same comment as for Particulate Matter, < 2.5 um)
- Pentane [air, unspecified]: 3.29e-7 kg; lognormal variance with pedigree 0.392, pedigree (1,1,5,5,1)
  (same comment as for Antimony ion)
- Polonium-210 [air, unspecified]: 0.000497 kBq; lognormal variance with pedigree 0.922, pedigree (1,1,5,5,1)
  (same comment as for Antimony ion)
- Potassium-40 [air, unspecified]: 6.69e-5 kBq; lognormal variance with pedigree 0.922, pedigree (1,1,5,5,1)
  (same comment as for Antimony ion)
- Propane [air, unspecified]: 7.84e-8 kg; lognormal variance with pedigree 0.392, pedigree (1,1,5,5,1)
  (same comment as for Antimony ion)
- Propylene [air, unspecified]: 3.58e-8 kg; lognormal variance with pedigree 0.392, pedigree (1,1,5,5,1)
  (same comment as for Antimony ion)
- Radium-226 [air, unspecified]: 7.02e-5 kBq; lognormal variance with pedigree 0.922, pedigree (1,1,5,5,1)
  (same comment as for Antimony ion)
- Radium-228 [air, unspecified]: 2.08e-5 kBq; lognormal variance with pedigree 0.922, pedigree (1,1,5,5,1)
  (same comment as for Antimony ion)
- Radon-220 [air, unspecified]: 0.00146 kBq; lognormal variance with pedigree 0.922, pedigree (1,1,5,5,1)
  (same comment as for Antimony ion)
- Radon-222 [air, unspecified]: 0.00082 kBq; lognormal variance with pedigree 0.922, pedigree (1,1,5,5,1)
  (same comment as for Antimony ion)
- Selenium IV [air, unspecified]: 2.21e-8 kg; lognormal variance with pedigree 1.092, pedigree (1,1,5,5,1)
  (same comment as for Antimony ion)
- Strontium II [air, unspecified]: 2.48e-7 kg; lognormal variance with pedigree 1.092, pedigree (1,1,5,5,1)
  (same comment as for Antimony ion)
- Sulfur dioxide [air, unspecified]: 0.0028 kg; lognormal variance with pedigree 0.272, pedigree (1,1,5,5,1)
  (same comment as for Antimony ion)
- Thorium-228 [air, unspecified]: 1.12e-5 kBq; lognormal variance with pedigree 0.922, pedigree (1,1,5,5,1)
  (same comment as for Antimony ion)
- Thorium-232 [air, unspecified]: 1.76e-5 kBq; lognormal variance with pedigree 0.922, pedigree (1,1,5,5,1)
  (same comment as for Antimony ion)
- Toluene [air, unspecified]: 2.44e-7 kg; lognormal variance with pedigree 0.392, pedigree (1,1,5,5,1)
  (same comment as for Antimony ion)
- Uranium-238 [air, unspecified]: 5.85e-5 kBq; lognormal variance with pedigree 0.922, pedigree (1,1,5,5,1)
  (same comment as for Antimony ion)
- Vanadium V [air, unspecified]: 6.25e-8 kg; lognormal variance with pedigree 1.092, pedigree (1,1,5,5,1)
  (same comment as for Antimony ion)
- Xylenes, unspecified [air, unspecified]: 2.06e-6 kg; lognormal variance with pedigree 0.392, pedigree (1,1,5,5,1)
  (same comment as for Antimony ion)
- Zinc II [air, unspecified]: 1.72e-7 kg; lognormal variance with pedigree 1.092, pedigree (1,1,5,5,1)
  (same comment as for Antimony ion)

## Sampling procedure
literature and statistics

## Extrapolations
see Geography/Text This dataset has been copied from an original dataset covering the geography CN. The uncertainty has been adjusted accordingly.
