# resistor production, auxilliaries and energy use

Dataset: EcoSpold 2, unit process
Geography: GLO
Time period: 1998-01-01 to 2023-12-31
Technology level: current
Classification: EcoSpold01Categories: electronics/component
Classification: ISIC rev.4 ecoinvent: 2610:Manufacture of electronic components and boards
Scenario: Business-as-Usual
System model: Allocation, cut-off by classification
Generated by: Roland Hischier
Published in: Hischier R. 2007
Database: ecoinvent
isCopyrightProtected: true
accessRestrictedTo: 1

## General comment
This dataset represents the production of 1 kg of resistors over all types of resistors. There is no distinction between the different types of resisitors produced. Data for auxiliaries, energy, emissions and waste are taken from the Swedish LCI database, from two datasets of Swiss resistor producing companies and based on estimations from the resistor production. As the raw material input is taken into account in the respective resistor datasets this dataset has no input of raw materials. The production efforts represent not a specific resistor type and have thus, accordingly higher uncertainties.

## Included activities start
From reception of electronic components, raw materials and auxiliares at the factory gate.

## Included activities end
This dataset includes auxillary and energy consumption, emissions (air, water) and waste amounts, as well as an estimation of the efforts for transportation and of the infrastructure for the production of resistors.

## Geography
Data from literature and one global producer – here representing the global situation.

## Technology
Average technology for the production of resistors and potentiometers - comprising terminmation printing; resistive body printing; glass coat printing; laser trimming; substrate stripping (SMT) resp. ceramic rods; deposition processes; ageing; capping (THT) resp. printing; curing; punching; revetting; molding (ptoentiom.)

## Parameters
- fraction, cooling water, cooling pond system, to air: 0.032 dimensionless; name fraction_CW_CP_to_air; lognormal variance with pedigree 0.0413, pedigree (2,3,1,3,1)
  Calculated based on literature value (Scown, C.D., 2011, Water Footprint of U.S. Transportation Fuels and supplying information of the article) (Vionnet, S., Quantis Water Database - Technical Report, 2012).
- fraction, cooling water, once-through system, to air: 0.004 dimensionless; name fraction_CW_OT_to_air; lognormal variance with pedigree 0.0413, pedigree (2,3,1,3,1)
  (same comment as for fraction, cooling water, cooling pond system, to air)
- fraction, cooling water, recirculating system, to air: 0.771 dimensionless; name fraction_CW_R_to_air; lognormal variance with pedigree 0.0413, pedigree (2,3,1,3,1)
  (same comment as for fraction, cooling water, cooling pond system, to air)
- fraction, cooling water, to air: 0.3875 dimensionless; name fraction_CW_to_air; = (0.5*fraction_CW_OT_to_air)+(0.5*fraction_CW_R_to_air); lognormal variance with pedigree 0.092025, pedigree (4,4,3,2,4)
  Calculated value based on literature value (see comments of the other parametres present in this dataset) and expert opinion. In the case when no industry/literature data are available about the type of cooling or directly fraction, cooling water, to air specific for the process a default assumption is applied. It is assumed that the once-through cooling system is used in 50% of all cases and recirculating system is used in another 50% of all cases.
- fraction, process water, to air: 0.061 dimensionless; name fraction_PW_to_air; lognormal variance with pedigree 0.092025, pedigree (4,4,3,2,4)
  Literature value (Statistics Canada, 2007 & Shaffer, K.H., 2008, Consumptive water use in the Great Lakes Basin, USGS) (Vionnet, S., Quantis Water Database - Technical Report, 2012).

## Reference product
- resistor, auxilliaries and energy use: 1 kg; source Hobbs L. 2007; By-product classification allocatable product; CPC 47120: Electrical resistors (except heating resistors); HS2017 8533: Electrical resistors (including rheostats and potentiometers), excluding heating resistors
  A resistor is a two-terminal electrical or electronic component that resists an electric current by producing a voltage drop between its terminals in accordance with Ohm's law - the electrical resistance is equal to the voltage drop across the resistor divided by the current through the resistor. In general, a resistor is used to create a known voltage-to-current ratio in an electric circuit. (Wikipedia (2007)). There are, for example Precision Wirewound, NIST Standards, Power Wirewound, Fuse Resistors, Carbon Composition, Carbon Film, Metal Film, Foil, Filament Wound, and Power Film Resistors - and each single of these resistors has a useful purpose. Knowing the current in a circuit, a resistor can be used to create a known potential difference that is proportional to this current. This means then also that if the potential difference between two points in a circuit is known, a resistor can be used to create a known current proportional to that difference. Resistors can also be used to limit the current that passes through other components - e.g. through light-emitting diodes (LED). Further usages of resistors cover e.g. the regulation of CD motors, the voltage reduction of signals (-> attenuator) or the minimization of signal reflections (-> line terminator).
  EcoSpold01Location=GLO
  production volume 1 kg
    Dummy value to be replaced by measured, estimated or calculated value
  properties: carbon allocation 0 kg, carbon content 0, price 20 EUR2005

## Inputs from technosphere
- carboxymethyl cellulose, powder: 0.0032 kg; source CPM 2006; lognormal variance with pedigree 0.0527, pedigree (2,4,5,3,1)
  EcoSpold01Location=RER
  Estimation, An average input of about 0.016 kg of auxiliaries per kg of produced resistors is calculated. The substances with the highest amount have been chosen here.
  Uncertainty: average from literature
  properties: carbon content, fossil 0.0979592, carbon content, non-fossil 0.293878, dry mass 1 kg, heating value, net 20.19 MJ, wet mass 1 kg
  note on carbon content, fossil: Chemical structure: Cellulose-O-CH2-COO-Na+. CMC is produced by the processing of alkaline cellulose with mono acetic acid (ecoinvent v2.2 report 12, pg 76 & 81). MW Acetic acid (CH3-COOH) is 60 g/mol. The degree of carboxymethyl substitution in CMC is variable. It was considered that every molecule of glucose (monomers of cellulose) had a carboxymethyl substitution. MW of glucose (C6H10O5) is 162 g/mol; cellulose is (C6H10O5)n. MW of Na is 23
  note on carbon content, non-fossil: Chemical structure: Cellulose-O-CH2-COO-Na+. CMC is produced by the processing of alkaline cellulose with mono acetic acid (ecoinvent v2.2 report 12, pg 76 & 81). MW Acetic acid is 60 g/mol. The degree of carboxymethyl substitution in CMC is variable. It was considered that every molecule of glucose (monomers of cellulose) had a carboxymethyl substitution. MW of glucose (C6H10O5) is 162 g/mol; cellulose is (C6H10O5)n.
- chemical, organic: 0.0064 kg; source CPM 2006; lognormal variance with pedigree 0.0527, pedigree (2,4,5,3,1)
  Estimation, An average input of about 0.016 kg of auxiliaries per kg of produced resistors is calculated. The substances with the highest amount have been chosen here.
  EcoSpold01Location=GLO
  Uncertainty: average from literature
  properties: carbon content, fossil 0.628, dry mass 1 kg, heating value, net 19.03 MJ, wet mass 1 kg
  note on carbon content, fossil: This dataset is an unweighted average of 20 organic substances (listed in Tab 88.1, ecoinvent v2.2 report 8, part II), being part of the top100 chemicals included in this database. The C-content has also been calculated as an unweighted average of the C content of the substances composing this dataset.
- electricity, medium voltage: 38.3 kWh; source CPM 2006; lognormal variance with pedigree 0.0527, pedigree (2,4,5,3,1)
  EcoSpold01Location=UCTE
  Calculated, average value.
  Further references:
  exact (1998) Simplified LCA für Elektronikbauteile. International Exchange of Electronic Component Technology and Test Data, IG exact Schweiz, Arbeitsgruppe Umweltfragen
  Uncertainty: average from literature
- electronic component factory: 1e-12 unit; lognormal variance with pedigree 0.5761, pedigree (4,5,5,3,5)
  Expert assumption. Original value of 2E-08 was based a a wafer fabrication facility. It is assumed a factory produces more components than this in its lifetime.
  EcoSpold01Location=GLO
  Uncertainty: rough assumption
- heat, district or industrial, other than natural gas: 10.4 MJ; source CPM 2006; lognormal variance with pedigree 0.0527, pedigree (2,4,5,3,1)
  EcoSpold01Location=RER
  Calculated, average value.
  Further references:
  exact (1998) Simplified LCA für Elektronikbauteile. International Exchange of Electronic Component Technology and Test Data, IG exact Schweiz, Arbeitsgruppe Umweltfragen
  Uncertainty: average from literature
  properties: heating value, net 1 MJ
- solvent, organic: 0.0064 kg; source CPM 2006; lognormal variance with pedigree 0.0527, pedigree (2,4,5,3,1)
  (same comment as for chemical, organic)
  properties: carbon content, fossil 0.63072, dry mass 1 kg, heating value, net 19.11 MJ, wet mass 1 kg
  note on carbon content, fossil: Mixture of 15 of the most often used solvents (list in ecoinvent v2.2 report 11-III, pg 293). C content was calculated as an unweighted average of C content of the different solvents
- spent solvent mixture: -2.09258e-5, -0.000893179, -0.0022859 kg (3 suppliers, which the file names only by identifier); sum of these -0.0032 kg; lognormal variance with pedigree 0.0147, pedigree (2,4,3,3,1)
  Proxy with a calculated value. A total output of 0.23 kg of non-used raw materials can be found in the production process. Auxiliaries are emitted 100% either as emissions (air, water, soil) or as waste - and this byproduct is used as a proxy for this part of the waste.
  EcoSpold01Location=CH
  Uncertainty: calculated from input of auxillaries
  production volume
    Calculated from the production volume of resistor, auxilliaries and energy use in proportion to the respective output amounts.
  properties: carbon content, fossil 0.571257, dry mass 0.835 kg, heating value, net 21.7 MJ, water content 0.197605, wet mass 1 kg
  note on carbon content, fossil: Tab A.7, ecoinvent v2.2 report 13_I. C content has been calculated after data in the tables, and then referred to 1 kg DM
  note on heating value, net: Value taken from the general comment of the treatment dataset.
- waste plastic, mixture: -3.01492e-5, -0.00124745, -2.86295e-5, -0.112511, -0.00109246, -7.29941e-5, -1.21799e-5, -5.52043e-6 kg (8 suppliers, which the file names only by identifier); sum of these -0.115 kg; source CPM 2006; lognormal variance with pedigree 0.0147, pedigree (2,4,3,3,1)
  Calculated value. A total output of 0.23 kg of non-used raw materials can be found in the production process. Auxiliaries are emitted 100% either as emissions (air, water, soil) or as waste, so only the 50% is considered as waste.
  EcoSpold01Location=CH
  Uncertainty: assumption, based on literature
  production volume
    (same comment as for spent solvent mixture)
  properties: carbon content, fossil 0.747344, dry mass 0.847 kg, heating value, net 30.79 MJ, water content 0.180638, wet mass 1 kg
  note on carbon content, fossil: C content in 1 kg DM was calculated using data in Tab A.2, ecoinvent v2.2 report 13_I
- waste, from silicon wafer production, inorganic: -0.0041065, -0.022576, -0.0883175 kg (3 suppliers, which the file names only by identifier); sum of these -0.115 kg; source CPM 2006; lognormal variance with pedigree 0.0147, pedigree (2,4,3,3,1)
  EcoSpold01Location=CH
  Calculated value. A total output of 0.23 kg of non-used raw materials can be found in the production process. Auxiliaries are emitted 100% either as emissions (air, water, soil) or as waste, so only the 50% is considered as waste.
  Uncertainty: assumption, based on literature
  production volume
    (same comment as for spent solvent mixture)
  properties: carbon content, fossil 0.0347572, dry mass 0.906 kg, water content 0.103753, wet mass 1 kg
- wastewater, average: -9.86584e-5, -0.0164172, -0.00392569, -5.84515e-5 m3 (4 suppliers, which the file names only by identifier); sum of these -0.0205 m3; lognormal variance with pedigree 0.0147, pedigree (2,4,3,3,1)
  Estimation, due to a lack of respective emission information.
  EcoSpold01Location=CH
  Uncertainty: assumption, based on literature
  production volume
    (same comment as for spent solvent mixture)
  properties: carbon content, non-fossil 0.194039, dry mass 0.346837 kg, water content 2882.2, wet mass 1000 kg
  note on carbon content, non-fossil: 0.0673 kg TOC/m3 (Tab A.17, ecoinvent v2.2 report 13_I). TOC was considered as Total Carbon.

## Inputs from nature
- Water, cooling, unspecified natural origin [natural resource, in water]: 0.0205 m3; name water_cooling_UNO_input; source CPM 2006; lognormal variance with pedigree 0.064, pedigree (3,4,5,1,1)
  Estimation, based on literature and own assumptions.
  Uncertainty: assumption, based on literature
- Water, unspecified natural origin [natural resource, in water]: 0.0205 m3; name water_UNO_input; source CPM 2006; lognormal variance with pedigree 0.064, pedigree (3,4,5,1,1)
  (same comment as for Water, cooling, unspecified natural origin)

## Emissions to nature
- Ethyl cellulose [air, urban air close to ground]: 0.0032 kg; source CPM 2006; lognormal variance with pedigree 0.1727, pedigree (2,4,5,3,1)
  Estimation. All emitted into air.
  Uncertainty: calculated from input of auxillaries
- NMVOC, non-methane volatile organic compounds [air, urban air close to ground]: 0.0096 kg; source CPM 2006; lognormal variance with pedigree 0.1727, pedigree (2,4,5,3,1)
  Estimation, solvents are emitted 100% into air, whereas hardener is emitted 50% into air.
  Uncertainty: calculated from input of auxillaries
- Water [air, unspecified]: 0.00919425 m3; name water_to_air_unspecified; = (water_cooling_UNO_input*fraction_CW_to_air)+(water_UNO_input*fraction_PW_to_air); lognormal variance with pedigree 0.0807, pedigree (2,2,5,1,1)
  Calculated value based on literature values and expert opinion. See comments in the parametres' comment field.
  property fraction, origin: fresh water 0; name fraction_origin_fresh_water
  property fraction, origin: salt water 0; name fraction_origin_salt_water
  property fraction, origin: unspecified 1; name fraction_origin_unspecified
- Water [water, unspecified]: 0.0113057 m3; name water_to_water_unspecified; = water_cooling_UNO_input*(1-fraction_CW_to_air)+water_UNO_input*(1-fraction_PW_to_air)-0.0205; lognormal variance with pedigree 0.0807, pedigree (2,2,5,1,1)
  (same comment as for Water)
  property carbon content, fossil 0; name C_content_fossil
  property carbon content, non-fossil 0; name C_content_non_fossil
  property dry mass 0 kg; name DM
  property fraction, origin: fresh water 0; name fraction_origin_fresh_water_Ww
  property fraction, origin: salt water 0; name fraction_origin_salt_water_Ww
  property fraction, origin: unspecified 1; name fraction_origin_unspecified_Ww
  property water in wet mass 1000 kg; name WWM
  property wet mass 1000 kg; name WM

## Sampling procedure
estimation - based on literature

## Review by Rolf Frischknecht 2007-09-14
passed
