# trout, production in semi-intensive system, in lake

Dataset: EcoSpold 2, unit process
Geography: RLA
Time period: 2012-01-01 to 2023-12-31
Technology level: current
Classification: ISIC rev.4 ecoinvent: 0322:Freshwater aquaculture
Scenario: Business-as-Usual
System model: Allocation, cut-off by classification
Generated by: Angel Avadí
Published in: Angel Avadí 2015
Database: ecoinvent
isCopyrightProtected: true
accessRestrictedTo: 1

## General comment
This activity presents data from the Anchoveta Supply Chain project. Trout production in Andean lakes. Technologically speaking, these systems are simple and well established. Cage systems are anchored relatively close to shore, and are tended by means of small motor boats. This system uses predominantly commercial aquafeed, including floating pellets.

## Included activities start
The system boundaries for the inventory includes the partial life cycle of production means, from construction, through maintenance and the use phase

## Included activities end
System ends at the gate of the farm, excluding the transport of the output trout to wholesaling

## Geography
Aquaculture system common in Lake Titicaca and other Andean water bodies

## Technology
Simple clusters of metal floating cages, commercial floating feed

## Parameters
- feed conversion ratio: 1.4 dimensionless; name FCR; triangular min 1.2, mostLikely 1.4, max 1.5, pedigree (2,3,2,2,2)
  Feed conversion ratio for animal husbandry and aquaculture, expressed in kg feed per kg live weight of slaugthered or harvested animal
  Uncertainty: Based on literature on trout production
- net calorific value: 42.7 MJ/kg; name net_cal_value
  Net Calorific Value for marine diesel, from http://www.effship.com/PartnerArea/MiscPresentations/Dr_Wild_Report.pdf
- stocking density: 1000 dimensionless; name stocking_density; triangular min 800, mostLikely 1000, max 1000, pedigree (5,5,5,5,5)
  Final stocking density of aquaculture systems, expressed in kg/m3 or kg/unit of cage/pond/raceway/water body with a known holding capacity

## Reference product
- trout: 1 kg; name output; By-product classification allocatable product; CPC 04222: Farmed salmonidae, live, fresh or chilled; HS2017 030211: Fish; fresh or chilled, trout (Salmo trutta, Oncorhynchus mykiss, Oncorhynchus clarki, Oncorhynchus aguabon[...]
  production volume 6.3312e7 kg
    63 312 t per year produced in RLA (2012-2014), in freshwater
  property price 4.21554 EUR2005
    Calculated value based on data from United Nations Commodity Trade Statistics Database (comtrade.un.org). UN comtrade category: 30191 Fish; live, trout (Salmo trutta, Oncorhynchus mykiss, Oncorhynchus clarki, Oncorhynchus aguabonita, Oncorhynchus gilae, Oncorhynchus apache and Oncorhynchus chrysogaster). Year 2015. Using exchange rate of 1EURO = 1.209 USD. Average of price of import into 4 main markets (EU, US and IN).
  properties: carbon allocation 0 kg, carbon content 0

## Inputs from technosphere
- diesel, burned in fishing vessel: 1.22122 MJ; = net_cal_value*28.6; lognormal variance with pedigree 0.041925, pedigree (2,2,5,2,2)
  Combustion of diesel in marige engines (boats for feeding and maintenance). Net Calorific Value for marine diesel, from http://www.effship.com/PartnerArea/MiscPresentations/Dr_Wild_Report.pdf
- electricity, medium voltage: 0.003 kWh; lognormal variance with pedigree 0.042, pedigree (2,2,5,3,2)
  Electricity for fingerling production (10 000 units)
- floating hexagonal metal cage: 1.67e-5 m; = 0.0000167*1000; lognormal variance with pedigree 0.350625, pedigree (3,3,5,2,3)
  cage size: 6 m, cage holding capacity: 1000 kg fish/cycle,1.5 cycles per year, lifespan of 5 years
- oxygen, liquid: 0.0907 kg; lognormal variance with pedigree 0.0513, pedigree (3,3,5,3,3)
  Oxygen for fingerling transportation (10 000 units)
  properties: dry mass 1 kg, wet mass 1 kg
- trout feed, 42% protein: 1.41 kg; = output*FCR+10; lognormal variance with pedigree 0.041925, pedigree (2,2,5,2,2)
  Trout feed, 42% protein, for feed production and fingerling production (10 000 units)

## Inputs from nature
- Water, unspecified natural origin [natural resource, in water]: 30.24 m3; name Water_unspecified_natural_origin_amount_; lognormal variance with pedigree 0.0438, pedigree (3,3,5,1,2)
  Water from source for fingerling production (10 000 units), throughput system

## Emissions to nature
- Nitrogen [water, unspecified]: 0.0661 kg; = output/1000*66.1; lognormal variance with pedigree 0.0813, pedigree (2,2,5,1,2)
  66.1 kg N per t fish, calculated from mass balance described in the reference publication
- Phosphorus [water, unspecified]: 0.0096 kg; = output/1000*9.6; lognormal variance with pedigree 0.0813, pedigree (2,2,5,1,2)
  9.6 kg P per t fish, calculated from mass balance described in the reference publication
- Water [water, unspecified]: 15.4224 m3; = Water_unspecified_natural_origin_amount_*0.51; lognormal variance with pedigree 0.0438, pedigree (3,3,5,1,2)
  Water from source for fingerling production (10 000 units), throughout system. Only a 51% return is assumed

## Extrapolations
Trout production in the Titicaca lake (Peru, Bolivia) was asumed to represent lake-based trout production worldwide
