# electricity production, peat

Dataset: EcoSpold 2, unit process
Geography: RoW
Time period: 1980-01-01 to 2023-12-31
Technology level: current
Classification: EcoSpold01Categories: lignite/power plants
Classification: ISIC rev.4 ecoinvent: 3510:Electric power generation, transmission and distribution
Tags: fossil fuels; peat power
Scenario: Business-as-Usual
System model: Allocation, cut-off by classification
Generated by: Karin Treyer
Published in: Röder, A. 2007
Database: ecoinvent
isCopyrightProtected: true
accessRestrictedTo: 1

## General comment
This dataset represents the production of high voltage electricity in an average peat power plant on the world in 2012. This dataset has been extrapolated from a global 2008 dataset representing electricity production with lignite due to the lack of specific peat data.
The only exceptions are data for efficiency and emissions of SO2, NOx, particles and CO2 (see tab. 9.28 in Röder et al. 2007). These emissions were available from peat incineartion in Finland. As electricity from peat is mainly produced in Finland, Ireland, Sweden and Russia, these values were taken over for this dataset.
In this dataset, no desulfurisation and denitrification is taken into account.
All following information are valid for lignite.
For the assessment of main characteristics (sulphur and ash content of coal, efficiency of the plant) and criteria emissions (SOx, NOx, particles, and CO2) a bottom-up approach has been used. It consists in the collection of information about single plants (in this case in Finland).
- The size distribution of particle emissions has been derived from German data.
- Halogene emissions have been estimated on the basis of the content of the species in the country-specific coal input mix, assuming average retention rates.
- For CO and particle emissions average values for the former UCTE are included (Union for the Coordination of the Transmission of Electricity, since 2009 replaced by ENTSO-E European Network of Transmission System Operators for Electricity).
- Emissions of trace elements were calculated by means of a formula (CORINAIR) using the ash content in the country-specific coal input mix and average transfer coefficients for coal power plants, taking into account the share of DeSOx installed.
- Emission of uranium and thorium radioactive isotopes were assumed proportional to the corresponding element emitted with particles; the other non-gaseous radioactive isotopes of the uranium and thorium decay chain were assumed proportional to the emitted U-238 or Th-232.
- The emission of gaseous radon and K-40 are taken from the literature.
IEA. 2009. Coal information, 2009 edition. Documentation for beyond 2020 files. International Energy Agency.
European Environment Agency (1991) CORINAIR Inventory; VOC's Default Emission Factors

## Included activities start
From the constructed lignite power plant ready to produce electricity.

From reception of peat and operating materials at power plant gate.

## Included activities end
This activity ends with 1kWh of high voltage electricity produced at the power plant and arrived at the busbar.

This dataset includes:
- all operation and maintenance activities and materials of the power plants.

- Particle removal (dedusting of the flue gas)
- Cooling: It is assumed that all plants use wet cooling with a cooling tower. No cooling tower is included in this dataset (will be implemented in future versions)
- Loss of feed water

This dataset doesn't include
- raw materials extraction, decommissioning and waste treatment as these activities are already included in the infrastructure datasets
- transformation of the electricity produced
- The disposal of non-recycled ashes is modelled separately.
- Use of fuel oil for startup, as this can be neglected for lignite power plants because these are run for a long time (2-3 years) without being shut down.
- Desulfurisation and denitrification.

## Technology
A lignite power plant is used as infrastructure. Lignite power plant input is a dataset which consists out of a mix of 30% 100MW power plant and 70% 500MW power plant. The plants are used for basic load with 6000 hours of operation at full capacity per year. The plants are assumed to operate 200000 hours during its lifetime.

## Time period
The Annual Production Volume is valid for the year 2012.

## Parameters
- efficiency: 0.333 dimensionless; lognormal variance with pedigree 0.003725, pedigree (3,2,1,2,2)
  Literature value/calculated value. Net electrical efficiency based on the lower heating value (LHV).
  For all OECD countries, the IEA Electricity information 2014 provides data for the year 2012 on fuel input (TJ, Net calorific value NCV) and gross electricity production (GWh) as well as heat production (TJ) in tables 8 and 9 for each country for electricity only and Combined Heat and Power (CHP) plants each. Together with the information on own use (see parameter 'losses'), the net electrical efficiency based on the NCV is calculated.
  For all non-OECD countries, data from the IEA Energy balances of non-OECD countries 2014 have been used. These tables do not always provide information on how much of the electricity has been produced in electricity only and in CHP plants, but often give the total value only.
  IEA. 2014. Electricity Information 2014. ISBN 978-92-64-21692-1. International Energy Agency (IEA), Paris Cedex (FR).
  IEA/OECD. 2014. Energy balances of non-OECD countries 2014. International Energy Agency (IEA), Paris Cedex (FR).
  output relative to input (requires additional specification)
- factor: input of MJ for the production of 1 kWh: 10.8108 MJ/kWh; name factor_MJ_kWh; = 1*3.6/efficiency; lognormal variance with pedigree 0.0532, pedigree (4,4,3,4,4)
  Calculated value. 3.6 MJ = 1kWh.
  nan
- fraction, cooling water, to air: 0.0299662 dimensionless; name fraction_CW_to_air; = (WConsumption_EP_HC_recirculatingCS*recirculating_CS_fraction_from_allCS+WConsumption_EP_HC_once_through_andCP_CS*once_through_andCP_CS_fractio_from_allCS)/(WWithdrawal_EP_HC_recirculating_CS*recirculating_CS_fraction_from_allCS+WWithdrawal_EP_HC_once_through_andCP_CS*once_through_andCP_CS_fractio_from_allCS); lognormal variance with pedigree 0.092025, pedigree (4,4,3,2,4)
  Calculated
  nan
- fraction, process water, to air: 0.15 dimensionless; name fraction_PW_to_air; lognormal variance with pedigree 0.092025, pedigree (4,4,3,2,4)
  Literature value. In case when no industry/process specific data are available, default evaporation fraction value is used. This value is 15% and is based on literature (Statistics Canada, 2007 & Shaffer, K.H., 2008, Consumptive water use in the Great Lakes Basin, USGS & Shiklomanov, 2003, World Water Resources at the Beginning of the 21st Century) and has been approved by an expert.
  nan
- fraction, water, completely softened, to air: 0.15 dimensionless; name fraction_WCS_to_air; = fraction_PW_to_air; lognormal variance with pedigree 0.092025, pedigree (4,4,3,2,4)
  Calculated value. See comment in the other parametres present in this dataset. Water, completely softened is considered to be always used as process water, thus process water fractions to air are applied to all water, completely softened input flows to calculate the amount of water consumed in the processes.
  nan
- fraction, water, decarbonised, to air: 0.0299662 dimensionless; name fraction_WDC_to_air; = fraction_CW_to_air; lognormal variance with pedigree 0.092025, pedigree (4,4,3,2,4)
  Calculated value. See comments in the other parametres present in this dataset. Decarbonised water is considered to be always used as cooling water, thus cooling water fractions to air are applied to all carbonised water input flows to calculate the amount of water consumed in the processes.
  nan
- once-through and cooling pond cooling systems as a fraction of all cooling syste: 0.625 dimensionless; name once_through_andCP_CS_fractio_from_allCS; lognormal variance with pedigree 0.092025, pedigree (4,4,3,2,4)
  Calculated as an average of data available for Europe (Floerke, 2008, Future changes of freshwater needs in the electricity production sector) and USA (NERL, 2011, Estimating freshwater needs to meet future thermoelectric generation requirements).
  nan
- recirculating cooling system as a fraction of all cooling systems: 0.375 dimensionless; name recirculating_CS_fraction_from_allCS; lognormal variance with pedigree 0.092025, pedigree (4,4,3,2,4)
  (same comment as for once-through and cooling pond cooling systems as a fraction of all coo)
- water consumption, electricity production from hard coal, once-through and cooli: 0.0014 m3/kWh; name WConsumption_EP_HC_once_through_andCP_CS; lognormal variance with pedigree 0.092025, pedigree (4,4,3,2,4)
  Estimated based on literature (Scown, 2011, Water Footprint of U.S. Transportation Fuels, SI). The amount of water consumed while burning lignite and peat is assumed to be the same as in case of coal.
  nan
- water consumption, electricity production from hard coal, recirculating CS: 0.0018 m3/kWh; name WConsumption_EP_HC_recirculatingCS; lognormal variance with pedigree 0.092025, pedigree (4,4,3,2,4)
  (same comment as for water consumption, electricity production from hard coal, once-through)
- water withdrawal, electricity production from hard coal, once-through and coolin: 0.0815 m3/kWh; name WWithdrawal_EP_HC_once_through_andCP_CS; lognormal variance with pedigree 0.092025, pedigree (4,4,3,2,4)
  Estimated based on literature (Scown, 2011, Water Footprint of U.S. Transportation Fuels, SI). The amount of water withdrawn while burning lignite and peat is assumed to be the same as in case of coal.
  nan
- water withdrawal, electricity production from hard coal, recirculating CS: 0.0021 m3/kWh; name WWithdrawal_EP_HC_recirculating_CS; lognormal variance with pedigree 0.092025, pedigree (4,4,3,2,4)
  (same comment as for water withdrawal, electricity production from hard coal, once-through )

## Reference product
- electricity, high voltage: 1 kWh; By-product classification allocatable product; CPC 17100: Electrical energy; HS2017 271600: Electrical energy
  production volume 2.04348e7 kWh; name apv_electricity_peat
    Literature value/calculated value. Net electricity production 2012 according to the IEA electricity information 2014, taking into account country specific own use of the power plant between gross and net electricity production.
    IEA. 2014. Electricity Information 2014. ISBN 978-92-64-21692-1. International Energy Agency (IEA), Paris Cedex (FR).
  property price 0.0977 EUR2005
    Temporary price data. Calculated as 90% of purchasers price based on: 94% of the average price (to account for a 6% loss in transformation and transmission) for electricity for industrial consumersin 2005 (excluded taxes). From IEA.
  properties: carbon allocation 0 kg, carbon content 0

## Inputs from technosphere
- lignite ash: -4.81963e-5, -0.158871 kg (2 suppliers, which the file names only by identifier); sum of these -0.158919 kg; = factor_MJ_kWh*0.0147; source Röder, A. 2007, p. Tab. 9.69, p.165; lognormal variance with pedigree 0.2046, pedigree (5,3,3,5,5)
  Literature value/calculated value. Ash remaining when producing 1kWh of electricity from lignite, based on the value for burning 1MJ of lignite. Weighted average with electricity production data (Itten&Frischknecht 2012) and ash values of 10 countries
  (AT, BA, CZ, DE, ES, FR, HU, PL, SI, SK). These values were valid for the ash being disposed off. Now, total amount of ash has been calculated (disposed+recycled) with the data in Tab. 9.69 p. 165 in Röder et al. 2007. Country ash values calculated from mass balance.
  Source:
  Itten R. and Frischknecht R. (2012) Life Cycle Inventories of Electricity Mixes and Grid. ESU-services Ltd., Uster, Switzerland.
  production volume; = apv_electricity_peat* ash
    Calculated from the production volume of lignite, burned in power plant in proportion to the respective output amounts.
  properties: dry mass 1 kg, heating value, net 21.7 MJ, wet mass 1 kg
  note on heating value, net: Based on literature, page 52, Report 5: Dones, R., Bauer, C., Bolliger, R., Burger, B., faist Emmenegger, M., Frischknecht, R., Heck, T., Jungbluth, N., Röder, A., Tuchschmid, M. (2007) Life Cycle Inventories of Energy Systems: Resulst for current Systems in Switzerland and other UCTE Countries. ecoinvent report No. 5. Paul Scherrer Institut Villigen, Swiss Centre for Life Cycle Inventories, Dübendorf, CH
- lignite power plant: 1e-11 unit; name lignite_power_plant; = 1/(200000*500*1000); source Röder, A. 2007, p. p.99; lognormal variance with pedigree 0.4006, pedigree (5,3,5,5,3)
  Calculated value. At the moment, the lignite power plant input consists of mix of a 100MWe power plant (30%) and a 500MWe power plant (70%).
  For this calculation, 6000 load hours per year are assumed. It is assumed that a total of 200'000h is reached during the lifetime. A capacity of 500MW is taken for the calculation.
- peat: 1.2285 kg; = factor_MJ_kWh*0.113636363636; lognormal variance with pedigree 0.0458, pedigree (3,3,5,5,2)
  Literature value/calculated value. Peat mass needed for producting 1kWh of electricity from peat, based on the value for burning 1MJ of peat. Value for peat in Finland overtaken for this dataset. Tab. 9.28 and Tab. 9.85 (8.8MJ/kg).
  property carbon content, fossil 0.59; name C_content_fossil
  property carbon content, non-fossil 0; name C_content_non_fossil
  property dry mass 0.42 kg; name DM
  property water content 1.38095; name water_content
  property water in wet mass 0.58 kg; name WWM
  property wet mass 1 kg; name WM
  properties: heating value, net 10 MJ
  note on heating value, net: Indicative value. Reference: Nature and Management of Tropical Peat Soils, FAO Soils Bulletin 59, available at: http://www.fao.org/3/x5872e/x5872e00.htm#Contents
- petroleum coke: 0.0015027 kg; name petroleum_coke; = factor_MJ_kWh*0.000139; lognormal variance with pedigree 0.0506, pedigree (2,1,4,5,4)
  Literature value/calculated value. Petroleum coke use when producing 1kWh of electricity from lignite, based on the value for burning 1MJ of lignite. Weighted average with electricity production data (Itten&Frischknecht 2012) and values of 10 countries
  (AT, BA, CZ, DE, ES, FR, HU, PL, SI, SK) (Röder et al. 2007)
  Source:
  Itten R. and Frischknecht R. (2012) Life Cycle Inventories of Electricity Mixes and Grid. ESU-services Ltd., Uster, Switzerland.
  properties: carbon content, fossil 0.885, dry mass 1 kg, heating value, net 35 MJ, wet mass 1 kg
- residue from cooling tower: -2.60141e-9, -5.40515e-5 kg (2 suppliers, which the file names only by identifier); sum of these -5.40541e-5 kg; = factor_MJ_kWh*0.000005; lognormal variance with pedigree 0.0826, pedigree (5,3,3,5,3)
  Literature value/calculated value. Amount of resuidue from cooling tower in relation to producing 1kWh of electricity from lignite, based on the value for burning 1MJ of lignite. Weighted average with electricity production data (Itten&Frischknecht 2012) and values of 10 countries
  (AT, BA, CZ, DE, ES, FR, HU, PL, SI, SK).
  Source:
  Itten R. and Frischknecht R. (2012) Life Cycle Inventories of Electricity Mixes and Grid. ESU-services Ltd., Uster, Switzerland.
  production volume; = apv_electricity_peat * cooling_tower_residue
    Calculated from production volume of reference product using the relative outputs.
  properties: carbon content, fossil 0.0544233, dry mass 0.7 kg, water content 0.428571, wet mass 1 kg
- water, completely softened: 0.0648649 kg; name water_completely_softened; = factor_MJ_kWh*0.006; lognormal variance with pedigree 0.086, pedigree (4,5,5,5,3)
  Literature value/calculated value. Feed water for the steam circuit lost when producing 1kWh of electricity from lignite, based on the value for burning 1MJ of lignite. Röder et al. 2007, Tab. 9.65 and Tab. 9.66, p. 160f.
  properties: wet mass 1 kg
- water, decarbonised: 6.22313e-5, 0.0511078, 0.746776, 0.0382437, 0.633913, 0.0649671, 0.401347, 0.09951, 0.00358657, 0.0980068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 kg (12 suppliers, which the file names only by identifier); sum of these 2.16216 kg; = factor_MJ_kWh*0.2; lognormal variance with pedigree 0.086, pedigree (4,5,5,5,3)
  Literature value/calculated value. Cooling water, decarbonised, for the cooling water circuit lost when producing 1kWh of electricity from lignite, based on the value for burning 1MJ of lignite. Röder et al. 2007, Tab. 9.65 and Tab. 9.66, p. 160f. These tables give an amount of 0.15 kg/MJ burned, which is valid for the assumption of 75% wet cooling and 25% run-through cooling. However, this revised dataset assumes 100% wet cooling.
  properties: wet mass 1 kg

## Inputs from nature
- Water, cooling, unspecified natural origin [natural resource, in water]: 0.0542902 m3; name water_cooling_UNO_input; = ((recirculating_CS_fraction_from_allCS*WWithdrawal_EP_HC_recirculating_CS)+(once_through_andCP_CS_fractio_from_allCS*WWithdrawal_EP_HC_once_through_andCP_CS))/10.3*factor_MJ_kWh; lognormal variance with pedigree 0.130025, pedigree (4,4,5,2,4)
  Calculated based on literature data.

## Emissions to nature
- Antimony ion [air, non-urban air or from high stacks]: 5.64324e-9 kg; name antimony; = factor_MJ_kWh*0.000000000522; lognormal variance with pedigree 0.8126, pedigree (5,3,5,5,4)
  Literature value/calculated value. Emissions when producing 1kWh of electricity from lignite, based on the value for producing 1kWh of electricity from lignite, based on the value for burning 1MJ of lignite. Weighted average with electricity production data (Itten&Frischknecht 2012) and emission values of 10 countries
  (AT, BA, CZ, DE, ES, FR, HU, PL, SI, SK) (Röder et al. 2007)
  Country emissions values calculated from trace element balance, input uncertain
  Source:
  Itten R. and Frischknecht R. (2012) Life Cycle Inventories of Electricity Mixes and Grid. ESU-services Ltd., Uster, Switzerland.
  property calculation property, kg 5.22e-10 kg; name antimony_calc_prop_kg
- Arsenic ion [air, non-urban air or from high stacks]: 3.2e-8 kg; name arsenic; = factor_MJ_kWh*0.00000000296; lognormal variance with pedigree 0.8126, pedigree (5,3,5,5,4)
  Literature value/calculated value. Emissions when producing 1kWh of electricity from lignite, based on the value for burning 1MJ of lignite. Weighted average with electricity production data (Itten&Frischknecht 2012) and emission values of 10 countries
  (AT, BA, CZ, DE, ES, FR, HU, PL, SI, SK) (Röder et al. 2007)
  Country emissions values calculated from trace element balance, input uncertain
  Source:
  Itten R. and Frischknecht R. (2012) Life Cycle Inventories of Electricity Mixes and Grid. ESU-services Ltd., Uster, Switzerland.
- Barium II [air, non-urban air or from high stacks]: 1.67568e-7 kg; name barium; = factor_MJ_kWh*0.0000000155; lognormal variance with pedigree 0.8126, pedigree (5,3,5,5,4)
  (same comment as for Arsenic ion)
- Benzene [air, non-urban air or from high stacks]: 2.34595e-6 kg; name benzene; = factor_MJ_kWh*0.000000217; lognormal variance with pedigree 0.152, pedigree (3,5,5,5,4)
  Literature value/calculated value. Emissions when producing 1kWh of electricity from lignite, based on the value for burning 1MJ of lignite. Weighted average with electricity production data (Itten&Frischknecht 2012) and emission values of 10 countries
  (AT, BA, CZ, DE, ES, FR, HU, PL, SI, SK) (Röder et al. 2007)
  Country emissions values based on literature.
  Source:
  Itten R. and Frischknecht R. (2012) Life Cycle Inventories of Electricity Mixes and Grid. ESU-services Ltd., Uster, Switzerland.
- Benzo(a)pyrene [air, non-urban air or from high stacks]: 2.16216e-12 kg; name benzo_a_pyrene; = factor_MJ_kWh*0.0000000000002; lognormal variance with pedigree 0.152, pedigree (3,5,5,5,4)
  (same comment as for Benzene)
- Boron [air, non-urban air or from high stacks]: 2.02162e-5 kg; name boron; = factor_MJ_kWh*0.00000187; lognormal variance with pedigree 0.8126, pedigree (5,3,5,5,4)
  (same comment as for Arsenic ion)
- Bromine [air, non-urban air or from high stacks]: 7.14595e-7 kg; name bromine; = factor_MJ_kWh*0.0000000661; lognormal variance with pedigree 0.2446, pedigree (3,3,5,5,4)
  (same comment as for Arsenic ion)
- Butane [air, non-urban air or from high stacks]: 2.05405e-7 kg; name butane; = factor_MJ_kWh*0.000000019; lognormal variance with pedigree 0.152, pedigree (3,5,5,5,4)
  (same comment as for Benzene)
- Cadmium II [air, non-urban air or from high stacks]: 7.26486e-9 kg; name cadmium; = factor_MJ_kWh*0.000000000672; lognormal variance with pedigree 0.8126, pedigree (5,3,5,5,4)
  (same comment as for Arsenic ion)
- Carbon dioxide, fossil [air, non-urban air or from high stacks]: 1.13514 kg; name carbon_dioxide_fossil; = factor_MJ_kWh*0.105; lognormal variance with pedigree 0.0518, pedigree (3,3,5,4,3)
  Literature value/calculated value. Emissions when producting 1kWh of electricity from peat, based on the value for burning 1MJ of peat. Emission factors for peat burned in Finland. See tab. 9.28, p. 120
- Carbon monoxide, fossil [air, non-urban air or from high stacks]: 0.000216216 kg; name carbon_monoxide_fossil; = factor_MJ_kWh*0.00002; lognormal variance with pedigree 0.746, pedigree (3,4,5,5,4)
  (same comment as for Benzene)
- Chromium III [air, non-urban air or from high stacks]: 2.87568e-8 kg; name chromium; = factor_MJ_kWh*0.00000000266; lognormal variance with pedigree 0.8126, pedigree (5,3,5,5,4)
  (same comment as for Arsenic ion)
- Chromium VI [air, non-urban air or from high stacks]: 3.47027e-9 kg; name chromium_vi; = factor_MJ_kWh*0.000000000321; lognormal variance with pedigree 0.5646, pedigree (3,3,5,5,4)
  Literature value/calculated value. Emissions when producing 1kWh of electricity from lignite, based on the value for burning 1MJ of lignite. Weighted average with electricity production data (Itten&Frischknecht 2012) and emission values of 10 countries
  (AT, BA, CZ, DE, ES, FR, HU, PL, SI, SK) (Röder et al. 2007)
  Country emissions values based on range of data.
  Source:
  Itten R. and Frischknecht R. (2012) Life Cycle Inventories of Electricity Mixes and Grid. ESU-services Ltd., Uster, Switzerland.
- Cobalt II [air, non-urban air or from high stacks]: 5.81622e-9 kg; name cobalt; = factor_MJ_kWh*0.000000000538; lognormal variance with pedigree 0.8126, pedigree (5,3,5,5,4)
  (same comment as for Arsenic ion)
- Copper ion [air, non-urban air or from high stacks]: 8e-8 kg; name copper; = factor_MJ_kWh*0.0000000074; lognormal variance with pedigree 0.8126, pedigree (5,3,5,5,4)
  (same comment as for Arsenic ion)
- Dinitrogen monoxide [air, non-urban air or from high stacks]: 1.56757e-5 kg; name dinitrogen_monoxide; = factor_MJ_kWh*0.00000145; lognormal variance with pedigree 0.146, pedigree (3,4,5,5,4)
  (same comment as for Benzene)
- Dioxins, measured as 2,3,7,8-tetrachlorodibenzo-p-dioxin [air, non-urban air or from high stacks]: 7.56757e-14 kg; name dioxins; = factor_MJ_kWh*0.000000000000007; lognormal variance with pedigree 0.412, pedigree (3,5,5,5,4)
  (same comment as for Benzene)
- Ethane [air, non-urban air or from high stacks]: 4.43243e-7 kg; name ethane; = factor_MJ_kWh*0.000000041; lognormal variance with pedigree 0.152, pedigree (3,5,5,5,4)
  (same comment as for Benzene)
- Formaldehyde [air, non-urban air or from high stacks]: 6.27027e-7 kg; name formaldehyde; = factor_MJ_kWh*0.000000058; lognormal variance with pedigree 0.152, pedigree (3,5,5,5,4)
  (same comment as for Benzene)
- Hydrocarbons, aliphatic, alkanes, unspecified [air, non-urban air or from high stacks]: 2.36757e-6 kg; name hydrocarbons_al_al_unspec; = factor_MJ_kWh*0.000000219; lognormal variance with pedigree 0.152, pedigree (3,5,5,5,4)
  (same comment as for Benzene)
- Hydrocarbons, aliphatic, unsaturated [air, non-urban air or from high stacks]: 2.33514e-6 kg; name hydrocarbons_aliphatic_unsaturated; = factor_MJ_kWh*0.000000216; lognormal variance with pedigree 0.152, pedigree (3,5,5,5,4)
  (same comment as for Benzene)
- Hydrochloric acid [air, non-urban air or from high stacks]: 6.10811e-5 kg; name hydrogen_chloride; = factor_MJ_kWh*0.00000565; lognormal variance with pedigree 0.2826, pedigree (5,3,5,5,4)
  (same comment as for Arsenic ion)
- Hydrogen fluoride [air, non-urban air or from high stacks]: 1.45946e-5 kg; name hydrogen_fluoride; = factor_MJ_kWh*0.00000135; lognormal variance with pedigree 0.2826, pedigree (5,3,5,5,4)
  (same comment as for Arsenic ion)
- Iodine [air, non-urban air or from high stacks]: 5.18919e-7 kg; name iodine; = factor_MJ_kWh*0.000000048; lognormal variance with pedigree 0.2826, pedigree (5,3,5,5,4)
  (same comment as for Arsenic ion)
- Lead II [air, non-urban air or from high stacks]: 2.81081e-8 kg; name lead; = factor_MJ_kWh*0.0000000026; lognormal variance with pedigree 0.8126, pedigree (5,3,5,5,4)
  (same comment as for Arsenic ion)
- Lead-210 [air, non-urban air or from high stacks]: 9.04865e-5 kBq; name lead_210; = factor_MJ_kWh*0.00000837; lognormal variance with pedigree 0.4626, pedigree (5,3,5,5,4)
  (same comment as for Arsenic ion)
- Manganese II [air, non-urban air or from high stacks]: 9.14595e-8 kg; name manganese; = factor_MJ_kWh*0.00000000846; lognormal variance with pedigree 0.8126, pedigree (5,3,5,5,4)
  (same comment as for Arsenic ion)
- Mercury II [air, non-urban air or from high stacks]: 5.84865e-8 kg; name mercury; = factor_MJ_kWh*0.00000000541; lognormal variance with pedigree 0.8126, pedigree (5,3,5,5,4)
  (same comment as for Arsenic ion)
- Methane, fossil [air, non-urban air or from high stacks]: 1.08108e-5 kg; name methane_fossil; = factor_MJ_kWh*0.000001; lognormal variance with pedigree 0.146, pedigree (3,4,5,5,4)
  (same comment as for Benzene)
- Molybdenum VI [air, non-urban air or from high stacks]: 1.74054e-8 kg; name molybdenum; = factor_MJ_kWh*0.00000000161; lognormal variance with pedigree 0.8126, pedigree (5,3,5,5,4)
  (same comment as for Arsenic ion)
- Nickel II [air, non-urban air or from high stacks]: 1.1027e-7 kg; name nickel; = factor_MJ_kWh*0.0000000102; lognormal variance with pedigree 0.8126, pedigree (5,3,5,5,4)
  (same comment as for Arsenic ion)
- Nitrogen oxides [air, non-urban air or from high stacks]: 0.00127568 kg; name nitrogen_oxides; = factor_MJ_kWh*0.000118; lognormal variance with pedigree 0.1292, pedigree (5,3,5,4,3)
  (same comment as for Carbon dioxide, fossil)
- PAH, polycyclic aromatic hydrocarbons [air, non-urban air or from high stacks]: 1.08108e-8 kg; name pah; = factor_MJ_kWh*0.000000001; lognormal variance with pedigree 0.412, pedigree (3,5,5,5,4)
  (same comment as for Benzene)
- Particulate Matter, < 2.5 um [air, non-urban air or from high stacks]: 0.000192432 kg; name particulates_lt2_5; = factor_MJ_kWh*0.0000178; lognormal variance with pedigree 0.4292, pedigree (5,3,5,4,3)
  Literature value/calculated value. Emissions when producting 1kWh of electricity from peat, based on the value for burning 1MJ of peat. Emission factors for peat burned in Finland. See tab. 9.28, p. 120 and Tab. 9.85 p. 182. Resulting particle sizes distribution for peat burning: <2.5um: 80%; 2.5-10um: 10%; >10um: 10%. This differs slightly from the values for particle emissions in coal power plants (Tab. 9.39 p. 130) (<2.5um: 85%; 2.5-10um: 10%; >10um: 5%).
- Particulate Matter, > 10 um [air, non-urban air or from high stacks]: 2.4e-5 kg; name particulates_gt10; = factor_MJ_kWh*0.00000222; lognormal variance with pedigree 0.1692, pedigree (5,3,5,4,3)
  (same comment as for Particulate Matter, < 2.5 um)
- Particulate Matter, > 2.5 um and < 10um [air, non-urban air or from high stacks]: 2.4e-5 kg; name particulates_2_5_to_10; = factor_MJ_kWh*0.00000222; lognormal variance with pedigree 0.2506, pedigree (5,3,5,5,3)
  (same comment as for Particulate Matter, < 2.5 um)
- Pentane [air, non-urban air or from high stacks]: 1.58919e-6 kg; name pentane; = factor_MJ_kWh*0.000000147; lognormal variance with pedigree 0.152, pedigree (3,5,5,5,4)
  (same comment as for Benzene)
- Polonium-210 [air, non-urban air or from high stacks]: 0.000165405 kBq; name polonium_210; = factor_MJ_kWh*0.0000153; lognormal variance with pedigree 0.4626, pedigree (5,3,5,5,4)
  Literature value/calculated value. Emissions when producing 1kWh of electricity from lignite, based on the value for burning 1MJ of lignite. Weighted average with electricity production data (Itten&Frischknecht 2012) and emission values of 10 countries
  (AT, BA, CZ, DE, ES, FR, HU, PL, SI, SK) (Röder et al. 2007)
  Source:
  Itten R. and Frischknecht R. (2012) Life Cycle Inventories of Electricity Mixes and Grid. ESU-services Ltd., Uster, Switzerland.
- Potassium-40 [air, non-urban air or from high stacks]: 3.13514e-5 kBq; name potassium_40; = factor_MJ_kWh*0.0000029; lognormal variance with pedigree 0.4626, pedigree (5,3,5,5,4)
  (same comment as for Polonium-210)
- Propane [air, non-urban air or from high stacks]: 3.78378e-7 kg; name propane; = factor_MJ_kWh*0.000000035; lognormal variance with pedigree 0.152, pedigree (3,5,5,5,4)
  (same comment as for Polonium-210)
- Propylene [air, non-urban air or from high stacks]: 1.72973e-7 kg; name propene; = factor_MJ_kWh*0.000000016; lognormal variance with pedigree 0.152, pedigree (3,5,5,5,4)
  (same comment as for Polonium-210)
- Radium-226 [air, non-urban air or from high stacks]: 2.33514e-5 kBq; name radium_226; = factor_MJ_kWh*0.00000216; lognormal variance with pedigree 0.4227, pedigree (3,3,5,3,4)
  (same comment as for Arsenic ion)
- Radium-228 [air, non-urban air or from high stacks]: 1.39459e-5 kBq; name radium_228; = factor_MJ_kWh*0.00000129; lognormal variance with pedigree 0.4626, pedigree (5,3,5,5,4)
  (same comment as for Arsenic ion)
- Radon-220 [air, non-urban air or from high stacks]: 0.00137297 kBq; name radon_220; = factor_MJ_kWh*0.000127; lognormal variance with pedigree 0.4626, pedigree (5,3,5,5,4)
  (same comment as for Arsenic ion)
- Radon-222 [air, non-urban air or from high stacks]: 0.00243243 kBq; name radon_222; = factor_MJ_kWh*0.000225; lognormal variance with pedigree 0.4626, pedigree (5,3,5,5,4)
  (same comment as for Arsenic ion)
- Selenium IV [air, non-urban air or from high stacks]: 1.32973e-7 kg; name selenium; = factor_MJ_kWh*0.0000000123; lognormal variance with pedigree 0.8126, pedigree (5,3,5,5,4)
  (same comment as for Arsenic ion)
- Strontium II [air, non-urban air or from high stacks]: 1.48108e-7 kg; name strontium; = factor_MJ_kWh*0.0000000137; lognormal variance with pedigree 0.8126, pedigree (5,3,5,5,4)
  (same comment as for Arsenic ion)
- Sulfur dioxide [air, non-urban air or from high stacks]: 0.00214054 kg; name sulfur_dioxide; = factor_MJ_kWh*0.000198; lognormal variance with pedigree 0.0526, pedigree (3,3,5,5,3)
  (same comment as for Carbon dioxide, fossil)
- Thorium-228 [air, non-urban air or from high stacks]: 7.53514e-6 kBq; name thorium_228; = factor_MJ_kWh*0.000000697; lognormal variance with pedigree 0.4626, pedigree (5,3,5,5,4)
  (same comment as for Arsenic ion)
- Thorium-232 [air, non-urban air or from high stacks]: 1.18919e-5 kBq; name thorium_232; = factor_MJ_kWh*0.0000011; lognormal variance with pedigree 0.4626, pedigree (5,3,5,5,4)
  (same comment as for Arsenic ion)
- Toluene [air, non-urban air or from high stacks]: 1.17838e-6 kg; name toluene; = factor_MJ_kWh*0.000000109; lognormal variance with pedigree 0.152, pedigree (3,5,5,5,4)
  (same comment as for Benzene)
- Uranium-238 [air, non-urban air or from high stacks]: 1.94595e-5 kBq; name uranium_238; = factor_MJ_kWh*0.0000018; lognormal variance with pedigree 0.39, pedigree (5,1,4,5,1)
  (same comment as for Arsenic ion)
- Vanadium V [air, non-urban air or from high stacks]: 3.64324e-8 kg; name vanadium; = factor_MJ_kWh*0.00000000337; lognormal variance with pedigree 0.74, pedigree (5,1,4,5,1)
  (same comment as for Arsenic ion)
- Water [air, unspecified]: 0.00170139 m3; name water_to_air_unspecified; = (water_completely_softened/1000)*fraction_WCS_to_air+(water_decarbonised_user/1000)*fraction_WDC_to_air+water_cooling_UNO_input*fraction_CW_to_air; lognormal variance with pedigree 0.130025, pedigree (4,4,5,2,4)
  Calculated value based on literature values and expert opinion. See comments in the parametres' comment field.
  property fraction, origin: fresh water 0.0438008; name fraction_origin_fresh_water
  property fraction, origin: salt water 0; name fraction_origin_salt_water
  property fraction, origin: unspecified 0.956199; name fraction_origin_unspecified
- Xylenes, unspecified [air, non-urban air or from high stacks]: 9.96757e-6 kg; name xylene; = factor_MJ_kWh*0.000000922; lognormal variance with pedigree 0.112, pedigree (3,5,5,5,1)
  (same comment as for Benzene)
- Zinc II [air, non-urban air or from high stacks]: 1.88108e-7 kg; name zinc; = factor_MJ_kWh*0.0000000174; lognormal variance with pedigree 0.74, pedigree (5,1,4,5,1)
  (same comment as for Arsenic ion)
- Water [water, unspecified]: 0.0548158 m3; name water_to_water_unspecified; = (water_completely_softened/1000)*(1-fraction_WCS_to_air)+(water_decarbonised_user/1000)*(1-fraction_WDC_to_air)+water_cooling_UNO_input*(1-fraction_CW_to_air); lognormal variance with pedigree 0.130025, pedigree (4,4,5,2,4)
  (same comment as for Water)
  property fraction, origin: fresh water 0.0392684; name fraction_origin_fresh_water_Ww
  property fraction, origin: salt water 0; name fraction_origin_salt_water_Ww
  property fraction, origin: unspecified 0.960732; name fraction_origin_unspecified_Ww

## Sampling procedure
literature and statistics

## Extrapolations
Data were taken over from a global dataset for electricity production with lignite except for emissions of SO2, NOx, particles and CO2 and the efficiency. No DeNOx and DeSOx is taken into account. Uncertainty was adjusted accordingly.
Most of the exchanges were extrapolated through production-weighted averages of the datasets of the following 10 countries: AT, BA, CZ, DE, ES, FR, HU, PL, SI, SK.

## Review by Carl Vadenbo 2015-06-17
The update of the whole electricity sector for the ecoinvent v3.2 database consist of hundreds of datasets. All these datasets have passed through a streamlined review processes where the underlying modelling of production volumes, technology shares and efficiencies was reviewed in detail prior to the datasets being submitted to the database.
