# tap water production, microstrainer treatment

Dataset: EcoSpold 2, unit process
Geography: CA-QC
Time period: 2012-01-01 to 2023-12-31
Technology level: current
Classification: ISIC rev.4 ecoinvent: 3600:Water collection, treatment and supply
Classification: EcoSpold01Categories: water supply/production
Synonyms: potable water
Tags: single enterprise data
Scenario: Business-as-Usual
System model: Allocation, cut-off by classification
Share of production covered: 98 %
Generated by: Marylène Dussault
Database: ecoinvent
isCopyrightProtected: true
accessRestrictedTo: 1

## General comment
This dataset represents production of 1 kg of tap water under pressure at facility gate, ready for distribution in network. It represents average operation of microstrainer treatment for production of tap water. Microstrainer treatment includes intake pumping, microfiltration through stainless steel strainers and disinfection. Inventory was constructed from reported chemicals, energy inputs and wastes from a single plant located in Québec covering nearly 100% of total production of tap water from this technology. It’s important to note treatment of water for this plant is light due to high raw water quality.

## Included activities start
From the intake pumping of raw surface water into the water treatment plant.

## Included activities end
This dataset ends with the production of tap water, at facility gate, under pressure. It includes energy for intake pumping, treatment system, lighting and heating of the building as well as the energy of the pump pressurizing water to the beginning of the network. It includes all chemicals and material added to the water during treatment and, when needed, ultraviolent lamps for replacement. It excludes energy for pumping stations and water losses within the network which is included in the tap water market. Emissions to the environment occurring during the treatment and during the distribution were not considered as they are assumed negligible. Main substance in water that would be released in the environment are assumed to be considered in wastewater processes.

## Time period
Time of publication.

## Parameters
- unit conversion, days in a year: 365.25 d/year; name days_per_year; lognormal variance with pedigree 0.0006, pedigree (1,1,1,1,1)
  Conversion factor.

## Reference product
- tap water: 1 kg; name tapwater; By-product classification allocatable product; CPC 18000: Natural water; CAS 7732-18-5
  production volume 3.44e10 kg; name PV_tapwater
    Calculated value. Estimated value based on sum of average flow rate of municipal direct filtration treatment plant across region and total regional production based on a 91% coverage.
  property price 0.000397 EUR2005
    Converted from EU price by using Purchasing Power Parities (0.8458 in 2003 and 0.8426 in 2004)
  properties: carbon allocation 6.08566e-7 kg, carbon content 0.0017899, carbon content, fossil 0.0017899, carbon content, non-fossil 0, dry mass 0.00034 kg, water content 2940.18, water in wet mass 0.99966 kg, wet mass 1 kg

## Inputs from technosphere
- chlorine, liquid: 1.69001e-6 kg; lognormal variance with pedigree 0.0112, pedigree (2,4,4,1,1)
  Measured value.Represents use of chlorine(dry basis), delivered in liquid state, for disinfection in surveyed microstrainer treatment plant.
  properties: dry mass 1 kg, wet mass 1 kg
- diesel, burned in building machine: 5.08032e-5 MJ; = diesel_use*density_diesel*NHV*43.2; lognormal variance with pedigree 0.008, pedigree (1,1,4,1,1)
  Calculated value.
  Uncertainty: Calculated variable. Uncertainty will be determined from propagation of uncertainty factors of underlying variables.
  property density 0.84 kg/l; name density_diesel
  property fuel input in physical units, L 1.4e-6 l; name diesel_use
  property heating value, net 1 MJ; name NHV
  note on fuel input in physical units, L: Measured value. Diesel volume consumed in a year. Exclusively used for routine runs of emergy generators.
  note on heating value, net: Literature. net (lower) heating (calorific) value for diesel in MJ/kg
- electricity, medium voltage: 0.000461 kWh; lognormal variance with pedigree 0.0112, pedigree (2,4,4,1,1)
  EcoSpold01Location=UCTE
  Measured value. Represents electricity consumption for the entire treatment process including pumping for water intake and pumping for distribution at the plant gate.
- wastewater, unpolluted: -1.4e-5 m3; name ww; lognormal variance with pedigree 0.0032, pedigree (2,4,1,1,1)
  Measured value. Average amount of wastewater produced during treatment.
  EcoSpold01Location=CH
  production volume; = PV_tapwater*(ww/tapwater)
    Calculated from the production volume of tap water, at user in proportion to the respective output amounts.
  properties: carbon content, fossil 0.00178991, carbon content, non-fossil 0.00178991, dry mass 0.337476 kg, water content 2962.17, wet mass 1000 kg
  note on carbon content, fossil: Assumed to be like in tap water. Bicarbonate content is 2.93 mol/m3. CO2 content is 0.1 mol/m3 (ecoinvent v2.2 report 8, Tab 93.1).
- water works, capacity 1.1E10l/year: 1.52103e-12 unit; = 1/(Q_av* days_per_year*lifetime*UnitConversion(1, 'm3', 'l')); lognormal variance with pedigree 0.008, pedigree (1,1,4,1,1)
  Calculated value. Amount of water works construction attributed to the production of 1kg of tap water. Value is based on assumed lifetime production of water treatment plant and an assumed typical medium-sized plant of 30,000 m3/day.
  Uncertainty: Calculated variable. Uncertainty will be determined from propagation of uncertainty factors of underlying variables.
  property lifetime 60 year; name lifetime
  property plant average daily flow rate 30000 m3/d; name Q_av
  note on lifetime: Estimated Value. Expected lifetime of water works as defined in the construction process.
  note on plant average daily flow rate: Fixed values, Flow rate of a conventional water purification plant for a medium-size facility as defined in the water works process.

## Inputs from nature
- Water, lake [natural resource, in water]: 0.00101397 m3; name waterIn; lognormal variance with pedigree 0.0112, pedigree (2,4,4,1,1)
  Calculated value. Surface water withdrawal represents average withdrawal from surveyed plants based on water production and wastewater production.

## Sampling procedure
Based on data collected from selected plants chosen either for their technological specificities or their production representativeness. A survey campaign was conducted in summer 2013 with 2012 as a reference year. All technologies combined, 16 distinct tap water production plants participated.

## Extrapolations
No extrapolation. Represents a single microstrainer treatment tap water production facilities which is the only plant using this technology in the region to the authors knowledge. Thus, it represents around 100% of microstrainer treatment facility in Québec. This technology represents 2.6% of all tap water volume produced in Quebec.
