# electricity, high voltage, European attribute mix

Dataset: EcoSpold 2, unit process
Geography: RER
Time period: 2022-01-01 to 2023-12-31
Technology level: current
Classification: ISIC rev.4 ecoinvent: 3510:Electric power generation, transmission and distribution
Scenario: Business-as-Usual
System model: Allocation, cut-off by classification
Generated by: [System]
Published in: Association of Issuing Bodies (AIB) 2023
Database: ecoinvent
isCopyrightProtected: true
accessRestrictedTo: 1

## General comment
This dataset represents the European Attribute Mix (EAM) on the high voltage level of the year 2022. The shares have been calculated based on statistics from AIB (2023) following the methodology of grexel (2020).
The EAM is a virtual mix and is calculated as the sum of all surplus electricity from countries for which the volume of the domestic residual mix is larger than the volume of untracked consumption i.e., electricity consumption that is not explicitly tracked through mechanisms such as Guarantees of Origin (GO). The EAM is used to balance the residual mix for countries for which the volume of untracked consumption is larger than the volume of domestic residual mix, i.e., countries with a deficit in their domestic residual mix.
For better representation the EAM is modelled in a separate dataset and linked to the residual mixes. See technology comment for a summary of the residual mix calculations.
The calculation area considered for the calculation of the residual mixes covers all members of EU28, Iceland, Norway, Serbia and Switzerland.
Sources:
- AIB (2023), Association of Issuing Bodies, European Residual Mixes, Results of the calculation of Residual Mixes for the calendar year 2022, Version 1.0, 2022-06-01, https://www.aib-net.org/facts/European-residual-mix/2022
- grexel (2020), Issuance Based Residual Mix Calculation Methodology, Published 31.03.2020, Version 1.1, https://www.aib-net.org/sites/default/files/assets/facts/residual-mix/2022/RM%20EAM%20IB%20Calculation%20Methodology%20V1_2.pdf

## Included activities start
This activity starts from 1kWh of electricity from all countries in the calculation area with surplus electricity.

## Included activities end
This activity ends with the supply of 1kWh of electricity from all countries in the calculation area with surplus electricity.
This dataset does not include any transmission and distribution nor any infrastructure or direct emission. These are considered in the corresponding residual mix datasets.

## Technology
Residual mixes represent a countries pool of not-explicitily tracked electricity consumption. Residual mixes are calculated by first determining the "domestic residual mix", which represents the sum of all domestic electricity production taking into account imports and export and issued and expired attributes. The domestic resiual mix is compared with the volume of a countries untracked consumption and should a surplus occur , this surplus is added to the European attribute mix (EAM). Should a deficit occur, the difference is balanced with the EAM.

## Time period
The data on the European residual mixes is based on the transactions of guarantees of origin representing the time period of 1.4.2022 - 31.3.2023.

## Reference product
- electricity, high voltage: 1 kWh; By-product classification allocatable product; CPC 17100: Electrical energy; HS2017 271600: Electrical energy
  production volume 302.328 kWh
    Calculated value. Shares calculated based on Tab 3. of AIB (2023), Association of Issuing Bodies, European Residual Mixes, Results of the calculation of Residual Mixes for the calendar year 2022, Version 1.0, 2023-06-10, https://www.aib-net.org/facts/European-residual-mix/2022
  property price 0.0977 EUR2005
    Temporary price data. Calculated as 90% of purchasers price based on: 94% of the average price (to account for a 6% loss in transformation and transmission) for electricity for industrial consumersin 2005 (excluded taxes). From IEA.
  properties: carbon allocation 0 kg, carbon content 0

## Inputs from technosphere
- electricity, high voltage: 1.57931e-5, 0.00998946, 0.0128124, 0.00124514, 0.000102371, 0.000517125, 0.0193558, 4.23093e-5, 1.79771e-6, 1.3514e-5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 kWh (171 suppliers, which the file names only by identifier); sum of these 1 kWh
  (same comment as for electricity, high voltage)
