# anaerobic digestion of manure

Dataset: EcoSpold 2, unit process
Geography: RoW
Time period: 2018-01-01 to 2023-12-31
Technology level: current
Classification: ISIC rev.4 ecoinvent: 3821:Treatment and disposal of non-hazardous waste
Scenario: Business-as-Usual
System model: Allocation, cut-off by classification
Generated by: Thomas Kägi
Published in: Fredy Dinkel 2022
Database: ecoinvent
isCopyrightProtected: true
accessRestrictedTo: 1

## General comment
Inventory refers to 1m3 of biogas (which corresponds to 33 kg of farmyard manure). Electricity consumption and emissions represent the average biogas production in a digestion plant based on 34 biogas plants in Switzerland. Infrastructure expenditures are included.
Reference:
Dinkel & Kägi (2022). Stoffflüsse landwirtschaftliche Biogasproduktion und Ökobilanz

## Included activities start
Input of livestock manure (cattle slurry, pig slurry, cattle manure) to incoming storage at the biogas plant.

## Included activities end
The treatment includes storage of the substrates at the biogas fermentation plant, anerobic fermentation, as well as the storage of digestate after fermentation. The activity ends with the biogas and digestate being available at the biogas plant. Furthermore, the calorific value of the biogas only accounts for the methane content excluding the H2S presence in it. Glycerine was removed as input in the anaerobic digestion (AD) process. Water content of digestate is 95% in wet weight basis. Finally, the dataset incorporates emissions of CO2, CH4, NH3 and N2O to air due to the storage of the substrates before the AD process as well as from storage of the digestate after the AD process. The storage of the substrate before and after the AD process is assumed to be an under cover system.

## Geography
Conditions refer to anaerobic digestion of manure in Switzerland.

## Technology
The storage of the substrate and the storage of the digestate (before and after the anaerobic digestion process respectively) are both considered to be closed.

## Parameters
- carbon conversion efficiency of cattle slurry in digester: 0.25 dimensionless; name C_conversion_cattle_slurry
- carbon conversion efficiency of solid cattle manure in digester: 0.347 dimensionless; name C_conversion_cattleFYM
- carbon conversion efficiency of swine slurry in digester: 0.255 dimensionless; name C_conversion_swine_slurry
- carbon dioxide density (ntp): 1.842 kg/m3; name CO2_density
  calculated for normal conditions of temperature and pressure. the value represents kg of CO2 per m3 of CO2
- efficiency of biogas production from cattle slurry dry mass: 0.308 m3/kg; name EF_cattle_slurryDM; = 400*0.77/1000
  400 m3 CH4/Mg OM *0.77 kg OM/ kg wet/ 1000 (1 Mg / 1000 kg)
- efficiency of biogas production from solid cattle manure: 0.3 m3/kg; name EF_cattle_FYM_DM; = 400*0.75/1000
  400 m3 CH4/Mg OM *0.75 kg OM/kg wer/ 1000 (1 Mg / 1000 kg)
- efficiency of biogas production from swine slurry dry matter: 0.3285 m3/kg; name EF_swine_slurryDM; = 450*0.73/1000
  450 m3 CH4/Mg OM*0.73 kg OM/kg wet/ 1000 (1 Mg / 1000 kg)
- electricity use factor: 0.158 dimensionless; name factor_el
  The amount refers to electricity needed for the maintenance of a 350 kWe biogas plant with a biogas engine. Values are based on the survey of 18 biogas plants in Switzerland in 2009, resulting in a mean value of 0.158 kWh per m3 of biogas
- emission factor CH4 cattle slurry dry mass: 6.16e-5 dimensionless; name EF_CH4_cattle_slurryDM; = 0.77*0.08/1000; lognormal variance with pedigree 0.0426, pedigree (2,1,1,5,1)
  Calculated as OM (kg OM/kg DM)*DM (kg DM/kg wet)/1000 (1000kg/1t)
- emission factor CH4 digestate: 4.25e-6 dimensionless; name EF_CH4_digestateDM; = 0.085*0.05/1000; lognormal variance with pedigree 0.0426, pedigree (2,1,1,5,1)
  Calculated as OM (kg OM/kg DM)*DM (kg DM/kg wet)/1000 (1000kg/1t)
- emission factor CH4 solid cattle manure dry mass: 0.000165 dimensionless; name EF_CH4_cattle_FYM_DM; = 0.75*0.22/1000; lognormal variance with pedigree 0.0426, pedigree (2,1,1,5,1)
  Calculated as OM (kg OM/kg DM)*DM (kg DM/kg wet)/1000 (1000kg/1t)
- emission factor CH4 swine slurry dry mass: 3.65e-5 dimensionless; name EF_CH4_swine_slurryDM; = 0.73*0.05/1000; lognormal variance with pedigree 0.0426, pedigree (2,1,1,5,1)
  Calculated as OM (kg OM/kg DM)*DM (kg DM/kg wet)/1000 (1000kg/1t)
- emission factor CO2: 0.07 dimensionless; name EF_CO2; lognormal variance with pedigree 0.0032, pedigree (2,1,1,5,1)
- emission factor N2O: 0.005 dimensionless; name EF_N2O; lognormal variance with pedigree 0.0426, pedigree (2,1,1,5,1)
- emission factor ammonia: 0.0135 dimensionless; name EF_NH3; lognormal variance with pedigree 0.0426, pedigree (2,1,1,5,1)
  Emission factor (kg/kg soluble nitrogen) for covered storage (10% of the factor for open storage)
- lifetime of facility: 20 year; name lifetime; lognormal variance with pedigree 0.0426, pedigree (2,1,1,5,1)
- methane density (ntp): 0.668 kg/m3; name methane_density
  calculated for normal conditions of temperature and pressure. the value represents kg of CH4 per m3 of CH4
- process heat use factor: 3.47 dimensionless; name factor_process_heat; lognormal variance with pedigree 0.0032, pedigree (2,1,1,5,1)
  The amount refers to heat needed for the maintenance of a 150 kWe biogas plant with a biogas engine. Values are based on the survey of 18 biogas plants in Switzerland in 2009, resulting in a mean value of 3.47 MJ per m3 of biogas
- share of carbon dioxide in biogas from manure: 0.435953 dimensionless; name share_CO2_manure; = 1- (share_CH4_manure)-0.008
  the amount is calculated assuming that O2 is present in Biogas at a cncentration of 0.3% v/v and H2S is present in Biogas at a concentration of 0.5% v/v. Hence, abstracting those values along with the concentration of CH4 in % v/v yields the amount of CO2.
- share of methane in biogas from cattle: 0.55 dimensionless; name share_CH4_cattle
- share of methane in biogas from manure (mixture): 0.556047 dimensionless; name share_CH4_manure; = (ABS(cattle_FYM)*DM_cattle_FYM*EF_cattle_FYM_DM*share_CH4_cattle+ABS(cattle_slurry)*DM_cattle_slurry*EF_cattle_slurryDM*share_CH4_cattle+ABS(swine_slurry)*DM_swine_slurry*EF_swine_slurryDM*share_CH4_swine)/biogas
  Calculating the content of CH4 in the biogas as a whole, taking into account the different contributions of all three manure substrates
- share of methane in biogas from swine: 0.58 dimensionless; name share_CH4_swine
- share of size class 14E5 m3: 0.483 dimensionless; name share_1400000m3; lognormal variance with pedigree 0.3026, pedigree (2,1,1,5,1)
- share of size class 2E5 m3: 0.034 dimensionless; name share_200000m3; lognormal variance with pedigree 0.3026, pedigree (2,1,1,5,1)
- share of size class 6E5 m3: 0.483 dimensionless; name share_600000m3; lognormal variance with pedigree 0.3026, pedigree (2,1,1,5,1)
- share of soluble nitrogen in digestate: 0.7 dimensionless; name N_soluble_digestate
- share of soluble nitrogen in substrate: 0.62 dimensionless; name N_soluble_substrate
- share of storage time: 0.1 dimensionless; name time_share

## Reference product
- biogas: 1 m3; = ABS(cattle_FYM)*DM_cattle_FYM*EF_cattle_FYM_DM+ABS(cattle_slurry)*DM_cattle_slurry*EF_cattle_slurryDM+ABS(swine_slurry)*DM_swine_slurry*EF_swine_slurryDM; source Dauriat A. 2011; By-product classification allocatable product; CPC 17200: Coal gas, water gas, producer gas and similar gases, other than petroleum gases and other gaseous hydrocarbons; HS2017 271129: Petroleum gases and other gaseous hydrocarbons; in gaseous state, other than natural gas
  Gas derived from fermentation of sewage sludge. Sewage gas is well suited as a fuel for co-generation. The obtained heat is sufficient to cover the overall heat consumption of a WWTP, including the heat demand for the fermentation process. Furthermore, sewage gas may be directly burnt for heating purposes. In principle, the generated sewage gas can be upgraded to natural gas quality and then used as a fuel for road vehicles or fed into the natural gas network. In the year 2004 the waste water treatment plant Buholz was equipped with a biogas upgrading plant. The quantity (degradation rate) and quality of the biogas depend on several factors: • composition of the input material (share of dry organic matter) • duration of digestion • temperature inside digestion tank • quality and quantity of co-substrates
  production volume 6.0611e9 m3; name PV_biogas
    Production volume amount was scaled from the respective Swiss value. GDP scaling was employed with Switzerland accounting for roughly 0.8% of the global GDP, yielding a global production volume of 611309524 m3. Production volume comment for Switzerland: According to the Swiss ministry of Environment, in 2016 in Switzerland, 1027 TJ of energy produced from anaerobic digestion dedicated to the treatment of Agricultural wastes. Values aexpressed in gross energy production. Assuming a calorific value of 21 MJ per Nm3 of biogas, the production volume is calculated to be 48904762 m3 of biogass. Source: Kaufmann, U. (2017). Schweizerische Statistik der erneuerbaren Energien. Ausgabe 2016, (2016), 75. Retrieved from http://www.bfe.admin.ch/php/modules/publikationen/stream.php?extlang=de&name=de_729286095.pdf&endung=Schweizerische
  property carbon content, non-fossil 0.497586
    Total C content in kg/Nm3 (Tab 12.8, ecoinvent v2.2 report n17), referred to 1kg DM
  property heating value, net 22.73 MJ
    Value taken from the general comment of "heat and power co-generation, biogas, gas engine" dataset.
  property price 0.109 EUR2005
    Temporary price data. Calculated as 90% of purchasers price based on: Same prices per energy output as natural gas, based on the proportional lower heating value (2/3 that of natural gas)
  property share of methane in biogas 0.556049; name share_CH4_in_biogas; = ABS( swine_slurry)* DM_swine_slurry* EF_swine_slurryDM* share_CH4_swine+ABS( cattle_slurry* DM_cattle_slurry* EF_cattle_slurryDM* share_CH4_cattle+cattle_FYM* DM_cattle_FYM* EF_cattle_FYM_DM* share_CH4_cattle)
    Calculated from factors for each substrate
  properties: carbon allocation 0.587681 kg, carbon content 0.497586, carbon content, fossil 0, dry mass 1.18106 kg, water content 0, water in wet mass 0 kg, wet mass 1.18106 kg

## Inputs from technosphere
All rows: source Dauriat A. 2011
- anaerobic digestion plant, agriculture, with methane recovery: 2.86e-7 unit; = biogas*(share_200000m3/(share_200000m3+share_600000m3+share_1400000m3)*(200/350)^0.7+share_600000m3/(share_200000m3+share_600000m3+share_1400000m3)*(600/350)^0.7+share_1400000m3/(share_200000m3+share_600000m3+share_1400000m3)*(1400/350)^0.7)/(lifetime*350000); lognormal variance with pedigree 0.398, pedigree (5,5,4,5,4)
  Lifespan is taken as being equal to 20 years.In order to take account of the scale effect, the following formula is applied: Ui = U0 x (Ci/C0)^0,7 where Ui is the number of infrastructure units for the reference case i, in “units”; U0 = 1 [unit] is the number of infrastructure units for the reference facility "anaerobic digestion plant, agriculture, with methane recovery"; Ci is the annual biogas production for the reference case i, en m3/year; C0 = 350,000 [m3/year] is the annual biogas production of the reference facility "anaerobic digestion plant, agriculture, with methane recovery". The infrastructure input per kg of substrate is calculated according to the following formula: Ii = Ui x Yi / (20 x Ci) where Ii is the infrastructure input “anaerobic digestion plant, covered, agriculture” for the reference case i, in “units” per kg of substrates; Ui is the number of infrastructure units for the reference case i, in “units”; Yi is the biogas production yield for the reference case i, in m3 of biogas per kg of substrates; Ci is the annual biogas production for the reference case i, in m3/year.
- digester sludge: -36.1826 kg; name digestate; lognormal variance with pedigree 0.0926, pedigree (5,5,3,5,4)
  Calculated as residual from the mass balance: input manure - outputs and emissions. The density of biogas is assumed to be 1.185628256 kg /m3 of BG in normal conditions of temperature and pressure.
  production volume; name PV_digestate; = PV_biogas * (digestate / biogas)
    Calculated from production volume of reference product using the relative outputs.
  property carbon content, non-fossil 0.595; name C_digestate; = 0.85*0.70
  property dry mass 0.05 kg; name DM_digestate
  properties: heating value, net 2.42 MJ, water content 19, wet mass 1 kg
  note on heating value, net: Value taken from the general comment of the treatment dataset.
- electricity, high voltage: 0.000270606, 0.00616533, 0.0294552, 0.00446332, 0.0880999, 0.00135425, 0.00920635, 5.88694e-5, 0.0189262 kWh (9 suppliers, which the file names only by identifier); sum of these 0.158 kWh; = biogas*factor_el; lognormal variance with pedigree 0.0986, pedigree (5,5,4,5,4)
  Based on Dinkel & Kägi (2022). Stoffflüsse landwirtschaftliche Biogasproduktion und Ökobilanz
- heat, central or small-scale, other than natural gas: 0.047015, 3.42299 MJ (2 suppliers, which the file names only by identifier); sum of these 3.47 MJ; = biogas* factor_process_heat; lognormal variance with pedigree 0.0986, pedigree (5,5,4,5,4)
  (same comment as for electricity, high voltage)
  properties: heating value, net 1 MJ
- manure, liquid, cattle: 20.452 kg; name cattle_slurry; lognormal variance with pedigree 0.0986, pedigree (5,5,4,5,4)
  Shares of substrates as in Switzerland 2009
  property carbon content, non-fossil 0.6345; name C_cattle_slurry; = 13.5* N_cattle_slurry
  property dry mass 0.08 kg; name DM_cattle_slurry
  property nitrogen content 0.047; name N_cattle_slurry
  properties: water content 11.5, wet mass 1 kg
- manure, liquid, swine: 12.2712 kg; name swine_slurry; lognormal variance with pedigree 0.0986, pedigree (5,5,4,5,4)
  Shares of substrates as in Switzerland 2009
  property carbon content, non-fossil 0.6345; name C_swine_slurry; = 13.5* N_swine_slurry
  property dry mass 0.05 kg; name DM_swine_slurry
  property nitrogen content 0.047; name N_swine_slurry
  properties: water content 19, wet mass 1 kg
- manure, solid, cattle: 4.46225 kg; name cattle_FYM; lognormal variance with pedigree 0.0986, pedigree (5,5,4,5,4)
  Shares of substrates as in Switzerland 2009
  property carbon content, non-fossil 0.4485; name C_cattle_FYM; = 19.5* N_cattle_FYM
  property dry mass 0.22 kg; name DM_cattle_FYM
  property nitrogen content 0.023; name N_cattle_FYM
  properties: water content 3.54545, wet mass 1 kg

## Emissions to nature
- Ammonia [air, non-urban air or from high stacks]: 0.000249999 kg; name NH3_emission; source Alig, M. 2012; lognormal variance with pedigree 0.138, pedigree (5,5,4,5,4)
  It was assumed that the ammonia emissions between pre-storage and biogas production including post-storage are in a similar ratio to the reported methane emissions between pre-storage and biogas production including post-storage. This approximation results in about 0.25 g NH3 per m3 of biogas.
  property carbon content, fossil 0; name C_content_fossil
  property carbon content, non-fossil 0; name C_content_non_fossil
  property dry mass 1 kg; name DM
  property water content 0; name water_content
  property water in wet mass 0 kg; name WWM
  property wet mass 1 kg; name WM
- Carbon dioxide, non-fossil [air, non-urban air or from high stacks]: 0.0708949 kg; source Alig, M. 2012; lognormal variance with pedigree 0.0566, pedigree (5,5,4,1,1)
  Calculated value according to literature: ES(CO2) = (44/12) x C(C) x EF4 x t where ES(CO2) is the carbon dioxide emissions in kg CO2/t of wet substrate; C(C) is the average carbon content of the substrates in kg C/t of wet substrate; EF4 = 7% is the carbon dioxide emission factor; t is the percentage of the time that the substrate is stored at the biogas producer’s (0.1, supposed that the substrates are stored at the biogas producer’s for 10% of the stockage time before digestion). The value includes emissions from the storage of the substrate until its use from the anaerobic digestion process but also emissions from the storage of the digestate until its final use. The CO2 emissions are calculated on the basis of the CH4 emissions, with the hypothesis that 30% of the carbon is emitted in the form of methane and 70% in the form of carbon dioxide (Jungbluth et al., 2007). EDB(CO2) = (44/12) x (0.7/0.3) x (12/16) x EDB(CH4) where EDB(CO2) is the carbon dioxide emissions in kg CO2/t raw digestate; EDB(CH4) is the methane emissions in kg CH4/t raw digestate. Reference: Dauriat A., Gaillard G., Alig M., Scharfy D., Membrez Y., Bachmann N., Steiner R., Charles R., Maltas A., Sinaj S., Analyse de cycle de vie de la production centralisée et décentralisée de biogaz en exploitations agricoles : Rapport final. Hrsg. Station de recherche Agroscope Reckenholz-Tänikon ART & Station de recherche Agroscope Changins-Wädenswil ACW, Zürich et Nyon. Avril, 2012, 1-147 S. Jungbluth, N., Chudacoff, M., Dauriat, A., Dinkel, F., Doka, G., Faist Emmenegger, M., Gnansounou, E., Kljun, N., Schleiss, K., Spielmann, M., Stettler, C., Sutter, J. 2007: Life Cycle Inventories of Bioenergy. ecoinvent report No. 17, Swiss Centre for Life Cycle Inventories, Dübendorf, CH.
- Dinitrogen monoxide [air, non-urban air or from high stacks]: 7.49996e-5 kg; source Alig, M. 2012; lognormal variance with pedigree 0.138, pedigree (5,5,4,5,4)
  It was assumed that the nitrous oxide emissions between pre-storage and biogas production incl. post-storage are in a similar ratio to the reported methane emissions between pre-storage and biogas production incl. post-storage. This approximation results in around 0.075 g N2O per m3 of biogas.
- Hydrogen sulfide [air, non-urban air or from high stacks]: 4.12758e-5 kg; = 1.11E-6*(ABS(cattle_slurry)+ABS(swine_slurry)+ABS(cattle_FYM)); source Dauriat A. 2011; lognormal variance with pedigree 0.138, pedigree (5,5,4,5,4)
  Emission factors from Dauriat 2011
- Methane, non-fossil [air, non-urban air or from high stacks]: 0.00527997 kg; lognormal variance with pedigree 0.138, pedigree (5,5,4,5,4)
  (same comment as for electricity, high voltage)

## Sampling procedure
The data for this dataset was generated within a project in 2022 financed by FOGA (Forschungs-, Entwicklungs- und Förderungsfond der schweizerischen Gasindustrie) and Ökostrom Schweiz in order to analyse the material flow analysis of the relevant emissions and the life cycle of Swiss agricultural biogas production based on manure. The data used for modelling were mainly taken from Ökostrom 2021 (Datenzusammenstellung BAFU Kompensationsprojekte 2020) that included data from 34 biogas plants in Switzerland. Emissions, as reported in Ökostrom 2021 are monitored as part of the above mentioned project. Producers are required to provide evidence of emission reduction within the scope of this project in order to participate. Assumptions were validated with biogas experts.

## Extrapolations
Data refer to Swiss production. Production volumes and uncertainty values have been changed (completeness and geographical index set from 1 to 5).
