# carton board box production service, with gravure printing

Dataset: EcoSpold 2, unit process
Geography: CA-QC
Time period: 1993-01-01 to 2023-12-31
Technology level: current
Classification: EcoSpold01Categories: paper & cardboard/cardboard & corrugated board
Classification: ISIC rev.4 ecoinvent: 1702:Manufacture of corrugated paper and paperboard and of containers of paper a
Tags: recontextualization
Scenario: Business-as-Usual
System model: Allocation, cut-off by classification
Generated by: Pascal Lesage
Published in: Hischier R. 2007
Database: ecoinvent
isCopyrightProtected: true
accessRestrictedTo: 1

## General comment
This dataset represents gravure printing of carton board box in Quebec.
Child dataset exchanges identical to GLO dataset. Created to enable linking to regional markets (e.g. for electricity). Data quality indicators adjusted accordingly.
The input of cartonboard is not included into this module allowing the user to establish its own cartonboard boxes. Per kg of used cartonboard, 0.80 kg of this module are needed.
[This dataset was already contained in the ecoinvent database version 2. It was not individually updated during the transfer to ecoinvent version 3. Life Cycle Impact Assessment results may still have changed, as they are affected by changes in the supply chain, i.e. in other datasets. This dataset was generated following the ecoinvent quality guidelines for version 2. It may have been subject to central changes described in the ecoinvent version 3 change report (http://www.ecoinvent.org/database/ecoinvent-version-3/reports-of-changes/), and the results of the central updates were reviewed extensively. The changes added e.g. consistent water flows and other information throughout the database. The documentation of this dataset can be found in the ecoinvent reports of version 2, which are still available via the ecoinvent website. The change report linked above covers all central changes that were made during the conversion process.]

## Included activities end
This module includes the production of boxes out of cartonboard. It contains the steps of cutting, folding and printing with a gravure machine and therefore inks and glues are considered as well as the electricity consumption.

## Technology
Data of the used technology within the examined Swiss production plant

## Parameters
- Quebec gross domestic product 2011: 3.11e11 USD(2011); name quebecGDP2011; lognormal variance with pedigree 0.0006, pedigree (1,1,1,1,1)
  Quebec Gross domestic product for 2011, expressed in 2011 USD. Source: Institut de la statistique du Québec. Converted from CAD to USD using a yearly average exchange rate of 0.989 CAD/USD (Source: bank of Canada).
- fraction, process water, to air: 0.15 dimensionless; lognormal variance with pedigree 0.092025, pedigree (4,4,3,2,4)
- world gross domestic product 2011: 7e13 USD(2011); name worldGDP2011; lognormal variance with pedigree 0.0006, pedigree (1,1,1,1,1)
  Comment: World Gross domestic product for 2011, expressed in 2011 USD. Source: World Bank.

## Reference product
- carton board box production, with gravure printing: 1 kg; By-product classification allocatable product; CPC 32153: Cartons, boxes, cases, record sleeves and other packing containers (except bags) of paper, paperboard, cellulo[…]; HS2017 4819: Cartons, boxes, cases, bags and the like, of paper, paperboard, cellulose wadding or fibres; box files, lette[...]
  production volume 0.0177714 kg
    Gross approximation of Quebec production volume using relative value of Quebec GDP to world GDP
  properties: carbon allocation 0 kg, carbon content 0, price 0.85 EUR2005

## Inputs from technosphere
- electricity, medium voltage: 0.64 kWh; lognormal variance with pedigree 0.0526, pedigree (1,3,5,5,1)
  Average from 1 Swiss producer
  Uncertainty: a
- hazardous waste, for underground deposit: -1.2e-5 kg; lognormal variance with pedigree 0.0146, pedigree (1,3,3,5,1)
  Average from 1 Swiss producer
  Uncertainty: a
  production volume
    Calculated from the production volume of carton board box production, with gravure printing in proportion to the respective output amounts.
  properties: carbon content, fossil 0.554667, dry mass 1 kg, wet mass 1 kg
  note on carbon content, fossil: Tab A.6, ecoinvent v2.2 report 13_I, average hazardous waste composition was used, and referred to 0% water mass. No waste-specific emission are currently inventoried for underground deposits. Accordingly, no waste composition must be specified. For generic, average waste to underground deposit deposition in a 200 liter steel drum without cement solidification is assumed (ecoinvent v2.2 report 13_I).
- heat, district or industrial, natural gas: 0.0013775 MJ; lognormal variance with pedigree 0.0526, pedigree (1,3,5,5,1)
  Average from 1 Swiss producer
  Uncertainty: a
  properties: heating value, net 1 MJ
- heat, district or industrial, other than natural gas: 0.4655 MJ; lognormal variance with pedigree 0.0526, pedigree (1,3,5,5,1)
  Average from 1 Swiss producer
  Uncertainty: a
  properties: heating value, net 1 MJ
- municipal solid waste: -0.0517 kg; lognormal variance with pedigree 0.0146, pedigree (1,3,3,5,1)
  Average from 1 Swiss producer
  Uncertainty: a
  production volume
    (same comment as for hazardous waste, for underground deposit)
  properties: carbon content, fossil 0.171549, carbon content, non-fossil 0.194173, dry mass 0.771 kg, heating value, net 11.74 MJ, water content 0.297017, wet mass 1 kg
  note on carbon content, fossil: MSW composition in tab 4.1, ecoinvent v2.2 report 13_I. C content referred to 1 kg DM
  note on heating value, net: Value taken from the general comment of the treatment dataset.
- packaging box factory: 1.43e-9 unit; lognormal variance with pedigree 0.448, pedigree (4,5,5,5,5)
  Own assumption
  Uncertainty: o
- printing ink, offset, without solvent, in 47.5% solution state: 0.0349 kg; lognormal variance with pedigree 0.0526, pedigree (1,3,5,5,1)
  Average from 1 Swiss producer
  Uncertainty: a
  properties: carbon content, fossil 0.455266, carbon content, non-fossil 0.221773, dry mass 1 kg, heating value, net 20.51 MJ, wet mass 1 kg
  note on carbon content, fossil: C content was calculated as an addition of C content in the raw materials.
- solvent, organic: 0.0311 kg; lognormal variance with pedigree 0.0526, pedigree (1,3,5,5,1)
  Average from 1 Swiss producer
  Uncertainty: a
  properties: carbon content, fossil 0.63072, dry mass 1 kg, heating value, net 19.11 MJ, wet mass 1 kg
  note on carbon content, fossil: Mixture of 15 of the most often used solvents (list in ecoinvent v2.2 report 11-III, pg 293). C content was calculated as an unweighted average of C content of the different solvents

## Inputs from nature
- Water, unspecified natural origin [natural resource, in water]: 0.00011 m3; lognormal variance with pedigree 0.0526, pedigree (1,3,5,5,1)
  Average from 1 Swiss producer
  Uncertainty: a

## Emissions to nature
- Ammonia [air, urban air close to ground]: 4e-7 kg; lognormal variance with pedigree 0.0926, pedigree (1,3,5,5,1)
  Average from 1 Swiss producer
  Uncertainty: a
- Water [air, unspecified]: 1.65e-5 m3; lognormal variance with pedigree 0.0827, pedigree (2,2,5,5,1)
  Calculated value based on literature values and expert opinion. See comments in the parametres" comment field.
- BOD5, Biological Oxygen Demand [water, surface water]: 0.00027 kg; lognormal variance with pedigree 0.0926, pedigree (1,3,5,5,1)
  Calculated as 0.5*COD.
  Uncertainty: a
- COD, Chemical Oxygen Demand [water, surface water]: 0.000135 kg; lognormal variance with pedigree 0.0926, pedigree (1,3,5,5,1)
  Calculated as COD (g O2) = 2.7*TOC (gC).
  Uncertainty: a
- Chromium III [water, surface water]: 1.85e-5 kg; lognormal variance with pedigree 0.0926, pedigree (1,3,5,5,1)
  Average from 1 Swiss producer
  Uncertainty: a
- DOC, Dissolved Organic Carbon [water, surface water]: 5e-5 kg; lognormal variance with pedigree 0.0926, pedigree (1,3,5,5,1)
  Calculated as equal to TOC.
  Uncertainty: a
- Lead II [water, surface water]: 1.2e-5 kg; lognormal variance with pedigree 0.0926, pedigree (1,3,5,5,1)
  Average from 1 Swiss producer
  Uncertainty: a
- Nickel II [water, surface water]: 1.85e-5 kg; lognormal variance with pedigree 0.0926, pedigree (1,3,5,5,1)
  Average from 1 Swiss producer
  Uncertainty: a
- TOC, Total Organic Carbon [water, surface water]: 5e-5 kg; lognormal variance with pedigree 0.0926, pedigree (1,3,5,5,1)
  Average from 1 Swiss producer
  Uncertainty: a
- Water [water, unspecified]: 9.35e-5 m3; lognormal variance with pedigree 0.0827, pedigree (2,2,5,5,1)
  (same comment as for Water)
  property carbon content, fossil 0; name C_content_fossil
  property carbon content, non-fossil 0; name C_content_non_fossil
  property dry mass 0 kg; name DM
  property water in wet mass 1000 kg; name WWM
  property wet mass 1000 kg; name WM
