# treatment of waste natural gas, sweet, burned in production flare

Dataset: EcoSpold 2, unit process
Geography: GLO
Time period: 1999-01-01 to 2023-12-31
Technology level: current
Classification: EcoSpold01Categories: natural gas/production
Classification: ISIC rev.4 ecoinvent: 0620:Extraction of natural gas
Tags: Treatment
Scenario: Business-as-Usual
System model: Allocation, cut-off by classification
Share of production covered: 100 %
Generated by: Christoph Meili
Published in: Meili, C. 2022
Database: ecoinvent
isCopyrightProtected: true
accessRestrictedTo: 1

## General comment
This activity represents the burning of sweet natural gas in production flare. Flaring is the controlled and intentional burning of natural gas as part of production and processing
of crude oil and natural gas. Reasons for flaring gas include for safety, disposal, lack of infrastructure for gas capture, storage and transmission, or due to low profitabilty (compared to crude petroleum oil).
Flaring releases greenhouse gases like CO2, CH4, NOx and other gases like SO2 into the atmosphere. Following the approach of Meili et al. (2021), overall region-specific emission data for CH4, NOx and SO2 are provided in the main activities for the production of crude oil and natural gas (as described in chapters 9.2 and 9.5 in Meili et al., 2021). Only the remaining combustion gases released are estimated in this inventory for sweet gas treated by being burned in production flare.
Source: C. Meili, N. Jungbluth, M. Bussa (2021) Life cycle inventories of crude oil and natural gas extraction. ESU-services Ltd. commissioned by the Federal Office for the Environment (FOEN) and the “Verband der Schweizerischen Gasindustrie (VSG), Schaffhausen, Switzerland, DOI: 10.13140/RG.2.2.29142.78409, http://esu-services.ch/data/public-lci-reports/

## Included activities start
Flaring losses of natural gas are modelled including the resource extraction from ground (which is not included in figures about natural gas production) and the emissions to air. (Meili et al. 2021)

## Included activities end
Emissions from treatment of sweet natural gas in production flare.

## Geography
Data is based on Norwegian environmental report.

## Technology
Data is based on the Norwegian data (offshore combined production). No information on technology.

## Time period
The figures are an average for the data of 1999 and 2000, except for the NMVOC emissions, where no data for 2000 was available

## Reference product
- waste natural gas, sweet: -1 MJ; name RP_amount; By-product classification Waste; CPC 39990: Other wastes n.e.c.; HS2017 271121: Petroleum gases and other gaseous hydrocarbons; in gaseous state, natural gas
  EcoSpold01Location=GLO
  production volume 5.4e12 MJ; = 150000000000*36.0
    The World Bank (2020) reported the total amount of gas flared in 2019 to 150'000 million Nm3 per year (as cited in Meili et al. 2021, tab. 9.1), and assuming 36.0 MJ per cubic meter. Source: World Bank 2020 World Bank (2020) WorldDataBank for Global Gas Flaring Reduction, retrieved from: http://www.worldbank.org/en/programs/gasflaringreduction#7.
  property price 0 EUR2005
    Waste products are assigned a price of zero as they are assumed to require further treatment.
  properties: carbon allocation 0 kg, carbon content 0

## Inputs from nature
- Gas, natural [natural resource, in ground]: 0.0277778 Sm3; = 1*abs(RP_amount)/36.0; lognormal variance with pedigree 0.0027, pedigree (1,3,3,3,1)
  Environmental report for Norway (Faist-Emmenegger et al. 2007, tab. 6.56)
  Uncertainty: environmental report for Norway.
- Oxygen [natural resource, in air]: 0.0495299 kg; = (2*15.999)/(1*12.011+2*15.999)*CO2_amount+(1*15.999)/(1*12.011+1*15.999)*CO_amount+(1*15.999)/(2*14.007+1*15.999)*NOx_amount+(2*15.999)/(1*32.06+2*15.999)*SO2_amount; lognormal variance with pedigree 0.0187, pedigree (2,2,4,5,3)
  Input of oxygen from air, balanced stoichometrically against emissions of CO, CO2, NOx, and SO2. Uncertainty set equal to that of CO2.
  Uncertainty: environmental report for Norway.

## Emissions to nature
- Carbon dioxide, fossil [air, non-urban air or from high stacks]: 0.0681 kg; name CO2_amount; = 2.4516*abs(RP_amount)/36.0; lognormal variance with pedigree 0.0187, pedigree (2,2,4,5,3)
  (same comment as for Gas, natural)
- Carbon monoxide, fossil [air, non-urban air or from high stacks]: 2.77778e-5 kg; name CO_amount; = 0.001*abs(RP_amount)/36.0; lognormal variance with pedigree 0.6768, pedigree (2,2,4,3,3)
  Standard emission factor (EFDB 2011; in Meili et al. 2021, tab. 9.2)
  Uncertainty: Standard emission factor (EFDB 2011; in Meili et al. 2021, tab. 9.2)
- Mercury II [air, non-urban air or from high stacks]: 5.55556e-9 kg; = 2.00E-07*abs(RP_amount)/36.0; lognormal variance with pedigree 0.0842, pedigree (4,2,4,3,3)
  Calculated, based on gas composition (Faist-Emmenegger et al. 2007, tab. 6.56)
  Uncertainty: data calculated on the basis of gas composition
- NMVOC, non-methane volatile organic compounds [air, non-urban air or from high stacks]: 8.28e-7 kg; = 2.9808E-05*abs(RP_amount)/36.0; lognormal variance with pedigree 0.1688, pedigree (2,2,5,3,3)
  Environmental report for Norway (Faist-Emmenegger et al. 2007, tab. 6.56)
  Uncertainty: Environmental report for Norway (Faist-Emmenegger et al. 2007, tab. 6.56)
- Particulate Matter, < 2.5 um [air, non-urban air or from high stacks]: 1.5e-5 kg; = 5.40E-04*abs(RP_amount)/36.0; lognormal variance with pedigree 0.1788, pedigree (2,2,5,3,3)
  Estimation for refinery flare from (Jungbluth 2003; in Meili et al. 2021, tab. 9.2)
  Uncertainty: Estimation for refinery flare from (Jungbluth 2003; in Meili et al. 2021, tab. 9.2)
- Radon-222 [air, non-urban air or from high stacks]: 0.0111111 kBq; = 0.400*abs(RP_amount)/36.0; lognormal variance with pedigree 0.3688, pedigree (2,2,5,3,3)
  Estimation, average value (Schori 2012; in Meili et al. 2021, tab. 9.2)
  Uncertainty: Estimation, average value (Schori 2012; in Meili et al. 2021, tab. 9.2)

## Sampling procedure
Data is based on the annual reports on emissions and discharges submitted by each individual operator. The emissions and discharges are estimated according to guidelines given by the Norwegian authorities and OLF (Norwegian Oil Industry Association).

## Extrapolations
Norwegian data are assumed to be representative for standard flaring.
