# solid bleached and unbleached board carton production

Dataset: EcoSpold 2, unit process
Geography: CA-QC
Time period: 2018-01-01 to 2023-12-31
Technology level: current
Classification: ISIC rev.4 ecoinvent: 1701:Manufacture of pulp, paper and paperboard
Synonyms: SBB, SUB
Scenario: Business-as-Usual
System model: Allocation, cut-off by classification
Share of production covered: 90 %
Generated by: Pascal Lesage
Database: ecoinvent
isCopyrightProtected: true
accessRestrictedTo: 1

## General comment
This dataset is a copy of the respective European actvity. It is an aggregated process which includes the production of SSB or SUB, transport of the board to converting sites and converting of the board (printing, cutting, creasing) into blank boxes ready for delivery. SSB (also known as SBS and GZ) and SUB (also known as SUS) are packaging grades of board used to manufacture cartons. They are made using 100% virgin fibres. SBB is typically made from pure bleached chemical pulp with two or three layers of coating on the top surface and one or more layers on the reverse. There are also uncoated grades. Typical markets include cosmetics, pharmaceuticals, graphics, tobacco and luxury packaging. SUB is typically made from pure unbleached chemical pulp with two or three layers of coating on the top surface. In some cases, a white reverse surface is applied. It is primarily used as beverage carriers for bottles and cans, as it is very strong and can be made resistant to water. It is used where strength of packaging is important. SUB may also be used in the production of liquid beverage cartons and liquid food cartons. The manufacture of these grades is in integrated mills, but some pulp is purchased. The board is converted into a carton at a converting site which typically includes a printing process and cutting/creasing of the board into carton blanks, ready for delivery to and erection by the packer/filler.
Data for the production of SBB/SUB and conversion of the board into cartons were provided by the European industry associations for cartonboard producers (Pro Carton) and convertors (ECMA European Carton Makers Association).
BOARD PRODUCTION: The data for the production of SUB/SBB were collected from four European mills, together producing in excess of 90% of the total annual production of SSB/SUB in Europe in 2017 (which is estimated at approximately 1 100 000 tonnes net saleable product. The mills contributing with data are located in Finland and Sweden. The mills have a production volume of between 55 000 – 470 000 tonnes net saleable paper product . The data is collated by Pro Carton in their internal report "European Environmental Database for Cartonboard and Carton Production", which is not made publicly available.
CARTON CONVERTING: The carton converting data were collected from 33 European factories together representing the production of over 380 000 tonnes cartons. hese convertors were located in Austria, Belgium, France, Germany, Poland, Romania, Spain, Turkey, Ukraine, and the United Kingdom. They varied in size producing between 1 000 and 50 000 tonnes of finished cartons ready for shipment.

## Included activities start
The process starts with the reception of wood, wood chips, and/or market pulp at the papermill.

## Included activities end
This module includes the European production of solid bleached board (SBB) or solid unbleached board (SUB) in a papermill and conversion of the board into printed, cut and creased cartons ready for delivery to the packer/filler. Transport of the board between the mill and the converting operation is included. For the board production, wood handling, pulping and bleaching, board production, energy production on-site and internal waste water treatment are included. For the converting process, printing, cutting and creasing is included.

## Geography
European average data (weighted according to production volumes), provided by Pro Carton from the data survey that underpins their 2018 European Environmental Database for Cartonboard and Carton Production. Data covers the main producers in Europe

## Technology
Average of present technology used, weighted according to the production volumes of the mills participating in the original data survey

## Time period
Inventory data represent the year 2018. The production volume is valid for the year 2018.

## Reference product
- solid bleached and unbleached board carton: 1 kg; By-product classification allocatable product; CPC 32153: Cartons, boxes, cases, record sleeves and other packing containers (except bags) of paper, paperboard, cellulo[…]; HS2017 481920: Paper and paperboard; folding cartons, boxes and cases, of non-corrugated paper or paperboard
  production volume 3.24214e7 kg; name PV_board; = 8538437680*(0.19*1712562076052.284/85693321610361.34)
    Valid for 2018. The annual PV of Quebec was estimated by scaling the global PV according to the ratio of the global GDP and GDP of Quebec. The GDP of Quebec within total Canadian GDP is 19%
    Sources:
    Statcan 2018, Gross domestic product (GDP) at basic prices, by industry, provinces and territories (x 1,000,000), accessed at <https://www150.statcan.gc.ca/t1/tbl1/en/tv.action?pid=3610040201>, accessed April 2020
    UNSTATS, 2020: <https://unstats.un.org/unsd/snaama/Basic>, filtered for GDP. At current price- US Dollar, accessed April 2020
  property carbon content, fossil 0.0190874
    taken over from previous version of ecoinvent dataset "solid bleached board production 2000": fossil carbon content on a dry matter basis
  property carbon content, non-fossil 0.459
    biogenic carbon content on a dry matter basis; based on calculations using a methodology developed by CITPA - Guidelines for calculating Carbon footprints for paper-based packaging, CITPA, March 2018
  property heating value, net 9.8 MJ
    LHV is calculated based on the Carbon content of the product. More details can be found on the respective documentation.
  properties: allocation factor 0.966241, carbon allocation 0.440318 kg, carbon content 0.478087, dry mass 0.921 kg, price 0.844 EUR2005, true value 0.844, water content 0.0857763, water in wet mass 0.079 kg, wet mass 1 kg

## Inputs from technosphere
- acrylic varnish, with water, in 53% solution state: 0.0115575 kg; lognormal variance with pedigree 0.0044, pedigree (2,3,3,4,1)
  Average data from thirty three carton converting facilities, weighted according to production volumes - varnish
  properties: carbon content, fossil 0.2066, dry mass 0.53 kg, heating value, net 20.44 MJ, water content 0.886792, wet mass 1 kg
- aluminium scrap, post-consumer, prepared for melting: -0.00141152 kg; name a_BP7; lognormal variance with pedigree 0.0038, pedigree (3,3,1,4,1)
  Average data from thirty three carton converting facilities, weighted according to production volumes - aluminium printing plates from the process will all be sent for recycling after use
  production volume; = a_BP7*PV_board
    Calculated from production volume of reference product using the relative outputs.
  properties: dry mass 1 kg, price 0.806 EUR2005, wet mass 1 kg
- aluminium sulfate, powder: 0.00683295 kg; lognormal variance with pedigree 0.0039, pedigree (2,2,3,4,1)
  Average data from four European producers of SUB/SSB, weighted according to production volumes - Al2(SO4)3, Alum, recorded in the caterogy of inputs for Functional additives
  properties: dry mass 1 kg, wet mass 1 kg
- aluminium, primary, ingot: 0.00141152 kg; lognormal variance with pedigree 0.0058, pedigree (3,3,3,4,1)
  Average data from thirty three carton converting facilities, weighted according to production volumes - aluminium printing plates
  properties: dry mass 1 kg, wet mass 1 kg
- ash from paper production sludge: -0.000958593 kg; name a_BP1; lognormal variance with pedigree 0.0033, pedigree (3,2,1,4,1)
  Average data from four European producers of SUB/SSB, weighted according to production volumes. Represents 10% of the ash generated, the remaining quantity is described as being used for soil reconditioning or by other industries in the production of other products.
  production volume; = a_BP1*PV_board
    Calculated from the production volume of the reference product in proportion to the respective output amounts.
  properties: carbon content, non-fossil 0.0092, dry mass 1 kg, wet mass 1 kg
- bark chips, wet, measured as dry mass: 0.231872 kg; lognormal variance with pedigree 0.0053, pedigree (3,2,3,4,1)
  Average data from four European producers of SUB/SSB, as fuel, assumes calorific value of 13.6MJ/kg
  properties: carbon content, non-fossil 0.494, dry mass 1 kg, heating value, net 4.81 MJ, water content 1.4, wet mass 2.4 kg
- biowaste: -0.00276789 kg; name a_BP3; lognormal variance with pedigree 0.0033, pedigree (3,2,1,4,1)
  Average data from four European producers of SUB/SSB, weighted according to production volumes. Consists of 0.000192511kg of fibre (primary sludge) and 0.002672kg of biological treatment sludge
  production volume; = a_BP3*PV_board
    (same comment as for ash from paper production sludge)
  properties: carbon content, non-fossil 0.1624, dry mass 0.4 kg, heating value, net 4.29 MJ, water content 1.5, wet mass 1 kg
  note on heating value, net: Value taken from the general comment of the treatment dataset.
- calcium carbonate, precipitated: 0.0681798 kg; lognormal variance with pedigree 0.0039, pedigree (2,2,3,4,1)
  Average data from four European producers of SUB/SSB, weighted according to production volumes
- chemical, organic: 0.00106148 kg; lognormal variance with pedigree 0.0039, pedigree (2,2,3,4,1)
  Average data from four European producers of SUB/SSB, weighted according to production volumes - Polyacrylates, recorded in the caterogy of inputs for coatings, pigments and binders
  properties: carbon content, fossil 0.628, dry mass 1 kg, heating value, net 19.03 MJ, wet mass 1 kg
  note on carbon content, fossil: This dataset is an unweighted average of 20 organic substances (listed in Tab 88.1, ecoinvent v2.2 report 8, part II), being part of the top100 chemicals included in this database. The C-content has also been calculated as an unweighted average of the C content of the substances composing this dataset.
- chimney: 1.77327e-8 m; lognormal variance with pedigree 0.0592, pedigree (4,5,3,4,4)
  Calculated from fossil fuels consumed
- clay: 0.0175966 kg; lognormal variance with pedigree 0.0039, pedigree (2,2,3,4,1)
  Average data from four European producers of SUB/SSB and thirty three carton converting facilities, weighted according to production volumes - 0.0182114023950605 kg clay recorded in the caterogy of inputs for coatings, pigments and binders
  properties: dry mass 0.965 kg, water content 0.0362694, wet mass 1 kg
- diesel, low-sulfur: 0.00042701 kg; lognormal variance with pedigree 0.0039, pedigree (2,2,3,4,1)
  (same comment as for calcium carbonate, precipitated)
  properties: carbon content, fossil 0.865, dry mass 1 kg, heating value, net 42.8 MJ, wet mass 1 kg
- electricity, medium voltage: 1.08895 kWh; lognormal variance with pedigree 0.0033, pedigree (1,2,3,4,1)
  Average data from four European producers of SUB/SSB and thirty three carton converting facilities. Among these facilities, electricity inputs are distributed over the following countries with the respective shares: AT: 0.03; BE: 0.01; DE: 0.08; ES: 0.01; FI: 0.03; FR: 0.05; IT: 0.01; PL: 0.03; RO: 0.01; SE: 0.68; TR: 0.03; GB: 0.04; UA: 0.01. Since these facilities do not cover all European FBB production, the average European grid mix is applied here.
- ethylene vinyl acetate copolymer: 0.00143558 kg; lognormal variance with pedigree 0.0039, pedigree (2,2,3,4,1)
  Average data from four European producers of SUB/SSB, weighted according to production volumes: 0.00073682755902954kg of Polyvinyl acetate recorded in the caterogy of inputs for coatings, pigments and binders.
  Plus average data from thirty three carton converting facilities, weighted according to production volumes: Proxy for cold glue for box making (0.000672729570509267 kg cold glue) and proxy for hot melt glue for box making (0.0000761820098111169 kg hot melt glue)
  properties: carbon content, fossil 0.79734, dry mass 1 kg, heating value, net 35.99 MJ, wet mass 1 kg
- heavy fuel oil: 0.00456378 kg; lognormal variance with pedigree 0.0053, pedigree (3,2,3,4,1)
  Average data from four European producers of SUB/SSB
  properties: carbon content, fossil 0.849, dry mass 1 kg, heating value, net 41.2 MJ, wet mass 1 kg
- hydrogen peroxide, without water, in 50% solution state: 0.00355101 kg; lognormal variance with pedigree 0.0039, pedigree (2,2,3,4,1)
  Average data from four European producers of SUB/SSB, weighted according to production volumes - H2O2, hydrogen peroxide recorded in the caterogy of inputs for Functional additives
  properties: dry mass 1 kg, heating value, net 7.13 MJ, wet mass 1 kg
- latex: 0.0143457 kg; lognormal variance with pedigree 0.0039, pedigree (2,2,3,4,1)
  (same comment as for calcium carbonate, precipitated)
  properties: carbon content, fossil 0.872983, dry mass 1 kg, heating value, net 26.45 MJ, wet mass 1 kg
  note on carbon content, fossil: The Styrene-butadiene dispersion is based on styrene and 1,3-butadiene plus co-monomers like i.e. ac-rylonitrile or (meth-)acrylic acid (ecoinvent v2.2 report 11_III). Following specifications in US Patent 3,875,101 (1971), the dispersion was considered as: 52.5% 1.3-butadiene (0.8571 kg C/kg dry mass); 43% styrene (0.9231 kg C/kg dry mass); 2% acrylic acid (0.5 kg C/kg dry mass); 2.5% acrolein (C3H4O, MW=56; 0.6429 kg C/kg dry mass)
- light fuel oil: 0.00740169 kg; lognormal variance with pedigree 0.0039, pedigree (2,2,3,4,1)
  (same comment as for calcium carbonate, precipitated)
  properties: carbon content, fossil 0.862, dry mass 1 kg, heating value, net 42.6 MJ, wet mass 1 kg
- maize starch: 0.00669626 kg; lognormal variance with pedigree 0.0039, pedigree (2,2,3,4,1)
  Average data from four European producers of SUB/SSB, weighted according to production volumes - 0.00492671763975889kg equates to input of corn starch; 0.002003kg equates to 50% of the input recorded as Modified starch (sizing agents)
  properties: carbon content, non-fossil 0.46, dry mass 0.86 kg, heating value, net 11.64 MJ, water content 0.162791, wet mass 1 kg
  note on carbon content, non-fossil: C-content of starch is considered 46% on dry mass basis (from "Evolutionary and Biochemical Aspects", A.D. Kay and T. Vrede (in Global Ecology, 2010, Elsevier B.V., S.E. Jørgensen Ed.)).
- natural gas, high pressure: 0.0173428 m3; lognormal variance with pedigree 0.0033, pedigree (1,2,3,4,1)
  Average data from four European producers of SUB/SSB and thirty three carton converting facilities, weighted according to production volumes
  properties: carbon content, fossil 0.741, dry mass 0.735 kg, heating value, gross 40 MJ, heating value, net 36 MJ, wet mass 0.735 kg
  note on heating value, gross: At standard conditions; based on Meili et al. (2022) section 5.2
  note on heating value, net: Literature value, Source: Christoph Meili;Niels Jungbluth;Maresa Bussa (2021) Life cycle inventories of crude oil and natural gas extraction. ESU-services Ltd. commissioned by BAFU & VSG, Schaffhausen, Switzerland, http://esu-services.ch/data/public-lci-reports/
- oxygen, liquid: 0.00598731 kg; lognormal variance with pedigree 0.0053, pedigree (3,2,3,4,1)
  Average data from four European producers of SUB/SSB
  properties: dry mass 1 kg, wet mass 1 kg
- packaging film, low density polyethylene: 0.00112906 kg; lognormal variance with pedigree 0.0044, pedigree (2,3,3,4,1)
  Average data from thirty three carton converting facilities, weighted according to production volumes - plastic stretch/shrink film
  properties: carbon content, fossil 0.857143, dry mass 1 kg, heating value, net 42.47 MJ, wet mass 1 kg
- paper mill, integrated: 5.25635e-11 unit; lognormal variance with pedigree 0.3966, pedigree (4,5,5,4,4)
  Own assumption
  Uncertainty: own assumption
- potato starch: 0.00193586 kg; lognormal variance with pedigree 0.0039, pedigree (2,2,3,4,1)
  Average data from four European producers of SUB/SSB, weighted according to production volumes ; 0.002003kg equates to 50% of the input recorded as Modified starch (sizing agents)
  properties: carbon content, non-fossil 0.46, dry mass 0.8 kg, heating value, net 10.66 MJ, water content 0.25, wet mass 1 kg
- printing ink, offset, without solvent, in 47.5% solution state: 0.00410376 kg; lognormal variance with pedigree 0.0044, pedigree (2,3,3,4,1)
  Average data from thirty three carton converting facilities, weighted according to production volumes - Flexo ink for printing (0.000799844721804066), plus off set ink for printing (0.00344729857465508)
  properties: carbon content, fossil 0.455266, carbon content, non-fossil 0.221773, dry mass 1 kg, heating value, net 20.51 MJ, wet mass 1 kg
  note on carbon content, fossil: C content was calculated as an addition of C content in the raw materials.
- pulpwood, hardwood, measured as solid wood under bark: 0.00121553 m3; lognormal variance with pedigree 0.0053, pedigree (3,2,3,4,1)
  Average data from four European producers of SUB/SSB. Reported input data has been revised down by 10% based on expert jusgement to balance fibre flows and carbon flows. Conversion factors used by data providers considered to be a source of error.
  properties: basic wood density 563.2, carbon content, non-fossil 0.494, dry mass 625.778 kg, dry mass under bark 563.2 kg, heating value, net 6071.3 MJ, water content 0.8, wet mass 1126.4 kg
  note on heating value, net: Value based on "hardwood forestry, mixed species, sustainable forest management"The property is based on a value of 11.58MJ/kg
- pulpwood, softwood, measured as solid wood under bark: 0.000703423 m3; lognormal variance with pedigree 0.002725, pedigree (1,2,3,2,1)
  Input of softwood, spruce has a direct ActivityLink to the spruce forestry process. Average data from four European producers of SUB/SSB. Reported input has been revised down by 10% based on expert judgement to balance fibre flows and carbon flows. Conversion factors used by data providers considered to be a source of error.
  properties: basic wood density 387.2, carbon content, non-fossil 0.494, dry mass 440 kg, dry mass under bark 387.2 kg, heating value, net 4483.78 MJ, water content 1.4, wet mass 1056 kg
  note on heating value, net: Value based on "softwood forestry, mixed species, sustainable forest management"The property is based on a value of 11.58MJ/kg
- pulpwood, softwood, measured as solid wood under bark: 0.00078652 m3; lognormal variance with pedigree 0.0039, pedigree (2,2,3,4,1)
  Average data from four European producers of SUB/SSB. Reported input has been revised down by 10% based on expert jusgement to balance fibre flows and carbon flows. Conversion factors used by data providers considered to be a source of error.
- pulpwood, softwood, measured as solid wood under bark: 0.000534331 m3; lognormal variance with pedigree 0.0053, pedigree (3,2,3,4,1)
  (same comment as for pulpwood, softwood, measured as solid wood under bark)
- quicklime, milled, packed: 0.0044194 kg; lognormal variance with pedigree 0.0053, pedigree (3,2,3,4,1)
  Average data from four European producers of SUB/SSB
  properties: dry mass 0.99 kg, water content 0.010101, wet mass 1 kg
- rosin size, for paper production: 0.000380226 kg; lognormal variance with pedigree 0.0039, pedigree (2,2,3,4,1)
  Average data from four European producers of SUB/SSB, weighted according to production volumes - Rosin size (sizing agents) recorded in the caterogy of inputs for Functional additives
  properties: carbon content, non-fossil 0.515474, dry mass 1 kg, heating value, net 15.62 MJ, wet mass 1 kg
- sheet rolling, aluminium: 0.00141152 kg; lognormal variance with pedigree 0.0058, pedigree (3,3,3,4,1)
  Combined with the input of aluminium, primary, ingot, this is a proxy for aluminium printing plates for the litho printing process. A litho printing plate is a thin sheet of anodised fine grain hardened aluminium used in the printing industry. The photographically prepared (etched picture on to the aluminium) printing plate is treated chemically so the image will accept ink. This processing of the sheet usually occurs at the converting site, which will have its own prepress facility. The energy used in the prepress activity is captured in the energy data collected from the sites, but data on chemicals used etc., is not captured. However, it is anticipated that these will fall below the cur-off criteria defined in the data collection exercise.
- sodium chlorate, powder: 0.00657652 kg; lognormal variance with pedigree 0.0039, pedigree (2,2,3,4,1)
  Average data from four European producers of SUB/SSB, weighted according to production volumes - NaClO3 recorded in the caterogy of inputs for Functional additives
  properties: dry mass 1 kg, wet mass 1 kg
- sodium hydroxide, without water, in 50% solution state: 0.0188685 kg; lognormal variance with pedigree 0.0039, pedigree (2,2,3,4,1)
  Average data from four European producers of SUB/SSB, weighted according to production volumes - NaOH recorded in the caterogy of inputs for Functional additives
  properties: dry mass 1 kg, heating value, net 3.03 MJ, wet mass 1 kg
- sulfate pulp, bleached: 0.0133112 kg; lognormal variance with pedigree 0.0039, pedigree (2,2,3,4,1)
  (same comment as for calcium carbonate, precipitated)
  properties: carbon content, non-fossil 0.494, dry mass 0.9 kg, heating value, net 13.23 MJ, water content 0.111111, wet mass 1 kg
  note on carbon content, non-fossil: C content of dry mass of sulfate pulp is 0.494 kgC/kg dry wood (ecoinvent v2.2 report 6_IX & ecoinvent v2.2 report 9). No other C containing products in the formulation of the pulp.
- sulfate pulp, unbleached: 0.00153449 kg; lognormal variance with pedigree 0.0053, pedigree (3,2,3,4,1)
  Average data from four European producers of SUB/SSB
  properties: carbon content, non-fossil 0.494, dry mass 0.9 kg, heating value, net 13.23 MJ, price 0.355 EUR2005, water content 0.111111, wet mass 1 kg
- sulfuric acid: 0.0192251 kg; lognormal variance with pedigree 0.0039, pedigree (2,2,3,4,1)
  Average data from four European producers of SUB/SSB, weighted according to production volumes - H2SO4 recorded in the caterogy of inputs for Functional additives
  properties: dry mass 1 kg, wet mass 1 kg
- transport, freight train: 0.191807 metric ton*km; lognormal variance with pedigree 0.2106, pedigree (5,5,3,4,4)
  Transport distance based on eurostat transport statistics for railway transport of goods. The transport data was extracted from the database leaf "Railway transport - goods transported, by group of goods - from 2008 onwards based on NST 2007 (1 000 t, million tkm) (rail_go_grpgood)" (http://ec.europa.eu/eurostat/data/database) on the 2018-06-01. The transport distance was calculated based on the total mass of goods transported and total payload-distance for the NST 2007 category "GT06 - Wood and products of wood and cork (except furniture); articles of straw and plaiting materials; pulp, paper and paper products; printed matter and recorded media" in the year 2016 for all countries for which data was available. The average distance of railway transport for goods in this category in 2016 was 328 km. The fraction of goods transported by rail (in terms of mass) relative to the total mass of goods transported by road, rail and inland waterways was 7.7% in 2016. Therefore, the average distance that goods travelled by rail in 2016 was 25 km. This value is assumed to be representative for Europe.
- transport, freight, inland waterways, barge: 0.0254911 metric ton*km; lognormal variance with pedigree 0.2106, pedigree (5,5,3,4,4)
  Transport distance based on eurostat transport statistics for transport of goods by inland waterways. The transport data was extracted from the database leaf "Transport by type of good (from 2007 onwards with NST2007) (iww_go_atygo)" (http://ec.europa.eu/eurostat/data/database) on the 2018-06-01. The transport distance was calculated based on the total mass of goods transported and total payload-distance for the NST 2007 category "GT06 - Wood and products of wood and cork (except furniture); articles of straw and plaiting materials; pulp, paper and paper products; printed matter and recorded media" in the year 2016 for the European Union (current composition). The average distance of transport by inland waterways for goods in this category in 2016 was 322 km. The fraction of goods transported by inland waterways (in terms of mass) relative to the total mass of goods transported by road, rail and inland waterways was 0.6% in 2016. Therefore, the average distance that goods travelled by inland waterways in 2016 was 2 km. This value is assumed to be representative for Europe.
- transport, freight, lorry, unspecified: 0.0561603 metric ton*km; lognormal variance with pedigree 0.2106, pedigree (5,5,3,4,4)
  Transport distance based on eurostat transport statistics for road freight transport. The transport data was extracted from the database leaf 'Annual road freight transport, by type of goods and type of transport [1 000 t, Mio Tkm], from 2008 onwards (road_go_ta_tg)' (http://ec.europa.eu/eurostat/data/database) on the 2018-06-01. The transport distance was calculated based on the total mass of goods transported and total payload-distance for the NST 2007 category "GT06 - Wood and products of wood and cork (except furniture); articles of straw and plaiting materials; pulp, paper and paper products; printed matter and recorded media" in the year 2016 for all countries for which data was available. The average distance of road transport for goods in this category in 2016 was 203 km. The fraction of goods transported by road (in terms of mass) relative to the total mass of goods transported by road, rail and inland waterways was 91.8% in 2016. Therefore, the average distance that goods travelled by road in 2016 was 187 km. This value is assumed to be representative for Europe.")
- waste mineral oil: -0.000436192 kg; name a_BP2; lognormal variance with pedigree 0.0033, pedigree (3,2,1,4,1)
  Average data from eight European producers of whitelined chip, weighted according to production volumes, recored as lubricant wastes
  production volume; = a_BP2*PV_board
    (same comment as for ash from paper production sludge)
  properties: carbon content, fossil 0.864444, dry mass 0.9 kg, heating value, net 34.7 MJ, water content 0.111111, wet mass 1 kg
  note on carbon content, fossil: Tab A.6, ecoinvent v2.2 report 13_I. C content has been calculated after data in the tables, and then referred to 1 kg DM
- wood ash mixture, pure: -0.00150105 kg; name a_BP6; lognormal variance with pedigree 0.0572, pedigree (4,5,1,4,4)
  Calculated from fossil fuels consumed
  production volume; = a_BP6*PV_board
    (same comment as for ash from paper production sludge)
  properties: carbon content, non-fossil 0.012, dry mass 1 kg, wet mass 1 kg
- wood chips, wet, measured as dry mass: 0.335473 kg; lognormal variance with pedigree 0.0039, pedigree (2,2,3,4,1)
  (same comment as for calcium carbonate, precipitated)
  properties: carbon content, non-fossil 0.494, dry mass 1 kg, heating value, net 10.84 MJ, water content 1.1, wet mass 2.1 kg
  note on heating value, net: Value based on the dataset 'softwood forestry, mixed species, sustainable forest management'

## Inputs from nature
- Water, lake [natural resource, in water]: 0.059563 m3; lognormal variance with pedigree 0.0053, pedigree (3,2,3,4,1)
  (same comment as for calcium carbonate, precipitated)

## Emissions to nature
- Acetaldehyde [air, urban air close to ground]: 2.24795e-7 kg; lognormal variance with pedigree 0.098, pedigree (4,5,3,1,4)
  Calculated from fossil fuels consumed
- Acetic acid [air, urban air close to ground]: 8.07145e-7 kg; lognormal variance with pedigree 0.098, pedigree (4,5,3,1,4)
  Calculated from fossil fuels consumed
- Acetone [air, urban air close to ground]: 2.7794e-8 kg; lognormal variance with pedigree 0.098, pedigree (4,5,3,1,4)
  Calculated from fossil fuels consumed
- Ammonia [air, urban air close to ground]: 5.50615e-6 kg; lognormal variance with pedigree 0.098, pedigree (4,5,3,1,4)
  Calculated from fossil fuels consumed
- Arsenic ion [air, urban air close to ground]: 5.56227e-9 kg; lognormal variance with pedigree 0.098, pedigree (4,5,3,1,4)
  Calculated from fossil fuels consumed
- Benzene [air, urban air close to ground]: 4.73045e-6 kg; lognormal variance with pedigree 0.098, pedigree (4,5,3,1,4)
  Calculated from fossil fuels consumed
- Benzo(a)pyrene [air, urban air close to ground]: 1.63743e-9 kg; lognormal variance with pedigree 0.098, pedigree (4,5,3,1,4)
  Calculated from fossil fuels consumed
- Bromine [air, urban air close to ground]: 1.89208e-7 kg; lognormal variance with pedigree 0.098, pedigree (4,5,3,1,4)
  Calculated from fossil fuels consumed
- Butane [air, urban air close to ground]: 3.35036e-6 kg; lognormal variance with pedigree 0.358, pedigree (4,5,3,1,4)
  Calculated from fossil fuels consumed
- Cadmium II [air, urban air close to ground]: 2.20742e-9 kg; lognormal variance with pedigree 0.708, pedigree (4,5,3,1,4)
  Calculated from fossil fuels consumed
- Calcium II [air, urban air close to ground]: 1.84681e-5 kg; lognormal variance with pedigree 0.358, pedigree (4,5,3,1,4)
  Calculated from fossil fuels consumed
- Carbon dioxide, fossil [air, urban air close to ground]: 0.0754735 kg; lognormal variance with pedigree 0.0027, pedigree (1,2,3,1,1)
  (same comment as for calcium carbonate, precipitated)
- Carbon dioxide, non-fossil [air, urban air close to ground]: 2.44266 kg; lognormal variance with pedigree 0.0047, pedigree (3,2,3,1,1)
  Average data from four European producers of SUB/SSB, weighted according to production volumes. Emissions from black liquor for one mill were estimated by RISE based on a fibre balance for the mill. Emissions from two mills were calculated by RISE using a standard emissions factor for black liquor.
- Carbon monoxide, fossil [air, urban air close to ground]: 1.23423e-5 kg; lognormal variance with pedigree 0.708, pedigree (4,5,3,1,4)
  Calculated from fossil fuels consumed
- Carbon monoxide, non-fossil [air, urban air close to ground]: 0.000946038 kg; lognormal variance with pedigree 0.708, pedigree (4,5,3,1,4)
  Calculated from fossil fuels consumed
- Chlorine [air, urban air close to ground]: 5.67623e-7 kg; lognormal variance with pedigree 0.098, pedigree (4,5,3,1,4)
  Calculated from fossil fuels consumed
- Chromium III [air, urban air close to ground]: 1.34049e-8 kg; lognormal variance with pedigree 0.708, pedigree (4,5,3,1,4)
  Calculated from fossil fuels consumed
- Chromium VI [air, urban air close to ground]: 1.35403e-10 kg; lognormal variance with pedigree 0.708, pedigree (4,5,3,1,4)
  Calculated from fossil fuels consumed
- Cobalt II [air, urban air close to ground]: 6.11468e-9 kg; lognormal variance with pedigree 0.708, pedigree (4,5,3,1,4)
  Calculated from fossil fuels consumed
- Copper ion [air, urban air close to ground]: 3.0013e-7 kg; lognormal variance with pedigree 0.708, pedigree (4,5,3,1,4)
  Calculated from fossil fuels consumed
- Dinitrogen monoxide [air, urban air close to ground]: 8.06042e-6 kg; lognormal variance with pedigree 0.098, pedigree (4,5,3,1,4)
  Calculated from fossil fuels consumed
- Dioxins, measured as 2,3,7,8-tetrachlorodibenzo-p-dioxin [air, urban air close to ground]: 9.81263e-14 kg; lognormal variance with pedigree 0.098, pedigree (4,5,3,1,4)
  Calculated from fossil fuels consumed
- Ethanol [air, urban air close to ground]: 5.5588e-8 kg; lognormal variance with pedigree 0.098, pedigree (4,5,3,1,4)
  Calculated from fossil fuels consumed
- Ethyl benzene [air, urban air close to ground]: 9.46038e-8 kg; lognormal variance with pedigree 0.098, pedigree (4,5,3,1,4)
  Calculated from fossil fuels consumed
- Fluorine [air, urban air close to ground]: 1.57673e-7 kg; lognormal variance with pedigree 0.098, pedigree (4,5,3,1,4)
  Calculated from fossil fuels consumed
- Formaldehyde [air, urban air close to ground]: 1.25018e-6 kg; lognormal variance with pedigree 0.098, pedigree (4,5,3,1,4)
  Calculated from fossil fuels consumed
- Hexachlorobenzene [air, urban air close to ground]: 2.27049e-14 kg; lognormal variance with pedigree 0.098, pedigree (4,5,3,1,4)
  Calculated from fossil fuels consumed
- Hydrocarbons, aliphatic, alkanes, unspecified [air, urban air close to ground]: 3.13702e-6 kg; lognormal variance with pedigree 0.098, pedigree (4,5,3,1,4)
  Calculated from fossil fuels consumed
- Hydrocarbons, aliphatic, unsaturated [air, urban air close to ground]: 9.78129e-6 kg; lognormal variance with pedigree 0.098, pedigree (4,5,3,1,4)
  Calculated from fossil fuels consumed
- Hydrocarbons, aromatic [air, urban air close to ground]: 3.75564e-8 kg; lognormal variance with pedigree 0.098, pedigree (4,5,3,1,4)
  Calculated from fossil fuels consumed
- Hydrochloric acid [air, urban air close to ground]: 2.97411e-7 kg; lognormal variance with pedigree 0.098, pedigree (4,5,3,1,4)
  Calculated from fossil fuels consumed
- Hydrogen fluoride [air, urban air close to ground]: 1.18228e-8 kg; lognormal variance with pedigree 0.098, pedigree (4,5,3,1,4)
  Calculated from fossil fuels consumed
- Iron ion [air, urban air close to ground]: 1.51941e-7 kg; lognormal variance with pedigree 0.708, pedigree (4,5,3,1,4)
  Calculated from fossil fuels consumed
- Lead II [air, urban air close to ground]: 1.05704e-7 kg; lognormal variance with pedigree 0.708, pedigree (4,5,3,1,4)
  Calculated from fossil fuels consumed
- Magnesium [air, urban air close to ground]: 1.13525e-6 kg; lognormal variance with pedigree 0.708, pedigree (4,5,3,1,4)
  Calculated from fossil fuels consumed
- Manganese II [air, urban air close to ground]: 5.36088e-7 kg; lognormal variance with pedigree 0.708, pedigree (4,5,3,1,4)
  Calculated from fossil fuels consumed
- Mercury II [air, urban air close to ground]: 1.27573e-9 kg; lognormal variance with pedigree 0.708, pedigree (4,5,3,1,4)
  Calculated from fossil fuels consumed
- Methane, fossil [air, urban air close to ground]: 1.01609e-5 kg; lognormal variance with pedigree 0.098, pedigree (4,5,3,1,4)
  Calculated from fossil fuels consumed
- Methane, non-fossil [air, urban air close to ground]: 9.46038e-6 kg; lognormal variance with pedigree 0.098, pedigree (4,5,3,1,4)
  Calculated from fossil fuels consumed
- Methanol [air, urban air close to ground]: 9.44996e-8 kg; lognormal variance with pedigree 0.098, pedigree (4,5,3,1,4)
  Calculated from fossil fuels consumed
- Molybdenum VI [air, urban air close to ground]: 1.48235e-9 kg; lognormal variance with pedigree 0.708, pedigree (4,5,3,1,4)
  Calculated from fossil fuels consumed
- NMVOC, non-methane volatile organic compounds [air, urban air close to ground]: 2.20742e-5 kg; lognormal variance with pedigree 0.098, pedigree (4,5,3,1,4)
  Calculated from fossil fuels consumed
- Nickel II [air, urban air close to ground]: 1.09715e-7 kg; lognormal variance with pedigree 0.708, pedigree (4,5,3,1,4)
  Calculated from fossil fuels consumed
- Nitrogen oxides [air, urban air close to ground]: 0.000957115 kg; lognormal variance with pedigree 0.0427, pedigree (2,2,3,1,1)
  Average data from four European producers of SUB/SSB and calculated data (from fuel consumption) for thirty three carton converting facilities, weighted according to production volumes, NOx
- PAH, polycyclic aromatic hydrocarbons [air, urban air close to ground]: 8.16975e-8 kg; lognormal variance with pedigree 0.358, pedigree (4,5,3,1,4)
  Calculated from fossil fuels consumed
- Particulate Matter, < 2.5 um [air, urban air close to ground]: 0.000144423 kg; lognormal variance with pedigree 0.178, pedigree (4,5,3,1,4)
  Calculated from fossil fuels consumed
- Particulate Matter, > 10 um [air, urban air close to ground]: 4.44704e-7 kg; lognormal variance with pedigree 0.098, pedigree (4,5,3,1,4)
  Calculated from fossil fuels consumed
- Particulate Matter, > 2.5 um and < 10um [air, urban air close to ground]: 8.36917e-5 kg; lognormal variance with pedigree 0.0427, pedigree (2,2,3,1,1)
  Average data from four European producers of SUB/SSB, weighted according to production volumes, recorded as Dust (unspecified)
- Pentachlorophenol [air, urban air close to ground]: 2.5543e-11 kg; lognormal variance with pedigree 0.098, pedigree (4,5,3,1,4)
  Calculated from fossil fuels consumed
- Pentane [air, urban air close to ground]: 5.63609e-6 kg; lognormal variance with pedigree 0.098, pedigree (4,5,3,1,4)
  Calculated from fossil fuels consumed
- Phosphorus [air, urban air close to ground]: 9.46038e-7 kg; lognormal variance with pedigree 0.098, pedigree (4,5,3,1,4)
  Calculated from fossil fuels consumed
- Potassium I [air, urban air close to ground]: 7.3791e-5 kg; lognormal variance with pedigree 0.708, pedigree (4,5,3,1,4)
  Calculated from fossil fuels consumed
- Propane [air, urban air close to ground]: 9.40058e-7 kg; lognormal variance with pedigree 0.098, pedigree (4,5,3,1,4)
  Calculated from fossil fuels consumed
- Propionic acid [air, urban air close to ground]: 9.27958e-8 kg; lognormal variance with pedigree 0.098, pedigree (4,5,3,1,4)
  Calculated from fossil fuels consumed
- Selenium IV [air, urban air close to ground]: 2.22352e-9 kg; lognormal variance with pedigree 0.708, pedigree (4,5,3,1,4)
  Calculated from fossil fuels consumed
- Sodium I [air, urban air close to ground]: 4.23847e-6 kg; lognormal variance with pedigree 0.708, pedigree (4,5,3,1,4)
  Calculated from fossil fuels consumed
- Sulfur dioxide [air, urban air close to ground]: 0.000143939 kg; lognormal variance with pedigree 0.0033, pedigree (2,2,3,1,1)
  Average data from four European producers of SUB/SSB and calculated data (from fuel consumption) for thirty three carton converting facilities, weighted according to production volumes, SOx (as SO2)
- Toluene [air, urban air close to ground]: 1.88932e-6 kg; lognormal variance with pedigree 0.098, pedigree (4,5,3,1,4)
  Calculated from fossil fuels consumed
- Vanadium V [air, urban air close to ground]: 1.85293e-7 kg; lognormal variance with pedigree 0.708, pedigree (4,5,3,1,4)
  Calculated from fossil fuels consumed
- Water [air, urban air close to ground]: 0.00192282 m3; lognormal variance with pedigree 0.0586, pedigree (4,5,3,1,4)
  Calculated from fossil fuels consumed
- Zinc II [air, urban air close to ground]: 1.18402e-6 kg; lognormal variance with pedigree 0.708, pedigree (4,5,3,1,4)
  Calculated from fossil fuels consumed
- m-Xylene [air, urban air close to ground]: 3.78415e-7 kg; lognormal variance with pedigree 0.098, pedigree (4,5,3,1,4)
  Calculated from fossil fuels consumed
- AOX, Adsorbable Organic Halides [water, surface water]: 5.35232e-5 kg; lognormal variance with pedigree 0.0441, pedigree (3,2,3,1,1)
  Average data from four European producers of SUB/SSB, weighted according to production volumes, AOX as Cl-
- BOD5, Biological Oxygen Demand [water, surface water]: 0.00154117 kg; lognormal variance with pedigree 0.0441, pedigree (3,2,3,1,1)
  Average data from four European producers of SUB/SSB, weighted according to production volumes, Biological Oxygen Demand (BOD 5)
- COD, Chemical Oxygen Demand [water, surface water]: 0.00771256 kg; lognormal variance with pedigree 0.0441, pedigree (3,2,3,1,1)
  Average data from four European producers of SUB/SSB, weighted according to production volumes, Chemical Oxygen Demand (CODCr)
- DOC, Dissolved Organic Carbon [water, surface water]: 0.00274804 kg; = a_TOC; lognormal variance with pedigree 0.0441, pedigree (3,2,3,1,1)
  Assumed equal to TOC.
- Nitrogen [water, surface water]: 0.000105097 kg; lognormal variance with pedigree 0.0441, pedigree (3,2,3,1,1)
  Average data from four European producers of SUB/SSB, weighted according to production volumes. Total nitrogen
- Phosphorus [water, surface water]: 9.38563e-6 kg; lognormal variance with pedigree 0.0441, pedigree (3,2,3,1,1)
  Average data from four European producers of SUB/SSB, weighted according to production volumes, Total Phosphorus
- Suspended solids, unspecified [water, surface water]: 0.0011718 kg; lognormal variance with pedigree 0.0441, pedigree (3,2,3,1,1)
  Average data from four European producers of SUB/SSB, weighted according to production volumes, Total suspended solids
- TOC, Total Organic Carbon [water, surface water]: 0.00274804 kg; name a_TOC; lognormal variance with pedigree 0.0441, pedigree (3,2,3,1,1)
  (same comment as for calcium carbonate, precipitated)
- Water [water, surface water]: 0.0598103 m3; lognormal variance with pedigree 0.0047, pedigree (3,2,3,1,1)
  Average data from four European producers of SUB/SSB, weighted according to production volumes, recorded as thermally polluted only

## Sampling procedure
Data were collected from the producers by Pro Carton and ECMA for their European Environmental Database for Cartonboard and Carton Manufacturing and reviewed by the Institut für Energie- und Umweltforschung Heidelberg (ifeu). The data for the production of SBB/SUB were collected from mills, which together represent >90% of the total yearly production of SBB/SUB in Europe. Annual production of SBB/SUB (excluding liquid packaging board) in Europe for 2017 was approximately 670 000 tonnes. Data were provided by mills in Finland and Sweden. Each mill produces between 55 000 - 470 000 tonnes of net saleable paper (including their liquid packaging board capacity). Carton converting data were provided by factories in Austria, Belgium, France, Germany, Poland, Romania, Spain, Turkey, Ukraine, and the United Kingdom representing over 380 000 tonnes of production of converted cartons, or about 5% of European converting operation by volumae. They varied in size producing between 1 000 and 50 000 tonnes of finished cartons ready for shipment.

## Extrapolations
Exchanges identical to GLO dataset. Created to enable linking to regional markets (e.g. for electricity).

Additional air emissions from the combustion of fossil fuels estimated based on industrial heating datasets from the ecoinvent database and matched as follows: light fuel oil: heat production, light fuel oil, at industrial furnace 1MW, Europe without Switzerland heavy fuel oil: heat production, heavy fuel oil, at industrial furnace 1MW, Europe without Switzerland hard coal: heat production, at hard coal industrial furnace 1-10MW, Europe without Switzerland natural gas: heat production, natural gas, at industrial furnace >100kW, Europe without Switzerland lignite briquettes and peat: heat production, lignite briquette, at stove 5-15kW, Europe without Switzerland wood chips: heat production, wood chips from industry, at furnace 1000kW, CH.
Black liquor is a byproduct of the SBB/SUB production process and used as internal fuel to generate process energy. The black liquor recovery process differs largely from a simple combustion process. No emission profile for the recovery and or combustion of black liquor was available. The key emission factors reported by Pro Carton do include the emissions from the black liquor combustion of biogenic CO2. Other emissions from black liquor combustion were not included, due to the lack of an appropriate proxy.
