# textile production, cotton, weaving

Dataset: EcoSpold 2, unit process
Geography: BD
Time period: 2017-01-01 to 2023-12-31
Technology level: current
Classification: ISIC rev.4 ecoinvent: 1312:Weaving of textiles
Scenario: Business-as-Usual
System model: Allocation, cut-off by classification
Generated by: Mireille Faist Emmenegger
Published in: Faist Emmenegger, M. 2018
Database: ecoinvent
isCopyrightProtected: true
accessRestrictedTo: 1

## General comment
Inventory refers to 1 kg woven textile in Bangladesh in 2017. This dataset covers warp beaming, sizing, knotting & drawing, weaving and inspection of the woven textile.
Weaving is a textile production method which involves interlacing a set of longer threads (called the warp) with a set of crossing threads (called the weft). This is done on a frame or machine known as a loom, a device that holds the warp threads in place while filling threads are woven through them. The way the warp and filling threads interlace with each other is called the weave. The machine runs on electricity and lubricants. Moreover, maize starch is required as sizing agent. Hence, main inputs of the weaving process are cotton yarn, maize starch, water, electricity, and lubricants.
Data were collected from the representative mills in Bangladesh. The mills were chosen to provide data based on their technical representation of the current state of business and their willingness to participate.

## Included activities start
The activity starts with the warp beaming of the greige yarn.

## Included activities end
The activity ends with the inspection of the woven fabric.

## Geography
Bangladesh

## Reference product
- textile, woven cotton: 1 kg; name RP_amount_1; By-product classification allocatable product; CPC 26620: Woven fabrics of cotton, containing 85% or more by weight of cotton, weighing more than 200 g/m2; HS2017 5208: Woven fabrics of cotton, containing 85% or more by weight of cotton, weighing not more than 200 g/m2
  production volume 1.49263e9 kg; name RP_PV_1
    Literature Value. The annual weaving capacity is used here to calculate the respective production volume. Data from Bangladesh Textile Mills Association (BTMA) were employed.
    Reference: Basic data of Bangladesh textile mills association, accessed at: https://www.btmadhaka.com/2018/01/23/btma-information/ on 4/4/2018.
  property carbon content, non-fossil 0.46
    Cotton fibers are considered to have a 46% C-content in dry mass ("Evolutionary and Biochemical Aspects", A.D. Kay and T. Vrede (in Global Ecology, 2010, Elsevier B.V., S.E. Jørgensen Ed.)
  property heating value, net 13.94 MJ
    LHV is calculated based on the Carbon content of the product. More details can be found on the respective documentation.
  properties: carbon allocation 0.46 kg, carbon content 0.46, carbon content, fossil 0, dry mass 1 kg, price 1.77 EUR2005, water content 0, water in wet mass 0 kg, wet mass 1 kg

## Inputs from technosphere
- building, hall, steel construction: 1.41509e-5 m2; lognormal variance with pedigree 0.016, pedigree (4,1,3,1,1)
  Industry data.
- electricity, medium voltage: 7.2 kWh; lognormal variance with pedigree 0.0106, pedigree (4,1,3,1,1)
  Literature value. Collected data underestimated greatly the electricity consumption as it neglected the use of diesel powered generator during the load-shedding period. The electricity consumption agreggates electricity from the grid and form the generator, as no data on the shares of those supplies was found for the textile industry. The average value is taken from the Velden et al 2014 for 1/tex 0.05.
- heat, central or small-scale, other than natural gas: 8 MJ; lognormal variance with pedigree 0.016, pedigree (4,1,3,1,1)
  Industry data
  properties: heating value, net 1 MJ
- maize starch: 0.15677 kg; lognormal variance with pedigree 0.0106, pedigree (4,1,3,1,1)
  Industry data. A one shot polymer "Jet size" is used as the sizing agent.
  properties: carbon content, non-fossil 0.46, dry mass 0.86 kg, heating value, net 11.64 MJ, water content 0.162791, wet mass 1 kg
  note on carbon content, non-fossil: C-content of starch is considered 46% on dry mass basis (from "Evolutionary and Biochemical Aspects", A.D. Kay and T. Vrede (in Global Ecology, 2010, Elsevier B.V., S.E. Jørgensen Ed.)).
- natural gas, liquefied: 0.044 m3; lognormal variance with pedigree 0.0106, pedigree (4,1,3,1,1)
  Literature value. The value is taken from the velden et al 2014.
  properties: carbon content, fossil 0.602381, dry mass 0.84 kg, heating value, net 36 MJ, wet mass 0.84 kg
  note on carbon content, fossil: An average C content of 0.506 kg C/ Nm3 has been assumed for natural gas (this average has been calculated using data in Tab 3.5, ecoinvent v2.2 report 6_V). It equals 0.60238 kg C per 0.84kg dry mass.
  note on heating value, net: Literature value, Source: Christoph Meili;Niels Jungbluth;Maresa Bussa (2021) Life cycle inventories of crude oil and natural gas extraction. ESU-services Ltd. commissioned by BAFU & VSG, Schaffhausen, Switzerland, http://esu-services.ch/data/public-lci-reports/
- waste yarn and waste textile: -0.0593 kg; name BP_amount_1; lognormal variance with pedigree 0.014, pedigree (4,1,1,1,1)
  Waste produced during the process.
  production volume; = RP_PV_1 * (BP_amount_1 / RP_amount_1)
    Calculated from production volume of reference product using the relative outputs.
  properties: carbon content, non-fossil 0.44455, dry mass 0.97917 kg, heating value, net 13.14 MJ, water content 0.0212731, wet mass 1 kg
- yarn, cotton: 1.0593 kg; lognormal variance with pedigree 0.0106, pedigree (4,1,3,1,1)
  Industry data. 1 kg output of textile requires 1.0593 kg yarn.
  properties: carbon content, non-fossil 0.46, dry mass 0.94 kg, heating value, net 12.95 MJ, water content 0.0638298, wet mass 1 kg

## Inputs from nature
- Water, well, in ground [natural resource, in water]: 0.00118 m3; lognormal variance with pedigree 0.0106, pedigree (4,1,3,1,1)
  Industry data.

## Sampling procedure
Industry data. Representative mills in Bangladesh. The mills were chosen to provide data based on their technical representation of the current state of business and their willingness to participate.
