# road construction, company, internal

Dataset: EcoSpold 2, unit process
Geography: RoW
Time period: 1990-01-01 to 2023-12-31
Technology level: current
Classification: EcoSpold01Categories: transport systems/road
Classification: ISIC rev.4 ecoinvent: 4210:Construction of roads and railways
Tags: ConvertedDataset
Scenario: Business-as-Usual
System model: Allocation, cut-off by classification
Generated by: Michael Spielmann (obsolete)
Published in: Spielmann M. 2007
Database: ecoinvent
isCopyrightProtected: true
accessRestrictedTo: 1

## General comment
All data is referred to meter2*year. Construction data is based on material expenditures for Swiss 2nd class roads.
[This dataset was already contained in the ecoinvent database version 2. It was not individually updated during the transfer to ecoinvent version 3. Life Cycle Impact Assessment results may still have changed, as they are affected by changes in the supply chain, i.e. in other datasets. This dataset was generated following the ecoinvent quality guidelines for version 2. It may have been subject to central changes described in the ecoinvent version 3 change report (http://www.ecoinvent.org/database/ecoinvent-version-3/reports-of-changes/), and the results of the central updates were reviewed extensively. The changes added e.g. consistent water flows and other information throughout the database. The documentation of this dataset can be found in the ecoinvent reports of version 2, which are still available via the ecoinvent website. The change report linked above covers all central changes that were made during the conversion process.]

## Included activities end
Inventory for construction and operation of the traffic area (roads and parking) on company sites. The inventory includes processes for the supply of used materials such as gravel and bitumen . NMVOC emissions from bitumen are included. Transport of materials to the constructions site has been taken into account. Also, de-icing with sodium chlorid is accounted for. Energy cosumption due to lighting is excluded as well as weed control and marking.

## Geography
Data refers to average conditions in Switzerland.

## Technology
Swiss state of the art technology

## Reference product
- road, company, internal: 1 m2*year; By-product classification allocatable product; CPC 53211: Highways (except elevated highways), streets and roads
  EcoSpold01Location=CH
  production volume 3.96633 m2*year
    This is a placeholder value that does not reflect real-world production volumes. This dataset does not currently require a real-world production volume to work in the database framework, and no actual data were collected yet. This has no negative effect on the results of the ecoinvent database.
  property price 0.606137 EUR2005
    Calculated based on inputs: The price of the product has been calculated as a sum of the values of the material and energy inputs for this product. This value is therefore a rough estimation. It may underestimate the real price since there are additional expenses when producing any product. These expences can include for example labour costs, treatment of waste materials and profit for the producer. Please consider carefully whether this level of data quality is acceptable for your application.
  properties: carbon allocation 0 kg, carbon content 0

## Inputs from technosphere
- diesel, burned in building machine: 5.79 MJ; lognormal variance with pedigree 0.0646, pedigree (3,3,5,5,1)
  EcoSpold01Location=GLO
  Literature studies and own calculations
  Uncertainty: literature studies and own calculations
  properties: heating value, net 1 MJ
- electricity, medium voltage: 0.00296096, 0.0590645, 0.0198455, 0.000906747, 0.000181484, 3.89688e-5, 0.00412429, 0.00609932, 0.0127783 kWh (9 suppliers, which the file names only by identifier); sum of these 0.106 kWh; lognormal variance with pedigree 0.0646, pedigree (3,3,5,5,1)
  Literature studies and own calculations
  EcoSpold01Location=CH
  Uncertainty: literature studies and own calculations
- excavation, skid-steer loader: 0.0263 m3; lognormal variance with pedigree 0.1846, pedigree (3,3,5,5,1)
  Literature studies and own calculations
  EcoSpold01Location=RER
  Uncertainty: literature studies and own calculations
- gravel, crushed: 0.791689, 13.9115, 3.62433, 0.072479 kg (4 suppliers, which the file names only by identifier); sum of these 18.4 kg; lognormal variance with pedigree 0.0646, pedigree (3,3,5,5,1)
  EcoSpold01Location=CH
  Literature studies and own calculations
  Uncertainty: literature studies and own calculations
  properties: dry mass 1 kg, wet mass 1 kg
- pitch: 0.0645666, 0.00289414, 0.00142658, 0.0250313, 0.00413166, 0.365002, 0.0829478 kg (7 suppliers, which the file names only by identifier); sum of these 0.546 kg; lognormal variance with pedigree 0.0646, pedigree (3,3,5,5,1)
  (same comment as for electricity, medium voltage)
  properties: carbon content, fossil 0.83, dry mass 1 kg, heating value, net 28 MJ, wet mass 1 kg
- reinforcing steel: 0.0916 kg; lognormal variance with pedigree 0.0646, pedigree (3,3,5,5,1)
  (same comment as for excavation, skid-steer loader)
  properties: carbon content, fossil 0.004, dry mass 1 kg, wet mass 1 kg
- sodium chloride, powder: 0.293 kg; lognormal variance with pedigree 0.0432, pedigree (2,3,5,5,1)
  EcoSpold01Location=RER
  De-icing salt study and own calculations
  Uncertainty: de-icing salt study and own calculations
  properties: dry mass 1 kg, wet mass 1 kg
- steel, low-alloyed, hot rolled: 0.00877 kg; lognormal variance with pedigree 0.0646, pedigree (3,3,5,5,1)
  EcoSpold01Location=RER
  Literature studies and own calculations
  Uncertainty: literature studies and own calculations
  properties: carbon content, fossil 0.005, dry mass 1 kg, wet mass 1 kg
  note on carbon content, fossil: Low alloyed steel composition given in Tab. 3.2 ecoinvent v2.2 report 10_partII. Steel assumed to have a C content of 0.5%

## Emissions to nature
- NMVOC, non-methane volatile organic compounds [air, unspecified]: 0.00655 kg; lognormal variance with pedigree 0.1006, pedigree (4,3,5,5,1)
  Literature studies and own calculations
  Uncertainty: literature studies and own calculations
- Chloride [soil, unspecified]: 0.176 kg; lognormal variance with pedigree 0.0846, pedigree (3,3,5,5,1)
  De-icing salt study and own calculations
  Uncertainty: de-icing salt study and own calculations
- Sodium I [soil, unspecified]: 0.117 kg; lognormal variance with pedigree 0.0846, pedigree (3,3,5,5,1)
  (same comment as for Chloride)

## Sampling procedure
literature and own calculations.

## Extrapolations
none This dataset has been copied from an original dataset covering the geography CH. The uncertainty has been adjusted accordingly.

## Review by Niels Jungbluth 2003-07-07
Passed.
