# transport, passenger car, electric

Dataset: EcoSpold 2, unit process
Geography: GLO
Time period: 2000-01-01 to 2023-12-31
Technology level: modern
Classification: ISIC rev.4 ecoinvent: 4921:Urban and suburban passenger land transport
Scenario: Business-as-Usual
System model: Allocation, cut-off by classification
Generated by: F. Habermacher
Published in: F. Habermacher 2011
Database: ecoinvent
isCopyrightProtected: false
accessRestrictedTo: 1

## General comment
This dataset describes a journey of 1 km with an electric passenger car. The dataset is parametrized with respect to mass of the vehicle, mass of the battery, consumption and lifetimes of vehicle and battery. The vehicle is described in terms of a vehicle without battery plus the battery. The amount of battery includes battery exchange due to maintenance. Currently, default values for a compact size car with a weight without battery of 918.22kg and a battery of 262kg are given. Assuming a life expectancy for the car of 150000km and an average lifetime for the battery of 100000, it is expected that about every second battery will require substitution. A default value of (150000km/100000km)*262 kg of batteries is taken into account including the maintenance. The current nominal value of battery mass has been derived assuming an energy density of 114Wh/kg and should correspond to about 120km of driving range. The construction of the datasets allows to change key parameters (like mass of the vehicle, mass of the battery, consumption, life times, etc.) in order to cover a wide spectrum of situations . However, it is important to consider that changing one parameter of a vehicle, e.g. its mass, may lead to changes in other parameters, e.g. the consumption. When modifying the default parameters given, attention should be payed to the possible influence which one parameter may have over the other.

## Included activities start
The dataset takes as input the car without battery, the battery, the maintenance and the electric energy consumed for the journey. Both, the car and battery are considered as infrastructure even though they are expressed in kg.

## Included activities end
The datsets returns as by-products the non-exhaust emissions caused by brake, tyre and road wear.

## Technology
The dataset is based on averages over modern car technologies which are expected to be representative up to 2015.

## Parameters
- battery life: 100000 km; name battery_life
  Battery lifetime in km. Default value of 100000 assumed. Changing this value will alter the amount of battery considered in the maintenance.
- battery mass: 262 kg; name battery_mass
  Battery mass in kg. A default value of 262kg assumed. When changing this value it should be remembererd that varying the overall mass of the vehicle would also lead to a change in its consumption. The current nominal value has been derived assuming an energy density of 114Wh/kg and should correspond to about 120km of driving range.
- brake wear scaling factor: 0.2 dimensionless; name brake_wear_scaling_factor
  Scaling factor which takes into account that regenerative braking allows to reduce the use of mechanical braking. (Althaus and Gauch: "Vergleichende Ökobilanz individueller Mobilität: Elektromobilität versus konventionelle Mobilität mit Bio- und fossilen Treibstoffen.", 2010)
- emissions from brake friction: 4.45e-9 kg/kg vehicle; name brake_wear_emissions
  average (small, medium and large weight class) emissions produced per kg vehicle.
  Calculation of non-exhaust emissions (tyre, brake and road wear emissions as well as petrol evaporation emissions) are based on: Ntziachristos, L., Boulter, P. (2009). EMEP/EEA air pollutant emissions inventory guidebook 2009: Road vehicle tyre and brake wear; Road surface wear. Copenhagen, European Environment Agency
- emissions from road abrasion: 9.79e-9 kg/kg vehicle; name road_wear_emissions
  (same comment as for emissions from brake friction)
- emissions from tyre abrasion: 5.725e-8 kg/kg vehicle; name tyre_wear_emissions
  (same comment as for emissions from brake friction)
- vehicle energy consumption: 0.199 kWh/km; name vehicle_energy_consumption
  Evaluated for the default set of parameters. For a different set of parameters, especially concerning the total mass of the vehicle, the consumption should be evaluated accordingly.
- vehicle life: 150000 km; name vehicle_life
  Default value of 150000km. Changing this value may influence the amount of battery resulting due to maintenance.
- vehicle mass without battery: 918.22 kg; name v_mass_without_battery
  Deafault value of 918.22kg. When changing this value it should be remembererd that varying the overall mass of the vehicle would also lead to a change in its consumption.

## Reference product
- transport, passenger car, electric: 1 km; name RP_amount_1; By-product classification allocatable product; CPC 64119: Other land transportation services of passengers, n.e.c.
  production volume 2.25e9 km; name RP_PV_1
    Very rough estimate of 45000 pure battery electric passenger cars produced in 2012 based on the projection for the USA shown in http://www1.eere.energy.gov/vehiclesandfuels/pdfs/1_million_electric_vehicles_rpt.pdf. This value has been taken as annual production volume for the last 5 years together with an annual driving performance of 10000km per vehicle.
  property price 0.271344 EUR2005
    Calculated based on inputs: The price of the product has been calculated as a sum of the values of the material and energy inputs for this product. This value is therefore a rough estimation. It may underestimate the real price since there are additional expenses when producing any product. These expences can include for example labour costs, treatment of waste materials and profit for the producer. Please consider carefully whether this level of data quality is acceptable for your application.
  properties: carbon allocation 0 kg, carbon content 0

## Inputs from technosphere
- battery, Li-ion, LiMn2O4, rechargeable, prismatic: 0.00262 kg; name battery; = (vehicle_life/battery_life)*battery_mass/vehicle_life; source F. Habermacher 2011; lognormal variance with pedigree 0.043, pedigree (2,3,5,4,2)
  Based on currently available electric passenger cars. Since the average vehicle lifetime is 150000 and the average battery lifetime is assumed to be 100000km, it is expected that an average amount of (150000/100000) of battery will be required over the entire lifetime of the vehicle.
  property carbon content, fossil 0.328011; name C_content_fossil
  property carbon content, non-fossil 0; name C_content_non_fossil
  property dry mass 1 kg; name DM
  property water content 0; name water_content
  property water in wet mass 0 kg; name WWM
  property wet mass 1 kg; name WM
- brake wear emissions, passenger car: -1.0504e-6 kg; name BP_amount_2; = brake_wear_scaling_factor*brake_wear_emissions*(v_mass_without_battery+battery_mass); lognormal variance with pedigree 0.0038, pedigree (2,1,3,4,1)
  Based on personal communication with K. Treyer from PSI. The scaling factor takes into account that electric vehicles tend to use mechanical brakes less due to regenerative braking.
  production volume; = BP_amount_2/ RP_amount_1* RP_PV_1
    Calculated from production volume of reference product using the relative outputs.
- electricity, low voltage: 0.199 kWh; = vehicle_energy_consumption; source F. Habermacher 2011; lognormal variance with pedigree 0.0504, pedigree (2,3,5,4,3)
  Consumption includes auxiliaries, efficiency of electric drivetrain and real world correction factor on initial value evaluated through the NEDC. Efforts due to maintenance taken from ecoinvent v2.2 passenger car maintenance dataset.
- maintenance, passenger car, electric, without battery: 6.66667e-6 unit; = 1/vehicle_life; source Spielmann M. 2007; lognormal variance with pedigree 0.448, pedigree (4,5,5,5,5)
  Amount of maintenance used over 1 km of transport. Uncertainty taken from ecoinvent v2.2 electric passenger car transport dataset.
  Uncertainty: calculated according to passenger car in ecoinvent report Nr.14
- passenger car, electric, without battery: 0.00612147 kg; = v_mass_without_battery/vehicle_life; source F. Habermacher 2011; lognormal variance with pedigree 0.043, pedigree (2,3,5,4,2)
  Based on currently available electric passenger cars.
- road: 0.00048748 m*year; source Spielmann M. 2007; lognormal variance with pedigree 0.3226, pedigree (2,4,4,5,1)
  Road - value and uncertainty taken from ecoinvent v2.2 electric passenger car transport dataset.
  Uncertainty: calculated according to passenger car in ecoinvent report Nr.14
- road wear emissions, passenger car: -1.15544e-5 kg; name BP_amount_1; = road_wear_emissions*(v_mass_without_battery+battery_mass); lognormal variance with pedigree 0.0038, pedigree (2,1,3,4,1)
  Based on personal communication with K. Treyer from PSI.
  production volume; = BP_amount_1/ RP_amount_1* RP_PV_1
    Calculated from production volume of reference product using the relative outputs.
- tyre wear emissions, passenger car: -6.75676e-5 kg; name BP_amount_3; = tyre_wear_emissions*(v_mass_without_battery+battery_mass); lognormal variance with pedigree 0.0038, pedigree (2,1,3,4,1)
  Based on personal communication with K. Treyer from PSI.
  production volume; = BP_amount_3/ RP_amount_1* RP_PV_1
    Calculated from production volume of reference product using the relative outputs.
- used Li-ion battery: -0.00262 kg; name usedBattery; = battery; lognormal variance with pedigree 0.2106, pedigree (5,5,5,5,5)
  This exchange accounts for the treatment of the battery.
  production volume; = RP_PV_1 *usedBattery/ RP_amount_1
    Calculated from production volume of reference product using the relative outputs.
  properties: carbon content, fossil 0.328011, dry mass 1 kg, wet mass 1 kg

## Sampling procedure
Based on modern, commercially available models.

## Extrapolations
The data is based on modern, commercially available models and is expected to be representative up to 2015. No substancial technological changes are expected for commercially available electric passengers up to 2015.

## Review by Christian Bauer 2012-09-11
passed

## Review by Emilia Moreno Ruiz 2013-07-30
Break wear emissions were edited according to the newest modelling.
