# treatment of bottom ash, MSWI-WWT, rainwater mineral oil storage, slag compartment

Dataset: EcoSpold 2, unit process
Geography: RoW
Time period: 1994-01-01 to 2023-12-31
Technology level: current
Classification: ISIC rev.4 ecoinvent: 3821:Treatment and disposal of non-hazardous waste
Scenario: Business-as-Usual
System model: Allocation, cut-off by classification
Generated by: Nikolia Stoikou
Database: ecoinvent
isCopyrightProtected: true
accessRestrictedTo: 1

## General comment
The process represents the treatment of a waste (bottom ash) that is exclusively generated from another waste treatment. Bottom ash is generated in the municipal solid waste incineration (MSWI) of sewage sludge (with 70% water) that in turn is generated from wastewater treatment (WWT) of 'rainwater mineral oil storage'. Recommended use of this dataset: to be used within the specific chain of treatments for 'rainwater mineral oil storage'. Share of biogenic carbon in the sludge: 0%.

## Included activities start
The activity starts with the waste being available at the gate of the treatment facility. Collection and transportation of the waste to the treatment plant is not included.

## Included activities end
The activity ends with the waste being treated and waste-specific emissions from the slag compartment landfill are released to water (short-term emissions to surface water and long-term emissions to ground water).

## Geography
Modelling parameters affecting the treatment technology are not specific to this geography.

## Technology
Slag compartment for bottom ashes from incineration with base seal and leachate collection system. Recultivation after closure.

## Reference product
- bottom ash, MSWI-WWT, rainwater mineral oil storage: -1 kg; By-product classification Waste; CPC 39320: Ash and residue (except from the manufacture of iron or steel), containing metals or metallic compounds, excep[…]; HS2017 262110: Slag and ash; ash and residues from the incineration of municipal waste
  production volume 0.000110032 kg
    Calculated in proportion to incinerated waste reference product. The production volume is accounting as well regional specific losses (wastewater not sewered) for this geography
  properties: aluminium content 0.0101008, barium content 0.00096915, boron content 8.5157e-5, cadmium content 2.44823e-6, calcium content 0.408547, carbon allocation 0.00328604 kg, carbon content 0.00375863, carbon content, fossil 0.00375863, carbon content, non-fossil 0, chromium content 0.000317991, copper content 0.000959932, dry mass 0.874266 kg, iron content 0.122223, lead content 9.04774e-5, magnesium content 0.0116593, manganese content 0.00534565, nickel content 0.000188498, nitrogen content 0.000629452, oxygen content 0.316783, phosphorus content 0.0309296, potassium content 0.00660708, price 0 EUR2005, sodium content 0.0533104, strontium content 0.00288488, sulfur content 0.0188352, water content 0.143817, water in wet mass 0.125734 kg, wet mass 1 kg, zinc content 0.00577258

## Inputs from technosphere
- process-specific burdens, slag landfill: 0.0116981, 0.988302 kg (2 suppliers, which the file names only by identifier); sum of these 1 kg
  mass-specific expenditures required for landfilling of bottom ash.
- slag landfill: 1.7778e-9 unit
  slag compartment infrastructure required for landfilling of bottom ash.

## Inputs from nature
- Organic carbon, placed in landfill [inventory indicator, waste]: 0.001643 kg; lognormal variance with pedigree 0.14163, pedigree (1,1,5,1,1)
  Mass of organic carbon in waste (without inorganic carbon), initially put in slag compartment. The exchange represents a flow that is within the technosphere. This exchange should only be used to apply ecofactors for the Swiss LCIA method of Ecological Scarcity and not any other purpose.
  Uncertainty: Uncertainty calculated from uncertainty of composition of incinerated waste, and incinerator model uncertainty and slag compartment transfer coefficient uncertainty.
- Waste mass, total, placed in landfill [inventory indicator, waste]: 1 kg
  Mass of waste initially put in a slag compartment. The exchange represents a flow that is within the technosphere. This exchange should only be used to apply ecofactors for the Swiss LCIA method of Ecological Scarcity and not any other purpose.

## Emissions to nature
- Non-hazardous waste disposed [inventory indicator, waste]: 1 kg
  Inventory indicator for waste mass disposed. To be used in EN15804 "other data" results.
- Aluminium III [water, ground-, long-term]: 0.0072135 kg; lognormal variance with pedigree 0.16952, pedigree (1,1,5,1,1)
  complement of long-term emissions from incinerator bottom ash in slag compartment
  Uncertainty: Uncertainty calculated from uncertainty of composition of incinerated waste, and incinerator model uncertainty and slag compartment transfer coefficient uncertainty.
- Aluminium III [water, surface water]: 1.1603e-7 kg; lognormal variance with pedigree 1.3832, pedigree (1,1,5,1,1)
  short-term emissions from incinerator bottom ash in slag compartment
  Uncertainty: Uncertainty calculated from uncertainty of composition of incinerated waste, and incinerator model uncertainty and slag compartment transfer coefficient uncertainty.
- BOD5, Biological Oxygen Demand [water, ground-, long-term]: 0.0013533 kg; lognormal variance with pedigree 0.14163, pedigree (1,1,5,1,1)
  (same comment as for Aluminium III)
- BOD5, Biological Oxygen Demand [water, surface water]: 4.8847e-6 kg; lognormal variance with pedigree 0.63111, pedigree (1,1,5,1,1)
  (same comment as for Aluminium III)
- Barium II [water, ground-, long-term]: 0.00084716 kg; lognormal variance with pedigree 0.2417, pedigree (1,1,5,1,1)
  (same comment as for Aluminium III)
- Barium II [water, surface water]: 1.2987e-7 kg; lognormal variance with pedigree 1.1407, pedigree (1,1,5,1,1)
  (same comment as for Aluminium III)
- Boron [water, ground-, long-term]: 6.1946e-5 kg; lognormal variance with pedigree 0.27923, pedigree (1,1,5,1,1)
  (same comment as for Aluminium III)
- Boron [water, surface water]: 5.8332e-7 kg; lognormal variance with pedigree 0.66469, pedigree (1,1,5,1,1)
  (same comment as for Aluminium III)
- COD, Chemical Oxygen Demand [water, ground-, long-term]: 0.0041372 kg; lognormal variance with pedigree 0.14163, pedigree (1,1,5,1,1)
  (same comment as for Aluminium III)
- COD, Chemical Oxygen Demand [water, surface water]: 1.4933e-5 kg; lognormal variance with pedigree 0.63111, pedigree (1,1,5,1,1)
  (same comment as for Aluminium III)
- Cadmium II [water, ground-, long-term]: 2.1393e-6 kg; lognormal variance with pedigree 0.52502, pedigree (1,1,5,1,1)
  (same comment as for Aluminium III)
- Cadmium II [water, surface water]: 1.1012e-9 kg; lognormal variance with pedigree 1.2645, pedigree (1,1,5,1,1)
  (same comment as for Aluminium III)
- Calcium II [water, ground-, long-term]: 0.35562 kg; lognormal variance with pedigree 0.099568, pedigree (1,1,5,1,1)
  (same comment as for Aluminium III)
- Calcium II [water, surface water]: 0.0015585 kg; lognormal variance with pedigree 0.56495, pedigree (1,1,5,1,1)
  (same comment as for Aluminium III)
- Chromium VI [water, ground-, long-term]: 1.8192e-6 kg; lognormal variance with pedigree 3.6298, pedigree (1,1,5,1,1)
  (same comment as for Aluminium III)
- Chromium VI [water, surface water]: 7.95e-9 kg; lognormal variance with pedigree 1.4333, pedigree (1,1,5,1,1)
  (same comment as for Aluminium III)
- Copper ion [water, ground-, long-term]: 0.00083921 kg; lognormal variance with pedigree 0.27561, pedigree (1,1,5,1,1)
  (same comment as for Aluminium III)
- Copper ion [water, surface water]: 2.9137e-8 kg; lognormal variance with pedigree 1.3712, pedigree (1,1,5,1,1)
  (same comment as for Aluminium III)
- DOC, Dissolved Organic Carbon [water, ground-, long-term]: 0.0016371 kg; lognormal variance with pedigree 0.14163, pedigree (1,1,5,1,1)
  (same comment as for Aluminium III)
- DOC, Dissolved Organic Carbon [water, surface water]: 5.9092e-6 kg; lognormal variance with pedigree 0.63111, pedigree (1,1,5,1,1)
  (same comment as for Aluminium III)
- Iron ion [water, ground-, long-term]: 0.055586 kg; lognormal variance with pedigree 0.25299, pedigree (1,1,5,1,1)
  (same comment as for Aluminium III)
- Iron ion [water, surface water]: 8.9409e-7 kg; lognormal variance with pedigree 1.4295, pedigree (1,1,5,1,1)
  (same comment as for Aluminium III)
- Lead II [water, ground-, long-term]: 7.91e-5 kg; lognormal variance with pedigree 0.39116, pedigree (1,1,5,1,1)
  (same comment as for Aluminium III)
- Lead II [water, surface water]: 1.4439e-9 kg; lognormal variance with pedigree 1.5717, pedigree (1,1,5,1,1)
  (same comment as for Aluminium III)
- Magnesium [water, ground-, long-term]: 0.010155 kg; lognormal variance with pedigree 0.125586, pedigree (1,1,5,1,1)
  (same comment as for Aluminium III)
- Magnesium [water, surface water]: 3.8727e-5 kg; lognormal variance with pedigree 0.60821, pedigree (1,1,5,1,1)
  (same comment as for Aluminium III)
- Manganese II [water, ground-, long-term]: 0.0046733 kg; lognormal variance with pedigree 0.19143, pedigree (1,1,5,1,1)
  (same comment as for Aluminium III)
- Manganese II [water, surface water]: 2.392e-7 kg; lognormal variance with pedigree 1.2357, pedigree (1,1,5,1,1)
  (same comment as for Aluminium III)
- Nickel II [water, ground-, long-term]: 0.00016469 kg; lognormal variance with pedigree 0.33549, pedigree (1,1,5,1,1)
  (same comment as for Aluminium III)
- Nickel II [water, surface water]: 1.0378e-7 kg; lognormal variance with pedigree 1.0485, pedigree (1,1,5,1,1)
  (same comment as for Aluminium III)
- Nitrate [water, ground-, long-term]: 0.0019769 kg; lognormal variance with pedigree 0.17516, pedigree (1,1,5,1,1)
  (same comment as for Aluminium III)
- Nitrate [water, surface water]: 0.0004602 kg; lognormal variance with pedigree 0.24195, pedigree (1,1,5,1,1)
  (same comment as for Aluminium III)
- Phosphate [water, ground-, long-term]: 0.0010939 kg; lognormal variance with pedigree 4.8395, pedigree (1,1,5,1,1)
  (same comment as for Aluminium III)
- Phosphate [water, surface water]: 1.8262e-6 kg; lognormal variance with pedigree 1.3134, pedigree (1,1,5,1,1)
  (same comment as for Aluminium III)
- Potassium I [water, ground-, long-term]: 0.0050783 kg; lognormal variance with pedigree 0.119599, pedigree (1,1,5,1,1)
  (same comment as for Aluminium III)
- Potassium I [water, surface water]: 0.00069807 kg; lognormal variance with pedigree 0.22251, pedigree (1,1,5,1,1)
  (same comment as for Aluminium III)
- Sodium I [water, ground-, long-term]: 0.04092 kg; lognormal variance with pedigree 0.097926, pedigree (1,1,5,1,1)
  (same comment as for Aluminium III)
- Sodium I [water, surface water]: 0.0056878 kg; lognormal variance with pedigree 0.2, pedigree (1,1,5,1,1)
  (same comment as for Aluminium III)
- Strontium II [water, ground-, long-term]: 0.0025206 kg; lognormal variance with pedigree 0.17274, pedigree (1,1,5,1,1)
  (same comment as for Aluminium III)
- Strontium II [water, surface water]: 1.5882e-6 kg; lognormal variance with pedigree 0.8858, pedigree (1,1,5,1,1)
  (same comment as for Aluminium III)
- Sulfate [water, ground-, long-term]: 0.044896 kg; lognormal variance with pedigree 0.110624, pedigree (1,1,5,1,1)
  (same comment as for Aluminium III)
- Sulfate [water, surface water]: 0.0045051 kg; lognormal variance with pedigree 0.23846, pedigree (1,1,5,1,1)
  (same comment as for Aluminium III)
- TOC, Total Organic Carbon [water, ground-, long-term]: 0.0016371 kg; lognormal variance with pedigree 0.14163, pedigree (1,1,5,1,1)
  (same comment as for Aluminium III)
- TOC, Total Organic Carbon [water, surface water]: 5.9092e-6 kg; lognormal variance with pedigree 0.63111, pedigree (1,1,5,1,1)
  (same comment as for Aluminium III)
- Zinc II [water, ground-, long-term]: 0.0050466 kg; lognormal variance with pedigree 0.16692, pedigree (1,1,5,1,1)
  (same comment as for Aluminium III)
- Zinc II [water, surface water]: 1.5023e-7 kg; lognormal variance with pedigree 1.2829, pedigree (1,1,5,1,1)
  (same comment as for Aluminium III)

## Extrapolations
Modelling parameters are based on an average slag compartment landfill in Switzerland.
