# cashew production

Dataset: EcoSpold 2, unit process
Geography: RoW
Time period: 2015-01-01 to 2023-12-31
Technology level: current
Classification: ISIC rev.4 ecoinvent: 0125:Growing of other tree and bush fruits and nuts
Scenario: Business-as-Usual
System model: Allocation, cut-off by classification
Generated by: Sanjeevan Bajaj
Database: ecoinvent
isCopyrightProtected: true
accessRestrictedTo: 1

## General comment
This dataset represents the production of 1 kg of fresh Cashew which is a perineal crop which is harvested in the month of February, 2016 at a farm located in village Tutarkhed, District Valsad of Gujarat. In this area, fields are irrigated with ground water using electric pump and micro irrigation for surface irrigation. The farm has a yield of 580 kg fresh matter per ha for this crop cycle. Harvesting date is 20-Feburary, 2016. Mineral NPK fertilizer input is 279.50-57.50-21.6 kg/ha. Organic fertilizer applied amounts to 510 kg of manure from cattle dung. Only insecticide used has active ingredient as Carbaryl 1275 g/ha, Organophosphate 1785g/ha. Machinery is used for plant protection with fuel consumption of 10 kg/ha, soil cultivation with fuel consumption of 25 kg/ha using plough for soil tillage and 5kg/ha is used for other work process by tractor, transport and trailer.

## Included activities start
As this crop is a peripheral crop it is continuously in process with periodic harvesting in a year.

## Included activities end
The activity ends with the harvesting of the mature Cashew from the Cashew plant.

## Geography
Village Tutarkhed, District Valsad of Gujarat

## Technology
Cultivation of Cashew follows conventional production standards

## Time period
Harvesting date main crop: 20-Feburary, 2016. The soil cultivation, sowing and harvesting dates are taken as the middle date of the week or fortnight told to the data collector by the farmer. The data is collected for one crop cycle. The cycle of one year is considered for entry in ecoeditor.

## Reference product
- cashew: 1 kg; By-product classification allocatable product; CPC 01372: Cashew nuts, in shell; HS2017 080132: Nuts, edible; cashew nuts, fresh or dried, shelled
  production volume 4.89171e9 kg; = 4898210*1000
    http://www.fao.org/faostat/en/#data/QC 2016 production volume of cashew with shells given in tonnes
  property price 0.579514 EUR2005
    Literature value. Price from FAOSTAT data Producer Prices - Annual (retrieved from: http://www.fao.org/faostat/en/#data/PP, accessed 15Feb2018). Data from 2005.
  properties: carbon allocation 0.4503 kg, carbon content 0.475, carbon content, fossil 0, carbon content, non-fossil 0.475, dry mass 0.948 kg, water content 0.0548523, water in wet mass 0.052 kg, wet mass 1 kg

## Inputs from technosphere
- [thio]carbamate-compound: 0.00219828 kg; lognormal variance with pedigree 0.0078, pedigree (3,3,3,5,2)
  Substitute for Carbaryl
  properties: carbon content, fossil 0.626349, dry mass 1 kg, wet mass 1 kg
- ammonium sulfate: 0.0368742, 0.0113154 kg (2 suppliers, which the file names only by identifier); sum of these 0.0481897 kg; lognormal variance with pedigree 0.0078, pedigree (3,3,3,5,2)
  Calculated Value. This value has been calculated by using the ecoinvent LCI calculation tool for crop production.
  properties: dry mass 1 kg, wet mass 1 kg
- compost: 0.87931 kg; lognormal variance with pedigree 0.0078, pedigree (3,3,3,5,2)
  Home made compost
  property cadmium content 3.6e-7; name Cd_content
  property chromium content 2.23e-5; name Cr_content
  property copper content 5.77e-5; name Cu_content
  property dry mass 0.5 kg; name DM
  property lead content 4.9e-5; name Pb_content
  property mercury content 1.2e-7; name Hg_content
  property nickel content 1.63e-5; name Ni_content
  property nitrogen content 0.014; name N_content
  property phosphorus content 0.0035; name P_content
  property potassium content 0.01; name K_content
  property zinc content 0.000184; name Zn_content
  properties: carbon content, non-fossil 0.183645, water content 1, wet mass 1 kg
- diesel, burned in agricultural machinery: 1.55188 MJ; lognormal variance with pedigree 0.0078, pedigree (3,3,3,5,2)
  This exchange is an aggregation of amounts:
  0.7759396629310344. Comment:
  0.7759396629310344. Comment:
- establishing orchard: 0.00732759 unit; lognormal variance with pedigree 0.0078, pedigree (3,3,3,5,2)
  (same comment as for ammonium sulfate)
- fruit tree seedling, for planting: 0.00732759 unit; lognormal variance with pedigree 0.0078, pedigree (3,3,3,5,2)
  (same comment as for ammonium sulfate)
  properties: carbon content, non-fossil 1, dry mass 0.03 kg, wet mass 0.03 kg
- inorganic nitrogen fertiliser, as N: 1.39427e-6, 0.000327175, 3.88107e-5, 0.000416763, 9.53308e-5, 4.03715e-5, 0.000372084, 3.49401e-5, 0.000245121, 2.50761e-5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 kg (29 suppliers, which the file names only by identifier); sum of these 0.0385517 kg; lognormal variance with pedigree 0.0078, pedigree (3,3,3,5,2)
  The data was collected for a hectare area through interview
  properties: dry mass 1 kg, wet mass 1 kg
- inorganic phosphorus fertiliser, as P2O5: 0.000757462, 0.0016813, 0.014546, 0.000469432, 0.000115284, 0.000163249, 0.000407281, 5.34948e-5, 0.000262184, 6.25107e-6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 kg (29 suppliers, which the file names only by identifier); sum of these 0.0991379 kg; lognormal variance with pedigree 0.0078, pedigree (3,3,3,5,2)
  The data was collected for a hectare area through interview
  properties: dry mass 1 kg, wet mass 1 kg
- irrigation: 0.000672846, 0.0134558, 0.82111, 0.0103665, 0.0277946, 0.038206, 2.96204, 0.00606395, 0.000155956, 0.364416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 m3 (16 suppliers, which the file names only by identifier); sum of these 4.55172 m3; lognormal variance with pedigree 0.0078, pedigree (3,3,3,5,2)
  The data was collected for a hectare area through interview
  properties: dry mass 0.11 kg, water content 9089.91, wet mass 1000 kg
- packaging, for fertilisers: 1.23655 kg; lognormal variance with pedigree 0.0532, pedigree (4,3,3,5,4)
  Total amount of active substance/s of fertilisers needed for the production of 'cashew' is calculated to be circa 6.18E-01 kg. Fertiliser/s used in this dataset is/are: 'ammonium sulfate, as N', 'nitrogen fertiliser, as N', 'phosphate fertiliser, as P2O5', 'potassium chloride, as K2O', 'urea, as N'. The total amount of active substance/s is doubled in order to account for the packaging of the dilluted product of fertiliser/s that is/are applied. Therefore, 1.24E+00 kg of packaging for fertilisers is justified with this exchange.
  properties: carbon content, fossil 0.825301, dry mass 1 kg, heating value, net 25.01 MJ, price 0.0642 EUR2005, wet mass 1 kg
  note on carbon content, fossil: Considering a chemical formula (C2H4)n for polyethylene, carbon content-fossil is calculated to be 0.856286 kg of Carbon per kg of dry mass.
- packaging, for pesticides: 0.0105517 kg; lognormal variance with pedigree 0.0532, pedigree (4,3,3,5,4)
  Total amount of active substance/s of pesticides needed for the production of cashew is calculated to be circa 5.28E-03 kg. Pesticide/s used in this dataset is/are: '[thio]carbamate-compound', 'pesticide, unspecified'. The total amount of active substance/s is doubled in order to account for the packaging of the dilluted product of pesticide/s that is/are applied. Therefore, 1.06E-02 kg of packaging for pesticides is justified with this exchange.
  properties: carbon content, fossil 0.85714, dry mass 1 kg, heating value, net 25.97 MJ, price 0.0642 EUR2005, wet mass 1 kg
- pesticide, unspecified: 0.00307759 kg; lognormal variance with pedigree 0.0078, pedigree (3,3,3,5,2)
  Group of Insecticide uses - Organophosphate. Calculated Value. This value has been calculated by using the ecoinvent LCI calculation tool for crop production.
  properties: carbon content, fossil 0.486978, dry mass 1 kg, wet mass 1 kg
- planting tree: 0.00732759 unit; lognormal variance with pedigree 0.0078, pedigree (3,3,3,5,2)
  (same comment as for ammonium sulfate)
- polyethylene, high density, granulate: 0.362069 kg; lognormal variance with pedigree 0.0078, pedigree (3,3,3,5,2)
  (same comment as for ammonium sulfate)
  properties: carbon content, fossil 0.857143, dry mass 1 kg, heating value, net 42.47 MJ, wet mass 1 kg
  note on carbon content, fossil: Polyethylene is formed out of a huge amount of ethylene monomers (C2H4) (ecoinvent v2.2 report 11_II). MW=28 g/mol
- potassium chloride: 0.00451441, 0.0544349 kg (2 suppliers, which the file names only by identifier); sum of these 0.0589493 kg; lognormal variance with pedigree 0.0078, pedigree (3,3,3,5,2)
  The exchange has been updated from 'potassium chloride, as K2O' into 'potassium chloride' and therefore its amount has been scaled (multiplied) from 0.0372 kg by 1.5829 kg of 'potassium chloride' per kg of 'potassium chloride, as K2O'. Original comment of the exchange is: Calculated Value. This value has been calculated by using the ecoinvent LCI calculation tool for crop production.
  properties: dry mass 1 kg, wet mass 1 kg
- tillage, ploughing: 0.000990884 ha; lognormal variance with pedigree 0.0078, pedigree (3,3,3,5,2)
  The data was collected for a hectare area through interview
- transport, tractor and trailer, agricultural: 0.196921, 0.000800775 metric ton*km (2 suppliers, which the file names only by identifier); sum of these 0.197722 metric ton*km; lognormal variance with pedigree 0.1272, pedigree (3,3,3,5,2)
  (same comment as for ammonium sulfate)
- urea: 0.396378, 0.0501307, 0.0621455, 0.338479 kg (4 suppliers, which the file names only by identifier); sum of these 0.847133 kg; lognormal variance with pedigree 0.0078, pedigree (3,3,3,5,2)
  The exchange has been updated from 'urea, as N' into 'urea' and therefore its amount has been scaled (multiplied) from 0.3952 kg by 2.1438 kg of 'urea' per kg of 'urea, as N'. Original comment of the exchange is: The data was collected for a hectare area through interview
  properties: carbon content, fossil 0.2, dry mass 1 kg, wet mass 1 kg

## Inputs from nature
- Carbon dioxide, in air [natural resource, in air]: 3.13288 kg; lognormal variance with pedigree 0.0078, pedigree (3,3,3,5,2)
  (same comment as for ammonium sulfate)
- Energy, gross calorific value, in biomass [natural resource, biotic]: 36.0525 MJ; lognormal variance with pedigree 0.0078, pedigree (3,3,3,5,2)
  The data was collected for a hectare area through interview
- Occupation, permanent crop, irrigated [natural resource, land]: 11.4943 m2*year; lognormal variance with pedigree 0.0092, pedigree (3,3,3,5,2)
  (same comment as for ammonium sulfate)
- Transformation, from permanent crop, irrigated [natural resource, land]: 0.862069 m2; lognormal variance with pedigree 0.0152, pedigree (3,3,3,5,2)
  (same comment as for ammonium sulfate)
- Transformation, to permanent crop, irrigated [natural resource, land]: 0.862069 m2; lognormal variance with pedigree 0.0152, pedigree (3,3,3,5,2)
  (same comment as for ammonium sulfate)

## Emissions to nature
- Ammonia [air, non-urban air or from high stacks]: 0.0909272 kg; lognormal variance with pedigree 0.0286, pedigree (4,5,3,5,2)
  (same comment as for ammonium sulfate)
- Carbon dioxide, fossil [air, non-urban air or from high stacks]: 0.620793 kg; lognormal variance with pedigree 0.0212, pedigree (4,5,3,5,2)
  (same comment as for ammonium sulfate)
- Dinitrogen monoxide [air, non-urban air or from high stacks]: 0.0100134 kg; lognormal variance with pedigree 0.0506, pedigree (4,5,3,5,2)
  (same comment as for ammonium sulfate)
- Nitrogen oxides [air, non-urban air or from high stacks]: 0.0299313 kg; lognormal variance with pedigree 0.0606, pedigree (4,5,3,5,2)
  (same comment as for ammonium sulfate)
- Water [air, non-urban air or from high stacks]: 2.32138 m3; lognormal variance with pedigree 0.0212, pedigree (4,5,3,5,2)
  (same comment as for ammonium sulfate)
- Aldicarb [soil, agricultural]: 0.00219828 kg; lognormal variance with pedigree 0.0536, pedigree (4,5,3,5,2)
  Substitute for Carbaryl
- Cadmium II [soil, agricultural]: 4.48068e-6 kg; lognormal variance with pedigree 0.0606, pedigree (4,5,3,5,2)
  (same comment as for ammonium sulfate)
- Chromium III [soil, agricultural]: 4.34317e-5 kg; lognormal variance with pedigree 0.0606, pedigree (4,5,3,5,2)
  (same comment as for ammonium sulfate)
- Copper ion [soil, agricultural]: 3.24019e-5 kg; lognormal variance with pedigree 0.0606, pedigree (4,5,3,5,2)
  (same comment as for ammonium sulfate)
- Lead II [soil, agricultural]: 1.51452e-5 kg; lognormal variance with pedigree 0.0606, pedigree (4,5,3,5,2)
  (same comment as for ammonium sulfate)
- Mercury II [soil, agricultural]: 2.04159e-7 kg; lognormal variance with pedigree 0.0606, pedigree (4,5,3,5,2)
  (same comment as for ammonium sulfate)
- Nickel II [soil, agricultural]: 1.43971e-5 kg; lognormal variance with pedigree 0.0606, pedigree (4,5,3,5,2)
  (same comment as for ammonium sulfate)
- Zinc II [soil, agricultural]: 8.60508e-5 kg; lognormal variance with pedigree 0.0606, pedigree (4,5,3,5,2)
  (same comment as for ammonium sulfate)
- Cadmium II [water, ground-]: 4.99287e-8 kg; lognormal variance with pedigree 0.1106, pedigree (4,5,3,5,2)
  (same comment as for ammonium sulfate)
- Cadmium II [water, surface water]: 1.83194e-12 kg; lognormal variance with pedigree 0.1106, pedigree (4,5,3,5,2)
  (same comment as for ammonium sulfate)
- Chromium III [water, ground-]: 2.30068e-5 kg; lognormal variance with pedigree 0.1106, pedigree (4,5,3,5,2)
  (same comment as for ammonium sulfate)
- Chromium III [water, surface water]: 1.75096e-10 kg; lognormal variance with pedigree 0.1106, pedigree (4,5,3,5,2)
  (same comment as for ammonium sulfate)
- Copper ion [water, ground-]: 3.8999e-6 kg; lognormal variance with pedigree 0.1106, pedigree (4,5,3,5,2)
  (same comment as for ammonium sulfate)
- Copper ion [water, surface water]: 2.53764e-10 kg; lognormal variance with pedigree 0.1106, pedigree (4,5,3,5,2)
  (same comment as for ammonium sulfate)
- Lead II [water, ground-]: 3.91713e-7 kg; lognormal variance with pedigree 0.1106, pedigree (4,5,3,5,2)
  (same comment as for ammonium sulfate)
- Lead II [water, surface water]: 9.71424e-11 kg; lognormal variance with pedigree 0.1106, pedigree (4,5,3,5,2)
  (same comment as for ammonium sulfate)
- Mercury II [water, ground-]: 1.24849e-9 kg; lognormal variance with pedigree 0.1106, pedigree (4,5,3,5,2)
  (same comment as for ammonium sulfate)
- Mercury II [water, surface water]: 4.419e-13 kg; lognormal variance with pedigree 0.1106, pedigree (4,5,3,5,2)
  (same comment as for ammonium sulfate)
- Nickel II [water, surface water]: 1.29861e-10 kg; lognormal variance with pedigree 0.1106, pedigree (4,5,3,5,2)
  (same comment as for ammonium sulfate)
- Nitrate [water, ground-]: 0.385967 kg; lognormal variance with pedigree 0.0606, pedigree (4,5,3,5,2)
  (same comment as for ammonium sulfate)
- Phosphate [water, ground-]: 0.000211461 kg; lognormal variance with pedigree 0.0606, pedigree (4,5,3,5,2)
  (same comment as for ammonium sulfate)
- Phosphate [water, surface water]: 0.00100774 kg; lognormal variance with pedigree 0.0606, pedigree (4,5,3,5,2)
  (same comment as for ammonium sulfate)
- Phosphorus [water, surface water]: 1.41127e-8 kg; lognormal variance with pedigree 0.0606, pedigree (4,5,3,5,2)
  (same comment as for ammonium sulfate)
- Water [water, ground-]: 1.77517 m3; lognormal variance with pedigree 0.0212, pedigree (4,5,3,5,2)
  (same comment as for ammonium sulfate)
- Water [water, surface water]: 0.455172 m3; lognormal variance with pedigree 0.0212, pedigree (4,5,3,5,2)
  (same comment as for ammonium sulfate)
- Zinc II [water, ground-]: 2.5439e-5 kg; lognormal variance with pedigree 0.1106, pedigree (4,5,3,5,2)
  (same comment as for ammonium sulfate)
- Zinc II [water, surface water]: 3.22921e-10 kg; lognormal variance with pedigree 0.1106, pedigree (4,5,3,5,2)
  (same comment as for ammonium sulfate)

## Sampling procedure
The farmer was identified and contacted by agriculture science faculty familiar with the local farmers in the region. Data was collected directly from the farmer through semi-structured interview using a questionnaire based on the input requirements of the ecoinvent LCI calculation tool for crop production. The farmer does not maintain any written records and has provided the data from recent memory. In this region, typically farmers are unable to provide exact name of active ingredient in the pesticide they use and the same was noted from details given on the pesticide packet. Individual farmer is not able to calculate fuel consumption for his own farm alone and this information has been collected from farming community of the area.

## Extrapolations
Ecoinvent LCI calculation tool for crop production was used to calculate field emissions from the cultivation process.
