# concrete, all types to generic market for concrete, medium strength

Dataset: EcoSpold 2, unit process
Geography: RoW
Time period: 2019-01-01 to 2023-12-31
Technology level: current
Classification: ISIC rev.4 ecoinvent: 2395:Manufacture of articles of concrete, cement and plaster
Scenario: Business-as-Usual
System model: Allocation, cut-off by classification
Generated by: Daniela Baumann
Database: ecoinvent
isCopyrightProtected: true
accessRestrictedTo: 1

## General comment
This is a linking (transfering) activity which links the specific concrete types to the generic 'market for concrete, normal strength'.
The shares of the different types of concrete are set based on production volumes of the respective activities and geographies.

## Included activities start
The activity starts with the reception of a specific concrete.

## Included activities end
The activity ends with 'concrete, medium strength' which is supplied to the generic 'market for concrete, medium strength'.

## Reference product
- concrete, medium strength: 1 m3; name concrete_ms; By-product classification allocatable product; CPC 37510: Non-refractory mortars and concretes; HS2017 6810: Cement, concrete or artificial stone; whether or not reinforced, articles thereof
  production volume 1.27113e7 m3; = 69138063.2*0.2
    PV is calculated assuming that 20% of the regional PV is redirected to the generic market.
  property price 191 EUR2005
    Calculated value based on data from United Nations Commodity Trade Statistics Database (comtrade.un.org). UN comtrade category: 681019 Tiles & flagstones of cement, concrete, artificial ston. Year 2005. Using exchange rate of 1EURO = 1.209 USD. Average of price of import into 5 main markets (EU, US, JP, IN and CN).
  properties: carbon allocation 0 kg, carbon content 0, carbon content, fossil 0, carbon content, non-fossil 0, dry mass 2190 kg, water content 0.086758, water in wet mass 190 kg, wet mass 2380 kg

## Inputs from technosphere
- concrete, 40MPa: 0.626599 m3
  Shares calculated based on the regional production volumes.
  property dry mass 2260 kg; name dry_mass
  property water in wet mass 147 kg; name water_in_wet_mass
  property wet mass 2407 kg; name concrete_density
- concrete, 45MPa: 0.000165138 m3
  Shares calculated based on the regional production volumes.
  property dry mass 2243.91 kg; name ref_DM
  property water in wet mass 209 kg; name ref_WWM
  property wet mass 2452.91 kg; name ref_WM
- concrete, 50MPa: 0.373236 m3
  Shares calculated based on the regional production volumes.
  properties: cement content 344 kg, dry mass 2173 kg, fly ash content 81 kg, gravel content 950 kg, sand content 798 kg, water content 0.07133, wet mass 2328 kg
