# maize grain production, second crop

Dataset: EcoSpold 2, unit process
Geography: BR-MT
Time period: 2015-01-01 to 2023-12-31
Technology level: current
Classification: ISIC rev.4 ecoinvent: 0111:Growing of cereals (except rice), leguminous crops and oil seeds
Synonyms: winter maize production, winter maize cultivation, winter corn production
Tags: No
Scenario: Business-as-Usual
System model: Allocation, cut-off by classification
Generated by: Anna Leticia M. T. Pighinelli
Published in: Folegatti Matsuura, M. 2017
Database: ecoinvent
isCopyrightProtected: true
accessRestrictedTo: 1

## General comment
The raw data collected in panels were organized in electronic spreadsheets and checked for completeness and consistency. Agricultural inputs were detailed as to their composition and physical characteristics. Agricultural operations were characterized in terms of machinery (tractor and implement), type of fuel and specific consumption. Precipitation is enought to supply water to the crop, no extra water needed. Emissions from the agricultural process were estimated using the BRCalc/ICVCalc tool, developed by Embrapa Environment, which includes specific climate and soil databases for the 137 Brazilian agricultural mesoregions, in addition to databases of parameters related to agricultural crops, fertilizers and pesticides.
The main emission models adopted by BRCalc/ICVCalc derive from the references: Nemecek et al. (2015), IPCC (2019), Nemecek & Kagi (2007). It was used the model BRLUC (Donke et al., 2020) to estimate the LUC emissions; and the PestLCI Consensus V1.0, parameterized for Brazil (Barizon et al., 2021), to estimate pesticide emissions.

## Included activities start
This activity starts after the harvest of the previous crop.

## Included activities end
The dataset includes the inputs of seeds, mineral fertilisers and pesticides. It is assumed that no organic fertiliser is applied. The dataset includes all machine operations and corresponding machine infrastructure and sheds for: limestone and gypsum application, application of plant protection product, planting with starter fertiliser, fertilising, combine harvesting and drying of grains. For other agricultural operations, the amount of fuel consumed and their emissions are estimated. The dataset also includes the transportation of products inside the farm: water, soil correctives and fertilisers from sheds to field and grain from field to truck. Furthermore, direct field emissions and land use change emissions are included, with important regionalizations added. The dataset doesn't include: seed treatment, cleaning and storage of harvested grains. The activity ends after harvest at the farm gate.

## Allocation
In Brazil, maize can be produced as a monoculture or in cropping systems. For the fraction of maize produced in cropping systems, land occupation, liming operation and limestone are allocated among the products of the system, adopting factors that consider the fraction of area and the occupation time.

## Geography
The inventory is modelled for Brazil, Mato Grosso

## Technology
This dataset represents the production of 1 kg of maize in the state of Mato Grosso, which is composed of the maize regions of Alto Teles Pires, Aripuanã and Colíder. In these regions, maize is produced in cropping systems, including other crops such as soybeans. When in a cropping system, land occupation, liming operation and limestone are allocated among the products of the system, adopting factors that consider the fraction of area and the occupation time. The average productivity is 6296 kg/ha, at 13% moisture.
Agricultural operation was modelled based on the total diesel consumed to perform the operation and the emissions to air related to diesel burning.

## Time period
Time period of the most of the data collected for this dataset.

## Reference product
- maize grain: 1 kg; By-product classification allocatable product; CPC 01122: Maize (corn), other; HS2017 100590: Cereals; maize (corn), other than seed
  This dataset represents the production of 1 kg of maize in the state of Mato Grosso, which is composed of the maize regions of Alto Teles Pires, Aripuanã and Colíder. In these regions, maize is produced in cropping systems, including other crops such as soybeans. When in a cropping system, land occupation, liming operation and limestone are allocated among the products of the system, adopting factors that consider the fraction of area and the occupation time. The average productivity is 6296 kg/ha, at 13% moisture.
  production volume 3.33963e10 kg
    The covered datasets together represent 95,2% of national production (PV). Due to the high representativeness and the lack of information regarding the other regions not covered by the inventories, it was assumed that the available data represent 100% of the national production and a new percentage of contribution was attributed to each state.
  property price 0.12 EUR2005
    Literature value. Based on SAFEX price of R 2,025 per tonne (average yellow and white). Source: SAGIS, 2018. Retrieved from: http://www.sagis.org.za/safex_historic.html, accessed 28May2018.
  properties: carbon allocation 0.40383 kg, carbon content 0.46957, carbon content, fossil 0, carbon content, non-fossil 0.46957, dry mass 0.86 kg, water content 0.162791, water in wet mass 0.14 kg, wet mass 1 kg

## Inputs from technosphere
- atrazine: 0.0002 kg; lognormal variance with pedigree 1.0709, pedigree (2,2,2,1,1)
  The amount of pesticide or adjuvant was obtained from interviews with producers and experts. Concentration of the active ingredient was obtained in the Material Safety Data Sheet. The amount of dilution water was 200 L/ha per application.
  properties: carbon content, fossil 0.446512, dry mass 1 kg, wet mass 1 kg
- diesel, low-sulfur: 0.00376 kg; lognormal variance with pedigree 1.2403, pedigree (3,2,2,1,3)
  The amount of diesel fuel (B12 mix in Brazil) used in agricultural operations not found in ecoinvent
  properties: carbon content, fossil 0.865, dry mass 1 kg, heating value, net 42.8 MJ, wet mass 1 kg
- fatty acid methyl ester: 0.000531055 kg; lognormal variance with pedigree 1.2403, pedigree (3,2,2,1,3)
  The amount of biodiesel fuel (B12 mix in Brazil) used in agricultural operations not found in ecoinvent plus the fatty acids used as pesticide adjuvant
  properties: carbon content, fossil 0.041, carbon content, non-fossil 0.732, dry mass 1 kg, heating value, net 37.2 MJ, wet mass 1 kg
  note on heating value, net: Based on literature, report 17, page 439. Jungbluth, N., Chudacoff, M., Dauriat, A., Dinkel, F., Doka, G., Faist Emmenegger, M., Gnansounou, E., Kljun, N., Schleiss, K., Spielmann, M., Stettler, C., Sutter, J. 2007: Life Cycle Inventories of Bioenergy. ecoinvent report No. 17, Swiss Centre for Life Cycle Inventories, Dübendorf, CH.
- glyphosate: 0.00023 kg; lognormal variance with pedigree 1.0709, pedigree (2,2,2,1,1)
  (same comment as for atrazine)
  properties: carbon content, fossil 0.214286, dry mass 1 kg, wet mass 1 kg
- land use change, annual crop: 0.000146671 ha; lognormal variance with pedigree 1.22882, pedigree (2,1,2,2,3)
  LUC modeling implemented in ecoinvent for Brazil is based on Donke et al. (2020). LUC amount was updated, based on yield and crop expansion rate from IBGE (2022). Reference years: average among 2017, 2018, 2019. Equation: (1/yield * % crop expansion). The yield is the average for the years 2017 to 2019. Expansion: difference of the average area of the years 2017 to 2019 (t1=t0+20) for the years 1998 to 2000 (t0), by the formula (1-(t0/t1)).
- lime: 0.035 kg; lognormal variance with pedigree 1.1123, pedigree (3,2,2,1,1)
  The amount of soil corrective was obtained from interviews with producers and experts.
  properties: carbon content, fossil 0.120005, dry mass 1 kg, wet mass 1 kg
- maize seed, for sowing: 0.0032 kg; lognormal variance with pedigree 1.0902, pedigree (1,1,2,1,1)
  The amount of seeds for sowing
  property carbon content, non-fossil 0.45263; name C_content_non_fossil
  property dry mass 0.88 kg; name DM
  property water content 0.136364; name water_content
  property water in wet mass 0.12 kg; name WWM
  property wet mass 1 kg; name WM
  note on carbon content, non-fossil: biogene carbon content on a dry matter basis; Composition data obtained from Corn Grain Whole, in (http://beefmagazine.com/images/2009%20feed%20table.pdf). First, composition data were refered to 1 kg dry mass. Then, C-contents were calculated considering a C-content/dry mass of 44% in carbohydrates (including fibres), 53% in proteins and 75% in fats. All data from ecoinvent report, n 15a, pg 40, except C-content in protein, that comes from Determination of protein concentration by total organic carbon analysis, Rouwenhorst et al., 1991, J Biochem and Biophys Methods, 22:119-128.
- monoammonium phosphate: 0.018 kg; lognormal variance with pedigree 1.0709, pedigree (2,2,2,1,1)
  The amount of fertiliser was obtained from interviews with producers and experts. The nutrient content in the input was obtained from technical literature and technical regulation documents. The selection of the fertiliser from the ecoinvent database and its ammount was based on the commercial product.
  properties: dry mass 1 kg, nitrogen content 0.084, phosphorus content 0.226939, wet mass 1 kg
  note on nitrogen content: Nitrogen content (on a dry matter basis) of monoammonium phosphate is calculated from the molecular formula of the nutrient present in the substance.
  note on phosphorus content: Phosphorus content (on a dry matter basis) of monoammonium phosphate is calculated from the molecular formula of the nutrient present in the substance.
- packaging, for fertilisers: 0.057 kg; lognormal variance with pedigree 1.6408, pedigree (4,3,2,5,4)
  The HDPE packaging was considered for macronutrient fertilisers. Soil correctives were not considered in the packaging calculation since these are transported in bulk. The amount of packaging for pesticides was also estimated. It was considered twice the value of the active ingredient of fertilisers and pesticides applied in the field to account for the packaging of the diluted products. The production and disposal of the packaging were included in this exchange.
  properties: carbon content, fossil 0.825301, dry mass 1 kg, price 0.0642 EUR2005, wet mass 1 kg
  note on carbon content, fossil: Considering a chemical formula (C2H4)n for polyethylene, carbon content-fossil is calculated to be 0.856286 kg of Carbon per kg of dry mass.
- packaging, for pesticides: 0.00096 kg; lognormal variance with pedigree 1.6408, pedigree (4,3,2,5,4)
  (same comment as for packaging, for fertilisers)
  properties: carbon content, fossil 0.85714, dry mass 1 kg, price 0.0642 EUR2005, wet mass 1 kg
- pesticide, unspecified: 5.4e-5 kg; lognormal variance with pedigree 1.0709, pedigree (2,2,2,1,1)
  The commercial pesticides not found in the ecoinvent database were summed up and added as “pesticide, unspecified” in kg/kg: Azoxystrobin (1,9E-05), carbendazim (4,6E-09), cyproconazole (7,9E-06), chlorantraniliprole (3,2E-06), chlorpyrifos (8,8E-08), imidacloprid (8,2E-08), lambda-cyhalothrin (3,2E-06), lufenuron (1,6E-06), methomyl (2,4E-07), Nonyl Phenoxy Poly (Ethyleneoxy) Ethanol (3,0E-09), Other Ingredients (5,0E-08), Tebuconazole (1,8E-08), Tembotrione (6,3E-06), thiabendazole (3,2E-06), thiamethoxam (9,5E-06), Thiram (1,1E-08), Trifloxystrobin (9,1E-09), triflumuron (1,1E-08).
  properties: carbon content, fossil 0.486978, dry mass 1 kg, wet mass 1 kg
- potassium chloride: 0.013 kg; lognormal variance with pedigree 1.0709, pedigree (2,2,2,1,1)
  (same comment as for monoammonium phosphate)
  properties: dry mass 1 kg, wet mass 1 kg
- transport, tractor and trailer, agricultural: 0.0051 metric ton*km; lognormal variance with pedigree 1.1123, pedigree (3,2,2,1,1)
  Average transport of fertilisers, limestone and gypsum from shed to field.. Transport of sugarcane from field to warehouse and transport of tapwater for pesticide spray from source to mixing point. are also included. Calculation based on consultation to experts.
- urea: 0.024 kg; lognormal variance with pedigree 1.0709, pedigree (2,2,2,1,1)
  (same comment as for monoammonium phosphate)
  properties: carbon content, fossil 0.2, dry mass 1 kg, wet mass 1 kg

## Inputs from nature
- Carbon dioxide, in air [natural resource, in air]: 1.6317 kg; lognormal variance with pedigree 1.0709, pedigree (2,2,2,1,1)
  Carbon dioxide (CO2) absorption from air during photosynthesis was also included, according to Nemecek and Schnetzer (2012). It considers the carbon content of the reference product based on the ecoinvent database (Jungbluth et al., 2007).
- Occupation, annual crop, non-irrigated, intensive [natural resource, land]: 0.435 m2*year; lognormal variance with pedigree 1.1022, pedigree (3,1,2,1,1)
  The land occupation was calculated based on crop yield
- Transformation, from annual crop, non-irrigated, intensive [natural resource, land]: 1.59 m2; lognormal variance with pedigree 1.0608, pedigree (2,1,2,1,1)
  The LUC input comprises the actual data related to land transformation. This land transformation flow is irrelevant to LUC and the amounts are equal in both the 'land transformation from' and 'land transformation to'.
- Transformation, to annual crop, non-irrigated, intensive [natural resource, land]: 1.59 m2; lognormal variance with pedigree 1.0608, pedigree (2,1,2,1,1)
  (same comment as for Transformation, from annual crop, non-irrigated, intensive)
- Water, unspecified natural origin [natural resource, in water]: 0.00013 m3; lognormal variance with pedigree 1.0608, pedigree (2,1,2,1,1)
  Water consumed for pesticide dilution. Estimated volume based on interviews with producers and experts

## Emissions to nature
- Ammonia [air, non-urban air or from high stacks]: 0.00228008 kg; lognormal variance with pedigree 1.13033, pedigree (3,2,2,2,3)
  Ammonia releases to air, according to the AGRAMMON model: 'Plant production' (Nemecek & Schnetzer, 2011)
- Atrazine [air, non-urban air or from high stacks]: 1.99e-5 kg; lognormal variance with pedigree 1.1123, pedigree (3,2,2,1,1)
  Pesticide emissions are calculated using the PestLCI model, adapted to the Brazilian conditions (Embrapa, 2021; PestLCI, 2022).
- Azoxystrobin [air, non-urban air or from high stacks]: 1.9e-6 kg; lognormal variance with pedigree 1.1123, pedigree (3,2,2,1,1)
  (same comment as for Atrazine)
- Benzene [air, non-urban air or from high stacks]: 2.74e-8 kg; lognormal variance with pedigree 1.2403, pedigree (3,2,2,1,3)
  Emissions derived from fuel combustion (diesel 88%, and biodiesel 12%), using emission factors from Nemecek & Kagi (2007)
- Benzo(a)pyrene [air, non-urban air or from high stacks]: 1.13e-10 kg; lognormal variance with pedigree 1.2403, pedigree (3,2,2,1,3)
  (same comment as for Benzene)
- Cadmium II [air, non-urban air or from high stacks]: 3.76e-11 kg; lognormal variance with pedigree 1.2403, pedigree (3,2,2,1,3)
  (same comment as for Benzene)
- Carbendazim [air, non-urban air or from high stacks]: 4.56e-10 kg; lognormal variance with pedigree 1.1123, pedigree (3,2,2,1,1)
  (same comment as for Atrazine)
- Carbon dioxide, fossil [air, non-urban air or from high stacks]: 0.045 kg; lognormal variance with pedigree 1.11233, pedigree (3,2,2,2,1)
  Carbon dioxide releases from urea and limestone application, according to IPCC (2006) plus emissions derived from fuel combustion (diesel 88%, and biodiesel 12%), using emission factors from Nemecek & Kagi (2007)
- Carbon dioxide, non-fossil [air, non-urban air or from high stacks]: 0.00147 kg; lognormal variance with pedigree 1.1089, pedigree (4,3,2,3,1)
  (same comment as for Benzene)
- Carbon monoxide, fossil [air, non-urban air or from high stacks]: 2.01e-5 kg; lognormal variance with pedigree 1.2403, pedigree (3,2,2,1,3)
  (same comment as for Benzene)
- Chlorantraniliprole [air, non-urban air or from high stacks]: 3.17e-7 kg; lognormal variance with pedigree 1.1123, pedigree (3,2,2,1,1)
  (same comment as for Atrazine)
- Chlorpyrifos [air, non-urban air or from high stacks]: 9.11e-9 kg; lognormal variance with pedigree 1.1123, pedigree (3,2,2,1,1)
  (same comment as for Atrazine)
- Chromium III [air, non-urban air or from high stacks]: 1.88e-10 kg; lognormal variance with pedigree 1.2403, pedigree (3,2,2,1,3)
  (same comment as for Benzene)
- Copper ion [air, non-urban air or from high stacks]: 6.39e-9 kg; lognormal variance with pedigree 1.2403, pedigree (3,2,2,1,3)
  (same comment as for Benzene)
- Cyproconazole [air, non-urban air or from high stacks]: 7.6e-7 kg; lognormal variance with pedigree 1.1123, pedigree (3,2,2,1,1)
  (same comment as for Atrazine)
- Dinitrogen monoxide [air, non-urban air or from high stacks]: 0.000429463 kg; lognormal variance with pedigree 1.11033, pedigree (3,2,2,2,3)
  Direct and indirect N2O emissions according to IPCC (2019) plus emissions derived from fuel combustion (diesel 88%, and biodiesel 12%), using emission factors from Nemecek & Kagi (2007)
- Fludioxonil [air, non-urban air or from high stacks]: 3.95e-8 kg; lognormal variance with pedigree 1.1123, pedigree (3,2,2,1,1)
  (same comment as for Atrazine)
- Glyphosate [air, non-urban air or from high stacks]: 2.28e-5 kg; lognormal variance with pedigree 1.1123, pedigree (3,2,2,1,1)
  (same comment as for Atrazine)
- Hydrocarbons, unspecified [air, non-urban air or from high stacks]: 1.13e-5 kg; lognormal variance with pedigree 1.2403, pedigree (3,2,2,1,3)
  (same comment as for Benzene)
- Imidacloprid [air, non-urban air or from high stacks]: 8.23e-9 kg; lognormal variance with pedigree 1.1123, pedigree (3,2,2,1,1)
  (same comment as for Atrazine)
- Lambda-cyhalothrin [air, non-urban air or from high stacks]: 3.35e-7 kg; lognormal variance with pedigree 1.1123, pedigree (3,2,2,1,1)
  (same comment as for Atrazine)
- Metalaxyl-M [air, non-urban air or from high stacks]: 3.16e-8 kg; lognormal variance with pedigree 1.1123, pedigree (3,2,2,1,1)
  (same comment as for Atrazine)
- Methane, fossil [air, non-urban air or from high stacks]: 4.85e-7 kg; lognormal variance with pedigree 1.2403, pedigree (3,2,2,1,3)
  (same comment as for Benzene)
- Methane, non-fossil [air, non-urban air or from high stacks]: 2e-7 kg; lognormal variance with pedigree 1.2403, pedigree (3,2,2,1,3)
  (same comment as for Benzene)
- Methomyl [air, non-urban air or from high stacks]: 2.42e-8 kg; lognormal variance with pedigree 1.1123, pedigree (3,2,2,1,1)
  (same comment as for Atrazine)
- Nickel II [air, non-urban air or from high stacks]: 2.63e-10 kg; lognormal variance with pedigree 1.2403, pedigree (3,2,2,1,3)
  (same comment as for Benzene)
- Nitrogen oxides [air, non-urban air or from high stacks]: 0.00032 kg; lognormal variance with pedigree 1.11033, pedigree (3,2,2,2,3)
  Emissions of NOx from applied mineral fertilisers, according to WFLDB (2019)
- PAH, polycyclic aromatic hydrocarbons [air, non-urban air or from high stacks]: 1.24e-8 kg; lognormal variance with pedigree 1.2403, pedigree (3,2,2,1,3)
  (same comment as for Benzene)
- Particulate Matter, < 2.5 um [air, non-urban air or from high stacks]: 2.1e-7 kg; lognormal variance with pedigree 1.2403, pedigree (3,2,2,1,3)
  (same comment as for Benzene)
- Selenium IV [air, non-urban air or from high stacks]: 3.76e-11 kg; lognormal variance with pedigree 1.2403, pedigree (3,2,2,1,3)
  (same comment as for Benzene)
- Sulfur dioxide [air, non-urban air or from high stacks]: 3.8e-6 kg; lognormal variance with pedigree 1.2403, pedigree (3,2,2,1,3)
  (same comment as for Benzene)
- Tebuconazole [air, non-urban air or from high stacks]: 1.83e-9 kg; lognormal variance with pedigree 1.1123, pedigree (3,2,2,1,1)
  (same comment as for Atrazine)
  property carbon content, fossil 0.624307; name C_content_fossil_Tebuconazole
- Thiabendazole [air, non-urban air or from high stacks]: 2.37e-7 kg; lognormal variance with pedigree 1.1123, pedigree (3,2,2,1,1)
  (same comment as for Atrazine)
- Thiamethoxam [air, non-urban air or from high stacks]: 9.99e-7 kg; lognormal variance with pedigree 1.1123, pedigree (3,2,2,1,1)
  (same comment as for Atrazine)
- Trifloxystrobin [air, non-urban air or from high stacks]: 9.13e-10 kg; lognormal variance with pedigree 1.1123, pedigree (3,2,2,1,1)
  (same comment as for Atrazine)
- Triflumuron [air, non-urban air or from high stacks]: 1.1e-9 kg; lognormal variance with pedigree 1.1123, pedigree (3,2,2,1,1)
  (same comment as for Atrazine)
- Water [air, unspecified]: 0.00013 m3; lognormal variance with pedigree 0.0034, pedigree (2,1,2,5,1)
- Zinc II [air, non-urban air or from high stacks]: 3.76e-9 kg; lognormal variance with pedigree 1.2403, pedigree (3,2,2,1,3)
  (same comment as for Benzene)
- Atrazine [soil, agricultural]: 0.000128 kg; lognormal variance with pedigree 1.11233, pedigree (3,2,2,2,1)
  (same comment as for Atrazine)
- Atrazine [soil, forestry]: 1.55e-6 kg; lognormal variance with pedigree 1.11233, pedigree (3,2,2,2,1)
  (same comment as for Atrazine)
- Azoxystrobin [soil, agricultural]: 1.55e-5 kg; lognormal variance with pedigree 1.11233, pedigree (3,2,2,2,1)
  (same comment as for Atrazine)
- Azoxystrobin [soil, forestry]: 1.47e-7 kg; lognormal variance with pedigree 1.11233, pedigree (3,2,2,2,1)
  (same comment as for Atrazine)
- Cadmium II [soil, agricultural]: -2.42768e-8 kg; normal variance with pedigree 1.21, pedigree (5,5,5,5,5)
  Heavy metals emissions to agricultural soil through erosion are estimated by using the SALCA-heavy metal model (Nemecek et al., 2015).
  Uncertainty: Emissions of heavy metals to soil estimated based on WFLDB adapted to Brazil
- Carbendazim [soil, agricultural]: 3.93e-9 kg; lognormal variance with pedigree 1.11233, pedigree (3,2,2,2,1)
  (same comment as for Atrazine)
- Carbendazim [soil, forestry]: 3.56e-11 kg; lognormal variance with pedigree 1.11233, pedigree (3,2,2,2,1)
  (same comment as for Atrazine)
- Chlorantraniliprole [soil, agricultural]: 2.12e-6 kg; lognormal variance with pedigree 1.11233, pedigree (3,2,2,2,1)
  (same comment as for Atrazine)
- Chlorantraniliprole [soil, forestry]: 2.45e-8 kg; lognormal variance with pedigree 1.11233, pedigree (3,2,2,2,1)
  (same comment as for Atrazine)
- Chlorpyrifos [soil, agricultural]: 3.73e-8 kg; lognormal variance with pedigree 1.11233, pedigree (3,2,2,2,1)
  (same comment as for Atrazine)
- Chlorpyrifos [soil, forestry]: 6.79e-10 kg; lognormal variance with pedigree 1.11233, pedigree (3,2,2,2,1)
  (same comment as for Atrazine)
- Copper ion [soil, agricultural]: -1.77484e-6 kg; normal variance with pedigree 1.21, pedigree (5,5,5,5,5)
  (same comment as for Cadmium II)
- Cyproconazole [soil, agricultural]: 2.26e-6 kg; lognormal variance with pedigree 1.11233, pedigree (3,2,2,2,1)
  (same comment as for Atrazine)
- Cyproconazole [soil, forestry]: 5.9e-8 kg; lognormal variance with pedigree 1.11233, pedigree (3,2,2,2,1)
  (same comment as for Atrazine)
- Fludioxonil [soil, agricultural]: 3.34e-7 kg; lognormal variance with pedigree 1.11233, pedigree (3,2,2,2,1)
  (same comment as for Atrazine)
- Fludioxonil [soil, forestry]: 3.07e-9 kg; lognormal variance with pedigree 1.11233, pedigree (3,2,2,2,1)
  (same comment as for Atrazine)
- Glyphosate [soil, agricultural]: 0.000185 kg; lognormal variance with pedigree 1.11233, pedigree (3,2,2,2,1)
  (same comment as for Atrazine)
- Glyphosate [soil, forestry]: 1.77e-6 kg; lognormal variance with pedigree 1.11233, pedigree (3,2,2,2,1)
  (same comment as for Atrazine)
- Imidacloprid [soil, agricultural]: 7.16e-8 kg; lognormal variance with pedigree 1.11233, pedigree (3,2,2,2,1)
  (same comment as for Atrazine)
- Imidacloprid [soil, forestry]: 6.81e-10 kg; lognormal variance with pedigree 1.11233, pedigree (3,2,2,2,1)
  (same comment as for Atrazine)
- Lambda-cyhalothrin [soil, agricultural]: 7.43e-7 kg; lognormal variance with pedigree 1.11233, pedigree (3,2,2,2,1)
  (same comment as for Atrazine)
- Lambda-cyhalothrin [soil, forestry]: 2.59e-8 kg; lognormal variance with pedigree 1.11233, pedigree (3,2,2,2,1)
  (same comment as for Atrazine)
- Lead II [soil, agricultural]: -1.64569e-7 kg; normal variance with pedigree 1.21, pedigree (5,5,5,5,5)
  (same comment as for Cadmium II)
- Lufenuron [soil, agricultural]: 1.58e-6 kg; lognormal variance with pedigree 1.11233, pedigree (3,2,2,2,1)
  (same comment as for Atrazine)
- Lufenuron [soil, forestry]: 1.22e-8 kg; lognormal variance with pedigree 1.11233, pedigree (3,2,2,2,1)
  (same comment as for Atrazine)
- Mercury II [soil, agricultural]: -1.52e-6 kg; normal variance with pedigree 1.21, pedigree (5,5,5,5,5)
  (same comment as for Cadmium II)
- Metalaxyl-M [soil, agricultural]: 2.69e-7 kg; lognormal variance with pedigree 1.11233, pedigree (3,2,2,2,1)
  (same comment as for Atrazine)
- Metalaxyl-M [soil, forestry]: 2.51e-9 kg; lognormal variance with pedigree 1.11233, pedigree (3,2,2,2,1)
  (same comment as for Atrazine)
- Methomyl [soil, agricultural]: 9.06e-8 kg; lognormal variance with pedigree 1.11233, pedigree (3,2,2,2,1)
  (same comment as for Atrazine)
- Methomyl [soil, forestry]: 2.01e-9 kg; lognormal variance with pedigree 1.11233, pedigree (3,2,2,2,1)
  (same comment as for Atrazine)
- Pesticides, unspecified [soil, agricultural]: 8.79e-9 kg; lognormal variance with pedigree 1.11233, pedigree (3,2,2,2,1)
  (same comment as for Atrazine)
- Pesticides, unspecified [soil, forestry]: 8.25e-11 kg; lognormal variance with pedigree 1.11233, pedigree (3,2,2,2,1)
  (same comment as for Atrazine)
- Tebuconazole [soil, agricultural]: 7.99e-9 kg; lognormal variance with pedigree 1.11233, pedigree (3,2,2,2,1)
  (same comment as for Atrazine)
- Tebuconazole [soil, forestry]: 1.41e-10 kg; lognormal variance with pedigree 1.11233, pedigree (3,2,2,2,1)
  (same comment as for Atrazine)
- Tembotrione [soil, agricultural]: 6.01e-6 kg; lognormal variance with pedigree 1.11233, pedigree (3,2,2,2,1)
  (same comment as for Atrazine)
- Tembotrione [soil, forestry]: 4.63e-8 kg; lognormal variance with pedigree 1.11233, pedigree (3,2,2,2,1)
  (same comment as for Atrazine)
- Thiabendazole [soil, agricultural]: 2.1e-6 kg; lognormal variance with pedigree 1.11233, pedigree (3,2,2,2,1)
  (same comment as for Atrazine)
- Thiabendazole [soil, forestry]: 1.85e-8 kg; lognormal variance with pedigree 1.11233, pedigree (3,2,2,2,1)
  (same comment as for Atrazine)
- Thiamethoxam [soil, agricultural]: 8.42e-6 kg; lognormal variance with pedigree 1.11233, pedigree (3,2,2,2,1)
  (same comment as for Atrazine)
- Thiamethoxam [soil, forestry]: 7.97e-8 kg; lognormal variance with pedigree 1.11233, pedigree (3,2,2,2,1)
  (same comment as for Atrazine)
- Trifloxystrobin [soil, agricultural]: 3.56e-9 kg; lognormal variance with pedigree 1.11233, pedigree (3,2,2,2,1)
  (same comment as for Atrazine)
- Trifloxystrobin [soil, forestry]: 7.07e-11 kg; lognormal variance with pedigree 1.11233, pedigree (3,2,2,2,1)
  (same comment as for Atrazine)
- Triflumuron [soil, agricultural]: 4.67e-9 kg; lognormal variance with pedigree 1.11233, pedigree (3,2,2,2,1)
  (same comment as for Atrazine)
- Triflumuron [soil, forestry]: 8.49e-11 kg; lognormal variance with pedigree 1.11233, pedigree (3,2,2,2,1)
  (same comment as for Atrazine)
- Atrazine [water, ground-]: 6.77e-7 kg; lognormal variance with pedigree 1.11233, pedigree (3,2,2,2,1)
  (same comment as for Atrazine)
- Atrazine [water, unspecified]: 2.06e-8 kg; lognormal variance with pedigree 1.11233, pedigree (3,2,2,2,1)
  (same comment as for Atrazine)
- Azoxystrobin [water, ground-]: 1.32e-8 kg; lognormal variance with pedigree 1.11233, pedigree (3,2,2,2,1)
  (same comment as for Atrazine)
- Azoxystrobin [water, unspecified]: 1.95e-9 kg; lognormal variance with pedigree 1.11233, pedigree (3,2,2,2,1)
  (same comment as for Atrazine)
- Cadmium II [water, surface water]: 1.52333e-13 kg; lognormal variance with pedigree 1.11233, pedigree (3,2,2,2,1)
  Emissions of heavy metals to surface water are calculated according to Schmidt (2007)
- Carbendazim [water, ground-]: 2.04e-11 kg; lognormal variance with pedigree 1.11233, pedigree (3,2,2,2,1)
  (same comment as for Atrazine)
- Carbendazim [water, unspecified]: 4.73e-13 kg; lognormal variance with pedigree 1.11233, pedigree (3,2,2,2,1)
  (same comment as for Atrazine)
- Chlorantraniliprole [water, ground-]: 5.79e-9 kg; lognormal variance with pedigree 1.11233, pedigree (3,2,2,2,1)
  (same comment as for Atrazine)
- Chlorantraniliprole [water, unspecified]: 3.26e-10 kg; lognormal variance with pedigree 1.11233, pedigree (3,2,2,2,1)
  (same comment as for Atrazine)
- Chlorpyrifos [water, ground-]: 7.9e-12 kg; lognormal variance with pedigree 1.11233, pedigree (3,2,2,2,1)
  (same comment as for Atrazine)
- Chlorpyrifos [water, unspecified]: 9.02e-12 kg; lognormal variance with pedigree 1.11233, pedigree (3,2,2,2,1)
  (same comment as for Atrazine)
- Chromium III [water, surface water]: 4.06014e-11 kg; lognormal variance with pedigree 1.11233, pedigree (3,2,2,2,1)
  Emissions of heavy metals to surface water are calculated according to Schmidt (2007)
- Copper ion [water, surface water]: 3.75199e-11 kg; lognormal variance with pedigree 1.11233, pedigree (3,2,2,2,1)
  Emissions of heavy metals to surface water are calculated according to Schmidt (2007)
- Cyproconazole [water, ground-]: 1.23e-8 kg; lognormal variance with pedigree 1.11233, pedigree (3,2,2,2,1)
  (same comment as for Atrazine)
- Cyproconazole [water, unspecified]: 7.83e-10 kg; lognormal variance with pedigree 1.11233, pedigree (3,2,2,2,1)
  (same comment as for Atrazine)
- Fludioxonil [water, ground-]: 2.7e-12 kg; lognormal variance with pedigree 1.11233, pedigree (3,2,2,2,1)
  (same comment as for Atrazine)
- Fludioxonil [water, unspecified]: 4.06e-11 kg; lognormal variance with pedigree 1.11233, pedigree (3,2,2,2,1)
  (same comment as for Atrazine)
- Glyphosate [water, ground-]: 1.38e-8 kg; lognormal variance with pedigree 1.11233, pedigree (3,2,2,2,1)
  (same comment as for Atrazine)
- Glyphosate [water, unspecified]: 2.34e-8 kg; lognormal variance with pedigree 1.11233, pedigree (3,2,2,2,1)
  (same comment as for Atrazine)
- Imidacloprid [water, ground-]: 1.32e-9 kg; lognormal variance with pedigree 1.11233, pedigree (3,2,2,2,1)
  (same comment as for Atrazine)
- Imidacloprid [water, unspecified]: 7.33e-12 kg; lognormal variance with pedigree 1.11233, pedigree (3,2,2,2,1)
  (same comment as for Atrazine)
- Lambda-cyhalothrin [water, ground-]: 3.83e-12 kg; lognormal variance with pedigree 1.11233, pedigree (3,2,2,2,1)
  (same comment as for Atrazine)
- Lambda-cyhalothrin [water, unspecified]: 3.45e-10 kg; lognormal variance with pedigree 1.11233, pedigree (3,2,2,2,1)
  (same comment as for Atrazine)
- Lead II [water, surface water]: 9.344e-12 kg; lognormal variance with pedigree 1.11233, pedigree (3,2,2,2,1)
  Emissions of heavy metals to surface water are calculated according to Schmidt (2007)
- Metalaxyl-M [water, ground-]: 4.9e-9 kg; lognormal variance with pedigree 1.11233, pedigree (3,2,2,2,1)
  (same comment as for Atrazine)
- Metalaxyl-M [water, unspecified]: 3.34e-11 kg; lognormal variance with pedigree 1.11233, pedigree (3,2,2,2,1)
  (same comment as for Atrazine)
- Methomyl [water, ground-]: 1.98e-9 kg; lognormal variance with pedigree 1.11233, pedigree (3,2,2,2,1)
  (same comment as for Atrazine)
- Methomyl [water, unspecified]: 1.75e-11 kg; lognormal variance with pedigree 1.11233, pedigree (3,2,2,2,1)
  (same comment as for Atrazine)
- Nitrate [water, ground-]: 0.0658 kg; lognormal variance with pedigree 1.11233, pedigree (3,2,2,2,1)
  The SQCB-NO3 model was used according to Nemecek et al. (2015), considering only the quantity of water from precipitation (no irrigation was applied). Technical parameters are available in the BRCalc/ICVCalc tool (Folegatti-Matsuura et al., 2022).
- Pesticides, unspecified [water, ground-]: 1.48e-11 kg; lognormal variance with pedigree 1.11233, pedigree (3,2,2,2,1)
  (same comment as for Atrazine)
- Pesticides, unspecified [water, unspecified]: 7.79e-10 kg; lognormal variance with pedigree 1.11233, pedigree (3,2,2,2,1)
  (same comment as for Atrazine)
- Phosphorus [water, surface water]: 3.52e-6 kg; lognormal variance with pedigree 1.11233, pedigree (3,2,2,2,1)
  Only the phosphorus emission to surface water caused by soil erosion was calculated, according to Nemecek et al., 2015. Required technical parameters are available in the BRCalc/ICVCalc tool (Folegatti-Matsuura et al., 2022).
- Tebuconazole [water, ground-]: 1.86e-11 kg; lognormal variance with pedigree 1.11233, pedigree (3,2,2,2,1)
  (same comment as for Atrazine)
- Tebuconazole [water, unspecified]: 1.87e-12 kg; lognormal variance with pedigree 1.11233, pedigree (3,2,2,2,1)
  (same comment as for Atrazine)
- Thiabendazole [water, ground-]: 6.2e-9 kg; lognormal variance with pedigree 1.11233, pedigree (3,2,2,2,1)
  (same comment as for Atrazine)
- Thiabendazole [water, unspecified]: 2.47e-10 kg; lognormal variance with pedigree 1.11233, pedigree (3,2,2,2,1)
  (same comment as for Atrazine)
- Thiamethoxam [water, ground-]: 1.78e-7 kg; lognormal variance with pedigree 1.11233, pedigree (3,2,2,2,1)
  (same comment as for Atrazine)
- Thiamethoxam [water, unspecified]: 1.06e-9 kg; lognormal variance with pedigree 1.11233, pedigree (3,2,2,2,1)
  (same comment as for Atrazine)
- Trifloxystrobin [water, ground-]: 1.67e-12 kg; lognormal variance with pedigree 1.11233, pedigree (3,2,2,2,1)
  (same comment as for Atrazine)
- Trifloxystrobin [water, unspecified]: 9.39e-13 kg; lognormal variance with pedigree 1.11233, pedigree (3,2,2,2,1)
  (same comment as for Atrazine)
- Triflumuron [water, ground-]: 1.81e-12 kg; lognormal variance with pedigree 1.11233, pedigree (3,2,2,2,1)
  (same comment as for Atrazine)
- Triflumuron [water, unspecified]: 1.13e-12 kg; lognormal variance with pedigree 1.11233, pedigree (3,2,2,2,1)
  (same comment as for Atrazine)

## Sampling procedure
The main source of data for agricultural inputs and operations is the ProspecSoy Project, conducted by Embrapa Soja. Data are also provided by relevant experts. Emissions from the agricultural process are estimated using BRCalc/ICVCalc.

## Review by Simone Fazio 2022-07-29
all the review comments have been addressed, solved or better explained
agricultural operations with minor consumption (fertilizer distribution, pesticide application, etc) should be better defined in the future updates, for the sake of precision even if the overall impact don't change significantly
