# container production, for collection of post-consumer waste plastic for recycling

Dataset: EcoSpold 2, unit process
Geography: RoW
Time period: 2010-01-01 to 2023-12-31
Technology level: current
Classification: ISIC rev.4 ecoinvent: 2220:Manufacture of plastics products
Scenario: Business-as-Usual
System model: Allocation, cut-off by classification
Generated by: Thomas Kägi
Published in: Kägi T. 2017
Database: ecoinvent
isCopyrightProtected: true
accessRestrictedTo: 1

## General comment
This dataset was built as a weighted average of regional datasets of the same activityName. Weights are based on production volumes.
Europe without Switzerland: production volume = 6e+09 unit/year, weight = 0.7627
US: production volume = 2e+09 unit/year, weight = 0.2299
CH: production volume = 6e+07 unit/year, weight = 0.007426

## Included activities start
Activity starts with the production of the container for the collection of post-consumer waste plastic packaging material intended for recycling.

## Included activities end
This activity ends with the waste material generated by the container at the end of service. Neither losses during production, use and disposal nor infrastructure requirements have been included due to lack of data.

## Allocation
no allocation involved

## Geography
This dataset is a weighted average built from the following geographies: Europe without Switzerland, US, CH.

## Reference product
- container, for collection of post-consumer waste plastic for recycling: 1 unit; By-product classification allocatable product; CPC 36990: Articles of plastics n.e.c.; HS2017 7309: Reservoirs, tanks, vats and similar containers; for any material (excluding compressed or liquefied gas), of [...]
  production volume 5.97762e8 unit; name APV_RP
    Global production volume (PV) estimated as the sum of annual global PVs for the treatments of unsorted waste PE and PET for recycling. PVs of by-products/waste are scaled according to relationship with the reference product.
  property price 0.028 EUR2005
    Based on estimate for main materials and material processing amounting to 0.04 CHF per kg of collected PE/PET in Switzerland.
  properties: carbon allocation 0 kg, carbon content 0

## Inputs from technosphere
- corrugated board box: 7.384e-6, 0.000432616 kg (2 suppliers, which the file names only by identifier); sum of these 0.00044 kg; lognormal variance with pedigree 0.0506, pedigree (1,5,5,5,1)
  properties: carbon content, fossil 0.00365437, carbon content, non-fossil 0.450248, dry mass 0.945 kg, heating value, net 12.86 MJ, water content 0.0582011, wet mass 1 kg
- electricity, low voltage: 9.36637e-6, 0.000120309, 0.000147292, 0.00305724, 0.000301765, 1.87963e-6, 5.21447e-5 kWh (7 suppliers, which the file names only by identifier); sum of these 0.00369 kWh; lognormal variance with pedigree 0.0506, pedigree (1,5,5,5,1)
- extrusion, plastic film: 0.0174078 kg; lognormal variance with pedigree 0.0506, pedigree (1,5,5,5,1)
- fleece, polyethylene: 5e-9 kg; lognormal variance with pedigree 0.0506, pedigree (1,5,5,5,1)
  properties: carbon content, fossil 0.857143, dry mass 1 kg, heating value, net 42.47 MJ, wet mass 1 kg
- injection moulding: 0.000392354 kg; lognormal variance with pedigree 0.0506, pedigree (1,5,5,5,1)
- iron scrap, unsorted: -0.00291879 kg; name BP_amount_4; lognormal variance with pedigree 0.0106, pedigree (1,5,1,5,1)
  production volume; = APV_RP* BP_amount_4
    PVs of by-products/waste are scaled according to their relationship with the reference product.
  properties: dry mass 1 kg, price 0.149 EUR2005, wet mass 1 kg
- polyethylene, high density, granulate: 0.00039 kg; lognormal variance with pedigree 0.0506, pedigree (1,5,5,5,1)
  properties: carbon content, fossil 0.857143, dry mass 1 kg, heating value, net 42.47 MJ, wet mass 1 kg
  note on carbon content, fossil: Polyethylene is formed out of a huge amount of ethylene monomers (C2H4) (ecoinvent v2.2 report 11_II). MW=28 g/mol
- polyethylene, low density, granulate: 0.01666 kg; lognormal variance with pedigree 0.0506, pedigree (1,5,5,5,1)
  properties: carbon content, fossil 0.857143, dry mass 1 kg, heating value, net 42.47 MJ, wet mass 1 kg
- polypropylene, granulate: 0.000544 kg; lognormal variance with pedigree 0.0506, pedigree (1,5,5,5,1)
  properties: carbon content, fossil 0.857143, dry mass 1 kg, heating value, net 32.78 MJ, wet mass 1 kg
  note on heating value, net: Value extracted from "treatment of waste polypropylene, open burning"
- steel, low-alloyed: 0.002163 kg; lognormal variance with pedigree 0.0506, pedigree (1,5,5,5,1)
  properties: carbon content, fossil 0.005, dry mass 1 kg, wet mass 1 kg
- tin plated chromium steel sheet, 2 mm: 4.83333e-5 m2; lognormal variance with pedigree 0.0512, pedigree (1,5,5,5,2)
  properties: dry mass 15.6365 kg, wet mass 15.6365 kg
- waste paperboard, unsorted: -0.00044 kg; name BP_amount_3; lognormal variance with pedigree 0.0106, pedigree (1,5,1,5,1)
  production volume; = APV_RP* BP_amount_3
    (same comment as for iron scrap, unsorted)
  properties: carbon content, non-fossil 0.483259, dry mass 0.804 kg, heating value, net 15.92 MJ, price 0.03924 EUR2005, water content 0.243781, wet mass 1 kg
  note on carbon content, non-fossil: C content was calculated for 1 kg DM, using data in Tab A.3, ecoinvent v2.2 report 13_I.
- waste polyethylene: -0.000393042, -0.00100211, -0.000413905, -7.57876e-5, -0.000167213, -0.014998 kg (6 suppliers, which the file names only by identifier); sum of these -0.01705 kg; lognormal variance with pedigree 0.0106, pedigree (1,5,1,5,1)
  production volume; = apv_rp* BP_amount_2
    (same comment as for iron scrap, unsorted)
  properties: carbon content, fossil 0.825301, dry mass 0.996 kg, heating value, net 42.47 MJ, water content 0.00401606, wet mass 1 kg
  note on carbon content, fossil: C content in 1 kg DM was calculated using data in Tab A.1, ecoinvent v2.2 report 13_I
  note on heating value, net: Value taken from the general comment of the treatment dataset.
- waste polypropylene: -1.25405e-5, -2.41809e-6, -3.19733e-5, -0.000478527, -1.32061e-5, -5.33512e-6 kg (6 suppliers, which the file names only by identifier); sum of these -0.000544 kg; lognormal variance with pedigree 0.0106, pedigree (1,5,1,5,1)
  production volume; = apv_rp* BP_amount_1
    (same comment as for iron scrap, unsorted)
  properties: carbon content, fossil 0.825208, dry mass 0.841 kg, heating value, net 32.78 MJ, water content 0.189061, wet mass 1 kg
  note on heating value, net: Value assumed for all polypropylene products. Source: Phyllis2, database for (treated) biomass, algae, feedstocks for biogas production and biochar, https://phyllis.nl/Biomass/View/1186, ECN.TNO
- wire drawing, steel: 0.002163 kg; lognormal variance with pedigree 0.0506, pedigree (1,5,5,5,1)

## Sampling procedure
Uncertainty estimation according to the pedigree matrix
