# treatment of bottom ash, MSWI-WWT, WW from GGBFS production, slag compartment

Dataset: EcoSpold 2, unit process
Geography: RoW
Time period: 1994-01-01 to 2023-12-31
Technology level: current
Classification: ISIC rev.4 ecoinvent: 3821:Treatment and disposal of non-hazardous waste
Scenario: Business-as-Usual
System model: Allocation, cut-off by classification
Generated by: Nikolia Stoikou
Database: ecoinvent
isCopyrightProtected: true
accessRestrictedTo: 1

## General comment
The process represents the treatment of a waste (bottom ash) that is exclusively generated from another waste treatment. Bottom ash is generated in the municipal solid waste incineration (MSWI) of sewage sludge (with 70% water) that in turn is generated from wastewater treatment (WWT) of 'wastewater from GGBFS production'. Recommended use of this dataset: to be used within the specific chain of treatments for 'wastewater from GGBFS production'. Share of biogenic carbon in the sludge: 0%. "GGBFS" stands for "Ground granulated blast furnace slag".

## Included activities start
The activity starts with the waste being available at the gate of the treatment facility. Collection and transportation of the waste to the treatment plant is not included.

## Included activities end
The activity ends with the waste being treated and waste-specific emissions from the slag compartment landfill are released to water (short-term emissions to surface water and long-term emissions to ground water).

## Geography
Modelling parameters affecting the treatment technology are not specific to this geography.

## Technology
Slag compartment for bottom ashes from incineration with base seal and leachate collection system. Recultivation after closure.

## Reference product
- bottom ash, MSWI-WWT, WW from GGBFS production: -1 kg; By-product classification Waste; CPC 39320: Ash and residue (except from the manufacture of iron or steel), containing metals or metallic compounds, excep[…]; HS2017 262110: Slag and ash; ash and residues from the incineration of municipal waste
  production volume 744.049 kg
    Calculated in proportion to incinerated waste reference product. The production volume is accounting as well regional specific losses (wastewater not sewered) for this geography
  properties: cadmium content 2.06541e-5, carbon allocation 0.0224344 kg, carbon content 0.0262367, carbon content, fossil 0.0262367, carbon content, non-fossil 0, chromium content 0.00202039, copper content 0.00547986, dry mass 0.855078 kg, iron content 0.679721, lead content 0.00192351, nickel content 0.00297373, nitrogen content 0.00447527, oxygen content 0.268052, price 0 EUR2005, water content 0.169484, water in wet mass 0.144922 kg, wet mass 1 kg, zinc content 0.00909635

## Inputs from technosphere
- process-specific burdens, slag landfill: 0.00841689, 0.280494, 0.71109 kg (3 suppliers, which the file names only by identifier); sum of these 1 kg
  mass-specific expenditures required for landfilling of bottom ash.
- slag landfill: 1.7778e-9 unit
  slag compartment infrastructure required for landfilling of bottom ash.

## Inputs from nature
- Organic carbon, placed in landfill [inventory indicator, waste]: 0.011217 kg; lognormal variance with pedigree 0.10507, pedigree (1,1,5,1,1)
  Mass of organic carbon in waste (without inorganic carbon), initially put in slag compartment. The exchange represents a flow that is within the technosphere. This exchange should only be used to apply ecofactors for the Swiss LCIA method of Ecological Scarcity and not any other purpose.
  Uncertainty: Uncertainty calculated from uncertainty of composition of incinerated waste, and incinerator model uncertainty and slag compartment transfer coefficient uncertainty.
- Waste mass, total, placed in landfill [inventory indicator, waste]: 1 kg
  Mass of waste initially put in a slag compartment. The exchange represents a flow that is within the technosphere. This exchange should only be used to apply ecofactors for the Swiss LCIA method of Ecological Scarcity and not any other purpose.

## Emissions to nature
- Non-hazardous waste disposed [inventory indicator, waste]: 1 kg
  Inventory indicator for waste mass disposed. To be used in EN15804 "other data" results.
- BOD5, Biological Oxygen Demand [water, ground-, long-term]: 0.0092391 kg; lognormal variance with pedigree 0.105071, pedigree (1,1,5,1,1)
  complement of long-term emissions from incinerator bottom ash in slag compartment
  Uncertainty: Uncertainty calculated from uncertainty of composition of incinerated waste, and incinerator model uncertainty and slag compartment transfer coefficient uncertainty.
- BOD5, Biological Oxygen Demand [water, surface water]: 3.3349e-5 kg; lognormal variance with pedigree 0.59455, pedigree (1,1,5,1,1)
  short-term emissions from incinerator bottom ash in slag compartment
  Uncertainty: Uncertainty calculated from uncertainty of composition of incinerated waste, and incinerator model uncertainty and slag compartment transfer coefficient uncertainty.
- COD, Chemical Oxygen Demand [water, ground-, long-term]: 0.028246 kg; lognormal variance with pedigree 0.105071, pedigree (1,1,5,1,1)
  (same comment as for BOD5, Biological Oxygen Demand)
- COD, Chemical Oxygen Demand [water, surface water]: 0.00010195 kg; lognormal variance with pedigree 0.59455, pedigree (1,1,5,1,1)
  (same comment as for BOD5, Biological Oxygen Demand)
- Cadmium II [water, ground-, long-term]: 1.7652e-5 kg; lognormal variance with pedigree 0.5713, pedigree (1,1,5,1,1)
  (same comment as for BOD5, Biological Oxygen Demand)
- Cadmium II [water, surface water]: 9.0864e-9 kg; lognormal variance with pedigree 1.3108, pedigree (1,1,5,1,1)
  (same comment as for BOD5, Biological Oxygen Demand)
- Chromium VI [water, ground-, long-term]: 1.1305e-5 kg; lognormal variance with pedigree 3.6589, pedigree (1,1,5,1,1)
  (same comment as for BOD5, Biological Oxygen Demand)
- Chromium VI [water, surface water]: 4.9402e-8 kg; lognormal variance with pedigree 1.4624, pedigree (1,1,5,1,1)
  (same comment as for BOD5, Biological Oxygen Demand)
- Copper ion [water, ground-, long-term]: 0.0046855 kg; lognormal variance with pedigree 0.30236, pedigree (1,1,5,1,1)
  (same comment as for BOD5, Biological Oxygen Demand)
- Copper ion [water, surface water]: 1.6268e-7 kg; lognormal variance with pedigree 1.398, pedigree (1,1,5,1,1)
  (same comment as for BOD5, Biological Oxygen Demand)
- DOC, Dissolved Organic Carbon [water, ground-, long-term]: 0.011177 kg; lognormal variance with pedigree 0.105071, pedigree (1,1,5,1,1)
  (same comment as for BOD5, Biological Oxygen Demand)
- DOC, Dissolved Organic Carbon [water, surface water]: 4.0343e-5 kg; lognormal variance with pedigree 0.59455, pedigree (1,1,5,1,1)
  (same comment as for BOD5, Biological Oxygen Demand)
- Iron ion [water, ground-, long-term]: 0.30234 kg; lognormal variance with pedigree 0.22108, pedigree (1,1,5,1,1)
  (same comment as for BOD5, Biological Oxygen Demand)
- Iron ion [water, surface water]: 4.8632e-6 kg; lognormal variance with pedigree 1.3976, pedigree (1,1,5,1,1)
  (same comment as for BOD5, Biological Oxygen Demand)
- Lead II [water, ground-, long-term]: 0.0016447 kg; lognormal variance with pedigree 0.34136, pedigree (1,1,5,1,1)
  (same comment as for BOD5, Biological Oxygen Demand)
- Lead II [water, surface water]: 3.0023e-8 kg; lognormal variance with pedigree 1.5219, pedigree (1,1,5,1,1)
  (same comment as for BOD5, Biological Oxygen Demand)
- Nickel II [water, ground-, long-term]: 0.0025412 kg; lognormal variance with pedigree 0.30515, pedigree (1,1,5,1,1)
  (same comment as for BOD5, Biological Oxygen Demand)
- Nickel II [water, surface water]: 1.6012e-6 kg; lognormal variance with pedigree 1.0182, pedigree (1,1,5,1,1)
  (same comment as for BOD5, Biological Oxygen Demand)
- Nitrate [water, ground-, long-term]: 0.013747 kg
  complement of long-term emissions from incinerator bottom ash in slag compartment
- Nitrate [water, surface water]: 0.0032001 kg; lognormal variance with pedigree 0.073074, pedigree (1,1,5,1,1)
  (same comment as for BOD5, Biological Oxygen Demand)
- TOC, Total Organic Carbon [water, ground-, long-term]: 0.011177 kg; lognormal variance with pedigree 0.105071, pedigree (1,1,5,1,1)
  (same comment as for BOD5, Biological Oxygen Demand)
- TOC, Total Organic Carbon [water, surface water]: 4.0343e-5 kg; lognormal variance with pedigree 0.59455, pedigree (1,1,5,1,1)
  (same comment as for BOD5, Biological Oxygen Demand)
- Zinc II [water, ground-, long-term]: 0.0077779 kg; lognormal variance with pedigree 0.21008, pedigree (1,1,5,1,1)
  (same comment as for BOD5, Biological Oxygen Demand)
- Zinc II [water, surface water]: 2.3154e-7 kg; lognormal variance with pedigree 1.326, pedigree (1,1,5,1,1)
  (same comment as for BOD5, Biological Oxygen Demand)

## Extrapolations
Modelling parameters are based on an average slag compartment landfill in Switzerland.
