# concrete block production

Dataset: EcoSpold 2, unit process
Geography: DE
Time period: 1997-01-01 to 2023-12-31
Technology level: current
Classification: ISIC rev.4 ecoinvent: 2395:Manufacture of articles of concrete, cement and plaster
Classification: EcoSpold01Categories: construction materials/concrete
Tags: ConvertedDataset
Scenario: Business-as-Usual
System model: Allocation, cut-off by classification
Generated by: Tina Künniger
Published in: Kellenberger D. 2004
Database: ecoinvent
isCopyrightProtected: true
accessRestrictedTo: 1

## General comment
This dataset describes the production of concrete blocks in Germany.
The dataset includes the input of the raw material 'concrete, normal strength', which is poured into a mould, air-dryed and packed. It also includes energy use, the inputs of infrastructure and of packaging. No losses and no wastewater have been taken into account.
[This dataset was already contained in the ecoinvent database version 2. It was not individually updated during the transfer to ecoinvent version 3. Life Cycle Impact Assessment results may still have changed, as they are affected by changes in the supply chain, i.e. in other datasets. This dataset was generated following the ecoinvent quality guidelines for version 2. It may have been subject to central changes described in the ecoinvent version 3 change report (http://www.ecoinvent.org/database/ecoinvent-version-3/reports-of-changes/), and the results of the central updates were reviewed extensively. The changes added e.g. consistent water flows and other information throughout the database. The documentation of this dataset can be found in the ecoinvent reports of version 2, which are still available via the ecoinvent website. The change report linked above covers all central changes that were made during the conversion process.]

## Included activities start
From the reception of raw materials at the concrete block factory.

## Included activities end
This activity ends with the packed concrete block at the factory gate.

## Geography
This dataset represents production of concrete blocks representative for Germany.

## Technology
Typical technology for German production.

## Parameters
- fraction, process water, to air: 0.15 dimensionless; name fraction_PW_to_air; lognormal variance with pedigree 0.092025, pedigree (4,4,3,2,4)
  Literature value. In case when no industry/process specific data are available, default evaporation fraction value is used. This value is 15% and is based on literature (Statistics Canada, 2007 & Shaffer, K.H., 2008, Consumptive water use in the Great Lakes Basin, USGS & Shiklomanov, 2003, World Water Resources at the Beginning of the 21st Century) and has been approved by an expert.

## Reference product
- concrete block: 1 kg; By-product classification allocatable product; CPC 37510: Non-refractory mortars and concretes; HS2017 6810: Cement, concrete or artificial stone; whether or not reinforced, articles thereof
  EcoSpold01Location=DE
  production volume 6.74882e9 kg; = 1.49E+10/1.70%*0.77%
    Estimated value. Based on the production volume for the BR dataset (1.49E+10) scaled by the share of global cement production of BR 1.70% and of DE 0.77%, taken from USGS 2014 (retrieved from https://minerals.usgs.gov/minerals/pubs/commodity/cement/myb1-2014-cemen.pdf, accessed 20Nov2017).
  property carbon content, fossil 0
    Made from normal concrete. Tab 6.7, ecoinvent v2.2 report 7, part III
  property carbon content, non-fossil 0
    Made from normal concrete. Tab 6.7, ecoinvent v2.2 report 7, part III
  property price 0.14 EUR2005
    Calculated value based on data from United Nations Commodity Trade Statistics Database (comtrade.un.org). UN comtrade category: 681011 Building blocks, bricks of cement, or artificial ston.. Year 2005. Using exchange rate of 1EURO = 1.209 USD. Average of price of import into 5 main markets (EU, US, JP, IN and CN).
  properties: carbon allocation 0 kg, carbon content 0, dry mass 1 kg, water content 0, water in wet mass 0 kg, wet mass 1 kg

## Inputs from technosphere
- clay pit infrastructure: 1.67e-10 unit; lognormal variance with pedigree 0.69, pedigree (1,1,5,1,1)
  EcoSpold01Location=CH
  estimated
- concrete, normal strength: 0.00042 m3; lognormal variance with pedigree 0.08, pedigree (1,1,5,1,1)
  EcoSpold01Location=CH
  estimated
  properties: dry mass 2190 kg, water content 0.086758, wet mass 2380 kg
- diesel, burned in building machine: 0.0216 MJ; lognormal variance with pedigree 0.07, pedigree (3,5,5,1,1)
  EcoSpold01Location=GLO
  properties: heating value, net 1 MJ
- electricity, medium voltage: 0.002 kWh; lognormal variance with pedigree 0.69, pedigree (1,1,5,1,1)
  estimated
  EcoSpold01Location=DE
- packing, clay product: 1 kg; lognormal variance with pedigree 0.69, pedigree (1,1,5,1,1)
  estimated
  EcoSpold01Location=CH

## Inputs from nature
- Water, unspecified natural origin [natural resource, in water]: 0.000184 m3; name water_UNO_input; source Dansk Teknologisk Institut 1995; lognormal variance with pedigree 0.052625, pedigree (3,3,5,2,1)
  Calculated based on literature, (Vionnet, S., Quantis Water Database - Technical Report, 2012).
  property carbon content, fossil 0.0104329; name C_content_fossil
  property carbon content, non-fossil 0; name C_content_non_fossil
  property dry mass 0.1101 kg; name DM
  property water content 9081.65; name water_content
  property water in wet mass 999.89 kg; name WWM
  property wet mass 1000 kg; name WM

## Emissions to nature
- Water [air, unspecified]: 2.76e-5 m3; name water_to_air_unspecified; = (water_UNO_input*fraction_PW_to_air); lognormal variance with pedigree 0.0807, pedigree (2,2,5,1,1)
  Calculated value based on literature values and expert opinion. See comments in the parametres' comment field.
  property fraction, origin: fresh water 0; name fraction_origin_fresh_water
  property fraction, origin: salt water 0; name fraction_origin_salt_water
  property fraction, origin: unspecified 1; name fraction_origin_unspecified
- Water [water, unspecified]: 0.0001564 m3; name water_to_water_unspecified; = water_UNO_input*(1-fraction_PW_to_air); lognormal variance with pedigree 0.0807, pedigree (2,2,5,1,1)
  (same comment as for Water)
  property fraction, origin: fresh water 0; name fraction_origin_fresh_water_Ww
  property fraction, origin: salt water 0; name fraction_origin_salt_water_Ww
  property fraction, origin: unspecified 1; name fraction_origin_unspecified_Ww

## Sampling procedure
Literature

## Extrapolations
See geography

## Review by Roberto Dones 2004-04-05
passed
