# switch production, toggle type

Dataset: EcoSpold 2, unit process
Geography: RoW
Time period: 2004-01-01 to 2023-12-31
Technology level: current
Classification: EcoSpold01Categories: electronics/component
Classification: ISIC rev.4 ecoinvent: 2610:Manufacture of electronic components and boards
Scenario: Business-as-Usual
System model: Allocation, cut-off by classification
Generated by: Roland Hischier
Published in: Hischier R. 2007
Database: ecoinvent
isCopyrightProtected: true
accessRestrictedTo: 1

## General comment
This dataset represents the production of 1 kg of toggle switches used in ICT equipment. It is based on the assumption that a toggle switch has a typical weight of 29 g.The data represent a current toggle type switch, used in current information and communication technology (ICT). Material data are taken from datasheets of producers of such capacitors and from the literature. Infrastructure and production efforts are based on own assumptions and taken from the Swedish LCI database and have thus, accordingly higher uncertainty.
[This dataset was already contained in the ecoinvent database version 2. It was not individually updated during the transfer to ecoinvent version 3. Life Cycle Impact Assessment results may still have changed, as they are affected by changes in the supply chain, i.e. in other datasets. This dataset was generated following the ecoinvent quality guidelines for version 2. It may have been subject to central changes described in the ecoinvent version 3 change report (http://www.ecoinvent.org/database/ecoinvent-version-3/reports-of-changes/), and the results of the central updates were reviewed extensively. The changes added e.g. consistent water flows and other information throughout the database. The documentation of this dataset can be found in the ecoinvent reports of version 2, which are still available via the ecoinvent website. The change report linked above covers all central changes that were made during the conversion process.]

## Included activities start
From reception of metals and plastics at the factory gate.

## Included activities end
This dataset includes raw material input and production efforts efforts for the production of toggle type switches.

## Geography
Data represent a global valuable composition of a toggle type switch.

## Technology
average switch production technology, based on literature and assumptions

## Reference product
- switch, toggle type: 1 kg; By-product classification allocatable product; CPC 46220: Parts of electricity distribution or control apparatus; HS2017 853810: Electrical apparatus; parts (e.g. boards, panels, consoles, desks, cabinets, other bases), for goods of hea[...]
  EcoSpold01Location=GLO
  Typical toggle switch used in ICT equipment.
  production volume 0.995557 kg
    Dummy value to be replaced by measured, estimated or calculated value
  property carbon content, fossil 0.116333
    Calculated as the addition of C contents in the product composition
  property price 23.0041 EUR2005
    Calculated based on inputs: The price of the product has been calculated as a sum of the values of the material and energy inputs for this product. This value is therefore a rough estimation. It may underestimate the real price since there are additional expenses when producing any product. These expences can include for example labour costs, treatment of waste materials and profit for the producer. Please consider carefully whether this level of data quality is acceptable for your application.
  properties: carbon allocation 0.116333 kg, carbon content 0.116333, carbon content, non-fossil 0, dry mass 1 kg, water content 0, water in wet mass 0 kg, wet mass 1 kg

## Inputs from technosphere
- brass: 0.446755, 0.002245 kg (2 suppliers, which the file names only by identifier); sum of these 0.449 kg; source ITT 2005; lognormal variance with pedigree 0.0761, pedigree (4,5,5,3,1)
  Estimation. The split to individual materials was estimaded based on literature.
  EcoSpold01Location=CH
  Uncertainty: estimation, calculated weight, based on qualitative information
  properties: dry mass 1 kg, wet mass 1 kg
- copper, cathode: 0.04018 kg; source ITT 2005; lognormal variance with pedigree 0.0761, pedigree (4,5,5,3,1)
  Estimation. The split to individual materials was estimaded based on literature.
  EcoSpold01Location=RER
  Uncertainty: estimation, calculated weight, based on qualitative information
  properties: dry mass 1 kg, wet mass 1 kg
- electricity, medium voltage: 0.183282, 3.65606, 0.0915245, 0.0561271, 0.791405, 0.0112338, 0.00241214, 0.255291, 0.377544, 1.08513 kWh (10 suppliers, which the file names only by identifier); sum of these 6.51 kWh; source CPM 2006; lognormal variance with pedigree 0.1461, pedigree (4,5,5,3,4)
  EcoSpold01Location=UCTE
  Proxy. The value used for connectors was used.
  Uncertainty: estimation, based on literature value for a different type of component
- gold: 0.00041 kg; source ITT 2005; lognormal variance with pedigree 0.0761, pedigree (4,5,5,3,1)
  EcoSpold01Location=RER
  Estimation. The split to individual materials was estimaded based on literature.
  Uncertainty: estimation, calculated weight, based on qualitative information
  properties: dry mass 1 kg, wet mass 1 kg
- nickel, class 1: 0.00041 kg; source ITT 2005; lognormal variance with pedigree 0.0761, pedigree (4,5,5,3,1)
  EcoSpold01Location=GLO
  Estimation. The split to individual materials was estimaded based on literature.
  Uncertainty: estimation, calculated weight, based on qualitative information
  properties: dry mass 1 kg, wet mass 1 kg
- nylon 6-6, glass-filled: 0.172707, 0.0852928 kg (2 suppliers, which the file names only by identifier); sum of these 0.258 kg; source ITT 2005; lognormal variance with pedigree 0.0761, pedigree (4,5,5,3,1)
  (same comment as for copper, cathode)
  properties: carbon content, fossil 0.446018, dry mass 1 kg, heating value, net 30.9 MJ, wet mass 1 kg
  note on carbon content, fossil: Nylon 66 is derived from hexamethylene diamine and adipic acid and has the following structure: -(HN-(CH2)6-NH-CO-(CH2)4-CO)n- (ecoinvent v2.2 report 11_II), C12H22N2O2. MW=226 g/mol. Here Nylon 66 is – mainly for improved stiffness and stability – modified with glass fibres. The glass fibre content in the product is assumed of 30%. (ecoinvent v2.2 report 11_II)
  note on heating value, net: Assumed equal to Nylon-66. Reference: Walters, R. N., Hackett, S. M. and Lyon, R. E. (2000) ‘Heats of combustion of high temperature polymers’, Fire and Materials, 24(5), pp. 245–252. doi: 10.1002/1099-1018(200009/10)24:5<245::AID-FAM744>3.0.CO;2-7.
- printed wiring board mounting facility: 2.08e-7 unit; lognormal variance with pedigree 0.5761, pedigree (4,5,5,3,5)
  Proxy. Due to a lack of more specific information the dataset of the printed wiring board mounting plant was used.
  EcoSpold01Location=GLO
  Uncertainty: rough estimation of infrastructure
- steel, low-alloyed, hot rolled: 0.252 kg; source ITT 2005; lognormal variance with pedigree 0.0761, pedigree (4,5,5,3,1)
  (same comment as for copper, cathode)
  properties: carbon content, fossil 0.005, dry mass 1 kg, wet mass 1 kg
  note on carbon content, fossil: Low alloyed steel composition given in Tab. 3.2 ecoinvent v2.2 report 10_partII. Steel assumed to have a C content of 0.5%

## Sampling procedure
literature

## Review by Rolf Frischknecht 2007-11-08
passed.
