# inorganic nitrogen fertiliser, as N to generic market for organo-mineral nitrogen fertiliser, as N

Dataset: EcoSpold 2, unit process
Geography: GLO
Time period: 2016-01-01 to 2023-12-31
Technology level: current
Classification: ISIC rev.4 ecoinvent: 0161:Support activities for crop production
Scenario: Business-as-Usual
System model: Allocation, cut-off by classification
Generated by: Avraam Symeonidis
Database: ecoinvent
isCopyrightProtected: true
accessRestrictedTo: 1

## General comment
This is a renaming activity that connects "inorganic nitrogen fertiliser, as N" with "organo-mineral nitrogen fertiliser, as N". It is assumed that in the shortage of "organo-mineral nitrogen fertiliser, as N", a consumer of it will turn its consumption pattern and use an "inorganic nitrogen fertiliser, as N". In theory, the "inorganic nitrogen fertiliser, as N" can substitute the "organo-mineral nitrogen fertiliser, as N" in an equal mass ratio, considering only the nutrient content.
This dataset is meant to be employed only in the consequential system model where it is assumed that inorganic can replace organic fertiliser. The production volume of this activity is set to zero so it does not react with attributional supply chains.

## Included activities start
The activity starts with the reception of inorganic nitrogen fertiliser, as N.

## Included activities end
The activity ends with organo-mineral nitrogen fertiliser, as N being ready for transportation.

## Technology
Inventory is based on the nutrient content of the fertiliser.

## Reference product
- organo-mineral nitrogen fertiliser, as N: 1 kg; By-product classification allocatable product; CPC 34659: Fertilizers n.e.c.; HS2017 310290: Fertilizers, mineral or chemical; nitrogenous, other kinds including mixtures not specified in the foregoin[...]
  production volume 0 kg
    Production volume is set on purpose equal to zero so this activity is not interacting in the attributional system model.
  property carbon content, fossil 0
    Carbon content, fossil is calculated based on the chemical formula of the substance.
  property nitrogen content 1
    Nitrogen content (on a dry matter basis) of organo-mineral nitrogen fertiliser, as N is calculated from the molecular formula of the substance (Nitrogen).
  property price 0.473 EUR2005
    Set equal to the price of the corresponding inorganic fertiliser
  properties: carbon allocation 0 kg, carbon content 0, carbon content, non-fossil 0, dry mass 1 kg, water content 0, water in wet mass 0 kg, wet mass 1 kg

## Inputs from technosphere
- inorganic nitrogen fertiliser, as N: 3.31332e-5, 0.00777494, 0.000922291, 0.00990387, 0.00226542, 0.000959381, 0.00884213, 0.000830309, 0.00582502, 0.000595904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 kg (30 suppliers, which the file names only by identifier); sum of these 1 kg; lognormal variance with pedigree 0.0472, pedigree (3,3,3,5,4)
  It is assumed that in the shortage of organo-mineral fertiliser, a consumer of it will turn its consumption pattern and use an inorganic fertiliser. In theory, the inorganic fertiliser, can substitute the organo-mineral fertiliser, in an equal mass ratio, considering only the nutrient content.
  properties: dry mass 1 kg, wet mass 1 kg
