# maize grain production, second crop

Dataset: EcoSpold 2, unit process
Geography: BR-MS
Time period: 2015-01-01 to 2023-12-31
Technology level: current
Classification: ISIC rev.4 ecoinvent: 0111:Growing of cereals (except rice), leguminous crops and oil seeds
Synonyms: winter maize production, winter maize cultivation, winter corn production
Tags: No
Scenario: Business-as-Usual
System model: Allocation, cut-off by classification
Generated by: André May
Published in: Folegatti Matsuura, M. 2017
Database: ecoinvent
isCopyrightProtected: true
accessRestrictedTo: 1

## General comment
The raw data collected in panels were organized in electronic spreadsheets and checked for completeness and consistency. Agricultural inputs were detailed as to their composition and physical characteristics. Agricultural operations were characterized in terms of machinery (tractor and implement), type of fuel and specific consumption. Precipitation is enought to supply water to the crop, no extra water needed. Emissions from the agricultural process were estimated using the BRCalc/ICVCalc tool, developed by Embrapa Environment, which includes specific climate and soil databases for the 137 Brazilian agricultural mesoregions, in addition to databases of parameters related to agricultural crops, fertilizers and pesticides.
The main emission models adopted by BRCalc/ICVCalc derive from the references: Nemecek et al. (2015), IPCC (2019), Nemecek & Kagi (2007). It was used the model BRLUC (Donke et al., 2020) to estimate the LUC emissions; and the PestLCI Consensus V1.0, parameterized for Brazil (Barizon et al., 2021), to estimate pesticide emissions.

## Included activities start
This activity starts after the harvest of the previous crop.

## Included activities end
The dataset includes the inputs of seeds, mineral fertilisers and pesticides. It is assumed that no organic fertiliser is applied. The dataset includes all machine operations and corresponding machine infrastructure and sheds for: limestone and gypsum application, application of plant protection product, planting with starter fertiliser, fertilising, combine harvesting and drying of grains. For other agricultural operations, the amount of fuel consumed and their emissions are estimated. The dataset also includes the transportation of products inside the farm: water, soil correctives and fertilisers from sheds to field and grain from field to truck. Furthermore, direct field emissions and land use change emissions are included, with important regionalizations added. The dataset doesn't include: seed treatment, cleaning and storage of harvested grains. The activity ends after harvest at the farm gate.

## Allocation
In Brazil, maize can be produced as a monoculture or in cropping systems. For the fraction of maize produced in cropping systems, land occupation, liming operation and limestone are allocated among the products of the system, adopting factors that consider the fraction of area and the occupation time.

## Geography
The inventory is modelled for Brazil, Mato Grosso do Sul

## Technology
This dataset represents the production of 1 kg of maize in the state of Mato Grosso do Sul, which is composed of the maize regions of Iguatemi, Dourados and Cassilândia. In these regions, maize is produced in cropping systems, including other crops such as soybeans. When in a cropping system, land occupation, liming operation and limestone are allocated among the products of the system, adopting factors that consider the fraction of area and the occupation time. The average productivity is 5239 kg/ha, at 14% moisture.
Agricultural operation was modelled based on the total diesel consumed to perform the operation and the emissions to air related to diesel burning.

## Time period
Time period of the most of the data collected for this dataset.

## Reference product
- maize grain: 1 kg; By-product classification allocatable product; CPC 01122: Maize (corn), other; HS2017 100590: Cereals; maize (corn), other than seed
  This dataset represents the production of 1 kg of maize in the state of Mato Grosso do Sul, which is composed of the maize regions of Iguatemi, Dourados and Cassilândia. In these regions, maize is produced in cropping systems, including other crops such as soybeans. When in a cropping system, land occupation, liming operation and limestone are allocated among the products of the system, adopting factors that consider the fraction of area and the occupation time. The average productivity is 5239 kg/ha, at 14% moisture.
  production volume 1.05516e10 kg
    The covered datasets together represent 95,2% of national production (PV). Due to the high representativeness and the lack of information regarding the other regions not covered by the inventories, it was assumed that the available data represent 100% of the national production and a new percentage of contribution was attributed to each state.
  property price 0.12 EUR2005
    Literature value. Based on SAFEX price of R 2,025 per tonne (average yellow and white). Source: SAGIS, 2018. Retrieved from: http://www.sagis.org.za/safex_historic.html, accessed 28May2018.
  properties: carbon allocation 0.40383 kg, carbon content 0.46957, carbon content, fossil 0, carbon content, non-fossil 0.46957, dry mass 0.86 kg, water content 0.162791, water in wet mass 0.14 kg, wet mass 1 kg

## Inputs from technosphere
- atrazine: 0.00032 kg; lognormal variance with pedigree 1.0709, pedigree (2,2,2,1,1)
  The amount of pesticide or adjuvant was obtained from interviews with producers and experts. Concentration of the active ingredient was obtained in the Material Safety Data Sheet. The amount of dilution water was 200 L/ha per application.
  properties: carbon content, fossil 0.446512, dry mass 1 kg, wet mass 1 kg
- diesel, low-sulfur: 0.00608 kg; lognormal variance with pedigree 1.2403, pedigree (3,2,2,1,3)
  The amount of diesel fuel (B12 mix in Brazil) used in agricultural operations not found in ecoinvent
  properties: carbon content, fossil 0.865, dry mass 1 kg, heating value, net 42.8 MJ, wet mass 1 kg
- fatty acid methyl ester: 0.000859 kg; lognormal variance with pedigree 1.2403, pedigree (3,2,2,1,3)
  The amount of biodiesel fuel (B12 mix in Brazil) used in agricultural operations not found in ecoinvent plus the fatty acids used as pesticide adjuvant
  properties: carbon content, fossil 0.041, carbon content, non-fossil 0.732, dry mass 1 kg, heating value, net 37.2 MJ, wet mass 1 kg
  note on heating value, net: Based on literature, report 17, page 439. Jungbluth, N., Chudacoff, M., Dauriat, A., Dinkel, F., Doka, G., Faist Emmenegger, M., Gnansounou, E., Kljun, N., Schleiss, K., Spielmann, M., Stettler, C., Sutter, J. 2007: Life Cycle Inventories of Bioenergy. ecoinvent report No. 17, Swiss Centre for Life Cycle Inventories, Dübendorf, CH.
- glyphosate: 0.00025 kg; lognormal variance with pedigree 1.0709, pedigree (2,2,2,1,1)
  (same comment as for atrazine)
  properties: carbon content, fossil 0.214286, dry mass 1 kg, wet mass 1 kg
- gypsum, mineral: 0.018 kg; lognormal variance with pedigree 1.1123, pedigree (3,2,2,1,1)
  The amount of soil corrective was obtained from interviews with producers and experts.
  properties: dry mass 1 kg, wet mass 1 kg
- land use change, annual crop: 0.000158465 ha; lognormal variance with pedigree 1.22882, pedigree (2,1,2,2,3)
  LUC modeling implemented in ecoinvent for Brazil is based on Donke et al. (2020). LUC amount was updated, based on yield and crop expansion rate from IBGE (2022). Reference years: average among 2017, 2018, 2019. Equation: (1/yield * % crop expansion). The yield is the average for the years 2017 to 2019. Expansion: difference of the average area of the years 2017 to 2019 (t1=t0+20) for the years 1998 to 2000 (t0), by the formula (1-(t0/t1)).
- lime: 0.069 kg; lognormal variance with pedigree 1.1123, pedigree (3,2,2,1,1)
  The amount of soil corrective was obtained from interviews with producers and experts.
  properties: carbon content, fossil 0.120005, dry mass 1 kg, wet mass 1 kg
- maize seed, for sowing: 0.0038 kg; lognormal variance with pedigree 1.2102, pedigree (1,1,2,1,1)
  The amount of seeds for sowing
  property carbon content, non-fossil 0.45263; name C_content_non_fossil
  property dry mass 0.88 kg; name DM
  property water content 0.136364; name water_content
  property water in wet mass 0.12 kg; name WWM
  property wet mass 1 kg; name WM
  note on carbon content, non-fossil: biogene carbon content on a dry matter basis; Composition data obtained from Corn Grain Whole, in (http://beefmagazine.com/images/2009%20feed%20table.pdf). First, composition data were refered to 1 kg dry mass. Then, C-contents were calculated considering a C-content/dry mass of 44% in carbohydrates (including fibres), 53% in proteins and 75% in fats. All data from ecoinvent report, n 15a, pg 40, except C-content in protein, that comes from Determination of protein concentration by total organic carbon analysis, Rouwenhorst et al., 1991, J Biochem and Biophys Methods, 22:119-128.
- mancozeb: 1.1e-5 kg; lognormal variance with pedigree 1.0709, pedigree (2,2,2,1,1)
  (same comment as for atrazine)
  properties: carbon content, fossil 0.17759, dry mass 1 kg, wet mass 1 kg
- packaging, for fertilisers: 0.038 kg; lognormal variance with pedigree 1.6408, pedigree (4,3,2,5,4)
  The HDPE packaging was considered for macronutrient fertilisers. Soil correctives were not considered in the packaging calculation since these are transported in bulk. The amount of packaging for pesticides was also estimated. It was considered twice the value of the active ingredient of fertilisers and pesticides applied in the field to account for the packaging of the diluted products. The production and disposal of the packaging were included in this exchange.
  properties: carbon content, fossil 0.825301, dry mass 1 kg, price 0.0642 EUR2005, wet mass 1 kg
  note on carbon content, fossil: Considering a chemical formula (C2H4)n for polyethylene, carbon content-fossil is calculated to be 0.856286 kg of Carbon per kg of dry mass.
- packaging, for pesticides: 0.0019 kg; lognormal variance with pedigree 1.6408, pedigree (4,3,2,5,4)
  (same comment as for packaging, for fertilisers)
  properties: carbon content, fossil 0.85714, dry mass 1 kg, price 0.0642 EUR2005, wet mass 1 kg
- pesticide, unspecified: 0.00036 kg; lognormal variance with pedigree 1.0709, pedigree (2,2,2,1,1)
  The commercial pesticides not found in the ecoinvent database were summed up and added as “pesticide, unspecified” in kg/kg: Acephate (1,9E-04), Azoxystrobin (3,5E-06), beta-cyfluthrin (4,9E-08), bifenthrin (1,7E-05), chlorantraniliprole (1,9E-06), chlorpyrifos (1,2E-06), Espinetoram (4,9E-08), Imidacloprid (1,8E-05), lambda-cyhalothrin (2,9E-06), mesotrione (6,8E-06), methomyl (7,4E-05), nicosulfuron (6,2E-06), Tebuconazole (1,6E-05), Teflubenzuron (1,5E-07), Tembotrione (3,9E-07), Thiamethoxam (5,3E-06), Thiodicarb (1,3E-05), Trifloxystrobin (5,3E-06)
  properties: carbon content, fossil 0.486978, dry mass 1 kg, wet mass 1 kg
- potassium chloride: 0.011 kg; lognormal variance with pedigree 1.0709, pedigree (2,2,2,1,1)
  The amount of fertiliser was obtained from interviews with producers and experts. The nutrient content in the input was obtained from technical literature and technical regulation documents. The selection of the fertiliser from the ecoinvent database and its ammount was based on the commercial product.
  properties: dry mass 1 kg, wet mass 1 kg
- transport, tractor and trailer, agricultural: 0.0054 metric ton*km; lognormal variance with pedigree 1.1123, pedigree (3,2,2,1,1)
  Average transport of fertilisers, limestone and gypsum from shed to field.. Transport of sugarcane from field to warehouse and transport of tapwater for pesticide spray from source to mixing point. are also included. Calculation based on consultation to experts.
- triple superphosphate: 0.016 kg; lognormal variance with pedigree 1.0709, pedigree (2,2,2,1,1)
  (same comment as for potassium chloride)
  properties: dry mass 1 kg, phosphorus content 0.200754, wet mass 1 kg
  note on phosphorus content: Phosphorus content (on a dry matter basis) of triple superphosphate is calculated from the molecular formula of the nutrient present in the substance.
- urea: 0.012 kg; lognormal variance with pedigree 1.0709, pedigree (2,2,2,1,1)
  (same comment as for potassium chloride)
  properties: carbon content, fossil 0.2, dry mass 1 kg, wet mass 1 kg

## Inputs from nature
- Carbon dioxide, in air [natural resource, in air]: 1.6317 kg; lognormal variance with pedigree 1.0709, pedigree (2,2,2,1,1)
  Carbon dioxide (CO2) absorption from air during photosynthesis was also included, according to Nemecek and Schnetzer (2012). It considers the carbon content of the reference product based on the ecoinvent database (Jungbluth et al., 2007).
- Occupation, annual crop, non-irrigated, intensive [natural resource, land]: 9.27e-5 m2*year; lognormal variance with pedigree 1.1122, pedigree (3,1,2,1,1)
  The land occupation was calculated based on crop yield
- Transformation, from annual crop, non-irrigated, intensive [natural resource, land]: 1.91 m2; lognormal variance with pedigree 1.0608, pedigree (2,1,2,1,1)
  The LUC input comprises the actual data related to land transformation. This land transformation flow is irrelevant to LUC and the amounts are equal in both the 'land transformation from' and 'land transformation to'.
- Transformation, to annual crop, non-irrigated, intensive [natural resource, land]: 1.91 m2; lognormal variance with pedigree 1.0608, pedigree (2,1,2,1,1)
  (same comment as for Transformation, from annual crop, non-irrigated, intensive)
- Water, unspecified natural origin [natural resource, in water]: 0.00019 m3; lognormal variance with pedigree 1.0608, pedigree (2,1,2,1,1)
  Water consumed for pesticide dilution. Estimated volume based on interviews with producers and experts

## Emissions to nature
- Acephate [air, non-urban air or from high stacks]: 1.91e-5 kg; lognormal variance with pedigree 1.1123, pedigree (3,2,2,1,1)
  Pesticide emissions are calculated using the PestLCI model, adapted to the Brazilian conditions (Embrapa, 2021; PestLCI, 2022).
- Ammonia [air, non-urban air or from high stacks]: 0.00111012 kg; lognormal variance with pedigree 1.11033, pedigree (3,2,2,2,3)
  Ammonia releases to air, according to the AGRAMMON model: 'Plant production' (Nemecek & Schnetzer, 2011)
- Atrazine [air, non-urban air or from high stacks]: 3.31e-5 kg; lognormal variance with pedigree 1.1123, pedigree (3,2,2,1,1)
  (same comment as for Acephate)
- Azoxystrobin [air, non-urban air or from high stacks]: 3.51e-7 kg; lognormal variance with pedigree 1.1123, pedigree (3,2,2,1,1)
  (same comment as for Acephate)
- Benzene [air, non-urban air or from high stacks]: 4.44e-8 kg; lognormal variance with pedigree 1.2403, pedigree (3,2,2,1,3)
  Emissions derived from fuel combustion (diesel 88%, and biodiesel 12%), using emission factors from Nemecek & Kagi (2007)
- Benzo(a)pyrene [air, non-urban air or from high stacks]: 1.82e-10 kg; lognormal variance with pedigree 1.2403, pedigree (3,2,2,1,3)
  (same comment as for Benzene)
- Beta-cyfluthrin [air, non-urban air or from high stacks]: 6.07e-9 kg; lognormal variance with pedigree 1.1123, pedigree (3,2,2,1,1)
  (same comment as for Acephate)
- Bifenthrin [air, non-urban air or from high stacks]: 1.72e-6 kg; lognormal variance with pedigree 1.1123, pedigree (3,2,2,1,1)
  (same comment as for Acephate)
- Cadmium II [air, non-urban air or from high stacks]: 6.08e-11 kg; lognormal variance with pedigree 1.2403, pedigree (3,2,2,1,3)
  (same comment as for Benzene)
- Carbon dioxide, fossil [air, non-urban air or from high stacks]: 0.0584629 kg; lognormal variance with pedigree 1.11233, pedigree (3,2,2,2,1)
  Carbon dioxide releases from urea and limestone application, according to IPCC (2006) plus emissions derived from fuel combustion (diesel 88%, and biodiesel 12%), using emission factors from Nemecek & Kagi (2007)
- Carbon dioxide, non-fossil [air, non-urban air or from high stacks]: 0.00237 kg; lognormal variance with pedigree 1.1289, pedigree (4,3,2,3,1)
  (same comment as for Benzene)
- Carbon monoxide, fossil [air, non-urban air or from high stacks]: 3.25e-5 kg; lognormal variance with pedigree 1.2403, pedigree (3,2,2,1,3)
  (same comment as for Benzene)
- Chlorantraniliprole [air, non-urban air or from high stacks]: 1.57e-7 kg; lognormal variance with pedigree 1.1123, pedigree (3,2,2,1,1)
  (same comment as for Acephate)
- Chlorpyrifos [air, non-urban air or from high stacks]: 1.17e-7 kg; lognormal variance with pedigree 1.1123, pedigree (3,2,2,1,1)
  (same comment as for Acephate)
- Chromium III [air, non-urban air or from high stacks]: 3.04e-10 kg; lognormal variance with pedigree 1.2403, pedigree (3,2,2,1,3)
  (same comment as for Benzene)
- Copper ion [air, non-urban air or from high stacks]: 1.03e-8 kg; lognormal variance with pedigree 1.2403, pedigree (3,2,2,1,3)
  (same comment as for Benzene)
- Dinitrogen monoxide [air, non-urban air or from high stacks]: 0.000278749 kg; lognormal variance with pedigree 1.11033, pedigree (3,2,2,2,3)
  Direct and indirect N2O emissions according to IPCC (2019) plus emissions derived from fuel combustion (diesel 88%, and biodiesel 12%), using emission factors from Nemecek & Kagi (2007)
- Glyphosate [air, non-urban air or from high stacks]: 2.54e-5 kg; lognormal variance with pedigree 1.1123, pedigree (3,2,2,1,1)
  (same comment as for Acephate)
- Hydrocarbons, unspecified [air, non-urban air or from high stacks]: 1.82e-5 kg; lognormal variance with pedigree 1.2403, pedigree (3,2,2,1,3)
  (same comment as for Benzene)
- Imidacloprid [air, non-urban air or from high stacks]: 1.78e-6 kg; lognormal variance with pedigree 1.1123, pedigree (3,2,2,1,1)
  (same comment as for Acephate)
- Lambda-cyhalothrin [air, non-urban air or from high stacks]: 2.93e-7 kg; lognormal variance with pedigree 1.1123, pedigree (3,2,2,1,1)
  (same comment as for Acephate)
- Mancozeb [air, non-urban air or from high stacks]: 1.1e-6 kg; lognormal variance with pedigree 1.1123, pedigree (3,2,2,1,1)
  (same comment as for Acephate)
- Mesotrione [air, non-urban air or from high stacks]: 7.03e-7 kg; lognormal variance with pedigree 1.1123, pedigree (3,2,2,1,1)
  (same comment as for Acephate)
- Methane, fossil [air, non-urban air or from high stacks]: 7.85e-7 kg; lognormal variance with pedigree 1.2403, pedigree (3,2,2,1,3)
  (same comment as for Benzene)
- Methane, non-fossil [air, non-urban air or from high stacks]: 3.24e-7 kg; lognormal variance with pedigree 1.2403, pedigree (3,2,2,1,3)
  (same comment as for Benzene)
- Methomyl [air, non-urban air or from high stacks]: 7.38e-6 kg; lognormal variance with pedigree 1.1123, pedigree (3,2,2,1,1)
  (same comment as for Acephate)
- Nickel II [air, non-urban air or from high stacks]: 4.26e-10 kg; lognormal variance with pedigree 1.2403, pedigree (3,2,2,1,3)
  (same comment as for Benzene)
- Nicosulfuron [air, non-urban air or from high stacks]: 6.19e-7 kg; lognormal variance with pedigree 1.1123, pedigree (3,2,2,1,1)
  (same comment as for Acephate)
- Nitrogen oxides [air, non-urban air or from high stacks]: 0.0003412 kg; lognormal variance with pedigree 1.11033, pedigree (3,2,2,2,3)
  Emissions of NOx from applied mineral fertilisers, according to WFLDB (2019)
- PAH, polycyclic aromatic hydrocarbons [air, non-urban air or from high stacks]: 2e-8 kg; lognormal variance with pedigree 1.2403, pedigree (3,2,2,1,3)
  (same comment as for Benzene)
- Particulate Matter, < 2.5 um [air, non-urban air or from high stacks]: 3.4e-7 kg; lognormal variance with pedigree 1.2403, pedigree (3,2,2,1,3)
  (same comment as for Benzene)
- Selenium IV [air, non-urban air or from high stacks]: 6.08e-11 kg; lognormal variance with pedigree 1.2403, pedigree (3,2,2,1,3)
  (same comment as for Benzene)
- Sulfur dioxide [air, non-urban air or from high stacks]: 6.14e-6 kg; lognormal variance with pedigree 1.2403, pedigree (3,2,2,1,3)
  (same comment as for Benzene)
- Tebuconazole [air, non-urban air or from high stacks]: 1.65e-6 kg; lognormal variance with pedigree 1.1123, pedigree (3,2,2,1,1)
  (same comment as for Acephate)
  property carbon content, fossil 0.624307; name C_content_fossil_Tebuconazole
- Teflubenzuron [air, non-urban air or from high stacks]: 1.46e-8 kg; lognormal variance with pedigree 1.1123, pedigree (3,2,2,1,1)
  (same comment as for Acephate)
- Thiamethoxam [air, non-urban air or from high stacks]: 5.89e-7 kg; lognormal variance with pedigree 1.1123, pedigree (3,2,2,1,1)
  (same comment as for Acephate)
- Thiodicarb [air, non-urban air or from high stacks]: 1.23e-6 kg; lognormal variance with pedigree 1.1123, pedigree (3,2,2,1,1)
  (same comment as for Acephate)
- Trifloxystrobin [air, non-urban air or from high stacks]: 5.3e-7 kg; lognormal variance with pedigree 1.1123, pedigree (3,2,2,1,1)
  (same comment as for Acephate)
- Water [air, unspecified]: 0.00019 m3; lognormal variance with pedigree 0.0034, pedigree (2,1,2,5,1)
- Zinc II [air, non-urban air or from high stacks]: 6.08e-9 kg; lognormal variance with pedigree 1.2403, pedigree (3,2,2,1,3)
  (same comment as for Benzene)
- Acephate [soil, agricultural]: 4.42e-5 kg; lognormal variance with pedigree 1.11233, pedigree (3,2,2,2,1)
  (same comment as for Acephate)
- Acephate [soil, forestry]: 5.35e-7 kg; lognormal variance with pedigree 1.11233, pedigree (3,2,2,2,1)
  (same comment as for Acephate)
- Arsenic ion [soil, agricultural]: 3.20568e-7 kg; normal variance with pedigree 1.21, pedigree (5,5,5,5,5)
  Heavy metals emissions to agricultural soil through erosion are estimated by using the SALCA-heavy metal model (Nemecek et al., 2015).
  Uncertainty: Emissions of heavy metals to soil estimated based on WFLDB adapted to Brazil
- Atrazine [soil, agricultural]: 0.000223 kg; lognormal variance with pedigree 1.11233, pedigree (3,2,2,2,1)
  (same comment as for Acephate)
- Atrazine [soil, forestry]: 9.22e-7 kg; lognormal variance with pedigree 1.11233, pedigree (3,2,2,2,1)
  (same comment as for Acephate)
- Azoxystrobin [soil, agricultural]: 7.76e-7 kg; lognormal variance with pedigree 1.11233, pedigree (3,2,2,2,1)
  (same comment as for Acephate)
- Azoxystrobin [soil, forestry]: 9.58e-9 kg; lognormal variance with pedigree 1.11233, pedigree (3,2,2,2,1)
  (same comment as for Acephate)
- Beta-cyfluthrin [soil, agricultural]: 2.08e-8 kg; lognormal variance with pedigree 1.11233, pedigree (3,2,2,2,1)
  (same comment as for Acephate)
- Beta-cyfluthrin [soil, forestry]: 1.45e-10 kg; lognormal variance with pedigree 1.11233, pedigree (3,2,2,2,1)
  (same comment as for Acephate)
- Bifenthrin [soil, agricultural]: 8.22e-6 kg; lognormal variance with pedigree 1.11233, pedigree (3,2,2,2,1)
  (same comment as for Acephate)
- Bifenthrin [soil, forestry]: 4.8e-8 kg; lognormal variance with pedigree 1.11233, pedigree (3,2,2,2,1)
  (same comment as for Acephate)
- Cadmium II [soil, agricultural]: -8.48523e-9 kg; normal variance with pedigree 1.21, pedigree (5,5,5,5,5)
  (same comment as for Arsenic ion)
- Chlorantraniliprole [soil, agricultural]: 8.62e-7 kg; lognormal variance with pedigree 1.11233, pedigree (3,2,2,2,1)
  (same comment as for Acephate)
- Chlorantraniliprole [soil, forestry]: 4.39e-9 kg; lognormal variance with pedigree 1.11233, pedigree (3,2,2,2,1)
  (same comment as for Acephate)
- Chlorpyrifos [soil, agricultural]: 7.9e-7 kg; lognormal variance with pedigree 1.11233, pedigree (3,2,2,2,1)
  (same comment as for Acephate)
- Chlorpyrifos [soil, forestry]: 2.78e-9 kg; lognormal variance with pedigree 1.11233, pedigree (3,2,2,2,1)
  (same comment as for Acephate)
- Chromium III [soil, agricultural]: 6.36242e-7 kg; normal variance with pedigree 1.21, pedigree (5,5,5,5,5)
  (same comment as for Arsenic ion)
- Copper ion [soil, agricultural]: -1.43488e-6 kg; normal variance with pedigree 1.21, pedigree (5,5,5,5,5)
  (same comment as for Arsenic ion)
- Glyphosate [soil, agricultural]: 0.000227 kg; lognormal variance with pedigree 1.11233, pedigree (3,2,2,2,1)
  (same comment as for Acephate)
- Glyphosate [soil, forestry]: 7.05e-7 kg; lognormal variance with pedigree 1.11233, pedigree (3,2,2,2,1)
  (same comment as for Acephate)
- Imidacloprid [soil, agricultural]: 1.14e-5 kg; lognormal variance with pedigree 1.11233, pedigree (3,2,2,2,1)
  (same comment as for Acephate)
- Imidacloprid [soil, forestry]: 4.97e-8 kg; lognormal variance with pedigree 1.11233, pedigree (3,2,2,2,1)
  (same comment as for Acephate)
- Lambda-cyhalothrin [soil, agricultural]: 1.33e-6 kg; lognormal variance with pedigree 1.11233, pedigree (3,2,2,2,1)
  (same comment as for Acephate)
- Lambda-cyhalothrin [soil, forestry]: 8.19e-9 kg; lognormal variance with pedigree 1.11233, pedigree (3,2,2,2,1)
  (same comment as for Acephate)
- Lead II [soil, agricultural]: 3.22458e-10 kg; normal variance with pedigree 1.21, pedigree (5,5,5,5,5)
  (same comment as for Arsenic ion)
- Mancozeb [soil, agricultural]: 1.81e-6 kg; lognormal variance with pedigree 1.11233, pedigree (3,2,2,2,1)
  (same comment as for Acephate)
- Mancozeb [soil, forestry]: 2.62e-8 kg; lognormal variance with pedigree 1.11233, pedigree (3,2,2,2,1)
  (same comment as for Acephate)
- Mesotrione [soil, agricultural]: 4.75e-6 kg; lognormal variance with pedigree 1.11233, pedigree (3,2,2,2,1)
  (same comment as for Acephate)
- Mesotrione [soil, forestry]: 1.96e-8 kg; lognormal variance with pedigree 1.11233, pedigree (3,2,2,2,1)
  (same comment as for Acephate)
- Methomyl [soil, agricultural]: 2.55e-5 kg; lognormal variance with pedigree 1.11233, pedigree (3,2,2,2,1)
  (same comment as for Acephate)
- Methomyl [soil, forestry]: 2.06e-7 kg; lognormal variance with pedigree 1.11233, pedigree (3,2,2,2,1)
  (same comment as for Acephate)
- Nicosulfuron [soil, agricultural]: 4.17e-6 kg; lognormal variance with pedigree 1.11233, pedigree (3,2,2,2,1)
  (same comment as for Acephate)
- Nicosulfuron [soil, forestry]: 1.73e-8 kg; lognormal variance with pedigree 1.11233, pedigree (3,2,2,2,1)
  (same comment as for Acephate)
- Pesticides, unspecified [soil, agricultural]: 4.645e-8 kg; lognormal variance with pedigree 1.11233, pedigree (3,2,2,2,1)
  (same comment as for Acephate)
- Pesticides, unspecified [soil, forestry]: 6.95e-11 kg; lognormal variance with pedigree 1.11233, pedigree (3,2,2,2,1)
  (same comment as for Acephate)
- Tebuconazole [soil, agricultural]: 3.81e-6 kg; lognormal variance with pedigree 1.11233, pedigree (3,2,2,2,1)
  (same comment as for Acephate)
- Tebuconazole [soil, forestry]: 4.61e-8 kg; lognormal variance with pedigree 1.11233, pedigree (3,2,2,2,1)
  (same comment as for Acephate)
- Teflubenzuron [soil, agricultural]: 9.82e-8 kg; lognormal variance with pedigree 1.11233, pedigree (3,2,2,2,1)
  (same comment as for Acephate)
- Teflubenzuron [soil, forestry]: 3.48e-10 kg; lognormal variance with pedigree 1.11233, pedigree (3,2,2,2,1)
  (same comment as for Acephate)
- Tembotrione [soil, agricultural]: 2.48e-7 kg; lognormal variance with pedigree 1.11233, pedigree (3,2,2,2,1)
  (same comment as for Acephate)
- Tembotrione [soil, forestry]: 8.75e-10 kg; lognormal variance with pedigree 1.11233, pedigree (3,2,2,2,1)
  (same comment as for Acephate)
- Thiamethoxam [soil, agricultural]: 1.44e-6 kg; lognormal variance with pedigree 1.11233, pedigree (3,2,2,2,1)
  (same comment as for Acephate)
- Thiamethoxam [soil, forestry]: 1.62e-8 kg; lognormal variance with pedigree 1.11233, pedigree (3,2,2,2,1)
  (same comment as for Acephate)
- Thiodicarb [soil, agricultural]: 1.1e-5 kg; lognormal variance with pedigree 1.11233, pedigree (3,2,2,2,1)
  (same comment as for Acephate)
- Thiodicarb [soil, forestry]: 3.45e-8 kg; lognormal variance with pedigree 1.11233, pedigree (3,2,2,2,1)
  (same comment as for Acephate)
- Trifloxystrobin [soil, agricultural]: 1.23e-6 kg; lognormal variance with pedigree 1.11233, pedigree (3,2,2,2,1)
  (same comment as for Acephate)
- Trifloxystrobin [soil, forestry]: 1.48e-8 kg; lognormal variance with pedigree 1.11233, pedigree (3,2,2,2,1)
  (same comment as for Acephate)
- Acephate [water, unspecified]: 1.11e-8 kg; lognormal variance with pedigree 1.11233, pedigree (3,2,2,2,1)
  (same comment as for Acephate)
- Arsenic ion [water, surface water]: 3.206e-11 kg; lognormal variance with pedigree 1.11233, pedigree (3,2,2,2,1)
  Emissions of heavy metals to surface water are calculated according to Schmidt (2007)
- Atrazine [water, unspecified]: 2.15e-8 kg; lognormal variance with pedigree 1.11233, pedigree (3,2,2,2,1)
  (same comment as for Acephate)
- Azoxystrobin [water, unspecified]: 3.8e-10 kg; lognormal variance with pedigree 1.11233, pedigree (3,2,2,2,1)
  (same comment as for Acephate)
- Beta-cyfluthrin [water, unspecified]: 2.18e-11 kg; lognormal variance with pedigree 1.11233, pedigree (3,2,2,2,1)
  (same comment as for Acephate)
- Bifenthrin [water, unspecified]: 1e-9 kg; lognormal variance with pedigree 1.11233, pedigree (3,2,2,2,1)
  (same comment as for Acephate)
- Cadmium II [water, surface water]: 1.73165e-12 kg; lognormal variance with pedigree 1.11233, pedigree (3,2,2,2,1)
  Emissions of heavy metals to surface water are calculated according to Schmidt (2007)
- Chlorantraniliprole [water, unspecified]: 9.15e-11 kg; lognormal variance with pedigree 1.11233, pedigree (3,2,2,2,1)
  (same comment as for Acephate)
- Chlorpyrifos [water, unspecified]: 4.18e-10 kg; lognormal variance with pedigree 1.11233, pedigree (3,2,2,2,1)
  (same comment as for Acephate)
- Chromium III [water, surface water]: 9.11533e-11 kg; lognormal variance with pedigree 1.11233, pedigree (3,2,2,2,1)
  Emissions of heavy metals to surface water are calculated according to Schmidt (2007)
- Copper ion [water, surface water]: 7.15192e-11 kg; lognormal variance with pedigree 1.11233, pedigree (3,2,2,2,1)
  Emissions of heavy metals to surface water are calculated according to Schmidt (2007)
- Glyphosate [water, unspecified]: 1.74e-8 kg; lognormal variance with pedigree 1.11233, pedigree (3,2,2,2,1)
  (same comment as for Acephate)
- Imidacloprid [water, unspecified]: 1.24e-9 kg; lognormal variance with pedigree 1.11233, pedigree (3,2,2,2,1)
  (same comment as for Acephate)
- Lambda-cyhalothrin [water, unspecified]: 1.71e-10 kg; lognormal variance with pedigree 1.11233, pedigree (3,2,2,2,1)
  (same comment as for Acephate)
- Lead II [water, surface water]: 2.58348e-11 kg; lognormal variance with pedigree 1.11233, pedigree (3,2,2,2,1)
  Emissions of heavy metals to surface water are calculated according to Schmidt (2007)
- Mancozeb [water, unspecified]: 3.94e-9 kg; lognormal variance with pedigree 1.11233, pedigree (3,2,2,2,1)
  (same comment as for Acephate)
- Mesotrione [water, unspecified]: 4.11e-10 kg; lognormal variance with pedigree 1.11233, pedigree (3,2,2,2,1)
  (same comment as for Acephate)
- Methomyl [water, unspecified]: 4.31e-9 kg; lognormal variance with pedigree 1.11233, pedigree (3,2,2,2,1)
  (same comment as for Acephate)
- Nicosulfuron [water, unspecified]: 3.61e-10 kg; lognormal variance with pedigree 1.11233, pedigree (3,2,2,2,1)
  (same comment as for Acephate)
- Nitrate [water, ground-]: 0.0536 kg; lognormal variance with pedigree 1.11233, pedigree (3,2,2,2,1)
  The SQCB-NO3 model was used according to Nemecek et al. (2015), considering only the quantity of water from precipitation (no irrigation was applied). Technical parameters are available in the BRCalc/ICVCalc tool (Folegatti-Matsuura et al., 2022).
- Pesticides, unspecified [water, unspecified]: 1.42e-10 kg; lognormal variance with pedigree 1.11233, pedigree (3,2,2,2,1)
  (same comment as for Acephate)
- Phosphorus [water, surface water]: 4.91e-6 kg; lognormal variance with pedigree 1.11233, pedigree (3,2,2,2,1)
  Only the phosphorus emission to surface water caused by soil erosion was calculated, according to Nemecek et al., 2015. Required technical parameters are available in the BRCalc/ICVCalc tool (Folegatti-Matsuura et al., 2022).
- Tebuconazole [water, unspecified]: 9.62e-10 kg; lognormal variance with pedigree 1.11233, pedigree (3,2,2,2,1)
  (same comment as for Acephate)
- Teflubenzuron [water, unspecified]: 5.2e-11 kg; lognormal variance with pedigree 1.11233, pedigree (3,2,2,2,1)
  (same comment as for Acephate)
- Thiamethoxam [water, unspecified]: 4.98e-10 kg; lognormal variance with pedigree 1.11233, pedigree (3,2,2,2,1)
  (same comment as for Acephate)
- Thiodicarb [water, unspecified]: 7.19e-10 kg; lognormal variance with pedigree 1.11233, pedigree (3,2,2,2,1)
  (same comment as for Acephate)
- Trifloxystrobin [water, unspecified]: 3.1e-10 kg; lognormal variance with pedigree 1.11233, pedigree (3,2,2,2,1)
  (same comment as for Acephate)

## Sampling procedure
The main source of data for agricultural inputs and operations is the ProspecSoy Project, conducted by Embrapa Soja. Data are also provided by relevant experts. Emissions from the agricultural process are estimated using BRCalc/ICVCalc.

## Review by Simone Fazio 2022-07-29
all the review comments have been addressed, solved or better explained
agricultural operations with minor consumption (fertilizer distribution, pesticide application, etc) should be better defined in the future updates, for the sake of precision even if the overall impact don't change significantly
