# cyanuric chloride production

Dataset: EcoSpold 2, unit process
Geography: GLO
Time period: 2005-01-01 to 2023-12-31
Technology level: current
Classification: ISIC rev.4 ecoinvent: 2011:Manufacture of basic chemicals
Synonyms: 2,4,6-Trichloro-1,3,5-triazine; Trichlorotriazine; Cyanuryl chloride; s-Triazine trichloride
Scenario: Business-as-Usual
System model: Allocation, cut-off by classification
Generated by: Jürgen Sutter
Published in: Nemecek, T. 2007
Database: ecoinvent
isCopyrightProtected: true
accessRestrictedTo: 1

## General comment
This dataset represents the production of cyanuric chloride from hydrogen cyanide and chlorine. Raw materials are modelled with a stoichiometric calculation. Energy consumption is modelled with data from a similar process. The emissions are estimated. Infrastructure is included with a default value.

## Included activities start
From reception of precursors (chlorine, hydrogen cyanide) at the factory gate.

## Included activities end
This activity ends with cyanuric chloride at the factory gate.

## Geography
The inventory is based on stoichiometrics and therefore globally applicable.

## Technology
Cyanuric chloride is produced from hydrogen cyanide in two steps:
HCN + Cl2 → ClCN + HCl
3 ClCN → C3Cl3N3

## Parameters
- fraction, cooling water, cooling pond system, to air: 0.032 dimensionless; name fraction_CW_CP_to_air; lognormal variance with pedigree 0.0413, pedigree (2,3,1,3,1)
  Calculated based on literature value (Scown, C.D., 2011, Water Footprint of U.S. Transportation Fuels and supplying information of the article) (Vionnet, S., Quantis Water Database - Technical Report, 2012).
- fraction, cooling water, once-through system, to air: 0.004 dimensionless; name fraction_CW_OT_to_air; lognormal variance with pedigree 0.0413, pedigree (2,3,1,3,1)
  (same comment as for fraction, cooling water, cooling pond system, to air)
- fraction, cooling water, recirculating system, to air: 0.771 dimensionless; name fraction_CW_R_to_air; lognormal variance with pedigree 0.0413, pedigree (2,3,1,3,1)
  (same comment as for fraction, cooling water, cooling pond system, to air)
- fraction, cooling water, to air: 0.3875 dimensionless; name fraction_CW_to_air; = (0.5*fraction_CW_OT_to_air)+(0.5*fraction_CW_R_to_air); lognormal variance with pedigree 1.21, pedigree (5,5,5,5,5)
  Calculated value based on literature value (see comments of the other parametres present in this dataset) and expert opinion. In the case when no industry/literature data are available about the type of cooling or directly fraction, cooling water, to air specific for the process a default assumption is applied. It is assumed that the once-through cooling system is used in 50% of all cases and recirculating system is used in another 50% of all cases.

## Reference product
- cyanuric chloride: 1 kg; name CC; = (184.411/215.686)/0.95^2; By-product classification allocatable product; CPC 34150: Amine-function compounds; oxygen-function amino-compounds, except lysine and its esters and salts thereof and […]; HS2017 380899: Rodenticides and other similar products n.e.c. in heading no. 3808.9; other than containing goods specified[...]; CAS 108-77-0
  stoichiometric relation between cyanuric chloride and atrazine (original data were per kg atrazine) considering a product loss of 5% in each of 2 production steps from cyanuric chloride to atrazine.
  production volume 2e8 kg
    Ullmann's
  property price 1.21251 EUR2005
    Calculated based on inputs: The price of the product has been calculated as a sum of the values of the material and energy inputs for this product. This value is therefore a rough estimation. It may underestimate the real price since there are additional expenses when producing any product. These expences can include for example labour costs, treatment of waste materials and profit for the producer. Please consider carefully whether this level of data quality is acceptable for your application.
  properties: carbon allocation 0.1954 kg, carbon content 0.1954, carbon content, fossil 0.1954, dry mass 1 kg, wet mass 1 kg

## Inputs from technosphere
- chemical factory, organics: 8.44447e-10 unit; = 2*4E-10; lognormal variance with pedigree 0.318, pedigree (4,1,5,1,1)
  Estimation, based on a production capacity of 50,000 t per year and a plant life time of 50 years, therefore an amount of 4X10-10 units per kg of produced chemical is aded to the unit process of the respective chemical. The amount is accounted for each production step. This might be an overestimation in some multistep syntheses.
- chlorine, liquid: 0.213035, 1.06497 kg (2 suppliers, which the file names only by identifier); sum of these 1.27801 kg; = (3*70.9/215.686/0.95^2)/(0.95^2); lognormal variance with pedigree 0.078, pedigree (4,5,5,5,1)
  Stoichiometric calculation, assuming an efficiency of 95% per reaction step, and 2 reaction steps.
  properties: dry mass 1 kg, wet mass 1 kg
- electricity, medium voltage: 0.675556 kWh; = CC*0.38*3.2*2/3.6; lognormal variance with pedigree 0.076, pedigree (4,5,5,1,1)
  Estimation, assuming a default value, originated from calculation of avarage consumption of electricity and heat per kg of product (3.2 MJ kg-1), and a resulting amount of electricity of 0,333 kW for every reaction step per kg reaction product, considering that the demand is made up of a mix that inlcudes 38% electricity. Additionally, reaction steps are approximated with energy consumption data, assuming that inventory flows can be estimated using process data for basic operation steps, available for specific organic chemicals.
  Further references:
  Kim S., Overcash M.: Energy in chemical manufacturing processes: gate-to-gate information for life cycle assessment. In: Journal of Chemical Technology & Biotechnology vol. 78, no. 9: 995-1005(11). 2003
- heat, district or industrial, natural gas: 3.2 MJ; = CC*0.5*3.2*2; lognormal variance with pedigree 0.076, pedigree (4,5,5,1,1)
  Estimation, assuming a default value, originated from calculation of avarage consumption of electricity and heat per kg of product (3.2 MJ kg-1), and a resulting amount of heat of 2 MJ for every reaction step per kg reaction product, considering that the demand is made up of a mix that includes 50% natural gas. Additionally, reaction steps are approximated with energy consumption data, assuming that inventory flows can be estimated using process data for basic operation steps, available for specific organic chemicals.
  Further references:
  Kim S., Overcash M.: Energy in chemical manufacturing processes: gate-to-gate information for life cycle assessment. In: Journal of Chemical Technology & Biotechnology vol. 78, no. 9: 995-1005(11). 2003
  properties: heating value, net 1 MJ
- heat, district or industrial, other than natural gas: 0.768 MJ; = CC*0.12*3.2*2; lognormal variance with pedigree 0.11, pedigree (5,5,5,5,1)
  Estimation, assuming a default value, originated from calculation of avarage consumption of electricity and heat per kg of product (3.2 MJ kg-1), and a resulting amount of heat of 2 MJ for every reaction step per kg reaction product, considering that the demand is made up of a mix that inlcudes 12% steam from external energy sources. Additionally, reaction steps are approximated with energy consumption data, assuming that inventory flows can be estimated using process data for basic operation steps, available for specific organic chemicals.
  Further references:
  Kim S., Overcash M.: Energy in chemical manufacturing processes: gate-to-gate information for life cycle assessment. In: Journal of Chemical Technology & Biotechnology vol. 78, no. 9: 995-1005(11). 2003
  properties: heating value, net 1 MJ
- hydrogen cyanide: 0.33497, 0.152259 kg (2 suppliers, which the file names only by identifier); sum of these 0.487229 kg; = (3*27.03/215.686/0.95^2)/(0.95^2); lognormal variance with pedigree 0.078, pedigree (4,5,5,5,1)
  (same comment as for chlorine, liquid)
  properties: carbon content, fossil 0.444444, dry mass 1 kg, heating value, net 17.95 MJ, wet mass 1 kg
- sodium hydroxide, without water, in 50% solution state: 0.0522449, 0.53503 kg (2 suppliers, which the file names only by identifier); sum of these 0.587275 kg; = 40*3/215.686; lognormal variance with pedigree 0.076, pedigree (4,5,5,1,1)
  For neutralisation of 3HCl. Stoichiometric calculation, assuming an efficiency of 100%
  properties: dry mass 1 kg, heating value, net 3.03 MJ, wet mass 1 kg

## Inputs from nature
- Water, cooling, unspecified natural origin [natural resource, in water]: 0.048 m3; name water_cooling_UNO_input; = 0.024*2*CC; source Gendorf 2000; lognormal variance with pedigree 0.076, pedigree (4,5,5,1,1)
  Estimation (24 kg cooling water per kg produced chemical per step)

## Emissions to nature
- Carbon dioxide, fossil [air, urban air close to ground]: 0.105556 kg; lognormal variance with pedigree 0.0486, pedigree (4,1,5,1,1)
  Estimation, based on the assumption that 0.2% of volatile input materials is emitted to air occurring from the purge vent, the destillation vent and fugitive emission sources. Remaining gases like CH4 or CO are oxidated to CO2. The carbon contained in the removed carbon compounds from wastewater treatment was accounted as CO2 emissions to air (assuming a removal efficiency of 90%).
- Chlorine [air, urban air close to ground]: 0.00267225 kg; lognormal variance with pedigree 0.058, pedigree (4,1,5,1,1)
  Estimation, based on the assumption that 0.2% of volatile input materials is emitted to air occurring from the purge vent, the destillation vent and fugitive emission sources.
- Water [air, unspecified]: 0.0186 m3; name water_to_air_unspecified; = (water_cooling_UNO_input*fraction_CW_to_air); lognormal variance with pedigree 0.0807, pedigree (2,2,5,1,1)
  Calculated value based on literature values and expert opinion. See comments in the parametres' comment field.
  property fraction, origin: fresh water 0; name fraction_origin_fresh_water
  property fraction, origin: salt water 0; name fraction_origin_salt_water
  property fraction, origin: unspecified 1; name fraction_origin_unspecified
- Chloride [water, surface water]: 0.698569 kg; = 1.103*3/5; lognormal variance with pedigree 0.318, pedigree (4,1,5,1,1)
  Estimation, assuming that the remaining amount of unreacted input materials leave the production process with the wastewater, wich is further treated in an internal wastewater plant.
- Sodium I [water, surface water]: 0.389311 kg; = 0.6147*3/5
  (same comment as for Chloride)
- Water [water, unspecified]: 0.0294 m3; name water_to_water_unspecified; = water_cooling_UNO_input*(1-fraction_CW_to_air); lognormal variance with pedigree 0.130025, pedigree (4,4,5,2,4)
  (same comment as for Water)
  property fraction, origin: fresh water 0; name fraction_origin_fresh_water_Ww
  property fraction, origin: salt water 0; name fraction_origin_salt_water_Ww
  property fraction, origin: unspecified 1; name fraction_origin_unspecified_Ww
