# treatment of lignite ash, opencast refill

Dataset: EcoSpold 2, unit process
Geography: RoW
Time period: 1996-01-01 to 2023-12-31
Technology level: current
Classification: ISIC rev.4 ecoinvent: 3822:Treatment and disposal of hazardous waste
Classification: EcoSpold01Categories: waste management/others
Synonyms: ashes form lignite incineration disposed as backfill in opencast lignite mines
Tags: ConvertedDataset; Treatment
Scenario: Business-as-Usual
System model: Allocation, cut-off by classification
Generated by: Gabor Doka (obsolete)
Published in: Doka G. 2008
Database: ecoinvent
isCopyrightProtected: true
accessRestrictedTo: 1

## General comment
backfilled waste composition is (in ppm): H2O n.a.; O n.a.; H n.a.; C n.a.; S 9796.8; N n.a.; P 104.16; B 547.49; Cl 0.78166; Br 4.1688; F 13.028; I 0.5211; Ag n.a.; As 33.611; Ba 260.55; Cd 0.23365; Co 39.083; Cr 52.11; Cu 22.39; Hg 0.041713; Mn 52.11; Mo 18.228; Ni 31.223; Pb 13.768; Sb 10.403; Se 1.4328; Sn 4.1688; V 82.025; Zn 73.989; Be 2.6055; Sc 1.3028; Sr 182.33; Ti 260.55; Tl 0.052048; W 2.6055; Si 125070; Fe 14070; Ca 52110; Al 12246; K 1563.3; Mg 7816.6; Na 2345;
[This dataset was already contained in the ecoinvent database version 2. It was not individually updated during the transfer to ecoinvent version 3. Life Cycle Impact Assessment results may still have changed, as they are affected by changes in the supply chain, i.e. in other datasets. This dataset was generated following the ecoinvent quality guidelines for version 2. It may have been subject to central changes described in the ecoinvent version 3 change report (http://www.ecoinvent.org/database/ecoinvent-version-3/reports-of-changes/), and the results of the central updates were reviewed extensively. The changes added e.g. consistent water flows and other information throughout the database. The documentation of this dataset can be found in the ecoinvent reports of version 2, which are still available via the ecoinvent website. The change report linked above covers all central changes that were made during the conversion process.]

## Included activities end
This module contains only direct emissions from lignite ash used as backfill in opencast lignite mines: short-term emissions (0-100a) and long-term emissions (>100a) both to ground water. E.g. land-use and energy consumption is *not* included.

## Geography
Ash composition calculated from country-specific coal composition (AT) and technology-specific transfer coefficients in power plant.

## Technology
Lignite ash as backfill in lignite opencast mine (together with tailings)

## Reference product
- lignite ash: -1 kg; By-product classification Waste; CPC 39990: Other wastes n.e.c.
  EcoSpold01Location=AT
  production volume 9.49094e10 kg
    Calculated based on global production of lignite reported in "Coal information 2015" IEA statistics (IEA 2015) (http://www.iea.org/media/training/presentations/statisticsmarch/coalinformation.pdf, accessed 20151008). The percentage of lignite ash is calculated to be 6% based on the weighted average of information in ecoinvent datasets for "electricity production, lignite" for the main lignite producing countries for which data is available (DE, RU, TR, AU, GR, IN, CZ and RS). Similar values were found in Feuerborn et al. n.d. "Use of Calcareous Fly Ash in Germany" (http://osi.ecopower.ru/en/ash-handling.html, accessed 20151008) and Michel 2015 "Lignite in Europe: fighting back renewables" (http://www.energypost.eu/lignite-europe-fighting-back-renewables/, accessed 20151008). The residual from electricity production areused for opencast refill.
  property heating value, net 21.7 MJ
    Based on literature, page 52, Report 5: Dones, R., Bauer, C., Bolliger, R., Burger, B., faist Emmenegger, M., Frischknecht, R., Heck, T., Jungbluth, N., Röder, A., Tuchschmid, M. (2007) Life Cycle Inventories of Energy Systems: Resulst for current Systems in Switzerland and other UCTE Countries. ecoinvent report No. 5. Paul Scherrer Institut Villigen, Swiss Centre for Life Cycle Inventories, Dübendorf, CH
  property price 0 EUR2005
    Waste products are assigned a price of zero as they are assumed to require further treatment.
  properties: carbon allocation 0 kg, carbon content 0, carbon content, fossil 0, carbon content, non-fossil 0, dry mass 1 kg, water content 0, water in wet mass 0 kg, wet mass 1 kg

## Emissions to nature
- Aluminium III [water, ground-]: 1.95186e-5 kg; lognormal variance with pedigree 1.012, pedigree (1,1,5,5,1)
  Short-term emission from lignite ash backfill. Uncertainty derived from uncertainty in ash composition and uncertainty in transfer coefficients.
- Aluminium III [water, ground-, long-term]: 0.0156783 kg; lognormal variance with pedigree 0.382, pedigree (1,1,5,5,1)
  Long-term emission from lignite ash backfill. Uncertainty derived from uncertainty in ash composition and uncertainty in transfer coefficients.
- Antimony ion [water, ground-]: 3.31603e-6 kg; lognormal variance with pedigree 1.332, pedigree (1,1,5,5,1)
  (same comment as for Aluminium III)
- Antimony ion [water, ground-, long-term]: 5.28239e-6 kg; lognormal variance with pedigree 1.312, pedigree (1,1,5,5,1)
  (same comment as for Aluminium III)
- Arsenic ion [water, ground-]: 1.42489e-5 kg; lognormal variance with pedigree 1.152, pedigree (1,1,5,5,1)
  (same comment as for Aluminium III)
- Arsenic ion [water, ground-, long-term]: 1.42489e-14 kg; lognormal variance with pedigree 1.172, pedigree (1,1,5,5,1)
  (same comment as for Aluminium III)
- Barium II [water, ground-]: 1.09397e-8 kg; lognormal variance with pedigree 1.972, pedigree (1,1,5,5,1)
  (same comment as for Aluminium III)
- Barium II [water, ground-, long-term]: 0.000316174 kg; lognormal variance with pedigree 0.882, pedigree (1,1,5,5,1)
  (same comment as for Aluminium III)
- Beryllium II [water, ground-]: 4.03346e-9 kg; lognormal variance with pedigree 2.082, pedigree (1,1,5,5,1)
  (same comment as for Aluminium III)
- Beryllium II [water, ground-, long-term]: 2.6558e-6 kg; lognormal variance with pedigree 1.492, pedigree (1,1,5,5,1)
  (same comment as for Aluminium III)
- Boron [water, ground-]: 4.4206e-6 kg; lognormal variance with pedigree 1.172, pedigree (1,1,5,5,1)
  (same comment as for Aluminium III)
- Boron [water, ground-, long-term]: 0.000352623 kg; lognormal variance with pedigree 0.832, pedigree (1,1,5,5,1)
  (same comment as for Aluminium III)
- Bromine [water, ground-]: 4.88006e-6 kg; lognormal variance with pedigree 1.422, pedigree (1,1,5,5,1)
  (same comment as for Aluminium III)
- Bromine [water, ground-, long-term]: 8.39454e-8 kg; lognormal variance with pedigree 1.452, pedigree (1,1,5,5,1)
  (same comment as for Aluminium III)
- Cadmium II [water, ground-]: 4.30792e-11 kg; lognormal variance with pedigree 2.922, pedigree (1,1,5,5,1)
  (same comment as for Aluminium III)
- Cadmium II [water, ground-, long-term]: 1.5149e-6 kg; lognormal variance with pedigree 1.802, pedigree (1,1,5,5,1)
  (same comment as for Aluminium III)
- Calcium II [water, ground-]: 2.13218e-5 kg; lognormal variance with pedigree 1.002, pedigree (1,1,5,5,1)
  (same comment as for Aluminium III)
- Calcium II [water, ground-, long-term]: 0.0563148 kg; lognormal variance with pedigree 0.222, pedigree (1,1,5,5,1)
  (same comment as for Aluminium III)
- Chloride [water, ground-]: 4.51503e-6 kg; lognormal variance with pedigree 1.652, pedigree (1,1,5,5,1)
  (same comment as for Aluminium III)
- Chloride [water, ground-, long-term]: 3.39855e-6 kg; lognormal variance with pedigree 1.652, pedigree (1,1,5,5,1)
  (same comment as for Aluminium III)
- Chromium VI [water, ground-]: 6.70423e-6 kg; lognormal variance with pedigree 1.172, pedigree (1,1,5,5,1)
  (same comment as for Aluminium III)
- Chromium VI [water, ground-, long-term]: 4.40869e-6 kg; lognormal variance with pedigree 1.162, pedigree (1,1,5,5,1)
  (same comment as for Aluminium III)
- Cobalt II [water, ground-]: 2.36814e-8 kg; lognormal variance with pedigree 1.822, pedigree (1,1,5,5,1)
  (same comment as for Aluminium III)
- Cobalt II [water, ground-, long-term]: 3.30465e-5 kg; lognormal variance with pedigree 1.132, pedigree (1,1,5,5,1)
  (same comment as for Aluminium III)
- Copper ion [water, ground-]: 4.39806e-9 kg; lognormal variance with pedigree 2.092, pedigree (1,1,5,5,1)
  (same comment as for Aluminium III)
- Copper ion [water, ground-, long-term]: 2.72725e-5 kg; lognormal variance with pedigree 1.202, pedigree (1,1,5,5,1)
  (same comment as for Aluminium III)
- Fluoride [water, ground-]: 1.9655e-6 kg; lognormal variance with pedigree 1.372, pedigree (1,1,5,5,1)
  (same comment as for Aluminium III)
- Fluoride [water, ground-, long-term]: 1.31004e-5 kg; lognormal variance with pedigree 1.272, pedigree (1,1,5,5,1)
  (same comment as for Aluminium III)
- Iodide [water, ground-]: 6.02646e-7 kg; lognormal variance with pedigree 1.692, pedigree (1,1,5,5,1)
  (same comment as for Aluminium III)
- Iodide [water, ground-, long-term]: 6.02646e-14 kg; lognormal variance with pedigree 1.722, pedigree (1,1,5,5,1)
  (same comment as for Aluminium III)
- Iron ion [water, ground-]: 1.40995e-7 kg; lognormal variance with pedigree 1.652, pedigree (1,1,5,5,1)
  (same comment as for Aluminium III)
- Iron ion [water, ground-, long-term]: 0.0112608 kg; lognormal variance with pedigree 0.412, pedigree (1,1,5,5,1)
  (same comment as for Aluminium III)
- Lead II [water, ground-]: 2.75341e-10 kg; lognormal variance with pedigree 2.422, pedigree (1,1,5,5,1)
  (same comment as for Aluminium III)
- Lead II [water, ground-, long-term]: 1.26726e-5 kg; lognormal variance with pedigree 1.272, pedigree (1,1,5,5,1)
  (same comment as for Aluminium III)
- Magnesium [water, ground-]: 4.13219e-6 kg; lognormal variance with pedigree 1.192, pedigree (1,1,5,5,1)
  (same comment as for Aluminium III)
- Magnesium [water, ground-, long-term]: 0.00867839 kg; lognormal variance with pedigree 0.442, pedigree (1,1,5,5,1)
  (same comment as for Aluminium III)
- Manganese II [water, ground-]: 3.88503e-9 kg; lognormal variance with pedigree 2.182, pedigree (1,1,5,5,1)
  (same comment as for Aluminium III)
- Manganese II [water, ground-, long-term]: 0.000112284 kg; lognormal variance with pedigree 1.092, pedigree (1,1,5,5,1)
  (same comment as for Aluminium III)
- Mercury II [water, ground-]: 2.1526e-11 kg; lognormal variance with pedigree 2.882, pedigree (1,1,5,5,1)
  (same comment as for Aluminium III)
- Mercury II [water, ground-, long-term]: 1.08854e-7 kg; lognormal variance with pedigree 2.012, pedigree (1,1,5,5,1)
  (same comment as for Aluminium III)
- Molybdenum VI [water, ground-]: 1.65017e-5 kg; lognormal variance with pedigree 1.232, pedigree (1,1,5,5,1)
  (same comment as for Aluminium III)
- Molybdenum VI [water, ground-, long-term]: 2.24549e-11 kg; lognormal variance with pedigree 1.252, pedigree (1,1,5,5,1)
  (same comment as for Aluminium III)
- Nickel II [water, ground-]: 6.63426e-8 kg; lognormal variance with pedigree 1.762, pedigree (1,1,5,5,1)
  (same comment as for Aluminium III)
- Nickel II [water, ground-, long-term]: 4.36827e-5 kg; lognormal variance with pedigree 1.162, pedigree (1,1,5,5,1)
  (same comment as for Aluminium III)
- Phosphate [water, ground-]: 3.44852e-7 kg; lognormal variance with pedigree 1.662, pedigree (1,1,5,5,1)
  (same comment as for Aluminium III)
- Phosphate [water, ground-, long-term]: 0.000206565 kg; lognormal variance with pedigree 1.082, pedigree (1,1,5,5,1)
  (same comment as for Aluminium III)
- Potassium I [water, ground-]: 0.00107261 kg; lognormal variance with pedigree 0.652, pedigree (1,1,5,5,1)
  (same comment as for Aluminium III)
- Potassium I [water, ground-, long-term]: 0.000828186 kg; lognormal variance with pedigree 0.652, pedigree (1,1,5,5,1)
  (same comment as for Aluminium III)
- Scandium [water, ground-]: 5.77182e-7 kg; lognormal variance with pedigree 1.622, pedigree (1,1,5,5,1)
  (same comment as for Aluminium III)
- Scandium [water, ground-, long-term]: 1.46512e-6 kg; lognormal variance with pedigree 1.582, pedigree (1,1,5,5,1)
  (same comment as for Aluminium III)
- Selenium IV [water, ground-]: 1.64832e-6 kg; lognormal variance with pedigree 1.592, pedigree (1,1,5,5,1)
  (same comment as for Aluminium III)
- Selenium IV [water, ground-, long-term]: 2.62578e-6 kg; lognormal variance with pedigree 1.572, pedigree (1,1,5,5,1)
  (same comment as for Aluminium III)
- Silicon [water, ground-]: 0.000816105 kg; lognormal variance with pedigree 0.582, pedigree (1,1,5,5,1)
  (same comment as for Aluminium III)
- Silicon [water, ground-, long-term]: 0.103135 kg; lognormal variance with pedigree 0.172, pedigree (1,1,5,5,1)
  (same comment as for Aluminium III)
- Sodium I [water, ground-]: 0.00215105 kg; lognormal variance with pedigree 0.592, pedigree (1,1,5,5,1)
  (same comment as for Aluminium III)
- Sodium I [water, ground-, long-term]: 0.000953683 kg; lognormal variance with pedigree 0.602, pedigree (1,1,5,5,1)
  (same comment as for Aluminium III)
- Strontium II [water, ground-]: 3.62615e-7 kg; lognormal variance with pedigree 1.522, pedigree (1,1,5,5,1)
  (same comment as for Aluminium III)
- Strontium II [water, ground-, long-term]: 0.00023876 kg; lognormal variance with pedigree 0.922, pedigree (1,1,5,5,1)
  (same comment as for Aluminium III)
- Sulfate [water, ground-]: 0.0206791 kg; lognormal variance with pedigree 0.462, pedigree (1,1,5,5,1)
  (same comment as for Aluminium III)
- Sulfate [water, ground-, long-term]: 0.0561426 kg; lognormal variance with pedigree 0.412, pedigree (1,1,5,5,1)
  (same comment as for Aluminium III)
- Thallium I [water, ground-]: 9.08702e-11 kg; lognormal variance with pedigree 2.582, pedigree (1,1,5,5,1)
  (same comment as for Aluminium III)
- Thallium I [water, ground-, long-term]: 5.98325e-8 kg; lognormal variance with pedigree 1.992, pedigree (1,1,5,5,1)
  (same comment as for Aluminium III)
- Tin ion [water, ground-]: 3.82661e-10 kg; lognormal variance with pedigree 2.412, pedigree (1,1,5,5,1)
  (same comment as for Aluminium III)
- Tin ion [water, ground-, long-term]: 4.82077e-6 kg; lognormal variance with pedigree 1.422, pedigree (1,1,5,5,1)
  (same comment as for Aluminium III)
- Titanium ion [water, ground-]: 3.74664e-7 kg; lognormal variance with pedigree 1.502, pedigree (1,1,5,5,1)
  (same comment as for Aluminium III)
- Titanium ion [water, ground-, long-term]: 0.000300948 kg; lognormal variance with pedigree 0.882, pedigree (1,1,5,5,1)
  (same comment as for Aluminium III)
- Tungsten [water, ground-]: 1.16207e-6 kg; lognormal variance with pedigree 1.512, pedigree (1,1,5,5,1)
  (same comment as for Aluminium III)
- Tungsten [water, ground-, long-term]: 1.85116e-6 kg; lognormal variance with pedigree 1.492, pedigree (1,1,5,5,1)
  (same comment as for Aluminium III)
- Vanadium V [water, ground-]: 4.98592e-7 kg; lognormal variance with pedigree 1.452, pedigree (1,1,5,5,1)
  (same comment as for Aluminium III)
- Vanadium V [water, ground-, long-term]: 4.36327e-5 kg; lognormal variance with pedigree 1.122, pedigree (1,1,5,5,1)
  (same comment as for Aluminium III)
- Zinc II [water, ground-]: 3.59822e-9 kg; lognormal variance with pedigree 2.092, pedigree (1,1,5,5,1)
  (same comment as for Aluminium III)
- Zinc II [water, ground-, long-term]: 7.00891e-5 kg; lognormal variance with pedigree 1.042, pedigree (1,1,5,5,1)
  (same comment as for Aluminium III)

## Sampling procedure
country-specific calculation based on literature data

## Extrapolations
Ash composition calculated from coal composition and transfer coefficients in power plant (cf. ecoinvent coal report Röder 2003). Transfer coefficients in backfill estimated from data of residual material landfills and estimated carbonate phase of lignite ashes This dataset has been copied from an original dataset covering the geography AT. The uncertainty has been adjusted accordingly.

## Review by Niels Jungbluth 2009-01-22
passed.

## Review by Emilia Moreno Ruiz 2015-10-12
PV adjusted
