# protein pea production

Dataset: EcoSpold 2, unit process
Geography: CA-MB
Time period: 2017-01-01 to 2023-12-31
Technology level: current
Classification: ISIC rev.4 ecoinvent: 0111:Growing of cereals (except rice), leguminous crops and oil seeds
Synonyms: field pea (Canada)
Scenario: Business-as-Usual
System model: Allocation, cut-off by classification
Generated by: Davoud Heidari
Published in: Food Systems PRISM Lab 2020
Database: ecoinvent
isCopyrightProtected: true
accessRestrictedTo: 1

## General comment
This dataset represents the productionof 1 tonne of dried pea product with a dry matter of 84% at minimum during May-August, 2019, at 2061.88 ha pea farms located in the Province of Manitoba, Canada. Farms have yield of 3869.86 kg dried matter per ha for this crop cycle. The system boundaries include the production of all of crop inputs (e.g. seeds, fertilizers, crop protection products, and fuel). There is an estimated 0.607 kg of N fixation per tonne of peas produced in this region that can be included as an avoided use of N fertilizer for the next crop in the rotation. However, this was not included in this model due to data presentation restrictions. Irrigation is not included since it is rarely performed for peas in this region. Sowing date for the crop is May, 2019 and harvesting date is August, 2020. Seeding rate is 0.06 kg/tonne of pea production. Fertilizer applied contain nitrogen (as N) 3.35 kg/tonne, phosphate (as P2O5) 14.56 kg/tonne, potash (as K2O) 6.90 kg/tonne, sulfur (as S) 0.38 kg/tonne, and zinc (as Zn) 0.01 kg/tonne. Predominant crop protection applied contain active ingredients of Bentazon 116.31 g/tonne, Glyphosate 92.64 g/tonne, and Prothioconazole 8.25 g/tonne. Machinery is used for tillage (disk), land rolling, seeding, tillage (cultivator), swathing, harrowing, fertilizer application, in-crop herbicide application, foliar fungicide application, foliar insecticide application, combining, post-harvest herbicide application, and burndown/desiccant application with total fuel consumption of 1.54 kg/tonne.

## Included activities start
Starting inputs for this activity include seed, fertilizer, crop protection products and fuel on the farm. This activity begins with soil preparation about 37 weeks after the harvest of the previous crop. The soil is prepared for cultivation in 1st week of May and sowing of seeds started about 5 days after soil preparation.

## Included activities end
This activity ends with pea drying to <16% moisture at farm gate. Carbon and nitrogen emissions associated with above- and below-ground biomass are accounted for using the DNDC model. This model was also used to calculate a nitrogen fixation credit that can be included as an avoided use of N fertilizer for the next crop in the rotation. However, this was not included in this model due to data presentation restrictions. For peas in this region, the N credit was estimated to be 0.607 kg/t.

## Geography
Refers to weighted-average production in the Province of Manitoba, Canada

## Technology
Production of pea includes farm practices from tillage (disk), land rolling, seeding, tillage (cultivator), swathing, harrowing, fertilizer application, in-crop herbicide application, foliar fungicide application, foliar insecticide application, combining, post-harvest herbicide application, burndown/desiccant application, to drying.

## Time period
Soil cultivating date for the main crop: April - May 2019; Harvesting date main crop: August, 2017-2019. The soil cultivation, sowing and harvesting dates are the data collected by the farmers. Total time from date of sowing to date of harvesting comes to 119 days. The data is collected for three crop cycles. The cycle of one year is considered for entry in ecoinvent.

## Parameters
- LUC_crop_specific: 1 dimensionless
- yield kgha: 3869.86 kg/ha; name yield_kg_ha

## Reference product
- protein pea: 1 kg; name REF_PRODUCT; By-product classification allocatable product; CPC 0124: Green leguminous vegetables; HS2017 070810: Vegetables, leguminous; peas (pisum sativum), shelled or unshelled, fresh or chilled
  production volume 7979.16 kg
    Production volume for dry pea is provided in kg. Data is for the year 2017-2019.
  property carbon content, non-fossil 0.469421; name REF_PRODUCT_C_content_non_fossil
    biogene carbon content on a dry matter basis
    Composition data obtained from Peas, split, mature seeds, raw, in (http://www.nal.usda.gov/fnic/foodcomp/search/). First, composition data were refered to 1 kg dry mass. Then, C-contents were calculated considering a C-content/dry mass of 46% in carbohydrates (including fibres), 53% in proteins and 75% in fats. All data from 'Evolutionary and Biochemical Aspects', A.D. Kay and T. Vrede (in Global Ecology, 2010, Elsevier B.V., S.E. Jørgensen Ed.).
  property dry mass 0.87 kg; name REF_PRODUCT_DM
  property energy content 16.0776 MJ; name REF_PRODUCT_energy_content
    See chapter 'Product Properties' in '01_crop production - yields & inputs CH & Europe_v1.0.pdf', section 'AGRICULTURAL PRODUCTION IN SWITZERLAND' - pdf-document on the dedicated talk page of ecoinvent (www.ecoinvent.org/documentation)
  property price 2.11 EUR2005
    Calculated value based on data from United Nations Commodity Trade Statistics Database (comtrade.un.org). UN comtrade category: 210610 Protein concentrates and textures protein substances. Year 2005. Using exchange rate of 1EURO = 1.209 USD. Average of price of import into 5 main markets (EU, US, JP, IN and CN).
  properties: carbon allocation 0.408396 kg, carbon content 0.469421, carbon content, fossil 0, water content 0.149425, water in wet mass 0.13 kg, wet mass 1 kg

## Inputs from technosphere
- ammonium sulfate: 0.000659938 kg; lognormal variance with pedigree 0.0038, pedigree (2,3,3,1,1)
  This refers to production of Ammonium sulphate
  Uncertainty: D
  properties: dry mass 1 kg, wet mass 1 kg
- application of plant protection product, by field sprayer: 0.000113746 ha; lognormal variance with pedigree 0.0026, pedigree (1,1,3,1,1)
  This refers to application of plant protection product, by field sprayer.
- combine harvesting: 0.00026403 ha; lognormal variance with pedigree 0.0026, pedigree (1,1,3,1,1)
  This refers to combine harvesting.
- drying of protein pea: 0.025 l; lognormal variance with pedigree 0.0026, pedigree (1,1,3,1,1)
  This refers to drying of peas.
- glyphosate: 9.75e-5 kg; lognormal variance with pedigree 0.0032, pedigree (1,3,3,1,1)
  This refers to production of glyphosate
  Uncertainty: D
  properties: carbon content, fossil 0.214286, dry mass 1 kg, wet mass 1 kg
- monoammonium phosphate: 0.0281937 kg; lognormal variance with pedigree 0.0038, pedigree (2,3,3,1,1)
  This refers to production of MicroEssentials S15, MicroEssentials SZ, and Monoammonium Phosphate (MAP)
  Uncertainty: D
  properties: dry mass 1 kg, nitrogen content 0.084, phosphorus content 0.226939, wet mass 1 kg
  note on nitrogen content: Nitrogen content (on a dry matter basis) of monoammonium phosphate is calculated from the molecular formula of the nutrient present in the substance.
  note on phosphorus content: Phosphorus content (on a dry matter basis) of monoammonium phosphate is calculated from the molecular formula of the nutrient present in the substance.
- pea seed, for sowing: 0.0685578 kg; lognormal variance with pedigree 0.0038, pedigree (2,3,3,1,1)
  This refers to production of pea seed.
  Uncertainty: D
  properties: carbon content, non-fossil 0.469421, dry mass 0.87 kg, water content 0.149425, wet mass 1 kg
- peat moss: 6.64757e-6 m3; = 0.001376047/207
  Peat moss is used as a proxy to model the used inoculum. The amount is calculated by dividing the peat moss mass by its density (207 kg/m3).
  properties: heating value, net 17.88 MJ
- pesticide, unspecified: 0.000173953 kg; lognormal variance with pedigree 0.0038, pedigree (1,3,3,1,2)
  This refers to production of all herbicides (except glyphosate), fungicides and insecticides.
  Uncertainty: D
  properties: carbon content, fossil 0.486978, dry mass 1 kg, wet mass 1 kg
- potassium chloride: 0.0115049 kg; lognormal variance with pedigree 0.0038, pedigree (2,3,3,1,1)
  This refers to production of Potash
  Uncertainty: D
  properties: dry mass 1 kg, wet mass 1 kg
- sowing: 0.00015169 ha; lognormal variance with pedigree 0.0026, pedigree (1,1,3,1,1)
  This refers to sowing.
- sulfur: 0.000383357 kg; lognormal variance with pedigree 0.0038, pedigree (2,3,3,1,1)
  This refers to production of MicroEssentials S15 - S, MicroEssentials SZ - S, and Tiger 90.
  Uncertainty: D
  properties: dry mass 1 kg, wet mass 1 kg
- tillage, harrowing, by rotary harrow: 0.000260691 ha; lognormal variance with pedigree 0.0026, pedigree (1,1,3,1,1)
  This refers to tillage, harrowing, by rotary harrow.
- tillage, rolling: 0.00012267 ha; lognormal variance with pedigree 0.0026, pedigree (1,1,3,1,1)
  This refers to tillage, rolling.
- tillage, rotary cultivator: 0.000514266 ha; lognormal variance with pedigree 0.0026, pedigree (1,1,3,1,1)
  This refers to tillage, rotary cultivator.
- zinc: 1.0559e-5 kg; lognormal variance with pedigree 0.0038, pedigree (2,3,3,1,1)
  This refers to production of MicroEssentials SZ - Zn.
  Uncertainty: D
  properties: dry mass 1 kg, wet mass 1 kg

## Inputs from nature
- Occupation, annual crop, non-irrigated [natural resource, land]: 2.58408 m2*year; lognormal variance with pedigree 0.004, pedigree (1,1,3,1,1)
  Uncertainty: D
- Transformation, from unspecified [natural resource, land]: 2.58408 m2; lognormal variance with pedigree 0.01, pedigree (1,1,3,1,1)
  Uncertainty: D
- Transformation, to annual crop, non-irrigated [natural resource, land]: 2.58408 m2; lognormal variance with pedigree 0.01, pedigree (1,1,3,1,1)
  Uncertainty: D

## Emissions to nature
- Ammonia [air, non-urban air or from high stacks]: 0.000189 kg; lognormal variance with pedigree 0.0126, pedigree (3,3,3,1,1)
  Modelled with using the DeNitrification DeComposition (DNDC) -Management Factor Tool (DNDC-MFT) that was developed by Smith et al, (2010). The Canadian version of DNDC that has been used in this study was developed to include a crop growth model for cultivars grown in Canada as well as the impact of snow dynamics, crop biomass, and residue management on soil temperature (Dutta et al, 2016). (References: Dutta B, Smith WN, Grant BB, et al (2016) Model development in DNDC for the prediction of evapotranspiration and water use in temperate field cropping systems. Environ Model Softw 80:. https://doi.org/10.1016/j.envsoft.2016.02.014
  Uncertainty: D
- Bentazone [air, non-urban air or from high stacks]: 1.22e-5 kg; lognormal variance with pedigree 0.0426, pedigree (1,3,3,1,1)
  Modelled, farm-level emissions from plant protection product application were modelled based on the active ingredients for each substance. As per Margni et al. (2002), it was assumed that, regardless of the timing of the products, 76.5% of the active ingredient of each agricultural plant protection product is emitted to soil, 8.5% to water, and 10% to air. This means a total of 95% of the applied active ingredient is emitted back to the environment. The last 5% is taken up by the plant and was therefore not considered as an emission in this model. (Reference: Margni M, Rossier D, Crettaz P, Jolliet O (2002) Life cycle impact assessment of pesticides on human health and ecosystems. Agric Ecosyst Environ 93:379–392. https://doi.org/10.1016/S0167-8809(01)00336-X)
  Uncertainty: D
- Carbon dioxide, fossil [air, non-urban air or from high stacks]: 0.00106 kg; lognormal variance with pedigree 0.0026, pedigree (1,1,3,1,1)
  (same comment as for Ammonia)
- Carfentrazone-ethyl [air, non-urban air or from high stacks]: 1.99e-8 kg; lognormal variance with pedigree 0.0426, pedigree (1,3,3,1,1)
  (same comment as for Bentazone)
- Dinitrogen monoxide [air, non-urban air or from high stacks]: 9.03e-6 kg; lognormal variance with pedigree 0.0346, pedigree (3,3,3,1,1)
  (same comment as for Ammonia)
- Diquat dibromide [air, non-urban air or from high stacks]: 3.13e-7 kg; lognormal variance with pedigree 0.0426, pedigree (1,3,3,1,1)
  (same comment as for Bentazone)
- Fludioxonil [air, non-urban air or from high stacks]: 8.21e-9 kg; lognormal variance with pedigree 0.0426, pedigree (1,3,3,1,1)
  (same comment as for Bentazone)
- Glyphosate [air, non-urban air or from high stacks]: 9.75e-6 kg; lognormal variance with pedigree 0.0426, pedigree (1,3,3,1,1)
  (same comment as for Bentazone)
- Imazamox [air, non-urban air or from high stacks]: 3.92e-7 kg; lognormal variance with pedigree 0.0426, pedigree (1,3,3,1,1)
  (same comment as for Bentazone)
- Imazethapyr [air, non-urban air or from high stacks]: 1.14e-7 kg; lognormal variance with pedigree 0.0426, pedigree (1,3,3,1,1)
  (same comment as for Bentazone)
- Metalaxyl-M [air, non-urban air or from high stacks]: 3.72e-8 kg; lognormal variance with pedigree 0.0426, pedigree (1,3,3,1,1)
  (same comment as for Bentazone)
- Prothioconazole [air, non-urban air or from high stacks]: 8.69e-7 kg; lognormal variance with pedigree 0.0426, pedigree (1,3,3,1,1)
  (same comment as for Bentazone)
- Pyraclostrobin [air, non-urban air or from high stacks]: 4.41e-7 kg; lognormal variance with pedigree 0.0426, pedigree (1,3,3,1,1)
  (same comment as for Bentazone)
- Quizalofop-ethyl [air, non-urban air or from high stacks]: 2.78e-8 kg; lognormal variance with pedigree 0.0426, pedigree (1,3,3,1,1)
  (same comment as for Bentazone)
- Sethoxydim [air, non-urban air or from high stacks]: 3.1e-7 kg; lognormal variance with pedigree 0.0426, pedigree (1,3,3,1,1)
  (same comment as for Bentazone)
- Trifloxystrobin [air, non-urban air or from high stacks]: 7.44e-7 kg; lognormal variance with pedigree 0.0426, pedigree (1,3,3,1,1)
  (same comment as for Bentazone)
- Bentazone [soil, agricultural]: 9.37e-5 kg; lognormal variance with pedigree 0.0356, pedigree (1,3,3,1,1)
  (same comment as for Bentazone)
- Cadmium II [soil, agricultural]: 3.86687e-7 kg; lognormal variance with pedigree 0.0437915, pedigree (2,2,3,1,1)
  The heavy metal emissions are calculated by SALCA-heavy metal (Freiermuth 2006) using the ecoinvent LCI calculation tool for crop production.
  Uncertainty: C
- Carfentrazone-ethyl [soil, agricultural]: 1.52e-7 kg; lognormal variance with pedigree 0.0356, pedigree (1,3,3,1,1)
  (same comment as for Bentazone)
- Chromium III [soil, agricultural]: -1.06943e-5 kg
  The heavy metal emissions are calculated by SALCA-heavy metal (Freiermuth 2006) using the ecoinvent LCI calculation tool for crop production.
- Copper ion [soil, agricultural]: -1.44942e-5 kg
  (same comment as for Chromium III)
- Diquat dibromide [soil, agricultural]: 2.39e-6 kg; lognormal variance with pedigree 0.0356, pedigree (1,3,3,1,1)
  (same comment as for Bentazone)
- Ethaboxam [soil, agricultural]: 2.82e-7 kg; lognormal variance with pedigree 0.0356, pedigree (1,3,3,1,1)
  (same comment as for Bentazone)
- Fludioxonil [soil, agricultural]: 6.28e-8 kg; lognormal variance with pedigree 0.0356, pedigree (1,3,3,1,1)
  (same comment as for Bentazone)
- Fluxapyroxad [soil, agricultural]: 1.68e-6 kg; lognormal variance with pedigree 0.0356, pedigree (1,3,3,1,1)
  (same comment as for Bentazone)
- Glyphosate [soil, agricultural]: 7.46e-5 kg; lognormal variance with pedigree 0.0356, pedigree (1,3,3,1,1)
  (same comment as for Bentazone)
- Imazamox [soil, agricultural]: 3e-6 kg; lognormal variance with pedigree 0.0356, pedigree (1,3,3,1,1)
  (same comment as for Bentazone)
- Imazethapyr [soil, agricultural]: 8.72e-7 kg; lognormal variance with pedigree 0.0356, pedigree (1,3,3,1,1)
  (same comment as for Bentazone)
- Lead II [soil, agricultural]: -4.07825e-6 kg
  (same comment as for Chromium III)
- Mercury II [soil, agricultural]: -5.19342e-8 kg
  (same comment as for Chromium III)
- Metalaxyl-M [soil, agricultural]: 2.85e-7 kg; lognormal variance with pedigree 0.0356, pedigree (1,3,3,1,1)
  (same comment as for Bentazone)
- Nickel II [soil, agricultural]: -7.4158e-6 kg
  (same comment as for Chromium III)
- Nitrate [soil, unspecified]: 3.82e-5 kg; lognormal variance with pedigree 0.0376, pedigree (3,3,3,1,1)
  (same comment as for Ammonia)
- Phosphorus [soil, agricultural]: 6.18e-5 kg; lognormal variance with pedigree 0.0376, pedigree (3,3,3,1,1)
  (same comment as for Ammonia)
- Picoxystrobin [soil, agricultural]: 5.31e-6 kg; lognormal variance with pedigree 0.0356, pedigree (1,3,3,1,1)
  (same comment as for Bentazone)
- Prothioconazole [soil, agricultural]: 6.64e-6 kg; lognormal variance with pedigree 0.0356, pedigree (1,3,3,1,1)
  (same comment as for Bentazone)
- Pyraclostrobin [soil, agricultural]: 3.38e-6 kg; lognormal variance with pedigree 0.0356, pedigree (1,3,3,1,1)
  (same comment as for Bentazone)
- Pyroxasulfone [soil, agricultural]: 1.28e-6 kg; lognormal variance with pedigree 0.0356, pedigree (1,3,3,1,1)
  (same comment as for Bentazone)
- Quizalofop-ethyl [soil, agricultural]: 2.12e-7 kg; lognormal variance with pedigree 0.0356, pedigree (1,3,3,1,1)
  (same comment as for Bentazone)
- Saflufenacil [soil, agricultural]: 9e-7 kg; lognormal variance with pedigree 0.0356, pedigree (1,3,3,1,1)
  (same comment as for Bentazone)
- Sedaxane [soil, agricultural]: 1.26e-7 kg; lognormal variance with pedigree 0.0356, pedigree (1,3,3,1,1)
  (same comment as for Bentazone)
- Sethoxydim [soil, agricultural]: 2.37e-6 kg; lognormal variance with pedigree 0.0356, pedigree (1,3,3,1,1)
  (same comment as for Bentazone)
- Trifloxystrobin [soil, agricultural]: 5.7e-6 kg; lognormal variance with pedigree 0.0356, pedigree (1,3,3,1,1)
  (same comment as for Bentazone)
- Zinc II [soil, agricultural]: -3.76249e-5 kg
  (same comment as for Chromium III)
- Bentazone [water, ground-]: 1.04e-5 kg; lognormal variance with pedigree 0.0426, pedigree (1,3,3,1,1)
  (same comment as for Bentazone)
- Cadmium II [water, ground-]: 1.04152e-8 kg; lognormal variance with pedigree 0.0890596, pedigree (2,2,3,1,1)
  (same comment as for Cadmium II)
- Cadmium II [water, surface water]: 1.16711e-7 kg; lognormal variance with pedigree 0.0890596, pedigree (2,2,3,1,1)
  (same comment as for Cadmium II)
- Carfentrazone-ethyl [water, ground-]: 1.69e-8 kg; lognormal variance with pedigree 0.0426, pedigree (1,3,3,1,1)
  (same comment as for Bentazone)
- Chromium III [water, ground-]: 4.94325e-6 kg; lognormal variance with pedigree 0.0890596, pedigree (2,2,3,1,1)
  (same comment as for Cadmium II)
- Chromium III [water, surface water]: 1.31189e-5 kg; lognormal variance with pedigree 0.0890596, pedigree (2,2,3,1,1)
  (same comment as for Cadmium II)
- Copper ion [water, ground-]: 7.21605e-7 kg; lognormal variance with pedigree 0.0890596, pedigree (2,2,3,1,1)
  (same comment as for Cadmium II)
- Copper ion [water, surface water]: 9.40582e-6 kg; lognormal variance with pedigree 0.0890596, pedigree (2,2,3,1,1)
  (same comment as for Cadmium II)
- Diquat dibromide [water, ground-]: 2.66e-7 kg; lognormal variance with pedigree 0.0426, pedigree (1,3,3,1,1)
  (same comment as for Bentazone)
- Ethaboxam [water, ground-]: 3.14e-8 kg; lognormal variance with pedigree 0.0426, pedigree (1,3,3,1,1)
  (same comment as for Bentazone)
- Fludioxonil [water, ground-]: 6.98e-9 kg; lognormal variance with pedigree 0.0426, pedigree (1,3,3,1,1)
  (same comment as for Bentazone)
- Fluxapyroxad [water, ground-]: 1.87e-7 kg; lognormal variance with pedigree 0.0426, pedigree (1,3,3,1,1)
  (same comment as for Bentazone)
- Glyphosate [water, ground-]: 8.29e-6 kg; lognormal variance with pedigree 0.0426, pedigree (1,3,3,1,1)
  (same comment as for Bentazone)
- Imazamox [water, ground-]: 3.34e-7 kg; lognormal variance with pedigree 0.0426, pedigree (1,3,3,1,1)
  (same comment as for Bentazone)
- Imazethapyr [water, ground-]: 9.68e-8 kg; lognormal variance with pedigree 0.0426, pedigree (1,3,3,1,1)
  (same comment as for Bentazone)
- Lead II [water, ground-]: 7.33291e-8 kg; lognormal variance with pedigree 0.0890596, pedigree (2,2,3,1,1)
  (same comment as for Cadmium II)
- Lead II [water, surface water]: 5.56369e-6 kg; lognormal variance with pedigree 0.0890596, pedigree (2,2,3,1,1)
  (same comment as for Cadmium II)
- Mercury II [water, ground-]: 1.47194e-10 kg; lognormal variance with pedigree 0.0890596, pedigree (2,2,3,1,1)
  (same comment as for Cadmium II)
- Mercury II [water, surface water]: 1.92963e-8 kg; lognormal variance with pedigree 0.0890596, pedigree (2,2,3,1,1)
  (same comment as for Cadmium II)
- Metalaxyl-M [water, ground-]: 3.16e-8 kg; lognormal variance with pedigree 0.0426, pedigree (1,3,3,1,1)
  (same comment as for Bentazone)
- Nickel II [water, surface water]: 7.2871e-6 kg; lognormal variance with pedigree 0.0890596, pedigree (2,2,3,1,1)
  (same comment as for Cadmium II)
- Nitrate [water, ground-]: 3.82e-5 kg; lognormal variance with pedigree 0.0446, pedigree (3,3,3,1,1)
  (same comment as for Ammonia)
- Phosphorus [water, ground-]: 0.000162 kg; lognormal variance with pedigree 0.0446, pedigree (3,3,3,1,1)
  (same comment as for Ammonia)
- Prothioconazole [water, ground-]: 7.38e-7 kg; lognormal variance with pedigree 0.0426, pedigree (1,3,3,1,1)
  (same comment as for Bentazone)
- Pyraclostrobin [water, ground-]: 3.75e-7 kg; lognormal variance with pedigree 0.0426, pedigree (1,3,3,1,1)
  (same comment as for Bentazone)
- Pyroxasulfone [water, ground-]: 1.42e-7 kg; lognormal variance with pedigree 0.0426, pedigree (1,3,3,1,1)
  (same comment as for Bentazone)
- Quizalofop-ethyl [water, ground-]: 2.36e-8 kg; lognormal variance with pedigree 0.0426, pedigree (1,3,3,1,1)
  (same comment as for Bentazone)
- Saflufenacil [water, ground-]: 1e-7 kg; lognormal variance with pedigree 0.0426, pedigree (1,3,3,1,1)
  (same comment as for Bentazone)
- Sedaxane [water, ground-]: 1.4e-8 kg; lognormal variance with pedigree 0.0426, pedigree (1,3,3,1,1)
  (same comment as for Bentazone)
- Sethoxydim [water, ground-]: 2.63e-7 kg; lognormal variance with pedigree 0.0426, pedigree (1,3,3,1,1)
  (same comment as for Bentazone)
- Trifloxystrobin [water, ground-]: 6.33e-7 kg; lognormal variance with pedigree 0.0426, pedigree (1,3,3,1,1)
  (same comment as for Bentazone)
- Zinc II [water, ground-]: 3.94502e-6 kg; lognormal variance with pedigree 0.0890596, pedigree (2,2,3,1,1)
  (same comment as for Cadmium II)
- Zinc II [water, surface water]: 1.38427e-5 kg; lognormal variance with pedigree 0.0890596, pedigree (2,2,3,1,1)
  (same comment as for Cadmium II)

## Sampling procedure
Site-specific field data were collected via survey from prairie province pea producers for crop rotation, seeding rate, machinery and fuel use for field operations (e.g., tillage, harrowing, harvest), farm inputs (e.g., fertilizers, pesticides), and electricity for crop drying. Production weighted averages were calculated for the region. Outliers were removed from reported fuel use data based on visual inspection.

## Extrapolations
Geographical location of each farm was used to identify the Reconciliation Units (soil and climate based provincial divisions) identified by Agriculture and Agri-Food Canada (AAFC) and AAFC Reporting Zone (ecozone) to which each farm belongs. Production-weighted average datasets were calculated for each ecozone.

## Review by Jens Lansche 2021-02-02
All comments from the previous reviews have been taken into account in the current version.
