# grass silage production, organic

Dataset: EcoSpold 2, unit process
Geography: CH
Time period: 1995-01-01 to 2023-12-31
Technology level: current
Classification: ISIC rev.4 ecoinvent: 0119:Growing of other non-perennial crops
Scenario: Business-as-Usual
System model: Allocation, cut-off by classification
Generated by: Fredy Dinkel
Published in: Jungbluth N. 2007
Database: ecoinvent
isCopyrightProtected: true
accessRestrictedTo: 1

## General comment
This dataset represents the production of 1 kg of grass silage (dry matter). The dry matter yield is 8100 kg/ha. Moisture content at storage is 65%.
[This dataset was already contained in the ecoinvent database version 2. It was not individually updated during the transfer to ecoinvent version 3. Life Cycle Impact Assessment results may still have changed, as they are affected by changes in the supply chain, i.e. in other datasets. This dataset was generated following the ecoinvent quality guidelines for version 2. It may have been subject to central changes described in the ecoinvent version 3 change report (http://www.ecoinvent.org/database/ecoinvent-version-3/reports-of-changes/), and the results of the central updates were reviewed extensively. The changes added e.g. consistent water flows and other information throughout the database. The documentation of this dataset can be found in the ecoinvent reports of version 2, which are still available via the ecoinvent website. The change report linked above covers all central changes that were made during the conversion process.]

## Included activities start
Grass silage is assumed to be composed of grass from 'grass production, organic, intensive' (20%), 'grass production, permanent grassland, organic, extensive' (40%) and from 'grass production, permanent grassland, organic, intensive' (40%). In the first case the process starts with the establishment of a temporary meadow, in the latter two cases an established grassland is the starting point. Find details in the respective datasets.

## Included activities end
The dataset includes all machine operations of the contributing grass production systems in fractions as shown in 'included activities start'. Additionally, the processes of swathing, haying, baling, loading of bales and transport to the farm (1 km) are included. This activity ends after loading of bales at the farm gate.

## Geography
Refers to a production in the Swiss plateau (lowlands <700m).

## Technology
Intensive and extnesive ogranic production.

## Parameters
- fraction, irrigation water to surface water: 0.2 dimensionless; name fraction_IW_to_surface_water; lognormal variance with pedigree 0.0886, pedigree (4,3,1,1,4)
  Literature value (Döll, 2011) cross referenced with expert opinion.
- fraction, irrigation water, to air: 0.3353 dimensionless; name fraction_IW_to_air; lognormal variance with pedigree 0.0409, pedigree (2,2,2,1,1)
  Literature value (Siebert, 2010) (Vionnet, S., Quantis Water Database - Technical Report, 2012).
- fraction, irrigation water, to ground water: 0.8 dimensionless; name fraction_IW_to_ground_water; lognormal variance with pedigree 0.0886, pedigree (4,3,1,1,4)
  Literature value (Döll, 2011) cross referenced with expert opinion.

## Reference product
- grass silage, organic: 1 kg; name REF_PRODUCT; By-product classification allocatable product; CPC 01919: Forage products, n.e.c.; HS2017 0604: Foliage, branches and other parts of plants, without flowers or flower buds, and grasses, mosses and lichens;[...]
  production volume 9.23e8 kg
    Assumed to be 1/3 of all organic grass
  property carbon content, non-fossil 0.44076; name REF_PRODUCT_C_content_non_fossil
    biogene carbon content on a dry matter basis
    Composition data obtained from Grass Silage, in (http://beefmagazine.com/images/2009%20feed%20table.pdf). First, composition data were refered to 1 kg dry mass. Then, C-contents were calculated considering a C-content/dry mass of 46% in carbohydrates (including fibres), 53% in proteins and 75% in fats. All data from 'Evolutionary and Biochemical Aspects', A.D. Kay and T. Vrede (in Global Ecology, 2010, Elsevier B.V., S.E. Jørgensen Ed.).
  property dry mass 1 kg; name REF_PRODUCT_DM
  property energy content 18.3 MJ; name REF_PRODUCT_energy_content
    Calculation as average of inventories of 'grass production, permanent grassland, organic, intensive' (portion 40%) and '... extensive' (protion 40%) and 'grass production, organic, intensive' (temporary grassland; portion 20%).
  property price 0.129 EUR2005
    Calculated from price of the activity '_4 Grain crops, dk' in EU & DK Input Output database'. Conversion from basic price to purchaser price with factor 1.20.
  properties: carbon allocation 0.44076 kg, carbon content 0.44076, carbon content, fossil 0, water content 1.85714, water in wet mass 1.85714 kg, wet mass 2.85714 kg

## Inputs from technosphere
- bale loading: 0.0057143 unit; lognormal variance with pedigree 0.0688, pedigree (2,2,5,3,3)
  Amount of bales calculated from the hectare yield assuming 175 kg DM per bale.
  This exchange has an activity link directly to the producing activity because the product is primarily consumed in the same geographical area where it is produced.
- baling: 0.0057143 unit; lognormal variance with pedigree 0.0688, pedigree (2,2,5,3,3)
  (same comment as for bale loading)
- grass seed, Swiss integrated production, for sowing: 0.0003658 kg; name SEED; source LBL 2004; lognormal variance with pedigree 0.0407, pedigree (2,2,5,1,1)
  Calculation as average of inventories of 'grass production, permanent grassland, organic, intensive' (portion 40%) and '... extensive' (protion 40%) and 'grass production, organic, intensive' (temporary grassland; portion 20%). Silage loss about 10% (LBL 2004).
  property carbon content, non-fossil 0.464601; name SEED_C_content_non_fossil
  property dry mass 0.9 kg; name SEED_DM
  property energy content 16.299 MJ; name SEED_energy_content
  properties: water content 0.111111, wet mass 1 kg
  note on carbon content, non-fossil: biogene carbon content on a dry matter basis wheat grains values are used
  note on energy content: See chapter 'Product Properties' in '01_crop production - yields & inputs CH & Europe_v1.0.pdf', section 'AGRICULTURAL PRODUCTION IN SWITZERLAND' - pdf-document on the dedicated talk page of ecoinvent (www.ecoinvent.org/documentation).
- haying, by rotary tedder: 0.00046639 ha; source LBL 2004; lognormal variance with pedigree 0.0507, pedigree (2,2,5,1,1)
  Short drying to reduce water content from 85% to 65% for silage production (4-5 cuts per year for intensive grassland, 1 cut for extensive grassland)
  This exchange has an activity link directly to the producing activity because the product is primarily consumed in the same geographical area where it is produced.
- irrigation: 0.00021196 m3; name water_irrigation_input; source Siebert, S. 2010; lognormal variance with pedigree 0.0427, pedigree (2,2,5,1,1)
  Calculated based on literature values (Döll, 2010) and partially modelled at ETH (Pfister, S.).
  property carbon content, fossil 0; name C_content_fossil
  property carbon content, non-fossil 0; name C_content_non_fossil
  property dry mass 0.11 kg; name DM
  property water content 9089.91; name water_content
  property water in wet mass 999.89 kg; name WWM
  property wet mass 1000 kg; name WM
- liquid manure spreading, by vacuum tanker: 0.0052126 m3; source LBL 2004; lognormal variance with pedigree 0.0587, pedigree (2,2,5,1,3)
  Calculation as average of inventories of 'grass production, permanent grassland, organic, intensive' (portion 40%) and '... extensive' (protion 40%) and 'grass production, organic, intensive' (temporary grassland; portion 20%). Silage loss about 10% (LBL 2004).
  This exchange has an activity link directly to the producing activity because the product is primarily consumed in the same geographical area where it is produced.
- mowing, by rotary mower: 0.00046639 ha; source LBL 2004; lognormal variance with pedigree 0.0587, pedigree (2,2,5,1,3)
  (same comment as for liquid manure spreading, by vacuum tanker)
- solid manure loading and spreading, by hydraulic loader and spreader: 0.82305 kg; source LBL 2004; lognormal variance with pedigree 0.0587, pedigree (2,2,5,1,3)
  (same comment as for liquid manure spreading, by vacuum tanker)
- sowing: 9.1449e-6 ha; source LBL 2004; lognormal variance with pedigree 0.0587, pedigree (2,2,5,1,3)
  (same comment as for liquid manure spreading, by vacuum tanker)
- swath, by rotary windrower: 0.00046639 ha; source LBL 2004; lognormal variance with pedigree 0.0507, pedigree (2,2,5,1,1)
  (same comment as for haying, by rotary tedder)
- tillage, cultivating, chiselling: 9.1449e-6 ha; source LBL 2004; lognormal variance with pedigree 0.0587, pedigree (2,2,5,1,3)
  (same comment as for liquid manure spreading, by vacuum tanker)
- tillage, harrowing, by rotary harrow: 9.1449e-6 ha; source LBL 2004; lognormal variance with pedigree 0.0587, pedigree (2,2,5,1,3)
  (same comment as for liquid manure spreading, by vacuum tanker)
- tillage, rolling: 9.1449e-6 ha; source LBL 2004; lognormal variance with pedigree 0.0587, pedigree (2,2,5,1,3)
  (same comment as for liquid manure spreading, by vacuum tanker)
- transport, tractor and trailer, agricultural: 0.0015 metric ton*km; lognormal variance with pedigree 0.0507, pedigree (2,2,5,1,1)
  Transport distance of bales 1.5 km from the field to the farm

## Inputs from nature
- Carbon dioxide, in air [natural resource, in air]: 1.61556 kg; = 44/12 * (REF_PRODUCT_C_content_non_fossil * REF_PRODUCT * REF_PRODUCT_DM - SEED_C_content_non_fossil * SEED * SEED_DM); source LBL 2004; lognormal variance with pedigree 0.0407, pedigree (2,1,5,3,1)
  (same comment as for grass seed, Swiss integrated production, for sowing)
- Energy, gross calorific value, in biomass [natural resource, biotic]: 18.3 MJ; lognormal variance with pedigree 0.0418844, pedigree (2,1,5,3,1)
  Calculation from inventories of intensive natural meadows (portion 40%), extensive natural meadows (portion 40%) and intensive temporary meadows (20%). Silage loss about 10%.
- Occupation, pasture, man made, extensive [natural resource, land]: 1.33332 m2*year; source LBL 2004; lognormal variance with pedigree 0.0807, pedigree (2,2,5,1,1)
  (same comment as for grass seed, Swiss integrated production, for sowing)
- Occupation, pasture, man made, intensive [natural resource, land]: 0.521742 m2*year; source LBL 2004; lognormal variance with pedigree 0.1081, pedigree (4,2,5,1,1)
  (same comment as for grass seed, Swiss integrated production, for sowing)
- Transformation, from annual crop, non-irrigated, extensive [natural resource, land]: 0.04058 m2; source LBL 2004; lognormal variance with pedigree 0.1781, pedigree (4,2,5,1,1)
  (same comment as for grass seed, Swiss integrated production, for sowing)
- Transformation, from pasture, man made, extensive [natural resource, land]: 0.0266668 m2; source LBL 2004; lognormal variance with pedigree 0.1781, pedigree (4,2,5,1,1)
  (same comment as for grass seed, Swiss integrated production, for sowing)
- Transformation, from pasture, man made, intensive [natural resource, land]: 0.0347826 m2; source LBL 2004; lognormal variance with pedigree 0.1781, pedigree (4,2,5,1,1)
  (same comment as for grass seed, Swiss integrated production, for sowing)
- Transformation, to pasture, man made, extensive [natural resource, land]: 0.0266668 m2; source LBL 2004; lognormal variance with pedigree 0.1781, pedigree (4,2,5,1,1)
  (same comment as for grass seed, Swiss integrated production, for sowing)
- Transformation, to pasture, man made, intensive [natural resource, land]: 0.0753632 m2; source LBL 2004; lognormal variance with pedigree 0.1781, pedigree (4,2,5,1,1)
  (same comment as for grass seed, Swiss integrated production, for sowing)

## Emissions to nature
- Ammonia [air, non-urban air or from high stacks]: 0.00236454 kg; source LBL 2004; lognormal variance with pedigree 0.1208, pedigree (2,2,5,3,4)
  (same comment as for grass seed, Swiss integrated production, for sowing)
- Dinitrogen monoxide [air, non-urban air or from high stacks]: 0.000159 kg; name N2O; source LBL 2004; lognormal variance with pedigree 0.1608, pedigree (2,2,5,3,4)
  (same comment as for grass seed, Swiss integrated production, for sowing)
- Nitrogen oxides [air, non-urban air or from high stacks]: 3.339e-5 kg; = 0.21 * N2O; source LBL 2004; lognormal variance with pedigree 0.1608, pedigree (2,2,5,3,4)
  (same comment as for grass seed, Swiss integrated production, for sowing)
- Water [air, unspecified]: 7.10702e-5 m3; name water_to_air_unspecified; = (water_irrigation_input*fraction_IW_to_air); lognormal variance with pedigree 0.0807, pedigree (2,2,5,1,1)
  Calculated value based on literature values and expert opinion. See comments in the parametres' comment field.
  property fraction, origin: fresh water 1; name fraction_origin_fresh_water
  property fraction, origin: salt water 0; name fraction_origin_salt_water
  property fraction, origin: unspecified 0; name fraction_origin_unspecified
- Cadmium II [soil, agricultural]: -8.5979e-8 kg; source LBL 2004
  (same comment as for grass seed, Swiss integrated production, for sowing)
- Chromium III [soil, agricultural]: 9.0407e-9 kg; source LBL 2004; lognormal variance with pedigree 0.1087, pedigree (2,1,5,3,3)
  (same comment as for grass seed, Swiss integrated production, for sowing)
- Copper ion [soil, agricultural]: -1.2401e-8 kg; source LBL 2004
  (same comment as for grass seed, Swiss integrated production, for sowing)
- Lead II [soil, agricultural]: -2.4871e-6 kg; source LBL 2004
  (same comment as for grass seed, Swiss integrated production, for sowing)
- Mercury II [soil, agricultural]: -4.1509e-8 kg; source LBL 2004
  (same comment as for grass seed, Swiss integrated production, for sowing)
- Nickel II [soil, agricultural]: -5.212e-7 kg; source LBL 2004
  (same comment as for grass seed, Swiss integrated production, for sowing)
- Zinc II [soil, agricultural]: -6.2551e-7 kg; source LBL 2004
  (same comment as for grass seed, Swiss integrated production, for sowing)
- Nitrate [water, ground-]: 0.00471 kg; source LBL 2004; lognormal variance with pedigree 0.1608, pedigree (2,2,5,3,4)
  (same comment as for grass seed, Swiss integrated production, for sowing)
- Phosphate [water, ground-]: 2.0619e-5 kg; source LBL 2004; lognormal variance with pedigree 0.1608, pedigree (2,2,5,3,4)
  (same comment as for grass seed, Swiss integrated production, for sowing)
- Phosphate [water, surface water]: 8.1987e-5 kg; source LBL 2004; lognormal variance with pedigree 0.1608, pedigree (2,2,5,3,4)
  (same comment as for grass seed, Swiss integrated production, for sowing)
- Phosphorus [water, surface water]: 8.9776e-6 kg; source LBL 2004; lognormal variance with pedigree 0.1608, pedigree (2,2,5,3,4)
  (same comment as for grass seed, Swiss integrated production, for sowing)
- Water [water, ground-]: 0.000112712 m3; name water_to_water_ground; = water_irrigation_input*(1-fraction_IW_to_air)*fraction_IW_to_ground_water; lognormal variance with pedigree 0.1286, pedigree (4,3,5,1,4)
  Calculated value. See the parameters and their comments to understand the calculation.
  property fraction, origin: fresh water 1; name fraction_origin_fresh_water_Wgw
  property fraction, origin: salt water 0; name fraction_origin_salt_water_Wgw
  property fraction, origin: unspecified 0; name fraction_origin_unspecified_Wgw
- Water [water, surface water]: 2.8178e-5 m3; name water_to_water_surface; = water_irrigation_input*(1-fraction_IW_to_air)*fraction_IW_to_surface_water; lognormal variance with pedigree 0.1286, pedigree (4,3,5,1,4)
  Calculated value. See the parameters and their comments to understand the calculation.
  property fraction, origin: fresh water 1; name fraction_origin_fresh_water_Wsw
  property fraction, origin: salt water 0; name fraction_origin_salt_water_Wsw

## Sampling procedure
Data were compiled from statistics, fertilising recommendations, documents from extension services and expert knowledge.

## Review by Niels Jungbluth 2005-12-02
Passed.
