# treatment of refinery sludge, landfarming

Dataset: EcoSpold 2, unit process
Geography: RoW
Time period: 2000-01-01 to 2023-12-31
Technology level: current
Classification: ISIC rev.4 ecoinvent: 3821:Treatment and disposal of non-hazardous waste
Classification: EcoSpold01Categories: waste management/landfarming
Tags: Treatment; ConvertedDataset
Scenario: Business-as-Usual
System model: Allocation, cut-off by classification
Generated by: Gabor Doka (obsolete)
Published in: Doka G. 2007
Database: ecoinvent
isCopyrightProtected: true
accessRestrictedTo: 1

## General comment
Inventoried waste contains 100% refinery sludge; .
waste composition (wet, in ppm): upper heating value 4.732 MJ/kg; lower heating value 2.453 MJ/kg; H2O 888000; O 1017.1; H 13731; C 86452; S 508.54; N 1017.1; P 478.03; B n.a.; Cl n.a.; Br n.a.; F n.a.; I n.a.; Ag n.a.; As n.a.; Ba n.a.; Cd 10.171; Co 20.342; Cr n.a.; Cu 101.71; Hg 2.0342; Mn n.a.; Mo n.a.; Ni 152.56; Pb 457.69; Sb n.a.; Se n.a.; Sn n.a.; V n.a.; Zn 1017.1; Be n.a.; Sc n.a.; Sr n.a.; Ti n.a.; Tl n.a.; W n.a.; Si n.a.; Fe n.a.; Ca 7000; Al n.a.; K n.a.; Mg n.a.; Na n.a.;
Share of carbon in waste that is biogenic 0%.
[This dataset was already contained in the ecoinvent database version 2. It was not individually updated during the transfer to ecoinvent version 3. Life Cycle Impact Assessment results may still have changed, as they are affected by changes in the supply chain, i.e. in other datasets. This dataset was generated following the ecoinvent quality guidelines for version 2. It may have been subject to central changes described in the ecoinvent version 3 change report (http://www.ecoinvent.org/database/ecoinvent-version-3/reports-of-changes/), and the results of the central updates were reviewed extensively. The changes added e.g. consistent water flows and other information throughout the database. The documentation of this dataset can be found in the ecoinvent reports of version 2, which are still available via the ecoinvent website. The change report linked above covers all central changes that were made during the conversion process.]

## Included activities end
direct emissions from landfarming applications (100% to industrial soil). Burden for spreading process.

## Technology
direct spreading on industrial areas. No crop growing.

## Time period
Waste composition as given in literature reference.

## Reference product
- refinery sludge: -1 kg; By-product classification Waste; CPC 39920: Sewage sludge; HS2017 382520: Residual products of the chemical or allied industries, not elsewhere specified or included; sewage sludge
  EcoSpold01Location=CH
  production volume 9.96565e8 kg
    Estimated to be 1/10 of the production volume of the refinery sludge which is going to hazardous waste incineration.
  property carbon content, fossil 0.767857
    Tab A.6, ecoinvent v2.2 report 13_I. C content has been calculated after data in the tables, and then referred to 1 kg DM
  property heating value, net 2.45 MJ
    Value taken from the general comment of the treatment dataset.
  property price 0 EUR2005
    Waste products are assigned a price of zero as they are assumed to require further treatment.
  properties: carbon allocation 0.080625 kg, carbon content 0.767857, carbon content, non-fossil 0, dry mass 0.105 kg, water content 8.52381, water in wet mass 0.895 kg, wet mass 1 kg

## Inputs from technosphere
- liquid manure spreading, by vacuum tanker: 0.001 m3; lognormal variance with pedigree 0.15, pedigree (5,5,5,5,4)
  Approximate burden for spreading. vaccum tank spreading (in m3) for landfarming of waste (in kg)
  EcoSpold01Location=CH
  Uncertainty: & basic uncertainty of 1.05; vaccum tank spreading (in m3) for landfarming of waste (in kg)

## Emissions to nature
- Cadmium II [soil, industrial]: 1.02e-5 kg; lognormal variance with pedigree 1.312, pedigree (1,1,5,5,1)
  direct emission from landfarming process. Uncertainty from uncertainty in waste composition.
- Calcium II [soil, industrial]: 0.007 kg; lognormal variance with pedigree 0.452, pedigree (1,1,5,5,1)
  (same comment as for Cadmium II)
- Carbon [soil, industrial]: 0.0865 kg; lognormal variance with pedigree 0.172, pedigree (1,1,5,5,1)
  (same comment as for Cadmium II)
- Cobalt II [soil, industrial]: 2.03e-5 kg; lognormal variance with pedigree 1.212, pedigree (1,1,5,5,1)
  (same comment as for Cadmium II)
- Copper ion [soil, industrial]: 0.000102 kg; lognormal variance with pedigree 1.002, pedigree (1,1,5,5,1)
  (same comment as for Cadmium II)
- Lead II [soil, industrial]: 0.000458 kg; lognormal variance with pedigree 0.802, pedigree (1,1,5,5,1)
  (same comment as for Cadmium II)
- Mercury II [soil, industrial]: 2.03e-6 kg; lognormal variance with pedigree 1.522, pedigree (1,1,5,5,1)
  (same comment as for Cadmium II)
- Nickel II [soil, industrial]: 0.000153 kg; lognormal variance with pedigree 0.952, pedigree (1,1,5,5,1)
  (same comment as for Cadmium II)
- Nitrogen [soil, industrial]: 0.00102 kg; lognormal variance with pedigree 0.702, pedigree (1,1,5,5,1)
  (same comment as for Cadmium II)
- Phosphorus [soil, industrial]: 0.000478 kg; lognormal variance with pedigree 0.792, pedigree (1,1,5,5,1)
  (same comment as for Cadmium II)
- Sulfur [soil, industrial]: 0.000509 kg; lognormal variance with pedigree 0.792, pedigree (1,1,5,5,1)
  (same comment as for Cadmium II)
- Zinc II [soil, industrial]: 0.00102 kg; lognormal variance with pedigree 0.702, pedigree (1,1,5,5,1)
  (same comment as for Cadmium II)

## Sampling procedure
Waste compositions from literature data.

## Extrapolations
Spreading process approximated with vacuum tank spreader This dataset has been copied from an original dataset covering the geography CH. The uncertainty has been adjusted accordingly.

## Review by Niels Jungbluth 2003-07-31
Passed.
