# aclonifen production

Dataset: EcoSpold 2, unit process
Geography: RER
Time period: 2000-01-01 to 2023-12-31
Technology level: current
Classification: EcoSpold01Categories: agricultural means of production/pesticides
Classification: ISIC rev.4 ecoinvent: 2021:Manufacture of pesticides and other agrochemical products
Synonyms: Bandur
Tags: ConvertedDataset
Scenario: Business-as-Usual
System model: Allocation, cut-off by classification
Share of production covered: 100 %
Generated by: Jürgen Sutter
Published in: Nemecek, T. 2007
Database: ecoinvent
isCopyrightProtected: true
accessRestrictedTo: 1

## General comment
This dataset represents the production of aclonifen (1 kg of active ingredient). Raw materials are modelled with a stoichiometric calculation. Energy consumption is modelled with data from a similar process. The emissions are estimated. Infrastructure is included with a default value.
[This dataset was already contained in the ecoinvent database version 2. It was not individually updated during the transfer to ecoinvent version 3. Life Cycle Impact Assessment results may still have changed, as they are affected by changes in the supply chain, i.e. in other datasets. This dataset was generated following the ecoinvent quality guidelines for version 2. It may have been subject to central changes described in the ecoinvent version 3 change report (http://www.ecoinvent.org/database/ecoinvent-version-3/reports-of-changes/), and the results of the central updates were reviewed extensively. The changes added e.g. consistent water flows and other information throughout the database. The documentation of this dataset can be found in the ecoinvent reports of version 2, which are still available via the ecoinvent website. The change report linked above covers all central changes that were made during the conversion process.]

## Included activities start
From reception of precursors (ammonia, chlorine, hydrochloric acid, nitric acido-dichlorobenzen, phenol, and sodium hydroxide) at the factory gate.

## Included activities end
This activity ends with aclonifen at the factory gate. The dataset includes the input materials, energy uses, infrastructure and emissions. The dataset doesn't include emulsives, additives etc.

## Geography
The inventory is modelled for Europe.

## Technology
Aclonifen is a pesticide produced in four steps from o-dichlorobenzene :
C6H4Cl2 + Cl2 → C6H3Cl3 + HCl
C6H3Cl3 + HNO3 → C6H2Cl3NO2 + H2O
C6H2Cl3NO2 + NH3 → C6H4Cl2N2O2 + HCl
C6H4Cl2N2O2 + C6H5ONa → C12H9ClN2O3 + NaCl
A precursor that is used for the aclonifen production is sodium phenolate (C6H5ONa). Sodium phenolate (C6H5ONa) is produced from phenol and sodium hydroxide :
C6H6O + NaOH → C6H5ONa + H2O

## Time period
Time of publications

## Parameters
- fraction, cooling water, cooling pond system, to air: 0.032 dimensionless; name fraction_CW_CP_to_air; lognormal variance with pedigree 0.0413, pedigree (2,3,1,3,1)
  Calculated based on literature value (Scown, C.D., 2011, Water Footprint of U.S. Transportation Fuels and supplying information of the article) (Vionnet, S., Quantis Water Database - Technical Report, 2012).
- fraction, cooling water, once-through system, to air: 0.004 dimensionless; name fraction_CW_OT_to_air; lognormal variance with pedigree 0.0413, pedigree (2,3,1,3,1)
  (same comment as for fraction, cooling water, cooling pond system, to air)
- fraction, cooling water, recirculating system, to air: 0.771 dimensionless; name fraction_CW_R_to_air; lognormal variance with pedigree 0.0413, pedigree (2,3,1,3,1)
  (same comment as for fraction, cooling water, cooling pond system, to air)
- fraction, cooling water, to air: 0.3875 dimensionless; name fraction_CW_to_air; = (0.5*fraction_CW_OT_to_air)+(0.5*fraction_CW_R_to_air); lognormal variance with pedigree 0.092025, pedigree (4,4,3,2,4)
  Calculated value based on literature value (see comments of the other parametres present in this dataset) and expert opinion. In the case when no industry/literature data are available about the type of cooling or directly fraction, cooling water, to air specific for the process a default assumption is applied. It is assumed that the once-through cooling system is used in 50% of all cases and recirculating system is used in another 50% of all cases.

## Reference product
- aclonifen: 1 kg; By-product classification allocatable product; CPC 34663: Herbicides, anti-sprouting products and plant-growth regulators; HS2017 380893: Herbicides, anti-sprouting products and plant-growth regulators; other than containing goods of Subheading [...]; CAS 74070-46-5
  EcoSpold01Location=RER
  Aclonifen consists of yellow crystals, which are practically insoluble in water but soluble in methanol, hexane, and toluene.
  Aclonifen is a selective, systemic herbicide used pre-emergence to control grass and broad-leaved weeds in winter wheat, potatoes, sunflowers, and other crops.
  production volume 1.32237 kg
    This is a placeholder value that does not reflect real-world production volumes. This dataset does not currently require a real-world production volume to work in the database framework, and no actual data were collected yet. This has no negative effect on the results of the ecoinvent database. The placeholder value of this activity was scaled according to the nominal GDP of 2005 (source: United Nations, http://data.un.org/Glossary.aspx?q=GDP+%28current+US%24%29, accessed 20130726) to reflect an appropriate share of the global production volume, which is also a placeholder value.
  property carbon content, fossil 0.541353
    2-chloro-6-nitro-3-phenoxybenzenamine, C12H9ClN2O3, MW=266 g/mol (ecoinvent v2.2 report Sutter 2010)
  property price 2.44708 EUR2005
    Calculated based on inputs: The price of the product has been calculated as a sum of the values of the material and energy inputs for this product. This value is therefore a rough estimation. It may underestimate the real price since there are additional expenses when producing any product. These expences can include for example labour costs, treatment of waste materials and profit for the producer. Please consider carefully whether this level of data quality is acceptable for your application.
  properties: carbon allocation 0.541353 kg, carbon content 0.541353, carbon content, non-fossil 0, dry mass 1 kg, water content 0, water in wet mass 0 kg, wet mass 1 kg

## Inputs from technosphere
- ammonia, anhydrous, liquid: 0.086868 kg; source Unger T A 1996; lognormal variance with pedigree 0.076, pedigree (4,5,5,1,1)
  Stoichiometric calculation, assuming an efficiency of 95% per reaction step.
  EcoSpold01Location=RER
  Uncertainty: Stoechiometric calculation
  properties: dry mass 1 kg, wet mass 1 kg
- chemical factory, organics: 1.8322e-9 unit; lognormal variance with pedigree 0.448, pedigree (4,5,5,5,5)
  EcoSpold01Location=RER
  Estimation, based on a production capacity of 50,000 t per year and a plant life time of 50 years, therefore an amount of 4X10-10 units per kg of produced chemical is aded to the unit process of the respective chemical. The amount is accounted for each production step. This might be an overestimation in some multistep syntheses
  Uncertainty: Estimation
- chlorine, liquid: 0.38032 kg; source Unger T A 1996; lognormal variance with pedigree 0.076, pedigree (4,5,5,1,1)
  EcoSpold01Location=RER
  Stoichiometric calculation, assuming an efficiency of 95% per reaction step.
  Uncertainty: Stoechiometric calculation
  properties: dry mass 1 kg, wet mass 1 kg
- electricity, medium voltage: 1.28587 kWh; source Gendorf 2000; lognormal variance with pedigree 0.076, pedigree (4,5,5,1,1)
  Estimation, assuming a default value, originated from calculation of avarage consumption of electricity and heat per kg of product (3.2 MJ kg-1), and a resulting amount of electricity of 0,333 kW for every reaction step per kg reaction product, considering that the demand is made up of a mix that inlcudes 38% electricity. Additionally, reaction steps are approximated with energy consumption data, assuming that inventory flows can be estimated using process data for basic operation steps, available for specific organic chemicals.
  Further references:
  Kim S., Overcash M.: Energy in chemical manufacturing processes: gate-to-gate information for life cycle assessment. In: Journal of Chemical Technology & Biotechnology vol. 78, no. 9: 995-1005(11). 2003
  EcoSpold01Location=UCTE
  Uncertainty: Estimation
- heat, district or industrial, natural gas: 10.833 MJ; source Gendorf 2000; lognormal variance with pedigree 0.076, pedigree (4,5,5,1,1)
  Estimation, assuming a default value, originated from calculation of avarage consumption of electricity and heat per kg of product (3.2 MJ kg-1), and a resulting amount of heat of 2 MJ for every reaction step per kg reaction product, considering that the demand is made up of a mix that includes 50% natural gas. Additionally, reaction steps are approximated with energy consumption data, assuming that inventory flows can be estimated using process data for basic operation steps, available for specific organic chemicals.
  Further references:
  Kim S., Overcash M.: Energy in chemical manufacturing processes: gate-to-gate information for life cycle assessment. In: Journal of Chemical Technology & Biotechnology vol. 78, no. 9: 995-1005(11). 2003
  Uncertainty: Estimation
  properties: heating value, net 1 MJ
- heat, district or industrial, other than natural gas: 6.04655 MJ; source Gendorf 2000; lognormal variance with pedigree 0.076, pedigree (4,5,5,1,1)
  Estimation, assuming a default value, originated from calculation of avarage consumption of electricity and heat per kg of product (3.2 MJ kg-1), and a resulting amount of heat of 2 MJ for every reaction step per kg reaction product, considering that the demand is made up of a mix that inlcudes 12% steam from external energy sources. Additionally, reaction steps are approximated with energy consumption data, assuming that inventory flows can be estimated using process data for basic operation steps, available for specific organic chemicals.
  Further references:
  Kim S., Overcash M.: Energy in chemical manufacturing processes: gate-to-gate information for life cycle assessment. In: Journal of Chemical Technology & Biotechnology vol. 78, no. 9: 995-1005(11). 2003
  Uncertainty: Estimation
  properties: heating value, net 1 MJ
- hydrochloric acid, without water, in 30% solution state: 0.0075548 kg; source Unger T A 1996; lognormal variance with pedigree 0.076, pedigree (4,5,5,1,1)
  Stoichiometric calculation, assuming an efficiency of 100%.
  EcoSpold01Location=RER
  Uncertainty: Stoechiometric calculation
  properties: dry mass 1 kg, heating value, net 3.32 MJ, wet mass 1 kg
- nitric acid, without water, in 50% solution state: 0.33886 kg; source Unger T A 1996; lognormal variance with pedigree 0.076, pedigree (4,5,5,1,1)
  (same comment as for ammonia, anhydrous, liquid)
  properties: dry mass 1 kg, wet mass 1 kg
- o-dichlorobenzene: 0.79324 kg; source Unger T A 1996; lognormal variance with pedigree 0.076, pedigree (4,5,5,1,1)
  (same comment as for chlorine, liquid)
  properties: carbon content, fossil 0.493151, dry mass 1 kg, heating value, net 18.15 MJ, wet mass 1 kg
- phenol: 0.39453 kg; source Unger T A 1996; lognormal variance with pedigree 0.076, pedigree (4,5,5,1,1)
  (same comment as for ammonia, anhydrous, liquid)
  properties: carbon content, fossil 0.765957, dry mass 1 kg, heating value, net 30.93 MJ, wet mass 1 kg
- sodium hydroxide, without water, in 50% solution state: 0.58797 kg; source Unger T A 1996; lognormal variance with pedigree 0.076, pedigree (4,5,5,1,1)
  EcoSpold01Location=RER
  Stoichiometric calculation, assuming an efficiency of 100%.
  Uncertainty: Stoechiometric calculation
  properties: dry mass 1 kg, heating value, net 3.03 MJ, wet mass 1 kg

## Inputs from nature
- Water, cooling, unspecified natural origin [natural resource, in water]: 0.10993 m3; name water_cooling_UNO_input; source Gendorf 2000; lognormal variance with pedigree 0.076, pedigree (4,5,5,1,1)
  Estimation (24 kg cooling water per kg produced chemical per step).
  Uncertainty: Estimation

## Emissions to nature
- Ammonia [air, urban air close to ground]: 0.00017374 kg; lognormal variance with pedigree 0.218, pedigree (4,5,5,5,5)
  Estimation, based on the assumption that 0.2% of volatile input materials is emitted to air occurring from the purge vent, the destillation vent and fugitive emission sources.
  Uncertainty: Estimation
- Carbon dioxide, fossil [air, urban air close to ground]: 0.30592 kg; lognormal variance with pedigree 0.1786, pedigree (4,5,5,5,5)
  Estimation, based on the assumption that 0.2% of volatile input materials is emitted to air occurring from the purge vent, the destillation vent and fugitive emission sources. Remaining gases like CH4 or CO are oxidated to CO2. The carbon contained in the removed carbon compounds from wastewater treatment was accounted as CO2 emissions to air (assuming a removal efficiency of 90%).
  Uncertainty: Estimation
- Chlorine [air, urban air close to ground]: 0.00076064 kg; lognormal variance with pedigree 0.188, pedigree (4,5,5,5,5)
  (same comment as for Ammonia)
- Phenol [air, urban air close to ground]: 0.00078905 kg; lognormal variance with pedigree 0.188, pedigree (4,5,5,5,5)
  (same comment as for Ammonia)
- Water [air, unspecified]: 0.0425979 m3; name water_to_air_unspecified; = (water_cooling_UNO_input*fraction_CW_to_air); lognormal variance with pedigree 0.0807, pedigree (2,2,5,1,1)
  Calculated value based on literature values and expert opinion. See comments in the parametres' comment field.
  property fraction, origin: fresh water 0; name fraction_origin_fresh_water
  property fraction, origin: salt water 0; name fraction_origin_salt_water
  property fraction, origin: unspecified 1; name fraction_origin_unspecified
- Ammonium [water, surface water]: 0.0020848 kg; lognormal variance with pedigree 0.188, pedigree (4,5,5,5,5)
  Estimation, assuming that the remaining amount of unreacted input materials leave the production process with the wastewater, wich is further treated in an internal wastewater plant. For the nitrogen containing compounds within the wastewater a removal efficiency of 50% was assumed. The nitrogen emitted to air (N2) is neglected.
  Uncertainty: Estimation
- Chloride [water, surface water]: 0.56667 kg; lognormal variance with pedigree 0.448, pedigree (4,5,5,5,5)
  Estimation, assuming that the remaining amount of unreacted input materials leave the production process with the wastewater, wich is further treated in an internal wastewater plant.
  Uncertainty: Estimation
- Nitrate [water, surface water]: 0.016674 kg; lognormal variance with pedigree 0.188, pedigree (4,5,5,5,5)
  (same comment as for Ammonium)
- Phenol [water, surface water]: 0.0018937 kg; lognormal variance with pedigree 0.448, pedigree (4,5,5,5,5)
  (same comment as for Chloride)
- Sodium I [water, surface water]: 0.33808 kg; lognormal variance with pedigree 0.798, pedigree (4,5,5,5,5)
  (same comment as for Chloride)
- Water [water, unspecified]: 0.0673321 m3; name water_to_water_unspecified; = water_cooling_UNO_input*(1-fraction_CW_to_air); lognormal variance with pedigree 0.0807, pedigree (2,2,5,1,1)
  (same comment as for Water)
  property carbon content, fossil 0; name C_content_fossil
  property carbon content, non-fossil 0; name C_content_non_fossil
  property dry mass 0 kg; name DM
  property fraction, origin: fresh water 0; name fraction_origin_fresh_water_Ww
  property fraction, origin: salt water 0; name fraction_origin_salt_water_Ww
  property fraction, origin: unspecified 1; name fraction_origin_unspecified_Ww
  property water in wet mass 1000 kg; name WWM
  property wet mass 1000 kg; name WM

## Sampling procedure
Literature data

## Extrapolations
.

## Review by Thomas Nemecek 2010-03-11
Passed.
none

## Review by Roland Hischier 2011-11-18
Transfer of documentation done.
