# carbon black production

Dataset: EcoSpold 2, unit process
Geography: GLO
Time period: 2000-01-01 to 2023-12-31
Technology level: current
Classification: ISIC rev.4 ecoinvent: 2011:Manufacture of basic chemicals
Synonyms: Acetylene black Channel black Furnace black Lamp black Thermal black
Scenario: Business-as-Usual
System model: Allocation, cut-off by classification
Generated by: Roland Hischier
Published in: Althaus H.-J. 2007
Database: ecoinvent
isCopyrightProtected: true
accessRestrictedTo: 1

## General comment
This dataset represents the production of 1 kg of solid carbon black. Carbon black is a very fine powder which as a high surface area and is mainly composed of carbon. About 90% of the carbon black produced is used by the rubber industry as a reinforcing filler in tires, tubes, conveyor belts, cables, rubber profiles, and other mechanical rubber goods. Carbon black is also used as a pigment for the manufacture of printing inks, coloring plastics, fibers, lacquers, coatings, and paper (Voll and Kleinschmit 2010). The furnace black process is currently the most important production process for carbon black and is the one that is modeled in this dataset.
This dataset is based on several literature sources, as well as estimations based on industrial data (Gendorf 2016).
References:
Gendorf (2016) Umwelterklärung 2015, Werk Gendorf Industriepark, www.gendorf.de.
Althaus H.-J., Chudacoff M., Hischier R., Jungbluth N., Osses M. and Primas A. (2007) Life Cycle Inventories of Chemicals. ecoinvent report No. 8, v2.0. EMPA Dübendorf, Swiss Centre for Life Cycle Inventories, Dübendorf, CH.
Voll, M. and Kleinschmit, P. 2010. Carbon, 6. Carbon Black. Ullmann's Encyclopedia of Industrial Chemistry.

## Included activities start
The activity starts when the raw materials enter the process.

## Included activities end
This activity ends with the production of carbon black. The processing of the raw materials and chemicals used for production is taken into account. Estimated emissions to air and water from production are included, as well as estimated energy demand and infrastructure of the plant. Solid wastes are omitted.

## Geography
The data used has no specific geographical origin as it is based on stoechiometric calculations and estimations. It is assumed to be representative of the production processes in this geography. Some values are based on data from a large chemical factory located in Germany. These are assumed to be valid for this geography.

## Technology
The most important production process used nowadays is the oil-furnace process – other processes like e.g. thermal or acetylene carbon black processes are only of minor interests and therefore not further examined within this study here. The oil-furnace process is, according to Voll and Kleinschmit (2010) and Dannenberg and Paquin (2000) a partial combustion process of liquid aromatic residual hydrocarbons.
The principle is to atomize the feedstock into the reactor, where it is decomposed into carbon black and hydrogen due to the fact that the oxygen available is not sufficient for a combustion of all the input. The reactor temperature is in the order of 1200 to 1900 °C, achieved through the combustion of natural gas and of the unreacted feedstock. After the decomposition, a fast quenching has to be done to avoid the loss by reaction of carbon black with carbon dioxide and water. The further processing consists mainly of drying and separation from other substances like tail gases, through a filter system.
This dataset describes the production of carbon black with the oil-furnace process, using natural gas as further energy input. The inventory is based on literature information about two different types of carbon black, as well as estimations based on industrial data. The emission amount is estimated while the composition is based on literature.
References:
Voll, M. and Kleinschmit, P. 2010. Carbon, 6. Carbon Black. Ullmann's Encyclopedia of Industrial Chemistry.
Dannenberg E. M. and Paquin L. (2000) Carbon Black. In: Kirk-Othmer Encyclopedia of Chemical Technology, Fourth Edition, Electronic Release, 4 th Electronic Release Edition. Wiley InterScience, New York, Online-Version under: http://www.mrw.interscience.wiley.com/kirk.

## Time period
Date of published literature. Some values are based on data published by the Gendorf factory that were collected between 2011 and 2015. The time period has been adjusted accordingly. For more details, see the comments of the exchanges.

## Reference product
- carbon black: 1 kg; name RP; By-product classification allocatable product; CPC 34231: Chemical elements n.e.c.; inorganic acids except phosphoric, nitric and sulphonitric; inorganic oxygen compoun[…]; HS2017 280300: Carbon; carbon blacks and other forms of carbon n.e.c.; CAS 101239-80-9
  Carbon black is a very fine powder which as a high surface area and is mainly composed of carbon. About 90% of the carbon black produced is used by the rubber industry as a reinforcing filler in tires, tubes, conveyor belts, cables, rubber profiles, and other mechanical rubber goods. Carbon black is also used as a pigment for the manufacture of printing inks, coloring plastics, fibers, lacquers, coatings, and paper (Voll and Kleinschmit 2010).
  production volume 8.1e9 kg; name RP_PV
    According to the International Carbon Black Association the worldwide production is 8.1 million tonnes.
    Reference(s):
    International Carbon Black Association (ICBA). 2016. General Information. Retrieved on 15 of June 2017 from: http://www.carbon-black.org/index.php/what-is-carbon-black
  property heating value, net 25.76 MJ
    LHV is calculated based on the Carbon content of the product. More details can be found on the respective documentation.
  property price 0.86 EUR2005
    Price based on the consumption and sale of carbon black in 2015 in the world, based on [http://www.researchandmarkets.com/reports/3534879/carbon-black-a-global-market-overview#relc0].
  properties: carbon allocation 0.85 kg, carbon content 0.85, carbon content, fossil 0.85, carbon content, non-fossil 0, dry mass 1 kg, water content 0, water in wet mass 0 kg, wet mass 1 kg

## Inputs from technosphere
- chemical factory, organics: 4e-10 unit; lognormal variance with pedigree 0.31, pedigree (2,3,2,4,3)
  Calculated based on literature data published by the industry. For this activity, no information was readily available concerning infrastructure and land-use. Therefore, the infrastructure is estimated based on data from two chemical factories, the BASF site of Ludwigshafen and the chemical factory in Gendorf (which are both located in Germany), which produce a wide range of chemical substances. Based on this data, the following assumptions are made: the built area amounts to about 4.2 ha, the plant has an average output of 50'000 t/a and a lifespan of fifty years. The estimated infrastructure amount is therefore 4.00 E-10 units per kg of produced chemical.
  References:
  Althaus H.-J., Chudacoff M., Hischier R., Jungbluth N., Osses M. and Primas A. (2007) Life Cycle Inventories of Chemicals. ecoinvent report No. 8, v2.0. EMPA Dübendorf, Swiss Centre for Life Cycle Inventories, Dübendorf, CH.
  Gendorf (2000) Umwelterklärung 2000, Werk Gendorf. Werk Gendorf, Burgkirchen.
- heat, district or industrial, natural gas: 1.5 MJ; lognormal variance with pedigree 0.1786, pedigree (4,5,5,5,5)
  Estimated value based on expert judgement.
  properties: heating value, net 1 MJ
- petroleum: 0.843499, 0.0377879, 0.223327, 0.0938811, 0.000876199, 0.384489, 0.00382879, 0.0087089, 0.00360232 kg (9 suppliers, which the file names only by identifier); sum of these 1.6 kg; lognormal variance with pedigree 0.1786, pedigree (4,5,5,5,5)
  Estimated value based on expert judgement.
  properties: carbon content, fossil 0.85, dry mass 1 kg, heating value, net 43.4 MJ, wet mass 1 kg
  note on carbon content, fossil: C-content of crude oil is 83-87% (ecoinven report 6_IV, Tab 3.2). An average C-content of 0.85 kg C/kg crude oil was considered
  note on heating value, net: Literature value, Source: Christoph Meili;Niels Jungbluth;Maresa Bussa (2021) Life cycle inventories of crude oil and natural gas extraction. ESU-services Ltd. commissioned by BAFU & VSG, Schaffhausen, Switzerland, http://esu-services.ch/data/public-lci-reports/
- tap water: 0.026 kg; lognormal variance with pedigree 0.0106, pedigree (2,3,2,4,3)
  Calculated based on literature data published by the industry. This value is a 5-year average of data (2011 - 2015) published by the Gendorf factory (Gendorf, 2016, Umwelterklärung, www.gendorf.de), (Gendorf, 2015, Umwelterklärung, www.gendorf.de), (Gendorf, 2014, Umwelterklärung, www.gendorf.de). The amount of tap water per kg of chemical substance produced is calculated using literature data published by the Gendorf factory based in Germany, which produces a wide range of chemical substances. The factory produced 1657400 tonnes of chemical substances in the year 2015 (Gendorf, 2016, Umwelterklärung, www.gendorf.de) and 740000 tonnes of intermediate products. The amount of tap water consumed in the year 2015 was 55100 tonnes (Gendorf, 2016, Umwelterklärung, www.gendorf.de). The resulting amount of tap water is 0.023 kg/kg of chemical product produced. The 5-year average (2011 - 2015, weighted by production volume) is 0.026 kg/kg.
  properties: carbon content, fossil 0.00178991, dry mass 0.000337476 kg, water content 2962.17, wet mass 1 kg
  note on carbon content, fossil: Bicarbonate content is 2.93 mol/m3. CO2 content is 0.1 mol/m3 (ecoinvent v2.2 report 8, Tab 93.1).
- wastewater, average: -1.09589e-8, -1.82361e-6, -4.36062e-7, -6.49273e-9 m3 (4 suppliers, which the file names only by identifier); sum of these -2.27712e-6 m3; lognormal variance with pedigree 0.0452, pedigree (2,4,1,5,4)
  Calculated based on literature data published by the GENDORF Chemical Park. The factory produced an average of 2462760 tonnes of chemical substances (including intermediates) per year in the years 2015-2019. The average ouput of wastewater going to an external wastewater treatment plant in the years 2015-2019 was 5608 m3 per year. This equals 0.000002277 m3/kg chemical produced.
  References:
  Chemiepark GENDORF, Umwelterklärung 2016, https://www.gendorf.de/Nachbarn/Umweltschutz/Industrie%20und%20Nachhaltigkeit
  Chemiepark GENDORF, Umwelterklärung 2017, https://www.gendorf.de/Nachbarn/Umweltschutz/Industrie%20und%20Nachhaltigkeit
  Chemiepark GENDORF, Umwelterklärung 2020, https://www.gendorf.de/Nachbarn/Umweltschutz/Industrie%20und%20Nachhaltigkeit
  production volume; = RP_PV*BP_wastewater_average/ABS(RP)
    Calculated from the production volume of carbon black in proportion to the respective output amounts.
  properties: carbon content, non-fossil 0.194039, dry mass 0.346837 kg, water content 2882.2, wet mass 1000 kg
  note on carbon content, non-fossil: 0.0673 kg TOC/m3 (Tab A.17, ecoinvent v2.2 report 13_I). TOC was considered as Total Carbon.

## Inputs from nature
- Water, cooling, unspecified natural origin [natural resource, in water]: 0.014707 m3; lognormal variance with pedigree 0.0454, pedigree (2,4,2,5,4)
  Calculated based on literature data published by the GENDORF Chemical Park. The factory produced an average of 2462760 tonnes of chemical substances (including intermediates) per year in the years 2015-2019. The average amount of cooling water released in the years 2015-2019 was 34408800 t per year. It was assumed that 5% of the cooling water was emitted to air during its use, therefore, to calculate the input of cooling water, the output value reported by GENDORF was scaled up by the factor 1/0.95. This equals 0.014707 m3/kg chemical produced.
  References:
  Chemiepark GENDORF, Umwelterklärung 2016, https://www.gendorf.de/Nachbarn/Umweltschutz/Industrie%20und%20Nachhaltigkeit
  Chemiepark GENDORF, Umwelterklärung 2017, https://www.gendorf.de/Nachbarn/Umweltschutz/Industrie%20und%20Nachhaltigkeit
  Chemiepark GENDORF, Umwelterklärung 2020, https://www.gendorf.de/Nachbarn/Umweltschutz/Industrie%20und%20Nachhaltigkeit
- Water, river [natural resource, in water]: 0.000965426 m3; lognormal variance with pedigree 0.0454, pedigree (2,4,2,5,4)
  Calculated based on literature data published by the GENDORF Chemical Park. The factory produced an average of 2462760 tonnes of chemical substances (including intermediates) per year in the years 2015-2019. The average consumption of river water in the years 2015-2019 was 22000820 t per year. However, since the cooling water is modelled as an input, the amount of river water was adjusted to avoid double counting. 55% of the input amount of cooling water was deducted from the amount of river water, as that is the share of river water versus well water. This equals 0.00096543 m3/kg chemical produced.
  References:
  Chemiepark GENDORF, Umwelterklärung 2016, https://www.gendorf.de/Nachbarn/Umweltschutz/Industrie%20und%20Nachhaltigkeit
  Chemiepark GENDORF, Umwelterklärung 2017, https://www.gendorf.de/Nachbarn/Umweltschutz/Industrie%20und%20Nachhaltigkeit
  Chemiepark GENDORF, Umwelterklärung 2020, https://www.gendorf.de/Nachbarn/Umweltschutz/Industrie%20und%20Nachhaltigkeit
- Water, well, in ground [natural resource, in water]: 0.000816522 m3; lognormal variance with pedigree 0.0454, pedigree (2,4,2,5,4)
  Calculated based on literature data published by the GENDORF Chemical Park. The factory produced an average of 2462760 tonnes of chemical substances (including intermediates) per year in the years 2015-2019. The average consumption of well water in the years 2015-2019 was 18607480 t per year. However, since the cooling water is modelled as an input, the amount of well water was adjusted to avoid double counting. 45% of the input amount of cooling water was deducted from the amount of well water, as that is the share of well water versus river water. This equals 0.00081652 m3/kg chemical produced.
  References:
  Chemiepark GENDORF, Umwelterklärung 2016, https://www.gendorf.de/Nachbarn/Umweltschutz/Industrie%20und%20Nachhaltigkeit
  Chemiepark GENDORF, Umwelterklärung 2017, https://www.gendorf.de/Nachbarn/Umweltschutz/Industrie%20und%20Nachhaltigkeit
  Chemiepark GENDORF, Umwelterklärung 2020, https://www.gendorf.de/Nachbarn/Umweltschutz/Industrie%20und%20Nachhaltigkeit

## Emissions to nature
- Carbon dioxide, fossil [air, urban air close to ground]: 1.32 kg; = (0.85*petroleum_amount-RP)*44/12; lognormal variance with pedigree 0.0369, pedigree (4,3,2,3,3)
  Calculated value based on mass balance, assuming a C-content of 85% in the petroleum input.
  Uncertainty: c
- Carbon monoxide, fossil [air, urban air close to ground]: 0.00083 kg; lognormal variance with pedigree 0.6669, pedigree (4,3,2,3,3)
  Calculated value based on the legal limit for carbon monoxide in the waste air stream. According to Zevenhoven-Onderwater & Matthijsen (1992), the limitation for CO in the waste air stream is about 100 mg/m3, resulting in a emission of 0.83 g/kg carbon black.
  Reference:
  Zevenhoven-Oderwater & Matthijsen (1992) Zevenhoven-Oderwater M. F. J. and Matthijsen A. J. C. M. (1992) Produktie van roet. RIVM - National Institute for Public Health and the Environment, Bilthoven (the Netherlands).
  Uncertainty: w
- Nitrogen oxides [air, urban air close to ground]: 0.00105 kg; lognormal variance with pedigree 0.1269, pedigree (4,3,2,3,3)
  Sum of values reported in Frischknecht et al. (1996) – representing the emissions from the process as well as those from the internal energy plant.
  Reference:
  Frischknecht R., Bollens U., Bosshart S., Ciot M., Ciseri L., Doka G., Dones R., Gantner U., Hischier R. and Martin A. (1996) Ökoinventare von Energiesystemen. 3rd Edition. ETH/PSI, Zürich/Villigen.
  Uncertainty: b
- PAH, polycyclic aromatic hydrocarbons [air, urban air close to ground]: 1e-6 kg; lognormal variance with pedigree 0.1269, pedigree (4,3,2,3,3)
  Based on information in Frischknecht et al. (1996).
  Reference:
  Frischknecht R., Bollens U., Bosshart S., Ciot M., Ciseri L., Doka G., Dones R., Gantner U., Hischier R. and Martin A. (1996) Ökoinventare von Energiesystemen. 3rd Edition. ETH/PSI, Zürich/Villigen.
  Uncertainty: b
- Particulate Matter, < 2.5 um [air, urban air close to ground]: 0.001 kg; lognormal variance with pedigree 0.4769, pedigree (4,3,2,3,3)
  (same comment as for PAH, polycyclic aromatic hydrocarbons)
- Sulfur dioxide [air, urban air close to ground]: 0.0033 kg; lognormal variance with pedigree 0.0369, pedigree (4,3,2,3,3)
  (same comment as for Nitrogen oxides)
- Water [air, unspecified]: 0.00147008 m3; lognormal variance with pedigree 0.0848, pedigree (2,4,2,5,4)
  Calculated based on literature data published by the GENDORF Chemical Park. The factory produced an average of 2462760 tonnes of chemical substances (including intermediates) per year in the years 2015-2019. To determine the emissions of water to air, the difference of all water inputs (from river, well, tap water and cooling) and outputs (wastewater, emissions to water) was calculated. The average ouput of water to air in the years 2015-2019 was 3620444 m3 per year. This equals 0.00147 m3/kg chemical produced. For more information on the other water exchanges please consult the respective exchange comment.
  References:
  Chemiepark GENDORF, Umwelterklärung 2016, https://www.gendorf.de/Nachbarn/Umweltschutz/Industrie%20und%20Nachhaltigkeit
  Chemiepark GENDORF, Umwelterklärung 2017, https://www.gendorf.de/Nachbarn/Umweltschutz/Industrie%20und%20Nachhaltigkeit
  Chemiepark GENDORF, Umwelterklärung 2020, https://www.gendorf.de/Nachbarn/Umweltschutz/Industrie%20und%20Nachhaltigkeit
- Water [water, unspecified]: 0.0150391 m3; lognormal variance with pedigree 0.0848, pedigree (2,4,2,5,4)
  Calculated based on literature data published by the GENDORF Chemical Park. The factory produced an average of 2462760 tonnes of chemical substances (including intermediates) per year in the years 2015-2019. The amount of water released back to the environment consists of the sum of the amount of process water treated in the internal WWTP that is then released back to the environment and the amount of cooling water released back to the environment. The average ouput of the internal WWTP in the years 2015-2019 was 2628800 m3 and that of cooling water released back to the environment was 34408800 m3. This gives a yearly average of 37037600 m3 emissions of water to water. This equals 0.01504 m3/kg chemical produced.
  References:
  Chemiepark GENDORF, Umwelterklärung 2016, https://www.gendorf.de/Nachbarn/Umweltschutz/Industrie%20und%20Nachhaltigkeit
  Chemiepark GENDORF, Umwelterklärung 2017, https://www.gendorf.de/Nachbarn/Umweltschutz/Industrie%20und%20Nachhaltigkeit
  Chemiepark GENDORF, Umwelterklärung 2020, https://www.gendorf.de/Nachbarn/Umweltschutz/Industrie%20und%20Nachhaltigkeit

## Sampling procedure
Data based on literature and expert judgment. Some values are calculated based on data from a large chemical factory located in Germany. For more details, see the comments of the exchanges.

## Review by Gregor Wernet 2017-08-04
This dataset was additionally reviewed in a separate review process by Eric Johnson of Atlantic Consulting as well as Emilia Moreno Ruiz and Gregor Wernet of ecoinvent.
