# heat production, natural gas, at boiler condensing modulating >100kW

Dataset: EcoSpold 2, unit process
Geography: CA-QC
Time period: 2000-01-01 to 2023-12-31
Technology level: current
Classification: EcoSpold01Categories: natural gas/heating systems
Classification: ISIC rev.4 ecoinvent: 3530:Steam and air conditioning supply
Tags: Recontextualization
Scenario: Business-as-Usual
System model: Allocation, cut-off by classification
Generated by: Pablo Tirado
Published in: Faist Emmenegger, M. 2007
Database: ecoinvent
isCopyrightProtected: true
accessRestrictedTo: 1

## General comment
This dataset represents the production of heat from natural gas at boiler condensing modulating >100kW in Quebec.This is an adaptation for Quebec from the corresponding global dataset. Only time period, annual production volume and heating value have been modified. Uncertainties have been adjusted accordingly.
NOx and CO emissions derived from measurements under controlled conditions; no adjustment to real operation made due to lack of information. Other emission data from different references.

## Included activities start
Activity starts with the combustion of the fuel.

## Included activities end
This activity ends with 1MJ of heat produced by the furnace.
This dataset includes:

-fuel inputs;
-emissions due to combustion of fuel;
-inputs needed for combustion (electricity);
-by-products of combustion
-infrastructures

## Geography
Quebec dataset based on Global dataset, which was itself based on european and swiss conditions. Uncertainty has been modified accordingly

## Technology
Models on european market. Uncertainty has been modified accordingly

## Time period
Based on GLO dataset from 2000. It is considered valid until 2015. Uncertainty has been modified accordingly.

## Parameters
- annual fuel consumption in m3: 6.275e8 m3; name annualFuelConsumptionm3; = 2.51E+09/4; lognormal variance with pedigree 0.0012, pedigree (2,1,1,1,1)
  Data on fuel consumption of industrial sectors provided by the MDDEP (Quebec Ministry of Sustainable Development, Environment, Wildlife and Parks).
  Average of the period 2005-2009
  Heat provided by cogen units contributing to the market has been subtracted in older versions. However, the PV is of the cogen units is now 0 and can thus be ignored.
  The total has been split equally for the four natural gas technologies.
  Uncertainty: Variance from default value table.
  DQP based on the quality of the data (primary data from Quebec gouvernment)

## Reference product
- heat, district or industrial, natural gas: 1 MJ; By-product classification allocatable product; CPC 17300: Steam and hot water
  EcoSpold01Location=RER
  production volume 2.30418e10 MJ; = annualFuelConsumptionm3/ natGasIn
    Literature/­calculated value. Annual fuel consumption (from Quebec statistics) divided by the amount of fuel needed to produce 1MJ (this amounts includes the efficiency of the process)
  property Corresponding fuel use 0.980392 MJ
    This property represents the inverse of the efficiency of the boiler. It is calculated by dividing the lower heating value of the fuel input by the heat/electricity output.
  property price 0.0106 EUR2005
    Average European district heat price from Ecoheatcool and Euroheat 2005-2006, Ecoheat Work package 1: The European heat market. Final report. 10.6 EUR/GJ i s the price of district heat. http://www.solarthermalworld.org/files/Ecoheatcool%20WP1%20Web.pdf?download
  properties: carbon allocation 0 kg, carbon content 0, heating value, net 1 MJ

## Inputs from technosphere
- electricity, low voltage: 0.00108824 kWh; source Faist Emmenegger, M. 2007; lognormal variance with pedigree 0.17, pedigree (1,1,5,5,3)
  range of electricity for pumps etc., different literature
  EcoSpold01Location=UCTE
  Uncertainty: Completeness, temporal, geographical and technological indicators adapted considering differences with original dataset.
- industrial furnace, natural gas: 2.7451e-9 unit; source Faist Emmenegger, M. 2007; lognormal variance with pedigree 0.09, pedigree (1,1,5,5,3)
  EcoSpold01Location=RER
  uncertainty of life time and extrapolation to range of capacity
  Uncertainty: Completeness, temporal, geographical and technological indicators adapted considering differences with original dataset.
- natural gas, high pressure: 0.0272331 m3; name natGasIn; = 1/1.02/NG_LHV; source Faist Emmenegger, M. 2007; lognormal variance with pedigree 0.05, pedigree (1,1,5,5,3)
  Adjusted with a LHV of 36 MJ/m3
  EcoSpold01Location=RER
  Uncertainty: Completeness, temporal, geographical and technological indicators adapted considering differences with original dataset.
  property heating value, net 36 MJ; name NG_LHV
  properties: carbon content, fossil 0.602381, dry mass 0.84 kg, heating value, gross 40 MJ, wet mass 0.84 kg
  note on carbon content, fossil: An average C content of 0.506 kg C/ m3 has been assumed (this average has been calculated using data in Tab 3.5, ecoinvent v2.2 report 6_V
  note on heating value, net: Literature value, Source: Christoph Meili;Niels Jungbluth;Maresa Bussa (2021) Life cycle inventories of crude oil and natural gas extraction. ESU-services Ltd. commissioned by BAFU & VSG, Schaffhausen, Switzerland, http://esu-services.ch/data/public-lci-reports/

## Emissions to nature
All rows: source Faist Emmenegger, M. 2007
- Acetaldehyde [air, urban air close to ground]: 9.80392e-10 kg; lognormal variance with pedigree 1.13, pedigree (1,1,5,5,3)
  rough estimate, high uncertainty
  Uncertainty: Completeness, temporal, geographical and technological indicators adapted considering differences with original dataset.
- Acetic acid [air, urban air close to ground]: 1.47059e-7 kg; lognormal variance with pedigree 1.13, pedigree (1,1,5,5,3)
  (same comment as for Acetaldehyde)
- Benzene [air, urban air close to ground]: 3.92157e-7 kg; lognormal variance with pedigree 1.13, pedigree (1,1,5,5,3)
  (same comment as for Acetaldehyde)
- Benzo(a)pyrene [air, urban air close to ground]: 9.80392e-12 kg; lognormal variance with pedigree 1.13, pedigree (1,1,5,5,3)
  (same comment as for Acetaldehyde)
- Butane [air, urban air close to ground]: 6.86275e-7 kg; lognormal variance with pedigree 1.13, pedigree (1,1,5,5,3)
  (same comment as for Acetaldehyde)
- Carbon dioxide, fossil [air, urban air close to ground]: 0.054902 kg; lognormal variance with pedigree 0.05, pedigree (1,1,5,5,3)
  composition of natural gas
  Uncertainty: Completeness, temporal, geographical and technological indicators adapted considering differences with original dataset.
- Carbon monoxide, fossil [air, urban air close to ground]: 2.84314e-6 kg; lognormal variance with pedigree 0.81, pedigree (1,1,5,5,3)
  calculated based on (SVGW 2002)
  Uncertainty: Completeness, temporal, geographical and technological indicators adapted considering differences with original dataset.
- Dinitrogen monoxide [air, urban air close to ground]: 4.90196e-7 kg; lognormal variance with pedigree 1.13, pedigree (1,1,5,5,3)
  (same comment as for Acetaldehyde)
- Dioxins, measured as 2,3,7,8-tetrachlorodibenzo-p-dioxin [air, urban air close to ground]: 2.94118e-17 kg; lognormal variance with pedigree 1.13, pedigree (1,1,5,5,3)
  (same comment as for Acetaldehyde)
- Formaldehyde [air, urban air close to ground]: 9.80392e-8 kg; lognormal variance with pedigree 1.13, pedigree (1,1,5,5,3)
  (same comment as for Acetaldehyde)
- Mercury II [air, urban air close to ground]: 2.94118e-11 kg; lognormal variance with pedigree 0.7, pedigree (1,1,5,5,3)
  trace element in natural gas
  Uncertainty: Completeness, temporal, geographical and technological indicators adapted considering differences with original dataset.
- Methane, fossil [air, urban air close to ground]: 1.96078e-6 kg; lognormal variance with pedigree 1.13, pedigree (1,1,5,5,3)
  (same comment as for Acetaldehyde)
- Nitrogen oxides [air, urban air close to ground]: 1.26471e-5 kg; lognormal variance with pedigree 0.24, pedigree (1,1,5,5,3)
  (same comment as for Carbon monoxide, fossil)
- PAH, polycyclic aromatic hydrocarbons [air, urban air close to ground]: 9.80392e-9 kg; lognormal variance with pedigree 1.13, pedigree (1,1,5,5,3)
  (same comment as for Acetaldehyde)
- Particulate Matter, < 2.5 um [air, urban air close to ground]: 9.80392e-8 kg; lognormal variance with pedigree 0.17, pedigree (1,1,5,5,3)
  literature
  Uncertainty: Completeness, temporal, geographical and technological indicators adapted considering differences with original dataset.
- Pentane [air, urban air close to ground]: 1.17647e-6 kg; lognormal variance with pedigree 1.13, pedigree (1,1,5,5,3)
  (same comment as for Acetaldehyde)
- Propane [air, urban air close to ground]: 1.96078e-7 kg; lognormal variance with pedigree 1.13, pedigree (1,1,5,5,3)
  (same comment as for Acetaldehyde)
- Propionic acid [air, urban air close to ground]: 1.96078e-8 kg; lognormal variance with pedigree 1.13, pedigree (1,1,5,5,3)
  (same comment as for Acetaldehyde)
- Sulfur dioxide [air, urban air close to ground]: 4.90196e-7 kg; lognormal variance with pedigree 0.05, pedigree (1,1,5,5,3)
  composition of natural gas
- Toluene [air, urban air close to ground]: 1.96078e-7 kg; lognormal variance with pedigree 1.13, pedigree (1,1,5,5,3)
  (same comment as for Acetaldehyde)
- Nitrate [water, surface water]: 1.27451e-7 kg; lognormal variance with pedigree 0.35, pedigree (1,1,5,5,3)
  literature, range of values
  Uncertainty: Completeness, temporal, geographical and technological indicators adapted considering differences with original dataset.
- Nitrite [water, surface water]: 2.94118e-9 kg; lognormal variance with pedigree 0.35, pedigree (1,1,5,5,3)
  (same comment as for Nitrate)
- Sulfate [water, surface water]: 4.90196e-8 kg; lognormal variance with pedigree 0.35, pedigree (1,1,5,5,3)
  (same comment as for Nitrate)
- Sulfite [water, surface water]: 4.90196e-8 kg; lognormal variance with pedigree 0.35, pedigree (1,1,5,5,3)
  (same comment as for Nitrate)

## Sampling procedure
Literature, manufacturers; CO and NOx emissions from (SVGW 2002), sample size (number of selected devices for which emission values are given in SVGW list): CO 107 , NOx 107 .

## Extrapolations
see Geography This dataset has been extrapolated from the corresponding global dataset, which was itself extrapolated from a dataset covering the geography RER. The uncertainty has been adjusted accordingly.

## Review by Christian Bauer 2013-10-11
passed
