# treatment of waste glass, unsanitary landfill, very wet infiltration class (1000mm)

Dataset: EcoSpold 2, unit process
Geography: GLO
Time period: 2006-01-01 to 2023-12-31
Technology level: current
Classification: ISIC rev.4 ecoinvent: 3821:Treatment and disposal of non-hazardous waste
Scenario: Business-as-Usual
System model: Allocation, cut-off by classification
Share of production covered: 1 %
Generated by: Nikolia Stoikou
Database: ecoinvent
isCopyrightProtected: true
accessRestrictedTo: 1

## General comment
This dataset represents the activity of waste disposal of 'waste glass' in an unsanitary landfill. Recommended use of this dataset: for waste material going to unsanitary landfill in a very wet water infiltration class location, as part of unsorted, unmanaged, unscavenged municipal waste mixture. Inventoried waste consists of fraction: 100% glass. Waste composition (wet, in ppmw): gross heating value 0.1423 MJ/kg; net heating value 0.04602 MJ/kg; H2O 20000; O 483070; H na; C na; S na; N na; P na; B na; Cl 195.89; Br na; F na; I na; Ag na; As na; Ba na; Cd na; Co na; Cr 303.63; Cu 7.8356; Hg na; Mn na; Mo na; Ni na; Pb 38.688; Sb na; Se na; Sn na; V na; Zn 3.9178; Be na; Sc na; Sr na; Ti na; Tl na; W na; Si 359090; Fe na; Ca 72818; Al na; K na; Mg na; Na 64472. Share of carbon in initial waste that is biogenic 60.4%. Share of metals in waste not oxidised and bulk-recyclable (exclude very small or thin parts) Iron: 0%; Alu: 0%; Copper: 0%. Overall degradability of waste during 100 years: 1%. 0.356 kg waste mass remains in the landfill even after the long term period.

## Included activities start
The activity starts with the waste being available at the gate of the treatment facility. Collection and transportation of the waste to the treatment plant is not included.

## Included activities end
The activity ends with the waste being treated and waste-specific emissions from the landfill are released to air via landfill gas, and to water via leachate.

## Geography
This dataset represents a landfill of 'infiltration class 5 very wet'. Landfill site with mean annual temperature (MAT) of 8 degC, mean annual precipitation (MAP) of 1900 mm/year, and net infiltration of 1000 mm/year. Temperature at site can result in permafrost conditions, which slows down water flow by a factor of (alpha t) 0.999. Total climate adjustments with alpha pt of 0.999. The leachate percolating through the landfill has an average residence time of 3.75 years.
Reference for climatic parameters: Doka, G., 2018, Inventory parameters for regionalised waste disposal mixes

## Technology
This is an inventory for an unsanitary, sub-controlled landfill for municipal solid waste. Ultimate average landfill height is 15 meters. Operation phase duration is 25 years. The total, waste-specific raw landfill gas mass produced in the landfill is 0.004685 kg. The total CH4 mass in the raw landfill gas is 0 kg. Percentage of landfill gas directly emitted is 100w%. Leachate of the landfill is not treated, but emitted untreated. Based on average waste composition and chosen climate data the end of carbonate phase is estimated to be reached 1733 years after waste deposition.

## Reference product
- waste glass: -1 kg; By-product classification Waste; CPC 37111: Glass in the mass, in balls (except microspheres), rods or tubes, unworked; waste and scrap of glass; HS2017 700100: Glass; cullet and other waste and scrap of glass, glass in the mass
  main reference product of this activity
  production volume 7.25e9 kg
    Estimated based on the total amount of this waste being treated in the database. The value is then adjusted to reflect the current treatment in the given geography
  property price 0 EUR2005
    Waste products are assigned a price of zero as they are assumed to require further treatment.
  properties: calcium content 0.0743039, carbon allocation 0 kg, carbon content 0, carbon content, fossil 0, carbon content, non-fossil 0, chlorine content 0.000199888, chromium content 0.000309826, copper content 7.99551e-6, dry mass 0.98 kg, heating value, gross 0.142256 MJ, heating value, net 0.046024 MJ, lead content 3.94778e-5, oxygen content 0.492929, silicon content 0.366418, sodium content 0.0657874, water content 0.0204082, water in wet mass 0.02 kg, wet mass 1 kg, zinc content 3.99776e-6

## Inputs from technosphere
- diesel, burned in building machine: 0.046738 MJ; lognormal variance with pedigree 0.32902, pedigree (1,1,4,1,1)
  waste distribution and compaction in unsanitary landfill;
  properties: heating value, net 1 MJ
- excavation, skid-steer loader: 0.00031708 m3; lognormal variance with pedigree 0.32902, pedigree (1,1,4,1,1)
  daily cover of waste in unsanitary landfill;

## Inputs from nature
- Waste mass, total, placed in landfill [inventory indicator, waste]: 1 kg; lognormal variance with pedigree 0.008, pedigree (1,1,4,1,1)
  waste mass placed in unsanitary landfill (for ecoscarcity LCIA only);
- Occupation, dump site [natural resource, land]: 0.0023333 m2*year; lognormal variance with pedigree 0.32902, pedigree (1,1,4,1,1)
  for operation phase of unsanitary landfill area;
- Transformation, from pasture, man made [natural resource, land]: 6.6667e-5 m2; lognormal variance with pedigree 0.32902, pedigree (1,1,4,1,1)
  for initial conversion of unsanitary landfill area;
- Transformation, to dump site [natural resource, land]: 6.6667e-5 m2; lognormal variance with pedigree 0.32902, pedigree (1,1,4,1,1)
  conversion to unsanitary landfill area;

## Emissions to nature
- Calcium II [air, non-urban air or from high stacks]: 2.3676e-8 kg; lognormal variance with pedigree 1.8625, pedigree (1,1,4,1,1)
  landfill gas emission from unsanitary landfill (after 0% capture and utilization);
- Chromium III [air, non-urban air or from high stacks]: 8.6421e-12 kg; lognormal variance with pedigree 1.9298, pedigree (1,1,4,1,1)
  landfill gas emission from unsanitary landfill (after 0% capture and utilization);
- Copper ion [air, non-urban air or from high stacks]: 1.095e-13 kg; lognormal variance with pedigree 1.9298, pedigree (1,1,4,1,1)
  landfill gas emission from unsanitary landfill (after 0% capture and utilization);
- Hydrochloric acid [air, non-urban air or from high stacks]: 7.102e-8 kg; lognormal variance with pedigree 1.6697, pedigree (1,1,4,1,1)
  landfill gas emission from unsanitary landfill (after 0% capture and utilization);
- Lead II [air, non-urban air or from high stacks]: 7.5895e-13 kg; lognormal variance with pedigree 1.9298, pedigree (1,1,4,1,1)
  landfill gas emission from unsanitary landfill (after 0% capture and utilization);
- Silicon [air, non-urban air or from high stacks]: 4.4822e-8 kg; lognormal variance with pedigree 1.8622, pedigree (1,1,4,1,1)
  landfill gas emission from unsanitary landfill (after 0% capture and utilization);
- Sodium I [air, non-urban air or from high stacks]: 6.6621e-7 kg; lognormal variance with pedigree 1.4258, pedigree (1,1,4,1,1)
  landfill gas emission from unsanitary landfill (after 0% capture and utilization);
- Zinc II [air, non-urban air or from high stacks]: 4.1195e-13 kg; lognormal variance with pedigree 1.9298, pedigree (1,1,4,1,1)
  landfill gas emission from unsanitary landfill (after 0% capture and utilization);
- Non-hazardous waste disposed [inventory indicator, waste]: 1 kg; lognormal variance with pedigree 0.008, pedigree (1,1,4,1,1)
  EN15804 waste mass in unsanitary landfill;
- Heat, waste [soil, industrial]: 0.0014209 MJ; lognormal variance with pedigree 0.17808, pedigree (1,1,4,1,1)
  from decomposed waste material in unsanitary landfill;
- Calcium II [water, ground-]: 9.4703e-5 kg; lognormal variance with pedigree 0.77743, pedigree (1,1,4,1,1)
  uncontrolled emissions in unsanitary landfill in moist climate;
- Calcium II [water, ground-, long-term]: 0.072723 kg; lognormal variance with pedigree 0.15856, pedigree (1,1,4,1,1)
  emissions to groundwater in unsanitary landfill;
- Chloride [water, ground-]: 4.9271e-6 kg; lognormal variance with pedigree 1.1392, pedigree (1,1,4,1,1)
  uncontrolled emissions in unsanitary landfill in moist climate;
- Chloride [water, ground-, long-term]: 0.00019089 kg; lognormal variance with pedigree 0.88067, pedigree (1,1,4,1,1)
  emissions to groundwater in unsanitary landfill;
- Chromium VI [water, ground-]: 3.4568e-8 kg; lognormal variance with pedigree 1.7608, pedigree (1,1,4,1,1)
  uncontrolled emissions in unsanitary landfill in moist climate;
- Chromium VI [water, ground-, long-term]: 5.8923e-7 kg; lognormal variance with pedigree 1.9298, pedigree (1,1,4,1,1)
  emissions to groundwater in unsanitary landfill;
- Copper ion [water, ground-]: 3.8324e-10 kg; lognormal variance with pedigree 1.9298, pedigree (1,1,4,1,1)
  uncontrolled emissions in unsanitary landfill in moist climate;
- Copper ion [water, ground-, long-term]: 7.8352e-6 kg; lognormal variance with pedigree 1.3081, pedigree (1,1,4,1,1)
  emissions to groundwater in unsanitary landfill;
- Heat, waste [water, ground-, long-term]: 0.14084 MJ; lognormal variance with pedigree 0.058605, pedigree (1,1,4,1,1)
  from decomposed waste material in unsanitary landfill;
- Lead II [water, ground-]: 2.2769e-9 kg; lognormal variance with pedigree 1.9298, pedigree (1,1,4,1,1)
  uncontrolled emissions in unsanitary landfill in moist climate;
- Lead II [water, ground-, long-term]: 3.8686e-5 kg; lognormal variance with pedigree 1.0964, pedigree (1,1,4,1,1)
  emissions to groundwater in unsanitary landfill;
- Silicon [water, ground-]: 0.00017929 kg; lognormal variance with pedigree 0.78034, pedigree (1,1,4,1,1)
  uncontrolled emissions in unsanitary landfill in moist climate;
- Silicon [water, ground-, long-term]: 0.0032618 kg; lognormal variance with pedigree 1.9298, pedigree (1,1,4,1,1)
  emissions to groundwater in unsanitary landfill;
- Sodium I [water, ground-]: 0.0026649 kg; lognormal variance with pedigree 0.37577, pedigree (1,1,4,1,1)
  uncontrolled emissions in unsanitary landfill in moist climate;
- Sodium I [water, ground-, long-term]: 0.061806 kg; lognormal variance with pedigree 0.17046, pedigree (1,1,4,1,1)
  emissions to groundwater in unsanitary landfill;
- Zinc II [water, ground-]: 1.8538e-9 kg; lognormal variance with pedigree 1.9298, pedigree (1,1,4,1,1)
  uncontrolled emissions in unsanitary landfill in moist climate;
- Zinc II [water, ground-, long-term]: 3.9159e-6 kg; lognormal variance with pedigree 1.3993, pedigree (1,1,4,1,1)
  emissions to groundwater in unsanitary landfill;
