# electricity production, hydro, aluminium industry

Dataset: EcoSpold 2, unit process
Geography: IAI Area, South America
Time period: 2015-01-01 to 2023-12-31
Technology level: current
Classification: ISIC rev.4 ecoinvent: 3510:Electric power generation, transmission and distribution
Classification: EcoSpold01Categories: hard coal/power plants
Tags: re-labelling activity; electricity, primary aluminium industry
Scenario: Business-as-Usual
System model: Allocation, cut-off by classification
Generated by: Pascal Lesage
Database: ecoinvent
isCopyrightProtected: true
accessRestrictedTo: 1

## General comment
This is a dataset used to create an aluminium industry specific electricity market for 'aluminium production Area 3' (South America). The production volume represents the total amount of hydroelectricity used in the region for aluminium production (electrolysis and ingot casting). The dataset also identifies the technology and country providing the hydroelectricity in the region.
Electricity markets specific to the aluminium-industry are needed in an LCI database because primary aluminium production is very energy intensive, and hence the location of production plants is often determined by access to large amounts of cheap electricity, which often results in an electricity mix that is different from the general grid mix of the countries where the production plants are located.
It is assumed that the production of electricity in general and in aluminium industry specific power plants is identical. Details on actual electricity generation with each technology can be found in the corresponding datasets.
All hydroelectricity assumed to be produced by tropical hydroelectric reservoir (known for Brazil, estimated for other countries).
Calculations are detailed in the report 'Calculating grid mixes for the aluminium industry in ecoinvent v3', available on the ecoinvent website.

## Included activities start
Re-labelling dataset, not representing a real transformation activity. Conceptually, the activity can be said to start with the production of electricity.

## Included activities end
Re-labelling dataset, not representing a real transformation activity. Conceptually, the activity can be said to end with a given amount of high voltage electricity labelled as specifically used for the production of electricity.

## Geography
Aluminium producing South American countries (AR, BR, VE)

## Time period
Production volume updated with 2015 data from IAI

## Reference product
- electricity, high voltage, aluminium industry: 1 kWh; = ResTro_RoW+ ResTro_BR_s+ ResTro_BR_ne+ ResTro_BR_semw+ ResTro_BR_n; By-product classification allocatable product; CPC 17100: Electrical energy; HS2017 271600: Electrical energy
  Expressed as sum of contributing technologies (inputs) to allow uncertainty analysis: each technology share is uncertain, and in a Monte Carlo analysis will always be normalized by the sum contribution of each technology
  production volume 1.62174e10 kWh
    The production volume, which is ultimately used to determine the share of hydroelectricity in the downstream market for aluminium industry specific high voltage electricity, is calculated by multiplying the following data:
    (1) public estimates of the electricity mix used to produce aluminium in the 'aluminium production region 3' (South America), provided by the International Aluminium Institute (IAI), see http://www.world-aluminium.org/statistics/. These estimates are based on the subset of aluminium producers that provide information to the IAI.
    (2) primary aluminium production volumes of each aluminium producing country in Area 3, also provided by IAI.
    (3) global average electricity requirements, per tonne primary aluminium, for both Söderberg and prebake electrolysis technologies, as well as the Area 3-specific proportion of aluminium produced by each technology.
    (4) electricity compensating line and transformation losses from production to consumption as medium voltage electricity, Losses estimated using country-level ecoinvent v3 data for Brazil and ROW data for other Area 3.2 aluminium producing countries.
    (5) electricity consumed in ingot casting.
  property price 0.0977 EUR2005
    Calculated in temporary price data. 94% of the average price (to account for a 6% loss in transformation and transmission) for electricity for industrial consumersin 2005 (excluded taxes). From IEA.
  properties: carbon allocation 0 kg, carbon content 0

## Inputs from technosphere
- electricity, high voltage: 0.262807 kWh; name ResTro_BR_semw; = 0.84531*(0.1801+0.1308); lognormal variance with pedigree 0.0113, pedigree (3,2,4,1,2)
  Calculated amount (see general comments).
  0.8453 kWh are supplied from Brazilian tropical hydropower reservoirs. This amount is split over the different Brazilian grid areas according to their annual production volume of hydropower from tropical reservoirs.
  BR-Mid-western grid: 13.08%
  BR-North-eastern grid: 7.79%
  BR Northern grid: 20.65%
  BR-South-eastern grid: 18.01%
  BR Southern grid: 40.47%
- electricity, high voltage: 0.0658497 kWh; name ResTro_BR_ne; = 0.84531*0.0779
  (same comment as for electricity, high voltage)
- electricity, high voltage: 0.342097 kWh; name ResTro_BR_s; = 0.84531*0.4047
  (same comment as for electricity, high voltage)
- electricity, high voltage: 0.174557 kWh; name ResTro_BR_n; = 0.84531*0.2065
  (same comment as for electricity, high voltage)
- electricity, high voltage: 0.15469 kWh; name ResTro_RoW; lognormal variance with pedigree 0.0252, pedigree (4,5,4,1,2)
  Calculated amount (see general comments). Activity link to GLO due to the elcetricity production of some aluminium producing countries not being modeled in ecoinvent, see general comments.

## Sampling procedure
IAI data used for total electricity used in the production of aluminium that is from hydroelectric plants. The cited 100% representativeness is for IAI data (data based on 100% of regional aluminium production). The percent representativeness of data used to determine that that hydroelectricity is from tropical reservoir plants is 85% (equal to share of BR hydroelectricity in total regional hydroelectricity for aluminium production). It is an assumption for other countries (AR, VE).

## Extrapolations
For the split of hydroelectricity production to the respective technologies (reservoir, run-of-river, pumped storage), shares of different types of hydroelectric plants in the countries, when available, were used as a proxy for the split relevant for the aluminium industry, see general comments.
