# lime production, milled, loose

Dataset: EcoSpold 2, unit process
Geography: RoW
Time period: 2000-01-01 to 2023-12-31
Technology level: current
Classification: EcoSpold01Categories: construction materials/additives
Classification: ISIC rev.4 ecoinvent: 0810:Quarrying of stone, sand and clay
Tags: ConvertedDataset
Scenario: Business-as-Usual
System model: Allocation, cut-off by classification
Generated by: Daniel Kellenberger (obsolete)
Published in: Kellenberger D. 2007
Database: ecoinvent
isCopyrightProtected: true
accessRestrictedTo: 1

## General comment
Infrastructure data are estimated based on a site visit and sketches of the process. The value of the infrastructure is normalized with a annual production capacity of about 6'000 tons of product per year. The estimated lifespan of the machines is 25 years. There are no dust emissions as the mill is a closed system. 50% of the electricity consumption is covered by the grid and 50% by a hydropower plant nearby. The infrastructure for electricity transportation from power plant to KFN is not included.

## Included activities end
Includes the processes: milling, sieving, filtering and storing. One part of the total heating energy for "production" and "administration" is included. Equipment included in the infrastructure: 1 crusher, 1 sieve, and 2 small silos and 1 filter.

## Geography
data are from only one company in Switzerland (KFN), for some exchanges RER-modules have been used as proxy

## Technology
The company works on a technically high level; heavy machines (excl. building machines) are operated electrically; air is recirculated in closed loop to avoid dust emissions

## Parameters
- fraction, process water, to air: 0.291902 dimensionless; name fraction_PW_to_air; lognormal variance with pedigree 0.092025, pedigree (4,4,3,2,4)
- quebec production volume: 3.3e8 kg; name PV_Quebec; lognormal variance with pedigree 0.0006, pedigree (1,1,1,1,1)
  2012 milled / pulverized lime production in Quebec. Primary data from the only producer in Quebec (Canada).

## Reference product
- lime: 1 kg; By-product classification allocatable product; CPC 37420: Quicklime, slaked lime and hydraulic lime; HS2017 252100: Limestone flux; limestone and other calcareous stone, of a kind used for the manufacture of lime or cement
  EcoSpold01Location=CH
  production volume 2.85664e11 kg; name PV_World
    Estimate by US.Geological survey for year 2010
  property carbon content, fossil 0.117257
    Table 3.1, ecoinvent v2.2 report 7, part VII, pg 3. MW CaCO3=100, MW MgCO3=84. C content of limestone is 0.117257 kg/kg DM
  property price 0.117 EUR2005
    Temporary price data. Calculated as 90% of purchasers price based on: 2005 import and export prices (total trades (USD) divided by total weight (kg) in biggest economies of the world: EU27, USA, Brasil, China, India, Japan and Russia) from UN Commodity Trade Statistics Database (http://data.un.org/Explorer.aspxDatabase [Accessed 2011.06.20]). Commodity: Calcium carbonate
  properties: carbon allocation 0.117023 kg, carbon content 0.117257, carbon content, non-fossil 0, dry mass 0.998 kg, heating value, net 0 MJ, water content 0.00200401, water in wet mass 0.002 kg, wet mass 1 kg

## Inputs from technosphere
- diesel, burned in building machine: 0.00358397 MJ; lognormal variance with pedigree 0.0444, pedigree (2,3,5,5,2)
  Extrapolated value, based on "limestone production, crushed, washed, QC 2012" dataset. Takes into account diesel consumption for onsite transportation of material.
  properties: heating value, net 1 MJ
- electricity, high voltage: 0.016 kWh; lognormal variance with pedigree 0.0421, pedigree (1,2,5,5,1)
  activityLink added to better reflect the reality of the supply chain
- electricity, medium voltage: 0.000536764, 0.0107072, 0.000268042, 0.000164376, 3.28996e-5, 7.06428e-6, 0.00110569, 0.00317793 kWh (8 suppliers, which the file names only by identifier); sum of these 0.016 kWh; lognormal variance with pedigree 0.0421, pedigree (1,2,5,5,1)
  EcoSpold01Location=CH
- heat, central or small-scale, other than natural gas: 0.00141 MJ; lognormal variance with pedigree 0.0421, pedigree (1,2,5,5,1)
  EcoSpold01Location=CH
  properties: heating value, net 1 MJ
- heat, district or industrial, natural gas: 0.104065 MJ; lognormal variance with pedigree 0.0444, pedigree (2,3,5,5,2)
  Extrapolated value, based on "limestone production, crushed, washed, QC 2012" dataset. Natural gas is used for lime drying.
  properties: heating value, net 1 MJ
- heat, district or industrial, other than natural gas: 0.0898 MJ; lognormal variance with pedigree 0.0421, pedigree (1,2,5,5,1)
  EcoSpold01Location=CH
  properties: heating value, net 1 MJ
- heat, district or industrial, other than natural gas: 0.0208869 MJ; lognormal variance with pedigree 0.0444, pedigree (2,3,5,5,2)
  Extrapolated value, based on "limestone production, crushed, washed, QC 2012" dataset. Heavy fuel oil is used for lime drying.
- industrial machine, heavy, unspecified: 0.000225 kg; lognormal variance with pedigree 0.3706, pedigree (4,3,5,5,1)
  EcoSpold01Location=RER
- limestone, crushed, for mill: 0.996007, 0.00399338 kg (2 suppliers, which the file names only by identifier); sum of these 1 kg; lognormal variance with pedigree 0.0626, pedigree (3,3,5,5,3)
  EcoSpold01Location=CH
  properties: carbon content, fossil 0.117492, dry mass 0.998 kg, water content 0.00200401, wet mass 1 kg
  note on carbon content, fossil: Table 3.1, ecoinvent v2.2 report 7, part VII, pg 3. MW CaCO3=100, MW MgCO3=84. C content of limestone is 0.117257 kg/kg DM Table 3.1, ecoinvent v2.2 report 7, part VII, pg 3. MW CaCO3=100, MW MgCO3=84

## Inputs from nature
- Water, unspecified natural origin [natural resource, in water]: 0.0028009 m3; name water_UNO_input; source Byers, W. 2003; lognormal variance with pedigree 0.0546, pedigree (3,3,5,5,1)
  Calculated based on literature, (Vionnet, S., Quantis Water Database - Technical Report, 2012). The crushed and washed limestone is entering the process. The water use in this process is the one used in ball/rod mill and wet screening. The evaporation rate of 29.2% is calculated based on Byers. The process ends when milled loose limestone is leaving the plant. It is based on general data on ball/rod mill for any kind of rock.
  property carbon content, fossil 0.0104329; name C_content_fossil
  property carbon content, non-fossil 0; name C_content_non_fossil
  property dry mass 0.1101 kg; name DM
  property water content 9081.65; name water_content
  property water in wet mass 999.89 kg; name WWM
  property wet mass 1000 kg; name WM

## Emissions to nature
- Water [air, unspecified]: 0.000817589 m3; name water_to_air_unspecified; lognormal variance with pedigree 0.0827, pedigree (2,2,5,5,1)
  Calculated value based on literature values and expert opinion. See comments in the parametres' comment field.
  property fraction, origin: fresh water 0; name fraction_origin_fresh_water
  property fraction, origin: salt water 0; name fraction_origin_salt_water
  property fraction, origin: unspecified 1; name fraction_origin_unspecified
- Water [water, unspecified]: 0.00198331 m3; name water_to_water_unspecified; lognormal variance with pedigree 0.0827, pedigree (2,2,5,5,1)
  (same comment as for Water)
  property fraction, origin: fresh water 0; name fraction_origin_fresh_water_Ww
  property fraction, origin: salt water 0; name fraction_origin_salt_water_Ww
  property fraction, origin: unspecified 1; name fraction_origin_unspecified_Ww

## Sampling procedure
survey

## Extrapolations
data which are only available for RER have been used as proxy for CH This dataset has been copied from an original dataset covering the geography CH. The uncertainty has been adjusted accordingly.

## Review by Roberto Dones 2003-07-04
Passed

## Review by Bo Weidema 2012-09-28
replaced "electricity, high voltage, hydro, run-of-river" with "electricity, high voltage" + activity link to "electricity production, hydro, run-of-river"
