# small pelagic fish to generic market for marine fish

Dataset: EcoSpold 2, unit process
Geography: GLO
Time period: 2017-01-01 to 2023-12-31
Technology level: current
Classification: ISIC rev.4 ecoinvent: 0311:Marine fishing
Scenario: Business-as-Usual
System model: Allocation, cut-off by classification
Generated by: Avraam Symeonidis
Database: ecoinvent
isCopyrightProtected: true
accessRestrictedTo: 1

## General comment
This is a linking (transfering) activity which links pelagic fish, to the generic market for marine fish. Pelagic fish are a by-catch of tuna fishing. By-catch of tuna includes all non-target fish species that are captured during the fishing of tuna. As they have a market value they are linked to the market for marine fish.

## Included activities start
The activity starts with the reception of landed hake.

## Included activities end
The activity models the part of pelagic fish which contributes to the generic market for marine fish.

## Reference product
- marine fish: 1 kg; By-product classification allocatable product; CPC 04211: Wild freshwater fish, live, fresh or chilled; HS2017 030289: Fish; fresh or chilled, n.e.c. in heading 0302, excluding fillets, fish meat of 0304, and edible fish offal[...]
  production volume 2.31151e7 kg
    Production volume calculated based on the global production volume that is supplying this this linking activity:
    tuna, capture and landing, frozen
  property ash content 0.0154835 kg
    Value has been weighted averaged based on the production volume of the five different fish adn their respective properties.
    Namely: 1. landed hake by-catch, fresh - PV: 5518600 kg
    2. landed anchovy, fresh - PV: 110000000 kg
    3. landed hake, fresh - PV: 86458333 kg
    4. landed tuna, frozen, EPO - PV: 554761905 kg
    5. landed tuna by-catch, fresh, EPO - PV: 23115079.38 kg
  property carbon content, non-fossil 0.469101
    (same comment as for marine fish)
  property energy content 5.92472 MJ
    (same comment as for marine fish)
  property fat content 0.0325441
    (same comment as for marine fish)
  property price 3.28 EUR2005
    Temporary price. Calulated as the average of the price of tuna and hake.
  property protein content 0.233359
    (same comment as for marine fish)
  properties: carbon allocation 0.230968 kg, carbon content 0.469101, dry mass 0.492364 kg, water content 1.03102, water in wet mass 0.507636 kg, wet mass 1 kg

## Inputs from technosphere
- small pelagic fish, fresh: 1 kg
  Eastern Pacific Ocean (EPO)
  property ash content 0.015 kg; name bycatch_ash
  property carbon content, non-fossil 0.476729; name bycatch_C_content_non_fossil; = (1-bycatch_protein-bycatch_fat_content-bycatch_ash)*0.444+bycatch_protein*0.535+bycatch_fat_content*0.774
  property dry mass 0.5702 kg; name bycatch_DM
  property energy content 4.049 MJ; name bycatch_energy_content
  property fat content 0.07; name bycatch_fat_content
  property protein content 0.179; name bycatch_protein
  property water content 0.753771; name bycatch_water_content
  property water in wet mass 0.4298 kg; name bycatch_WWM
  property wet mass 1 kg; name bycatch_WM
  note on ash content: Ash content of fish is between 1-2% of the edible portion, http://www.fao.org/wairdocs/tan/x5916e/x5916e01.htm
  note on carbon content, non-fossil: Calculated from C_content = polysaccharids*0.444+protein*0.535+lipids*0.774 and polysaccharids = 1-(protein+lipids+ash)
  note on energy content: Average of 35 pelagic fish species, http://www.fao.org/wairdocs/tan/x5916e/x5916e01.htm
