# process-specific burdens, slag landfill

Dataset: EcoSpold 2, unit process
Geography: Europe without Switzerland
Time period: 1995-01-01 to 2023-12-31
Technology level: current
Classification: ISIC rev.4 ecoinvent: 3821:Treatment and disposal of non-hazardous waste
Classification: EcoSpold01Categories: waste management/municipal incineration
Scenario: Business-as-Usual
System model: Allocation, cut-off by classification
Generated by: [System]
Database: ecoinvent
isCopyrightProtected: true
accessRestrictedTo: 1

## General comment
slag compartment for bottom ash from municipal solid waste incinerator. The compartment is a sealed-off part of a sanitary landfill.

## Included activities end
process-specific (i.e. independent of waste composition) energy demand and land use of landfill

## Technology
landfill with base seal, leachate collection system. Renaturation after closure.

## Reference product
- process-specific burdens, slag landfill: 1 kg; name RP; By-product classification allocatable product; CPC 39990: Other wastes n.e.c.
  production volume 1.12197 kg; name RP_PV; = 4*0.280493523
    Estimated. The EU without CH production volume is extrapolated from the global production volume using the nominal GDP of 2010 (source: United Nations, http://data.un.org/Glossary.aspx?q=GDP+%28current+US%24%29, accessed 20130726 and 20130312). Where the Global GDP is set to a dummy value of 4.
    Gross domestic product (GDP) at current prices is GDP at prices of the current reporting period. Also known as nominal GDP.
  property price 0.000519331 EUR2005
    Calculated based on inputs: The price of the product has been calculated as a sum of the values of the material and energy inputs for this product. This value is therefore a rough estimation. It may underestimate the real price since there are additional expenses when producing any product. These expences can include for example labour costs, treatment of waste materials and profit for the producer. Please consider carefully whether this level of data quality is acceptable for your application.
  properties: carbon allocation 0 kg, carbon content 0

## Inputs from technosphere
- diesel, burned in building machine: 0.027 MJ; lognormal variance with pedigree 0.0632, pedigree (2,3,5,5,1)
  properties: heating value, net 1 MJ
- electricity, low voltage: 1e-5 kWh; lognormal variance with pedigree 0.0632, pedigree (2,3,5,5,1)
- heat, central or small-scale, other than natural gas: 0.0010058 MJ; lognormal variance with pedigree 0.0632, pedigree (2,3,5,5,1)
  properties: heating value, net 1 MJ

## Inputs from nature
- Occupation, construction site [natural resource, land]: 0.000222 m2*year; lognormal variance with pedigree 0.0932, pedigree (2,3,5,5,1)
- Occupation, dump site [natural resource, land]: 0.00133 m2*year; lognormal variance with pedigree 0.0932, pedigree (2,3,5,5,1)
- Occupation, shrub land, sclerophyllous [natural resource, land]: 0.000222 m2*year; lognormal variance with pedigree 0.0932, pedigree (2,3,5,5,1)
- Transformation, from dump site, slag compartment [natural resource, land]: 4.44e-5 m2; lognormal variance with pedigree 0.1832, pedigree (2,3,5,5,1)
- Transformation, from pasture, man made [natural resource, land]: 4.44e-5 m2; lognormal variance with pedigree 0.1832, pedigree (2,3,5,5,1)
- Transformation, from shrub land, sclerophyllous [natural resource, land]: 4.44e-5 m2; lognormal variance with pedigree 0.1832, pedigree (2,3,5,5,1)
- Transformation, to dump site, slag compartment [natural resource, land]: 4.44e-5 m2; lognormal variance with pedigree 0.1832, pedigree (2,3,5,5,1)
- Transformation, to forest, unspecified [natural resource, land]: 4.44e-5 m2; lognormal variance with pedigree 0.1832, pedigree (2,3,5,5,1)
- Transformation, to shrub land, sclerophyllous [natural resource, land]: 4.44e-5 m2; lognormal variance with pedigree 0.1832, pedigree (2,3,5,5,1)

## Sampling procedure
data from one literature source on sanitary landfill, adapted to features of this landfill type

## Extrapolations
This dataset has been copied from an original dataset covering the geography CH. The uncertainty has been adjusted accordingly.
