# textile production, cotton, circular knitting

Dataset: EcoSpold 2, unit process
Geography: IN
Time period: 2015-04-01 to 2023-03-31
Technology level: current
Classification: ISIC rev.4 ecoinvent: 1391:Manufacture of knitted and crocheted fabrics
Scenario: Business-as-Usual
System model: Allocation, cut-off by classification
Generated by: Madhuri Nigam
Published in: Faist Emmenegger, M. 2018
Database: ecoinvent
isCopyrightProtected: true
accessRestrictedTo: 1

## General comment
Inventory refers to 1 kg knitted textile
This dataset covers all relevant input and output flows of the represented gate to gate unit process with a good overall data quality. The inventory is based on industry data. The dataset represents the Indian average of the knitted fabric manufacturing with circular knitting machines.
Knitting is a method by which thread or yarn may be turned into cloth by making consecutive loops called stitches. A new loop is pulled through each loop and a new loop is created. Knitting creates a fabric which is more stretchable and comfortable.
Circular knitting is a form of knitting that creates a seamless tube. Knitting is worked in rounds in a spiral (the equivalent of rows in flat knitting). This form of knitting is used to create T- shirt Jersey fabric and socks

## Included activities start
The activity starts with Knitting

## Included activities end
This process ends with conversion conversion of cotton yarn to knitted fabric

## Geography
The data has been collected from a knitting plant at Bhiwadi, Haryana,in North India

## Technology
Indian average, based on primary data collected from knitting unit, using current manufacturing technology in India.
Once the yarn is received in packaged form, it is placed in creel to feed the knitting zone into the feeder. Upon setting the specific yarn as per the fabric requirement, machine is set as per specific design requirement and the machine processes yarn into loops culminating into production of fabric.

## Reference product
- textile, knit cotton: 1 kg; name RP_amount_1; By-product classification allocatable product; CPC 28190: Other knitted or crocheted fabrics; HS2017 600192: Fabrics; pile fabrics (excluding long pile and loop pile), of man-made fibres, knitted or crocheted
  production volume 4.433e8 kg; name RP_PV_1
    source: http://texmin.nic.in/sites/default/files/prod_variety_cloth.pdf
  properties: carbon allocation 0.46 kg, carbon content 0.46, carbon content, non-fossil 0.46, dry mass 1 kg, price 11.7 EUR2005, wet mass 1 kg

## Inputs from technosphere
- building, hall: 3.84615e-5 m2; = 2400/(1248000*50); lognormal variance with pedigree 0.3026, pedigree (2,1,3,1,1)
  square meters of building divided by production per year and life time of the plant
- diesel, burned in diesel-electric generating set, 18.5kW: 0.185937 MJ; lognormal variance with pedigree 0.0046, pedigree (1,4,3,1,1)
  Diesel consumption in kg for power backup multiplied by Calorific value of diesel fuel
- electricity, low voltage: 1.659 kWh; lognormal variance with pedigree 0.0046, pedigree (1,4,3,1,1)
  sum of electricity used for knitting machines. Electricity consumption for utilities are not included in this dataset
- lubricating oil: 0.00049 kg; lognormal variance with pedigree 0.0046, pedigree (1,4,3,1,1)
  This is sum of grease oil, knitting oil, machine oil for lubricating machines
  properties: carbon content, fossil 0.75, dry mass 1 kg, heating value, net 40.2 MJ, wet mass 1 kg
  note on carbon content, fossil: Lubricating oil is produced from diesel. C-content/dry mass of fats and oils considered 75%, from: ecoinvent v2.2 report, n 15a, pg 40
  note on heating value, net: Literature value, Source: IPCC 2006, 2006 IPCC Guidelines for National Greenhouse Gas Inventories, Prepared by the National Greenhouse Gas Inventories Programme, Eggleston H.S., Buendia L., Miwa K., Ngara T. and Tanabe K. (eds). Published: IGES, Japan
- waste mineral oil: -0.00049 kg; name BP_amount_1
  This is produced due to the use of lubricating oil necessary for the operation of machinery.
  production volume; = RP_PV_1 * (BP_amount_1 / RP_amount_1)
    Calculated from production volume of reference product using the relative outputs.
  properties: carbon content, fossil 0.864444, dry mass 0.9 kg, heating value, net 34.7 MJ, water content 0.111111, wet mass 1 kg
  note on carbon content, fossil: Tab A.6, ecoinvent v2.2 report 13_I. C content has been calculated after data in the tables, and then referred to 1 kg DM
  note on heating value, net: Value taken from the general comment of the treatment dataset.
- waste yarn and waste textile: -0.01 kg; name BP_amount_2; lognormal variance with pedigree 0.0118, pedigree (4,3,1,5,2)
  This waste is landfilled. Data based on expert judgement based on company data
  production volume; = RP_PV_1 * (BP_amount_2 / RP_amount_1)
    Calculated from production volume of reference product using the relative outputs.
  properties: carbon content, non-fossil 0.44455, dry mass 0.97917 kg, heating value, net 13.14 MJ, water content 0.0212731, wet mass 1 kg
- yarn, cotton: 1.01 kg; lognormal variance with pedigree 0.0046, pedigree (1,4,3,1,1)
  Most of the waste and by products are being reused in the plant hence they are not considered in the inventory
  properties: carbon content, non-fossil 0.46, dry mass 0.94 kg, heating value, net 12.95 MJ, water content 0.0638298, wet mass 1 kg

## Sampling procedure
Field visit and interviews. Staff from knitting unit were interviewed to provide data. Representative mills in Haryana (North India) was chosen to provide data based on its technical representativeness of the current state of business and their willingness to participate.
