# goods wagon production

Dataset: EcoSpold 2, unit process
Geography: RoW
Time period: 1993-01-01 to 2023-12-31
Technology level: current
Classification: EcoSpold01Categories: transport systems/train
Classification: ISIC rev.4 ecoinvent: 3020:Manufacture of railway locomotives and rolling stock
Tags: ConvertedDataset
Scenario: Business-as-Usual
System model: Allocation, cut-off by classification
Generated by: Michael Spielmann (obsolete)
Published in: Spielmann M. 2007
Database: ecoinvent
isCopyrightProtected: true
accessRestrictedTo: 1

## General comment
For the average good wagon we assumed that 65% of the transport is performed by closed wagons and 35% by tank wagons. 50% of the wagon in each category are 2 axis vehicles. The life span of one wagon is assumed to be 40 years with a yearly kilometric performance of 21148km, resulting in a life time performance of 845'900 kilometres. The total weight of a wagon is assumed as about 27t)
[This dataset was already contained in the ecoinvent database version 2. It was not individually updated during the transfer to ecoinvent version 3. Life Cycle Impact Assessment results may still have changed, as they are affected by changes in the supply chain, i.e. in other datasets. This dataset was generated following the ecoinvent quality guidelines for version 2. It may have been subject to central changes described in the ecoinvent version 3 change report (http://www.ecoinvent.org/database/ecoinvent-version-3/reports-of-changes/), and the results of the central updates were reviewed extensively. The changes added e.g. consistent water flows and other information throughout the database. The documentation of this dataset can be found in the ecoinvent reports of version 2, which are still available via the ecoinvent website. The change report linked above covers all central changes that were made during the conversion process.]

## Included activities end
This inventory calls processes of material production, representing the material composition of an average goods wagon. For manufacturing, electricity and light oil burned in industrial furnance are included. For the transportation of materials standandard distance are applied.

## Geography
Manufacturing data reflects an average material consumption of wagons used in Europe.

## Technology
The modelled goods wagons represent different technologies currently in use.

## Reference product
- goods wagon: 1 unit; By-product classification allocatable product; CPC 49533: Railway or tramway goods vans and wagons, not self-propelled; HS2017 8606: Railway or tramway goods vans and wagons; not self-propelled
  EcoSpold01Location=RER
  production volume 2.67763 unit
    This is a placeholder value that does not reflect real-world production volumes. This dataset does not currently require a real-world production volume to work in the database framework, and no actual data were collected yet. This has no negative effect on the results of the ecoinvent database.
  property price 12549.9 EUR2005
    Calculated based on inputs: The price of the product has been calculated as a sum of the values of the material and energy inputs for this product. This value is therefore a rough estimation. It may underestimate the real price since there are additional expenses when producing any product. These expences can include for example labour costs, treatment of waste materials and profit for the producer. Please consider carefully whether this level of data quality is acceptable for your application.
  properties: carbon allocation 0 kg, carbon content 0

## Inputs from technosphere
- alkyd paint, white, without solvent, in 60% solution state: 106 kg; lognormal variance with pedigree 0.0706, pedigree (4,3,5,5,1)
  EcoSpold01Location=RER
  Own calculations based on oral communication
  Uncertainty: own calculations based on oral communication
  properties: carbon content, fossil 0.140367, carbon content, non-fossil 0.199629, dry mass 1 kg, heating value, net 10.3 MJ, wet mass 1 kg
  note on carbon content, fossil: C content was calculated as an addition of C content in the raw materials.
- aluminium, wrought alloy: 1070 kg; lognormal variance with pedigree 0.0706, pedigree (4,3,5,5,1)
  Own calculations based on oral communication
  EcoSpold01Location=RER
  Uncertainty: own calculations based on oral communication
  properties: dry mass 1 kg, wet mass 1 kg
- electricity, medium voltage: 306.406, 6112.12, 2053.65, 93.8322, 18.7804, 4.03258, 631.171 kWh (7 suppliers, which the file names only by identifier); sum of these 9220 kWh; lognormal variance with pedigree 0.0706, pedigree (4,3,5,5,1)
  EcoSpold01Location=UCTE
  Own calculations based on oral communication
  Uncertainty: own calculations based on oral communication
- glued laminated timber, average glue mix: 1.92 m3; lognormal variance with pedigree 0.0706, pedigree (4,3,5,5,1)
  (same comment as for aluminium, wrought alloy)
  properties: carbon content, fossil 0.01791, carbon content, non-fossil 0.441932, dry mass 404.4 kg, heating value, net 5537.41 MJ, price 298 EUR2005, water content 0.0979228, wet mass 444 kg
- heat, district or industrial, other than natural gas: 43679.8, 20.236 MJ (2 suppliers, which the file names only by identifier); sum of these 43700 MJ; lognormal variance with pedigree 0.0706, pedigree (4,3,5,5,1)
  (same comment as for aluminium, wrought alloy)
  properties: heating value, net 1 MJ
- steel, low-alloyed, hot rolled: 21000 kg; lognormal variance with pedigree 0.062, pedigree (1,1,5,5,1)
  EcoSpold01Location=RER
  ; own calculations based on oral communication
  properties: carbon content, fossil 0.005, dry mass 1 kg, wet mass 1 kg
  note on carbon content, fossil: Low alloyed steel composition given in Tab. 3.2 ecoinvent v2.2 report 10_partII. Steel assumed to have a C content of 0.5%
- stone wool, packed: 32 kg
  Own calculations based on oral communication
  EcoSpold01Location=CH
  properties: carbon content, fossil 0.015401, dry mass 1 kg, wet mass 1 kg
  note on carbon content, fossil: The chemical composition of the glass fibres used in the rock wool production is similar to the composition of naturally cooled volcano basalt and has a composition listed in Tab. 3.1 and 3.2 in ecoinvent v2.2 report 16, part XIV. Rock wool contains: a minimum of 96% mineral fibres,between 0.5 and 3.0 weight percent of phenolic resin depending on the specific product characteristics, and about 0.2 percent mineral oil (ecoinvent v2.2 report 16, part XIV). An average composition of 1.8% phenolic resin, 0.2% mineral oil, and 98% mineral fibres has been assumed and used to calculate C content of the rock wool
- synthetic rubber: 10 kg; lognormal variance with pedigree 0.0706, pedigree (4,3,5,5,1)
  (same comment as for aluminium, wrought alloy)
  properties: carbon content, fossil 0.871949, dry mass 1 kg, heating value, net 26.42 MJ, wet mass 1 kg
  note on carbon content, fossil: EPDM (Ethylene-propene-diene terpolymer) rubber is a terpolymer of ethylene, propene, and a diene with the residual unsaturated portion of the diene in the side chain (ecoinvent v2.2 report 7-part XX & Ullmann). Chemical formula (deduced from Evidences of Solvent-Induced Miscibility in Polychloroprene-co-Ethylene-Propene Diene Terpolymer Blends, Dubey et al., Journal of Applied Polymer Science, 2009, 111:1884–1891): C20H35

## Sampling procedure
The data of the material composition and energy consumption is based on oral communication with an expert of one company.

## Extrapolations
Data for three wagon types is used as an estimate for Europe This dataset has been copied from an original dataset covering the geography RER. The uncertainty has been adjusted accordingly.

## Review by Niels Jungbluth 2003-07-23
passed
