# contouring, bronze

Dataset: EcoSpold 2, unit process
Geography: CA-QC
Time period: 1997-01-01 to 2023-12-31
Technology level: current
Classification: ISIC rev.4 ecoinvent: 2592:Treatment and coating of metals; machining
Classification: EcoSpold01Categories: metals/processing
Synonyms: rolling bronze
Tags: recontextualization
Scenario: Business-as-Usual
System model: Allocation, cut-off by classification
Generated by: Pascal Lesage
Published in: Classen M. 2009
Database: ecoinvent
isCopyrightProtected: true
accessRestrictedTo: 1

## General comment
Most of the data used stem from processes similar to contouring bronze. Overall data quality is poor.
[This dataset was already contained in the ecoinvent database version 2. It was not individually updated during the transfer to ecoinvent version 3. Life Cycle Impact Assessment results may still have changed, as they are affected by changes in the supply chain, i.e. in other datasets. This dataset was generated following the ecoinvent quality guidelines for version 2. It may have been subject to central changes described in the ecoinvent version 3 change report (http://www.ecoinvent.org/database/ecoinvent-version-3/reports-of-changes/), and the results of the central updates were reviewed extensively. The changes added e.g. consistent water flows and other information throughout the database. The documentation of this dataset can be found in the ecoinvent reports of version 2, which are still available via the ecoinvent website. The change report linked above covers all central changes that were made during the conversion process.]
Child dataset exchanges identical to GLO dataset. Created to enable linking to regional markets (e.g. for electricity). Data quality indicators adjusted accordingly.

## Included activities start
The activity starts with the reception of the raw materials at the production plant gates.

## Included activities end
Heating, rolling, degreasing / pickling and waste water treatment.

## Technology
Technique describes the average of European Union. Data are estimated basing on data of similar processes.

## Parameters
- Quebec gross domestic product 2011: 3.11e11 USD(2011); name quebecGDP2011; lognormal variance with pedigree 0.0006, pedigree (1,1,1,1,1)
  Quebec Gross domestic product for 2011, expressed in 2011 USD. Source: Institut de la statistique du Québec. Converted from CAD to USD using a yearly average exchange rate of 0.989 CAD/USD (Source: bank of Canada).
- fraction, process water, to air: 0.15 dimensionless; lognormal variance with pedigree 0.092025, pedigree (4,4,3,2,4)
- fraction, tap water, to air: 0.15 dimensionless; lognormal variance with pedigree 0.092025, pedigree (4,4,3,2,4)
- world gross domestic product 2011: 7e13 USD(2011); name worldGDP2011; lognormal variance with pedigree 0.0006, pedigree (1,1,1,1,1)
  World Gross domestic product for 2011, expressed in 2011 USD. Source: World Bank.

## Reference product
- contouring, bronze: 1 kg; By-product classification allocatable product; CPC 88731: Metal treatment and coating services
  production volume 388914 kg
    Gross approximation of Quebec production volume using relative value of Quebec GDP to world GDP
  property carbon content, fossil 0
    Bronze is a metal alloy consisting primarily of copper, usually with tin as the main additive, but sometimes with other elements such as phosphorus, manganese, aluminum, or silicon
  property carbon content, non-fossil 0
    (same comment as for contouring, bronze)
  property price 0.233589 EUR2005
    Calculated based on inputs: The price of the product has been calculated as a sum of the values of the material and energy inputs for this product. This value is therefore a rough estimation. It may underestimate the real price since there are additional expenses when producing any product. These expences can include for example labour costs, treatment of waste materials and profit for the producer. Please consider carefully whether this level of data quality is acceptable for your application.
  properties: carbon allocation 0 kg, carbon content 0, dry mass 0.039644 kg, water content 0, water in wet mass 0 kg, wet mass 0.039644 kg

## Inputs from technosphere
- bronze: 0.039644 kg; lognormal variance with pedigree 0.318, pedigree (4,5,5,5,5)
  properties: dry mass 1 kg, wet mass 1 kg
- electric arc furnace dust: -0.00044159 kg; lognormal variance with pedigree 0.38, pedigree (5,5,5,5,5)
  production volume
    (same comment as for contouring, bronze)
  properties: carbon content, fossil 0.01339, dry mass 0.846 kg, water content 0.182033, wet mass 1 kg
- electricity, medium voltage: 0.22333 kWh; lognormal variance with pedigree 0.38, pedigree (5,5,5,5,5)
- heat, district or industrial, natural gas: 1.6 MJ; lognormal variance with pedigree 0.318, pedigree (4,5,5,5,5)
  properties: heating value, net 1 MJ
- lubricating oil: 0.004 kg; lognormal variance with pedigree 0.318, pedigree (4,5,5,5,5)
  properties: carbon content, fossil 0.75, dry mass 1 kg, heating value, net 40.2 MJ, wet mass 1 kg
  note on carbon content, fossil: Lubricating oil is produced from diesel. C-content/dry mass of fats and oils considered 75%, from: ecoinvent v2.2 report, n 15a, pg 40
  note on heating value, net: Literature value, Source: IPCC 2006, 2006 IPCC Guidelines for National Greenhouse Gas Inventories, Prepared by the National Greenhouse Gas Inventories Programme, Eggleston H.S., Buendia L., Miwa K., Ngara T. and Tanabe K. (eds). Published: IGES, Japan
- rolling mill: 1.4286e-9 unit; lognormal variance with pedigree 0.68, pedigree (5,5,5,5,5)
- sludge from steel rolling: -0.016335 kg; lognormal variance with pedigree 0.38, pedigree (5,5,5,5,5)
  production volume
    (same comment as for contouring, bronze)
  properties: carbon content, fossil 0.0123943, dry mass 0.8 kg, water content 0.25, wet mass 1 kg
- sulfuric acid: 0.34 kg; lognormal variance with pedigree 0.318, pedigree (4,5,5,5,5)
  properties: dry mass 1 kg, wet mass 1 kg
- tap water: 6 kg; lognormal variance with pedigree 0.18, pedigree (4,5,5,5,5)
  properties: carbon content, fossil 0.00178991, dry mass 0.000337476 kg, water content 2962.17, wet mass 1 kg
  note on carbon content, fossil: Bicarbonate content is 2.93 mol/m3. CO2 content is 0.1 mol/m3 (ecoinvent v2.2 report 8, Tab 93.1).

## Emissions to nature
- NMVOC, non-methane volatile organic compounds [air, unspecified]: 4.5e-5 kg; lognormal variance with pedigree 0.358, pedigree (4,5,5,5,5)
- Water [air, unspecified]: 0.0009 m3; lognormal variance with pedigree 0.0827, pedigree (2,2,5,5,1)
  Calculated value based on literature values and expert opinion. See comments in the parametres" comment field.
- Arsenic ion [water, unspecified]: 1.5714e-9 kg; lognormal variance with pedigree 1.02, pedigree (5,5,5,5,5)
- BOD5, Biological Oxygen Demand [water, unspecified]: 7.9e-5 kg; lognormal variance with pedigree 0.42, pedigree (5,5,5,5,5)
- COD, Chemical Oxygen Demand [water, unspecified]: 7.9e-5 kg; lognormal variance with pedigree 0.42, pedigree (5,5,5,5,5)
- Cadmium II [water, unspecified]: 1.5714e-9 kg; lognormal variance with pedigree 1.02, pedigree (5,5,5,5,5)
- Chromium III [water, unspecified]: 1.5086e-7 kg; lognormal variance with pedigree 1.02, pedigree (5,5,5,5,5)
- Chromium VI [water, unspecified]: 6.2857e-9 kg; lognormal variance with pedigree 1.02, pedigree (5,5,5,5,5)
- Copper ion [water, unspecified]: 1.7286e-6 kg; lognormal variance with pedigree 1.02, pedigree (5,5,5,5,5)
- DOC, Dissolved Organic Carbon [water, unspecified]: 2.0551e-5 kg; lognormal variance with pedigree 0.42, pedigree (5,5,5,5,5)
- Lead II [water, unspecified]: 1.5714e-7 kg; lognormal variance with pedigree 1.02, pedigree (5,5,5,5,5)
- Mercury II [water, unspecified]: 1.5714e-9 kg; lognormal variance with pedigree 1.02, pedigree (5,5,5,5,5)
- Nickel II [water, unspecified]: 4.7143e-7 kg; lognormal variance with pedigree 1.02, pedigree (5,5,5,5,5)
- TOC, Total Organic Carbon [water, unspecified]: 2.0551e-5 kg; lognormal variance with pedigree 0.42, pedigree (5,5,5,5,5)
- Tin ion [water, unspecified]: 1.5714e-7 kg; lognormal variance with pedigree 1.02, pedigree (5,5,5,5,5)
- Water [water, unspecified]: 0.0051 m3; lognormal variance with pedigree 0.0827, pedigree (2,2,5,5,1)
  (same comment as for Water)
  property carbon content, fossil 0; name C_content_fossil
  property carbon content, non-fossil 0; name C_content_non_fossil
  property dry mass 0 kg; name DM
  property water in wet mass 1000 kg; name WWM
  property wet mass 1000 kg; name WM
- Zinc II [water, unspecified]: 3.9286e-6 kg; lognormal variance with pedigree 1.02, pedigree (5,5,5,5,5)

## Sampling procedure
Literature

## Extrapolations
GLO dataset extrapolated from European dataset, which in turn was used to create this child dataset. Exchanges identical to GLO dataset. Created to enable linking to regional markets (e.g. for electricity). Data quality indicators adjusted accordingly.
