# lithium iron phosphate production, solid state process

Dataset: EcoSpold 2, unit process
Geography: RoW
Time period: 2014-01-01 to 2025-12-31
Technology level: current
Classification: ISIC rev.4 ecoinvent: 2011:Manufacture of basic chemicals
Synonyms: lithium iron phosphate; LiFePO4
Scenario: Business-as-Usual
System model: Allocation, cut-off by classification
Generated by: Eleonora Crenna
Published in: Dunn, J. 2014
Database: ecoinvent
isCopyrightProtected: true
accessRestrictedTo: 1

## General comment
This dataset represents the production of 1 kg lithium iron phosphate (LFP) via solid state process, used as active material in the production of LFP cathodes in Li-ion batteries.

## Included activities start
The activity starts when the chemicals enter the process at the factory.

## Included activities end
The activity ends with the production at factory gate of LFP active material via solid state process.

## Geography
This dataset is extrapolated from CN production to global.

## Technology
Lithium iron phosphate can be produced via hydrothermal process or solid state process. The solid state LFP synthesis process requires a lithium compound, an iron compound, and a phosphorous compound. Initially the mixture is heated at around 600°C. Then, it is cooled to room temperature. Finally, it is reheated to circa 800°C to produce the final product.
The general reaction is the following:
3Li2CO3 + 2Fe3O4 + 6(NH4)2HPO4 → 6LiFePO4 + remainings from reaction. The remanings include ammonium carbonate and ammonium hydroxide which decompose to CO2 + NH3 and NH3 + H2O respectively, resulting in the following complete reaction:
3Li2CO3 + 2Fe3O4 + 6(NH4)2HPO4 → 6LiFePO4 + 3CO2 + 12NH3 + 9H2O + O2
Reference:
Dunn, J., James, C., Gaines, L., & Gallagher, K. (2014). Material and energy flow in the production of cathode and anode materials for lithium ion batteries. Argonne National Laboratory.
Toprakci, O. (2012). Advanced Nanofiber-Based Lithium-Ion Battery Cathodes. North Carolina State University. Chapter 1.5.2. Solid-state methods for LiFePO 4 production.

## Time period
The time period is from 2014 (year of the publication of data) and 2025 (assuming that this producing technology is still viable in the near future)

## Reference product
- lithium iron phosphate: 1 kg; name RefProd; By-product classification allocatable product; CPC 34240: Phosphates of triammonium; salts and peroxysalts of inorganic acids and metals n.e.c.; HS2017 283529: Phosphates; (other than of mono- or disodium, other than of potassium or of calcium hydrogenorthophosphate [...]; CAS 15365-14-7
  production volume 7.70446e6 kg; name RefProd_PV; = 619948187*0.15*0.24*0.5
    The PV is expressed in kg. According to UN Comtrade (https://comtrade.un.org/data/, HS code: 850760) 619948187 kg Li-ion batteries were exported globally in 2019. Approximately 15% are LFP Li-ion batteries (Benchmark Mineral Intelligence, 2019. The Current Position of Li-ion Raw Material Supply and the Role of Recycling). LFP represents approximately 24% weight of a battery pack.
    Due to lack of specific information on the production share of lithium iron phosphate via hydrothermal and solid state process, the assumption of 1:1 ratio is applied here.
  property price 20.0412 EUR2005
    Converted to EUR2005. Approximate average from multiple vendors.
  properties: carbon allocation 0 kg, carbon content 0, carbon content, fossil 0, carbon content, non-fossil 0, dry mass 1 kg, iron content 0.1571, lithium content 0.0574, oxygen content 0.5293, phosphorus content 0.2562, water content 0, water in wet mass 0 kg, wet mass 1 kg

## Inputs from technosphere
- chemical factory, organics: 7.41e-10 unit; lognormal variance with pedigree 0.3818, pedigree (2,3,5,4,4)
  Calculated based on Annual production: 27000 metric ton cathode material (Dai et al., 2018); assumption 50yr lifetime chemical factory.
  Reference:
  Dai, Q., Kelly, J. C., Dunn, J., & Benavides, P. (2018). Update of Bill-of-Materials and Cathode Materials Production for Lithium-Ion Batteries in the GREET Model. 2018. Argonne National Laboratory.
- diammonium phosphate: 0.217448, 0.0467406, 0.572812 kg (3 suppliers, which the file names only by identifier); sum of these 0.837 kg; lognormal variance with pedigree 0.0425, pedigree (2,3,5,3,2)
  Literature. Input values are based on the following reaction: 3Li2CO3 + 2Fe3O4 + 6(NH4)2HPO4 → 6LiFePO4 + 3CO2 + 12NH3 + 9H2O + O2.
  properties: dry mass 1 kg, nitrogen content 0.18, phosphorus content 0.200754, wet mass 1 kg
  note on nitrogen content: Nitrogen content (on a dry matter basis) of diammonium phosphate is calculated from the molecular formula of the nutrient present in the substance.
  note on phosphorus content: Phosphorus content (on a dry matter basis) of diammonium phosphate is calculated from the molecular formula of the nutrient present in the substance.
- electricity, medium voltage: 0.000965412, 8.58654e-5, 0.00748653, 0.00981037, 0.0103892, 0.00529176, 0.000730872, 0.00462588, 0.00019527, 0.0312637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 kWh (47 suppliers, which the file names only by identifier); sum of these 0.741769 kWh; = 2.531*1055.056*0.27778/1000; lognormal variance with pedigree 0.0425, pedigree (2,3,5,3,2)
  Literature. Original value 2.531 mmBTU/ton LFP taken from the more up-to-date version of GREET2 model (Argonne National LAboratory, 2019, Available at: https://greet.es.anl.gov/ ) and Dunn et al. (2014). Conversion factors: 1 mmBTU = 1,055.055853 MJ; 1 MJ = 0.27778 kWh
  Reference:
  Dunn, J., James, C., Gaines, L., & Gallagher, K. (2014). Material and energy flow in the production of cathode and anode materials for lithium ion batteries. Argonne National Laboratory.
- lithium carbonate: 0.234 kg; name lithium_carbonate; lognormal variance with pedigree 0.0425, pedigree (2,3,5,3,2)
  (same comment as for diammonium phosphate)
  properties: carbon content, fossil 0.16255, dry mass 1 kg, heating value, net 4.93 MJ, wet mass 1 kg
- magnetite: 0.489 kg; lognormal variance with pedigree 0.0425, pedigree (2,3,5,3,2)
  (same comment as for diammonium phosphate)
  properties: dry mass 1 kg, wet mass 1 kg

## Emissions to nature
- Ammonia [air, unspecified]: 0.215696 kg; = ( lithium_carbonate + magnetite + diammonium_phosphate - RefProd) * (12 * 17.03 / (3 * 44.01 + 12 * 17.03 + 9 * 18.02 + 32)); lognormal variance with pedigree 0.1232, pedigree (3,3,5,4,4)
  Calculated value to obtain mass balance based on the remaining amount from the reactions (i.e. difference between input and RefProd) and stoichiometry. NH3 MW = 17.03 g/mol; 12 mol NH3 resulting from the reaction.
- Carbon dioxide, fossil [air, unspecified]: 0.139354 kg; = ( lithium_carbonate + magnetite + diammonium_phosphate - RefProd) * (3 * 44.01 / (3 * 44.01 + 12 * 17.03 + 9 * 18.02 + 32)); lognormal variance with pedigree 0.0838, pedigree (3,3,5,4,4)
  Calculated value to obtain mass balance based on the remaining amount from the reactions (i.e. difference between input and RefProd) and stoichiometry. CO2 MW = 44.01 g/mol; 3 mol CO2 resulting from the reaction.
- Oxygen [air, unspecified]: 0.033775 kg; = ( lithium_carbonate + magnetite + diammonium_phosphate - RefProd) * (32 / (3 * 44.01 + 12 * 17.03 + 9 * 18.02 + 32)); lognormal variance with pedigree 0.1232, pedigree (3,3,5,4,4)
  Calculated value to obtain mass balance based on the remaining amount from the reactions (i.e. difference between input and RefProd) and stoichiometry. O2 MW = 32 g/mol; 1 mol O2 resulting from the reaction.
- Water [air, unspecified]: 0.000171176 m3; = ( lithium_carbonate + magnetite + diammonium_phosphate - RefProd) * (9 * 18.02 / (3 * 44.01 + 12 * 17.03 + 9 * 18.02 + 32)) / 1000; lognormal variance with pedigree 0.1232, pedigree (3,3,5,4,4)
  Calculated value to obtain mass balance based on the remaining amount from the reactions (i.e. difference between input and RefProd) and stoichiometry. H2O MW = 18.02 g/mol; 9 mol H2O resulting from the reaction.

## Sampling procedure
The data about the production process of LFP are retrieved from the literature (Dunn et al., 2014) and complemented with calculation to account for emissions during the process thus obtaining mass balance.

Reference:
Dunn, J., James, C., Gaines, L., & Gallagher, K. (2014). Material and energy flow in the production of cathode and anode materials for lithium ion batteries. Argonne National Laboratory.

## Extrapolations
This dataset was extrapolated from national producers to global.
