# treatment of residue from TiO2 production, sulfate process, residual material landfill

Dataset: EcoSpold 2, unit process
Geography: RoW
Time period: 2010-01-01 to 2023-12-31
Technology level: current
Classification: ISIC rev.4 ecoinvent: 3822:Treatment and disposal of hazardous waste
Scenario: Business-as-Usual
System model: Allocation, cut-off by classification
Generated by: Nikolia Stoikou
Database: ecoinvent
isCopyrightProtected: true
accessRestrictedTo: 1

## General comment
This dataset represents the activity of waste disposal of 'residue from TiO2 production, sulfate process' in a residual material landfill (RMLF). Recommended use of this dataset: The waste is an inorganic solid residue (called digester residue) generated in the production of titanium dioxide (TiO2) with the sulfate process. Inventoried waste consists of fraction: 100% residue from TiO2 production (sulfate process); . Waste composition (wet, in ppmw): H2O 296000; O 319600; H na; C na; S 28600; N na; P na; B 7.1933; Cl na; Br na; F na; I na; Ag 0.714; As 0.62521; Ba 149.04; Cd 11.748; Co 1.3453; Cr na; Cu na; Hg na; Mn na; Mo na; Ni na; Pb na; Sb na; Se na; Sn na; V na; Zn na; Be na; Sc na; Sr na; Ti 140000; Tl na; W na; Si 128100; Fe 18400; Ca 21400; Al 17700; K na; Mg 30000; Na na. Share of carbon in initial waste input that is biogenic 61.4%. Additional solidification of residues with 0.4 kg of cement.

## Included activities start
The activity starts with the waste being available at the gate of the treatment facility. Collection and transportation of the waste to the treatment plant is not included.

## Included activities end
The activity ends with the waste being treated and waste-specific emissions from the landfill are released to water (short-term emissions to water from leachate and long-term emissions to ground water). Expenditures for solidificalion with cement are also included.

## Geography
This dataset represents a landfill site with mean annual temperature (MAT) of 16.743579766537 degC, mean annual precipitation (MAP) of 1250.84108527132 mm/year, mean annual actual evaporation (EAT) of 460.58904958214 mm/year, and net infiltration of 790.3 mm/year. The leachate percolating through the residual material landfill has an average residence time of 4.43 years.
Reference for climatic parameters:
UN data, 2020. Precipitation, Environment Statistics Database, United Nations Statistics Division Available at: http://data.un.org/Data.aspx?q=precipitation&d=ENV&f=variableID%3a6;
World Bank, 2022. Surface area (sq.km), World Bank Group Available at: https://data.worldbank.org/indicator/AG.SRF.TOTL.K2;

## Technology
Residual material landfill for polluted, inorganic waste (VVEA Type C). With base seal and leachate collection system. Ultimate average landfill height is 10 meters. Operation phase duration is 30 years. Recultivation after closure. Additional solidification with cement requested. Based on average waste composition and climate data the end of carbonate phase in the residual material landfill is estimated to be reached after 60 000 years.

## Reference product
- residue from TiO2 production, sulfate process: -1 kg; By-product classification Waste; CPC 39367: Waste and scrap of tungsten, molybdenum, tantalum, magnesium, cobalt, cadmium, titanium, zirconium, beryllium […]; HS2017 262110: Slag and ash; ash and residues from the incineration of municipal waste
  main reference product of this activity
  production volume 1.07341e9 kg
    Estimated based on the total amount of this waste being treated in the database.
  property price 0 EUR2005
    Waste products are assigned a price of zero as they are assumed to require further treatment.
  properties: aluminium content 0.0251431, arsenic content 8.8812e-7, barium content 0.000211711, boron content 1.02181e-5, cadmium content 1.66876e-5, calcium content 0.030399, carbon allocation 0 kg, carbon content 0, carbon content, fossil 0, carbon content, non-fossil 0, cobalt content 1.91097e-6, dry mass 0.703991 kg, heating value, gross 0 MJ, heating value, net 0 MJ, iron content 0.0261375, magnesium content 0.0426154, oxygen content 0.453996, silicon content 0.181968, silver content 1.01425e-6, sulfur content 0.0406267, titanium content 0.198872, water content 0.420472, water in wet mass 0.296009 kg, wet mass 1 kg

## Inputs from technosphere
- cast iron: 5.0555e-6 kg; lognormal variance with pedigree 0.31529, pedigree (1,1,2,1,1)
  for residual material landfill infrastructure
  properties: carbon content, fossil 0.04, dry mass 1 kg, wet mass 1 kg
- cement, unspecified: 0.00908058, 0.000234622, 0.00553372, 0.0344858, 0.00108247, 0.000791235, 0.000428828, 0.000852295, 0.00130301, 0.346207 kg (10 suppliers, which the file names only by identifier); sum of these 0.4 kg; lognormal variance with pedigree 0.009284, pedigree (1,1,2,1,1)
  cement required for solidification of landfilled residual material
  properties: dry mass 1 kg, wet mass 1 kg
- concrete, 25MPa: 5.26518e-10, 1.78259e-8, 1.75416e-8, 4.33476e-7 m3 (4 suppliers, which the file names only by identifier); sum of these 4.6937e-7 m3; lognormal variance with pedigree 0.31529, pedigree (1,1,2,1,1)
  for residual material landfill infrastructure
  properties: cement content 206 kg, dry mass 2285 kg, fly ash content 69 kg, gravel content 1100 kg, sand content 910 kg, water content 0.0538293, wet mass 2408 kg
- diesel, burned in building machine: 0.028614 MJ; lognormal variance with pedigree 0.012675, pedigree (1,1,2,1,1)
  for residual material landfill infrastructure and operation
  properties: heating value, net 1 MJ
- electricity, low voltage: 1.73688e-8, 2.73136e-7, 5.66928e-6, 5.59586e-7, 3.48554e-9, 1.95185e-6, 9.66959e-8 kWh (7 suppliers, which the file names only by identifier); sum of these 8.5714e-6 kWh; lognormal variance with pedigree 0.012648, pedigree (1,1,2,1,1)
  for residual material landfill operation
- excavation, hydraulic digger: 0.00030086 m3; lognormal variance with pedigree 0.31529, pedigree (1,1,2,1,1)
  for residual material landfill infrastructure
- excavation, skid-steer loader: 0.00030086 m3; lognormal variance with pedigree 0.31529, pedigree (1,1,2,1,1)
  for residual material landfill infrastructure
- extrusion, plastic pipes: 8.1818e-5 kg; lognormal variance with pedigree 0.31529, pedigree (1,1,2,1,1)
  for residual material landfill infrastructure
- gravel, round: 0.1367 kg; lognormal variance with pedigree 0.31529, pedigree (1,1,2,1,1)
  for residual material landfill infrastructure
  properties: dry mass 1 kg, wet mass 1 kg
- heat, district or industrial, other than natural gas: 0.000919734, 4.26096e-7 MJ (2 suppliers, which the file names only by identifier); sum of these 0.00092016 MJ; lognormal variance with pedigree 0.012648, pedigree (1,1,2,1,1)
  for residual material landfill operation
  properties: heating value, net 1 MJ
- pitch: 0.000179274, 8.03581e-6, 3.96101e-6, 6.95013e-5, 1.14719e-5, 0.00101346 kg (6 suppliers, which the file names only by identifier); sum of these 0.0012857 kg; lognormal variance with pedigree 0.31529, pedigree (1,1,2,1,1)
  for residual material landfill infrastructure
  properties: carbon content, fossil 0.83, dry mass 1 kg, heating value, net 28 MJ, wet mass 1 kg
- polyethylene, high density, granulate: 0.00024899 kg; lognormal variance with pedigree 0.31529, pedigree (1,1,2,1,1)
  for residual material landfill infrastructure
  properties: carbon content, fossil 0.857143, dry mass 1 kg, heating value, net 42.47 MJ, wet mass 1 kg
- polypropylene, granulate: 8.1981e-7 kg; lognormal variance with pedigree 0.31529, pedigree (1,1,2,1,1)
  for residual material landfill infrastructure
  properties: carbon content, fossil 0.857143, dry mass 1 kg, heating value, net 32.78 MJ, wet mass 1 kg
  note on heating value, net: Value extracted from "treatment of waste polypropylene, open burning"
- polyvinylchloride, bulk polymerised: 8.1981e-7 kg; lognormal variance with pedigree 0.31529, pedigree (1,1,2,1,1)
  for residual material landfill infrastructure
  properties: carbon content, fossil 0.387097, dry mass 1 kg, heating value, net 21.5 MJ, wet mass 1 kg
- reinforcing steel: 2.9923e-5 kg; lognormal variance with pedigree 0.31529, pedigree (1,1,2,1,1)
  for residual material landfill infrastructure
  properties: carbon content, fossil 0.004, dry mass 1 kg, wet mass 1 kg
- sand: 3.47377e-6, 0.000226058, 1.80342e-8 kg (3 suppliers, which the file names only by identifier); sum of these 0.00022955 kg; lognormal variance with pedigree 0.31529, pedigree (1,1,2,1,1)
  for residual material landfill infrastructure
  properties: dry mass 1 kg, wet mass 1 kg
- steel, chromium steel 18/8, hot rolled: 1.0384e-5 kg; lognormal variance with pedigree 0.31529, pedigree (1,1,2,1,1)
  for residual material landfill infrastructure
  properties: carbon content, fossil 0.0008, dry mass 1 kg, wet mass 1 kg
- synthetic rubber: 2.7327e-7 kg; lognormal variance with pedigree 0.31529, pedigree (1,1,2,1,1)
  for residual material landfill infrastructure
  properties: carbon content, fossil 0.871949, dry mass 1 kg, heating value, net 26.42 MJ, wet mass 1 kg
- tap water: 1.29526e-5, 1.97452e-5, 3.68435e-5, 9.92536e-5, 1.19475e-5, 0.000497895, 0.00569766 kg (7 suppliers, which the file names only by identifier); sum of these 0.0063763 kg; lognormal variance with pedigree 0.31529, pedigree (1,1,2,1,1)
  for residual material landfill infrastructure
  properties: carbon content, fossil 0.00178991, dry mass 0.000337476 kg, water content 2962.17, wet mass 1 kg
- waste cement, hydrated: -1 kg; lognormal variance with pedigree 0.004734, pedigree (1,1,1,1,1)
  hydrated cement output for solidification of landfilled residual material
  production volume
    calculated in proportion to reference product waste input to incinerator
  properties: dry mass 1 kg, wet mass 1 kg

## Inputs from nature
- Waste mass, total, placed in landfill [inventory indicator, waste]: 1 kg; lognormal variance with pedigree 0.0002, pedigree (1,1,2,1,1)
  waste mass placed in residual material landfill (for ecoscarcity LCIA only)
- Occupation, construction site [natural resource, land]: 0.00028571 m2*year; lognormal variance with pedigree 0.21182, pedigree (1,1,2,1,1)
  for residual material landfill construction
- Occupation, dump site [natural resource, land]: 0.0017143 m2*year; lognormal variance with pedigree 0.21182, pedigree (1,1,2,1,1)
  for residual material landfill area during operation
- Occupation, shrub land, sclerophyllous [natural resource, land]: 0.00028571 m2*year; lognormal variance with pedigree 0.21182, pedigree (1,1,2,1,1)
  for residual material landfill area initial aftercare recultivation
- Occupation, traffic area, road network [natural resource, land]: 0.0025714 m2*year; lognormal variance with pedigree 0.21182, pedigree (1,1,2,1,1)
  for access road of residual material landfill during construction, operation, and aftercare
- Transformation, from dump site [natural resource, land]: 5.7143e-5 m2; lognormal variance with pedigree 0.53191, pedigree (1,1,2,1,1)
  for residual material landfill area initial aftercare recultivation
- Transformation, from pasture, man made [natural resource, land]: 9.1429e-5 m2; lognormal variance with pedigree 0.53191, pedigree (1,1,2,1,1)
  for residual material landfill and access road
- Transformation, from shrub land, sclerophyllous [natural resource, land]: 5.7143e-5 m2; lognormal variance with pedigree 0.53191, pedigree (1,1,2,1,1)
  for residual material landfill area initial aftercare recultivation
- Transformation, from traffic area, road network [natural resource, land]: 3.4286e-5 m2; lognormal variance with pedigree 0.53191, pedigree (1,1,2,1,1)
  for recultivation of access road of residual material landfill after aftercare period
- Transformation, to dump site [natural resource, land]: 5.7143e-5 m2; lognormal variance with pedigree 0.53191, pedigree (1,1,2,1,1)
  for residual material landfill area
- Transformation, to forest, unspecified [natural resource, land]: 5.7143e-5 m2; lognormal variance with pedigree 0.53191, pedigree (1,1,2,1,1)
  for residual material landfill area aftercare recultivation
- Transformation, to pasture, man made [natural resource, land]: 3.4286e-5 m2; lognormal variance with pedigree 0.53191, pedigree (1,1,2,1,1)
  for recultivation of landfill and access road of residual material landfill after aftercare period
- Transformation, to shrub land, sclerophyllous [natural resource, land]: 5.7143e-5 m2; lognormal variance with pedigree 0.53191, pedigree (1,1,2,1,1)
  for residual material landfill area initial aftercare recultivation
- Transformation, to traffic area, road network [natural resource, land]: 3.4286e-5 m2; lognormal variance with pedigree 0.53191, pedigree (1,1,2,1,1)
  for access road of residual material landfill

## Emissions to nature
- Heat, waste [air, urban air close to ground]: 3.0857e-5 MJ; lognormal variance with pedigree 0.012648, pedigree (1,1,2,1,1)
  from electricity consumption in residual material landfill operation
- Hazardous waste disposed [inventory indicator, waste]: 1 kg; lognormal variance with pedigree 0.0002, pedigree (1,1,2,1,1)
  EN15804 waste mass in residual material landfill
- Aluminium III [water, ground-, long-term]: 0.0097756 kg; lognormal variance with pedigree 0.38871, pedigree (1,1,2,1,1)
  emissions to groundwater in residual material landfill
- Aluminium III [water, surface water]: 1.632e-5 kg; lognormal variance with pedigree 0.96403, pedigree (1,1,2,1,1)
  emissions to surface water in residual material landfill
- Arsenic ion [water, ground-, long-term]: 6.1738e-7 kg; lognormal variance with pedigree 1.6303, pedigree (1,1,2,1,1)
  emissions to groundwater in residual material landfill
- Arsenic ion [water, surface water]: 6.0944e-9 kg; lognormal variance with pedigree 1.922, pedigree (1,1,2,1,1)
  emissions to surface water in residual material landfill
- Barium II [water, ground-, long-term]: 2.0004e-5 kg; lognormal variance with pedigree 1.9174, pedigree (1,1,2,1,1)
  emissions to groundwater in residual material landfill
- Barium II [water, surface water]: 3.3395e-8 kg; lognormal variance with pedigree 1.758, pedigree (1,1,2,1,1)
  emissions to surface water in residual material landfill
- Boron [water, ground-, long-term]: 6.5833e-6 kg; lognormal variance with pedigree 1.3121, pedigree (1,1,2,1,1)
  emissions to groundwater in residual material landfill
- Boron [water, surface water]: 6.1014e-7 kg; lognormal variance with pedigree 1.4466, pedigree (1,1,2,1,1)
  emissions to surface water in residual material landfill
- Cadmium II [water, ground-, long-term]: 2.906e-7 kg; lognormal variance with pedigree 1.922, pedigree (1,1,2,1,1)
  emissions to groundwater in residual material landfill
- Cadmium II [water, surface water]: 4.8513e-10 kg; lognormal variance with pedigree 1.922, pedigree (1,1,2,1,1)
  emissions to surface water in residual material landfill
- Calcium II [water, ground-, long-term]: 0.0056731 kg; lognormal variance with pedigree 0.7197, pedigree (1,1,2,1,1)
  emissions to groundwater in residual material landfill
- Calcium II [water, surface water]: 9.4709e-6 kg; lognormal variance with pedigree 1.0383, pedigree (1,1,2,1,1)
  emissions to surface water in residual material landfill
- Cobalt II [water, ground-, long-term]: 5.0403e-7 kg; lognormal variance with pedigree 1.772, pedigree (1,1,2,1,1)
  emissions to groundwater in residual material landfill
- Cobalt II [water, surface water]: 8.4145e-10 kg; lognormal variance with pedigree 1.922, pedigree (1,1,2,1,1)
  emissions to surface water in residual material landfill
- Iron ion [water, ground-, long-term]: 0.0001949 kg; lognormal variance with pedigree 1.922, pedigree (1,1,2,1,1)
  emissions to groundwater in residual material landfill
- Iron ion [water, surface water]: 3.2537e-7 kg; lognormal variance with pedigree 1.481, pedigree (1,1,2,1,1)
  emissions to surface water in residual material landfill
- Magnesium [water, ground-, long-term]: 0.007385 kg; lognormal variance with pedigree 0.73283, pedigree (1,1,2,1,1)
  emissions to groundwater in residual material landfill
- Magnesium [water, surface water]: 1.2329e-5 kg; lognormal variance with pedigree 1.0106, pedigree (1,1,2,1,1)
  emissions to surface water in residual material landfill
- Silicon [water, ground-, long-term]: 0.12752 kg; lognormal variance with pedigree 0.100162, pedigree (1,1,2,1,1)
  emissions to groundwater in residual material landfill
- Silicon [water, surface water]: 0.00058293 kg; lognormal variance with pedigree 0.56034, pedigree (1,1,2,1,1)
  emissions to surface water in residual material landfill
- Silver I [water, ground-, long-term]: 5.8117e-8 kg; lognormal variance with pedigree 1.922, pedigree (1,1,2,1,1)
  emissions to groundwater in residual material landfill
- Silver I [water, surface water]: 9.7023e-11 kg; lognormal variance with pedigree 1.922, pedigree (1,1,2,1,1)
  emissions to surface water in residual material landfill
- Sulfate [water, ground-, long-term]: 0.079119 kg; lognormal variance with pedigree 0.24733, pedigree (1,1,2,1,1)
  emissions to groundwater in residual material landfill
- Sulfate [water, surface water]: 0.0066836 kg; lognormal variance with pedigree 0.38976, pedigree (1,1,2,1,1)
  emissions to surface water in residual material landfill
- Titanium ion [water, ground-, long-term]: 0.01879 kg; lognormal variance with pedigree 1.1011, pedigree (1,1,2,1,1)
  emissions to groundwater in residual material landfill
- Titanium ion [water, surface water]: 3.137e-5 kg; lognormal variance with pedigree 0.94171, pedigree (1,1,2,1,1)
  emissions to surface water in residual material landfill
