# esterquat production, from coconut oil and palm kernel oil

Dataset: EcoSpold 2, unit process
Geography: RoW
Time period: 1992-01-01 to 2023-12-31
Technology level: current
Classification: ISIC rev.4 ecoinvent: 2023:Manufacture of soap and detergents, cleaning and polishing preparations, pe
Classification: EcoSpold01Categories: washing agents/tensides
Tags: ConvertedDataset
Scenario: Business-as-Usual
System model: Allocation, cut-off by classification
Generated by: Rainer Zah
Published in: Zah R. 2007
Database: ecoinvent
isCopyrightProtected: true
accessRestrictedTo: 1

## General comment
data based on the ECOSOL study of the European surfactant industry. Allocations in multioutput processes were made, using the relative mass outputs of products.
[This dataset was already contained in the ecoinvent database version 2. It was not individually updated during the transfer to ecoinvent version 3. Life Cycle Impact Assessment results may still have changed, as they are affected by changes in the supply chain, i.e. in other datasets. This dataset was generated following the ecoinvent quality guidelines for version 2. It may have been subject to central changes described in the ecoinvent version 3 change report (http://www.ecoinvent.org/database/ecoinvent-version-3/reports-of-changes/), and the results of the central updates were reviewed extensively. The changes added e.g. consistent water flows and other information throughout the database. The documentation of this dataset can be found in the ecoinvent reports of version 2, which are still available via the ecoinvent website. The change report linked above covers all central changes that were made during the conversion process.]

## Included activities end
This module contains material and energy input, production of waste and emissions for the production of esterquat out of palm and coconut oil. Transports and infrastructure have been estimated. No water consumption and no process emissions are included.

## Geography
Data based on the European esterquat production

## Technology
Average technology for the production of esterquat out of palm kernel oil and coconut oil by esterification with triethanolamine and quaternication with DMS. Data representing typical European production mix in the mid 90s.

## Time period
data of published literature

## Parameters
- fraction, process water, to air: 0.4 dimensionless; name fraction_PW_to_air; lognormal variance with pedigree 0.092025, pedigree (4,4,3,2,4)

## Reference product
- esterquat: 1 kg; By-product classification allocatable product; CPC 35310: Organic surface active agents, except soap; HS2017 340213: Organic surface-active agents; non-ionic (other than soap), whether or not put up for retail sale
  EcoSpold01Location=RER
  production volume 1.22219e8 kg
    38% of total esterquat production is assumed to come from coconut and palm kernel oil. Total production volume is from year 2000 for Western Europe (151000000 kg; http://www.cefic.org/files/Publications/cesio_5.pdf) extrapolated by GDP to World 2005 with factor 3.2
  property carbon content, fossil 0.196746
    Esterquats are produced by esterification with triethanolamine and quaternication with DMS (ecoinvent v2.2 report 12-part 4). An average esterquat (Ester Quats: the novel class of cationic fabric softeners, Mishra, S. et al., 2007, Journal of Oleo Science, 56:269-276) can be resumed in the formula C41H82NO5. C6 of this molecule come from TEA, and C1 from DMS, so are fossile. The rest C34, are biogenic, coming from the fatty acid. The esterquat is in an 15% Isopropanol solution. Isopropanol is C3H8O, and C3 have a fossile origin.
  property carbon content, non-fossil 0.518779
    Esterquats are produced by esterification with triethanolamine and quaternication with DMS (ecoinvent v2.2 report 12-part 4). An average esterquat (Ester Quats: the novel class of cationic fabric softeners, Mishra, S. et al., 2007, Journal of Oleo Science, 56:269-276) can be resumed in the formula C41H82NO5. C6 of this molecule come from TEA, and C1 from DMS, so are fossile. The rest C34, are biogenic, coming from the fatty acid. The esterquat is in an Isopropanol solution (15% isopropanol). Isopropanol is C3H8O, and C3 have a fossile origin.
  property heating value, net 21.68 MJ
    LHV is calculated based on the Carbon content of the product. More details can be found on the respective documentation.
  property price 2.16 EUR2005
    Temporary price data. Calculated as 90% of purchasers price based on: 2005 import and export prices (total trades (USD) divided by total weight (kg) in biggest economies of the world: EU27, USA, Brasil, China, India, Japan and Russia) from UN Commodity Trade Statistics Database (http://data.un.org/Explorer.aspxDatabase [Accessed 2011.06.20]). Commodity: Quarternary ammonium salts and hydroxides, nes
  properties: carbon allocation 0.715525 kg, carbon content 0.715525, dry mass 1 kg, water content 0, water in wet mass 0 kg, wet mass 1 kg

## Inputs from technosphere
- chemical factory, organics: 4e-10 unit; lognormal variance with pedigree 0.3632, pedigree (2,3,5,5,1)
  EcoSpold01Location=RER
- coconut oil, crude: 0.3 kg; lognormal variance with pedigree 0.0632, pedigree (2,3,5,5,1)
  EcoSpold01Location=PH
  properties: carbon content, non-fossil 0.75, dry mass 1 kg, heating value, net 38.4 MJ, wet mass 1 kg
  note on carbon content, non-fossil: C-content/dry mass of fats and oils considered 75%, from: "Evolutionary and Biochemical Aspects", A.D. Kay and T. Vrede (in Global Ecology, 2010, Elsevier B.V., S.E. Jørgensen Ed.)
  note on heating value, net: Values is approximated from HHV from "vegetable oil, crude". Source: Radovanovic,M.; Zivanovic,T.; Stojiljkovic,D.; Jovanovic,V.; Jerinic,N.; Knezevic,S. et.al. Utilization of sunflower husk as a fuel for industrial boilers - 20 years experience. Proc. 5th Eur. Conf. on Industrial Furnaces&Boilers 2000,vol.2,p.221-233. Available at: https://phyllis.nl/Biomass/View/2152
- dimethyl sulfate: 0.13 kg; lognormal variance with pedigree 0.0632, pedigree (2,3,5,5,1)
  EcoSpold01Location=RER
  properties: carbon content, fossil 0.190476, dry mass 1 kg, heating value, net 11.54 MJ, wet mass 1 kg
- electricity, medium voltage: 0.000566579, 0.011302, 0.00379743, 0.000173506, 3.4727e-5, 7.45668e-6, 0.00116711 kWh (7 suppliers, which the file names only by identifier); sum of these 0.0170488 kWh; lognormal variance with pedigree 0.0632, pedigree (2,3,5,5,1)
- heat, district or industrial, natural gas: 0.0259252, 1.57767 MJ (2 suppliers, which the file names only by identifier); sum of these 1.6036 MJ; lognormal variance with pedigree 0.0632, pedigree (2,3,5,5,1)
  properties: heating value, net 1 MJ
- heat, district or industrial, other than natural gas: 0.894648, 0.000414474 MJ (2 suppliers, which the file names only by identifier); sum of these 0.895062 MJ; lognormal variance with pedigree 0.0632, pedigree (2,3,5,5,1)
  properties: heating value, net 1 MJ
- isopropanol: 0.15 kg; lognormal variance with pedigree 0.0632, pedigree (2,3,5,5,1)
  EcoSpold01Location=RER
  properties: carbon content, fossil 0.6, dry mass 1 kg, heating value, net 34.3 MJ, wet mass 1 kg
- nitrogen, liquid: 0.0028 kg; lognormal variance with pedigree 0.0632, pedigree (2,3,5,5,1)
  EcoSpold01Location=RER
  properties: dry mass 1 kg, wet mass 1 kg
- palm kernel oil, crude: 0.3 kg; lognormal variance with pedigree 0.0632, pedigree (2,3,5,5,1)
  EcoSpold01Location=MY
  properties: carbon content, non-fossil 0.725581, dry mass 1 kg, heating value, net 37 MJ, wet mass 1 kg
  note on carbon content, non-fossil: C13H27O2. Palm kernel oil (tab 17.4, ecoinvent v2.2 report 17-part 17)
  note on heating value, net: Literature value, Source: Biograce, Condensed list of standard values, version 2 - Public. Available at: https://biograce.net/app/webroot/files/file/BioGrace_condensed_list_of_standard_values_-_version_2_-_Public.doc
- triethanolamine: 0.17 kg; lognormal variance with pedigree 0.0632, pedigree (2,3,5,5,1)
  EcoSpold01Location=RER
  properties: carbon content, fossil 0.483221, dry mass 1 kg, heating value, net 26.82 MJ, wet mass 1 kg
- wastewater, average: -0.000259078, -9.22415e-7 m3 (2 suppliers, which the file names only by identifier); sum of these -0.00026 m3; lognormal variance with pedigree 0.0252, pedigree (2,3,3,5,1)
  production volume
    Calculated from the production volume of esterquat in proportion to the respective output amounts.
  properties: carbon content, non-fossil 0.194039, dry mass 0.346837 kg, water content 2882.2, wet mass 1000 kg
  note on carbon content, non-fossil: 0.0673 kg TOC/m3 (Tab A.17, ecoinvent v2.2 report 13_I). TOC was considered as Total Carbon.

## Inputs from nature
- Water, unspecified natural origin [natural resource, in water]: 0.179 m3; name water_UNO_input; source EMPA - Swiss Federal Laboratories for Ma 1999; lognormal variance with pedigree 0.0546, pedigree (3,3,5,5,1)
  Calculated based on literature, (Vionnet, S., Quantis Water Database - Technical Report, 2012). Technology: fatty acid from coconut/palm kernel oil; esterification of triethanolamine, quaternization with DMS.
  property carbon content, fossil 0.0104329; name C_content_fossil
  property carbon content, non-fossil 0; name C_content_non_fossil
  property dry mass 0.1101 kg; name DM
  property water content 9081.65; name water_content
  property water in wet mass 999.89 kg; name WWM
  property wet mass 1000 kg; name WM

## Emissions to nature
- Water [air, unspecified]: 0.0716 m3; name water_to_air_unspecified; lognormal variance with pedigree 0.0827, pedigree (2,2,5,5,1)
  Calculated value based on literature values and expert opinion. See comments in the parametres' comment field.
  property fraction, origin: fresh water 0; name fraction_origin_fresh_water
  property fraction, origin: salt water 0; name fraction_origin_salt_water
  property fraction, origin: unspecified 1; name fraction_origin_unspecified
- Water [water, unspecified]: 0.1074 m3; name water_to_water_unspecified; lognormal variance with pedigree 0.0827, pedigree (2,2,5,5,1)
  (same comment as for Water)
  property fraction, origin: fresh water 0; name fraction_origin_fresh_water_Ww
  property fraction, origin: salt water 0; name fraction_origin_salt_water_Ww
  property fraction, origin: unspecified 1; name fraction_origin_unspecified_Ww

## Sampling procedure
data out of ECOSOL study of European Surfactant Industry. Common translation rules used, reported in Chemical report (Althaus et al. 2003).

## Extrapolations
see technology This dataset has been copied from an original dataset covering the geography RER. The uncertainty has been adjusted accordingly.

## Review by Heiko Kunst 2003-07-04
Passed.
