# 1,3-dichloropropene to generic market for pesticide, unspecified

Dataset: EcoSpold 2, unit process
Geography: GLO
Time period: 2012-01-01 to 2023-12-31
Technology level: current
Classification: ISIC rev.4 ecoinvent: 2011:Manufacture of basic chemicals
Synonyms: 1,3-D; 1,3-dichloro-1-propene; 1,3-dichloropropylene; DCP; 3-chloroorpropenyl chloride; 1,3-dichloro-2-propene; 3-chloroallyl chloride; dichloro-1,3-propene
Scenario: Business-as-Usual
System model: Allocation, cut-off by classification
Generated by: Sofia Parada Tur
Database: ecoinvent
isCopyrightProtected: true
accessRestrictedTo: 1

## General comment
This is a linking activity which links the product dichloropropene to the generic market for pesticide, unspecified. All chemicals that enter this market provide the function of a pesticide.

## Included activities start
The activity starts with the reception of dichloropropene

## Included activities end
The activity ends with the production of pesticide, unspecified

## Geography
1,3-dichloropropene is used as a pesticide in the United States, Europe, Japan, the Philippines, and Africa. It is phased out in the EU (http://eur-lex.europa.eu/LexUriServ/site/en/oj/2007/l_249/l_24920070925en00110013.pdf).

## Reference product
- pesticide, unspecified: 1 kg; By-product classification allocatable product; CPC 3466: Insecticides, fungicides, herbicides and disinfectants; HS2017 290339: Fluorinated, brominated or iodinated derivatives of acyclic hydrocarbons; other than ethylene dibromide (IS[...]
  production volume 4.972e7 kg; name dichloropropene_PV; = 550000000*0.113*0.8
    The production volume of dichloropropene is calculated from the global production of allyl chloride, in which dichloropropene is a byproduct. For 1 kg of allyl chloride, 0.113 kg dichloropropene are produced (see dataset "allyl chloride production".
    550000000 kg of allyl chloride are produced annually. Data retrived from "Acute exposure guideines level (AEGLs) FOR ALLYL CHLORIDE 107-05-1" (EPA, 2008) . Document refers to data from 1993(http://www.epa.gov/oppt/aegl/pubs/allyl_chloride.pdf, accessed 20150928)
    The main use of dichloropropene is as pesticide. Much smaller quantities are used as solvent and chemical intermediate. (http://www.atsdr.cdc.gov/toxprofiles/tp40.pdf). It is therefore assumed that 80% is used as a pesticide.
  property price 6.75642 EUR2005
    Calculated value based on data from United Nations Commodity Trade Statistics Database (comtrade.un.org). UN comtrade category: 3808 Insecticides, rodenticides, fungicides, herbicides, anti-sprouting products, plant growth regulators, disinfectants and the like, put up in forms or packings for retail sale or as preparations or articles. Average of years 2015-2019. Average of price of import into 5 main markets (EU, US, JP, CN and BR, based on OEC, https://oec.world/en/profile/hs/pesticides). Last accessed 2022-08-16.
    The prices were converted to EUR based on the annual exchange rates published by the European Central Bank (https://sdw.ecb.europa.eu/quickview.do?SERIES_KEY=120.EXR.A.USD.EUR.SP00.A, last accessed on 2022-02-15) and adjusted for inflation relative to 2005 using the producer price index (PPI) of the euro area, published by eurostat (https://appsso.eurostat.ec.europa.eu/nui/show.do?dataset=sts_inpp_a&lang=en, last accessed on 2022-05-04).
  properties: carbon allocation 0.486978 kg, carbon content 0.486978, carbon content, fossil 0.486978, carbon content, non-fossil 0, dry mass 1 kg, water content 0, water in wet mass 0 kg, wet mass 1 kg

## Inputs from technosphere
- 1,3-dichloropropene: 1 kg; lognormal variance with pedigree 0.0126, pedigree (1,4,4,5,1)
  properties: carbon content, fossil 0.325, dry mass 1 kg, heating value, net 14.21 MJ, wet mass 1 kg
  note on carbon content, fossil: Elemental content on a dry mass basis, calculated for the formula C3H4Cl2.

## Review by Bo Weidema 2012-05-15
Dichloropropene is used as a soil fumigant. The reason for placing the dichloropropene on the generic market for pesticides is that it is a by-product of allyl chloride production (0.113 kg per kg of allyl chloride). Considering that allyl chloride production is 800 Mkg per year (Ullmanns), a production of 90.4 E6 kg dichloropropene results, which will be cleared on the generic market for pesticides (a more specific substitution may be modelled if data become available. Dichloropropene is itself - together with chloropicrin and dazomet - used as a substitute for methyl bromine which is being phased out).
