# plug production, inlet and outlet, for computer cable

Dataset: EcoSpold 2, unit process
Geography: GLO
Time period: 2000-01-01 to 2023-12-31
Technology level: current
Classification: ISIC rev.4 ecoinvent: 2610:Manufacture of electronic components and boards
Classification: EcoSpold01Categories: electronics/component
Synonyms: Female; Male; Connector
Tags: ConvertedDataset
Scenario: Business-as-Usual
System model: Allocation, cut-off by classification
Generated by: Martin Lehmann
Published in: Hischier R. 2007
Database: ecoinvent
isCopyrightProtected: false
accessRestrictedTo: 1

## General comment
This dataset represents the production of 1 unit of a typical set of plugs (inlet and outlet) for an electric computer power cord. It is based on a inlet plug (with pins)with a weight of 0.0293 kg and 0.0292 kg for the outlet plug. Main data are based on weighting and calculations of a Swiss type computer cable at EMPA la-boratories, supported by EPD information.
[This dataset was already contained in the ecoinvent database version 2. It was not individually updated during the transfer to ecoinvent version 3. Life Cycle Impact Assessment results may still have changed, as they are affected by changes in the supply chain, i.e. in other datasets. This dataset was generated following the ecoinvent quality guidelines for version 2. It may have been subject to central changes described in the ecoinvent version 3 change report (http://www.ecoinvent.org/database/ecoinvent-version-3/reports-of-changes/), and the results of the central updates were reviewed extensively. The changes added e.g. consistent water flows and other information throughout the database. The documentation of this dataset can be found in the ecoinvent reports of version 2, which are still available via the ecoinvent website. The change report linked above covers all central changes that were made during the conversion process.]

## Included activities start
From reception of metal and plastic materials at the factory gate.

## Included activities end
This dataset includes PVC, HDPE, brass, and copper with their respective manufacturing processes, infrastructure, electricity for the assembly of the plugs, road and rail transportation for input materials from the regional storage to the production site. Water input, emissions and waste are attributed to the electric cable represented in a different dataset.

## Geography
The data describes a typical set of plugs for a computer cable in 2006. Plugs and cable are produced by international manufacturers and available all over the world. Therefore a global dataset is justifiable.

## Technology
The manufacturing process is inventoried through wire drawing, injection moulding, contouring (brass), and tin coating (of copper wire).

## Reference product
- plug, inlet and outlet, for computer cable: 1 unit; By-product classification allocatable product; CPC 45290: Parts and accessories of computing machines; HS2017 847340: Machinery; parts and accessories (other than covers, carrying cases and the like) of the machines of headin[...]
  A computer power cable is a cable that temporarily connects an electrical appliance to an electrical power source. The term is generally used for cables using a power plug to connect to a single-phase alternating current power source at "mains voltage" (100 to 240 volts, depending on the location). The term ‘cord set’ is also used to distinguish those cords that include connectors molded to the cord at each end. Power cords from those countries that use 110 V mains supply (mainly the United States, Canada, parts of South America and Japan) tend to be bulkier than the mains cables used in the rest of the world, because of the higher currents required to deliver the same power (watts) at 110 V compared to 230 V.
  Power cables may be either fixed or detachable from the appliance. In the case of detachable leads (plugs), the appliance end of the power cord has a socket (female connector) rather than a plug (male connector) to link it to the appliance, to avoid the dangers from having a live protruding pin. Cords may also have twist-locking features, or other attachments to prevent accidental disconnection at one or both ends
  EcoSpold01Location=GLO
  production volume 1 unit
    Unknown
    Dummy value to be replaced by measured, estimated or calculated value
  property carbon content, fossil 0.3397
    Calculated as the addition of C contents in the product composition
  property price 0.720896 EUR2005
    Calculated based on inputs: The price of the product has been calculated as a sum of the values of the material and energy inputs for this product. This value is therefore a rough estimation. It may underestimate the real price since there are additional expenses when producing any product. These expences can include for example labour costs, treatment of waste materials and profit for the producer. Please consider carefully whether this level of data quality is acceptable for your application.
  properties: carbon allocation 0.0198724 kg, carbon content 0.3397, carbon content, non-fossil 0, dry mass 0.0585 kg, water content 0, water in wet mass 0 kg, wet mass 0.0585 kg

## Inputs from technosphere
- brass: 0.0100992, 5.075e-5 kg (2 suppliers, which the file names only by identifier); sum of these 0.01015 kg; lognormal variance with pedigree 0.0527, pedigree (2,4,5,3,1)
  Measured Value, in the Empa laboratories.
  EcoSpold01Location=CH
  properties: dry mass 1 kg, wet mass 1 kg
- contouring, brass: 0.01015 kg; lognormal variance with pedigree 0.0527, pedigree (2,4,5,3,1)
  Measured Value, in the Empa laboratories.
  EcoSpold01Location=RER
  properties: dry mass 0.039644 kg, wet mass 0.039644 kg
- copper, cathode: 0.003225 kg; lognormal variance with pedigree 0.0521, pedigree (1,4,5,3,1)
  Measured Value, in the Empa laboratories.
  EcoSpold01Location=RER
  properties: dry mass 1 kg, wet mass 1 kg
- electricity, medium voltage: 0.0014755 kWh; source Draka 2004; lognormal variance with pedigree 0.0527, pedigree (2,4,5,3,1)
  Estimation, based on literature.
  Further references:
  Nichigoh (2006) Environmental Product Declaration for Wire and Cable World Wide Standard Cable ECO-FLEX Series from <http://www.jia-page.or.jp/jia/epd/directory/nichigoh/nichigoh_e.pdf>.
  EcoSpold01Location=UCTE
- injection moulding: 0.04512 kg; lognormal variance with pedigree 0.0527, pedigree (2,4,5,3,1)
  Measured Value, in the Empa laboratories.
  EcoSpold01Location=RER
- polyethylene, high density, granulate: 0.00512 kg; lognormal variance with pedigree 0.0527, pedigree (2,4,5,3,1)
  EcoSpold01Location=RER
  Measured Value, in the Empa laboratories.
  properties: carbon content, fossil 0.857143, dry mass 1 kg, heating value, net 42.47 MJ, wet mass 1 kg
  note on carbon content, fossil: Polyethylene is formed out of a huge amount of ethylene monomers (C2H4) (ecoinvent v2.2 report 11_II). MW=28 g/mol
- polyvinylchloride, emulsion polymerised: 0.0051064 kg; lognormal variance with pedigree 0.0527, pedigree (2,4,5,3,1)
  EcoSpold01Location=RER
  Measured Value, in the Empa laboratories.
  properties: carbon content, fossil 0.387097, dry mass 1 kg, heating value, net 21.5 MJ, wet mass 1 kg
  note on carbon content, fossil: Monomer is vynyl chloride, C2H3Cl (ecoinvent v2.2 report 11_II). MW=62 g/mol
- polyvinylchloride, suspension polymerised: 0.0348936 kg; lognormal variance with pedigree 0.0527, pedigree (2,4,5,3,1)
  EcoSpold01Location=RER
  Measured Value, in the Empa laboratories.
  properties: carbon content, fossil 0.387097, dry mass 1 kg, heating value, net 21.5 MJ, wet mass 1 kg
- printed wiring board mounting facility: 1.2168e-8 unit; lognormal variance with pedigree 0.3527, pedigree (2,4,5,3,1)
  EcoSpold01Location=GLO
  Proxy, infrastructure for printed wiring board is used.
- wire drawing, copper: 0.003225 kg; lognormal variance with pedigree 0.0521, pedigree (1,4,5,3,1)
  EcoSpold01Location=RER
  Measured Value, in the Empa laboratories.
- zinc coat, pieces: 0.00040211 m2; lognormal variance with pedigree 0.0521, pedigree (1,4,5,3,1)
  EcoSpold01Location=RER
  Measured Value, in the Empa laboratories.

## Sampling procedure
Weighing and measuring of materials. Literature for electricity consumption (assembly).

## Review by Rolf Frischknecht 2007-11-07
passed

## Review by Roland Hischier 2011-09-22
Transfer of documentation done.
