# treatment of bottom ash, MSWI, waste glass, slag compartment

Dataset: EcoSpold 2, unit process
Geography: GLO
Time period: 1994-01-01 to 2023-12-31
Technology level: current
Classification: ISIC rev.4 ecoinvent: 3821:Treatment and disposal of non-hazardous waste
Scenario: Business-as-Usual
System model: Allocation, cut-off by classification
Generated by: Mattia Clementi
Database: ecoinvent
isCopyrightProtected: true
accessRestrictedTo: 1

## General comment
The process represents the treatment of controlled landfilling in slag compartment of a waste (bottom ash) that is exclusively generated in another waste treatment. Bottom ash is the by-product that is generated during the municipal solid waste incineration (MSWI) of 'waste glass'. Recommended use of this dataset: to be used within the specific chain of treatments for 'waste glass'. Share of biogenic carbon in the sludge: 0%.

## Included activities start
The activity starts with the waste being available at the gate of the treatment facility. Collection and transportation of the waste to the treatment plant is not included.

## Included activities end
The activity ends with the waste being treated and waste-specific emissions from the slag compartment landfill are released to water (short-term emissions to surface water and long-term emissions to ground water).

## Geography
Modelling parameters affecting the treatment technology are not specific to this geography.

## Technology
Slag compartment for bottom ash from incineration with base seal and leachate collection system (Landfill type D). Recultivation after closure.

## Reference product
- bottom ash, MSWI, waste glass: -1 kg; By-product classification Waste; CPC 3932: Ash and residue (except from the manufacture of iron or steel), containing metals or metallic compounds, except[…]; HS2017 262110: Slag and ash; ash and residues from the incineration of municipal waste
  main reference product of this activity (supply of disposal service).
  production volume 1.73442e10 kg
    calculated in proportion to incinerated waste reference product
  property price 0 EUR2005
    Waste products are assigned a price of zero as they are assumed to require further treatment.
  properties: calcium content 0.0760269, carbon allocation 0 kg, carbon content 0, carbon content, fossil 0, carbon content, non-fossil 0, chlorine content 0.000204523, chromium content 0.000317011, copper content 8.18092e-6, dry mass 0.828338 kg, lead content 4.03933e-5, oxygen content 0.481171, silicon content 0.374915, sodium content 0.0673129, water content 0.207237, water in wet mass 0.171662 kg, wet mass 1 kg, zinc content 4.09046e-6

## Inputs from technosphere
- process-specific burdens, slag landfill: 0.00841689, 0.280494, 0.71109 kg (3 suppliers, which the file names only by identifier); sum of these 1 kg
  mass-specific expenditures required for landfilling of bottom ash.
- slag landfill: 1.7778e-9 unit
  slag compartment infrastructure required for landfilling of bottom ash.

## Inputs from nature
- Waste mass, total, placed in landfill [inventory indicator, waste]: 1 kg
  Mass of waste initially put in a slag compartment. The exchange represents a flow that is within the technosphere. This exchange should only be used to apply ecofactors for the Swiss LCIA method of Ecological Scarcity and not any other purpose.

## Emissions to nature
- Non-hazardous waste disposed [inventory indicator, waste]: 1 kg
  Inventory indicator for waste mass disposed. To be used in EN15804 "other data" results.
- Calcium II [water, ground-, long-term]: 0.062701 kg; lognormal variance with pedigree 0.18059, pedigree (1,1,5,1,1)
  complement of long-term emissions from incinerator bottom ash in slag compartment
  Uncertainty: Uncertainty calculated from uncertainty of composition of incinerated waste, and incinerator model uncertainty and slag compartment transfer coefficient uncertainty.
- Calcium II [water, surface water]: 0.00027479 kg; lognormal variance with pedigree 0.64597, pedigree (1,1,5,1,1)
  short-term emissions from incinerator bottom ash in slag compartment
  Uncertainty: Uncertainty calculated from uncertainty of composition of incinerated waste, and incinerator model uncertainty and slag compartment transfer coefficient uncertainty.
- Chloride [water, ground-, long-term]: 2.3076e-5 kg; lognormal variance with pedigree 0.92205, pedigree (1,1,5,1,1)
  (same comment as for Calcium II)
- Chloride [water, surface water]: 0.00014634 kg; lognormal variance with pedigree 0.90329, pedigree (1,1,5,1,1)
  (same comment as for Calcium II)
- Chromium VI [water, ground-, long-term]: 1.7183e-6 kg; lognormal variance with pedigree 4.1623, pedigree (1,1,5,1,1)
  (same comment as for Calcium II)
- Chromium VI [water, surface water]: 7.5091e-9 kg; lognormal variance with pedigree 1.9657, pedigree (1,1,5,1,1)
  (same comment as for Calcium II)
- Copper ion [water, ground-, long-term]: 6.7763e-6 kg; lognormal variance with pedigree 1.3301, pedigree (1,1,5,1,1)
  (same comment as for Calcium II)
- Copper ion [water, surface water]: 2.3527e-10 kg; lognormal variance with pedigree 2.4257, pedigree (1,1,5,1,1)
  (same comment as for Calcium II)
- Lead II [water, ground-, long-term]: 3.3459e-5 kg; lognormal variance with pedigree 1.1185, pedigree (1,1,5,1,1)
  (same comment as for Calcium II)
- Lead II [water, surface water]: 6.1075e-10 kg; lognormal variance with pedigree 2.299, pedigree (1,1,5,1,1)
  (same comment as for Calcium II)
- Silicon [water, ground-, long-term]: 0.0026572 kg; lognormal variance with pedigree 5.7259, pedigree (1,1,5,1,1)
  (same comment as for Calcium II)
- Silicon [water, surface water]: 1.1459e-5 kg; lognormal variance with pedigree 1.1465, pedigree (1,1,5,1,1)
  (same comment as for Calcium II)
- Sodium I [water, ground-, long-term]: 0.048953 kg; lognormal variance with pedigree 0.19333, pedigree (1,1,5,1,1)
  (same comment as for Calcium II)
- Sodium I [water, surface water]: 0.0068044 kg; lognormal variance with pedigree 0.29541, pedigree (1,1,5,1,1)
  (same comment as for Calcium II)
- Zinc II [water, ground-, long-term]: 3.3882e-6 kg; lognormal variance with pedigree 1.4214, pedigree (1,1,5,1,1)
  (same comment as for Calcium II)
- Zinc II [water, surface water]: 1.0086e-10 kg; lognormal variance with pedigree 2.5373, pedigree (1,1,5,1,1)
  (same comment as for Calcium II)
