# potato production

Dataset: EcoSpold 2, unit process
Geography: CA-QC
Time period: 2010-01-01 to 2023-12-31
Technology level: current
Classification: ISIC rev.4 ecoinvent: 0113:Growing of vegetables and melons, roots and tubers
Synonyms: Solanum tuberosum L.
Scenario: Business-as-Usual
System model: Allocation, cut-off by classification
Share of production covered: 100 %
Generated by: Dominique Maxime
Database: ecoinvent
isCopyrightProtected: true
accessRestrictedTo: 1

## General comment
This dataset represents the production of 1 kg of potatoes (wet mass) in the region of Québec. The 2010-2012 average yield is 30128 kg/ha at a moisture content at storage of 75%.
This activity was adapted to include the country specific average land use change (LUC) emissions according 2nd edition of the Quantis-modified tool developed by Blonk Consultants 'WFLDB-adapted-Blonk 2014 direct-land-use-change-assessment-tool_2015-05-18a.xlsx', tab. 'Country known & land use unknown'. The size of the emission depends on (i) the relative crop expansion in the country during the last 20 years and (ii) the corresponding, country specific land transformations. The current results are based on the average FAOSTAT data (harvested area) of 2009-2011 and 1989-1991. The weighted average is used which takes into account relative difference in crop expansion into primary forest, secondary forest, grassland, perennial and annual land.

## Included activities start
This activity starts with soil cultivation after the harvest of the previous crop.

## Included activities end
This activity ends after harvest at the farm gate.
The dataset includes the inputs of seeds, mineral fertilisers, pesticides and irrigation water and all machine operations and corresponding machine infrastructure and sheds. It is assumed that no organic fertilisers are applied. Machine operations are: soil cultivation, transport of seeds, fertilisers and pesticides to the field (15 km), sowing, fertilisation, weed control, pest and pathogen control, harvesting, transport from field to farm and grading of potatoes. Direct field emissions are also included.
30,5% of potato cropland is irrigated in Québec (Bergeron 2012). The use of car, van or pick-up for servicing people, e.g. from farm to field, is not included in the activities.

## Geography
The inventory is modelled for the region of Québec (Canada).

## Time period
The yield data have been collected for the years 2001-2006.

## Parameters
- LUC_crop_specific: 1 dimensionless
  This parameter allows to switch between a "crop specific" and a "country specific" approach when calculating the LUC of a crop. By default, the chosen approach is "crop specific", so the value of the parameter is 1. If you want to apply a "country specific" approach, turn the parameter to 0.
- fraction, irrigated cropland: 0.305 dimensionless; name fraction_irrigated
  Source: Bergeron, D. (2012). L’irrigation de la pomme de terre au Québec : état de la situation et tendances. Colloque sur la pomme de terre 2012, Centre de Référence en Agriculture et Agroalimentaire du Québec (Ed.). http://www.agrireseau.qc.ca/pdt/documents/Bergeron_Daniel.pdf
- fraction, irrigation water to surface water: 0.2 dimensionless; name fraction_IW_to_surface_water; lognormal variance with pedigree 0.0892, pedigree (4,3,1,4,4)
  Proxy, taken from ecoinvent v3.0 dataset 'potato production, US 2006'. 'Literature value (Döll, 2011) cross referenced with expert opinion.' as cited in original dataset.
- fraction, irrigation water, to air: 0.6165 dimensionless; name fraction_IW_to_air; lognormal variance with pedigree 0.0413, pedigree (2,2,1,4,1)
  Canada-wide value taken from the Quantis Water Database. It might be lower in Quebec due to the more humid climate in Western Canada than in Eastern Canada.
- fraction, irrigation water, to ground water: 0.8 dimensionless; name fraction_IW_to_ground_water; lognormal variance with pedigree 0.0892, pedigree (4,3,1,4,4)
  (same comment as for fraction, irrigation water to surface water)
- fraction, process water to water, to surface water: 0.2 dimensionless; name fraction_PWtoW_to_surface_water; lognormal variance with pedigree 0.0892, pedigree (4,3,1,4,4)
  For agricultural crop dataset, distinction is made between irrigation water and process water. Process water is the water that comes with manure or pesticide application. A fraction of the process water input evaporates to the air and the remaining is considered emitted to surface water and ground water.
  This value is a proxy, taken from ecoinvent v3.0 dataset 'potato production, US 2006'. 'Literature value (Döll, 2011) cross referenced with expert opinion.' as cited in original dataset.
- fraction, process water, to air: 0.6165 dimensionless; name fraction_PW_to_air; lognormal variance with pedigree 0.0413, pedigree (2,2,1,4,1)
  For agricultural crop dataset, distinction is made between irrigation water and process water. Process water is the water that comes with manure or pesticide application. A fraction of the process water input evaporates to the air and the remaining is considered emitted to surface water and ground water.
  By default, the same value as for irrigation is assumed: this is a Canada-wide value taken from database (Vionnet, S., Quantis Water Database - Technical report, 2012). Note that it might be lower in Quebec due to the more humid climate in Western Canada than in Eastern Canada.
- yield, agriculture: 30.128 metric ton/ha; name yield_agriculture; lognormal variance with pedigree 0.0081, pedigree (1,2,1,1,1)
  Amount (wet mass) of harvested potatoes (75% water content) per hectare of cultivated land. See supporting documentation '01 crop production - Québec.pdf' available on ecoinvent reports web page (https://ecoquery.ecoinvent.org/File/Reports).

## Reference product
- potato: 1 kg; name REF_PRODUCT; By-product classification allocatable product; CPC 01510: Potatoes; HS2017 070190: Vegetables; potatoes (other than seed), fresh or chilled
  production volume 5.10092e8 kg
    Potato production, 2010-2012 yearly average, in Québec is: 5,10092E+08 kg. In the World (2010-2012 yr average), it is 3,584261E+11 kg (Source: FAO 2013).
  property carbon content, non-fossil 0.4719; name REF_PRODUCT_C_content_non_fossil
    biogene carbon content on a dry matter basis. Composition data obtained from http://ndb.nal.usda.gov/ndb/search/list (DB number: 11362, Potatoes, raw, skin). First, composition data were refered to 1 kg dry mass. Then, C-contents were calculated considering a C-content/dry mass of 46% in carbohydrates (including fibres), 53% in proteins and 75% in fats. All data from 'Evolutionary and Biochemical Aspects', A.D. Kay and T. Vrede (in Global Ecology, 2010, Elsevier B.V., S.E. Jørgensen Ed.).
  property dry mass 0.25 kg; name REF_PRODUCT_DM; = REF_PRODUCT_WM-REF_PRODUCT_WWM
  property price 0.28 EUR2005
    Calculated value based on data from United Nations Commodity Trade Statistics Database (comtrade.un.org). UN comtrade category: 1701 Potatoes, fresh or chilled. Using exchange rate of 1EURO = 1.209 USD. Average of price of import into 5 main markets (EU, US, JP, IN and CN).
  property water content 3; name REF_PRODUCT_water_content; = REF_PRODUCT_WWM/REF_PRODUCT_DM
  property water in wet mass 0.75 kg; name REF_PRODUCT_WWM
  property wet mass 1 kg; name REF_PRODUCT_WM
  properties: carbon allocation 0.117975 kg, carbon content 0.4719, carbon content, fossil 0

## Inputs from technosphere
- ammonia, anhydrous, liquid: 0.000206147 kg; lognormal variance with pedigree 0.0099, pedigree (2,2,4,1,2)
  Amount is determined from the mineral nutrient actually used for the crop (CECPA, 2011) and from the overall mineral fertilizers sales, by type of fertilizer, in Québec for agriculture (APNC, 2010). See details for disaggregation in supporting documentation '01 crop production - Québec.pdf' available on ecoinvent reports web page (https://ecoquery.ecoinvent.org/File/Reports).
  properties: dry mass 1 kg, wet mass 1 kg
- ammonium nitrate: 0.00293832 kg; lognormal variance with pedigree 0.0099, pedigree (2,2,4,1,2)
  The exchange has been updated from 'ammonium nitrate, as N' into 'ammonium nitrate' and therefore its amount has been scaled (multiplied) from 0.001 kg by 2.8573 kg of 'ammonium nitrate' per kg of 'ammonium nitrate, as N'. Original comment of the exchange is: Amount is determined from the mineral nutrient actually used for the crop (CECPA, 2011) and from the overall mineral fertilizers sales, by type of fertilizer, in Québec for agriculture (APNC, 2010). See details for disaggregation in supporting documentation '01 crop production - Québec.pdf' available on ecoinvent reports web page (https://ecoquery.ecoinvent.org/File/Reports).
  properties: dry mass 1 kg, wet mass 1 kg
- ammonium sulfate: 0.000143592 kg; lognormal variance with pedigree 0.0099, pedigree (2,2,4,1,2)
  (same comment as for ammonia, anhydrous, liquid)
  properties: dry mass 1 kg, wet mass 1 kg
- application of plant protection product, by field sprayer: 2.82e-5 ha; lognormal variance with pedigree 0.0099, pedigree (2,2,4,1,2)
  85% of cropand area receives plant protection products in average. See supporting documentation '01 crop production - Québec.pdf' available on ecoinvent reports web page (https://ecoquery.ecoinvent.org/File/Reports).
- bipyridylium-compound: 2.3898e-5 kg; source BEAUREGARD, G. 2013; lognormal variance with pedigree 0.0186, pedigree (4,4,4,1,1)
  Diquat ion. See supporting documentation '01 crop production - Québec.pdf' available on ecoinvent reports web page (https://ecoquery.ecoinvent.org/File/Reports).
  properties: carbon content, fossil 0.418929, dry mass 1 kg, wet mass 1 kg
  note on carbon content, fossil: C content was calculated after C content of Diquat (C12H12Br2N2). The herbicide Diquat is classified as a bipyridylium-compound in Tab 10.3 in ecoinvent v2.2 report 15a
- borax, anhydrous, powder: 0.00023212 kg; lognormal variance with pedigree 0.0099, pedigree (2,2,4,1,2)
  For boron (B) micro-nutrient supply. Borax (disodium tetraborate) at 21,5% B in its anhydrous form is assumed, as a proxy. The most likely form of boron supply is a commercial sodium borate at about 14% B (CRAAQ, 2010). Any net emission into the environment is not accounted for. See supporting documentation '01 crop production - Québec.pdf' available on ecoinvent reports web page (https://ecoquery.ecoinvent.org/File/Reports).
  properties: dry mass 1 kg, wet mass 1 kg
- dinitroaniline-compound: 6.0807e-6 kg; source BEAUREGARD, G. 2013; lognormal variance with pedigree 0.0186, pedigree (4,4,4,1,1)
  Azoxystrobine. See supporting documentation '01 crop production - Québec.pdf' available on ecoinvent reports web page (https://ecoquery.ecoinvent.org/File/Reports).
  properties: carbon content, fossil 0.55516, dry mass 1 kg, wet mass 1 kg
  note on carbon content, fossil: C content of dinitroaniline-compound was calculated after the C content of the herbicide pendimethalin, classified as dinitroaniline-compound in Tab 2.25 of Sutter 2010
- dithiocarbamate-compound: 0.00033551 kg; source BEAUREGARD, G. 2013; lognormal variance with pedigree 0.0186, pedigree (4,4,4,1,1)
  Mancozeb. See supporting documentation '01 crop production - Québec.pdf' available on ecoinvent reports web page (https://ecoquery.ecoinvent.org/File/Reports).
  properties: carbon content, fossil 0.179339, dry mass 1 kg, wet mass 1 kg
  note on carbon content, fossil: Approximated as an unweighted average of the C-content of the dithiocarbamate-compounds (Tab 2.25 Sutter, 2010) Maneb and Mancozeb
- fertilising, by broadcaster: 3.31917e-5 ha; lognormal variance with pedigree 0.0099, pedigree (2,2,4,1,2)
  See supporting documentation '01 crop production - Québec.pdf' available on ecoinvent reports web page (https://ecoquery.ecoinvent.org/File/Reports).
- harvesting, by complete harvester, ground crops: 3.3191e-5 ha; lognormal variance with pedigree 0.0099, pedigree (2,2,4,1,2)
  (same comment as for fertilising, by broadcaster)
- inorganic nitrogen fertiliser, as N: 0.00277303 kg; lognormal variance with pedigree 0.0099, pedigree (2,2,4,1,2)
  Amount is determined from the mineral nutrient actually used for the crop and from the overall mineral fertilizers sales, by type of fertilizer, in Québec for agriculture (APNC, 2010). See details for disaggregation in supporting documentation '01 crop production - Québec.pdf' available on ecoinvent reports web page (https://ecoquery.ecoinvent.org/File/Reports).
  properties: dry mass 1 kg, wet mass 1 kg
- inorganic phosphorus fertiliser, as P2O5: 0.00531067 kg; lognormal variance with pedigree 0.0099, pedigree (2,2,4,1,2)
  Amount is determined from the mineral nutrient actually used for the crop (CECPA, 2011) and from the overall mineral fertilizers sales, by type of fertilizer, in Québec for agriculture (APNC, 2010). See details for disaggregation in supporting documentation '01 crop production - Québec.pdf' available on ecoinvent reports web page (https://ecoquery.ecoinvent.org/File/Reports).
  Mono- and di-ammonium phosphate (MAP and DAP), as P2O5. The concommitant supply of nitrogen by DAP is accounted for in total N requirements. See supporting documentation '01 crop production - Québec.pdf' available on ecoinvent reports web page (https://ecoquery.ecoinvent.org/File/Reports).
  properties: dry mass 1 kg, wet mass 1 kg
- irrigation: 0.015185 m3; name water_irrigation_input; lognormal variance with pedigree 0.0826, pedigree (3,1,5,1,4)
  Source: Bergeron, D. (2012). L’irrigation de la pomme de terre au Québec : état de la situation et tendances. Colloque sur la pomme de terre 2012, Centre de Référence en Agriculture et Agroalimentaire du Québec (Ed.). http://www.agrireseau.qc.ca/pdt/documents/Bergeron_Daniel.pdf; and Ferland, P. (2006). L’irrigation : portrait pour le Québec. Colloque sur l’irrigation : L’eau, source de qualité et de rendement, February, 10, 2006, Boucherville (QC). Centre de Référence en Agriculture et Agroalimentaire du Québec (Ed.).
  properties: dry mass 0.11 kg, water content 9089.91, wet mass 1000 kg
- land use change, annual crop: 5.762e-6 ha; = (5.762E-6*LUC_crop_specific+0.0000*(1-LUC_crop_specific))
  Calculated value. Land use change (LUC) combines land transformation areas calculated with the adapted 'Direct Land Use Change Assessment Tool' version 2014 developed by Blonk Consultants and the carbon losses from soil organic carbon (SOC) and vegetation (VEG) as calculated in ecoinvent v3. See 'WFLDB-Guidelines.pdf', available at https://ecoquery.ecoinvent.org/File/Reports.
- lime: 0.0130599 kg; name LIME_CaCO3; lognormal variance with pedigree 0.0099, pedigree (2,2,4,1,2)
  (same comment as for fertilising, by broadcaster)
  properties: carbon content, fossil 0.120005, dry mass 1 kg, wet mass 1 kg
- liquid manure spreading, by vacuum tanker: 0.0002024 m3; lognormal variance with pedigree 0.0099, pedigree (2,2,4,1,2)
  Calculated from liquid manure input rate and crop yield.
- manure, liquid, cattle: 0.17319 kg; name MANURE_LIQUID_CATTLE; lognormal variance with pedigree 0.0099, pedigree (2,2,4,1,2)
  Amount of 0.17319 kg of manure, liquid, cattle is needed when producing 1kg of potato.
  Amount is determined from the organic nutrient actually used for the crop and from data about organic fertilizer production, by type, in Québec (MAPAQ, 2013). See details for disaggregation in supporting documentation '01 crop production - Québec.pdf' available on ecoinvent reports web page (https://ecoquery.ecoinvent.org/File/Reports).
  property water in wet mass 0.925 kg; name MANURE_LIQUID_CATTLE_WWM
  properties: carbon content, non-fossil 0.68, dry mass 0.075 kg, nitrogen content 0.03681, water content 12.333, wet mass 1 kg
  note on nitrogen content: Total N content on a dry matter basis. Weighted average of beef cattle liquid manure (0.0425 kg N/kg dm) and dairy cattle liquid manure (0.03611 kg N/kg dm) considering that N supply in central and peripherical agricultural regions is for 89% from dairy and 11% from beef cattle (MAPAQ, 2013). N content from Parent and Gagné (2013).
- manure, liquid, swine: 0.029206 kg; name MANURE_LIQUID_SWINE; lognormal variance with pedigree 0.0099, pedigree (2,2,4,1,2)
  Amount of 0.029206 kg of manure, liquid, swine is needed when producing 1kg of potato.
  Amount is determined from the organic nutrient actually used for the crop (CECPA, 2011) and from data about organic fertilizer production, by type, in Québec (MAPAQ, 2013). See details for disaggregation in supporting documentation '01 crop production - Québec.pdf' available on ecoinvent reports web page (https://ecoquery.ecoinvent.org/File/Reports).
  property water in wet mass 0.95 kg; name MANURE_LIQUID_SWINE_WWM
  properties: carbon content, non-fossil 0.64, dry mass 0.05 kg, nitrogen content 0.1, water content 19, wet mass 1 kg
- manure, solid, cattle: 0.078657 kg; name MANURE_SOLID_CATTLE; lognormal variance with pedigree 0.0099, pedigree (2,2,4,1,2)
  Amount of 0.078657 kg of manure, solid, cattle is needed when producing 1kg of potato.
  Amount is determined from the organic nutrient actually used for the crop (CECPA, 2011) and from data about organic fertilizer production, by type, in Québec (MAPAQ, 2013). See details for disaggregation in supporting documentation '01 crop production - Québec.pdf' available on ecoinvent reports web page (https://ecoquery.ecoinvent.org/File/Reports).
  property water in wet mass 0.78 kg; name MANURE_SOLID_CATTLE_WWM
  properties: carbon content, non-fossil 0.441, dry mass 0.22 kg, nitrogen content 0.02734, water content 3.5454, wet mass 1 kg
  note on nitrogen content: Total N content on a dry matter basis. Weighted average of beef cattle solid manure (0.02639 kg N/kg dm) and dairy cattle solid manure (0.02789 kg N/kg dm) considering that N supply in central and peripherical agricultural regions is about 63% from dairy and 37% from beef cattle (MAPAQ, 2013). N content from Parent and Gagné (2013).
- packaging, for fertilisers: 0.0623067 kg; lognormal variance with pedigree 0.0592, pedigree (4,3,4,5,4)
  Total amount of active substance/s of fertilisers needed for the production of 'potato' is calculated to be circa 3.12E-02 kg. Fertiliser/s used in this dataset is/are: 'ammonia, liquid', 'ammonium nitrate, as N', 'ammonium sulfate, as N', 'lime', 'nitrogen fertiliser, as N', 'phosphate fertiliser, as P2O5', 'potassium chloride, as K2O', 'potassium sulfate, as K2O', 'urea, as N'. The total amount of active substance/s is doubled in order to account for the packaging of the dilluted product of fertiliser/s that is/are applied. Therefore, 6.23E-02 kg of packaging for fertilisers is justified with this exchange.
  properties: carbon content, fossil 0.825301, dry mass 1 kg, heating value, net 25.01 MJ, price 0.0642 EUR2005, wet mass 1 kg
  note on carbon content, fossil: Considering a chemical formula (C2H4)n for polyethylene, carbon content-fossil is calculated to be 0.856286 kg of Carbon per kg of dry mass.
- packaging, for pesticides: 0.0012773 kg; lognormal variance with pedigree 0.0592, pedigree (4,3,4,5,4)
  Total amount of active substance/s of pesticides needed for the production of potato is calculated to be circa 6.39E-04 kg. Pesticide/s used in this dataset is/are: 'bipyridylium-compound', 'borax, anhydrous, powder', 'dinitroaniline-compound', 'dithiocarbamate-compound', 'pesticide, unspecified', 'pyrethroid-compound', 'triazine-compound, unspecified'. The total amount of active substance/s is doubled in order to account for the packaging of the dilluted product of pesticide/s that is/are applied. Therefore, 1.28E-03 kg of packaging for pesticides is justified with this exchange.
  properties: carbon content, fossil 0.85714, dry mass 1 kg, heating value, net 25.97 MJ, price 0.0642 EUR2005, wet mass 1 kg
- pesticide, unspecified: 4.9953e-6 kg; source BEAUREGARD, G. 2013; lognormal variance with pedigree 0.0186, pedigree (4,4,4,1,1)
  8,2978E-08 kg fludioxonil (fungicide, class of benzodioxalcarbonitrile); 3,3191E-06 kg mandipropamid (fungicide, class of the mandelamids); and 1,5932E-06 kg imidacloprid (insecticide, class of the neonicotinoids). See supporting documentation '01 crop production - Québec.pdf' available on ecoinvent reports web page (https://ecoquery.ecoinvent.org/File/Reports).
  properties: carbon content, fossil 0.486978, dry mass 1 kg, wet mass 1 kg
  note on carbon content, fossil: Mean of C content in all pesticides whose formula has been documented in Sutter 2010
- potassium chloride: 0.00921166 kg; lognormal variance with pedigree 0.0099, pedigree (2,2,4,1,2)
  The exchange has been updated from 'potassium chloride, as K2O' into 'potassium chloride' and therefore its amount has been scaled (multiplied) from 0.0058 kg by 1.5829 kg of 'potassium chloride' per kg of 'potassium chloride, as K2O'. Original comment of the exchange is: Amount is determined from the mineral nutrient used for the crop and from the overall mineral fertilizers sales, by type of fertilizer, in Québec for agriculture (APNC, 2010). See details for disaggregation in supporting documentation '01 crop production - Québec.pdf' available on ecoinvent reports web page (https://ecoquery.ecoinvent.org/File/Reports).
  The potash domestic market in Canada is supplied almost exclusively by domestic production and Quebec resellers of potassium chloride have a preferential trade agreement for supplying fertilizer from Canadian producers. Hence, potassium chloride used in quebec does not rely on the global market and a direct link to Canadian potassium chloride is used. Sources: 1) personnal communication with Gilles Lavoie from the Quebec Professional Association in Crop Nutrition and the Coop Fédérée Inc. (2013); 2) Temple Scott Associates inc. (2013). Fertilizer report for the Canadian Fertilizer Industry. April 5, 2013, 10 p. http://www.cfi.ca/_documents/Fertilizer%20Industry%20Report-%20FINAL.pdf
  properties: dry mass 1 kg, wet mass 1 kg
- potassium sulfate: 0.00102361 kg; lognormal variance with pedigree 0.0099, pedigree (2,2,4,1,2)
  The exchange has been updated from 'potassium sulfate, as K2O' into 'potassium sulfate' and therefore its amount has been scaled (multiplied) from 0.0006 kg by 1.85 kg of 'potassium sulfate' per kg of 'potassium sulfate, as K2O'. Original comment of the exchange is: See supporting documentation '01 crop production - Québec.pdf' available on ecoinvent reports web page (https://ecoquery.ecoinvent.org/File/Reports).
  properties: dry mass 1 kg, wet mass 1 kg
- potato grading: 1 kg; lognormal variance with pedigree 0.0419, pedigree (2,1,5,3,2)
  Taken from ecoinvent v3.0 dataset 'potato production, US 2006'. See supporting documentation '01 crop production - Québec.pdf' available on ecoinvent reports web page (https://ecoquery.ecoinvent.org/File/Reports).
- potato planting: 3.3191e-5 ha; lognormal variance with pedigree 0.0099, pedigree (2,2,4,1,2)
  (same comment as for fertilising, by broadcaster)
- potato seed, for setting: 0.0717286 kg; name SEED; lognormal variance with pedigree 0.0099, pedigree (2,2,4,1,2)
  (same comment as for fertilising, by broadcaster)
  property carbon content, non-fossil 0.4719; name SEED_C_content_non_fossil; = REF_PRODUCT_C_content_non_fossil
  property dry mass 0.25 kg; name SEED_DM; = SEED_WM - SEED_WWM
  property water content 3; name SEED_water_content; = SEED_WWM / SEED_DM
  property water in wet mass 0.75 kg; name SEED_WWM; = REF_PRODUCT_WWM
  property wet mass 1 kg; name SEED_WM
  note on carbon content, non-fossil: biogene carbon content on a dry matter basis; Composition data obtained from Potatoes, raw, skin, in (http://www.nal.usda.gov/fnic/foodcomp/search/). First, composition data were refered to 1 kg dry mass. Then, C-contents were calculated considering a C-content/dry mass of 44% in carbohydrates (including fibres), 53% in proteins and 75% in fats. All data from ecoinvent report, n 15a, pg 40, except C-content in protein, that comes from Determination of protein concentration by total organic carbon analysis, Rouwenhorst et al., 1991, J Biochem and Biophys Methods, 22:119-128.
- poultry manure, fresh: 0.0011135 kg; lognormal variance with pedigree 0.0099, pedigree (2,2,4,1,2)
  Amount of 0.0011135 kg of manure, solid, cattle is needed when producing 1kg of potato.
  Amount is determined from the organic nutrient actually used for the crop (CECPA, 2011) and from data about organic fertilizer production, by type, in Québec (MAPAQ, 2013). See details for disaggregation in supporting documentation '01 crop production - Québec.pdf' available on ecoinvent reports web page (https://ecoquery.ecoinvent.org/File/Reports).
  properties: carbon content, non-fossil 0.33389, dry mass 0.38 kg, nitrogen content 0.04044, water content 1.63158, wet mass 1 kg
- pyrethroid-compound: 9.9574e-7 kg; source BEAUREGARD, G. 2013; lognormal variance with pedigree 0.0186, pedigree (4,4,4,1,1)
  Lambda-cyhalothrin. See supporting documentation '01 crop production - Québec.pdf' available on ecoinvent reports web page (https://ecoquery.ecoinvent.org/File/Reports).
  properties: carbon content, fossil 0.623, dry mass 1 kg, wet mass 1 kg
- solid manure loading and spreading, by hydraulic loader and spreader: 0.0797706 kg; lognormal variance with pedigree 0.0099, pedigree (2,2,4,1,2)
  Calculated from solid manure input rate and crop yield.
- tillage, cultivating, chiselling: 3.3191e-5 ha; lognormal variance with pedigree 0.0099, pedigree (2,2,4,1,2)
  (same comment as for fertilising, by broadcaster)
- tillage, hoeing and earthing-up, potatoes: 4.9787e-5 ha; lognormal variance with pedigree 0.0099, pedigree (2,2,4,1,2)
  (same comment as for fertilising, by broadcaster)
- tillage, rotary cultivator: 2.0796e-5 ha; lognormal variance with pedigree 0.0099, pedigree (2,2,4,1,2)
  (same comment as for fertilising, by broadcaster)
- transport, tractor and trailer, agricultural: 0.0211296 metric ton*km; lognormal variance with pedigree 0.1293, pedigree (2,2,4,1,2)
  Transport of harvested material from field to road and from road to farm, and transport of inputs from farm to field (assuming 15 km). See supporting documentation '01 crop production - Québec.pdf' available on ecoinvent reports web page (https://ecoquery.ecoinvent.org/File/Reports).
- triazine-compound: 3.505e-5 kg; source BEAUREGARD, G. 2013; lognormal variance with pedigree 0.0186, pedigree (4,4,4,1,1)
  Metribuzine. See supporting documentation '01 crop production - Québec.pdf' available on ecoinvent reports web page (https://ecoquery.ecoinvent.org/File/Reports).
  properties: carbon content, fossil 0.475616, dry mass 1 kg, wet mass 1 kg
  note on carbon content, fossil: An unweighted average of the C content in Atrazine, Cyanazine, metamitron, simazine, and terbuthylazine. Those substances are classified as triazine-compounds in Tab 2.25, Sutter 2010
- urea: 0.00484241 kg; name UREA_N; lognormal variance with pedigree 0.0099, pedigree (2,2,4,1,2)
  The exchange has been updated from 'urea, as N' into 'urea' and therefore its amount has been scaled (multiplied) from 0.0023 kg by 2.1438 kg of 'urea' per kg of 'urea, as N'. Original comment of the exchange is: Amount is determined from the mineral nutrient actually used for the crop (CECPA, 2011) and from the overall mineral fertilizers sales, by type of fertilizer, in Québec for agriculture (APNC, 2010). See details for disaggregation in supporting documentation '01 crop production - Québec.pdf' available on ecoinvent reports web page (https://ecoquery.ecoinvent.org/File/Reports).
  properties: carbon content, fossil 0.2, dry mass 1 kg, wet mass 1 kg

## Inputs from nature
- Carbon dioxide, in air [natural resource, in air]: 0.401547 kg; = 44/12 * (REF_PRODUCT_C_content_non_fossil * REF_PRODUCT * REF_PRODUCT_DM - SEED_C_content_non_fossil * SEED * SEED_DM); lognormal variance with pedigree 0.008, pedigree (1,1,4,1,1)
  Calculated value, see chapter 'CO2 binding' in '01 crop production-direct field emissions natural resources v1.2.pdf' available on ecoinvent reports web page (https://ecoquery.ecoinvent.org/File/Reports). The 44/12 ratio is the stoichiometric mass ratio of carbon dioxide to carbon.
- Energy, gross calorific value, in biomass [natural resource, biotic]: 3.6476 MJ; lognormal variance with pedigree 0.1313, pedigree (3,3,4,3,5)
  Estimated to be the same as in case of potato production /GLO.
- Occupation, annual crop, irrigated, intensive [natural resource, land]: 0.0927988 m2*year; = fraction_irrigated*OCCUP_period * (1 / (yield_agriculture * UnitConversion(1, 'metric ton', 'kg'))) * UnitConversion(1, 'ha', 'm2'); lognormal variance with pedigree 0.008, pedigree (1,1,4,1,1)
  Calculated value. See Exchange Properties and Parameters.
- Occupation, annual crop, non-irrigated, intensive [natural resource, land]: 0.21146 m2*year; = (1-fraction_irrigated)*OCCUP_period * (1 / (yield_agriculture * UnitConversion(1, 'metric ton', 'kg'))) * UnitConversion(1, 'ha', 'm2'); lognormal variance with pedigree 0.008, pedigree (1,1,4,1,1)
  Calculated value. See Exchange Properties and Parameters.
  property occupation period 0.91667 year; name OCCUP_period
- Transformation, from annual crop, irrigated, intensive [natural resource, land]: 0.101235 m2; = fraction_irrigated*(1 / (yield_agriculture * UnitConversion(1, 'metric ton', 'kg'))) * UnitConversion(1, 'ha', 'm2'); lognormal variance with pedigree 0.008, pedigree (1,1,4,1,1)
  Calculated value. See Parameters.
- Transformation, from annual crop, non-irrigated, intensive [natural resource, land]: 0.230682 m2; = (1-fraction_irrigated)*(1 / (yield_agriculture * UnitConversion(1, 'metric ton', 'kg'))) * UnitConversion(1, 'ha', 'm2'); lognormal variance with pedigree 0.008, pedigree (1,1,4,1,1)
  Calculated value. See Parameters.
- Transformation, to annual crop, irrigated, intensive [natural resource, land]: 0.101235 m2; = fraction_irrigated*(1 / (yield_agriculture * UnitConversion(1, 'metric ton', 'kg'))) * UnitConversion(1, 'ha', 'm2'); lognormal variance with pedigree 0.008, pedigree (1,1,4,1,1)
  Calculated value. See Parameters.
- Transformation, to annual crop, non-irrigated, intensive [natural resource, land]: 0.230682 m2; = (1-fraction_irrigated)*(1 / (yield_agriculture * UnitConversion(1, 'metric ton', 'kg'))) * UnitConversion(1, 'ha', 'm2'); lognormal variance with pedigree 0.008, pedigree (1,1,4,1,1)
  Calculated value. See Parameters.

## Emissions to nature
- Ammonia [air, non-urban air or from high stacks]: 0.00114541 kg; lognormal variance with pedigree 0.0173, pedigree (2,2,4,1,2)
  NH3 from mineral fertilisers are calculated with the emission factors published in the EMEP guidelines from the European Environment Agency (EEA, 2013). NH3 from manure are calculated according to the caracteristics of every manure, and to Quebec figures for period and method of maqnure application, and delay before incorporation of manure into the soil (Parent et Gagné, 2010; 2013). See supporting documentation '01 crop production - Québec.pdf' available on ecoinvent reports web page (https://ecoquery.ecoinvent.org/File/Reports).
- Carbon dioxide, fossil [air, non-urban air or from high stacks]: 0.00929495 kg; = UREA_N*0.466461632733939*1.571 +LIME_CaCO3*0.44; lognormal variance with pedigree 0.008, pedigree (1,1,4,1,1)
  Carbon dioxide emissions from limestone and urea application calculated from C content (IPCC, 2006). Emission factors are EF=1.57 kg CO2/kg N for urea, and EF=0.44 kg CO2/kg CaCO3 for limestone. See supporting documentation '01 crop production - Quebec.pdf' available on ecoinvent reports web page (https://ecoquery.ecoinvent.org/File/Reports).
- Dinitrogen monoxide [air, non-urban air or from high stacks]: 0.000326307 kg; name N2O; source Rochette, P. 2008; lognormal variance with pedigree 0.0393, pedigree (2,2,4,1,2)
  Direct and indirect N2O emissions from all sources of N input (fertilizers, above- and below-ground crop residues). Modelled with Québec conditions using the Tier 2 approach (IPCC 2006; Rochette et al. 2008; Little et al. 2008, 2013). See supporting documentation '01 crop production - Quebec.pdf' available on ecoinvent reports web page (https://ecoquery.ecoinvent.org/File/Reports).
- Nitrogen oxides [air, non-urban air or from high stacks]: 0.000256024 kg; lognormal variance with pedigree 0.0173, pedigree (2,2,4,1,2)
  Calculated with an emission factor (EF=0.012 kg NO-N/kg N ) from total N application less NH3-N lost through volatilization. Conversion from NO-N to NO2 with factor=46/14. See supporting documentation '01 crop production - Quebec.pdf' available on ecoinvent reports web page (https://ecoquery.ecoinvent.org/File/Reports).
  property emission ratio 0.21 kg/kg; name NOx_to_N2O
- Water [air, non-urban air or from high stacks]: 0.00951525 m3; name water_to_air_unspecified_1; = (water_irrigation_input*fraction_IW_to_air)+ ((MANURE_LIQUID_CATTLE* MANURE_LIQUID_CATTLE_WWM) + (MANURE_LIQUID_SWINE* MANURE_LIQUID_SWINE_WWM) + (MANURE_SOLID_CATTLE* MANURE_SOLID_CATTLE_WWM))* fraction_PW_to_air* UnitConversion(1, 'l', 'm3'); lognormal variance with pedigree 0.008, pedigree (1,1,4,1,1)
  Calculated value; See Parameters. Water emitted from: irrigated water (if any), process water.
- Azoxystrobin [soil, agricultural]: 6.0807e-6 kg; lognormal variance with pedigree 0.0516, pedigree (4,4,4,1,2)
  Due to low quality data about pesticides use, all pesticide input is considered emitted to soil. See supporting documentation '01 crop production - Québec.pdf' available on ecoinvent reports web page (https://ecoquery.ecoinvent.org/File/Reports).
- Cadmium II [soil, agricultural]: 1.2786e-8 kg; lognormal variance with pedigree 0.0887, pedigree (5,2,4,1,2)
  Calculated value. See supporting documentation '01 crop production - Québec.pdf' available on ecoinvent reports web page (https://ecoquery.ecoinvent.org/File/Reports).
- Chromium III [soil, agricultural]: 1.3987e-6 kg; lognormal variance with pedigree 0.0887, pedigree (5,2,4,1,2)
  (same comment as for Cadmium II)
- Copper ion [soil, agricultural]: -1.1187e-6 kg
  (same comment as for Cadmium II)
- Diquat [soil, agricultural]: 2.3898e-5 kg; lognormal variance with pedigree 0.0516, pedigree (4,4,4,1,2)
  (same comment as for Azoxystrobin)
- Fludioxonil [soil, agricultural]: 8.2978e-8 kg; lognormal variance with pedigree 0.0516, pedigree (4,4,4,1,2)
  (same comment as for Azoxystrobin)
- Imidacloprid [soil, agricultural]: 8.2978e-8 kg; lognormal variance with pedigree 0.0516, pedigree (4,4,4,1,2)
  (same comment as for Azoxystrobin)
- Lambda-cyhalothrin [soil, agricultural]: 9.9574e-7 kg; lognormal variance with pedigree 0.0516, pedigree (4,4,4,1,2)
  (same comment as for Azoxystrobin)
- Lead II [soil, agricultural]: -1.1295e-6 kg
  (same comment as for Cadmium II)
- Mancozeb [soil, agricultural]: 0.00033551 kg; lognormal variance with pedigree 0.0516, pedigree (4,4,4,1,2)
  (same comment as for Azoxystrobin)
- Mandipropamid [soil, agricultural]: 3.32e-6 kg; lognormal variance with pedigree 0.0516, pedigree (4,4,4,1,2)
  (same comment as for Azoxystrobin)
- Metribuzin [soil, agricultural]: 3.505e-5 kg; lognormal variance with pedigree 0.0516, pedigree (4,4,4,1,2)
  (same comment as for Azoxystrobin)
- Nickel II [soil, agricultural]: -3.0511e-6 kg
  (same comment as for Cadmium II)
- Zinc II [soil, agricultural]: -5.9034e-6 kg
  (same comment as for Cadmium II)
- Cadmium II [water, surface water]: 6.7062e-8 kg; lognormal variance with pedigree 0.0887, pedigree (5,2,4,1,2)
  (same comment as for Cadmium II)
- Chromium III [water, surface water]: 2.8775e-6 kg; lognormal variance with pedigree 0.0887, pedigree (5,2,4,1,2)
  (same comment as for Cadmium II)
- Copper ion [water, surface water]: 1.9889e-6 kg; lognormal variance with pedigree 0.0887, pedigree (5,2,4,1,2)
  (same comment as for Cadmium II)
- Lead II [water, surface water]: 1.0948e-6 kg; lognormal variance with pedigree 0.0887, pedigree (5,2,4,1,2)
  (same comment as for Cadmium II)
- Nickel II [water, surface water]: 3.521e-6 kg; lognormal variance with pedigree 0.0887, pedigree (5,2,4,1,2)
  (same comment as for Cadmium II)
- Nitrate [water, ground-]: 0.0356035 kg; lognormal variance with pedigree 0.0493, pedigree (2,2,4,1,2)
  Modelled with the 'SQCB-NO3 model' described in '01 crop production-direct field emissions natural resources v1.2.pdf' available on ecoinvent reports web page (https://ecoquery.ecoinvent.org/File/Reports). Québec average conditions are considered for the SQCB-NO3 model input parameters (see supporting documentation '01 crop production - Québec.pdf' available on ecoinvent reports web page (https://ecoquery.ecoinvent.org/File/Reports)).
- Phosphate [water, surface water]: 5.2279e-5 kg; source Michaud, A.R. 2008; lognormal variance with pedigree 0.0493, pedigree (2,2,4,1,2)
  Modelled with Québec conditions with the 'ODEP model' (Michaud et al., 2008). See supporting documentation '01 crop production - Quebec.pdf' available on ecoinvent reports web page (https://ecoquery.ecoinvent.org/File/Reports).
- Phosphorus [water, surface water]: 6.9267e-5 kg; source Michaud, A.R. 2008; lognormal variance with pedigree 0.0493, pedigree (2,2,4,1,2)
  (same comment as for Phosphate)
- Water [water, ground-]: 0.00473524 m3; name water_to_water_ground; = water_irrigation_input*(1-fraction_IW_to_air)*fraction_IW_to_ground_water+ ((MANURE_LIQUID_CATTLE* MANURE_LIQUID_CATTLE_WWM) + (MANURE_LIQUID_SWINE* MANURE_LIQUID_SWINE_WWM) + (MANURE_SOLID_CATTLE* MANURE_SOLID_CATTLE_WWM))* (1-fraction_PW_to_air)*(1- fraction_PWtoW_to_surface_water)* UnitConversion(1, 'l', 'm3'); lognormal variance with pedigree 0.008, pedigree (1,1,4,1,1)
  (same comment as for Water)
  property carbon content, fossil 0; name C_content_fossil
  property carbon content, non-fossil 0; name C_content_non_fossil
  property dry mass 0 kg; name DM
  property water in wet mass 1000 kg; name WWM
  property wet mass 1000 kg; name WM
- Water [water, surface water]: 0.00118381 m3; name water_to_water_surface; = water_irrigation_input*(1-fraction_IW_to_air)*fraction_IW_to_surface_water+ ((MANURE_LIQUID_CATTLE* MANURE_LIQUID_CATTLE_WWM) + (MANURE_LIQUID_SWINE* MANURE_LIQUID_SWINE_WWM) + (MANURE_SOLID_CATTLE* MANURE_SOLID_CATTLE_WWM))* (1-fraction_PW_to_air)*fraction_PWtoW_to_surface_water* UnitConversion(1, 'l', 'm3'); lognormal variance with pedigree 0.008, pedigree (1,1,4,1,1)
  (same comment as for Water)
- Zinc II [water, surface water]: 1.045e-5 kg; lognormal variance with pedigree 0.0887, pedigree (5,2,4,1,2)
  (same comment as for Cadmium II)

## Sampling procedure
Literature and statistics data, opinions of experts in the field of agricultural production and agroeconomists.

## Extrapolations
Transports are modelled with standard distances. Machine usage is modelled with Québec diesel consumptions and field works (Beauregard, 2013) and Swiss machines. Mineral fertilizer types are extrapolated from overall mineral fertilizers sales in Québec (APNC 2011). Organic fertilizer types are extrapolated from animal manure supply data, per region in Québec, communicated by the Ministry of Agriculture (MAPAQ). Data about agricultural management practices are from BPR (2008. Suivi 2007 du Portrait agroenvironnemental des fermes du Québec). Emissions are calculated with standard methods according to ecoinvent documentation (Nemecek and Schnetzer, 2011. '01 crop production-direct field emissions natural resources' v1.2, August 2011, available at https://ecoquery.ecoinvent.org/File/Reports) and the World Food LCA Database guidelines (Nemecek et al. 2014, available at http://www.quantis-intl.com/microsites/wfldb/), except for : 1) phosphorus and phosphate emissions (modelled using ODEP, a Québec model, considering geospatialized weighted average conditions for soil, hydrology, and agricultural management practices), and 2) ammonia emissions from organic fertilizers which are calculated according to Québec conditions and agricultural management practices (coefficients are taken from Parent et Gagné (2010 and 2013 update). Furthermore, an IPCC Tier 2 approach is used for N2O emissions using regional and ecodistrict-based emission factors (Rochette et al., 2008). Due to lack of comprehensive data on pesticides use, low quality data are used and all applied active ingredients are considered 100% emitted to soil.
Uncertainty in terms of the variance of the logtransformed data is the default value as provided by the Data Quality Guidelines for ecoinvent v3 (available at http://www.ecoinvent.org/support/documents-and-files/). Details on modelling and calculations are reported in the supporting documentation '01 crop production - Québec.pdf' available on ecoinvent reports web page (https://ecoquery.ecoinvent.org/File/Reports).

## Review by Emilia Moreno Ruiz 2015-10-05
PV adjusted

## Review by Emilia Moreno Ruiz 2015-10-13
activity links to CA-QC machinery added
