# electricity, high voltage, production mix

Dataset: EcoSpold 2, unit process, production mix
Geography: BR-North-eastern grid
Time period: 2021-01-01 to 2023-12-31
Scenario: Business-as-Usual
System model: Allocation, cut-off by classification
Generated by: [System]
Database: ecoinvent
isCopyrightProtected: true
accessRestrictedTo: 1

## General comment
The shares of electricity technologies on this market are valid for the year 2021. The shares been calculated by the data provider and don't correspond with the production volumes entered in the undefined datasets of the different electricity supplying technologies. The shares have been calculated based on statistics from 2021:
Electricity generation data is sourced from:
- Energy Research Enterprise - EPE (2022). National Energy Balance. Available at:
https://www.epe.gov.br/pt/publicacoes-dados-abertos/publicacoes/BEN-Series-Historicas-Completas
The following datasheets have been used to calculate the electricity mix:
o Capítulo 8 (Dados Estaduais): 8.1 part 3 / TABLE 8.1.e- Electric Generation by
Source;
o Capítulo 2 (Oferta e Demanda de Energia por Fonte) 1970-2021: Table 2.28 –
Electricity
National subsystem import data:
- Electric System Operator (ONS), Data can be obtained either through an interactive dashboard (available on http://www.ons.org.br/Paginas/resultados- da-operacao/historico-da-operacao/intercambios_energia.aspx) or the raw data can be downloaded on https://dados.ons.org.br/dataset/intercambio-nacional.
Energy import from neighbouring countries:
- Energy Information System (SIE) portal (available on https://www.mme.gov.br/SIEBRASIL). The information can be accessed by selecting: Brazil > Energy Supply and Demand >Energy Import by Country.
Transmission and distribution losses:
- EMPRESA, D.P.E., 2022. Anuário estatístico de energia elétrica 2021. Rio de Janeiro. Available: https://www.epe.gov.br/pt/publicacoes-dados-abertos/publicacoes/anuario-estatistico-de-energia-eletrica

## Reference product
- electricity, high voltage: 1 kWh; By-product classification allocatable product; CPC 17100: Electrical energy; HS2017 271600: Electrical energy
  production volume 1.13137e11 kWh
    The production volume is valid for the year 2021. See general comment for sources.
  properties: carbon allocation 0 kg, carbon content 0, price 0.0977 EUR2005

## Inputs from technosphere
- electricity, high voltage: 0.0575324, 0.069093, 0.213575, 0.0719134, 8.29507e-5, 0.469321, 0.000363248, 0.059002 kWh (8 suppliers, which the file names only by identifier); sum of these 0.940883 kWh
  Calculated from electricity generation and trade statistics. See general comment for validity and sources.
  properties: price 0.0977 EUR2005
- electricity, high voltage: 0.000556619, 0.0287709, 0.00428387, 0.00884326, 0.0166625 kWh (5 suppliers, which the file names only by identifier); sum of these 0.0591171 kWh
  (same comment as for electricity, high voltage)
  properties: exergy 3.6 MJ, price 0.0977 EUR2005
