# cement production, type general use

Dataset: EcoSpold 2, unit process
Geography: EC
Time period: 2019-01-01 to 2023-12-31
Technology level: current
Classification: ISIC rev.4 ecoinvent: 2395:Manufacture of articles of concrete, cement and plaster
Synonyms: cement type GU
Scenario: Business-as-Usual
System model: Allocation, cut-off by classification
Share of production covered: 62.8 %
Generated by: K.Flasher;E.Barros;J.Aguirre;S.Martines
Published in: Petroche, D.M. 2022
Database: ecoinvent
isCopyrightProtected: true
accessRestrictedTo: 1

## General comment
This dataset describes the production of 1 kg cement type general use by means of dry process in Ecuador. The data is mainly retrieved from the publication of Petroche & Ramirez (2022), based on primary data from factories in Ecuador, and complemented with the information from local experts.
Reference:
Petroche, D. M., & Ramirez, A. D. (2022). The environmental profile of clinker, cement, and concrete: a life cycle perspective study based on ecuadorian data. Buildings, 12(3), 311.

## Included activities start
The activity starts with the reception of raw materials at the cement factory.

## Included activities end
This activity ends with the production of 1 kg cement at the factory gate. The dataset includes the transport of materials within the factory area and related infrastructure. The dataset does not include packaging in cement bags, neither the production of waste.

## Geography
This dataset is representative of the production of cement in Ecuador; data come from factories in the country.

## Technology
Current production technology. The dataset covers the main technology for dry cement production in Ecuador. The cement is produced by adding a quantity of calcium sulfate, usually in form of gypsum (3%), and limestone (39%) to the clinker (58%). Then, in a cement mill, the mixture is ground to form the finished industrial powder.

## Time period
The time period is from 2019 (year of the data collection) to 2023 (data of the compilation of the dataset).

## Reference product
- cement, type general use: 1 kg; name RP; By-product classification allocatable product; CPC 37440: Portland cement, aluminous cement, slag cement and similar hydraulic cements, except in the form of clinkers; HS2017 252329: Cement; portland, other than white, whether or not artificially coloured
  production volume 2.29957e9 kg; name cement_PV
    The production volume is expressed in kg. The total production volume of cement type general use (GU) in Ecuador in 2020 is retrieved from INEC. (2020). Tabulations Volume II (Products) - Structural Business Survey (ENESEM). Available at https://www.ecuadorencifras.gob.ec/estadisticas-de-las-empresas/
  property price 0.0615 EUR2005
    2005 import and export prices (total trades (USD) divided by total weight (kg) in China, India, USA, Japan, Russia and Europe, major producers and consumers (http://www.cementchina.net/freport/showfre.asp?id=749) from UN Commodity Trade Statistics Database (http://data.un.org/Explorer.aspxDatabase [Accessed 2 July 2010]). Commodity: Cement (portland, aluminious, slag or hydraulic)
  properties: carbon allocation 0 kg, carbon content 0, carbon content, fossil 0, carbon content, non-fossil 0, dry mass 1 kg, water content 0, water in wet mass 0 kg, wet mass 1 kg

## Inputs from technosphere
- cement factory: 8.70748e-12 unit; = 1/((2296876*1000)*50); lognormal variance with pedigree 0.3052, pedigree (3,3,3,1,2)
  Calculated value, based on annual production volume in 2021 of an Ecuadorian plant: 2296876 tonne of cement. The factory lifetime is assumed to be 50 years.
- clinker: 0.58 kg; name clinker_amount; lognormal variance with pedigree 0.0058, pedigree (3,3,3,1,2)
  Value based on information from local experts.
  properties: dry mass 1 kg, wet mass 1 kg
- electricity, medium voltage: 0.0425441 kWh; = (261348000/(2296876*1000)-0.07124); lognormal variance with pedigree 0.0058, pedigree (3,3,3,1,2)
  Calculated value, based on the publication Petroche & Ramirez (2022) and information from local experts. The gross grid electricity of an overall Ecuadorian plant is 261348000 kWh per 2296876 tonne of cement produced in the year 2021, from which the electricity needed to produce clinker (0.07124 kWh/kg cement) is subtracted.
- ethylene glycol: 0.00031 kg; lognormal variance with pedigree 0.0078, pedigree (3,3,3,5,2)
  Literature value. Ancillary product for grinding. Source: 2007, Kellenberger D., Althaus H.-J., Jungbluth N., Künniger T., Life Cycle Inventories of Building Products, Final report ecoinvent data v2.0, 7, Dübendorf, CH, Swiss Centre for LCI, Empa - TSL, 3 - SeparatePublication, CD-ROM
  properties: carbon content, fossil 0.387097, dry mass 1 kg, heating value, net 23.44 MJ, wet mass 1 kg
- gypsum, mineral: 0.03 kg; name gypsum_amount; lognormal variance with pedigree 0.0058, pedigree (3,3,3,1,2)
  According to experts, 3% is the conventional amount of gypsum in cement. Value in line with grey literature (https://theconstructor.org/concrete/gypsum-cement-role-effects/25282/).
  properties: dry mass 1 kg, wet mass 1 kg
- limestone, crushed, for mill: 0.39 kg; name limestone_amount; = RP-clinker_amount-gypsum_amount; lognormal variance with pedigree 0.0058, pedigree (3,3,3,1,2)
  Calculated value, as difference between output and inputs, specifically between 1 kg cement and the sum of clinker and gypsum.
  properties: carbon content, fossil 0.11749, dry mass 0.998 kg, water content 0.002004, wet mass 1 kg
- scrap steel: -0.00011 kg; name waste_steel; = steel_input; lognormal variance with pedigree 0.0078, pedigree (3,3,3,5,2)
  Estimated value. It is assumed that the steel used in the replacement of the machinery must be disposed of after use. Therefore, same amount as steel input is used to model the waste.
  production volume; = waste_steel/RP*cement_PV
    Calculated from the production volume of the reference product in proportion to the respective output amounts.
  properties: dry mass 1 kg, wet mass 1 kg
- steel, low-alloyed: 0.00011 kg; name steel_input; lognormal variance with pedigree 0.0078, pedigree (3,3,3,5,2)
  Literature value. Replacement of wearing parts of process equipment. Source: 2007, Kellenberger D., Althaus H.-J., Jungbluth N., Künniger T., Life Cycle Inventories of Building Products, Final report ecoinvent data v2.0, 7, Dübendorf, CH, Swiss Centre for LCI, Empa - TSL, 3 - SeparatePublication, CD-ROM
  properties: carbon content, fossil 0.005, dry mass 1 kg, wet mass 1 kg
- transport, freight, conveyor belt: 0.0006 metric ton*km; = 0.6*((clinker_amount+gypsum_amount+limestone_amount)/1000); lognormal variance with pedigree 0.1252, pedigree (3,3,3,1,2)
  Calculated value, based on information from experts. Approximately 0.6 km of conveyor belt are assumed.
- transport, freight, lorry >32 metric ton, EURO3: 0.004 metric ton*km; = 4*((clinker_amount+gypsum_amount+limestone_amount)/1000); lognormal variance with pedigree 0.1252, pedigree (3,3,3,1,2)
  Calculated value, based on information from experts. Approximately 4 km of transport inside the plant is assumed.

## Sampling procedure
Data come the publication of Petroche & Ramirez (2022), based on data from Ecuadorian factories, and complemented with information from local experts. The datasets for clinker and cement represent 62.8% of the production in Ecuador, according to Petroche (2021).

Reference:
Petroche, D. M., & Ramirez, A. D. (2022). The environmental profile of clinker, cement, and concrete: a life cycle perspective study based on ecuadorian data. Buildings, 12(3), 311.
Petroche, D. (2021). Desempeño Ambiental del Cemento y del Concreto en el Ecuador: Una puerta a la Construcción Sostenible [Master’s degree thesis in Industrial Eco-efficiency, Escuela Superior Politécnica del Litoral]. https://www.dspace.espol.edu.ec/bitstream/123456789/52614/1/T-88998%20%20DANIEL%20PETROCHE%20S%C3%81NCHEZ.pdf

## Extrapolations
The amount of limestone is calculated as difference between cement (reference product) and the sum of clinker and gypsum (inputs). Clinker and gypsum are the main inputs in terms of mass.
