# sugarcane vinasse application, by wheel reel irrigation equipment

Dataset: EcoSpold 2, unit process
Geography: BR
Time period: 2012-01-01 to 2023-12-31
Technology level: current
Classification: ISIC rev.4 ecoinvent: 0161:Support activities for crop production
Classification: EcoSpold01Categories: agricultural means of production/work processes
Scenario: Business-as-Usual
System model: Allocation, cut-off by classification
Share of production covered: 100 %
Generated by: Otávio Cavalett
Published in: Cavalett O. 2016
Database: ecoinvent
isCopyrightProtected: true
accessRestrictedTo: 1

## General comment
This dataset represents the sugarcane vinasse application in one hectare (ha). This operation, besides providing water and nutrients, is seen as a soil fertility recovery strategy. Functional Unit (FU) is one hectare of vinasse application. The operation time is about 0.23 hours per ha. Modeling considers that about 200 m3 of vinasse are applied per ha.

## Included activities start
From agricultural field foreseen to be processed.

## Included activities end
This activity ends when vinasse is applied. The dataset includes the diesel fuel consumption and the amount of agricultural machinery and shed. Also taken into consideration is the amount of emissions to the air from diesel combustion and the emission to the soil from tyre abrasion during the work process.

## Geography
The dataset is modeled for sugarcane production system in Brazilian South-Cental region.

## Technology
This activity is performed with a tractor (power 90 hp; weight 3410 kg) plus an aspersion system. Life spam of the tractor is considered as 13500 operating hours and of the implement as 17520 operating hours. Machinery used, fuel consumption and operation efficiencies were based on data from sugarcane mills in Brazil, expert's informations and unpublished data.expert's informations and unpublished data.

## Time period
Most of the data used to modelling this activity were collected in the last few years (2012-2014).

## Reference product
- sugarcane vinasse application, by wheel reel irrigation: 1 ha; By-product classification allocatable product; CPC 86119: Other support services to crop production; HS2017 230320: Beet-pulp, bagasse and other waste of sugar manufacture; whether or not in the form of pellets
  production volume 8.36342e6 ha; = 10454280*0.8
    Estimated based on sugarcane production area in Brazil, year 2014, according to the IBGE data. This operation is assumed to occur in ratoon area (80% of total area).
  property price 4.94858 EUR2005
    Calculated based on inputs: The price of the product has been calculated as a sum of the values of the material and energy inputs for this product. This value is therefore a rough estimation. It may underestimate the real price since there are additional expenses when producing any product. These expences can include for example labour costs, treatment of waste materials and profit for the producer. Please consider carefully whether this level of data quality is acceptable for your application.
  properties: carbon allocation 0 kg, carbon content 0

## Inputs from technosphere
- agricultural machinery, unspecified: 0.534851 kg; source Otávio Cavalett 2016; lognormal variance with pedigree 0.0087, pedigree (2,2,4,1,1)
  Proxy, based on data from sugarcane mills in Brazil, expert's informations and unpublished data. The main source of data for agricultural inputs and operations modelling prodedures is detailed in Cavalett et al., 2016.
- diesel: 7.9551 kg; source Otávio Cavalett 2016; lognormal variance with pedigree 0.0087, pedigree (2,2,4,1,1)
  (same comment as for agricultural machinery, unspecified)
  properties: carbon content, fossil 0.865, dry mass 1 kg, heating value, net 42.8 MJ, wet mass 1 kg
  note on carbon content, fossil: C-content of diesel is 86.5% (ecoinvent v2.2 report 6_IV, Tab 3.14)
- shed: 0.002 m2; lognormal variance with pedigree 0.0187, pedigree (3,3,4,3,3)
  Proxy, based on ecoinvent database.
- tractor, 4-wheel, agricultural: 0.227403 kg; source Otávio Cavalett 2016; lognormal variance with pedigree 0.0087, pedigree (2,2,4,1,1)
  (same comment as for agricultural machinery, unspecified)

## Emissions to nature
All rows: source Nemecek, T. 2007
- Ammonia [air, non-urban air or from high stacks]: 0.000159 kg; lognormal variance with pedigree 0.0681, pedigree (3,2,4,1,3)
  Proxy, based on 'Agricultural Field Work Processes'from Nemecek and Kagi, 2007.
- Benzene [air, non-urban air or from high stacks]: 5.81e-5 kg; lognormal variance with pedigree 0.0681, pedigree (3,2,4,1,3)
  Proxy, based on 'Agricultural Field Work Processes'from Nemecek and Kagi, 2007.
- Benzo(a)pyrene [air, non-urban air or from high stacks]: 2.39e-7 kg; lognormal variance with pedigree 0.6681, pedigree (3,2,4,1,3)
  Proxy, based on 'Agricultural Field Work Processes'from Nemecek and Kagi, 2007.
- Cadmium II [air, non-urban air or from high stacks]: 7.96e-8 kg; lognormal variance with pedigree 0.6681, pedigree (3,2,4,1,3)
  Proxy, based on 'Agricultural Field Work Processes'from Nemecek and Kagi, 2007.
- Carbon dioxide, fossil [air, non-urban air or from high stacks]: 24.8 kg; lognormal variance with pedigree 0.0281, pedigree (3,2,4,1,3)
  Proxy, based on 'Agricultural Field Work Processes'from Nemecek and Kagi, 2007.
- Carbon monoxide, fossil [air, non-urban air or from high stacks]: 0.04296 kg; lognormal variance with pedigree 0.6681, pedigree (3,2,4,1,3)
  Proxy, based on 'Agricultural Field Work Processes'from Nemecek and Kagi, 2007. Emissions of CO, NOx and NMVOC were estimated based on avarege of the agricultural process used in sugarcane production.
- Chromium III [air, non-urban air or from high stacks]: 3.98e-7 kg; lognormal variance with pedigree 0.6681, pedigree (3,2,4,1,3)
  Proxy, based on 'Agricultural Field Work Processes'from Nemecek and Kagi, 2007.
- Copper ion [air, non-urban air or from high stacks]: 1.35e-5 kg; lognormal variance with pedigree 0.6681, pedigree (3,2,4,1,3)
  Proxy, based on 'Agricultural Field Work Processes'from Nemecek and Kagi, 2007.
- Dinitrogen monoxide [air, non-urban air or from high stacks]: 0.000955 kg; lognormal variance with pedigree 0.0681, pedigree (3,2,4,1,3)
  Proxy, based on 'Agricultural Field Work Processes'from Nemecek and Kagi, 2007.
- Methane, fossil [air, non-urban air or from high stacks]: 0.00103 kg; lognormal variance with pedigree 0.0681, pedigree (3,2,4,1,3)
  Proxy, based on 'Agricultural Field Work Processes'from Nemecek and Kagi, 2007.
- NMVOC, non-methane volatile organic compounds [air, non-urban air or from high stacks]: 0.02387 kg; lognormal variance with pedigree 0.0681, pedigree (3,2,4,1,3)
  (same comment as for Carbon monoxide, fossil)
- Nickel II [air, non-urban air or from high stacks]: 5.57e-7 kg; lognormal variance with pedigree 0.6681, pedigree (3,2,4,1,3)
  Proxy, based on 'Agricultural Field Work Processes'from Nemecek and Kagi, 2007.
- Nitrogen oxides [air, non-urban air or from high stacks]: 0.33809 kg; lognormal variance with pedigree 0.0581, pedigree (3,2,4,1,3)
  (same comment as for Carbon monoxide, fossil)
- PAH, polycyclic aromatic hydrocarbons [air, non-urban air or from high stacks]: 2.62e-5 kg; lognormal variance with pedigree 0.3281, pedigree (3,2,4,1,3)
  Proxy, based on 'Agricultural Field Work Processes'from Nemecek and Kagi, 2007.
- Particulate Matter, < 2.5 um [air, non-urban air or from high stacks]: 0.08412 kg; lognormal variance with pedigree 0.0681, pedigree (3,2,4,1,3)
  Proxy, based on 'Agricultural Field Work Processes'from Nemecek and Kagi, 2007.
- Selenium IV [air, non-urban air or from high stacks]: 7.96e-8 kg; lognormal variance with pedigree 0.0681, pedigree (3,2,4,1,3)
  Proxy, based on 'Agricultural Field Work Processes'from Nemecek and Kagi, 2007.
- Sulfur dioxide [air, non-urban air or from high stacks]: 0.00803 kg; lognormal variance with pedigree 0.0281, pedigree (3,2,4,1,3)
  Proxy, based on 'Agricultural Field Work Processes'from Nemecek and Kagi, 2007.
- Zinc II [air, non-urban air or from high stacks]: 7.96e-6 kg; lognormal variance with pedigree 0.6681, pedigree (3,2,4,1,3)
  Proxy, based on 'Agricultural Field Work Processes'from Nemecek and Kagi, 2007.
- Cadmium II [soil, agricultural]: 3.4e-5 kg; lognormal variance with pedigree 0.052, pedigree (3,4,4,1,1)
  Proxy, based on 'Agricultural Field Work Processes'from Nemecek and Kagi, 2007.
- Lead II [soil, agricultural]: 0.000148 kg; lognormal variance with pedigree 0.052, pedigree (3,4,4,1,1)
  Proxy, based on 'Agricultural Field Work Processes'from Nemecek and Kagi, 2007.
- Zinc II [soil, agricultural]: 0.000908 kg; lognormal variance with pedigree 0.052, pedigree (3,4,4,1,1)
  Proxy, based on 'Agricultural Field Work Processes'from Nemecek and Kagi, 2007.

## Sampling procedure
The main source of data for agricultural inputs and operations modelling procedures is detailed in Cavalett et al., 2016. Emissions from the agricultural process are estimated according to Nemecek and Kagi, 2007.

## Extrapolations
Figures in the inventory represent national average.

## Review by Jens Lansche 2018-02-23
All review comments considered
