# paper production, newsprint, virgin

Dataset: EcoSpold 2, unit process
Geography: CA-QC
Time period: 2012-01-01 to 2023-12-31
Technology level: current
Classification: ISIC rev.4 ecoinvent: 1701:Manufacture of pulp, paper and paperboard
Classification: EcoSpold01Categories: paper & cardboard/graphic paper
Scenario: Business-as-Usual
System model: Allocation, cut-off by classification
Generated by: François Saunier
Database: ecoinvent
isCopyrightProtected: true
accessRestrictedTo: 1

## General comment
This dataset represents the production of virgin newsprint paper in the region of Québec.
Virgin newsprint paper is mainly produces from wood chips but small amount of deinked pulp is too used in one site on the three under study.

## Included activities start
From reception of wood chips and other raw materials at the factory gate

## Included activities end
This activity ends with virgin newsprint paper at factory gate.
The dataset includes wood handling, mechanical pulping, paper production, energy production on-site and internal waste water treatment.
The dataset does not include commercial and human activities.

## Geography
Data from one newsprint producer for three sites in the region of Québec used as average for the whole region.

## Technology
Average of present used technology

## Reference product
- paper, newsprint: 1 kg; name ref; By-product classification allocatable product; CPC 32121: Newsprint; HS2017 4802: Uncoated paper and paperboard, used for writing, printing or other graphics, non perforated punch-cards and p[...]
  EcoSpold01Location=RER
  production volume 2.494e6 kg; name refPV
    Newsprint paper production in Quebec (2011)
  property carbon content, fossil 0.00397425
    Fossil C content was calculated after fossil C contents of chemicals used in the production of the paper (in Tab 8.6 ecoinvent v2.2 report 11_III, part 8).
  property carbon content, non-fossil 0.456
    Biogenic C content was calculated after biogenic C contents of chemicals used in the production of the paper (in Tab 8.6 ecoinvent v2.2 report 11_III, part 8). The cellulose content in 1 kg of paper (on a wet mas basis) was estimated as (1-chemical content), C content of cellulose was considered 0.44 kgC/kg dry mass (ecoinvent v2.2 report, n 15a, pg 40)
  property price 0.433 EUR2005
    Export prices for the World+ according to: http://faostat.fao.org/site/626/DesktopDefault.aspx?PageID=626#ancor downloaded 27 April 2009; calculated as export value divided by export volume.
  properties: carbon allocation 0.434676 kg, carbon content 0.459974, dry mass 0.945 kg, heating value, net 14.11 MJ, water content 0.0582011, water in wet mass 0.055 kg, wet mass 1 kg

## Inputs from technosphere
- EDTA, ethylenediaminetetraacetic acid: 0.00157673 kg; lognormal variance with pedigree 0.0098, pedigree (2,3,4,1,1)
  EcoSpold01Location=RER
  Measured value.
  Uncertainty: Variance based on DQG
  properties: carbon content, fossil 0.410959, dry mass 1 kg, heating value, net 19.09 MJ, wet mass 1 kg
  note on carbon content, fossil: Fossil C content was calculated after fossil C contents of chemicals used in the production of the paper (in Tab 8.6 ecoinvent v2.2 report 11_III, part 8). C10H16N2O8
- acetic acid, without water, in 98% solution state: 1.29495e-5 kg; lognormal variance with pedigree 0.0098, pedigree (2,3,4,1,1)
  Measured value.
  Uncertainty: Variance based on DQG
  properties: carbon content, fossil 0.400016, dry mass 1 kg, heating value, net 14.6 MJ, wet mass 1 kg
  note on heating value, net: Based on literature, page 10, Althaus H.-J., Chudacoff M., Hischier R., Jungbluth N., Osses M. and Primas A. (2007) Life Cycle Inventories of Chemicals. Final report ecoinvent data v2.0 No. 8. EMPA, Swiss Centre for Life Cycle Inventories, Dübendorf, CH, Online-Version under: www.ecoinvent.org.
- bark chips, wet, measured as dry mass: 0.180962 kg; lognormal variance with pedigree 0.0098, pedigree (2,3,4,1,1)
  Measured value.
  Uncertainty: Variance based on DQG
  properties: carbon content, non-fossil 0.494, dry mass 1 kg, heating value, net 4.81 MJ, water content 1.4, wet mass 2.4 kg
- chemical, inorganic: 0.00104317 kg; lognormal variance with pedigree 0.0098, pedigree (2,3,4,1,1)
  Measured value. Proxy for sodium borohydride and sodium bisulphite.
  Uncertainty: Variance based on DQG
  properties: carbon content, fossil 0.003, dry mass 1 kg, wet mass 1 kg
  note on carbon content, fossil: This dataset is an unweighted average of 20 inorganic substances (listed in Tab 88.1, ecoinvent v2.2 report 8, part II), being part of the top100 chemicals included in this database. The C-content has also been calculated as an unweighted average of the C content of the substances composing this dataset.
- chemical, organic: 0.000102975 kg; = 0.10151+0.00146476; lognormal variance with pedigree 0.0098, pedigree (2,3,4,1,1)
  Measured value.Proxy for cleaning agents and dyes used on site.
  EcoSpold01Location=GLO
  Uncertainty: Variance based on DQG
  properties: carbon content, fossil 0.628, dry mass 1 kg, heating value, net 19.03 MJ, wet mass 1 kg
  note on carbon content, fossil: Fossil C content was calculated after fossil C contents of chemicals used in the production of the paper (in Tab 8.6 ecoinvent v2.2 report 11_III, part 8). This dataset is an unweighted average of 20 organic substances (listed in Tab 88.1, ecoinvent v2.2 report 8, part II), being part of the top100 chemicals included in this database. The C-content has also been calculated as an unweighted average of the C content of the substances composing this dataset.
- deinked pulp, wet lap: 0.0010356 kg; lognormal variance with pedigree 0.0098, pedigree (2,3,4,1,1)
  Measured value.
  Uncertainty: Variance based on DQG
  properties: heating value, net 8 MJ
- diesel: 0.000561229 kg; lognormal variance with pedigree 0.0098, pedigree (2,3,4,1,1)
  Measured value.
  Uncertainty: Variance based on DQG
  property density 0.84 kg/l; name diesel_density
  properties: carbon content, fossil 0.865, dry mass 1 kg, heating value, net 42.8 MJ, wet mass 1 kg
  note on carbon content, fossil: C-content of diesel is 86.5% (ecoinvent v2.2 report 6_IV, Tab 3.14)
- electricity, medium voltage: 3.2976 kWh; lognormal variance with pedigree 0.0098, pedigree (2,3,4,1,1)
  EcoSpold01Location=NORDEL
  Measured value.
  Uncertainty: Variance based on DQG
- heavy fuel oil: 0.00829889 kg; lognormal variance with pedigree 0.0098, pedigree (2,3,4,1,1)
  Measured value.
  EcoSpold01Location=RER
  Uncertainty: Variance based on DQG
  property density 1 kg/l; name hfo_density
  properties: carbon content, fossil 0.849, dry mass 1 kg, heating value, net 41.2 MJ, wet mass 1 kg
  note on carbon content, fossil: Fossil C content was calculated after fossil C contents of chemicals used in the production of the paper (in Tab 8.6 ecoinvent v2.2 report 11_III, part 8). C-content is 84.9% (ecoinvent v2.2 report 6_IV, Tab 3.18)
- inert waste: -0.000408267 kg; name inert; lognormal variance with pedigree 0.0018, pedigree (2,3,1,1,1)
  Measured value. To landfill.
  Uncertainty: Variance based on DQG
  production volume; = refPV * inert/ ref
    Calculated from the production volume of paper, newsprint in proportion to the respective output amounts.
  properties: dry mass 1 kg, wet mass 1 kg
- light fuel oil: 5.15626e-5 kg; lognormal variance with pedigree 0.0098, pedigree (2,3,4,1,1)
  EcoSpold01Location=RER
  Measured value.
  Uncertainty: Variance based on DQG
  property density 0.86 kg/l; name lfo_density
  properties: carbon content, fossil 0.862, dry mass 1 kg, heating value, net 42.6 MJ, wet mass 1 kg
  note on carbon content, fossil: Fossil C content was calculated after fossil C contents of chemicals used in the production of the paper (in Tab 8.6 ecoinvent v2.2 report 11_III, part 8). C-content is 86.2% (ecoinvent v2.2 report 6_IV Tab 3.16)
- liquefied petroleum gas: 0.000101896 kg; lognormal variance with pedigree 0.0098, pedigree (2,3,4,1,1)
  Measured value.
  Uncertainty: Variance based on DQG
  property density 0.515 kg/l; name lpg_density
  properties: carbon content, fossil 0.821863, dry mass 1 kg, heating value, net 45.5 MJ, wet mass 1 kg
  note on heating value, net: Indicative value. Reference: Fuels - Higher and Lower Calorific Values, available at: https://www.engineeringtoolbox.com/fuels-higher-calorific-values-d_169.html
- municipal solid waste: -0.000514482 kg; name waste; lognormal variance with pedigree 0.0018, pedigree (2,3,1,1,1)
  EcoSpold01Location=CH
  Measured value. To landfill.
  Uncertainty: Variance based on DQG
  production volume; = refPV*waste/ ref
    (same comment as for inert waste)
  properties: carbon content, fossil 0.171549, carbon content, non-fossil 0.261655, dry mass 0.771 kg, heating value, net 11.74 MJ, water content 0.297017, wet mass 1 kg
  note on carbon content, fossil: Fossil C content was calculated after fossil C contents of chemicals used in the production of the paper (in Tab 8.6 ecoinvent v2.2 report 11_III, part 8). MSW composition in tab 4.1, ecoinvent v2.2 report 13_I. C content referred to 1 kg DM
  note on carbon content, non-fossil: Biogenic C content was calculated after biogenic C contents of chemicals used in the production of the paper (in Tab 8.6 ecoinvent v2.2 report 11_III, part 8). The cellulose content in 1 kg of paper (on a wet mas basis) was estimated as (1-chemical content), C content of cellulose was considered 0.44 kgC/kg dry mass (ecoinvent v2.2 report, n 15a, pg 40) MSW composition in tab 4.1, ecoinvent v2.2 report 13_I. C content referred to 1 kg DM
  note on heating value, net: Value taken from the general comment of the treatment dataset.
- natural gas, high pressure: 0.00627488 m3; lognormal variance with pedigree 0.0098, pedigree (2,3,4,1,1)
  Measured value.
  Uncertainty: Variance based on DQG
  properties: carbon content, fossil 0.602381, dry mass 0.84 kg, heating value, gross 40 MJ, heating value, net 36 MJ, wet mass 0.84 kg
  note on carbon content, fossil: An average C content of 0.506 kg C/ m3 has been assumed (this average has been calculated using data in Tab 3.5, ecoinvent v2.2 report 6_V
  note on heating value, net: Literature value, Source: Christoph Meili;Niels Jungbluth;Maresa Bussa (2021) Life cycle inventories of crude oil and natural gas extraction. ESU-services Ltd. commissioned by BAFU & VSG, Schaffhausen, Switzerland, http://esu-services.ch/data/public-lci-reports/
- paper mill, integrated: 5.43478e-11 unit; lognormal variance with pedigree 0.364, pedigree (4,5,4,1,4)
  Calculated value based on plant lifetime (50 years) and annual production (368000 t).
  Uncertainty: Variance based on DQG
- petrol, low-sulfur: 3.34073e-5 kg; lognormal variance with pedigree 0.0098, pedigree (2,3,4,1,1)
  Measured value.
  Uncertainty: Variance based on DQG
  property density 0.75 kg/l; name petrol_density
  properties: carbon content, fossil 0.865, dry mass 1 kg, heating value, net 42.5 MJ, wet mass 1 kg
  note on heating value, net: Based on literature, page 611, Report 17: Jungbluth, N., Chudacoff, M., Dauriat, A., Dinkel, F., Doka, G., Faist Emmenegger, M., Gnansounou, E., Kljun, N., Schleiss, K., Spielmann, M., Stettler, C., Sutter, J. 2007: Life Cycle Inventories of Bioenergy. ecoinvent report No. 17, Swiss Centre for Life Cycle Inventories, Dübendorf, CH.
- phosphoric acid, industrial grade, without water, in 85% solution state: 0.000349374 kg; lognormal variance with pedigree 0.0098, pedigree (2,3,4,1,1)
  Measured value.
  Uncertainty: Variance based on DQG
  properties: dry mass 1 kg, wet mass 1 kg
- retention aid, for paper production: 0.000942477 kg; lognormal variance with pedigree 0.0098, pedigree (2,3,4,1,1)
  Measured value.
  Uncertainty: Variance based on DQG
  properties: carbon content, fossil 0.5, dry mass 1 kg, heating value, net 15.15 MJ, wet mass 1 kg
- sludge from pulp and paper production: -0.00892433 kg; name sludge_landfill; = 35.6973*0.25; lognormal variance with pedigree 0.0018, pedigree (2,3,1,1,1)
  Measured value. 25% of sludge are going to landfil.
  Uncertainty: Variance based on DQG
  production volume; = refPV * sludge_landfill/ ref
    (same comment as for inert waste)
  properties: carbon content, non-fossil 0.21, dry mass 0.75 kg, heating value, net 2.65 MJ, water content 0.333333, wet mass 1 kg
- sludge from pulp and paper production: -0.026773 kg; name sludge_landfarming; = 35.6973*(0.13+0.62); lognormal variance with pedigree 0.0018, pedigree (2,3,1,1,1)
  Measured value. 13% of sludge are going to landfarming and 62% are going to incineration. No specific process for sludge incineration or sludge landfarming are available in the current version of ecoinvent.
  Uncertainty: Variance based on DQG
  production volume; = refPV * sludge_landfarming/ ref
    (same comment as for inert waste)
- sodium chloride, powder: 2.21283e-6 kg; lognormal variance with pedigree 0.0098, pedigree (2,3,4,1,1)
  Measured value.
  Uncertainty: Variance based on DQG
  properties: dry mass 1 kg, wet mass 1 kg
- sodium dithionite, anhydrous: 0.000189922 kg; lognormal variance with pedigree 0.0098, pedigree (2,3,4,1,1)
  Measured value.
  EcoSpold01Location=RER
  Uncertainty: Variance based on DQG
  properties: dry mass 1 kg, wet mass 1 kg
- sodium hydroxide, without water, in 50% solution state: 0.00123224 kg; lognormal variance with pedigree 0.0098, pedigree (2,3,4,1,1)
  Measured value.
  EcoSpold01Location=RER
  Uncertainty: Variance based on DQG
  properties: dry mass 1 kg, heating value, net 3.03 MJ, wet mass 1 kg
- sodium hypochlorite, without water, in 15% solution state: 0.000154898 kg; lognormal variance with pedigree 0.0098, pedigree (2,3,4,1,1)
  Measured value.
  Uncertainty: Variance based on DQG
  properties: dry mass 1 kg, wet mass 1 kg
- sulfate pulp, bleached: 7.7449e-6 kg; lognormal variance with pedigree 0.0098, pedigree (2,3,4,1,1)
  Measured value.
  Uncertainty: Variance based on DQG
  properties: carbon content, non-fossil 0.494, dry mass 0.9 kg, heating value, net 13.23 MJ, water content 0.111111, wet mass 1 kg
  note on carbon content, non-fossil: C content of dry mass of sulfate pulp is 0.494 kgC/kg dry wood (ecoinvent v2.2 report 6_IX & ecoinvent v2.2 report 9). No other C containing products in the formulation of the pulp.
- sulfuric acid: 0.000227288 kg; lognormal variance with pedigree 0.0098, pedigree (2,3,4,1,1)
  Measured value.
  Uncertainty: Variance based on DQG
  properties: dry mass 1 kg, wet mass 1 kg
- urea: 0.00178842 kg; lognormal variance with pedigree 0.0098, pedigree (2,3,4,1,1)
  The exchange has been updated from 'urea, as N' into 'urea' and therefore its amount has been scaled (multiplied) from 0.8342 kg by 2.1438 kg of 'urea' per kg of 'urea, as N'. Original comment of the exchange is: Measured value.
  Uncertainty: Variance based on DQG
  properties: carbon content, fossil 0.2, dry mass 1 kg, wet mass 1 kg
- waste wood, untreated: -0.00196499 kg; name wood; lognormal variance with pedigree 0.0018, pedigree (2,3,1,1,1)
  Measured value. To landfill.
  Uncertainty: Variance based on DQG
  production volume; = refPV * wood / ref
    (same comment as for inert waste)
  properties: carbon content, non-fossil 0.48632, dry mass 0.8 kg, heating value, net 13.99 MJ, water content 0.25, wet mass 1 kg
- water, deionised: 0.0033231 kg; lognormal variance with pedigree 0.0098, pedigree (2,3,4,1,1)
  Calculated value. Water for the dillution of chemical inputs to the used concentrations.
  Uncertainty: Variance based on DQG
  properties: wet mass 1 kg
- wood ash mixture, pure: -0.0137771 kg; name ash; lognormal variance with pedigree 0.0018, pedigree (2,3,1,1,1)
  EcoSpold01Location=CH
  Measured value. To landfill.
  Uncertainty: Variance based on DQG
  production volume; = refPV*ash/ ref
    (same comment as for inert waste)
  properties: carbon content, non-fossil 0.012, dry mass 1 kg, wet mass 1 kg
  note on carbon content, non-fossil: Biogenic C content was calculated after biogenic C contents of chemicals used in the production of the paper (in Tab 8.6 ecoinvent v2.2 report 11_III, part 8). The cellulose content in 1 kg of paper (on a wet mas basis) was estimated as (1-chemical content), C content of cellulose was considered 0.44 kgC/kg dry mass (ecoinvent v2.2 report, n 15a, pg 40) Tab A.9, ecoinvent v2.2 report 13_I.
- wood chips, wet, measured as dry mass: 0.982784 kg; lognormal variance with pedigree 0.0098, pedigree (2,3,4,1,1)
  Measured value.
  Uncertainty: Variance based on DQG
  properties: carbon content, non-fossil 0.494, dry mass 1 kg, heating value, net 10.84 MJ, water content 1.1, wet mass 2.1 kg
  note on heating value, net: Value based on the dataset 'softwood forestry, mixed species, sustainable forest management'

## Inputs from nature
- Water, unspecified natural origin [natural resource, in water]: 0.0435728 m3; lognormal variance with pedigree 0.0098, pedigree (2,3,4,1,1)
  Measured value. This data includes process and cooling (the fraction lossed) water removed from environment.
  Uncertainty: Variance based on DQG

## Emissions to nature
- Acetaldehyde [air, non-urban air or from high stacks]: 2.5749e-7 kg; lognormal variance with pedigree 0.1301, pedigree (3,5,5,3,4)
  Calculated value, based on emissions from heat production processus and on-site fuels consumption (light fuel oil, heavy fuel oil, natural gas and bark chips).
  Uncertainty: Variance based on DQG
- Acetic acid [air, non-urban air or from high stacks]: 2.3887e-7 kg; lognormal variance with pedigree 0.1301, pedigree (3,5,5,3,4)
  (same comment as for Acetaldehyde)
- Acetone [air, non-urban air or from high stacks]: 5.05405e-8 kg; lognormal variance with pedigree 0.1301, pedigree (3,5,5,3,4)
  (same comment as for Acetaldehyde)
- Ammonia [air, non-urban air or from high stacks]: 5.8659e-6 kg; lognormal variance with pedigree 0.1301, pedigree (3,5,5,3,4)
  (same comment as for Acetaldehyde)
- Arsenic ion [air, non-urban air or from high stacks]: 7.76888e-9 kg; lognormal variance with pedigree 0.7401, pedigree (3,5,5,3,4)
  (same comment as for Acetaldehyde)
- Benzene [air, non-urban air or from high stacks]: 3.1815e-6 kg; lognormal variance with pedigree 0.1301, pedigree (3,5,5,3,4)
  (same comment as for Acetaldehyde)
- Benzo(a)pyrene [air, non-urban air or from high stacks]: 1.70624e-9 kg; lognormal variance with pedigree 0.1301, pedigree (3,5,5,3,4)
  (same comment as for Acetaldehyde)
- Bromine [air, non-urban air or from high stacks]: 2.0331e-7 kg; lognormal variance with pedigree 0.7401, pedigree (3,5,5,3,4)
  (same comment as for Acetaldehyde)
- Butane [air, non-urban air or from high stacks]: 1.7199e-7 kg; lognormal variance with pedigree 0.1301, pedigree (3,5,5,3,4)
  (same comment as for Acetaldehyde)
- Cadmium II [air, non-urban air or from high stacks]: 2.372e-9 kg; lognormal variance with pedigree 0.7401, pedigree (3,5,5,3,4)
  (same comment as for Acetaldehyde)
- Carbon dioxide, fossil [air, non-urban air or from high stacks]: 0.0385574 kg; lognormal variance with pedigree 0.0098, pedigree (2,3,4,1,1)
  Measured value.
  Uncertainty: Variance based on DQG
- Carbon dioxide, non-fossil [air, non-urban air or from high stacks]: 0.325731 kg; lognormal variance with pedigree 0.0098, pedigree (2,3,4,1,1)
  Measured value.
  Uncertainty: Variance based on DQG
- Carbon monoxide, fossil [air, non-urban air or from high stacks]: 0.00246398 kg; lognormal variance with pedigree 0.6592, pedigree (2,3,4,1,1)
  Measured value.
  Uncertainty: Variance based on DQG
- Carbon monoxide, non-fossil [air, non-urban air or from high stacks]: 0.00013893 kg; lognormal variance with pedigree 0.1301, pedigree (3,5,5,3,4)
  (same comment as for Acetaldehyde)
- Chlorine [air, non-urban air or from high stacks]: 6.0993e-7 kg; lognormal variance with pedigree 0.1301, pedigree (3,5,5,3,4)
  (same comment as for Acetaldehyde)
- Chromium III [air, non-urban air or from high stacks]: 1.50865e-8 kg; lognormal variance with pedigree 0.7401, pedigree (3,5,5,3,4)
  (same comment as for Acetaldehyde)
- Chromium VI [air, non-urban air or from high stacks]: 1.5239e-10 kg; lognormal variance with pedigree 0.7401, pedigree (3,5,5,3,4)
  (same comment as for Acetaldehyde)
- Cobalt II [air, non-urban air or from high stacks]: 1.11193e-8 kg; lognormal variance with pedigree 0.7401, pedigree (3,5,5,3,4)
  (same comment as for Acetaldehyde)
- Copper ion [air, non-urban air or from high stacks]: 8.14795e-8 kg; lognormal variance with pedigree 0.7401, pedigree (3,5,5,3,4)
  (same comment as for Acetaldehyde)
- Dinitrogen monoxide [air, non-urban air or from high stacks]: 1.34319e-5 kg; lognormal variance with pedigree 0.0492, pedigree (2,3,4,1,1)
  Measured value.
  Uncertainty: Variance based on DQG
- Dioxins, measured as 2,3,7,8-tetrachlorodibenzo-p-dioxin [air, non-urban air or from high stacks]: 1.05207e-13 kg; lognormal variance with pedigree 0.1301, pedigree (3,5,5,3,4)
  (same comment as for Acetaldehyde)
- Ethanol [air, non-urban air or from high stacks]: 1.01084e-7 kg; lognormal variance with pedigree 0.1301, pedigree (3,5,5,3,4)
  (same comment as for Acetaldehyde)
- Ethyl benzene [air, non-urban air or from high stacks]: 1.01656e-7 kg; lognormal variance with pedigree 0.1301, pedigree (3,5,5,3,4)
  (same comment as for Acetaldehyde)
- Fluorine [air, non-urban air or from high stacks]: 1.6943e-7 kg; lognormal variance with pedigree 0.1301, pedigree (3,5,5,3,4)
  (same comment as for Acetaldehyde)
- Formaldehyde [air, non-urban air or from high stacks]: 6.1859e-7 kg; lognormal variance with pedigree 0.1301, pedigree (3,5,5,3,4)
  (same comment as for Acetaldehyde)
- Hexachlorobenzene [air, non-urban air or from high stacks]: 2.4398e-14 kg; lognormal variance with pedigree 0.1301, pedigree (3,5,5,3,4)
  (same comment as for Acetaldehyde)
- Hydrocarbons, aliphatic, alkanes, unspecified [air, non-urban air or from high stacks]: 3.2869e-6 kg; lognormal variance with pedigree 0.1301, pedigree (3,5,5,3,4)
  (same comment as for Acetaldehyde)
- Hydrocarbons, aliphatic, unsaturated [air, non-urban air or from high stacks]: 1.0515e-5 kg; lognormal variance with pedigree 0.1301, pedigree (3,5,5,3,4)
  (same comment as for Acetaldehyde)
- Hydrocarbons, aromatic [air, non-urban air or from high stacks]: 5.06065e-8 kg; lognormal variance with pedigree 0.1301, pedigree (3,5,5,3,4)
  (same comment as for Acetaldehyde)
- Hydrochloric acid [air, non-urban air or from high stacks]: 4.8541e-7 kg; lognormal variance with pedigree 0.1301, pedigree (3,5,5,3,4)
  (same comment as for Acetaldehyde)
- Hydrogen fluoride [air, non-urban air or from high stacks]: 1.61931e-8 kg; lognormal variance with pedigree 0.1301, pedigree (3,5,5,3,4)
  (same comment as for Acetaldehyde)
- Iron ion [air, non-urban air or from high stacks]: 2.763e-7 kg; lognormal variance with pedigree 0.7401, pedigree (3,5,5,3,4)
  (same comment as for Acetaldehyde)
- Lead II [air, non-urban air or from high stacks]: 1.3357e-7 kg; lognormal variance with pedigree 0.7401, pedigree (3,5,5,3,4)
  (same comment as for Acetaldehyde)
- Magnesium [air, non-urban air or from high stacks]: 1.2199e-6 kg; lognormal variance with pedigree 0.7401, pedigree (3,5,5,3,4)
  (same comment as for Acetaldehyde)
- Manganese II [air, non-urban air or from high stacks]: 5.7605e-7 kg; lognormal variance with pedigree 0.7401, pedigree (3,5,5,3,4)
  (same comment as for Acetaldehyde)
- Mercury II [air, non-urban air or from high stacks]: 1.07555e-9 kg; lognormal variance with pedigree 0.7401, pedigree (3,5,5,3,4)
  (same comment as for Acetaldehyde)
- Methane, fossil [air, non-urban air or from high stacks]: 9.64018e-5 kg; lognormal variance with pedigree 0.0492, pedigree (2,3,4,1,1)
  Measured value.
  Uncertainty: Variance based on DQG
- Methane, non-fossil [air, non-urban air or from high stacks]: 1.3554e-6 kg; lognormal variance with pedigree 0.1301, pedigree (3,5,5,3,4)
  (same comment as for Acetaldehyde)
- Methanol [air, non-urban air or from high stacks]: 1.7184e-7 kg; lognormal variance with pedigree 0.1301, pedigree (3,5,5,3,4)
  (same comment as for Acetaldehyde)
- Molybdenum VI [air, non-urban air or from high stacks]: 2.69559e-9 kg; lognormal variance with pedigree 0.7401, pedigree (3,5,5,3,4)
  (same comment as for Acetaldehyde)
- NMVOC, non-methane volatile organic compounds [air, non-urban air or from high stacks]: 0.000364231 kg; lognormal variance with pedigree 0.0492, pedigree (2,3,4,1,1)
  Measured value.
  Uncertainty: Variance based on DQG
- Nickel II [air, non-urban air or from high stacks]: 1.8544e-7 kg; lognormal variance with pedigree 0.7401, pedigree (3,5,5,3,4)
  (same comment as for Acetaldehyde)
- Nitrogen oxides [air, non-urban air or from high stacks]: 0.000643933 kg; lognormal variance with pedigree 0.0492, pedigree (2,3,4,1,1)
  Measured value.
  Uncertainty: Variance based on DQG
- PAH, polycyclic aromatic hydrocarbons [air, non-urban air or from high stacks]: 4.02573e-8 kg; lognormal variance with pedigree 0.3901, pedigree (3,5,5,3,4)
  (same comment as for Acetaldehyde)
- Particulate Matter, < 2.5 um [air, non-urban air or from high stacks]: 3.48971e-5 kg; lognormal variance with pedigree 0.3092, pedigree (2,3,4,1,1)
  Measured value.
  Uncertainty: Variance based on DQG
- Particulate Matter, > 10 um [air, non-urban air or from high stacks]: 6.14723e-6 kg; lognormal variance with pedigree 0.0492, pedigree (2,3,4,1,1)
  Measured value.
  Uncertainty: Variance based on DQG
- Particulate Matter, > 2.5 um and < 10um [air, non-urban air or from high stacks]: 5.22268e-5 kg; lognormal variance with pedigree 0.1292, pedigree (2,3,4,1,1)
  Measured value.
  Uncertainty: Variance based on DQG
- Pentachlorophenol [air, non-urban air or from high stacks]: 2.74472e-11 kg; lognormal variance with pedigree 0.1301, pedigree (3,5,5,3,4)
  (same comment as for Acetaldehyde)
- Pentane [air, non-urban air or from high stacks]: 2.9413e-7 kg; lognormal variance with pedigree 0.1301, pedigree (3,5,5,3,4)
  (same comment as for Acetaldehyde)
- Phosphorus [air, non-urban air or from high stacks]: 1.0166e-6 kg; lognormal variance with pedigree 0.1301, pedigree (3,5,5,3,4)
  (same comment as for Acetaldehyde)
- Potassium I [air, non-urban air or from high stacks]: 7.9291e-5 kg; lognormal variance with pedigree 0.1301, pedigree (3,5,5,3,4)
  (same comment as for Acetaldehyde)
- Propane [air, non-urban air or from high stacks]: 5.90968e-8 kg; lognormal variance with pedigree 0.1301, pedigree (3,5,5,3,4)
  (same comment as for Acetaldehyde)
- Propionic acid [air, non-urban air or from high stacks]: 4.89441e-9 kg; lognormal variance with pedigree 0.1301, pedigree (3,5,5,3,4)
  (same comment as for Acetaldehyde)
- Selenium IV [air, non-urban air or from high stacks]: 4.04349e-9 kg; lognormal variance with pedigree 0.7401, pedigree (3,5,5,3,4)
  (same comment as for Acetaldehyde)
- Sodium I [air, non-urban air or from high stacks]: 4.6578e-6 kg; lognormal variance with pedigree 0.7401, pedigree (3,5,5,3,4)
  (same comment as for Acetaldehyde)
- Sulfur dioxide [air, non-urban air or from high stacks]: 0.000216857 kg; lognormal variance with pedigree 0.0098, pedigree (2,3,4,1,1)
  Measured value.
  Uncertainty: Variance based on DQG
- Toluene [air, non-urban air or from high stacks]: 1.0757e-6 kg; lognormal variance with pedigree 0.1301, pedigree (3,5,5,3,4)
  (same comment as for Acetaldehyde)
- Vanadium V [air, non-urban air or from high stacks]: 3.3694e-7 kg; lognormal variance with pedigree 0.7401, pedigree (3,5,5,3,4)
  (same comment as for Acetaldehyde)
- Water [air, unspecified]: 0.00125 m3; lognormal variance with pedigree 0.138, pedigree (4,5,5,5,4)
  Estimation. Based on personal communication from Angeline de Beaufort.
- Zinc II [air, non-urban air or from high stacks]: 1.0366e-6 kg; lognormal variance with pedigree 0.7401, pedigree (3,5,5,3,4)
  (same comment as for Acetaldehyde)
- m-Xylene [air, non-urban air or from high stacks]: 4.0664e-7 kg; lognormal variance with pedigree 0.1301, pedigree (3,5,5,3,4)
  (same comment as for Acetaldehyde)
- BOD5, Biological Oxygen Demand [water, surface water]: 0.000348541 kg; name BOD5; lognormal variance with pedigree 0.0492, pedigree (2,3,4,1,1)
  Measured value.
  Uncertainty: Variance based on DQG
- COD, Chemical Oxygen Demand [water, surface water]: 0.000860595 kg; name COD; = BOD5/0.405; source Paice, M.G. 2003; lognormal variance with pedigree 0.008, pedigree (1,1,4,1,1)
  Typically BOD5/COD ratio is 0.22 to 0.59 (Paice & al., 2003). A middle value 0.405 has been supposed.
  Uncertainty: Calculated variable. Uncertainty will be determined from propagation of uncertainty factors of underlying variables. Uncertainty of actual relation between variables not accounted at this time, although this could be included in a future update.
- DOC, Dissolved Organic Carbon [water, surface water]: 0.000344238 kg; name DOC; = TOC; lognormal variance with pedigree 0.008, pedigree (1,1,4,1,1)
  Estimation from ecoinvent 3.0 DQG : DOC = TOC
  Uncertainty: Calculated variable. Uncertainty will be determined from propagation of uncertainty factors of underlying variables. Uncertainty of actual relation between variables not accounted at this time, although this could be included in a future update.
- Nitrogen [water, surface water]: 9.50687e-5 kg; lognormal variance with pedigree 0.0098, pedigree (2,3,4,1,1)
  Measured value.
- Phosphorus [water, surface water]: 5.13623e-5 kg; lognormal variance with pedigree 0.0098, pedigree (2,3,4,1,1)
  Measured value.
  Uncertainty: Variance based on DQG
- Suspended solids, unspecified [water, surface water]: 0.000788338 kg; lognormal variance with pedigree 0.0492, pedigree (2,3,4,1,1)
  Measured value.
  Uncertainty: Variance based on DQG
- TOC, Total Organic Carbon [water, surface water]: 0.000344238 kg; name TOC; = COD/2.5; source Angeline S.H. de Beaufort-Langeveld 2003; lognormal variance with pedigree 0.008, pedigree (1,1,4,1,1)
  Estimation from litterature : COD = 2.5 * TOC
  Uncertainty: Calculated variable. Uncertainty will be determined from propagation of uncertainty factors of underlying variables. Uncertainty of actual relation between variables not accounted at this time, although this could be included in a future update.
- Water [water, unspecified]: 0.0423827 m3; lognormal variance with pedigree 0.0098, pedigree (2,3,4,1,1)
  Measured value.
  Uncertainty: Variance based on DQG
  property carbon content, fossil 0; name C_content_fossil
  property carbon content, non-fossil 0; name C_content_non_fossil
  property dry mass 0 kg; name DM
  property water in wet mass 1000 kg; name WWM
  property wet mass 1000 kg; name WM

## Sampling procedure
Measured values for inputs and outputs based on data survey from one newsprint producer for three sites in the region of Québec.

## Extrapolations
For unknown data, emissions for heat production from on-site fuels (light fuel oil, heavy fuel oil, natural gas and bark chips).have been extrapolated from ecoinvent v3.0 datasets of heat production. The uncertainty has been adjusted accordingly.

## Review by Christian Bauer 2013-12-02
passed

## Review by Emilia Moreno Ruiz 2015-09-28
activity links added
