# electricity production, hydro, aluminium industry

Dataset: EcoSpold 2, unit process
Geography: CA
Time period: 2015-01-01 to 2023-12-31
Technology level: current
Classification: ISIC rev.4 ecoinvent: 3510:Electric power generation, transmission and distribution
Classification: EcoSpold01Categories: hard coal/power plants
Tags: re-labelling activity; electricity, primary aluminium industry
Scenario: Business-as-Usual
System model: Allocation, cut-off by classification
Share of production covered: 100 %
Generated by: François Saunier
Database: ecoinvent
isCopyrightProtected: true
accessRestrictedTo: 1

## General comment
This is a dataset used to create an aluminium industry specific electricity market for 'aluminium production Canada".The production volume represents the total amount of hydroelectricity used in the region for aluminium production (electrolysis and ingot casting). The dataset also identifies the technology and provinces providing the hydroelectricity in the region.
Electricity markets specific to the aluminium-industry are needed in an LCI database because primary aluminium production is very energy intensive, and hence the location of production plants is often determined by access to large amounts of cheap electricity, which often results in an electricity mix that is different from the general grid mix of the countries where the production plants are located.
It is assumed that the production of electricity in general and in aluminium industry specific power plants is identical. Details on actual electricity generation with each technology can be found in the corresponding datasets.
The share of hydroelectricity produced by the different technologies (reservoir, run-of-river, pumped storage) is calculated using both (1) estimates of the share of hydroelectricity coming from each province for Canada that is used for aluminium production and (2) the ecoinvent v3 split of hydroelectricity technologies for these same geographies. The province-level aluminium production is supplied directly by the Canadian Aluminium Association (personal communication).
Calculations are detailed in the report 'Calculating grid mixes for the aluminium industry in ecoinvent v3', available on the ecoinvent website.
[This dataset is meant to replace the following datasets:
- electricity production, hydro, aluminium industry, RNA, 2015 - 2015]

## Included activities start
Re-labelling dataset, not representing a real transformation activity. Conceptually, the activity can be said to start with the production of electricity.

## Included activities end
Re-labelling dataset, not representing a real transformation activity. Conceptually, the activity can be said to end with a given amount of high voltage electricity labelled as specifically used for the production of electricity.

## Geography
Canada

## Time period
Production volume updated with 2016 data from AAC

## Parameters
All rows: lognormal variance with pedigree 0.0032, pedigree (3,1,1,1,2)
- share of pump storage BC: 8.658e-7; name PS_BC
  Calculated amount (see general comments).
- share of reservoir BC: 0.06044; name ResA_BC
  Calculated amount (see general comments).
- share of reservoir Quebec: 0.5899; name ResNA_QC
  Calculated amount (see general comments).
- share of run of river BC: 0.003181; name RoR_BC
  Calculated amount (see general comments).
- share of run of river Quebec: 0.3465; name RoR_QC
  Calculated amount (see general comments).

## Reference product
- electricity, high voltage, aluminium industry: 1 kWh; = (PS_BC+ ResA_BC+ RoR_BC+RoR_QC+ResNA_QC)/(PS_BC+ ResA_BC+ RoR_BC+RoR_QC+ResNA_QC); By-product classification allocatable product; CPC 17100: Electrical energy; HS2017 271600: Electrical energy
  Expressed as sum of contributing technologies (inputs) to allow uncertainty analysis: each technology share is uncertain, and in a Monte Carlo analysis will always be normalized by the sum contribution of each technology
  production volume 4.82048e10 kWh
    The electricity production volume, which is ultimately used to determine the share of hydroelectricity in the downstream market for aluminium industry specific high voltage electricity, is calculated by multiplying the following data:
    (1) estimates of the electricity mix used to produce aluminium in Canada provided by the Aluminium Association of Canada (personnal communication).
    (2) primary aluminium production volumes in each of the Canadian provinces defined in ecoinvent, The aluminium production volumes for Canadian provinces was communicated directly by the Aluminium Association of Canada (personnal communication).
    (3) Canadian electricity requirements, per tonne primary aluminium, for prebake electrolysis technologies
    (4) electricity compensating line and transformation losses from production to consumption as medium voltage electricity, Losses estimated using country-level ecoinvent v3 data.
    (5) electricity consumed in ingot casting.
  property price 0.0977 EUR2005
    Calculated in temporary price data. 94% of the average price (to account for a 6% loss in transformation and transmission) for electricity for industrial consumersin 2005 (excluded taxes). From IEA.
  properties: carbon allocation 0 kg, carbon content 0

## Inputs from technosphere
All rows: lognormal variance with pedigree 0.008, pedigree (1,1,4,1,1)
- electricity, high voltage: 0.0604387 kWh; = ResA_BC/(PS_BC+ ResA_BC+ RoR_BC+RoR_QC+ResNA_QC)
  Calculated amount (see general comments).
  Uncertainty: Calculated value.
- electricity, high voltage: 0.00318093 kWh; = RoR_BC/(PS_BC+ ResA_BC+ RoR_BC+RoR_QC+ResNA_QC)
  Calculated amount (see general comments).
  Uncertainty: Calculated value.
- electricity, high voltage: 8.65781e-7 kWh; = PS_BC/(PS_BC+ ResA_BC+ RoR_BC+RoR_QC+ResNA_QC)
  Calculated amount (see general comments).
  Uncertainty: Calculated value.
- electricity, high voltage: 0.589887 kWh; = ResNA_QC/(PS_BC+ ResA_BC+ RoR_BC+RoR_QC+ResNA_QC)
  Calculated amount (see general comments).
  Uncertainty: Calculated value.
- electricity, high voltage: 0.346492 kWh; = RoR_QC/(PS_BC+ ResA_BC+ RoR_BC+RoR_QC+ResNA_QC)
  Calculated amount (see general comments).
  Uncertainty: Calculated value.

## Sampling procedure
IAI and AAC data used for total electricity used in the production of aluminium that is from hydro power plants and to split between respective technologies (reservoir, run-of-river, pumped storage). Data based on 100% of regional aluminium production.

## Extrapolations
For the split of hydroelectricity production to the respective technologies (reservoir, run-of-river, pumped storage), shares of different types of hydroelectric plants from each province for Canada used as a proxy for the split relevant for the aluminium industry, see general comments.
