# plastic tunnel construction

Dataset: EcoSpold 2, unit process
Geography: RoW
Time period: 2005-01-01 to 2023-12-31
Technology level: current
Classification: ISIC rev.4 ecoinvent: 4100:Construction of buildings
Tags: WFLDB
Scenario: Business-as-Usual
System model: Allocation, cut-off by classification
Generated by: [System]
Database: ecoinvent
isCopyrightProtected: true
accessRestrictedTo: 1

## General comment
This global dataset is a copy of the regional FR dataset, except for the following modifications.
The production volume represents the global annual production.
The geographicalCorrelation score of every pedigree matrix of was changed to '5'.
The comments below were part of the FR regional dataset.
This dataset represents the production and dismantling of 1 m2 of plastic tunnel (unheated) used for agricultural production.
The plastic tunnel is made of a structure of galvanized steel, covered with a EVA (ethylene vinyl acetate) copolymer sheet. The plastic cover must be replaced every 4 years. The tunnel lifetime is typically 25 years. The greenhouse also includes a fertigation system made of a network of polyethylene pipes. Other auxiliary facilities are also considered.

## Included activities start
This activity starts with the production of materials used to build the tunnel and permanent technical infrastructure.

## Included activities end
This dataset includes the production of theplastic tunnel as well as the permanent technical infrastructure. For the tunnel are included its bearing structure (steel tubes) and covering materials (plastic covers). Technical infrastrctucture includes fertigation system and storage facilities.
The activity ends with the disposal of all the materials.

## Time period
Time period referring to the data source: 2005-2009. Based on expert opinion data is considered to be valid at least up to 2012.

## Reference product
- plastic tunnel: 1 m2; By-product classification allocatable product; CPC 53121: Industrial buildings
  production volume 3.81304 m2
    This is a placeholder value that does not reflect real-world production volumes. This dataset does not currently require a real-world production volume to work in the database framework, and no actual data were collected yet. This has no negative effect on the results of the ecoinvent database.
  property price 0.296562 EUR2005
    Calculated based on inputs: The price of the product has been calculated as a sum of the values of the material and energy inputs for this product. This value is therefore a rough estimation. It may underestimate the real price since there are additional expenses when producing any product. These expences can include for example labour costs, treatment of waste materials and profit for the producer. Please consider carefully whether this level of data quality is acceptable for your application.
  properties: carbon allocation 0 kg, carbon content 0

## Inputs from technosphere
- acrylic varnish, with water, in 53% solution state: 0.00363 kg; lognormal variance with pedigree 0.374402, pedigree (5,5,5,5,5)
  Literature data and primary data from French manufacturers (Boulard et al, 2011). Paint protection.
  properties: carbon content, fossil 0.2066, dry mass 0.53 kg, heating value, net 20.44 MJ, water content 0.883983, wet mass 1 kg
- blow moulding: 0.004 kg; lognormal variance with pedigree 0.374402, pedigree (5,5,5,5,5)
  Literature data and primary data from French manufacturers (Boulard et al, 2011). 1000 L tanks for the fertigation system.
- calendering, rigid sheets: 0.00242 kg; lognormal variance with pedigree 0.374402, pedigree (5,5,5,5,5)
  Literature data and primary data from French manufacturers (Boulard et al, 2011). Cover plastic sheets.
- concrete block: 0.00222137, 0.00020907, 0.127232, 0.00100615 kg (4 suppliers, which the file names only by identifier); sum of these 0.130669 kg; lognormal variance with pedigree 0.374402, pedigree (5,5,5,5,5)
  Literature data and primary data from French manufacturers (Boulard et al, 2011). Concrete masonry
  properties: dry mass 1 kg, wet mass 1 kg
- concrete, normal strength: 9.67921e-5 m3; lognormal variance with pedigree 0.374402, pedigree (5,5,5,5,5)
  (same comment as for concrete block)
  properties: dry mass 2190 kg, water content 0.086758, wet mass 2380 kg
- copper, cathode: 1.1628e-5 kg; lognormal variance with pedigree 0.374402, pedigree (5,5,5,5,5)
  Literature data and primary data from French manufacturers (Boulard et al, 2011). Cables and wires.
  properties: dry mass 1 kg, wet mass 1 kg
- diesel, burned in building machine: 0.024407 MJ; lognormal variance with pedigree 0.374402, pedigree (5,5,5,5,5)
  Literature data and primary data from French manufacturers (Boulard et al, 2011). Energy for manufacturing of the tunnel structure.
  properties: heating value, net 1 MJ
- electricity, low voltage: 0.00143766, 1.4434e-5, 0.000435063, 3.20005e-7, 5.04442e-5, 0.000103576, 4.86113e-5, 1.20002e-5, 6.41747e-5, 3.78569e-6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 kWh (47 suppliers, which the file names only by identifier); sum of these 0.03718 kWh; lognormal variance with pedigree 0.374402, pedigree (5,5,5,5,5)
  Literature data and primary data from French manufacturers (Boulard et al, 2011). Electricity for manufacturing of the tunnel structure.
- ethylene vinyl acetate copolymer: 0.08712 kg; lognormal variance with pedigree 0.374402, pedigree (5,5,5,5,5)
  (same comment as for calendering, rigid sheets)
  properties: carbon content, fossil 0.79734, dry mass 1 kg, heating value, net 35.99 MJ, wet mass 1 kg
- extrusion, plastic film: 0.09412 kg; lognormal variance with pedigree 0.374402, pedigree (5,5,5,5,5)
  (same comment as for calendering, rigid sheets)
- extrusion, plastic pipes: 0.005 kg; lognormal variance with pedigree 0.374402, pedigree (5,5,5,5,5)
  Literature data and primary data from French manufacturers (Boulard et al, 2011). Pipes.
- injection moulding: 0.00415061 kg; lognormal variance with pedigree 0.374402, pedigree (5,5,5,5,5)
  Literature data and primary data from French manufacturers (Boulard et al, 2011). Taps, gutters and stoppers for the fertigation system.
- iron scrap, unsorted: -0.1321 kg
  Steel components sent to treatment
  production volume
    Calculated from reference product production volume, reference product amount and byproduct amount.
  properties: dry mass 1 kg, price 0.149 EUR2005, wet mass 1 kg
- phenolic resin: 3.44e-5 kg; lognormal variance with pedigree 0.374402, pedigree (5,5,5,5,5)
  Literature data and primary data from French manufacturers (Boulard et al, 2011). Protective layer.
  properties: carbon content, fossil 0.772277, dry mass 1 kg, heating value, net 33.57 MJ, wet mass 1 kg
- polyester resin, unsaturated: 0.00363 kg; lognormal variance with pedigree 0.374402, pedigree (5,5,5,5,5)
  Literature data and primary data from French manufacturers (Boulard et al, 2011). Roofing membrane.
  properties: carbon content, fossil 0.58584, dry mass 1 kg, heating value, net 17.75 MJ, wet mass 1 kg
- polyethylene, high density, granulate: 0.00769228 kg; lognormal variance with pedigree 0.374402, pedigree (5,5,5,5,5)
  Literature data and primary data from French manufacturers (Boulard et al, 2011). Pipes, gutters and tanks.
  properties: carbon content, fossil 0.857143, dry mass 1 kg, heating value, net 42.47 MJ, wet mass 1 kg
- polyethylene, linear low density, granulate: 0.007 kg; lognormal variance with pedigree 0.374402, pedigree (5,5,5,5,5)
  Literature data and primary data from French manufacturers (Boulard et al, 2011). Disposable duct.
  properties: carbon content, fossil 0.857143, dry mass 1 kg, heating value, net 42.47 MJ, wet mass 1 kg
- polyethylene, low density, granulate: 0.005 kg; lognormal variance with pedigree 0.374402, pedigree (5,5,5,5,5)
  Literature data and primary data from French manufacturers (Boulard et al, 2011). Antifreeze film.
  properties: carbon content, fossil 0.857143, dry mass 1 kg, heating value, net 42.47 MJ, wet mass 1 kg
- polyvinylfluoride: 0.00289901 kg; lognormal variance with pedigree 0.374402, pedigree (5,5,5,5,5)
  Literature data and primary data from French manufacturers (Boulard et al, 2011). Plastic cover, sprinklers and cables.
  properties: carbon content, fossil 0.521739, dry mass 1 kg, heating value, net 23.7 MJ, wet mass 1 kg
- section bar rolling, steel: 0.126943 kg; lognormal variance with pedigree 0.374402, pedigree (5,5,5,5,5)
  Literature data and primary data from French manufacturers (Boulard et al, 2011). Poles and trellis for the tunnel structure.
- sheet rolling, steel: 0.0052 kg; lognormal variance with pedigree 0.374402, pedigree (5,5,5,5,5)
  Literature data and primary data from French manufacturers (Boulard et al, 2011).Roofing.
- steel, low-alloyed: 0.132143 kg; lognormal variance with pedigree 0.374402, pedigree (5,5,5,5,5)
  (same comment as for section bar rolling, steel)
  properties: carbon content, fossil 0.005, dry mass 1 kg, wet mass 1 kg
- waste concrete: -0.344007, -8.92229e-5 kg (2 suppliers, which the file names only by identifier); sum of these -0.344096 kg
  Concrete components sent to treatment
  production volume
    Calculated from production volume of reference product using the relative outputs.
  properties: dry mass 0.5 kg, water content 1, wet mass 1 kg
- waste electric and electronic equipment: -1.2e-5 kg
  Electric and electronic components sent to treatment
  production volume
    Calculated from production volume of reference product using the relative outputs.
  properties: carbon content, fossil 0.0877555, carbon content, non-fossil 0.000485011, dry mass 1 kg, wet mass 1 kg
- waste plastic, mixture: -6.89995e-6, -1.21655e-6, -7.17626e-7, -4.76135e-6, -4.29177e-7, -4.43172e-7, -1.1486e-6, -4.10526e-7, -4.95598e-7, -4.79321e-6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 kg (42 suppliers, which the file names only by identifier); sum of these -0.0263 kg
  Plastic components sent to treatment
  production volume
    Calculated from production volume of reference product using the relative outputs.
  properties: carbon content, fossil 0.747344, dry mass 0.847 kg, heating value, net 30.79 MJ, water content 0.180638, wet mass 1 kg
  note on heating value, net: Value taken from the general comment of the treatment dataset.
- waste polyvinylchloride: -0.000132408, -0.000117636, -2.28336e-5, -1.67039e-5, -6.94881e-6, -9.99461e-6, -1.54441e-6, -2.67525e-5, -2.50086e-6, -1.71996e-5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 kg (42 suppliers, which the file names only by identifier); sum of these -0.087 kg
  Etylene vinyl acetate copolymer (plastic covers) sent to treatment
  production volume
    (same comment as for iron scrap, unsorted)
  properties: carbon content, fossil 0.440882, dry mass 0.998 kg, heating value, net 21.51 MJ, water content 0.00200401, wet mass 1 kg
- wire drawing, copper: 3.23e-5 kg; lognormal variance with pedigree 0.374402, pedigree (5,5,5,5,5)
  (same comment as for copper, cathode)
- zinc coat, coils: 0.0131737 m2; lognormal variance with pedigree 0.374402, pedigree (5,5,5,5,5)
  (same comment as for section bar rolling, steel)

## Sampling procedure
Dataset is adapted from AGRIBALYSE 1.2 database, with land occupation and transformation flows removed (these are accounted for in the crop datasets). Data was collected from French manufacturers and reported in Boulard et al. (2011).

## Extrapolations
The amount of the exchanges are copy from a regional dataset.
