# cellulose fibre production

Dataset: EcoSpold 2, unit process
Geography: CH
Time period: 2012-01-01 to 2023-12-31
Technology level: current
Classification: ISIC rev.4 ecoinvent: 1709:Manufacture of other articles of paper and paperboard
Synonyms: Zellulosedämmstoff; cellulose insulation
Scenario: Business-as-Usual
System model: Allocation, cut-off by classification
Share of production covered: 100 %
Generated by: Nora Minas
Published in: isofloAG/sinum AG 2014
Database: ecoinvent
isCopyrightProtected: true
accessRestrictedTo: 1

## General comment
The process describes the production of 1 kg of cellulose fibre from waste paper (post-consumer) used as an insulation material in buildings. Cellulose fibre used for insulation applications has a thermal conductivity of 0.038 W/mK at a density of 30-60kg/m3. The activity starts with the delivery of sorted waste paper and includes the production process. During production, aluminium hydroxide and boric acid are added as flame retardant. The inventory ends, when insulation material can be provided to customer (not including installation (blowing in) or transport to building site).
Packaging has also been excluded from the dataset. According to isofloc, 1 Kg of cellulose fibre is linked to the following packaging requirement: 9.87E-04 Kg of plastic foil, 7.26E-03 of PE-bags, and 3.77E-04 Kg of palettes.
Reference:
Datenblatt isofloc eco, https://isofloc.ch/assets/Produkte/Zellulosefasern-eco/20150327-isofloc-eco-BUeT-de-mail.pdf
isofloc AG/sinum AG (2014) ECOPRO Effizienz Profil 2012. Bütschwil, Switzerland.
[This dataset is meant to replace the following datasets:
- cellulose fibre production, inclusive blowing in, CH, 1995 - 2000]

## Included activities start
The activity starts with 'waste paper, sorted' and the other process inputs being available to the recycling facility.

## Included activities end
The activity ends with 'waste paper, sorted' being recycled into cellulose fibre to be used as insulation material and ready for transportation at the gates of the production facility. Requirements for administration, packaging, and blowing in (including binder) are not covered by this inventory.

## Geography
Switzerland

## Technology
Data considered representative for production in Switzerland during the reference period.

## Reference product
- cellulose fibre: 1 kg; name RP; By-product classification allocatable product; CPC 32113: Mechanical wood pulp; semi-chemical wood pulp; pulps of fibrous cellulosic material other than wood; HS2017 482390: Paper pulp, paper, paperboard, cellulose wadding or webs of cellulose fibres; articles n.e.c. in heading no[...]
  production volume 6.52174e6 kg; name RPPV; = 6000*1000/0.92
    From figure 5 in Haupt et al. (2017), the production of cellulose (paper-based) insulation material in Switzerland in 2012 amounted to 6'000 tonnes of fibres. It is furthermore assumed that 8% of the final product is additives.
    Reference: Haupt, Melanie & Vadenbo, Carl & Hellweg, Stefanie. (2017). Do We Have the Right Performance Indicators for the Circular Economy?: Insight into the Swiss Waste Management System. Journal of Industrial Ecology. vol. 21, no. 3, pp. 615-627.
  property price 0.76 EUR2005
    The production volume of this product is small compared to other products supplied by the activities within the same ISIC 3 category. Therefore, an average price of products supplied by the activities in the same ISIC 3 code has been applied.This price is obtained as '_35 Paper and paper products, EU27' in the 'EU & DK Input Output Database' (available in SimaPro). The price is assumed to be valid for both RER2003, RER 2004, world 2003 and world 2004.
  properties: carbon allocation 0.46 kg, carbon content 0.46, carbon content, fossil 0, carbon content, non-fossil 0.46, dry mass 1 kg, water content 0, water in wet mass 0 kg, wet mass 1 kg

## Inputs from technosphere
- aluminium hydroxide: 0.04 kg; lognormal variance with pedigree 0.0093, pedigree (2,2,4,1,1)
  Used as alternative for borax
  properties: dry mass 1 kg, wet mass 1 kg
- boric acid, anhydrous, powder: 0.04 kg; lognormal variance with pedigree 0.0093, pedigree (2,2,4,1,1)
  Used as flame retardant
  properties: dry mass 1 kg, wet mass 1 kg
- building, hall, steel construction: 4.24e-6 m2; lognormal variance with pedigree 0.3087, pedigree (2,2,4,1,1)
  Input of (immobile) infrastructure modelled with an activity link to the supplying activity (construction) of matching geography.
- electricity, medium voltage: 0.133 kWh; lognormal variance with pedigree 0.0093, pedigree (2,2,4,1,1)
  Includes energy used for the production process as well as compressed air consumption (3.47E-02 m3)
- heat, district or industrial, natural gas: 0.06408 MJ; = 3.6*(1.78E-02); lognormal variance with pedigree 0.0093, pedigree (2,2,4,1,1)
  original value given as 1.78E-02 kWh
  properties: heating value, net 1 MJ
- industrial machine, heavy, unspecified: 0.000484 kg; lognormal variance with pedigree 0.3087, pedigree (2,2,4,1,1)
- municipal solid waste: -0.00516 kg; name BP2; lognormal variance with pedigree 0.0127, pedigree (2,2,1,1,1)
  Mixed residual waste to external treatment.
  production volume; = RPPV*BP2/RP
    Calculated from production volume of reference product using the relative outputs.
  properties: carbon content, fossil 0.171549, carbon content, non-fossil 0.261655, dry mass 0.771 kg, heating value, net 11.74 MJ, water content 0.297017, wet mass 1 kg
  note on carbon content, fossil: MSW composition in tab 4.1, ecoinvent v2.2 report 13_I. C content referred to 1 kg DM
  note on heating value, net: Value taken from the general comment of the treatment dataset.
- waste paper, sorted: 0.92 kg; = 0.424+0.260+0.236; lognormal variance with pedigree 0.0187, pedigree (2,2,4,1,1)
  The amount reflects the sum 3 different inputs provided in the original source. Those 3 inputs are wastepaper from the printshop (0.424 Kg), unsorted waste paper (0.260 Kg) and sorted waste paper (0.236 Kg).
  Source: isofloc AG/sinum AG (2014) ECOPRO Effizienz Profil 2012. Bütschwil, Switzerland.
  properties: carbon content, non-fossil 0.448889, dry mass 0.9 kg, heating value, net 14.11 MJ, water content 0.111111, wet mass 1 kg

## Emissions to nature
- Particulate Matter, > 2.5 um and < 10um [air, non-urban air or from high stacks]: 2.2e-6 kg; lognormal variance with pedigree 0.0207, pedigree (2,2,4,1,1)
  exhaust air

## Sampling procedure
Data is based on the LCI provided by sinum AG and isofloc AG.
