# hydrogen production, coal gasification

Dataset: EcoSpold 2, unit process
Geography: RoW
Time period: 2022-01-01 to 2026-12-31
Technology level: current
Classification: ISIC rev.4 ecoinvent: 3520:Manufacture of gas; distribution of gaseous fuels through mains
Synonyms: CG
Scenario: Business-as-Usual
System model: Allocation, cut-off by classification
Generated by: Daria Dellenbach
Published in: Jiaquan Li 2022
Database: ecoinvent
isCopyrightProtected: true
accessRestrictedTo: 1

## General comment
This process represents the production of 1 kg gaseous hydrogen by coal gasification. This process does not include compression of hydrogen after its production. This dataset does not cover any carbon dioxide capture and storage function. In this process, coal is converted in the gasifier in the presence of steam and oxygen at high temperature, to hydrogen and carbon dioxide.
Worldwide, about 20% of hydrogen is produced by coal gasification.
Hydrogen is an inorganic substance with a CAS no. : 001333-74-0. It is called 'molecular hydrogen' under IUPAC naming and its molecular formula is: H2. It is gaseous and it has no odour. The substance is modelled as a pure substance. On a consumer level, is used in the following products: fuels and related products, water treatment products. On industrial sites, the substance is used for the manufacture of products in the following sectors: Fuels and fuel additives, functional fluids (closed systems), intermediates, laboratory chemicals, odour agents, oxidizing/reducing agents, processing aids, specific to petroleum production.
This dataset was recontextualised from the Chinese dataset.
References:
Li, J.; Wei, Y-M.; Liu, L.; Li, X.; Yan, R. (2022): The carbon footprint and cost of coal-based hydrogen production with and without carbon capture and storage technology in China, Journal of Cleaner Production, 362, 132514.
Wokaun, A., Wilhelm, E., Schenler, W., Simons, A., Bauer, C., Bond, S. (2011): Transition to hydrogen - pathways toward clean transportation. New York: Cambridge University Press.
Muresan M., Cormos C.-C., Agachi P.-S. (2013): Techno-economical assessment of coal and biomass gasification-based hydrogen production supply chain systems, Chemical Engineering Reseach and Design, 91, 1527-1541.
Stiegel G. J., Ramezan M. (2006): Hydrogen from coal gasification: an economical pathway to a sustainable energy future, International Journal of Coal Geology, 65, 173-190.
IEA (2021): The Future of Hydrogen, available here: https://www.iea.org/reports/the-future-of-hydrogen.

## Included activities start
From the reception of coal at the factory gate.

## Included activities end
The activity ends with hydrogen at 25 bar being ready for further processing or transportation at the production site gate.

## Geography
This activity is a copy of a dataset for coal gasification in China. The material and energy inputs reflect well the production technology and are, therefore, considered to be valid for the chosen geography.

## Technology
The coal gasification process can be separated into five subunits: air separation unit (ASU), gasification unit, water-gas shift unit (WGS), acid gas removal unit (AGR) and hydrogen purification unit (pressure swing adsorption, PSA). The majority of gasification technologies are currently based on entrained-flow reactors. The first unit, the air separation unit, is an independent unit which supplies oxygen needed for the gasification process and for the hydrogen sulphide processing by fractional distillation of liquid air. In addition nitrogen used for the transportation of coal into the gasification reactor also provided by the ASU. Before being fed into the gasification reactor, the oxygen and nitrogen are compressed to 48 bar.
In the gasifier, high operating temperatures are required for a satisfying conversion rate. The outlet gas temperature ranges between 1250-1600°C.
The third unit, the water-gas shift step which includes an exothermal reaction aiming on increasing the hydrogen output. The carbon monoxide in the syngas reacts with steam at a temperature ranges between 250-500 °C. For this process, the steam to carbon monoxide ratio is between 2.08 and 3.1, and a carbon monoxide conversion of up to 98% could be attained. Hence, in this process, full water gas shift is assumed and therefore no synthesis gas (mixture of CO and H2) is co-produced,
Subsequently, the separation of acid gases (carbon dioxide and hydrogen sulphide) is achieved through gas-liquid absorption using an organic solvent. The captured hydrogen sulphide is removed and partially oxidized to sulphur using oxygen from the ASU. Additionally, the carbon dioxide is captured from the sulphur-free gas. The captured species in the rich solvent are then released in the solvent regeneration precess. The cleaned syngas is sent to the the hydrogen purification stage.
Hydrogen purification is mostly done through PSA. The hydrogen purification unit operates on an isothermal cycle, adsorbing at high pressure and desorbing at low pressure. The final hydrogen purity is 99.99% (vol.) and the yield of the process is about 85%. Carbon dioxide is not captured in this modelling, it exits the plant with the flue gas.
References:
Li, J.; Wei, Y-M.; Liu, L.; Li, X.; Yan, R. (2022): The carbon footprint and cost of coal-based hydrogen production with and without carbon capture and storage technology in China, Journal of Cleaner Production, 362, 132514.
Wokaun, A., Wilhelm, E., Schenler, W., Simons, A., Bauer, C., Bond, S. (2011): Transition to hydrogen - pathways toward clean transportation. New York: Cambridge University Press.
Muresan M., Cormos C.-C., Agachi P.-S. (2013): Techno-economical assessment of coal and biomass gasification-based hydrogen production supply chain systems, Chemical Engineering Reseach and Design, 91, 1527-1541.
Stiegel G. J., Ramezan M. (2006): Hydrogen from coal gasification: an economical pathway to a sustainable energy future, International Journal of Coal Geology, 65, 173-190.

## Time period
This activity has been copied from an original dataset representing the geography of China and published in 2022. The material and energy inputs reflect well the production technology and not expected to change significantly over time.
Reference:
Li, J.; Wei, Y-M.; Liu, L.; Li, X.; Yan, R. (2022): The carbon footprint and cost of coal-based hydrogen production with and without carbon capture and storage technology in China, Journal of Cleaner Production, 362, 132514.

## Reference product
- sulfur: 1 kg; name BP_sulfur; = CoalIn*0.012*0.986; By-product classification allocatable product; CPC 34520: Sulphur, except sublimed sulphur, precipitated sulphur and colloidal sulphur; HS2017 250300: Sulphur of all kinds; other than sublimed, precipitated and colloidal sulphur; CAS 7704-34-9
  The amount of sulfur exiting the system boundaries is, here, estimated to ensure the mass balance and the completeness of the dataset (see Mathematical Relation). Namely, the sulfur output is calculated according to the input of anthracite (hard coal), assuming with an average sulfur content of 1.2% and an efficiency of the Claus unit of 98.6%.
  The Claus process is a technology aiming on recovering and converting the elemental sulfur from hydrogen sulfide present in by-product streams. The Claus technology consist of the multistage catalytic oxidation of hydrogen sulfide, and is by-itself limited by chemical equilibrium to ca. 98%. Nonetheless, the recovery of sulphur could exceed 98-99% by incorporating a "tail gas treatment unit". A typical Claus unit operates at high temperatures, i.e., approx 980-1540°C and at pressures rarely higher than 0.7 bar.
  Regarding the sulfur entering the system boundaries, this is based on the amount and chemical composition of anthracite that comprises of around 77% carbon, 6-16% ash, and moister. Some trace elements are also present in the chemical composition of anthracite, such as sulfur − 0.23-1.2%, silica oxide − 2.2-5.4%, alumina − 2%, ferric oxide − 0.4%.
  Reference:
  AP-42, CH 8.13: Sulfur Recovery release by the United States Environmental Protection Agency (.gov), available here: https://www3.epa.gov/ttnchie1/ap42/ch08/final/c08s13.pdf, assessed on the 2023-10-09.
  Wypych, George. "Fillers-Origin, chemical composition, properties, and morphology." Handbook of Fillers 4 (266) (2016): 13.
  production volume 2.39412e8 kg; = PV_RP * BP_sulfur / RP
    Calculated from production volume of reference product using the relative outputs.
  property price 0.0551778 EUR2005
    Price calculated based on price of elemental sulfur (f.o.b. mine or plant) reported in the USGS Minerals Yearbook for Sulfur from 2010 to 2019 (https://www.usgs.gov/centers/nmic/sulfur-statistics-and-information). The prices given in USD were converted to EUR based on the annual exchange rates published by the European Central Bank (https://sdw.ecb.europa.eu/quickview.do?SERIES_KEY=120.EXR.A.USD.EUR.SP00.A), and then adjusted for inflation relative to 2005 by using the Harmonised Index of Consumer Prices (HICP) of the euro area, published by eurostat (https://ec.europa.eu/eurostat/databrowser/view/PRC_HICP_AIND/default/table).
  properties: allocation factor 0.00211726, carbon allocation 0 kg, carbon content 0, carbon content, fossil 0, carbon content, non-fossil 0, dry mass 1 kg, true value 0.00442054, water content 0, water in wet mass 0 kg, wet mass 1 kg

## Inputs from technosphere
- aluminium oxide, metallurgical: 1.68831e-6, 2.42111e-5 kg (2 suppliers, which the file names only by identifier); sum of these 2.58994e-5 kg; lognormal variance with pedigree 0.0112, pedigree (2,4,1,5,2)
  Al2O3 used in the catalytic system. Value reported by Li, J. et al. (2022): "The carbon footprint and cost of coal-based hydrogen production with and without carbon capture and storage technology in China, Journal of Cleaner Production, 362, 132514" for the production of hydrogen via coal gasification.
  properties: dry mass 1 kg, wet mass 1 kg
- chemical factory, organics: 1.30059e-11 unit; lognormal variance with pedigree 0.3052, pedigree (2,4,1,5,2)
  Calculated for a hydrogen plant that produces on average 81280 t/y of hydrogen, and a 25 years lifetime. The latter capacity was reported by Li, J. et al. (2022): "The carbon footprint and cost of coal-based hydrogen production with and without carbon capture and storage technology in China, Journal of Cleaner Production, 362, 132514" for the production of hydrogen via coal gasification.
- cobalt: 4.76773e-6 kg; name cobalt_amount; = 58.933195/218.87*0.67/1000; lognormal variance with pedigree 0.1306, pedigree (2,4,1,5,5)
  Proxy for the CoMoO4 used in the catalytic system. A value of 0.67 g of CoMoO4 per kg H2 was reported by Li, J. et al. (2022): "The carbon footprint and cost of coal-based hydrogen production with and without carbon capture and storage technology in China, Journal of Cleaner Production, 362, 132514" for the production of hydrogen via coal gasification. The input amount was calculated via a mathematical relation using the Co atomic mass and the molecular weight of CoMoO4.
  properties: dry mass 1 kg, wet mass 1 kg
- electricity, medium voltage: 0.000201206, 1.78956e-5, 0.00156031, 0.00204463, 0.00216527, 0.00110288, 0.000152325, 0.000964103, 4.06973e-5, 0.00651583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 kWh (47 suppliers, which the file names only by identifier); sum of these 0.116019 kWh; lognormal variance with pedigree 0.0112, pedigree (2,4,1,5,2)
  Value reported by Li, J. et al. (2022): "The carbon footprint and cost of coal-based hydrogen production with and without carbon capture and storage technology in China, Journal of Cleaner Production, 362, 132514" for the production of hydrogen via coal gasification.
- hard coal: 0.0224932, 0.00533748, 0.0175129, 0.0373855, 0.0229538, 0.0496063, 0.00976135, 0.013893 kg (8 suppliers, which the file names only by identifier); sum of these 0.178944 kg; lognormal variance with pedigree 0.0112, pedigree (2,4,1,5,2)
  Input of coal for the production of hydrogen via gasification. This value is deduced from the data provided by Li, J. et al. (2022): "The carbon footprint and cost of coal-based hydrogen production with and without carbon capture and storage technology in China, Journal of Cleaner Production, 362, 132514". Namely, they reported that the production of 1 kg of hydrogen from coal requires to mine 8.9 kg of coal, which is subsequently treated leading to the wastage of 2.04 kg. An additional 0.089 kg of coal are lost during transport to the hydrogen production facility.
  properties: carbon content, fossil 0.845, dry mass 0.94 kg, heating value, net 27.91 MJ, water content 0.0638298, wet mass 1 kg
  note on carbon content, fossil: C content 75-94% (specified in Tab 1.1, report 6, part VI). A mean content of 0.845 kg C/ kg dry hard coal was considered
  note on heating value, net: Based on the Characterization factor of Hard coal in the CED method
- hard coal ash: -4.02122e-6, -6.34749e-6, -8.93134e-6, -6.28301e-6, -1.33279e-6, -9.35657e-6, -5.50507e-5, -0.0182933, -0.000424852, -3.7293e-5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 kg (14 suppliers, which the file names only by identifier); sum of these -0.0196838 kg; lognormal variance with pedigree 0.0452, pedigree (2,4,1,5,2)
  This value is estimated based on the input of anthracite (hard coal) and an average ash content of 11% to ensure the mass balance and the completeness of the dataset. Besides, the chemical composition of anthracite comprise of around 77% carbon, 6-16% ash, and moister. Some trace elements are also present in the chemical composition of anthracite, such as sulfur − 0.23-1.2%, silica oxide − 2.2-5.4%, alumina − 2%, ferric oxide − 0.4%. Reference: Wypych, George. "Fillers–Origin, chemical composition, properties, and morphology." Handbook of Fillers 4 (266) (2016): 13.
  production volume; name PV_waste_ash; = PV_RP*waste_ash/RP
    Calculated from production volume of reference product using the relative outputs.
  properties: dry mass 1 kg, wet mass 1 kg
- hazardous waste, for underground deposit: -1.07152e-6, -1.66352e-5 kg (2 suppliers, which the file names only by identifier); sum of these -1.77067e-5 kg; = cobalt_amount+molybdenum_amount; lognormal variance with pedigree 0.0438, pedigree (2,3,1,5,2)
  This value is a proxy to cover the disposal of the spend catalyst that may not be regenerated.
  production volume; = PV_RP * (hazwaste / RP)
    Calculated from production volume of reference product using the relative outputs.
  properties: carbon content, fossil 0.554667, dry mass 1 kg, wet mass 1 kg
  note on carbon content, fossil: Tab A.6, ecoinvent v2.2 report 13_I, average hazardous waste composition was used, and referred to 0% water mass. No waste-specific emission are currently inventoried for underground deposits. Accordingly, no waste composition must be specified. For generic, average waste to underground deposit deposition in a 200 liter steel drum without cement solidification is assumed (ecoinvent v2.2 report 13_I).
- limestone, crushed, washed: 0.00419272, 3.57496e-5 kg (2 suppliers, which the file names only by identifier); sum of these 0.00422847 kg; lognormal variance with pedigree 0.0112, pedigree (2,4,1,5,2)
  Limestone used in the wet scrubbing system for Flue Gas Desulfurization (FGD) of the hydrogen production plant. Value reported by Li, J. et al. (2022): "The carbon footprint and cost of coal-based hydrogen production with and without carbon capture and storage technology in China, Journal of Cleaner Production, 362, 132514" for the production of hydrogen via coal gasification.
  properties: carbon content, fossil 0.117257, dry mass 0.998 kg, water content 0.00200401, wet mass 1 kg
  note on carbon content, fossil: Table 3.1, ecoinvent v2.2 report 7, part VII, pg 3. MW CaCO3=100, MW MgCO3=84. C content of limestone is 0.117257 kg/kg DM
- methanol: 2.78534e-5, 8.94867e-5 kg (2 suppliers, which the file names only by identifier); sum of these 0.00011734 kg; lognormal variance with pedigree 0.0112, pedigree (2,4,1,5,2)
  Methanol used as a solvent in the acid gas removal system which recovers hydrogen sulfide and carbon dioxide as separate streams. The Rectisol® process develped by Linde and Lurgi, is a physical acid gas removal process that can purify synthesis gas down to 0.1 ppm total sulfur, including hydrogen sulfide (H2S) and carbonyl sulfide (COS), and carbon dioxide (CO2) in the ppm range. It is also able to remove impurities such as hydrocarbons, ammonia, and hydrogen cyanide, consistent with its origin as a treatment for syngas from the Lurgi gasifier which contains these kinds of impurities. Value reported by Li, J. et al. (2022): "The carbon footprint and cost of coal-based hydrogen production with and without carbon capture and storage technology in China, Journal of Cleaner Production, 362, 132514" for the production of hydrogen via coal gasification.
  properties: carbon content, fossil 0.375, dry mass 1 kg, heating value, net 20 MJ, wet mass 1 kg
  note on heating value, net: Based on literature, page 533, Report 17: Jungbluth, N., Chudacoff, M., Dauriat, A., Dinkel, F., Doka, G., Faist Emmenegger, M., Gnansounou, E., Kljun, N., Schleiss, K., Spielmann, M., Stettler, C., Sutter, J. 2007: Life Cycle Inventories of Bioenergy. ecoinvent report No. 17, Swiss Centre for Life Cycle Inventories, Dübendorf, CH.
- molybdenum trioxide: 1.2939e-5 kg; name molybdenum_amount; = 0.67/1000- cobalt_amount; lognormal variance with pedigree 0.1306, pedigree (2,4,1,5,5)
  Proxy for the CoMoO4 used in the catalytic system. A value of 0.67 g of CoMoO4 per kg H2 was reported by Li, J. et al. (2022): "The carbon footprint and cost of coal-based hydrogen production with and without carbon capture and storage technology in China, Journal of Cleaner Production, 362, 132514" for the production of hydrogen via coal gasification. The input amount was calculated via a mathematical relation based on the Co input.
  property bismuth content 8e-5; name MoO3_Bi_content
  property copper content 0.0006; name MoO3_Cu_content
  property iron content 0.0044; name MoO3_Fe_content
  property lead content 0.00015; name MoO3_Pb_content
  property molecular weight 143.9 g/mol; name MoO3_mol_weight
  property molybdenum content 0.62; name MoO3_Mo_content
  property oxygen content 0.29; name MoO3_O_content
  property sulfur content 0.0003; name MoO3_S_content
- non-ionic surfactant: 8.9855e-5 kg; lognormal variance with pedigree 0.0112, pedigree (2,4,1,5,2)
  Proxy for dispersant. Value reported by Li, J. et al. (2022): "The carbon footprint and cost of coal-based hydrogen production with and without carbon capture and storage technology in China, Journal of Cleaner Production, 362, 132514" for the production of hydrogen via coal gasification.
- waste gypsum: -0.00169049, -7.99112e-5, -0.00550399 kg (3 suppliers, which the file names only by identifier); sum of these -0.00727439 kg; = 172.1712/100.08* limestone_amount; lognormal variance with pedigree 0.0452, pedigree (2,4,1,5,2)
  This value is estimated based on the input of limestone (CaCO3) and the set of reaction given below. Besdies, Gypsum (CaSO4.2(H2O)) generated during the Flue Gas Desulfurization (FGD) stage of the hydrogen production plant. Namely, a mixture of limestone and water is used for the flue gas treatment, where the undesired SO2 content of the flue gas is converted to gypsum. At first, the limestone reacts with the SO2 in the flue gas to create insoluble calcium sulfite (CaSO3). Subsequently, the CaSO3 further reacts with oxygen to produce gypsum (CaSO4.2(H2O)).
  CaCO3(s) + SO2(g) → CaSO3(s) + CO2(g)
  CaSO3(s)+ ½O2(g) + 2H2O(l) → CaSO4·2(H2O)(s)
  production volume; name PV_waste_gypsum; = PV_RP*waste_gypsum/RP
    Calculated from production volume of reference product using the relative outputs.
  properties: dry mass 0.806 kg, water content 0.240695, wet mass 1 kg
- wastewater, average: -7.61852e-7, -0.000126776, -3.03146e-5, -4.51369e-7 m3 (4 suppliers, which the file names only by identifier); sum of these -0.000158303 m3; lognormal variance with pedigree 0.0452, pedigree (2,4,1,5,2)
  This value is estimated based on the input of pure water to ensure the mass balance and the completeness of the dataset. Namely, an amount of 10.5 kg pure water input per kg H2 produced was reported by Li, J. et al. (2022): "The carbon footprint and cost of coal-based hydrogen production with and without carbon capture and storage technology in China, Journal of Cleaner Production, 362, 132514", while 4.51 kg of steam were also cogenerated. Based on this, a total of 5.99 kg of water were assumed to be sent for treatment.
  production volume; name PV_waste_water; = PV_RP*waste_water/RP
    Calculated from production volume of reference product using the relative outputs.
  properties: carbon content, non-fossil 0.194039, dry mass 0.346837 kg, mass concentration, TOC 0.1091 kg/m3, mass concentration, calcium 0.039453 kg/m3, mass concentration, chlorine 0.030031 kg/m3, mass concentration, hydrogen 0.013365 kg/m3, mass concentration, nitrogen 0.031015 kg/m3, mass concentration, oxygen 0.069824 kg/m3, mass concentration, sodium 0.06456 kg/m3, mass concentration, sulfur 0.015602 kg/m3, water content 2882.2, wet mass 1000 kg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
  note on carbon content, non-fossil: 0.0673 kg TOC/m3 (Tab A.17, ecoinvent v2.2 report 13_I). TOC was considered as Total Carbon.
- water, deionised: 0.0372486, 0.000134086, 0.120921 kg (3 suppliers, which the file names only by identifier); sum of these 0.158303 kg; lognormal variance with pedigree 0.0112, pedigree (2,4,1,5,2)
  Raw surface water input for steam production, with demineralisation. This value is deduced from the input of pure water for the production of hydrogen via coal gasification. Namely, an amount of 10.5 kg pure water input per kg H2 produced was reported by Li, J. et al. (2022): "The carbon footprint and cost of coal-based hydrogen production with and without carbon capture and storage technology in China, Journal of Cleaner Production, 362, 132514", while 4.51 kg of steam were also cogenerated. Based on the latter consideration, the total input of deionised water is 5.99 kg.
  properties: wet mass 1 kg

## Inputs from nature
- Oxygen [natural resource, in air]: 0.338903 kg; lognormal variance with pedigree 0.0112, pedigree (2,4,1,5,2)
  Calculated value. This value is estimated based on the CO2 output of this dataset to ensure the mass balance and the completeness of the dataset. It was assumed that all oxygen in CO2 originates from air.

## Emissions to nature
- Carbon dioxide, fossil [air, unspecified]: 0.469625 kg; lognormal variance with pedigree 0.0452, pedigree (2,4,1,5,2)
  (same comment as for electricity, medium voltage)
- Nitrogen oxides [air, unspecified]: 5.2227e-5 kg; = (734000 / 845000 )*SO2; lognormal variance with pedigree 0.0438, pedigree (2,3,1,5,2)
  Due to the absence of process data for the release of NOx for the production of hydrogen from coal, this exchange was roughly estimated as described below.
  In the United States, an amount of 734,000 t of NOx emissions were released in 2022, along with 845,000 t of SO2. Assuming that the release of NOx and SO2 is correlated, this ratio was here used as a rough estimation, to approximate the release in NOx for the production of hydrogen from coal.
  References:
  https://www.epa.gov/power-sector/progress-report-emissions-reductions#so2
  https://www.epa.gov/power-sector/progress-report-emissions-reductions#nox
- Sulfur dioxide [air, unspecified]: 6.01251e-5 kg; name SO2; = (1/0.986-1)*2000*BP_sulfur/1000; lognormal variance with pedigree 0.0044, pedigree (2,3,1,5,2)
  Calcualted value, according to the AP-42, CH 8.13: Sulfur Recovery release by the United States Environmental Protection Agency (.gov), available here: https://www3.epa.gov/ttnchie1/ap42/ch08/final/c08s13.pdf, assessed on the 2023-10-09.
  Namely, the SO2 emissions are expressed in kg/Mg sulfur recovered, ad is equalt to ( (100% recovery)/(%recovery) - 1 ) *2000

## Sampling procedure
Data obtained from the literature.

References;
2022, Jiaquan Li, Yi-Ming Wei, Lancui Liu, Xiaoyu Li, Rui Yan, The carbon footprint and cost of coal-based hydrogen production with and without carbon capture and storage technology in China, Journal of Cleaner Production, 362, 0 - Undefined

## Extrapolations
This dataset has been copied from an original dataset covering the geography CN. The uncertainty has been adjusted accordingly.
