# treatment of sewage sludge, 70% water, WWT-SLF, lignite ash, municipal incineration

Dataset: EcoSpold 2, unit process
Geography: GLO
Time period: 2006-01-01 to 2023-12-31
Technology level: current
Classification: ISIC rev.4 ecoinvent: 3821:Treatment and disposal of non-hazardous waste
Scenario: Business-as-Usual
System model: Allocation, cut-off by classification
Generated by: Nikolia Stoikou
Database: ecoinvent
isCopyrightProtected: true
accessRestrictedTo: 1

## General comment
The process represents the treatment of a waste (sewage sludge) that is exclusively produced from another waste treatment. Municipal incineration is the controlled combustion of a waste. Sewage sludge with 70% water is generated during wastewater treatement (WWT) of leachate from the sanitary landfilling (SLF) of 'lignite ash'. Recommended use of this dataset: to be used within the specific chain of treatments for 'lignite ash'. Share of biogenic carbon in the sludge: 0%.

## Included activities start
The activity starts with the waste being available at the gate of the treatment facility. Collection and transportation of the waste to the treatment plant is not included.

## Included activities end
The activity ends with the waste being treated and waste-specific emissions from the incineration process and auxiliary material consumption for flue gas cleaning are released to the environment (air and water). Infrastructure and waste-specific energy demands for Municipal Solid Waste Incineration (MSWI) and net energy generation are included.

## Geography
Modelling parameters affecting the treatment technology are not specific to this geography.

## Technology
The waste is treated in the incineration plant with flue gas cleaning. Incineration is the controlled combustion of a waste. Auxiliary material consumption for this step of air pollution control (APC) are included in the process. Air polution control includes electrostatic precipitator for fly ash (ESP), wet flue gas scrubber and 25% SNCR , 42.77% SCR-high dust , 32.68% SCR-low dust -DeNOx facilities and 0% without DeNOx (weighted according to mass of burnt waste). Efficiency of iron scrap separation from slag : 58%. Efficiency of aluminium scrap separation from slag : 31%. Efficiency of copper scrap separation from slag : 31%. Gross electric efficiency technology mix 15.84% and Gross thermal efficiency technology mix 28.51%

## Reference product
- sewage sludge, 70% water, WWT-SLF, lignite ash: -1 kg; By-product classification Waste; CPC 39920: Sewage sludge
  main reference product of this activity
  production volume 4.67728e6 kg
    In global scale, 25.25% of the sewage sludge is disposed through municipal incineration, 16.15% in sanitary landfill, and 58.6% in landfarming. Therefore, the PV for each disposal method is calculated based on the respective percentage of the total PV of sewage sludge generated during the wastewater treatment process
    Doka G.,2021. A model for composition-specific life cycle inventories of regionalised wastewater fates, Zurich, Switzerland. http://www.doka.ch/publications.htm
  property price 0 EUR2005
    Waste products are assigned a price of zero as they are assumed to require further treatment.
  properties: aluminium content 0.0210346, antimony content 3.4556e-5, arsenic content 0.000109665, barium content 0.018835, beryllium content 1.10377e-5, boron content 0.0222114, cadmium content 1.84115e-5, calcium content 0.103738, carbon allocation 0.0135461 kg, carbon content 0.0451537, carbon content, fossil 0.0451537, carbon content, non-fossil 0, chromium content 2.95734e-5, cobalt content 0.000796832, copper content 5.35175e-6, dry mass 0.3 kg, heating value, gross 0 MJ, heating value, net 0 MJ, hydrogen content 0.00617379, iron content 0.0144265, lead content 5.40964e-6, magnesium content 0.0285176, manganese content 0.00427144, mercury content 1.29106e-7, molybdenum content 8.61338e-5, nickel content 8.81571e-5, nitrogen content 0.00393897, oxygen content 0.45999, phosphorus content 0.000312272, potassium content 0.00447205, scandium content 4.36079e-6, selenium content 2.07599e-5, silicon content 0.258052, sodium content 0.0057111, strontium content 0.000140877, thallium content 1.70502e-7, tin content 1.81528e-6, titanium content 0.000894174, vanadium content 0.000685938, water content 2.33333, water in wet mass 0.7 kg, wet mass 1 kg, zinc content 0.000228171

## Inputs from technosphere
- ammonia, anhydrous, liquid: 3.59174e-6, 1.54305e-5, 6.9723e-6, 7.72834e-5, 3.26682e-6, 7.30772e-7, 2.68572e-5, 2.3087e-6, 7.11651e-6 kg (9 suppliers, which the file names only by identifier); sum of these 0.000143558 kg; lognormal variance with pedigree 0.6585, pedigree (1,1,4,1,1)
  Input to DeNOx stage (100% NH3).
  Uncertainty: uncertainty calculated from uncertainty in average DeNOx input, uncertainty in the share of thermal NOx, uncertainty of nitrogen content in average municipal waste and the uncertainty in nitrogen content in *this* waste.
  properties: dry mass 1 kg, wet mass 1 kg
- bottom ash, MSWI-WWT-SLF, lignite ash: -0.260462 kg; lognormal variance with pedigree 0.082636, pedigree (1,1,1,1,1)
  waste-specific bottom ash from the incineration of this waste
  Uncertainty: uncertainty is calculated from uncertainties in waste composition and transfer coefficients in incinerator
  production volume
    calculated in proportion to incinerated waste input
  properties: aluminium content 0.0219903, barium content 0.0119997, boron content 0.024889, calcium content 0.0958503, dry mass 0.903215 kg, iron content 0.0178361, magnesium content 0.0318197, manganese content 0.00334317, oxygen content 0.485338, silicon content 0.29832, water content 0.107156, wet mass 1 kg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
- chemical, inorganic: 3.65485e-5 kg; lognormal variance with pedigree 0.074461, pedigree (1,1,4,1,1)
  auxiliary inputs for the wastewater treatment stage of the incinerator plant. Proxy for Polyelectrolyte.
  Uncertainty: uncertainty calculated from uncertainty in average Polyelectrolyte input, of transfer coefficients in the incinerator, and the uncertainty of the waste composition of this waste
  properties: carbon content, fossil 0.003, dry mass 1 kg, wet mass 1 kg
- chromium trioxide, flakes: 1.83556e-7 kg; lognormal variance with pedigree 1.0607, pedigree (1,1,4,1,1)
  Input to DeNOx stage. Active component in SCR catalyst (vanadium pentoxide, V2O5), here approximated with the available chromium trioxide.
  Uncertainty: uncertainty calculated from uncertainty in average DeNOx input, uncertainty in the share of thermal NOx, uncertainty of nitrogen content in average municipal waste and the uncertainty in nitrogen content in *this* waste.
  properties: dry mass 1 kg, wet mass 1 kg
- electricity, for reuse in municipal waste incineration only: 2.89207e-6, 0.000418898, 8.14345e-5, 0.000402606, 0.00041661, 0.00104556, 1.7809e-5, 6.5452e-6, 0.000314322, 0.000220862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 kWh (26 suppliers, which the file names only by identifier); sum of these 0.0349753 kWh; lognormal variance with pedigree 0.00859512, pedigree (1,1,4,1,1)
  Net electricity required to incinerate this waste (subsidised from high-calorific waste fractions).
  Uncertainty: uncertainty is calculated from uncertainties in waste composition and uncertainties in energy efficiency and the uncertainty in internal energy demand
- heat, district or industrial, natural gas: 0.0268453 MJ; lognormal variance with pedigree 0.6585, pedigree (1,1,4,1,1)
  Input to DeNOx stage, to heat up flue gas in low-dust SCR.
  Uncertainty: uncertainty calculated from uncertainty in average DeNOx input, uncertainty in the share of thermal NOx, uncertainty of nitrogen content in average municipal waste and the uncertainty in nitrogen content in *this* waste.
  properties: heating value, net 1 MJ
- heat, for reuse in municipal waste incineration only: 0.000183988, 3.11844e-6, 4.76675e-5, 0.000115115, 0.000183542, 0.000243862, 0.0139514, 6.50417e-6, 5.81811e-5, 3.83122e-6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 MJ (26 suppliers, which the file names only by identifier); sum of these 0.0204638 MJ; lognormal variance with pedigree 0.00859512, pedigree (1,1,4,1,1)
  Net heat required to incinerate this waste (subsidised from high-calorific waste fractions).
  Uncertainty: uncertainty is calculated from uncertainties in waste composition and uncertainties in energy efficiency and the uncertainty in internal energy demand
- hydrochloric acid, without water, in 30% solution state: 1.72515e-6, 7.8814e-6 kg (2 suppliers, which the file names only by identifier); sum of these 9.60655e-6 kg; lognormal variance with pedigree 0.074461, pedigree (1,1,4,1,1)
  auxiliary inputs for the wastewater treatment stage of the incinerator plant.
  Uncertainty: uncertainty calculated from uncertainty in average HCl input, of transfer coefficients in the incinerator, and the uncertainty of the waste composition of this waste
  properties: dry mass 1 kg, heating value, net 3.32 MJ, wet mass 1 kg
- iron(III) chloride, without water, in 40% solution state: 0.000542793 kg; lognormal variance with pedigree 0.34712, pedigree (1,1,4,1,1)
  auxiliary inputs for the wastewater treatment stage of the incinerator plant.
  Uncertainty: uncertainty calculated from uncertainty in average FeCl3 input, of transfer coefficients in the incinerator, and the uncertainty of the waste composition of this waste
  properties: dry mass 1 kg, wet mass 1 kg
- municipal waste incineration facility: 2.5e-10 unit
  Infrastructure demands per kilogram incinerated waste.
- quicklime, milled, packed: 3.33213e-6, 2.82842e-8 kg (2 suppliers, which the file names only by identifier); sum of these 3.36042e-6 kg; lognormal variance with pedigree 0.17997, pedigree (1,1,4,1,1)
  auxiliary inputs for the flue gas treatment stage of the incinerator plant.
  Uncertainty: uncertainty calculated from uncertainty in average CaO input, of transfer coefficients in the incinerator, and the uncertainty of the waste composition of this waste
  properties: dry mass 0.99 kg, water content 0.010101, wet mass 1 kg
- residues, MSWI-WWT-SLF, lignite ash: -0.0400554 kg; lognormal variance with pedigree 0.021722, pedigree (1,1,1,1,1)
  waste-specific incineration residues (fly ash + scrubber sludge) from the incineration of this waste
  Uncertainty: uncertainty is calculated from uncertainties in waste composition and transfer coefficients in incinerator
  production volume
    calculated in proportion to incinerated waste input
  properties: aluminium content 0.0283865, barium content 0.0700298, boron content 0.0201769, calcium content 0.20178, dry mass 1 kg, magnesium content 0.0261962, manganese content 0.0123465, oxygen content 0.404495, potassium content 0.0193608, silicon content 0.180617, sodium content 0.0242316, wet mass 1 kg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
- sodium hydroxide, without water, in 50% solution state: 5.71429e-8, 5.8519e-7 kg (2 suppliers, which the file names only by identifier); sum of these 6.42333e-7 kg; lognormal variance with pedigree 0.17997, pedigree (1,1,4,1,1)
  auxiliary inputs for the flue gas treatment stage of the incinerator plant, and partially in the filter ash treatment (FLUWA).
  Uncertainty: uncertainty calculated from uncertainty in average NaOH input, of transfer coefficients in the incinerator, and the uncertainty of the waste composition of this waste
  properties: dry mass 1 kg, heating value, net 3.03 MJ, wet mass 1 kg
- titanium dioxide: 5.99617e-6, 2.99809e-6 kg (2 suppliers, which the file names only by identifier); sum of these 8.99426e-6 kg; lognormal variance with pedigree 1.0607, pedigree (1,1,4,1,1)
  Input to DeNOx stage (TiO2 catalyst carrier)
  Uncertainty: uncertainty calculated from uncertainty in average DeNOx input, uncertainty in the share of thermal NOx, uncertainty of nitrogen content in average municipal waste and the uncertainty in nitrogen content in *this* waste.
  properties: dry mass 1 kg, wet mass 1 kg
- triazine-compound: 2.09497e-6 kg; lognormal variance with pedigree 0.79603, pedigree (1,1,4,1,1)
  auxiliary inputs for the wastewater treatment stage of the incinerator plant. Proxy for (pure) Trisodium-trimercapto-s-triazine (CAS 17766-26-6), used as 15% diluted solution, aka TMT15.
  Uncertainty: uncertainty calculated from uncertainty in average TMT15 input, of transfer coefficients in the incinerator, and the uncertainty of the waste composition of this waste
  properties: carbon content, fossil 0.475616, dry mass 1 kg, wet mass 1 kg
- water, decarbonised: 6.35727e-6, 0.00522094, 0.0762872, 0.0039068, 0.0647576, 0.00663674, 0.0409998, 0.0101655, 0.000366387, 0.0100119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 kg (13 suppliers, which the file names only by identifier); sum of these 0.233038 kg; lognormal variance with pedigree 0.34712, pedigree (1,1,4,1,1)
  Incinerator process water used in flue gas scrubber stage.
  Uncertainty: uncertainty calculated from uncertainty in average water input, and the uncertainty of the waste composition of this waste
  properties: wet mass 1 kg

## Inputs from nature
- Oxygen [natural resource, in air]: 0.091786 kg; lognormal variance with pedigree 0.073014, pedigree (1,1,4,1,1)
  oxygen from ambient air needed to combust and oxidise this waste. Net demand, i.e. without O2 leaving the plant in flue gas uncombusted.
  Uncertainty: uncertainty is calculated from uncertainties in waste composition and transfer coefficients to flue gas and solid residues in incinerator

## Emissions to nature
- Aluminium III [air, urban air close to ground]: 5.14495e-9 kg; lognormal variance with pedigree 0.46218, pedigree (1,1,4,1,1)
  Emission to air from waste composition and incinerator transfer coefficients.
  Uncertainty: uncertainty is calculated from uncertainties in waste composition and transfer coefficients in incinerator
- Ammonia [air, urban air close to ground]: 1.68788e-7 kg; lognormal variance with pedigree 0.72157, pedigree (1,1,4,1,1)
  Nitrogen species emitted to air after DeNOx stage.
  Uncertainty: uncertainty calculated from uncertainty in average N-emissions and uncertainty in the share of thermal NOx and the uncertainty in nitrogen content in *this* waste.
- Antimony ion [air, urban air close to ground]: 8.30441e-12 kg; lognormal variance with pedigree 0.95957, pedigree (1,1,4,1,1)
  (same comment as for Aluminium III)
- Arsenic ion [air, urban air close to ground]: 2.57711e-7 kg; lognormal variance with pedigree 0.83471, pedigree (1,1,4,1,1)
  (same comment as for Aluminium III)
- Barium II [air, urban air close to ground]: 2.21785e-5 kg; lognormal variance with pedigree 0.46218, pedigree (1,1,4,1,1)
  (same comment as for Aluminium III)
- Benzene [air, urban air close to ground]: 4.78949e-8 kg; lognormal variance with pedigree 0.069993, pedigree (1,1,4,1,1)
  Incomplete combustion product emitted to air.
  Uncertainty: uncertainty calculated from uncertainty in average operation emissions, and the uncertainty of the flue gas volume from this waste.
- Benzo(a)pyrene [air, urban air close to ground]: 1.06581e-12 kg; lognormal variance with pedigree 0.37026, pedigree (1,1,4,1,1)
  (same comment as for Benzene)
- Cadmium II [air, urban air close to ground]: 2.81536e-9 kg; lognormal variance with pedigree 1.0552, pedigree (1,1,4,1,1)
  (same comment as for Aluminium III)
- Calcium II [air, urban air close to ground]: 0.000244921 kg; lognormal variance with pedigree 0.28401, pedigree (1,1,4,1,1)
  (same comment as for Aluminium III)
- Carbon dioxide, fossil [air, urban air close to ground]: 0.0492422 kg; lognormal variance with pedigree 0.48074, pedigree (1,1,4,1,1)
  (same comment as for Aluminium III)
- Carbon monoxide, fossil [air, urban air close to ground]: 8.14158e-5 kg; lognormal variance with pedigree 0.74529, pedigree (1,1,4,1,1)
  (same comment as for Benzene)
- Chromium III [air, urban air close to ground]: 7.74713e-9 kg; lognormal variance with pedigree 0.99635, pedigree (1,1,4,1,1)
  (same comment as for Aluminium III)
- Cobalt II [air, urban air close to ground]: 4.34754e-7 kg; lognormal variance with pedigree 0.69618, pedigree (1,1,4,1,1)
  (same comment as for Aluminium III)
- Copper ion [air, urban air close to ground]: 1.47051e-10 kg; lognormal variance with pedigree 1.1727, pedigree (1,1,4,1,1)
  (same comment as for Aluminium III)
- Cyanide [air, urban air close to ground]: 3.78647e-6 kg; lognormal variance with pedigree 0.80783, pedigree (1,1,4,1,1)
  (same comment as for Ammonia)
- Dinitrogen monoxide [air, urban air close to ground]: 1.76245e-5 kg; lognormal variance with pedigree 0.80783, pedigree (1,1,4,1,1)
  (same comment as for Ammonia)
- Dioxins, measured as 2,3,7,8-tetrachlorodibenzo-p-dioxin [air, urban air close to ground]: 9.57833e-14 kg; lognormal variance with pedigree 0.37026, pedigree (1,1,4,1,1)
  (same comment as for Benzene)
- Hexachlorobenzene [air, urban air close to ground]: 1.00146e-10 kg; lognormal variance with pedigree 0.069993, pedigree (1,1,4,1,1)
  (same comment as for Benzene)
- Iron ion [air, urban air close to ground]: 7.75635e-9 kg; lognormal variance with pedigree 0.55292, pedigree (1,1,4,1,1)
  (same comment as for Aluminium III)
- Lead II [air, urban air close to ground]: 1.33702e-10 kg; lognormal variance with pedigree 1.1874, pedigree (1,1,4,1,1)
  (same comment as for Aluminium III)
- Magnesium [air, urban air close to ground]: 9.02392e-6 kg; lognormal variance with pedigree 0.29027, pedigree (1,1,4,1,1)
  (same comment as for Aluminium III)
- Manganese II [air, urban air close to ground]: 2.44724e-7 kg; lognormal variance with pedigree 0.60265, pedigree (1,1,4,1,1)
  (same comment as for Aluminium III)
- Mercury II [air, urban air close to ground]: 1.09819e-9 kg; lognormal variance with pedigree 1.5432, pedigree (1,1,4,1,1)
  (same comment as for Aluminium III)
- Methane, fossil [air, urban air close to ground]: 7.18424e-7 kg; lognormal variance with pedigree 0.069993, pedigree (1,1,4,1,1)
  (same comment as for Benzene)
- Molybdenum VI [air, urban air close to ground]: 3.40002e-8 kg; lognormal variance with pedigree 0.8567, pedigree (1,1,4,1,1)
  (same comment as for Aluminium III)
- NMVOC, non-methane volatile organic compounds [air, urban air close to ground]: 2.17968e-6 kg; lognormal variance with pedigree 0.069993, pedigree (1,1,4,1,1)
  (same comment as for Benzene)
- Nickel II [air, urban air close to ground]: 3.32235e-8 kg; lognormal variance with pedigree 0.83471, pedigree (1,1,4,1,1)
  (same comment as for Aluminium III)
- Nitrogen oxides [air, urban air close to ground]: 5.34495e-5 kg; lognormal variance with pedigree 0.72157, pedigree (1,1,4,1,1)
  sum of fuel-NOx and thermal-NOx emitted to air after DeNOx stage.
  Uncertainty: uncertainty calculated from uncertainty in average N-emissions and uncertainty in the share of thermal NOx and the uncertainty in nitrogen content in *this* waste.
- Particulate Matter, < 2.5 um [air, urban air close to ground]: 5.71826e-6 kg; lognormal variance with pedigree 0.37026, pedigree (1,1,4,1,1)
  (same comment as for Benzene)
- Particulate Matter, > 2.5 um and < 10um [air, urban air close to ground]: 2.8735e-8 kg; lognormal variance with pedigree 0.16545, pedigree (1,1,4,1,1)
  (same comment as for Benzene)
- Pentachlorobenzene [air, urban air close to ground]: 2.53045e-10 kg; lognormal variance with pedigree 0.069993, pedigree (1,1,4,1,1)
  (same comment as for Benzene)
- Pentachlorophenol [air, urban air close to ground]: 2.08576e-11 kg; lognormal variance with pedigree 0.069993, pedigree (1,1,4,1,1)
  (same comment as for Benzene)
- Phosphorus [air, urban air close to ground]: 9.52032e-8 kg; lognormal variance with pedigree 0.82006, pedigree (1,1,4,1,1)
  (same comment as for Aluminium III)
- Potassium I [air, urban air close to ground]: 6.62825e-6 kg; lognormal variance with pedigree 0.36764, pedigree (1,1,4,1,1)
  (same comment as for Aluminium III)
- Scandium [air, urban air close to ground]: 6.54119e-10 kg; lognormal variance with pedigree 1.1214, pedigree (1,1,4,1,1)
  (same comment as for Aluminium III)
- Selenium IV [air, urban air close to ground]: 7.42992e-8 kg; lognormal variance with pedigree 0.98899, pedigree (1,1,4,1,1)
  (same comment as for Aluminium III)
- Silicon [air, urban air close to ground]: 1.20576e-7 kg; lognormal variance with pedigree 0.36764, pedigree (1,1,4,1,1)
  (same comment as for Aluminium III)
- Sodium I [air, urban air close to ground]: 1.40667e-5 kg; lognormal variance with pedigree 0.27159, pedigree (1,1,4,1,1)
  (same comment as for Aluminium III)
- Strontium II [air, urban air close to ground]: 4.2263e-9 kg; lognormal variance with pedigree 0.71068, pedigree (1,1,4,1,1)
  (same comment as for Aluminium III)
- Thallium I [air, urban air close to ground]: 5.11505e-11 kg; lognormal variance with pedigree 1.5001, pedigree (1,1,4,1,1)
  (same comment as for Aluminium III)
- Tin ion [air, urban air close to ground]: 3.55724e-13 kg; lognormal variance with pedigree 1.3408, pedigree (1,1,4,1,1)
  (same comment as for Aluminium III)
- Titanium ion [air, urban air close to ground]: 2.22555e-7 kg; lognormal variance with pedigree 0.68171, pedigree (1,1,4,1,1)
  (same comment as for Aluminium III)
- Toluene [air, urban air close to ground]: 9.57898e-8 kg; lognormal variance with pedigree 0.069993, pedigree (1,1,4,1,1)
  (same comment as for Benzene)
- Vanadium V [air, urban air close to ground]: 4.3644e-6 kg; lognormal variance with pedigree 0.70343, pedigree (1,1,4,1,1)
  (same comment as for Aluminium III)
- Water [air, urban air close to ground]: 0.000851391 m3; lognormal variance with pedigree 0.24898, pedigree (1,1,4,1,1)
  water vapour from waste humidity, hydrogen oxidation and part of the process water.
  Uncertainty: Uncertainty calculated from uncertainty in waste composition, process water input and the uncertainty of fraction to air.
- Zinc II [air, urban air close to ground]: 4.58805e-8 kg; lognormal variance with pedigree 0.80542, pedigree (1,1,4,1,1)
  (same comment as for Aluminium III)
- Non-hazardous waste disposed [inventory indicator, waste]: 1 kg
  Inventory indicator for waste mass disposed. To be used in EN15804 "other data" results.
- Aluminium III [water, surface water]: 5.14495e-8 kg; lognormal variance with pedigree 0.44576, pedigree (1,1,4,1,1)
  Emissions to water from waste composition and incinerator transfer coefficients.
  Uncertainty: uncertainty is calculated from uncertainties in waste composition and transfer coefficients in incinerator
- Antimony ion [water, surface water]: 8.30441e-12 kg; lognormal variance with pedigree 0.9588, pedigree (1,1,4,1,1)
  (same comment as for Aluminium III)
- Arsenic ion [water, surface water]: 1.15876e-15 kg; lognormal variance with pedigree 1.00468, pedigree (1,1,4,1,1)
  (same comment as for Aluminium III)
- BOD5, Biological Oxygen Demand [water, surface water]: 1.55435e-5 kg; lognormal variance with pedigree 0.50462, pedigree (1,1,4,1,1)
  (same comment as for Aluminium III)
- Barium II [water, surface water]: 2.89131e-7 kg; lognormal variance with pedigree 0.48683, pedigree (1,1,4,1,1)
  (same comment as for Aluminium III)
- COD, Chemical Oxygen Demand [water, surface water]: 1.55435e-5 kg; lognormal variance with pedigree 0.50462, pedigree (1,1,4,1,1)
  (same comment as for Aluminium III)
- Cadmium II [water, surface water]: 2.81536e-10 kg; lognormal variance with pedigree 1.0716, pedigree (1,1,4,1,1)
  (same comment as for Aluminium III)
- Calcium II [water, surface water]: 0.000244921 kg; lognormal variance with pedigree 0.28255, pedigree (1,1,4,1,1)
  (same comment as for Aluminium III)
- Chromium III [water, surface water]: 6.88888e-10 kg; lognormal variance with pedigree 1.013, pedigree (1,1,4,1,1)
  (same comment as for Aluminium III)
- Cobalt II [water, surface water]: 2.37449e-9 kg; lognormal variance with pedigree 0.72828, pedigree (1,1,4,1,1)
  (same comment as for Aluminium III)
- Copper ion [water, surface water]: 1.47051e-10 kg; lognormal variance with pedigree 1.1751, pedigree (1,1,4,1,1)
  (same comment as for Aluminium III)
- DOC, Dissolved Organic Carbon [water, surface water]: 6.80029e-6 kg; lognormal variance with pedigree 0.50462, pedigree (1,1,4,1,1)
  (same comment as for Aluminium III)
- Iron ion [water, surface water]: 7.75635e-8 kg; lognormal variance with pedigree 0.53706, pedigree (1,1,4,1,1)
  (same comment as for Aluminium III)
- Lead II [water, surface water]: 1.33702e-10 kg; lognormal variance with pedigree 1.1885, pedigree (1,1,4,1,1)
  (same comment as for Aluminium III)
- Magnesium [water, surface water]: 1.12799e-5 kg; lognormal variance with pedigree 0.29027, pedigree (1,1,4,1,1)
  (same comment as for Aluminium III)
- Manganese II [water, surface water]: 1.52394e-7 kg; lognormal variance with pedigree 0.60388, pedigree (1,1,4,1,1)
  (same comment as for Aluminium III)
- Mercury II [water, surface water]: 1.96106e-11 kg; lognormal variance with pedigree 1.5617, pedigree (1,1,4,1,1)
  (same comment as for Aluminium III)
- Molybdenum VI [water, surface water]: 1.36001e-9 kg; lognormal variance with pedigree 0.873, pedigree (1,1,4,1,1)
  (same comment as for Aluminium III)
- Nickel II [water, surface water]: 1.17734e-9 kg; lognormal variance with pedigree 0.85346, pedigree (1,1,4,1,1)
  (same comment as for Aluminium III)
- Nitrate [water, surface water]: 5.16952e-6 kg; lognormal variance with pedigree 0.053875, pedigree (1,1,4,1,1)
  (same comment as for Aluminium III)
- Phosphate [water, surface water]: 3.17122e-8 kg; lognormal variance with pedigree 0.83291, pedigree (1,1,4,1,1)
  (same comment as for Aluminium III)
- Potassium I [water, surface water]: 6.62825e-6 kg; lognormal variance with pedigree 0.36574, pedigree (1,1,4,1,1)
  (same comment as for Aluminium III)
- Selenium IV [water, surface water]: 9.93292e-12 kg; lognormal variance with pedigree 1.0485, pedigree (1,1,4,1,1)
  (same comment as for Aluminium III)
- Silicon [water, surface water]: 1.20576e-7 kg; lognormal variance with pedigree 0.37054, pedigree (1,1,4,1,1)
  (same comment as for Aluminium III)
- Sodium I [water, surface water]: 1.40667e-5 kg; lognormal variance with pedigree 0.26906, pedigree (1,1,4,1,1)
  (same comment as for Aluminium III)
- TOC, Total Organic Carbon [water, surface water]: 6.80029e-6 kg; lognormal variance with pedigree 0.50462, pedigree (1,1,4,1,1)
  (same comment as for Aluminium III)
- Tin ion [water, surface water]: 3.55724e-13 kg; lognormal variance with pedigree 1.3382, pedigree (1,1,4,1,1)
  (same comment as for Aluminium III)
- Titanium ion [water, surface water]: 7.05663e-8 kg; lognormal variance with pedigree 0.69096, pedigree (1,1,4,1,1)
  (same comment as for Aluminium III)
- Vanadium V [water, surface water]: 1.07106e-8 kg; lognormal variance with pedigree 0.73395, pedigree (1,1,4,1,1)
  (same comment as for Aluminium III)
- Water [water, surface water]: 7.12559e-5 m3; lognormal variance with pedigree 1.4785, pedigree (1,1,4,1,1)
  process water released to surface water.
  Uncertainty: uncertainty calculated from uncertainty in process water input and the uncertainty of fraction to surface water.
- Zinc II [water, surface water]: 4.58805e-9 kg; lognormal variance with pedigree 0.81638, pedigree (1,1,4,1,1)
  (same comment as for Aluminium III)
