# ethylene dichloride production

Dataset: EcoSpold 2, unit process
Geography: RoW
Time period: 1997-01-01 to 2023-12-31
Technology level: current
Classification: EcoSpold01Categories: chemicals/organics
Classification: ISIC rev.4 ecoinvent: 2011:Manufacture of basic chemicals
Tags: ConvertedDataset
Scenario: Business-as-Usual
System model: Allocation, cut-off by classification
Generated by: Mike Chudacoff
Published in: Althaus H.-J. 2007
Database: ecoinvent
isCopyrightProtected: true
accessRestrictedTo: 1

## General comment
This inventory is a split if the available data on the two production routes: oxychlorination and chlorination.
[This dataset was already contained in the ecoinvent database version 2. It was not individually updated during the transfer to ecoinvent version 3. Life Cycle Impact Assessment results may still have changed, as they are affected by changes in the supply chain, i.e. in other datasets. This dataset was generated following the ecoinvent quality guidelines for version 2. It may have been subject to central changes described in the ecoinvent version 3 change report (http://www.ecoinvent.org/database/ecoinvent-version-3/reports-of-changes/), and the results of the central updates were reviewed extensively. The changes added e.g. consistent water flows and other information throughout the database. The documentation of this dataset can be found in the ecoinvent reports of version 2, which are still available via the ecoinvent website. The change report linked above covers all central changes that were made during the conversion process.]

## Included activities end
Cradle-to-gate, all precursor compounds, transports included

## Technology
The values are a mix over surveyed plants in Europe in the given time period.

## Reference product
- ethylene dichloride: 1 kg; By-product classification allocatable product; CPC 34110: Hydrocarbons and their halogenated, sulphonated, nitrated or nitrosated derivatives; HS2017 290315: Saturated chlorinated derivatives of acyclic hydrocarbons; ethylene dichloride (ISO) (1,2-dichloroethane); CAS 107-06-2
  EcoSpold01Location=RER
  production volume 4.33956e10 kg; = (5.5E9+9.995E9)/(0.1559+0.1610)
    Calculated value. The global production volume is extrapolated from the European Union and US production volumes of ethylene dichloride using the global average GDP (constant 2017 international USD from 2015-2019). The annual production value of the European Union in the year 2019 is 5.5E9 kg and the US production volume in 2019 is 9.995E9 kg. This value is divided by the EU share of global GDP, 15.59% (2015-2019), and the US share, 16.10% (2015-2019).
    References:
    Statista: Ethylene dichloride production in the United States from 1990 to 2019, available here: https://www.statista.com/statistics/974778/us-ethylene-dichloride-production-volume/, last accessed 12-07-2022.
    ECHA: 1,2-dichloro-ethane, available here: https://echa.europa.eu/substance-information/-/substanceinfo/100.003.145, last accessed 12-07-2022.
    World bank (2022): GDP, available here: https://data.worldbank.org/indicator/NY.GDP.MKTP.PP.KD, accessed 17-05-2022.
  property heating value, net 12.25 MJ
    LHV is calculated based on the elemental composition of the substance. Based on the name of the substance, the chemical formula of the substance is manually found to be: C2H4Cl2.
  property price 0.256557 EUR2005
    Calculated value based on data from United Nations Commodity Trade Statistics Database (comtrade.un.org) based on an average price from the years 2015-2019. UN comtrade category: 290315 1.2-dichloroethane(ethylene dihcloride), last accessed 2022-08-07.
    The prices were converted to EUR based on the annual exchange rates published by the European Central Bank (https://sdw.ecb.europa.eu/quickview.do?SERIES_KEY=120.EXR.A.USD.EUR.SP00.A, last accessed on 2022-02-15) and adjusted for inflation relative to 2005 using the producer price index (PPI) of the euro area, published by eurostat (https://appsso.eurostat.ec.europa.eu/nui/show.do?dataset=sts_inpp_a&lang=en, last accessed on 2022-05-04).
  properties: carbon allocation 0.244898 kg, carbon content 0.244898, carbon content, fossil 0.244898, carbon content, non-fossil 0, dry mass 1 kg, water content 0, water in wet mass 0 kg, wet mass 1 kg

## Inputs from technosphere
- chemical factory, organics: 4e-10 unit; lognormal variance with pedigree 0.0607, pedigree (2,2,5,5,3)
  EcoSpold01Location=RER
  Inifrastructure of a typical plant
  Uncertainty: inifrastructure of a typical plant
- chlorine, liquid: 0.735 kg; lognormal variance with pedigree 0.0607, pedigree (2,2,5,5,3)
  Precursor compound
  EcoSpold01Location=RER
  Uncertainty: precursor compound
  properties: dry mass 1 kg, wet mass 1 kg
- copper, cathode: 2.3e-5 kg; lognormal variance with pedigree 0.054, pedigree (1,4,5,5,1)
  Copper catalyst used in the chlorination process
  EcoSpold01Location=RER
  Uncertainty: copper catalyst used in the chlorination process
  properties: dry mass 1 kg, wet mass 1 kg
- ethylene: 0.000856193, 0.294144 kg (2 suppliers, which the file names only by identifier); sum of these 0.295 kg; lognormal variance with pedigree 0.0607, pedigree (2,2,5,5,3)
  EcoSpold01Location=RER
  Precursor compound
  Uncertainty: precursor compound
  properties: carbon content, fossil 0.857143, dry mass 1 kg, heating value, net 43.22 MJ, wet mass 1 kg

## Emissions to nature
All rows: lognormal variance with pedigree 0.054, pedigree (1,4,5,5,1)
- Carbon dioxide, fossil [air, urban air close to ground]: 0.029 kg
  One plant producing EDC
  Uncertainty: one plant producing EDC
- Carbon monoxide, fossil [air, urban air close to ground]: 8e-6 kg
  One plant producing EDC
  Uncertainty: one plant producing EDC
- Hydrocarbons, chlorinated [air, urban air close to ground]: 1e-7 kg
  One plant producing EDC
  Uncertainty: one plant producing EDC
- Hydrochloric acid [air, urban air close to ground]: 1.5e-6 kg
  One plant producing EDC
  Uncertainty: one plant producing EDC
- NMVOC, non-methane volatile organic compounds [air, urban air close to ground]: 6.5e-5 kg
  One plant producing EDC
  Uncertainty: one plant producing EDC
- Nitrogen oxides [air, urban air close to ground]: 2e-5 kg
  One plant producing EDC
  Uncertainty: one plant producing EDC
- Copper ion [soil, industrial]: 2.3e-5 kg
  Copper catalyst used in the chlorination process
  Uncertainty: copper catalyst used in the chlorination process
- AOX, Adsorbable Organic Halides [water, surface water]: 2e-7 kg
  One plant producing EDC
  Uncertainty: one plant producing EDC
- BOD5, Biological Oxygen Demand [water, surface water]: 5e-7 kg
  One plant producing EDC
  Uncertainty: one plant producing EDC
- COD, Chemical Oxygen Demand [water, surface water]: 5e-7 kg
  One plant producing EDC
  Uncertainty: one plant producing EDC
- Chlorinated solvents, unspecified [water, surface water]: 5e-8 kg
  One plant producing EDC
  Uncertainty: one plant producing EDC
- Copper ion [water, surface water]: 1e-9 kg
  (same comment as for Copper ion)
- DOC, Dissolved Organic Carbon [water, surface water]: 1.85185e-7 kg
  Calculated as equal to TOC.
  Uncertainty: one plant producing EDC
- TOC, Total Organic Carbon [water, surface water]: 1.85185e-7 kg
  Calculated by default as TOC (gC) = COD/2.7 (COD measured in g O2). Should more correctly be calculated from the carbon content of the specified emissions to water.
  Uncertainty: one plant producing EDC

## Extrapolations
This dataset has been copied from an original dataset covering the geography RER. The uncertainty has been adjusted accordingly.

## Review by Heiko Kunst 2003-08-20
Passed.
