# natural gas production, medium pressure, vehicle grade

Dataset: EcoSpold 2, unit process
Geography: RoW
Time period: 2001-01-01 to 2023-12-31
Technology level: current
Classification: EcoSpold01Categories: natural gas/fuels
Classification: ISIC rev.4 ecoinvent: 3520:Manufacture of gas; distribution of gaseous fuels through mains
Tags: ConvertedDataset
Scenario: Business-as-Usual
System model: Allocation, cut-off by classification
Share of production covered: 0 %
Generated by: Mireille Faist Emmenegger (obsolete)
Published in: Jungbluth N. 2007
Database: ecoinvent
isCopyrightProtected: true
accessRestrictedTo: 1

## General comment
This data set includes electricity requirements of a service station as well as emissions from losses. The initial pressure of gas is from the medium pressure network (0.1-1 bar). VOC emissions are calculated from gas losses and composition of Swiss natural gas.
[This dataset was already contained in the ecoinvent database version 2. It was not individually updated during the transfer to ecoinvent version 3. Life Cycle Impact Assessment results may still have changed, as they are affected by changes in the supply chain, i.e. in other datasets. This dataset was generated following the ecoinvent quality guidelines for version 2. It may have been subject to central changes described in the ecoinvent version 3 change report (http://www.ecoinvent.org/database/ecoinvent-version-3/reports-of-changes/), and the results of the central updates were reviewed extensively. The changes added e.g. consistent water flows and other information throughout the database. The documentation of this dataset can be found in the ecoinvent reports of version 2, which are still available via the ecoinvent website. The change report linked above covers all central changes that were made during the conversion process.]

## Included activities end
This data set includes electricity requirements of a natural gas service station as well as emissions from losses.

## Geography
Data for Switzerland

## Technology
Service station with medium initial gas pressure (0.1-1 bar)

## Time period
personal communication

## Reference product
- natural gas, medium pressure, vehicle grade: 1 kg; By-product classification allocatable product; CPC 69120: Gas distribution through mains (on own account); HS2017 271121: Petroleum gases and other gaseous hydrocarbons; in gaseous state, natural gas; CAS 8006-14-2
  EcoSpold01Location=CH
  production volume 3.96633 kg
    This is a placeholder value that does not reflect real-world production volumes. This dataset does not currently require a real-world production volume to work in the database framework, and no actual data were collected yet. This has no negative effect on the results of the ecoinvent database.
  property carbon content, fossil 0.695187
    C content considered the same as in high pressure (consumption mix)
  property heating value, net 48.98 MJ
    Based on a net calorific value of 36MJ/m3 and density 0.735kg/m3. Literature value, Source: Christoph Meili;Niels Jungbluth;Maresa Bussa (2022) Life cycle inventories of crude oil and natural gas extraction. ESU-services Ltd. commissioned by BAFU & VSG, Schaffhausen, Switzerland, http://esu-services.ch/data/public-lci-reports/
  property price 0.22684 EUR2005
    Calculated value based on data from the United Nations Commodity Trade Statistics Database (http://data.un.org/Data.aspx?q=natural+gas&d=ComTrade&f=_l1Code%3a28%3bcmdCode%3a271121; accessed 12 October 2023). UN Comtrade category: 271121 - Natural gas in gaseous state. An average for 2019-2021 was used and adjusted for inflation to the year 2005. The average price of imports and exports into the four main markets (EU, US, JP, and CN) was determined.
  properties: carbon allocation 0.695187 kg, carbon content 0.695187, carbon content, non-fossil 0, dry mass 1 kg, water content 0, water in wet mass 0 kg, wet mass 1 kg

## Inputs from technosphere
- electricity, medium voltage: 0.010084, 0.201154, 0.067587, 0.00308807, 0.000618074, 0.000132714, 0.0140459, 0.0207722, 0.0435185 kWh (9 suppliers, which the file names only by identifier); sum of these 0.361 kWh; lognormal variance with pedigree 0.0421, pedigree (1,2,5,5,1)
  EcoSpold01Location=CH
  Model from industry expert
  Uncertainty: Model from industry expert
- natural gas service station: 8.4821e-8 unit; lognormal variance with pedigree 0.3546, pedigree (2,4,5,5,1)
  Expert data for one service station
  EcoSpold01Location=CH
  Uncertainty: Expert data for one service station
- natural gas, high pressure: 0.0079886, 0.0134758, 0.0293948, 0.0098372, 0.00229891, 0.0136827, 0.0131296, 0.0345245, 0.0133287, 0.0206158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 m3 (39 suppliers, which the file names only by identifier); sum of these 1.36054 m3; lognormal variance with pedigree 0.0421, pedigree (1,2,5,5,1)
  Calculated based on the desity of natural gas 0.735 kg/m3.
  EcoSpold01Location=CH
  Uncertainty: Estimation from industry expert
  properties: carbon content, fossil 0.741, dry mass 0.735 kg, heating value, gross 40 MJ, heating value, net 36 MJ, wet mass 0.735 kg
  note on carbon content, fossil: Based on composition in M. Bussa, N. Jungbluth, C. Meili (2021) Life cycle inventories for long-distance transport and distribution of natural gas. ESU-services Ltd. Commissioned by the Federal Office for the Environment (FOEN) and the “Verband der Schweizerischen Gasindustrie (VSG). Schaffhausen, Switzerland. DOI: 10.13140/RG.2.2.24948.48007, http://esu-services.ch/data/public-lci-reports/, tab. 3.1
  note on heating value, gross: At standard conditions; based on Christoph Meili;Niels Jungbluth;Maresa Bussa (2022) Life cycle inventories of crude oil and natural gas extraction. ESU-services Ltd. commissioned by BAFU & VSG, Schaffhausen, Switzerland, http://esu-services.ch/data/public-lci-reports/, section 5.2

## Emissions to nature
All rows: lognormal variance with pedigree 0.1732, pedigree (2,3,5,5,1)
- Butane [air, urban air close to ground]: 1.4801e-6 kg
  Data from industry expert
  Uncertainty: Data from industry expert
- Carbon dioxide, fossil [air, urban air close to ground]: 2.8147e-6 kg
  Data from industry expert
  Uncertainty: Data from industry expert
- Ethane [air, urban air close to ground]: 8.552e-6 kg
  Data from industry expert
  Uncertainty: Data from industry expert
- Methane, fossil [air, urban air close to ground]: 0.00017652 kg
  Data from industry expert
  Uncertainty: Data from industry expert
- NMVOC, non-methane volatile organic compounds [air, urban air close to ground]: 8.1694e-7 kg
  Data from industry expert
  Uncertainty: Data from industry expert
- Propane [air, urban air close to ground]: 3.2616e-6 kg
  Data from industry expert
  Uncertainty: Data from industry expert

## Extrapolations
none This dataset has been copied from an original dataset covering the geography CH. The uncertainty has been adjusted accordingly.

## Review by Arnaud Dauriat 2005-08-04
Passed.
