# sodium methoxide production

Dataset: EcoSpold 2, unit process
Geography: GLO
Time period: 2003-01-01 to 2023-12-31
Technology level: current
Classification: ISIC rev.4 ecoinvent: 2011:Manufacture of basic chemicals
Synonyms: CH3NaO; sodium methanolate; sodium methylate
Scenario: Business-as-Usual
System model: Allocation, cut-off by classification
Generated by: Iasonas Ioannou
Published in: Kim S. 2003
Database: ecoinvent
isCopyrightProtected: true
accessRestrictedTo: 1

## General comment
This dataset represents the production of sodium methoxide (CH3ONa) by reaction of methanol with sodium hydroxide. Namely, a high proportion of sodium hydroxide is converted to sodium methoxide in the solution.
Sodium methoxide (CAS: 000124-41-4), also called sodium methanolate, is a solid under normal conditions of temperature and pressure as a white, and flow able, powder.
Sodium methoxide is widely used as reagent or a base catalyst (with high activity). An application of sodium methoxide as catalyst is in the methanol carbonylation process first described by BASF in 1925. At present, sodium methoxide is currently used in the industrial production of biodiesel. In the latter process, the methoxide ion, -OCH3, is the active part which reacts with the triglyceride molecules to generate methyl esters. AS a chemical reagent, sodium methoxide was used to produce pharmaceuticals, food ingredients, pigments and crop protecting agents. To name a few products, sodium methoxide is used in the manufacture of vitamin A1, vitamin B1, sulfame thoxypyridazine, sulfadiazine, trimethoprimm, among others.
In this dataset, the raw material inputs, and process-specific material exchanges, are modelled with a generic stoichiometry-based tool, using literature or estimated yields. The emissions are modelled with a default value, which is estimated based on losses, unreacted chemicals, among others. At the same time, the energy consumption is based on data from literature sources. Finally, the auxiliary (i.e., cooling water and infrastructure) exchanges are modelled with a default value based on industry data from literature sources. For more information on the calculations refer to the sampling procedure.

## Included activities start
The activity starts when the raw materials enter the process.

## Included activities end
The activity ends with sodium methoxide being ready for further transformation or transportation at the production site gate. Materials entering the process are included as well as energy uses, infrastructure and emissions.

## Geography
The inventory is modelled at the Global level. The main material inputs and outputs of this activity are generated with on a generic stoichiometry-based model, using literature or estimated yields. Furthermore, the source of information for the heat and electricity inputs is literature data for the specific technology. Finally, the main source of information for the values for water (process and cooling), nitrogen, chemical factory is industry data from the GENDORF Chemical Park, which is based in Germany and produced an average of 2462760 tonnes of chemical substances in the years 2015-2019. For more information on the calculations refer to the sampling procedure.
The dataset could also be considered as not geography-specific, and thus, valid for a broader geographical coverage.
References:
Hischier, R. (2005) Establishing Life Cycle Inventories of Chemicals Based on Differing Data Availability (9 pp). The International Journal of Life Cycle Assessment, Volume 10, Issue 1, pp 59-67. 10.1065/lca2004.10.181.7
Chemiepark GENDORF, Umwelterklärung 2016, https://www.gendorf.de/Nachbarn/Umweltschutz/Industrie%20und%20Nachhaltigkeit
Chemiepark GENDORF, Umwelterklärung 2017, https://www.gendorf.de/Nachbarn/Umweltschutz/Industrie%20und%20Nachhaltigkeit
Chemiepark GENDORF, Umwelterklärung 2020, https://www.gendorf.de/Nachbarn/Umweltschutz/Industrie%20und%20Nachhaltigkeit
Kim, Seungdo, and Michael Overcash "Energy in chemical manufacturing processes: gate‐to‐gate information for life cycle assessment." Journal of Chemical Technology & Biotechnology: International Research in Process, Environmental & Clean Technology 78.9 (2003): 995-1005.

## Technology
This dataset represents the production of sodium methoxide (CH3ONa) by reaction of methanol with sodium hydroxide. Namely, a high proportion of sodium hydroxide is converted to sodium methoxide in the solution.
Firstly, the sodium hydroxide breaks into ions of Na+ and OH-, and the OH- abstracts the hydrogen from methanol to form water and leaves the CH3O- available for reaction, while the OH- ion reacts with H+ ion, it reacts to form water, as follows:
Reaction:
NaOH + CH3-OH ⇌ NaOCH3 + H2O
The reaction takes place in an environmental with excess methanol, and the unreacted amount could be removed through evaportation, and returned into the reactor.
In this dataset, a yield of 95% was assumed.
Reference:
Kim, Seungdo, and Michael Overcash "Energy in chemical manufacturing processes: gate‐to‐gate information for life cycle assessment." Journal of Chemical Technology & Biotechnology: International Research in Process, Environmental & Clean Technology 78.9 (2003): 995-1005.
José F. O. Granjo and Nuno M. C. Oliveira
Industrial & Engineering Chemistry Research 2016 55 (1), 156-167
DOI: 10.1021/acs.iecr.5b02022

## Time period
The time period spans from the earliest year from which at least one of the input values was obtained until 2022, but overall form the most realistic picture of the production. Besides, the activity is partly generated, in terms of material inputs and outputs, based on a generic stoichiometry-based model, using literature or estimated yields, which does not expect to change over time.
The source of information for the heat and electricity inputs is literature data (from 2003) for the specific technology. Finally, the main source of information for the values for water (process and cooling), nitrogen, chemical factory is industry data from the GENDORF Chemical Park. The values are a 5-year average of data from 2015 to 2019 published by the GENDORF Chemical Park, which is based in Germany and produced an average of 2462760 tonnes of chemical substances in the years 2015-2019. The end time period is therefore set based on the years from Gendorf reference.
For more information on the calculations refer to the sampling procedure and in the comments of the exchanges.
References:
Hischier, R. (2005) Establishing Life Cycle Inventories of Chemicals Based on Differing Data Availability (9 pp). The International Journal of Life Cycle Assessment, Volume 10, Issue 1, pp 59-67. 10.1065/lca2004.10.181.7
Chemiepark GENDORF, Umwelterklärung 2016, https://www.gendorf.de/Nachbarn/Umweltschutz/Industrie%20und%20Nachhaltigkeit
Chemiepark GENDORF, Umwelterklärung 2017, https://www.gendorf.de/Nachbarn/Umweltschutz/Industrie%20und%20Nachhaltigkeit
Chemiepark GENDORF, Umwelterklärung 2020, https://www.gendorf.de/Nachbarn/Umweltschutz/Industrie%20und%20Nachhaltigkeit
Kim, Seungdo, and Michael Overcash "Energy in chemical manufacturing processes: gate‐to‐gate information for life cycle assessment." Journal of Chemical Technology & Biotechnology: International Research in Process, Environmental & Clean Technology 78.9 (2003): 995-1005.

## Reference product
- sodium methoxide: 1 kg; name sodium_methoxide_output; By-product classification allocatable product; CPC 34220: Zinc oxide; zinc peroxide; chromium oxides and hydroxides; manganese oxides; iron oxides and hydroxides; earth[…]; HS2017 281512: Sodium hydroxide (caustic soda); in aqueous solution (soda lye or liquid soda); CAS 124-41-4
  production volume 4.543e8 kg; name RP_PV
    The global market volume of sodium methoxide from 2018 is based on Statista, amounting to 454'300'000 kg, available here: https://www.statista.com/statistics/1286459/global-sodium-methylate-market-volume/, last accessed 25-09-2023.
  property heating value, net 13.47 MJ
    LHV is calculated based on the elemental composition of the substance. Based on the CAS number of the substance (000124-41-4), the chemical formula of the substance is found to be: CH3NaO, (PubChem 2020). Reference: Kim, S., Chen, J., Cheng, T., Gindulyte, A., He, J., He, S., Li, Q., Shoemaker, B. A., Thiessen, P. A., Yu, B., Zaslavsky, L., Zhang, J., & Bolton, E. E. (2019). PubChem 2019 update: improved access to chemical data. Nucleic acids research, 47(D1), D1102–D1109. https://doi.org/10.1093/nar/gky1033
  property molecular weight 54.0239 g/mol; name sodium_methoxide_output_MW
  property price 0.729 EUR2005
    Temporary price data. Calculated as 90% of purchasers price based on: 2005 price assumed by Haas M J, McAloon A J, Yee W C, Foglia T A. (2005): A process model to estimate biodiesel production costs
  properties: carbon allocation 0.222222 kg, carbon content 0.222222, carbon content, fossil 0.222222, carbon content, non-fossil 0, dry mass 1 kg, water content 0, water in wet mass 0 kg, wet mass 1 kg

## Inputs from technosphere
- chemical factory, organics: 4e-10 unit; source Gendorf 2000; lognormal variance with pedigree 0.3448, pedigree (2,4,2,5,4)
  Calculated based on literature data published by the industry. For this activity, no information was readily available concerning infrastructure and land-use. Therefore, the infrastructure is estimated based on data from two chemical factories, the BASF site of Ludwigshafen and the chemical factory in Gendorf (which are both located in Germany), which produce a wide range of chemical substances. Based on this data, the following assumptions are made: the built area amounts to about 4.2 ha, the plant has an average output of 50'000 t/a and a lifespan of fifty years. The estimated infrastructure amount is therefore 4.00 E-10 units per kg of produced chemical. References: Althaus H.-J., Chudacoff M., Hischier R., Jungbluth N., Osses M. and Primas A. (2007) Life Cycle Inventories of Chemicals. ecoinvent report No. 8, v2.0. EMPA Dübendorf, Swiss Centre for Life Cycle Inventories, Dübendorf, CH. Gendorf (2000) Umwelterklärung 2000, Werk Gendorf. Werk Gendorf, Burgkirchen.
- electricity, medium voltage: 1.317 kWh; source Gendorf 2000; lognormal variance with pedigree 0.0046, pedigree (2,3,2,5,2)
  Value reported by Kim, Seungdo, and Michael Overcash "Energy in chemical manufacturing processes: gate‐to‐gate information for life cycle assessment." Journal of Chemical Technology & Biotechnology: International Research in Process, Environmental & Clean Technology 78.9 (2003): 995-1005.
- heat, from steam, in chemical industry: 1.86175, 0.32825 MJ (2 suppliers, which the file names only by identifier); sum of these 2.19 MJ; lognormal variance with pedigree 0.0046, pedigree (2,3,2,5,2)
  Value reported by Kim, Seungdo, and Michael Overcash "Energy in chemical manufacturing processes: gate‐to‐gate information for life cycle assessment." Journal of Chemical Technology & Biotechnology: International Research in Process, Environmental & Clean Technology 78.9 (2003): 995-1005. Please note that Kim, Seungdo, and Michael Overcash reported the potential energy recovery of 0.62 MJ per kg of sodium methoxide produced.
  properties: heating value, net 1 MJ
- methanol: 0.0570084, 0.183156, 0.355202, 0.0336414 kg (4 suppliers, which the file names only by identifier); sum of these 0.629007 kg; lognormal variance with pedigree 0.0046, pedigree (2,3,2,5,2)
  Calculated value based on stoichiometric calculations and literature data. For more information on the calculations refer to the sampling procedure.
  properties: carbon content, fossil 0.375, dry mass 1 kg, heating value, net 20 MJ, molecular weight 32.0419 g/mol, wet mass 1 kg
  note on heating value, net: Based on literature, page 533, Report 17: Jungbluth, N., Chudacoff, M., Dauriat, A., Dinkel, F., Doka, G., Faist Emmenegger, M., Gnansounou, E., Kljun, N., Schleiss, K., Spielmann, M., Stettler, C., Sutter, J. 2007: Life Cycle Inventories of Bioenergy. ecoinvent report No. 17, Swiss Centre for Life Cycle Inventories, Dübendorf, CH.
- sodium hydroxide, without water, in 50% solution state: 0.0696765, 0.713545 kg (2 suppliers, which the file names only by identifier); sum of these 0.783221 kg; lognormal variance with pedigree 0.0046, pedigree (2,3,2,5,2)
  (same comment as for methanol)
  properties: dry mass 1 kg, heating value, net 3.03 MJ, molecular weight 39.997 g/mol, wet mass 1 kg
- wastewater, average: -1.60481e-6, -0.000267048, -6.38566e-5, -9.50792e-7 m3 (4 suppliers, which the file names only by identifier); sum of these -0.00033346 m3; lognormal variance with pedigree 0.0044, pedigree (2,3,1,5,2)
  (same comment as for methanol)
  production volume; = RP_PV* (WW / sodium_methoxide_output)
    Calculated from production volume of reference product using the relative outputs.
  properties: carbon content, non-fossil 0.194039, dry mass 0.346837 kg, mass concentration, TOC 0.1091 kg/m3, mass concentration, calcium 0.039453 kg/m3, mass concentration, chlorine 0.030031 kg/m3, mass concentration, hydrogen 0.013365 kg/m3, mass concentration, nitrogen 0.031015 kg/m3, mass concentration, oxygen 0.069824 kg/m3, mass concentration, sodium 0.06456 kg/m3, mass concentration, sulfur 0.015602 kg/m3, water content 2882.2, wet mass 1000 kg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
  note on carbon content, non-fossil: 0.0673 kg TOC/m3 (Tab A.17, ecoinvent v2.2 report 13_I). TOC was considered as Total Carbon.

## Inputs from nature
- Water, cooling, unspecified natural origin [natural resource, in water]: 0.014707 m3; source Gendorf 2000; lognormal variance with pedigree 0.0454, pedigree (2,4,2,5,4)
  Calculated based on literature data published by the GENDORF Chemical Park. The factory produced an average of 2462760 tonnes of chemical substances (including intermediates) per year in the years 2015-2019. The average amount of cooling water released in the years 2015-2019 was 34408800 t per year. It was assumed that 5% of the cooling water was emitted to air during its use, therefore, to calculate the input of cooling water, the output value reported by GENDORF was scaled up by the factor 1/0.95. This equals 0.014707 m3/kg chemical produced. References: Chemiepark GENDORF, Umwelterklärung 2016, https://www.gendorf.de/Nachbarn/Umweltschutz/Industrie%20und%20Nachhaltigkeit Chemiepark GENDORF, Umwelterklärung 2017, https://www.gendorf.de/Nachbarn/Umweltschutz/Industrie%20und%20Nachhaltigkeit Chemiepark GENDORF, Umwelterklärung 2020, https://www.gendorf.de/Nachbarn/Umweltschutz/Industrie%20und%20Nachhaltigkeit
- Water, river [natural resource, in water]: 0.00096543 m3; lognormal variance with pedigree 0.0454, pedigree (2,4,2,5,4)
  Calculated based on literature data published by the GENDORF Chemical Park. The factory produced an average of 2462760 tonnes of chemical substances (including intermediates) per year in the years 2015-2019. The average consumption of river water in the years 2015-2019 was 22000820 t per year. However, since the cooling water is modelled as an input, the amount of river water was adjusted to avoid double counting. 55% of the input amount of cooling water was deducted from the amount of river water, as that is the share of river water versus well water. This equals 0.00096543 m3/kg chemical produced. References: Chemiepark GENDORF, Umwelterklärung 2016, https://www.gendorf.de/Nachbarn/Umweltschutz/Industrie%20und%20Nachhaltigkeit Chemiepark GENDORF, Umwelterklärung 2017, https://www.gendorf.de/Nachbarn/Umweltschutz/Industrie%20und%20Nachhaltigkeit Chemiepark GENDORF, Umwelterklärung 2020, https://www.gendorf.de/Nachbarn/Umweltschutz/Industrie%20und%20Nachhaltigkeit
- Water, well, in ground [natural resource, in water]: 0.00081652 m3; lognormal variance with pedigree 0.0454, pedigree (2,4,2,5,4)
  Calculated based on literature data published by the GENDORF Chemical Park. The factory produced an average of 2462760 tonnes of chemical substances (including intermediates) per year in the years 2015-2019. The average consumption of well water in the years 2015-2019 was 18607480 t per year. However, since the cooling water is modelled as an input, the amount of well water was adjusted to avoid double counting. 45% of the input amount of cooling water was deducted from the amount of well water, as that is the share of well water versus river water. This equals 0.00081652 m3/kg chemical produced. References: Chemiepark GENDORF, Umwelterklärung 2016, https://www.gendorf.de/Nachbarn/Umweltschutz/Industrie%20und%20Nachhaltigkeit Chemiepark GENDORF, Umwelterklärung 2017, https://www.gendorf.de/Nachbarn/Umweltschutz/Industrie%20und%20Nachhaltigkeit Chemiepark GENDORF, Umwelterklärung 2020, https://www.gendorf.de/Nachbarn/Umweltschutz/Industrie%20und%20Nachhaltigkeit

## Emissions to nature
- Carbon dioxide, fossil [air, urban air close to ground]: 0.0448049 kg; lognormal variance with pedigree 0.006, pedigree (3,3,2,5,2)
  Calculated losses, based on the boiling point of a chemical, to water or to air. In addition, unreacted chemicals are assumed to go to wastewater treatment, which has a conversion rate in biological treatment of 95% of carbon into carbon dioxide. The remaining 5% are released as emissions to water.
  property molecular weight 44.0095 g/mol; name carbon_dioxide_emissions_air_MW
- Methanol [air, unspecified]: 0.00155904 kg; lognormal variance with pedigree 0.006, pedigree (3,3,2,5,2)
  (same comment as for Carbon dioxide, fossil)
- Water [air, unspecified]: 0.00147008 m3; lognormal variance with pedigree 0.0848, pedigree (2,4,2,5,4)
  Calculated based on literature data published by the GENDORF Chemical Park. The factory produced an average of 2462760 tonnes of chemical substances (including intermediates) per year in the years 2015-2019. To determine the emissions of water to air, the difference of all water inputs (from river, well, tap water and cooling) and outputs (wastewater, emissions to water) was calculated. The average ouput of water to air in the years 2015-2019 was 3620444 m3 per year. This equals 0.00147 m3/kg chemical produced. For more information on the other water exchanges please consult the respective exchange comment. References: Chemiepark GENDORF, Umwelterklärung 2016, https://www.gendorf.de/Nachbarn/Umweltschutz/Industrie%20und%20Nachhaltigkeit Chemiepark GENDORF, Umwelterklärung 2017, https://www.gendorf.de/Nachbarn/Umweltschutz/Industrie%20und%20Nachhaltigkeit Chemiepark GENDORF, Umwelterklärung 2020, https://www.gendorf.de/Nachbarn/Umweltschutz/Industrie%20und%20Nachhaltigkeit
  property fraction, origin: fresh water 0; name fraction_origin_fresh_water
  property fraction, origin: salt water 0; name fraction_origin_salt_water
  property fraction, origin: unspecified 1; name fraction_origin_unspecified
- BOD5, Biological Oxygen Demand [water, surface water]: 0.0021433 kg; lognormal variance with pedigree 0.218, pedigree (4,5,5,5,5)
  Calculated value. The BOD, COD, TOC and BOD5 are calculated based on the amount and type of emissions released to water in the same activity.
- COD, Chemical Oxygen Demand [water, surface water]: 0.0021433 kg; lognormal variance with pedigree 0.218, pedigree (4,5,5,5,5)
  (same comment as for BOD5, Biological Oxygen Demand)
- DOC, Dissolved Organic Carbon [water, surface water]: 0.000642989 kg; lognormal variance with pedigree 0.218, pedigree (4,5,5,5,5)
  (same comment as for BOD5, Biological Oxygen Demand)
- Methanol [water, unspecified]: 0.00156862 kg; lognormal variance with pedigree 0.006, pedigree (3,3,2,5,2)
  (same comment as for Carbon dioxide, fossil)
- Sodium I [water, unspecified]: 0.00112546 kg; lognormal variance with pedigree 0.006, pedigree (3,3,2,5,2)
  (same comment as for Carbon dioxide, fossil)
  property molecular weight 22.99 g/mol; name sodium_ion_emissions_water_MW
- Sodium methoxide [water, unspecified]: 0.00025 kg; lognormal variance with pedigree 0.006, pedigree (3,3,2,5,2)
  (same comment as for Carbon dioxide, fossil)
- TOC, Total Organic Carbon [water, unspecified]: 0.000642989 kg; lognormal variance with pedigree 0.218, pedigree (4,5,5,5,5)
  (same comment as for BOD5, Biological Oxygen Demand)
- Water [water, unspecified]: 0.0150391 m3; lognormal variance with pedigree 0.0848, pedigree (2,4,2,5,4)
  Calculated based on literature data published by the GENDORF Chemical Park. The factory produced an average of 2462760 tonnes of chemical substances (including intermediates) per year in the years 2015-2019. The amount of water released back to the environment consists of the sum of the amount of process water treated in the internal WWTP that is then released back to the environment and the amount of cooling water released back to the environment. The average ouput of the internal WWTP in the years 2015-2019 was 2628800 m3 and that of cooling water released back to the environment was 34408800 m3. This gives a yearly average of 37037600 m3 emissions of water to water. This equals 0.01504 m3/kg chemical produced. References: Chemiepark GENDORF, Umwelterklärung 2016, https://www.gendorf.de/Nachbarn/Umweltschutz/Industrie%20und%20Nachhaltigkeit Chemiepark GENDORF, Umwelterklärung 2017, https://www.gendorf.de/Nachbarn/Umweltschutz/Industrie%20und%20Nachhaltigkeit Chemiepark GENDORF, Umwelterklärung 2020, https://www.gendorf.de/Nachbarn/Umweltschutz/Industrie%20und%20Nachhaltigkeit
  property fraction, origin: fresh water 0; name fraction_origin_fresh_water_Ww
  property fraction, origin: salt water 0; name fraction_origin_salt_water_Ww
  property fraction, origin: unspecified 1; name fraction_origin_unspecified_Ww

## Sampling procedure
Literature data and stoichiometric calculation. This inventory is partially based on a generic model of the production of chemicals. The data generated by this model have been improved with compound-specific data when available. The model of the production of chemicals is using specific industry or literature data wherever possible and more generic data on chemical production processes to fill compound-specific data gaps when necessary. The basic principles of the model have been published in literature (Hischier, 2005). The model has been updated and extended with newly available data from the chemical industry. In the model, unreacted fractions are treated in a waste treatment process, and emissions reported are after a waste treatment process that is included in the scope of this dataset. For volatile reactants, a small level of evaporation is assumed. Solvents and catalysts are mostly recycled in closed-loop systems within the scope of the dataset and reported flows are for losses from this system.
The source of information for the heat and electricity inputs is literature data (from 2003) for the specific technology. Finally, the main source of information for the values for water (process and cooling), nitrogen, and chemical factory is industry data from the GENDORF Chemical Park. The values are a 5-year average of data from 2015 to 2019 published by the GENDORF Chemical Park, which is based in Germany and produced an average of 2462760 tonnes of chemical substances in the years 2015-2019. For more information refer to the comments of the exchanges.

References:
Hischier, R. (2005) Establishing Life Cycle Inventories of Chemicals Based on Differing Data Availability (9 pp). The International Journal of Life Cycle Assessment, Volume 10, Issue 1, pp 59-67. 10.1065/lca2004.10.181.7
Chemiepark GENDORF, Umwelterklärung 2016, https://www.gendorf.de/Nachbarn/Umweltschutz/Industrie%20und%20Nachhaltigkeit
Chemiepark GENDORF, Umwelterklärung 2017, https://www.gendorf.de/Nachbarn/Umweltschutz/Industrie%20und%20Nachhaltigkeit
Chemiepark GENDORF, Umwelterklärung 2020, https://www.gendorf.de/Nachbarn/Umweltschutz/Industrie%20und%20Nachhaltigkeit
Kim, Seungdo, and Michael Overcash "Energy in chemical manufacturing processes: gate‐to‐gate information for life cycle assessment." Journal of Chemical Technology & Biotechnology: International Research in Process, Environmental & Clean Technology 78.9 (2003): 995-1005.
