# treatment of residues, MSWI-WWT-SLF, waste paperboard, residual material landfill

Dataset: EcoSpold 2, unit process
Geography: GLO
Time period: 1994-01-01 to 2023-12-31
Technology level: current
Classification: ISIC rev.4 ecoinvent: 3822:Treatment and disposal of hazardous waste
Scenario: Business-as-Usual
System model: Allocation, cut-off by classification
Generated by: Nikolia Stoikou
Database: ecoinvent
isCopyrightProtected: true
accessRestrictedTo: 1

## General comment
The process represents the treatment of controlled landfilling in residual material landfill of a waste (residues) that is exclusively produced in another waste treatment. Residues are a by-product of municipal solid waste incineration (MSWI) of sewage sludge (with 70% water) that in turn is generated during wastewater treatement (WWT) of leachate from the sanitary landfilling (SLF) of 'waste paperboard'. Recommended use of this dataset: to be used within the specific chain of treatments for 'waste paperboard'. Share of biogenic carbon in the sludge: 97.062%.

## Included activities start
The activity starts with the waste being available at the gate of the treatment facility. Collection and transportation of the waste to the treatment plant is not included.

## Included activities end
The activity ends with the waste being treated and waste-specific emissions from the landfill are released to water (short-term emissions to river water and long-term emissions to ground water).

## Geography
Modelling parameters affecting the treatment technology are not specific to this geography.

## Technology
Residual material landfill for polluted, inorganic waste with base seal and leachate collection system (landfill type C). Recultivation after closure.

## Reference product
- residues, MSWI-WWT-SLF, waste paperboard: -1 kg; By-product classification Waste; CPC 3932: Ash and residue (except from the manufacture of iron or steel), containing metals or metallic compounds, except[…]; HS2017 262110: Slag and ash; ash and residues from the incineration of municipal waste
  main reference product of this activity
  production volume 232.905 kg
    calculated in proportion to incinerated waste reference product
  property price 0 EUR2005
    Waste products are assigned a price of zero as they are assumed to require further treatment.
  properties: antimony content 1.40874e-6, arsenic content 0.000663605, barium content 0.187858, beryllium content 5.87336e-5, cadmium content 0.0010049, carbon allocation 0.0810581 kg, carbon content 0.0810581, carbon content, fossil 0.00238113, carbon content, non-fossil 0.078677, chromium content 0.000325257, cobalt content 0.000379132, copper content 0.000122555, dry mass 1 kg, lead content 0.000595655, manganese content 0.272852, mercury content 0.000127478, nickel content 0.000132965, nitrogen content 0.000604618, oxygen content 0.3716, selenium content 0.00151722, strontium content 2.89333e-6, sulfur content 0.0677663, tin content 0.000167046, water content 0, water in wet mass 0 kg, wet mass 1 kg, zinc content 0.0131624

## Inputs from technosphere
- cement, unspecified: 0.4 kg; lognormal variance with pedigree 0.049084, pedigree (1,1,5,1,1)
  cement required for solidification of landfilled residual material
  Uncertainty: Uncertainty calculated from uncertainty of composition of incinerated waste, and incinerator model uncertainty and residual material landfill transfer coefficient uncertainty.
  properties: dry mass 1 kg, wet mass 1 kg
- process-specific burdens, residual material landfill: 0.71109, 0.00841689, 0.280494 kg (3 suppliers, which the file names only by identifier); sum of these 1 kg
  mass-specific expenditures required for landfilling of residual material
- residual material landfill: 2.0833e-9 unit
  residual material landfill infrastructure required for landfilling of residual material
- waste cement, hydrated: -4.81263e-5, -0.998037, -0.00191494 kg (3 suppliers, which the file names only by identifier); sum of these -1 kg
  hydrated cement output for solidification of landfilled residual material
  production volume
    calculated in proportion to incineration residues landfilled
  properties: dry mass 1 kg, wet mass 1 kg

## Inputs from nature
- Organic carbon, placed in landfill [inventory indicator, waste]: 0.081058 kg; lognormal variance with pedigree 0.131624, pedigree (1,1,5,1,1)
  Mass of organic carbon in waste (without inorganic carbon), initially put in residual material landfill. The exchange represents a flow that is within the technosphere. This exchange should only be used to apply ecofactors for the Swiss LCIA method of Ecological Scarcity and not any other purpose.
  Uncertainty: Uncertainty calculated from uncertainty of composition of incinerated waste, and incinerator model uncertainty and residual material landfill transfer coefficient uncertainty.
- Waste mass, total, placed in landfill [inventory indicator, waste]: 1 kg
  Mass of waste initially put in a residual material landfill. The exchange represents a flow that is within the technosphere. This exchange should only be used to apply ecofactors for the Swiss LCIA method of Ecological Scarcity and not any other purpose.

## Emissions to nature
- Hazardous waste disposed [inventory indicator, waste]: 1 kg
  Inventory indicator for waste mass disposed. To be used in EN15804 "other data" results.
- Antimony ion [water, ground-, long-term]: 9.1194e-7 kg; lognormal variance with pedigree 1.2828, pedigree (1,1,5,1,1)
  complement of long-term emissions from residual material in residual material landfill
  Uncertainty: Uncertainty calculated from uncertainty of composition of incinerated waste, and incinerator model uncertainty and residual material landfill transfer coefficient uncertainty.
- Antimony ion [water, surface water]: 4.968e-7 kg; lognormal variance with pedigree 1.307, pedigree (1,1,5,1,1)
  short-term emissions from residual material in residual material landfill
  Uncertainty: Uncertainty calculated from uncertainty of composition of incinerated waste, and incinerator model uncertainty and residual material landfill transfer coefficient uncertainty.
- Arsenic ion [water, ground-, long-term]: 6.6361e-13 kg; lognormal variance with pedigree 0.90815, pedigree (1,1,5,1,1)
  (same comment as for Antimony ion)
- Arsenic ion [water, surface water]: 0.00066361 kg; lognormal variance with pedigree 0.88451, pedigree (1,1,5,1,1)
  (same comment as for Antimony ion)
- BOD5, Biological Oxygen Demand [water, ground-, long-term]: 0.043302 kg; lognormal variance with pedigree 0.17922, pedigree (1,1,5,1,1)
  (same comment as for Antimony ion)
- BOD5, Biological Oxygen Demand [water, surface water]: 7.229e-5 kg; lognormal variance with pedigree 0.77464, pedigree (1,1,5,1,1)
  (same comment as for Antimony ion)
- Barium II [water, ground-, long-term]: 0.0015518 kg; lognormal variance with pedigree 6.0875, pedigree (1,1,5,1,1)
  (same comment as for Antimony ion)
- Barium II [water, surface water]: 2.5906e-6 kg; lognormal variance with pedigree 1.554, pedigree (1,1,5,1,1)
  (same comment as for Antimony ion)
- Beryllium II [water, ground-, long-term]: 2.1264e-5 kg; lognormal variance with pedigree 1.02742, pedigree (1,1,5,1,1)
  (same comment as for Antimony ion)
- Beryllium II [water, surface water]: 3.5499e-8 kg; lognormal variance with pedigree 1.4878, pedigree (1,1,5,1,1)
  (same comment as for Antimony ion)
- COD, Chemical Oxygen Demand [water, ground-, long-term]: 0.13238 kg; lognormal variance with pedigree 0.17922, pedigree (1,1,5,1,1)
  (same comment as for Antimony ion)
- COD, Chemical Oxygen Demand [water, surface water]: 0.00022101 kg; lognormal variance with pedigree 0.77464, pedigree (1,1,5,1,1)
  (same comment as for Antimony ion)
- Cadmium II [water, ground-, long-term]: 6.8221e-6 kg; lognormal variance with pedigree 7.2289, pedigree (1,1,5,1,1)
  (same comment as for Antimony ion)
- Cadmium II [water, surface water]: 1.1389e-8 kg; lognormal variance with pedigree 2.2411, pedigree (1,1,5,1,1)
  (same comment as for Antimony ion)
- Chromium VI [water, ground-, long-term]: 6.1762e-5 kg; lognormal variance with pedigree 0.93719, pedigree (1,1,5,1,1)
  (same comment as for Antimony ion)
- Chromium VI [water, surface water]: 1.9552e-5 kg; lognormal variance with pedigree 1.0982, pedigree (1,1,5,1,1)
  (same comment as for Antimony ion)
- Cobalt II [water, ground-, long-term]: 6.4818e-5 kg; lognormal variance with pedigree 1.4621, pedigree (1,1,5,1,1)
  (same comment as for Antimony ion)
- Cobalt II [water, surface water]: 1.0821e-7 kg; lognormal variance with pedigree 1.4991, pedigree (1,1,5,1,1)
  (same comment as for Antimony ion)
- Copper ion [water, ground-, long-term]: 4.7177e-6 kg; lognormal variance with pedigree 3.6051, pedigree (1,1,5,1,1)
  (same comment as for Antimony ion)
- Copper ion [water, surface water]: 7.876e-9 kg; lognormal variance with pedigree 1.9668, pedigree (1,1,5,1,1)
  (same comment as for Antimony ion)
- DOC, Dissolved Organic Carbon [water, ground-, long-term]: 0.052384 kg; lognormal variance with pedigree 0.17922, pedigree (1,1,5,1,1)
  (same comment as for Antimony ion)
- DOC, Dissolved Organic Carbon [water, surface water]: 8.7452e-5 kg; lognormal variance with pedigree 0.77464, pedigree (1,1,5,1,1)
  (same comment as for Antimony ion)
- Lead II [water, ground-, long-term]: 3.0897e-6 kg; lognormal variance with pedigree 7.872, pedigree (1,1,5,1,1)
  (same comment as for Antimony ion)
- Lead II [water, surface water]: 5.1581e-9 kg; lognormal variance with pedigree 2.2298, pedigree (1,1,5,1,1)
  (same comment as for Antimony ion)
- Manganese II [water, ground-, long-term]: 0.0022538 kg; lognormal variance with pedigree 6.1705, pedigree (1,1,5,1,1)
  (same comment as for Antimony ion)
- Manganese II [water, surface water]: 3.7627e-6 kg; lognormal variance with pedigree 1.637, pedigree (1,1,5,1,1)
  (same comment as for Antimony ion)
- Mercury II [water, ground-, long-term]: 6.0172e-6 kg; lognormal variance with pedigree 3.1083, pedigree (1,1,5,1,1)
  (same comment as for Antimony ion)
- Mercury II [water, surface water]: 1.0045e-8 kg; lognormal variance with pedigree 1.7647, pedigree (1,1,5,1,1)
  (same comment as for Antimony ion)
- Nickel II [water, ground-, long-term]: 4.8138e-5 kg; lognormal variance with pedigree 0.79441, pedigree (1,1,5,1,1)
  (same comment as for Antimony ion)
- Nickel II [water, surface water]: 8.0365e-8 kg; lognormal variance with pedigree 1.2548, pedigree (1,1,5,1,1)
  (same comment as for Antimony ion)
- Nitrate [water, ground-, long-term]: 0.002172 kg; lognormal variance with pedigree 0.33412, pedigree (1,1,5,1,1)
  (same comment as for Antimony ion)
- Nitrate [water, surface water]: 0.00050562 kg; lognormal variance with pedigree 0.40091, pedigree (1,1,5,1,1)
  (same comment as for Antimony ion)
- Selenium IV [water, ground-, long-term]: 0.00098216 kg; lognormal variance with pedigree 0.67217, pedigree (1,1,5,1,1)
  (same comment as for Antimony ion)
- Selenium IV [water, surface water]: 0.00053506 kg; lognormal variance with pedigree 0.69632, pedigree (1,1,5,1,1)
  (same comment as for Antimony ion)
- Strontium II [water, ground-, long-term]: 1.0475e-6 kg; lognormal variance with pedigree 0.99962, pedigree (1,1,5,1,1)
  (same comment as for Antimony ion)
- Strontium II [water, surface water]: 1.7487e-9 kg; lognormal variance with pedigree 1.46, pedigree (1,1,5,1,1)
  (same comment as for Antimony ion)
- Sulfate [water, ground-, long-term]: 0.18149 kg; lognormal variance with pedigree 0.24445, pedigree (1,1,5,1,1)
  (same comment as for Antimony ion)
- Sulfate [water, surface water]: 0.021812 kg; lognormal variance with pedigree 0.35771, pedigree (1,1,5,1,1)
  (same comment as for Antimony ion)
- TOC, Total Organic Carbon [water, ground-, long-term]: 0.052384 kg; lognormal variance with pedigree 0.17922, pedigree (1,1,5,1,1)
  (same comment as for Antimony ion)
- TOC, Total Organic Carbon [water, surface water]: 8.7452e-5 kg; lognormal variance with pedigree 0.77464, pedigree (1,1,5,1,1)
  (same comment as for Antimony ion)
- Tin ion [water, ground-, long-term]: 3.1654e-6 kg; lognormal variance with pedigree 4.9897, pedigree (1,1,5,1,1)
  (same comment as for Antimony ion)
- Tin ion [water, surface water]: 5.2845e-9 kg; lognormal variance with pedigree 2.1654, pedigree (1,1,5,1,1)
  (same comment as for Antimony ion)
- Zinc II [water, ground-, long-term]: 0.00016132 kg; lognormal variance with pedigree 5.5422, pedigree (1,1,5,1,1)
  (same comment as for Antimony ion)
- Zinc II [water, surface water]: 2.6931e-7 kg; lognormal variance with pedigree 1.8639, pedigree (1,1,5,1,1)
  (same comment as for Antimony ion)
