# dewatering of ethanol from biomass, from 95% to 99.7% solution state

Dataset: EcoSpold 2, unit process
Geography: BR
Time period: 2000-01-01 to 2023-12-31
Technology level: current
Classification: EcoSpold01Categories: biomass/fuels
Classification: ISIC rev.4 ecoinvent: 2011:Manufacture of basic chemicals
Synonyms: cologne spirits (alcohol); Ethanol absolute; ethanol 200 proof; ethyl hydrate; Ethanol; fermentation alcohol; Anhydrol; Alkohol; Denatured alcohol; grain alcohol; ethyl hydroxide; cologne spirit; algrain; alcohol dehydrated; Ethyl alcohol
Tags: ConvertedDataset
Scenario: Business-as-Usual
System model: Allocation, cut-off by classification
Share of production covered: 100 %
Generated by: Jürgen Sutter
Published in: Jungbluth N. 2007
Database: ecoinvent
isCopyrightProtected: true
accessRestrictedTo: 1

## General comment
The inventory for "ethanol, 99.7% in H2O, from biomass, at distillation, CH" is modelled with ethanol production from sugar cane and molasse from sugar cane in Brazil.
[This dataset was already contained in the ecoinvent database version 2. It was not individually updated during the transfer to ecoinvent version 3. Life Cycle Impact Assessment results may still have changed, as they are affected by changes in the supply chain, i.e. in other datasets. This dataset was generated following the ecoinvent quality guidelines for version 2. It may have been subject to central changes described in the ecoinvent version 3 change report (http://www.ecoinvent.org/database/ecoinvent-version-3/reports-of-changes/), and the results of the central updates were reviewed extensively. The changes added e.g. consistent water flows and other information throughout the database. The documentation of this dataset can be found in the ecoinvent reports of version 2, which are still available via the ecoinvent website. The change report linked above covers all central changes that were made during the conversion process.]

## Included activities end
Dewatering of ethanol 95% in H2O in Brazil.

## Geography
The inventory is modelled for Brazil.

## Technology
Dewatering of ethanol

## Time period
Time of publications

## Reference product
- ethanol, without water, in 99.7% solution state, from fermentation: 1 kg; By-product classification allocatable product; CPC 35491: Biodiesel; HS2017 290511: Alcohols; saturated monohydric, methanol (methyl alcohol); CAS 64-17-5
  EcoSpold01Location=BR
  production volume 1.264e10 kg
    Total production of ethanol from cane in Brazil is around 16.6 Mio m3 per a.
    Ethanol production in Brazil (16E+9 litres); 0.79 kg/l; Source: F. O. Licht World Ethanol and Biofuels Report, vol. 4, no. 17 (9 May 2006), p. 395.
  property heating value, net 28.1 MJ
    Based on literature, page 275, Report 17: Jungbluth, N., Chudacoff, M., Dauriat, A., Dinkel, F., Doka, G., Faist Emmenegger, M., Gnansounou, E., Kljun, N., Schleiss, K., Spielmann, M., Stettler, C., Sutter, J. 2007: Life Cycle Inventories of Bioenergy. ecoinvent report No. 17, Swiss Centre for Life Cycle Inventories, Dübendorf, CH.
  property price 0.436 EUR2005
    Calculated using world prices in FAPRI2007, 2009. Agricultural outlook. The prices in 2003 and 2004 were assumed to be the same as the most recent year (2005). (http://www.fapri.missouri.edu/outreach/publications/ag_outlook.asp?current_page=outreach; accessed 22/06/10). Unit conversion from US gallon to kg - 1 gallon = 3.7856 liter * 0.789 kg/liter (ethanol density) = 2.9868 kg (from http://www.peteducation.com/category.cfm?c=0+1305 and http://en.wikipedia.org/wiki/Ethanol accessed 25/6/10).
  properties: carbon allocation 0.521739 kg, carbon content 0.521739, carbon content, fossil 0, carbon content, non-fossil 0.521739, dry mass 1 kg, water content 0, water in wet mass 0 kg, wet mass 1 kg

## Inputs from technosphere
- electricity, high voltage: 8.36e-5 kWh; lognormal variance with pedigree 0.0401, pedigree (1,1,5,3,1)
  EcoSpold01Location=BR
  Galitsky 2003
  Uncertainty: Galitsky 2003
- ethanol, without water, in 95% solution state, from fermentation: 1 kg; lognormal variance with pedigree 0.0586, pedigree (4,3,5,1,1)
  Eners 2006
  EcoSpold01Location=BR
  Uncertainty: Eners 2006
  properties: carbon content, non-fossil 0.521739, dry mass 1 kg, heating value, net 28.1 MJ, wet mass 1 kg
  note on heating value, net: Based on literature, page 275, Report 17: Jungbluth, N., Chudacoff, M., Dauriat, A., Dinkel, F., Doka, G., Faist Emmenegger, M., Gnansounou, E., Kljun, N., Schleiss, K., Spielmann, M., Stettler, C., Sutter, J. 2007: Life Cycle Inventories of Bioenergy. ecoinvent report No. 17, Swiss Centre for Life Cycle Inventories, Dübendorf, CH.

## Sampling procedure
Literature data.

## Review by Niels Jungbluth 2006-08-15
Passed.
