# phosphate rock beneficiation

Dataset: EcoSpold 2, unit process
Geography: MA
Time period: 1986-01-01 to 2023-12-31
Technology level: current
Classification: ISIC rev.4 ecoinvent: 0891:Mining of chemical and fertilizer minerals
Tags: ConvertedDataset
Scenario: Business-as-Usual
System model: Allocation, cut-off by classification
Generated by: Alex Primas
Published in: Althaus H.-J. 2007
Database: ecoinvent
isCopyrightProtected: true
accessRestrictedTo: 1

## General comment
Large uncertainties exist for data on particle emissions from transfer and storage. Also data of emissions to water and soil are uncertain due to missing data of uncontrolled run off and water use which were estimated. Energy consumption data related to mass of rock moved.
The datasets was updated from producing 'phosphate rock, as P2O5, beneficiated, dry' into 'phosphate rock, beneficiated' and therefore the dataset has been scaled with a factor of 0.32 kg of phosphate rock, beneficiated per kg of phosphate rock, as P2O5, beneficiated, dry.

## Included activities end
Mining process, transport to beneficiation plant, dry processing including crushing, screening or washing and flotation.Drying orcalcination of washed rock included. Land use for mining and reclamation.

## Geography
Assumption for production in Morocco based mainly on data from Florida. Some data from Moroccan mines. Various processes with location RER used.

## Technology
U.S. technology for dry rock or dried wet rock processing. Average technology mix modelled. No specific age of technology modelled

## Time period
Time of literature publication. Measurements took place partly before this period.

## Parameters
- fraction, process water, to air: 0.34 dimensionless; name fraction_PW_to_air; lognormal variance with pedigree 0.092025, pedigree (4,4,3,2,4)
  Literature value (Statistics Canada, 2007 & Shaffer, K.H., 2008, Consumptive water use in the Great Lakes Basin, USGS) (Vionnet, S., Quantis Water Database - Technical Report, 2012).

## Reference product
- phosphate rock, beneficiated: 1 kg; By-product classification allocatable product; CPC 34629: Other phosphatic fertilizers, n.e.c.; HS2017 2510: Natural calcium phosphates; natural aluminium calcium phosphates and phosphatic chalk; CAS 1306-05-4
  Uncertainty not applicable for output
  production volume 2.5365e9 kg
    7.2 Mt as P2O5 in 2000, 21.6 Mt as Rock in 2000 Source: IFA production and trade statistics http://www.fertilizer.org/ifa/Home-Page/STATISTICS/Production-and-trade divided evenly between wet and dry product
  property oxygen content 0.180345
    Oxygen content (on a dry matter basis) of phosphate rock, beneficiated is calculated from the molecular formula of the substance (32% P2O5).
  property phosphorus content 0.139655
    Phosphorus content (on a dry matter basis) of phosphate rock, beneficiated is calculated from the molecular formula of the substance (32% P2O5).
  property price 0.049 EUR2005
    Calculated value based on data from United Nations Commodity Trade Statistics Database (comtrade.un.org). UN comtrade category: 251010 Natural calcium phosphates, unground. Year 2005. Using exchange rate of 1EURO = 1.209 USD. Average of price of import into 5 main markets (EU, US, JP, IN and CN).
  properties: carbon allocation 0 kg, carbon content 0, carbon content, fossil 0, carbon content, non-fossil 0, dry mass 1 kg, water content 0, water in wet mass 0 kg, wet mass 1 kg

## Inputs from technosphere
- diesel, burned in building machine: 0.03296 MJ; lognormal variance with pedigree 0.059225, pedigree (2,3,5,2,3)
  61% of world production 1994
  Uncertainty: 6
  properties: heating value, net 1 MJ
- electricity, medium voltage: 0.048 kWh; lognormal variance with pedigree 0.1232, pedigree (2,3,5,5,4)
  61% of world production 1994, European mix
  Uncertainty: 6
- ethylene diamine: 0.00032 kg; lognormal variance with pedigree 0.2646, pedigree (3,3,5,5,5)
  Average data from U.S study; proxy used
  Uncertainty: A
  properties: carbon content, fossil 0.5, dry mass 1 kg, heating value, net 28.24 MJ, wet mass 1 kg
- heat, district or industrial, natural gas: 0.18144 MJ; lognormal variance with pedigree 0.1232, pedigree (2,3,5,5,4)
  Technology-mix estimated, Location RER
  Uncertainty: T
  properties: heating value, net 1 MJ
- heat, district or industrial, other than natural gas: 0.18144 MJ; lognormal variance with pedigree 0.09, pedigree (1,1,5,1,1)
  2,3,3,5,4,3; Technology-mix estimated, Location RER
  properties: heating value, net 1 MJ
- light fuel oil: 0.001248 kg; lognormal variance with pedigree 0.1246, pedigree (3,3,5,5,4)
  Average data from U.S study, Location RER
  Uncertainty: A
  properties: carbon content, fossil 0.862, dry mass 1 kg, heating value, net 42.6 MJ, wet mass 1 kg
- mine infrastructure, phosphate rock: 9.696e-12 unit; lognormal variance with pedigree 0.448, pedigree (4,5,5,5,4)
  Estimated with weak data from 2 sites;activityLink introduced to establish a direct link to the corresponding regional supply of this product
  Uncertainty: E
- palm oil, crude: 0.000832 kg; lognormal variance with pedigree 0.2646, pedigree (3,3,5,5,5)
  Average data from U.S study; proxy used
  Uncertainty: A
  properties: carbon content, non-fossil 0.752881, dry mass 1 kg, heating value, net 37 MJ, wet mass 1 kg
  note on carbon content, non-fossil: C49H97O6. Palm oil (tab 17.4, ecoinvent v2.2 report 17-part 17)
  note on heating value, net: Literature value, Source: Biograce, Condensed list of standard values, version 2 - Public. Available at: https://biograce.net/app/webroot/files/file/BioGrace_condensed_list_of_standard_values_-_version_2_-_Public.doc
- soda ash, light: 0.000832 kg; lognormal variance with pedigree 0.1246, pedigree (3,3,5,5,4)
  Average data from U.S study, Location RER
  Uncertainty: A
  properties: carbon content, fossil 0.0517241, dry mass 1 kg, heating value, net 3.43 MJ, wet mass 1 kg
- sodium silicate, spray powder, 80%: 0.000256 kg; lognormal variance with pedigree 0.1246, pedigree (3,3,5,5,4)
  Average data from U.S study, Location RER
  Uncertainty: A
  properties: dry mass 1 kg, wet mass 1 kg
- sulfuric acid: 0.001248 kg; lognormal variance with pedigree 0.1246, pedigree (3,3,5,5,4)
  Average data from U.S study, Location RER
  Uncertainty: A
  properties: dry mass 1 kg, wet mass 1 kg

## Inputs from nature
- Fluorine [natural resource, in ground]: 0.03776 kg; lognormal variance with pedigree 0.0527, pedigree (3,3,5,3,1)
  4.5% F in apatite; 3% F in ore; Data for process loss estimated
  Uncertainty: D
- Occupation, construction site [natural resource, land]: 0.000352 m2*year; lognormal variance with pedigree 0.218, pedigree (4,5,5,5,4)
  Estimated from data of U.S. mines
  Uncertainty: E
- Occupation, mineral extraction site [natural resource, land]: 0.004608 m2*year; lognormal variance with pedigree 0.218, pedigree (4,5,5,5,4)
  Estimated from data of U.S. mines
  Uncertainty: E
- Phosphorus [natural resource, in ground]: 0.1504 kg; lognormal variance with pedigree 0.0402, pedigree (1,2,5,3,1)
  18% P in apatite; 12% in ore; Data of year 1999 / 2000 from Morocco used
  Uncertainty: D
- Transformation, from mineral extraction site [natural resource, land]: 0.0002304 m2; lognormal variance with pedigree 0.298, pedigree (4,5,5,5,4)
  Estimated from data of U.S. mines
  Uncertainty: E
- Transformation, from pasture, man made [natural resource, land]: 0.0002304 m2; lognormal variance with pedigree 0.298, pedigree (4,5,5,5,4)
  Estimated from data of U.S. mines
  Uncertainty: E
- Transformation, to mineral extraction site [natural resource, land]: 0.0002304 m2; lognormal variance with pedigree 0.298, pedigree (4,5,5,5,4)
  Estimated from data of U.S. mines
  Uncertainty: E
- Transformation, to pasture, man made [natural resource, land]: 0.0002304 m2; lognormal variance with pedigree 0.298, pedigree (4,5,5,5,4)
  Estimated from data of U.S. mines
  Uncertainty: E
- Water, well, in ground [natural resource, in water]: 0.001216 m3; name water_well_in_ground_input; lognormal variance with pedigree 0.148, pedigree (4,5,5,5,4)
  Estimated from data of U.S. mines
  Uncertainty: E

## Emissions to nature
- Carbon dioxide, fossil [air, non-urban air or from high stacks]: 0.007776 kg; lognormal variance with pedigree 0.0526, pedigree (2,4,5,1,1)
  Data from 1 mine in Morocco
  Uncertainty: D
- Hydrogen fluoride [air, non-urban air or from high stacks]: 3.776e-6 kg; lognormal variance with pedigree 0.2126, pedigree (2,4,5,5,3)
  U.S. data from 1973
  Uncertainty: U
- Lead-210 [air, non-urban air or from high stacks]: 0.0009024 kBq; lognormal variance with pedigree 0.426, pedigree (4,5,5,5,3)
  Calculated from dust emissions
  Uncertainty: C
- Particulate Matter, < 2.5 um [air, non-urban air or from high stacks]: 0.0001472 kg; lognormal variance with pedigree 0.42, pedigree (3,5,5,5,3)
  U.S. data from 1970 and data of coal mining
  Uncertainty: U
- Particulate Matter, > 10 um [air, non-urban air or from high stacks]: 0.0005632 kg; lognormal variance with pedigree 0.15, pedigree (3,5,5,5,3)
  U.S. data from 1970 and data of coal mining
  Uncertainty: U
- Particulate Matter, > 2.5 um and < 10um [air, non-urban air or from high stacks]: 0.0002944 kg; lognormal variance with pedigree 0.23, pedigree (3,5,5,5,3)
  U.S. data from 1970 and data of coal mining
  Uncertainty: U
- Polonium-210 [air, non-urban air or from high stacks]: 0.0009024 kBq; lognormal variance with pedigree 0.426, pedigree (4,5,5,5,3)
  Calculated from dust emissions
  Uncertainty: C
- Radium-226 [air, non-urban air or from high stacks]: 0.0016032 kBq; lognormal variance with pedigree 0.426, pedigree (4,5,5,5,3)
  Calculated from dust emissions
  Uncertainty: C
- Thorium-230 [air, non-urban air or from high stacks]: 0.001504 kBq; lognormal variance with pedigree 0.426, pedigree (4,5,5,5,3)
  Calculated from dust emissions
  Uncertainty: C
- Thorium-232 [air, non-urban air or from high stacks]: 1.6e-5 kBq; lognormal variance with pedigree 0.426, pedigree (4,5,5,5,3)
  Calculated from dust emissions
  Uncertainty: C
- Uranium-234 [air, non-urban air or from high stacks]: 0.001504 kBq; lognormal variance with pedigree 0.426, pedigree (4,5,5,5,3)
  Calculated from dust emissions
  Uncertainty: C
- Uranium-238 [air, non-urban air or from high stacks]: 0.001504 kBq; lognormal variance with pedigree 0.426, pedigree (4,5,5,5,3)
  Calculated from dust emissions
  Uncertainty: C
- Water [air, unspecified]: 0.00041344 m3; name water_to_air_unspecified; = (water_well_in_ground_input*fraction_PW_to_air); lognormal variance with pedigree 0.0807, pedigree (2,2,5,1,1)
  Calculated value based on literature values and expert opinion. See comments in the parametres' comment field.
  property fraction, origin: fresh water 1; name fraction_origin_fresh_water
  property fraction, origin: salt water 0; name fraction_origin_salt_water
  property fraction, origin: unspecified 0; name fraction_origin_unspecified
- Oils, unspecified [soil, industrial]: 0.0006176 kg; lognormal variance with pedigree 0.39, pedigree (5,5,5,5,5)
  Estimation from data of chemical demand
  Uncertainty: E
- BOD5, Biological Oxygen Demand [water, surface water]: 8.064e-5 kg; lognormal variance with pedigree 0.188, pedigree (4,5,5,5,4)
  Calculated from measured data
  Uncertainty: C
- COD, Chemical Oxygen Demand [water, surface water]: 8.064e-5 kg; lognormal variance with pedigree 0.188, pedigree (4,5,5,5,4)
  Calculated from measured data
  Uncertainty: C
- DOC, Dissolved Organic Carbon [water, surface water]: 5.952e-8 kg; lognormal variance with pedigree 0.188, pedigree (4,5,5,5,4)
  Calculated from measured data
  Uncertainty: C
- Fluoride [water, surface water]: 5.408e-6 kg; lognormal variance with pedigree 0.176, pedigree (3,4,5,5,4)
  Data from 1 U.S. mine (1990) and estimates
  Uncertainty: D
- Nitrogen [water, surface water]: 4.224e-6 kg; lognormal variance with pedigree 0.176, pedigree (3,4,5,5,4)
  Data from 1 U.S. mine (1990) and estimates
  Uncertainty: D
- Phosphorus [water, surface water]: 1.0848e-5 kg; lognormal variance with pedigree 0.176, pedigree (3,4,5,5,4)
  Data from 1 U.S. mine (1990) and estimates
  Uncertainty: D
- Radioactive species, alpha emitters [water, surface water]: 0.0005248 kBq; lognormal variance with pedigree 0.436, pedigree (3,4,5,5,4)
  Data from 1 U.S. mine (1990) and estimates
  Uncertainty: D
- Sulfate [water, surface water]: 0.0003584 kg; lognormal variance with pedigree 0.176, pedigree (3,4,5,5,4)
  Data from 1 U.S. mine (1990) and estimates
  Uncertainty: D
- Suspended solids, unspecified [water, surface water]: 2.7104e-5 kg; lognormal variance with pedigree 0.176, pedigree (3,4,5,5,4)
  Data from 1 U.S. mine (1990) and estimates
  Uncertainty: D
- TOC, Total Organic Carbon [water, surface water]: 2.1696e-5 kg; lognormal variance with pedigree 0.188, pedigree (4,5,5,5,4)
  Calculated from measured data
  Uncertainty: C
- Toluene [water, surface water]: 6.496e-8 kg; lognormal variance with pedigree 0.436, pedigree (3,4,5,5,4)
  Data from 1 U.S. mine (1990) and estimates
  Uncertainty: D
- Water [water, unspecified]: 0.00080256 m3; name water_to_water_unspecified; = water_well_in_ground_input*(1-fraction_PW_to_air); lognormal variance with pedigree 0.0807, pedigree (2,2,5,1,1)
  (same comment as for Water)
  property carbon content, fossil 0; name C_content_fossil
  property carbon content, non-fossil 0; name C_content_non_fossil
  property dry mass 0 kg; name DM
  property fraction, origin: fresh water 1; name fraction_origin_fresh_water_Ww
  property fraction, origin: salt water 0; name fraction_origin_salt_water_Ww
  property fraction, origin: unspecified 0; name fraction_origin_unspecified_Ww
  property water in wet mass 1000 kg; name WWM
  property wet mass 1000 kg; name WM

## Sampling procedure
Data for emissions and land use based on various studies from Florida. Energy data based on a world-wide survey and some assumptions. Further data from Moroccan studies, literature and estimations.

## Extrapolations
Extrapolation and transformation from U.S. data with help of specific informations from literature on Moroccan mines. No extrapolation for energy data.
