# laminated timber element production, for outdoor use

Dataset: EcoSpold 2, unit process
Geography: RoW
Time period: 1986-01-01 to 2023-12-31
Technology level: current
Classification: EcoSpold01Categories: wooden materials/extraction
Classification: ISIC rev.4 ecoinvent: 1621:Manufacture of veneer sheets and wood-based panels
Tags: ConvertedDataset
Scenario: Business-as-Usual
System model: Allocation, cut-off by classification
Generated by: Hans-Jörg Althaus
Published in: Werner F. 2007
Database: ecoinvent
isCopyrightProtected: true
accessRestrictedTo: 1

## General comment
This dataset represents the production of one m3 laminated timber elements for outdoor use.
The dataset covers screwed-laminated timber element, transversally prestressed, for outdoor use, mainly for bridges. The input of wood is assumed to be naturally dried sawn softwood and hardwood, which are spruce and beech, respectively.
The production takes place at a wooden board factory for organic bonded board; the data reflects a German production site from 1995, which is assumed representative for Europe. The figures origin from mainly calculations and estimates.
[This dataset was already contained in the ecoinvent database version 2. It was not individually updated during the transfer to ecoinvent version 3. Life Cycle Impact Assessment results may still have changed, as they are affected by changes in the supply chain, i.e. in other datasets. This dataset was generated following the ecoinvent quality guidelines for version 2. It may have been subject to central changes described in the ecoinvent version 3 change report (http://www.ecoinvent.org/database/ecoinvent-version-3/reports-of-changes/), and the results of the central updates were reviewed extensively. The changes added e.g. consistent water flows and other information throughout the database. The documentation of this dataset can be found in the ecoinvent reports of version 2, which are still available via the ecoinvent website. The change report linked above covers all central changes that were made during the conversion process.]

## Included activities start
From reception of sawn softwood and hardwood at the factory gate.

## Included activities end
This activity ends with laminated timber elements at the factory gate. The dataset includes the inputs to the production processes and transports of those inputs. The dataset does not include process emission data (not available) and infrastructure.

## Geography
Data for Germany used for central Europe

## Technology
Technology reflects the technology of a German medium enterprise in 1995.
Laterally pre-stressed laminated timber plates are preferably used for parts that bear medium to heavy loads, e.g. as building material for houses.Screwed laminated timber plates consist of a horizontal stack of single boards which are aligned on end and joined together using different techniques. Depending on the direction of loading and/or installation in reference to their plain, these construction parts serve as load bearing or non load bearing plates or panels. Most frequently, laminated timber plates are used for walls, roofs, ceilings and bridge decks.
Laminated wood is made mostly from spruce, which is the easiest wood to process and fulfils the specific requirements of strength and durability.
Reference:
Kollmann F. F. P., Kuenzi E. W. and Stamm A. J. (1975) Principles of Wood Science and Technology. Springer-Verl., Berlin, Heidelberg, New York. AND Nimz H., Schmitt U., Schwab E., Wittmann O. and Wolf F. (1997) Wood. In: Ullmann's encyclopedia of indus-trial chemistry (ed. Anonymous). 5th edition on CD-ROM Edition. Wiley & Sons, London.

## Reference product
- laminated timber element, transversally prestressed, for outdoor use: 1 m3; By-product classification allocatable product; CPC 3142: Other plywood, veneered panels and similar laminated wood, except of bamboo; HS2017 4412: Plywood, veneered panels and similar laminated wood
  EcoSpold01Location=RER
  production volume 226000 m3
    Assuming same amount as glulam production for outdoor use
  property carbon content, non-fossil 0.478422
    The laminated timber is composed of wood and steel. The weight of the wood is assumed to be the DM minus 82.3 kg steel. C content of wood is 0.494 kgC/kg dry wood (ecoinvent v2.2 report 9)
  property heating value, net 5402.78 MJ
    LHV is calculated based on the Carbon content of the product. More details can be found on the respective documentation.The property is based on a value of 12.56MJ/kg
  property price 298 EUR2005
    Temporary price data. Calculated as 90% of purchasers price based on: Price for plywood applied (from 2004 World Import/Export (USD/cubicmeter) from FaoStat http://faostat.fao.org/site/626/default.aspx#ancor, accessed 14th June 2010)
  properties: allocation factor 0.96692, carbon allocation 182.316 kg, carbon content 0.479109, carbon content, fossil 0.000687198, dry mass 380.531 kg, true value 298, water content 0.13, water in wet mass 49.469 kg, wet mass 430 kg

## Inputs from technosphere
- electricity, medium voltage: 0.321335, 6.40991, 2.15371, 0.0984037, 0.0196954, 0.00422904, 0.661922 kWh (7 suppliers, which the file names only by identifier); sum of these 9.6692 kWh; lognormal variance with pedigree 0.096, pedigree (4,5,5,5,3)
  EcoSpold01Location=UCTE
- sawnwood, board, hardwood, raw, dried (u=20%): 0.0889566 m3; name board_hardwood_raw; lognormal variance with pedigree 0.096, pedigree (4,5,5,5,3)
  The update of wood products in ecoinvent v3.1, the generic input of sawnwood was updated to an input of boards specifically.
  property carbon content, fossil 0; name board_hardwood_raw_C_content_fossil
  property carbon content, non-fossil 0.494; name board_hardwood_ra_C_content_non_fossil_0
  property dry mass 563.2 kg; name board_hardwood_raw_DM
  property water content 0.2; name board_hardwood_raw_water_content
  property water in wet mass 112.64 kg; name board_hardwood_raw_WWM; = board_hardwood_raw_DM* board_hardwood_raw_water_content
  property wet mass 675.84 kg; name board_hardwood_raw_WM; = board_hardwood_raw_DM*(1+ board_hardwood_raw_water_content)
  properties: heating value, net 8524.3 MJ
- sawnwood, board, softwood, raw, dried (u=20%): 1.23766 m3; lognormal variance with pedigree 0.096, pedigree (4,5,5,5,3)
  (same comment as for sawnwood, board, hardwood, raw, dried (u=20%))
  property dry mass 387.2 kg; name basic_d_wood
  property water content 0.2; name water_content
  properties: carbon content, non-fossil 0.494, heating value, net 5860.46 MJ, wet mass 464.64 kg
- steel, low-alloyed, hot rolled: 50.5699 kg; lognormal variance with pedigree 0.096, pedigree (4,5,5,5,3)
  EcoSpold01Location=RER
  properties: carbon content, fossil 0.005, dry mass 1 kg, wet mass 1 kg
  note on carbon content, fossil: Low alloyed steel composition given in Tab. 3.2 ecoinvent v2.2 report 10_partII. Steel assumed to have a C content of 0.5%
- wooden board factory, organic bonded boards: 3.21984e-8 unit; lognormal variance with pedigree 0.448, pedigree (4,5,5,5,4)
  EcoSpold01Location=RER

## Inputs from nature
- Carbon dioxide, non-fossil, resource correction [natural resource, in air]: -287.136 kg

## Sampling procedure
Literature

## Extrapolations
see Geography and Technology This dataset has been copied from an original dataset covering the geography RER. The uncertainty has been adjusted accordingly.

## Review by Roberto Dones 2003-09-12
passed
