# fava bean production

Dataset: EcoSpold 2, unit process
Geography: RoW
Time period: 2020-01-01 to 2023-12-31
Technology level: current
Classification: ISIC rev.4 ecoinvent: 0111:Growing of cereals (except rice), leguminous crops and oil seeds
Scenario: Business-as-Usual
System model: Allocation, cut-off by classification
Generated by: Nathan Pelletier
Published in: Food Systems PRISM Lab 2020
Database: ecoinvent
isCopyrightProtected: true
accessRestrictedTo: 1

## General comment
This dataset represents the production of 1 kg fava bean (<16% moisture) during May-August, 2020. The amounts of flows are weighted averages over all existing local crop production datasets available for this specific product.

## Included activities start
Starting inputs for this activity include seed, fertilizer, crop protection products and fuel on the farm. This activity begins with soil preparation about 37 weeks after the harvest of the previous crop. The soil is prepared for cultivation in 1st week of May and the sowing of seeds started about 5 days after soil preparation.

## Included activities end
This activity ends with faba bean drying to <16% moisture at farm gate. This takes place in August, 19 weeks after the activity start. The activity includes the infrastructures and use of agricultural machinery.

## Allocation
Physical (mass) allocation; N credits from biological N fixation are included as a system expansion, consistent with the ISO 14044 multifunctionality hierarchy. A negative input was included of ammonia N fertilizer to represent amount of N fixed.

## Geography
This dataset is a weighted average built from the following geographies: CA-AB, CA-SK, CA-MB.

## Technology
Production of faba bean includes farm practices from tillage, seeding, fertilizer application, rolling, herbicide application, fungicide application, harvest aid application, harvesting, and other field operations, to aeration and drying.

## Time period
Soil cultivating date for the main crop: May 2020; Harvesting date for the main crop: August 2020. Total time from the date of sowing to the date of harvesting comes to 19 weeks. Yield data were collected and averaged for three crop cycles (2018-2020). All other data were collected for 2020 only.

## Parameters
- yield kgha: 3964.3 kg/ha; name yield_kg_ha

## Reference product
- fava bean: 1 kg; By-product classification allocatable product; CPC 01243: Broad beans and horse beans, green; HS2017 070890: Vegetables, leguminous; (other than peas and beans), shelled or unshelled, fresh or chilled
  production volume 6.60725e8 kg
    Approximation of the production volume based on the Canadian production volume scaled to GLO by the ratio of global and Canadian GDP for 2012.
  property price 1.21196 EUR2005
    Calculated value based on data from United Nations Commodity Trade Statistics Database (comtrade.un.org). UN comtrade category: 071350 - Vegetables, leguminous; broad beans (vicia faba var. major) and horse beans (vicia faba var. equina, vicia faba var. minor), shelled, whether or not skinned or split, dried. A total of 84 countries are considered for the calculations. The price was converted to EUR based on the annual exchange rates published by the European Central Bank (https://sdw.ecb.europa.eu/quickview.do?SERIES_KEY=120.EXR.A.USD.EUR.SP00.A, last accessed on 2022-02-15) and adjusted for inflation relative to 2005 using the producer price index (PPI) of the euro area, published by eurostat (https://appsso.eurostat.ec.europa.eu/nui/show.do?dataset=sts_inpp_a&lang=en, last accessed on 2022-05-04).
  properties: carbon allocation 0.365208 kg, carbon content 0.45651, carbon content, fossil 0, carbon content, non-fossil 0.45651, dry mass 0.8 kg, water content 0.25, water in wet mass 0.2 kg, wet mass 1 kg

## Inputs from technosphere
- ammonium nitrate: 5.12352e-5, 2.73113e-5, 9.27141e-5 kg (3 suppliers, which the file names only by identifier); sum of these 0.000171261 kg; lognormal variance with pedigree 0.004, pedigree (2,3,2,5,1)
  properties: dry mass 1 kg, wet mass 1 kg
- ammonium sulfate: 0.000249936, 7.66969e-5 kg (2 suppliers, which the file names only by identifier); sum of these 0.000326633 kg; lognormal variance with pedigree 0.004, pedigree (2,3,2,5,1)
  properties: dry mass 1 kg, wet mass 1 kg
- application of plant protection product, by field sprayer: 6.04423e-5 ha; lognormal variance with pedigree 0.0034, pedigree (1,3,2,5,1)
- combine harvesting: 0.00131771 ha; lognormal variance with pedigree 0.0034, pedigree (1,3,2,5,1)
- fava bean seed, for sowing: 0.0670614 kg; lognormal variance with pedigree 0.004, pedigree (2,3,2,5,1)
  properties: carbon content, non-fossil 0.45651, dry mass 0.87 kg, water content 0.149425, wet mass 1 kg
  note on carbon content, non-fossil: biogene carbon content on a dry matter basis; Composition data obtained from Broadbeans (fava beans), mature seeds, raw, in (http://www.nal.usda.gov/fnic/foodcomp/search/). First, composition data were refered to 1 kg dry mass. Then, C-contents were calculated considering a C-content/dry mass of 44% in carbohydrates (including fibres), 53% in proteins and 75% in fats. All data from ecoinvent report, n 15a, pg 40, except C-content in protein, that comes from Determination of protein concentration by total organic carbon analysis, Rouwenhorst et al., 1991, J Biochem and Biophys Methods, 22:119-128.
- fertilising, by broadcaster: 1.13069e-5 ha; lognormal variance with pedigree 0.0034, pedigree (1,3,2,5,1)
- glyphosate: 7.44777e-5 kg; lognormal variance with pedigree 0.0034, pedigree (1,3,2,5,1)
  properties: carbon content, fossil 0.214286, dry mass 1 kg, wet mass 1 kg
- monoammonium phosphate: 0.00460115, 0.00818079, 9.37217e-5 kg (3 suppliers, which the file names only by identifier); sum of these 0.0128757 kg; lognormal variance with pedigree 0.004, pedigree (2,3,2,5,1)
  properties: dry mass 1 kg, nitrogen content 0.084, phosphorus content 0.226939, wet mass 1 kg
  note on nitrogen content: Nitrogen content (on a dry matter basis) of monoammonium phosphate is calculated from the molecular formula of the nutrient present in the substance.
  note on phosphorus content: Phosphorus content (on a dry matter basis) of monoammonium phosphate is calculated from the molecular formula of the nutrient present in the substance.
- pesticide, unspecified: 0.000199969 kg; lognormal variance with pedigree 0.004, pedigree (1,3,2,5,2)
  properties: carbon content, fossil 0.486978, dry mass 1 kg, wet mass 1 kg
- potassium chloride: 0.000148462, 0.00179015 kg (2 suppliers, which the file names only by identifier); sum of these 0.00193861 kg; lognormal variance with pedigree 0.004, pedigree (2,3,2,5,1)
  properties: dry mass 1 kg, wet mass 1 kg
- sowing: 0.000569104 ha; lognormal variance with pedigree 0.0034, pedigree (1,3,2,5,1)
- sulfur: 0.00111883 kg; lognormal variance with pedigree 0.004, pedigree (2,3,2,5,1)
  properties: dry mass 1 kg, wet mass 1 kg
- swath, by rotary windrower: 4.9376e-6 ha; lognormal variance with pedigree 0.0034, pedigree (1,3,2,5,1)
- tillage, cultivating, chiselling: 0.000104504 ha; lognormal variance with pedigree 0.0034, pedigree (1,3,2,5,1)
- tillage, harrowing, by offset disc harrow: 2.43461e-5 ha; lognormal variance with pedigree 0.0034, pedigree (1,3,2,5,1)
- tillage, harrowing, by rotary harrow: 0.000294449 ha; lognormal variance with pedigree 0.0034, pedigree (1,3,2,5,1)
- tillage, rolling: 0.000233133 ha; lognormal variance with pedigree 0.0034, pedigree (1,3,2,5,1)
- urea: 8.12233e-5, 1.27344e-5, 6.93589e-5 kg (3 suppliers, which the file names only by identifier); sum of these 0.000163317 kg; lognormal variance with pedigree 0.004, pedigree (2,3,2,5,1)
  properties: carbon content, fossil 0.2, dry mass 1 kg, wet mass 1 kg
- zinc: 0.00118383 kg; lognormal variance with pedigree 0.004, pedigree (2,3,2,5,1)
  properties: dry mass 1 kg, wet mass 1 kg

## Inputs from nature
- Occupation, annual crop, irrigated [natural resource, land]: 0.521405 m2*year; lognormal variance with pedigree 0.0048, pedigree (1,3,2,5,1)
- Occupation, annual crop, non-irrigated [natural resource, land]: 2.08411 m2*year; lognormal variance with pedigree 0.0048, pedigree (1,3,2,5,1)
- Transformation, from unspecified [natural resource, land]: 2.60597 m2; lognormal variance with pedigree 0.0108, pedigree (1,3,2,5,1)
- Transformation, to annual crop, irrigated [natural resource, land]: 0.521405 m2; lognormal variance with pedigree 0.0108, pedigree (1,3,2,5,1)
- Transformation, to annual crop, non-irrigated [natural resource, land]: 2.08411 m2; lognormal variance with pedigree 0.0108, pedigree (1,3,2,5,1)

## Emissions to nature
- Ammonia [air, non-urban air or from high stacks]: 0.000140641 kg; lognormal variance with pedigree 0.0128, pedigree (3,3,2,5,1)
- Bentazone [air, non-urban air or from high stacks]: 7.48107e-6 kg; lognormal variance with pedigree 0.0428, pedigree (1,3,2,5,1)
- Carbon dioxide, fossil [air, non-urban air or from high stacks]: 0.000224778 kg; lognormal variance with pedigree 0.0034, pedigree (1,3,2,5,1)
- Carbon dioxide, from soil or biomass stock [air, unspecified]: 0.0736575 kg; = 2.92*100/yield_kg_ha; lognormal variance with pedigree 0.003925, pedigree (2,2,3,2,2)
  Global average LUC emissions according 2nd edition of the Quantis-modified tool developed by Blonk Consultants 'WFLDB-adapted-Blonk 2014 direct-land-use-change-assessment-tool_2015-05-18a.xlsx', tab. 'Country & land use unknown'. The emission are based on the relative change in production areas in all countries for a given crop. The weighted average is used which takes into acount relative difference in crop expansion into primary forest, secondary forest, grassland, perennial and annual land. The amount of 0.95 tonne of CO2 per ha*year (taken from the tool) is divided with the yield per ha. Extrapolated crop: beans, dry.
- Clethodim [air, non-urban air or from high stacks]: 1.72276e-7 kg; lognormal variance with pedigree 0.0428, pedigree (1,3,2,5,1)
- Dinitrogen monoxide [air, non-urban air or from high stacks]: 9.52927e-5 kg; lognormal variance with pedigree 0.0348, pedigree (3,3,2,5,1)
- Diquat dibromide [air, non-urban air or from high stacks]: 4.21842e-6 kg; lognormal variance with pedigree 0.0428, pedigree (1,3,2,5,1)
- Ethalfluralin [air, non-urban air or from high stacks]: 1.14322e-6 kg; lognormal variance with pedigree 0.0428, pedigree (1,3,2,5,1)
- Fluxapyroxad [air, non-urban air or from high stacks]: 6.66906e-7 kg; lognormal variance with pedigree 0.0428, pedigree (1,3,2,5,1)
- Glyphosate [air, non-urban air or from high stacks]: 7.41077e-6 kg; lognormal variance with pedigree 0.0428, pedigree (1,3,2,5,1)
- Imazamox [air, non-urban air or from high stacks]: 3.71261e-7 kg; lognormal variance with pedigree 0.0428, pedigree (1,3,2,5,1)
- Imazethapyr [air, non-urban air or from high stacks]: 4.24385e-8 kg; lognormal variance with pedigree 0.0428, pedigree (1,3,2,5,1)
- Lambda-cyhalothrin [air, non-urban air or from high stacks]: 1.45872e-8 kg; lognormal variance with pedigree 0.0428, pedigree (1,3,2,5,1)
- Nitrogen oxides [air, non-urban air or from high stacks]: 2.76835e-5 kg; lognormal variance with pedigree 0.0378, pedigree (3,3,2,5,1)
- Prothioconazole [air, non-urban air or from high stacks]: 1.63317e-7 kg; lognormal variance with pedigree 0.0428, pedigree (1,3,2,5,1)
- Pyraclostrobin [air, non-urban air or from high stacks]: 1.0543e-6 kg; lognormal variance with pedigree 0.0428, pedigree (1,3,2,5,1)
- Saflufenacil [air, non-urban air or from high stacks]: 7.29362e-7 kg; lognormal variance with pedigree 0.0428, pedigree (1,3,2,5,1)
- Sethoxydim [air, non-urban air or from high stacks]: 4.0694e-7 kg; lognormal variance with pedigree 0.0428, pedigree (1,3,2,5,1)
- Sulfentrazone [air, non-urban air or from high stacks]: 4.59655e-7 kg; lognormal variance with pedigree 0.0428, pedigree (1,3,2,5,1)
- Triallate [air, non-urban air or from high stacks]: 1.10984e-9 kg; lognormal variance with pedigree 0.0428, pedigree (1,3,2,5,1)
- Tribenuron-methyl [air, non-urban air or from high stacks]: 2.72194e-9 kg; lognormal variance with pedigree 0.0428, pedigree (1,3,2,5,1)
- Trifloxystrobin [air, non-urban air or from high stacks]: 1.08878e-7 kg; lognormal variance with pedigree 0.0428, pedigree (1,3,2,5,1)
- Trifluralin [air, non-urban air or from high stacks]: 2.10027e-6 kg; lognormal variance with pedigree 0.0428, pedigree (1,3,2,5,1)
- Bentazone [soil, agricultural]: 5.74265e-5 kg; lognormal variance with pedigree 0.0428, pedigree (1,3,2,5,1)
- Boscalid [soil, agricultural]: 9.66096e-6 kg; lognormal variance with pedigree 0.0428, pedigree (1,3,2,5,1)
- Cadmium II [soil, agricultural]: -9.10174e-8 kg
- Chromium III [soil, agricultural]: -5.50264e-6 kg
- Clethodim [soil, agricultural]: 1.29993e-6 kg; lognormal variance with pedigree 0.0428, pedigree (1,3,2,5,1)
- Copper ion [soil, agricultural]: -8.80831e-6 kg
- Diquat dibromide [soil, agricultural]: 3.10169e-5 kg; lognormal variance with pedigree 0.0428, pedigree (1,3,2,5,1)
- Ethalfluralin [soil, agricultural]: 8.8191e-6 kg; lognormal variance with pedigree 0.0428, pedigree (1,3,2,5,1)
- Fenoxaprop-P ethyl ester [soil, agricultural]: 1.47978e-7 kg; lognormal variance with pedigree 0.0428, pedigree (1,3,2,5,1)
- Fluxapyroxad [soil, agricultural]: 4.86741e-6 kg; lognormal variance with pedigree 0.0428, pedigree (1,3,2,5,1)
- Glyphosate [soil, agricultural]: 5.6792e-5 kg; lognormal variance with pedigree 0.0428, pedigree (1,3,2,5,1)
- Imazamox [soil, agricultural]: 2.76176e-6 kg; lognormal variance with pedigree 0.0428, pedigree (1,3,2,5,1)
- Imazethapyr [soil, agricultural]: 3.07957e-7 kg; lognormal variance with pedigree 0.0428, pedigree (1,3,2,5,1)
- Lambda-cyhalothrin [soil, agricultural]: 1.00156e-7 kg; lognormal variance with pedigree 0.0428, pedigree (1,3,2,5,1)
- Lead II [soil, agricultural]: 0.000387084 kg; lognormal variance with pedigree 0.08976, pedigree (2,3,2,5,1)
- Mercury II [soil, agricultural]: -4.05475e-8 kg
- Nickel II [soil, agricultural]: -1.68782e-6 kg
- Nitrate [soil, unspecified]: 0.0116598 kg; lognormal variance with pedigree 0.0378, pedigree (3,3,2,5,1)
- Picoxystrobin [soil, agricultural]: 2.05597e-7 kg; lognormal variance with pedigree 0.0428, pedigree (1,3,2,5,1)
- Prothioconazole [soil, agricultural]: 1.08878e-6 kg; lognormal variance with pedigree 0.0428, pedigree (1,3,2,5,1)
- Pyraclostrobin [soil, agricultural]: 8.31271e-6 kg; lognormal variance with pedigree 0.0428, pedigree (1,3,2,5,1)
- Saflufenacil [soil, agricultural]: 5.7979e-6 kg; lognormal variance with pedigree 0.0428, pedigree (1,3,2,5,1)
- Sethoxydim [soil, agricultural]: 3.14454e-6 kg; lognormal variance with pedigree 0.0428, pedigree (1,3,2,5,1)
- Sulfentrazone [soil, agricultural]: 3.68059e-6 kg; lognormal variance with pedigree 0.0428, pedigree (1,3,2,5,1)
- Triallate [soil, agricultural]: 8.1388e-9 kg; lognormal variance with pedigree 0.0428, pedigree (1,3,2,5,1)
- Tribenuron-methyl [soil, agricultural]: 1.90536e-8 kg; lognormal variance with pedigree 0.0428, pedigree (1,3,2,5,1)
- Trifloxystrobin [soil, agricultural]: 9.25461e-7 kg; lognormal variance with pedigree 0.0428, pedigree (1,3,2,5,1)
- Trifluralin [soil, agricultural]: 1.60274e-5 kg; lognormal variance with pedigree 0.0428, pedigree (1,3,2,5,1)
- Zinc II [soil, agricultural]: 0.00073568 kg; lognormal variance with pedigree 0.08976, pedigree (2,3,2,5,1)
- Bentazone [water, ground-]: 6.36425e-6 kg; lognormal variance with pedigree 0.0428, pedigree (1,3,2,5,1)
- Cadmium II [water, ground-]: 3.65098e-9 kg; lognormal variance with pedigree 0.08976, pedigree (2,3,2,5,1)
- Cadmium II [water, surface water]: 1.8272e-8 kg; lognormal variance with pedigree 0.08976, pedigree (2,3,2,5,1)
- Chromium III [water, ground-]: 2.46982e-6 kg; lognormal variance with pedigree 0.08976, pedigree (2,3,2,5,1)
- Chromium III [water, surface water]: 2.95188e-6 kg; lognormal variance with pedigree 0.08976, pedigree (2,3,2,5,1)
- Clethodim [water, ground-]: 1.34425e-7 kg; lognormal variance with pedigree 0.0428, pedigree (1,3,2,5,1)
- Copper ion [water, ground-]: 4.53901e-7 kg; lognormal variance with pedigree 0.08976, pedigree (2,3,2,5,1)
- Copper ion [water, surface water]: 2.54607e-6 kg; lognormal variance with pedigree 0.08976, pedigree (2,3,2,5,1)
- Diquat dibromide [water, ground-]: 3.45168e-6 kg; lognormal variance with pedigree 0.0428, pedigree (1,3,2,5,1)
- Ethalfluralin [water, ground-]: 9.799e-7 kg; lognormal variance with pedigree 0.0428, pedigree (1,3,2,5,1)
- Fluxapyroxad [water, ground-]: 5.29911e-7 kg; lognormal variance with pedigree 0.0428, pedigree (1,3,2,5,1)
- Glyphosate [water, ground-]: 6.30835e-6 kg; lognormal variance with pedigree 0.0428, pedigree (1,3,2,5,1)
- Imazamox [water, ground-]: 3.08567e-7 kg; lognormal variance with pedigree 0.0428, pedigree (1,3,2,5,1)
- Imazethapyr [water, ground-]: 4.24385e-8 kg; lognormal variance with pedigree 0.0428, pedigree (1,3,2,5,1)
- Lambda-cyhalothrin [water, ground-]: 1.45872e-8 kg; lognormal variance with pedigree 0.0428, pedigree (1,3,2,5,1)
- Lead II [water, ground-]: 7.03465e-8 kg; lognormal variance with pedigree 0.08976, pedigree (2,3,2,5,1)
- Lead II [water, surface water]: 1.9068e-7 kg; lognormal variance with pedigree 0.08976, pedigree (2,3,2,5,1)
- Mercury II [water, ground-]: 6.8073e-11 kg; lognormal variance with pedigree 0.08976, pedigree (2,3,2,5,1)
- Mercury II [water, surface water]: 3.83212e-9 kg; lognormal variance with pedigree 0.08976, pedigree (2,3,2,5,1)
- Nickel II [water, surface water]: 7.55463e-7 kg; lognormal variance with pedigree 0.08976, pedigree (2,3,2,5,1)
- Phosphate [water, ground-]: 1.85287e-5 kg; lognormal variance with pedigree 0.0448, pedigree (3,3,2,5,1)
- Phosphate [water, surface water]: 5.05541e-5 kg; lognormal variance with pedigree 0.0378, pedigree (3,3,2,5,1)
- Prothioconazole [water, ground-]: 1.08878e-7 kg; lognormal variance with pedigree 0.0428, pedigree (1,3,2,5,1)
- Pyraclostrobin [water, ground-]: 9.34746e-7 kg; lognormal variance with pedigree 0.0428, pedigree (1,3,2,5,1)
- Saflufenacil [water, ground-]: 7.11917e-7 kg; lognormal variance with pedigree 0.0428, pedigree (1,3,2,5,1)
- Sethoxydim [water, ground-]: 3.32951e-7 kg; lognormal variance with pedigree 0.0428, pedigree (1,3,2,5,1)
- Sulfentrazone [water, ground-]: 5.16511e-7 kg; lognormal variance with pedigree 0.0428, pedigree (1,3,2,5,1)
- Triallate [water, ground-]: 7.39891e-10 kg; lognormal variance with pedigree 0.0428, pedigree (1,3,2,5,1)
- Tribenuron-methyl [water, ground-]: 2.17756e-9 kg; lognormal variance with pedigree 0.0428, pedigree (1,3,2,5,1)
- Trifloxystrobin [water, ground-]: 1.08878e-7 kg; lognormal variance with pedigree 0.0428, pedigree (1,3,2,5,1)
- Trifluralin [water, ground-]: 1.78687e-6 kg; lognormal variance with pedigree 0.0428, pedigree (1,3,2,5,1)
- Zinc II [water, ground-]: 4.31431e-6 kg; lognormal variance with pedigree 0.08976, pedigree (2,3,2,5,1)
- Zinc II [water, surface water]: 1.68155e-6 kg; lognormal variance with pedigree 0.08976, pedigree (2,3,2,5,1)

## Sampling procedure
Site-specific field data were collected via survey from prairie province faba bean producers for crop rotation, seeding rate, machinery and fuel use for field operations (e.g., tillage, harrowing, harvest), farm inputs (e.g., fertilizers, pesticides), and electricity for crop drying. Production weighted averages were calculated for the region. Outliers were removed from reported fuel use data based on visual inspection.

## Extrapolations
This dataset was built as a weighted average of regional datasets of the same activityName. Weights are based on production volumes. CA-AB: production volume = 9.61e+06 kg/year, weight = 0.5444 CA-SK: production volume = 6.53e+06 kg/year, weight = 0.3699 CA-MB: production volume = 1.51e+06 kg/year, weight = 0.08567 The uncertainty information has been adjusted accordingly.
