# iron sulfate production

Dataset: EcoSpold 2, unit process
Geography: RoW
Time period: 1993-01-01 to 2023-12-31
Technology level: current
Classification: ISIC rev.4 ecoinvent: 2011:Manufacture of basic chemicals
Classification: EcoSpold01Categories: metals/extraction
Tags: ConvertedDataset
Scenario: Business-as-Usual
System model: Allocation, cut-off by classification
Generated by: Niels Jungbluth
Published in: Jungbluth, N. 2007
Database: ecoinvent
isCopyrightProtected: true
accessRestrictedTo: 1

## General comment
Iron sulphate is a by-product of steel and iron manufacturing.
[This dataset was already contained in the ecoinvent database version 2. It was not individually updated during the transfer to ecoinvent version 3. Life Cycle Impact Assessment results may still have changed, as they are affected by changes in the supply chain, i.e. in other datasets. This dataset was generated following the ecoinvent quality guidelines for version 2. It may have been subject to central changes described in the ecoinvent version 3 change report (http://www.ecoinvent.org/database/ecoinvent-version-3/reports-of-changes/), and the results of the central updates were reviewed extensively. The changes added e.g. consistent water flows and other information throughout the database. The documentation of this dataset can be found in the ecoinvent reports of version 2, which are still available via the ecoinvent website. The change report linked above covers all central changes that were made during the conversion process.]

## Included activities start
The activity starts with the reception of the raw materials at the production plant gates.

## Included activities end
The activity ends with the produced iron sulfate. A rough estimation is used for the electricity used for purification of the by-product. No data included for infrastructure and emissions.

## Geography
Investigation for CH.

## Technology
Chemical product for waste water treatment.

## Time period
Time of publication.

## Reference product
- iron sulfate: 1 kg; By-product classification allocatable product; CPC 34240: Phosphates of triammonium; salts and peroxysalts of inorganic acids and metals n.e.c.; HS2017 283329: Sulphates; n.e.c. in item no. 2833.2; CAS 7720-78-7
  EcoSpold01Location=RER
  production volume 2.65986 kg
    This is a placeholder value that does not reflect real-world production volumes. This dataset does not currently require a real-world production volume to work in the database framework, and no actual data were collected yet. This has no negative effect on the results of the ecoinvent database.
  property price 0.071 EUR2005
    Estimated values. Consumer's price for 2015 is between 77 and 80 USD/tonne (http://sdjiangyuanjh.en.made-in-china.com/product/CKLJkmiybRWH/China-Ferrous-Sulfate.html, accessed 20151022). The price has been calculated from a mean value of 78.5 USD. The echange rate for 2015 is of EUR = 1.109 (http://www.imf.org, accessed 20160105)
  properties: carbon allocation 0 kg, carbon content 0, carbon content, fossil 0, carbon content, non-fossil 0, dry mass 1 kg, water content 0, water in wet mass 0 kg, wet mass 1 kg

## Inputs from technosphere
- chemical factory, organics: 4e-10 unit; lognormal variance with pedigree 0.372, pedigree (4,4,5,5,1)
  Rough estimation
  EcoSpold01Location=RER
  Uncertainty: Rough estimation
- electricity, medium voltage: 0.0074476, 0.148563, 0.00371908, 0.00228071, 0.000456482, 9.80169e-5, 0.0153414, 0.0440938 kWh (8 suppliers, which the file names only by identifier); sum of these 0.222 kWh; lognormal variance with pedigree 0.062, pedigree (4,4,5,5,1)
  EcoSpold01Location=UCTE
  Literature
  Uncertainty: Literature

## Sampling procedure
Diploma thesis for a waste water treatment plant.

## Extrapolations
From single data to European situation. This dataset has been copied from an original dataset covering the geography RER. The uncertainty has been adjusted accordingly.

## Review by Michael Spielmann (obsolete) 2003-07-04
passed
