# chloroform production

Dataset: EcoSpold 2, unit process
Geography: RoW
Time period: 1998-01-01 to 2023-12-31
Technology level: current
Classification: ISIC rev.4 ecoinvent: 2011:Manufacture of basic chemicals
Classification: EcoSpold01Categories: chemicals/organics
Synonyms: Methyl trichloride; formyl trichloride; r 20 (refrigerant); Chloroform; methane trichloride; Refrigerant R20; methenyl trichloride; R 20; trichloroform
Tags: ConvertedDataset
Scenario: Business-as-Usual
System model: Allocation, cut-off by classification
Share of production covered: 0 %
Generated by: Niels Jungbluth
Published in: Althaus H.-J. 2007
Database: ecoinvent
isCopyrightProtected: true
accessRestrictedTo: 1

## General comment
Inventory for a chemical.
[This dataset was already contained in the ecoinvent database version 2. It was not individually updated during the transfer to ecoinvent version 3. Life Cycle Impact Assessment results may still have changed, as they are affected by changes in the supply chain, i.e. in other datasets. This dataset was generated following the ecoinvent quality guidelines for version 2. It may have been subject to central changes described in the ecoinvent version 3 change report (http://www.ecoinvent.org/database/ecoinvent-version-3/reports-of-changes/), and the results of the central updates were reviewed extensively. The changes added e.g. consistent water flows and other information throughout the database. The documentation of this dataset can be found in the ecoinvent reports of version 2, which are still available via the ecoinvent website. The change report linked above covers all central changes that were made during the conversion process.]

## Included activities end
Gate to gate inventory for the production, estimation for infrastructure and not including by-products

## Geography
Plant e.g. in NL

## Technology
Chemical processing

## Time period
Publication date

## Reference product
- chloroform: 1 kg; By-product classification allocatable product; CPC 34110: Hydrocarbons and their halogenated, sulphonated, nitrated or nitrosated derivatives; HS2017 290313: Saturated chlorinated derivatives of acyclic hydrocarbons; chloroform (trichloromethane); CAS 67-66-3
  EcoSpold01Location=RER
  production volume 1.65216e8 kg
    Calculated as 90% utilisation of capacity in late 1990'ies from McCulloch A. (2003). Chloroform in the environment: occurrence, sources, sinks and effects. Chemosphere 50(10):1291-308.
  property heating value, net 4.06 MJ
    LHV is calculated based on the elemental composition of the substance. Based on the CAS number of the substance (000067-66-3), the chemical formula of the substance is found to be: CHCl3, (PubChem 2020).
    Reference: Kim, S., Chen, J., Cheng, T., Gindulyte, A., He, J., He, S., Li, Q., Shoemaker, B. A., Thiessen, P. A., Yu, B., Zaslavsky, L., Zhang, J., & Bolton, E. E. (2019). PubChem 2019 update: improved access to chemical data. Nucleic acids research, 47(D1), D1102–D1109. https://doi.org/10.1093/nar/gky1033
  property price 0.55 EUR2005
    Calculated value based on data from United Nations Commodity Trade Statistics Database (comtrade.un.org). UN comtrade category: 290313 Chloroform (trichloromethane). Year 2005. Using exchange rate of 1EURO = 1.209 USD. Average of price of import into 5 main markets (EU, US, JP, IN and CN).
  properties: carbon allocation 0.101695 kg, carbon content 0.101695, carbon content, fossil 0.101695, carbon content, non-fossil 0, dry mass 1 kg, water content 0, water in wet mass 0 kg, wet mass 1 kg

## Inputs from technosphere
- chemical factory, organics: 4e-10 unit; lognormal variance with pedigree 0.63, pedigree (5,5,5,5,5)
  EcoSpold01Location=RER
  Generic estimation
  Uncertainty: Generic estimation
- chlorine, liquid: 0.848 kg; lognormal variance with pedigree 0.086, pedigree (4,5,5,5,3)
  Stoichometric calculation, yield 85%, not including Cl2 for total HCl couple product
  EcoSpold01Location=RER
  Uncertainty: Stoichometric calculation, yield 85%, not including Cl2 for total HCl couple product
  properties: dry mass 1 kg, wet mass 1 kg
- electricity, medium voltage: 0.0147554, 0.294336, 0.0988962, 0.0045186, 0.000904393, 0.000194193, 0.0303948 kWh (7 suppliers, which the file names only by identifier); sum of these 0.444 kWh; lognormal variance with pedigree 0.07, pedigree (3,5,5,5,3)
  EcoSpold01Location=UCTE
  Literature 1998, estimation 10% electricity
  Uncertainty: Literature 1998, estimation 10% electricity
- heat, district or industrial, natural gas: 0.168944, 10.2811 MJ (2 suppliers, which the file names only by identifier); sum of these 10.45 MJ; lognormal variance with pedigree 0.07, pedigree (3,5,5,5,3)
  EcoSpold01Location=RER
  Literature 1998, estimation 90% gas
  Uncertainty: Literature 1998, estimation 90% gas
  properties: heating value, net 1 MJ
- natural gas, high pressure: 0.00151462, 0.00255497, 0.00557317, 0.0018651, 0.000435867, 0.00259419, 0.00248933, 0.00654574, 0.00252709, 0.0039087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 m3 (37 suppliers, which the file names only by identifier); sum of these 0.196154 m3; lognormal variance with pedigree 0.086, pedigree (4,5,5,5,3)
  EcoSpold01Location=RER
  Assumption for methane, stoichometric calculation, yield 85%
  Uncertainty: Assumption for methane, stoichometric calculation, yield 85%
  properties: carbon content, fossil 0.602381, dry mass 0.84 kg, heating value, gross 40 MJ, heating value, net 36 MJ, wet mass 0.84 kg
  note on carbon content, fossil: An average C content of 0.506 kg C/ m3 has been assumed (this average has been calculated using data in Tab 3.5, ecoinvent v2.2 report 6_V
  note on heating value, net: Literature value, Source: Christoph Meili;Niels Jungbluth;Maresa Bussa (2021) Life cycle inventories of crude oil and natural gas extraction. ESU-services Ltd. commissioned by BAFU & VSG, Schaffhausen, Switzerland, http://esu-services.ch/data/public-lci-reports/

## Emissions to nature
- Carbon tetrachloride [air, urban air close to ground]: 0.001 kg; lognormal variance with pedigree 0.188, pedigree (5,5,5,5,3)
  Estimation of 0.1% emission
  Uncertainty: Estimation of 0.1% emission
- Chloroform [air, urban air close to ground]: 0.01 kg; lognormal variance with pedigree 0.188, pedigree (5,5,5,5,3)
  Estimation of 1% emission
  Uncertainty: Estimation of 1% emission
- Dichloromethane [air, urban air close to ground]: 0.0003 kg; lognormal variance with pedigree 0.188, pedigree (5,5,5,5,3)
  Estimation of 0.03% emission
  Uncertainty: Estimation of 0.03% emission
- Vinyl chloride [air, urban air close to ground]: 5e-7 kg; lognormal variance with pedigree 0.188, pedigree (5,5,5,5,3)
  Estimation
  Uncertainty: Estimation
- Dichloromethane [water, surface water]: 5e-6 kg; lognormal variance with pedigree 0.438, pedigree (5,5,5,5,3)
  Estimation
  Uncertainty: Estimation

## Sampling procedure
Literature, company information, stoichiometric calculations, assumptions.

## Extrapolations
none This dataset has been copied from an original dataset covering the geography RER. The uncertainty has been adjusted accordingly.

## Review by Roland Hischier 2009-02-06
Passed.
