# seawater reverse osmosis module production, 8-inch spiral wound, baseline

Dataset: EcoSpold 2, unit process
Geography: GLO
Time period: 2012-01-01 to 2023-12-31
Technology level: current
Classification: ISIC rev.4 ecoinvent: 3600:Water collection, treatment and supply
Synonyms: membrane filtration; SWRO module
Scenario: Business-as-Usual
System model: Allocation, cut-off by classification
Generated by: Marylène Dussault
Published in: Bonton, A. 2012
Database: ecoinvent
isCopyrightProtected: true
accessRestrictedTo: 1

## General comment
This dataset represents the production of seawater reverse osmosis membrane module. This dataset is scaled to 1 m2 of active membrane surface for water filtration. Baseline module is based on Dow chemical 8-inches spiral wound modules SW30HR-380 and is considered to have 35.3 m2 of active surface per module. Baseline module refers to membrane that can support maximum operating pressure with a maximum of 1000 psig (69 bars), with typical operating pressure of 800psig (55 bars).

## Included activities start
From reception of raw materials for production of membrane module.

## Included activities end
This dataset ends with production of module for seawater reverse osmosis desalination process. This dataset only includes material inputs for production and energy for recycling a recirculated solvent. Most losses and processing for materials have been excluded due to lack of data. Thus no waste are considered. Production energy is also excluded due to lack of data.

## Parameters
- active membrane surface: 35.3 m2/unit; name AMS; lognormal variance with pedigree 0.0039, pedigree (2,4,1,3,2)
  Literature value. Based on specs of modeled module (SW30HR-380).
- module collection tube: 0.603186 l; name coll_tube; lognormal variance with pedigree 0.0098, pedigree (2,3,1,1,3)
  Calculated value. Volume of permeate collection tube was calculated using measured internal and external diameters a NF70-400 module autopsy. The nanofiltration module used is assumed to have similar caracteristics as the reverse osmosis module. Length of module was proveded by technical specification (Dow chemical SW30HR-380). Material was report in Patent US20110232061 (ABS) and assumed to by injection grade.
- module end cap: 0.5 kg; name cap; lognormal variance with pedigree 0.0092, pedigree (1,3,1,1,3)
  Measured value. Mass of molded end-cap was measured from a NF70-400 module autopsy and was assumed similar to the reverse osmosis module. Material, ABS, was report in Patent US20110232061 and assumed to be injection grade.
- outer wrap_epoxy: 0.264 kg; name epoxy; lognormal variance with pedigree 0.0098, pedigree (2,3,1,1,3)
  Measured value. Mass of other wrap glue was measured from a NF70-400 module autopsy and was assumed similar to the reverse osmosis module. Material, epoxy, was report in Patent US20110232061.
- outer wrap_fiber glass: 5.019 kg; name fiber_glass; lognormal variance with pedigree 0.0092, pedigree (1,3,1,1,3)
  Measured value. Mass of outer wrap fiber glass was measured from a NF70-400 module autopsy and was assumed similar to the reverse osmosis module.

## Reference product
- seawater reverse osmosis module: 1 m2; name active_surface; By-product classification allocatable product; CPC 43914: Filtering or purifying machinery and apparatus, for liquids or gases, except oil filters, petrol filters and a[…]; HS2017 842121: Machinery; for filtering or purifying water
  This unit process refers to the unit of active membrane surface for reverse osmosis of seawater within of 8 inches spiral wound module.
  production volume 4.4475e6 m2
    Calculated production volume based on active membrane surface attributed to 1 kg of tap water production from desalination and share of baseline module (assumed 75% of module consumption).
  property carbon content, fossil 0; name active_surface_C_content_fossil
    fossil carbon content on a dry matter basis
  property carbon content, non-fossil 0; name active_surface_C_content_non_fossil
    biogene carbon content on a dry matter basis
  property dry mass 0.4601 kg; name active_surface_DM
  property price 1.4986 EUR2005
    Calculated based on inputs: The price of the product has been calculated as a sum of the values of the material and energy inputs for this product. This value is therefore a rough estimation. It may underestimate the real price since there are additional expenses when producing any product. These expences can include for example labour costs, treatment of waste materials and profit for the producer. Please consider carefully whether this level of data quality is acceptable for your application.
  property water content 0; name active_surface_water_content
  property water in wet mass 0 kg; name active_surface_WWM
  property wet mass 0.4601 kg; name active_surface_WM
  properties: carbon allocation 0 kg, carbon content 0

## Inputs from technosphere
- 1,1-difluoroethane: 0.0139 kg; name CFC; source Bonton, A. 2012; lognormal variance with pedigree 0.0178, pedigree (4,3,4,1,2)
  Extrapolated process. This process reprensents mass trichlorotrifluoroethane (CFC-113) used as solvent for trimesoyl chloride (TMC) in second reaction for polyamide layer in-situ formation. Part of solvent is recycled and recirculated internally. Only part not recycled is considered which correspond to 5% of total solvent in reaction (solution 0.1%TMC). These losses are considered volatilised. Data published in part in Bonton. 2012.
  properties: carbon content, fossil 0.363636, dry mass 1 kg, heating value, net 18.36 MJ, wet mass 1 kg
- N,N-dimethylformamide: 0.0945 kg; source Bonton, A. 2012; lognormal variance with pedigree 0.0178, pedigree (2,3,4,1,3)
  Calculated value. Value based on measurements (autopsy of NF70-400 module) and literature data. This process reprensents mass of solvent for polysulfone casting solution (no recycling is considered) to produce the membrane polysulfone layer. Data published in part in Bonton. 2012.
  properties: carbon content, fossil 0.493151, dry mass 1 kg, heating value, net 26.54 MJ, wet mass 1 kg
- acrylonitrile-butadiene-styrene copolymer: 0.0322637 kg; = (coll_tube*density_ABS/extrusion_eff+ cap/molding_eff)/ams; lognormal variance with pedigree 0.008, pedigree (1,1,4,1,1)
  Calculated value.
  Uncertainty: Calculated variable. Uncertainty will be determined from propagation of uncertainty factors of underlying variables. Uncertainty of actual relation between variables not accounted for at this time, although this could be included in a future update.
  property density 1.05 kg/l; name density_ABS
  properties: carbon content, fossil 0.853081, dry mass 1 kg, heating value, net 35.58 MJ, wet mass 1 kg
  note on density: Literature value. Density for injection grade ABS. Assumption was made for choice of material grade. Value from density table provided by Stelray Plastics Products Inc website.
- electricity, medium voltage: 0.0408 kWh; source Bonton, A. 2012; lognormal variance with pedigree 0.0326, pedigree (4,5,4,1,3)
  Estimated value. Energy requirements for internal recycling of CFC-113 solvent.
- epoxy resin, liquid: 0.00617745, 0.0013013 kg (2 suppliers, which the file names only by identifier); sum of these 0.00747875 kg; = epoxy/ams; lognormal variance with pedigree 0.008, pedigree (1,1,4,1,1)
  (same comment as for acrylonitrile-butadiene-styrene copolymer)
  properties: carbon content, fossil 0.42325, dry mass 1 kg, heating value, net 12.82 MJ, wet mass 1 kg
- extrusion, plastic pipes: 0.0180138 kg; = (coll_tube*density_ABS/extrusion_eff)/ams; lognormal variance with pedigree 0.008, pedigree (1,1,4,1,1)
  (same comment as for acrylonitrile-butadiene-styrene copolymer)
  property processing_efficiency 0.996; name extrusion_eff
  note on processing_efficiency: Literature value. From ecoinvent process, 1 kg of this process equals 0.996 kg of extruded plastic pipes.
- glass fibre: 0.142181 kg; = fiber_glass/ ams; lognormal variance with pedigree 0.008, pedigree (1,1,4,1,1)
  (same comment as for acrylonitrile-butadiene-styrene copolymer)
  properties: dry mass 1 kg, wet mass 1 kg
- injection moulding: 0.0142498 kg; = (cap/molding_eff)/ams; lognormal variance with pedigree 0.008, pedigree (1,1,4,1,1)
  (same comment as for acrylonitrile-butadiene-styrene copolymer)
  property molding efficiency 0.994; name molding_eff
  note on molding efficiency: Literature value. From ecoinvent process, 1 kg of this process equals 0.994 kg of injection moulded plastics.
- isopropanol: 0.0023316, 0.0110684 kg (2 suppliers, which the file names only by identifier); sum of these 0.0134 kg; source Bonton, A. 2012; lognormal variance with pedigree 0.0104, pedigree (2,3,4,1,2)
  Calculated value. Value based on measurements (autopsy of NF70-400 module) and literature data. This process reprensents mass of additive (swelling agent) for polysulfone layer formation. Data published in part in Bonton. 2012.
  properties: carbon content, fossil 0.6, dry mass 1 kg, heating value, net 34.3 MJ, wet mass 1 kg
- o-phenylene diamine: 0.0001 kg; source Bonton, A. 2012; lognormal variance with pedigree 0.0178, pedigree (2,3,4,1,3)
  Calculated value. Value based on measurements (autopsy of NF70-400 module) and literature data. Litterature is used to identify layer thickness and processing. This process reprensents mass of m-phenylenediamine, first reactant for polyamide layer in-situ formation (in aqueous solution). Data published in part in Bonton. 2012. Proxy for meta-phenylene diamine.
  properties: carbon content, fossil 0.67, dry mass 1 kg, heating value, net 29.16 MJ, wet mass 1 kg
- phosphoric acid, industrial grade, without water, in 85% solution state: 0.007 kg; name po4_acid; source Bonton, A. 2012; lognormal variance with pedigree 0.0178, pedigree (2,3,4,1,3)
  Calculated value. Value based on measurements (autopsy of NF70-400 module) and literature data. This process reprensents mass of product for membrane post-treatment. Data published in part in Bonton. 2012.
  property solution concentration 0.85; name conc_po4
  properties: dry mass 1 kg, wet mass 1 kg
  note on solution concentration: Literature value. As defined in dataset. Concentration in weight percentage (%w/w)
- polyester resin, unsaturated: 0.163955, 0.0239448 kg (2 suppliers, which the file names only by identifier); sum of these 0.1879 kg; lognormal variance with pedigree 0.0192, pedigree (2,4,4,1,3)
  Calculated value. Value based on measurements (autopsy of NF70-400 module and Hydracore 50 module) and literature data. Litterature is mainly used to identify material type and processing. This process reprensents mass of permeate spacer in woven polyester fabric and membrane support material in polyester non woven fabric.
  properties: carbon content, fossil 0.58584, dry mass 1 kg, heating value, net 17.75 MJ, wet mass 1 kg
- polypropylene, granulate: 0.0473 kg; name pp; lognormal variance with pedigree 0.0192, pedigree (2,4,4,1,3)
  Calculated value. Value based on measurements (autopsy of NF70-400 module) and literature data. Litterature is mainly used to identify material type and processing. This process reprensents mass of feed spacer in polypropylene grid.
  properties: carbon content, fossil 0.857143, dry mass 1 kg, heating value, net 32.78 MJ, wet mass 1 kg
  note on heating value, net: Value extracted from "treatment of waste polypropylene, open burning"
- polysulfone: 0.0236 kg; source Bonton, A. 2012; lognormal variance with pedigree 0.0178, pedigree (2,3,4,1,3)
  Calculated value. Value based on measurements (autopsy of NF70-400 module) and literature data. Litterature is used to identify layer thickness and processing. This process reprensents mass of polysufone chemical used to produce the membrane polysulfone layer. Data published in part in Bonton. 2012.
  properties: carbon content, fossil 0.67, dry mass 1 kg, heating value, net 19.04 MJ, wet mass 1 kg
- polyurethane, rigid foam: 0.0105128, 0.0212872 kg (2 suppliers, which the file names only by identifier); sum of these 0.0318 kg; lognormal variance with pedigree 0.0192, pedigree (2,4,4,1,3)
  Extrapolated process. This process reprensents mass of cured urethane glue. Value based on measurements (autopsy of NF70-400 module) and literature data. Litterature is mainly used to identify material type and processing.
  properties: carbon content, fossil 0.69089, dry mass 1 kg, heating value, net 30.67 MJ, wet mass 1 kg
- tap water: 0.00123529 kg; = (po4_acid/conc_po4)*(1-conc_po4); lognormal variance with pedigree 0.008, pedigree (1,1,4,1,1)
  Caculated value. Represents water content of phosphoric acid.
  Uncertainty: Calculated variable. Uncertainty will be determined from propagation of uncertainty factors of underlying variables. Uncertainty of actual relation between variables not accounted for at this time, although this could be included in a future update.
  properties: carbon content, fossil 0.00178991, dry mass 0.000337476 kg, water content 2962.17, wet mass 1 kg
  note on carbon content, fossil: Bicarbonate content is 2.93 mol/m3. CO2 content is 0.1 mol/m3 (ecoinvent v2.2 report 8, Tab 93.1).
- trimesoyl chloride: 0.0003 kg; source Bonton, A. 2012; lognormal variance with pedigree 0.0178, pedigree (2,3,4,1,3)
  Calculated value. Value based on measurements (autopsy of NF70-400 module) and literature data. Litterature is used to identify layer thickness and processing. This process reprensents mass of trimesoyl chloride, Second reactant for polyamide layer in-situ formation. Data published in part in Bonton. 2012.
  properties: carbon content, fossil 0.41, dry mass 1 kg, heating value, net 13.71 MJ, wet mass 1 kg

## Emissions to nature
- 1,1,2-Trichloro-1,2,2-trifluoroethane [air, non-urban air or from high stacks]: 0.0139 kg; = cfc; lognormal variance with pedigree 0.21, pedigree (5,5,5,5,5)
  Calculated value. Non recycled solvent assumed volatilized. Highly uncertain, uncertainty have been maximized.

## Sampling procedure
General rules for inventories for 8 inches spiral wound modules are derived from the autopsy of a NF70-400 module (Dow Chemical) and data from patent and technical litterature.

## Extrapolations
From composition of a nano-filtration module to a seawater reverseosmosis module from the same company. Extrapolation was achived using literature data (articles, patent, spec sheets, etc.)
