# ethylene oxide production, ethylene oxidation

Dataset: EcoSpold 2, unit process
Geography: RER
Time period: 2019-01-01 to 2023-12-31
Technology level: current
Classification: EcoSpold01Categories: chemicals/organics
Classification: ISIC rev.4 ecoinvent: 2011:Manufacture of basic chemicals
Synonyms: dimethylene oxide; dihydro-oxirene; oxirane; 1,2-epoxyethane
Scenario: Business-as-Usual
System model: Allocation, cut-off by classification
Generated by: Thomas Fröhlich
Published in: IFEU/PlasticsEurope 2021
Database: ecoinvent
isCopyrightProtected: true
accessRestrictedTo: 1

## General comment
This data represents the production of 1 kg of ethylene oxide. Since about 40 % of the EO production in Europe and about 70 % of the worldwide EO production is converted into ethylene glycols, EO and ethylene glycols are mostly produced together at integrated plants.
Infrastructure is included with a default value.
References:
IFEU/PlasticsEurope (2021): Eco-profile of Steam Cracker Products: Ethylene, Propylene, Butadiene, Pyrolysis Gasoline, Ethylene Oxide (EO), Ethylene Glycols (MEG, DEG, TEG)
Falcke H.; Holbrook S.; Clenahan I.; Lopez Carretero A.; Sanalan T.; Brinkmann T.; Roth J.; Zerger B.; Roudier S.; Delgado Sancho L. (2017): Best Available Techniques (BAT) Reference Document for the Production of Large Volume Organic Chemicals, JRC Science for Policy Report.
Rebsdat S., Mayer D. (2011): Ethylene Oxide, Ullmann's Encyclopedia of Industrial Chemistry, Wiley VCH.

## Included activities start
From the reception of ethylene at the factory gate.

## Included activities end
This activity ends with 1 kg of ethylene oxide, 100% at the factory gate. The dataset includes the input materials, energy uses, infrastructure and emissions.

## Geography
Representative for minium 80% of European (EU + GB, NO, CH) production.

## Technology
EO is produced by passing a mixture of ethylene and oxygen over a solid silver-containing catalyst. Reaction conditions are temperatures of about 200 - 300 °C and a pressure of 10 – 30 bar.
C2H4 + 1/2 O2 --> C2H4O
It is assumed that waste heat is dissipated.
References:
IFEU/PlasticsEurope (2021): Eco-profile of Steam Cracker Products: Ethylene, Propylene, Butadiene, Pyrolysis Gasoline, Ethylene Oxide (EO), Ethylene Glycols (MEG, DEG, TEG)
Falcke H.; Holbrook S.; Clenahan I.; Lopez Carretero A.; Sanalan T.; Brinkmann T.; Roth J.; Zerger B.; Roudier S.; Delgado Sancho L. (2017): Best Available Techniques (BAT) Reference Document for the Production of Large Volume Organic Chemicals, JRC Science for Policy Report.

## Time period
Data collection 2019/2020. The technology is not expected to change within 5 years.

## Parameters
- fraction, process water, to air: 0.205 dimensionless; name fraction_PW_to_air; lognormal variance with pedigree 0.092025, pedigree (4,4,3,2,4)
  Literature value (Statistics Canada, 2007 & Shaffer, K.H., 2008, Consumptive water use in the Great Lakes Basin, USGS) (Vionnet, S., Quantis Water Database - Technical Report, 2012).

## Reference product
- ethylene oxide: 1 kg; By-product classification allocatable product; CPC 34170: Ethers, alcohol peroxides, ether peroxides, epoxides, acetals and hemiacetals, and their halogenated, sulphona[…]; HS2017 291010: Epoxides, epoxyalcohols, epoxyphenols and epoxyethers; with a three-membered ring and their halogenated, su[...]; CAS 75-21-8
  EcoSpold01Location=RER
  production volume 6.00936e9 kg; = 0.196*30660000000
    Calculated value. The European production volume is extrapolated from the Global production volume using the average GDP (constant 2017 international USD from 2015-2019). The annual Global production volume in the year 2021 is 30'660'000'000 kg. This value is multiplied with the European share of global GDP, 19.6%.
    References:
    Statista, 2022, Market volume of ethylene oxide worldwide from 2015 to 2021, with a forecast for 2022 to 2029, available here: https://www.statista.com/statistics/1245260/ethylene-oxide-market-volume-worldwide/, accessed 16-12-2022.
    World bank (2022): GDP, available here: https://data.worldbank.org/indicator/NY.GDP.MKTP.PP.KD, accessed 17-05-2022.
  property heating value, net 27.53 MJ
    LHV is calculated based on the elemental composition of the substance. Based on the CAS number of the substance (000075-21-8), the chemical formula of the substance is found to be: C2H4O, (PubChem 2020).
    Reference: Kim, S., Chen, J., Cheng, T., Gindulyte, A., He, J., He, S., Li, Q., Shoemaker, B. A., Thiessen, P. A., Yu, B., Zaslavsky, L., Zhang, J., & Bolton, E. E. (2019). PubChem 2019 update: improved access to chemical data. Nucleic acids research, 47(D1), D1102–D1109. https://doi.org/10.1093/nar/gky1033
  property price 0.93 EUR2005
    Calculated value based on data from United Nations Commodity Trade Statistics Database (comtrade.un.org). UN comtrade category: 291010 Oxirane (ethylene oxide). Year 2005. Using exchange rate of 1EURO = 1.209 USD. Average of price of import into 5 main markets (EU, US, JP, IN and CN).
  properties: carbon allocation 0.545455 kg, carbon content 0.545455, carbon content, fossil 0.545455, carbon content, non-fossil 0, dry mass 1 kg, water content 0, water in wet mass 0 kg, wet mass 1 kg

## Inputs from technosphere
- chemical factory, organics: 4e-10 unit; lognormal variance with pedigree 0.0732, pedigree (2,4,1,4,4)
  Calculated based on literature data published by the industry. For this activity, no information was readily available concerning infrastructure and land-use. Therefore, the infrastructure is estimated based on data from two chemical factories, the BASF site of Ludwigshafen and the chemical factory in Gendorf (which are both located in Germany), which produce a wide range of chemical substances. Based on this data, the following assumptions are made: the built area amounts to about 4.2 ha, the plant has an average output of 50'000 t/a and a lifespan of fifty years. The estimated infrastructure amount is therefore 4.00 E-10 units per kg of produced chemical.
  References:
  Althaus H.-J., Chudacoff M., Hischier R., Jungbluth N., Osses M. and Primas A. (2007) Life Cycle Inventories of Chemicals. ecoinvent report No. 8, v2.0. EMPA Dübendorf, Swiss Centre for Life Cycle Inventories, Dübendorf, CH.
  Gendorf (2000) Umwelterklärung 2000, Werk Gendorf. Werk Gendorf, Burgkirchen.
  EcoSpold01Location=RER
  Uncertainty: infrastructure of a typical plant
- electricity, medium voltage: 0.106667 kWh; lognormal variance with pedigree 0.0113, pedigree (2,2,1,1,2)
  EcoSpold01Location=UCTE
  European average value, based on industrial survey, representative for min. 80 % of European (EU + GB, NO, CH) production
  IFEU/PlasticsEurope (2021): Eco-profile of Steam Cracker Products: Ethylene, Propylene, Butadiene, Pyrolysis Gasoline, Ethylene Oxide (EO), Ethylene Glycols (MEG, DEG, TEG)
  Uncertainty: electricity
- ethylene: 0.79597 kg; lognormal variance with pedigree 0.0113, pedigree (2,2,1,1,2)
  EcoSpold01Location=RER
  European average value, based on industrial survey, representative for min. 80 % of European (EU + GB, NO, CH) production
  IFEU/PlasticsEurope (2021): Eco-profile of Steam Cracker Products: Ethylene, Propylene, Butadiene, Pyrolysis Gasoline, Ethylene Oxide (EO), Ethylene Glycols (MEG, DEG, TEG)
  Uncertainty: precursor
  properties: carbon content, fossil 0.857143, dry mass 1 kg, heating value, net 43.22 MJ, wet mass 1 kg
- oxygen, liquid: 0.908059 kg; lognormal variance with pedigree 0.0113, pedigree (2,2,1,1,2)
  European average value, based on industrial survey, representative for min. 80 % of European (EU + GB, NO, CH) production
  IFEU/PlasticsEurope (2021): Eco-profile of Steam Cracker Products: Ethylene, Propylene, Butadiene, Pyrolysis Gasoline, Ethylene Oxide (EO), Ethylene Glycols (MEG, DEG, TEG)
  EcoSpold01Location=RER
  Uncertainty: precursor
  properties: dry mass 1 kg, wet mass 1 kg

## Emissions to nature
- Carbon dioxide, fossil [air, urban air close to ground]: 0.499546 kg; lognormal variance with pedigree 0.0113, pedigree (2,2,1,1,2)
  European average value, based on industrial survey, representative for min. 80 % of European (EU + GB, NO, CH) production
  IFEU/PlasticsEurope (2021): Eco-profile of Steam Cracker Products: Ethylene, Propylene, Butadiene, Pyrolysis Gasoline, Ethylene Oxide (EO), Ethylene Glycols (MEG, DEG, TEG)
  Uncertainty: emissions
- Carbon monoxide, fossil [air, urban air close to ground]: 0.00011 kg; lognormal variance with pedigree 0.0113, pedigree (2,2,1,1,2)
  (same comment as for Carbon dioxide, fossil)
- Ethylene [air, urban air close to ground]: 0.00023 kg; lognormal variance with pedigree 0.0113, pedigree (2,2,1,1,2)
  (same comment as for Carbon dioxide, fossil)
- Ethylene oxide [air, urban air close to ground]: 2e-5 kg; lognormal variance with pedigree 0.0113, pedigree (2,2,1,1,2)
  (same comment as for Carbon dioxide, fossil)
- Methane, fossil [air, urban air close to ground]: 0.000612 kg; lognormal variance with pedigree 0.0113, pedigree (2,2,1,1,2)
  (same comment as for Carbon dioxide, fossil)
- NMVOC, non-methane volatile organic compounds [air, urban air close to ground]: 0.00024 kg; lognormal variance with pedigree 0.0113, pedigree (2,2,1,1,2)
  (same comment as for Carbon dioxide, fossil)
- Oxygen [air, unspecified]: 0.20272 kg; lognormal variance with pedigree 0.0413, pedigree (2,2,1,1,2)
  European average value, based on industrial survey, representative for min. 80 % of European (EU + GB, NO, CH) production
  IFEU/PlasticsEurope (2021): Eco-profile of Steam Cracker Products: Ethylene, Propylene, Butadiene, Pyrolysis Gasoline, Ethylene Oxide (EO), Ethylene Glycols (MEG, DEG, TEG)
- BOD5, Biological Oxygen Demand [water, surface water]: 0.000165 kg; lognormal variance with pedigree 0.0113, pedigree (2,2,1,1,2)
  (same comment as for Carbon dioxide, fossil)
- COD, Chemical Oxygen Demand [water, surface water]: 0.000165 kg; lognormal variance with pedigree 0.0113, pedigree (2,2,1,1,2)
  (same comment as for Carbon dioxide, fossil)
- DOC, Dissolved Organic Carbon [water, surface water]: 0.0002 kg; lognormal variance with pedigree 0.0113, pedigree (2,2,1,1,2)
  (same comment as for Carbon dioxide, fossil)
- TOC, Total Organic Carbon [water, surface water]: 2.2e-5 kg; lognormal variance with pedigree 0.0113, pedigree (2,2,1,1,2)
  (same comment as for Carbon dioxide, fossil)

## Sampling procedure
Industry survey complemented with literature data and data from the Reference Document on Best Available Techniques in the Large Volume Organic Chemical Industry (2017)
