# electricity production, hydro, reservoir, tropical region

Dataset: EcoSpold 2, unit process
Geography: AR
Time period: 2012-01-01 to 2023-01-01
Technology level: modern
Classification: ISIC rev.4 ecoinvent: 3510:Electric power generation, transmission and distribution
Tags: hydro power
Scenario: Business-as-Usual
System model: Allocation, cut-off by classification
Generated by: Alejandro P Arena
Published in: Suppen, N 2017
Database: ecoinvent
isCopyrightProtected: true
accessRestrictedTo: 1

## General comment
This dataset represents the production of high voltage electricity at grid-connected reservoir hydropower plants located in sub-tropical regions in Argentina in 2014.
This dataset is based on the "electricity production, hydro, reservoir, tropical region/GLO 2008" dataset (accessed: January 24th, 2018), in which the reservoir hydropower plants are modelled based on data from Swiss hydropower plants. A representative sample of Swiss dams with a height of more than 30 metres is taken into account for calculating the input. Lifetime is assumed to be 150 years for the structural part and 80 years for the turbines.
The gross electricity production has been obtained from Cammesa.
Supporting documentation available at: <http://portalweb.cammesa.com/Memnet1/default.aspx>. Additional information can be obtained from CAMMESA under request."
Greenhouse gas emissions are calculated on the basis of a sample of 55 reservoirs in tropical regions in Hertwich 2013 and taken into account in the form of carbon dioxide and methane. There are great uncertainties on the origin of the CH4- and CO2-emissions. A part of them are assumed to originate from living biomass and from sewage discharged in the reservoirs and not only from biomass flooded.
Hertwich, E.G. 2013. Addressing Biogenic Greenhouse Gas Emissions from Hydropower in LCA. Environmental Sciency&Technology, 47, 9604-9611 CAMMESA "COMPAÑÍA ADMINISTRADORA DEL MERCADO MAYORISTA ELÉCTRICO SOCIEDAD ANÓNIMA" Supporting documentation available at: <http://portalweb.cammesa.com/Memnet1/default.aspx>. Additional information can be obtained from CAMMESA under request

## Included activities start
This dataset starts from the power plant ready to produce electricity, i.e. the reservoir filled with water.
From (potential) energy in water, entering the power plant.

## Included activities end
This activity ends with 1kWh of high voltage electricity produced at the power plant and arrived at the busbar.

This dataset includes
- the area/volume occupied for the barrage, power station, and the lake
- an estimation of emissions of carbon dioxide and methane
- operation and maintenance activities and materials of the power plants, such as lubricating oil or mass of water passing through the turbines.

This dataset doesn't include
- land use for access roads to the reservoir
- raw materials extraction, decommissioning and waste treatment as these activities are already included in the infrastructure datasets
- transformation of the electricity produced.
- dinitrogen oxide emissions

## Technology
Storage power plants have an appendant reservoir. The size of the reservoir can range from daily, monthly to annual storage reservoirs. According to the net head high-pressure, medium-pressure and low-pressure systems can be distinguished. High- and medium-pressure systems are constructed as dams. High-pressure storage power plants with a head of over 50 meters are very common in Switzerland. For this dataset concrete dams (arch dams and gravity dams) with a height of more then 30 meters are taken into account. Also pumped storage power plants are included because in most cases the data is only available for the overall generation system. The same counts for high- and medium-pressure and alpine run-of-river power plants which are also included in the storage power plant dataset. Due to the fact that the efforts for the plant construction are similar to storage power plants and that the estimated production is comparatively low, high- and medium-pressure run-of-river power plants are covered by the reservoir power station dataset.
The technology used in the dataset has an overall efficiency of 82%, more modern technologies show an overall efficiency of about 88%. The overall efficiency is composed of the efficiency of the works water channel, the turbine, the generator and the transformer and are listed below:
Efficiency of power plant current modern
Works water channel 0.95 0.95
Turbine 0.87 0.91
Generator 0.96 0.98
Transformer 0.98 0.99
Reservoir power plant total
without works water channel 0.82 0.88
with works water channel 0.78 0.84
Pumped storage power plant 0.70 0.74
The losses along the works water channel are primarily caused by friction and are calculated from the difference between gross and net head. Based on this calculation the efficiency of the works water channel amounts to 95%. The losses depend on the flow rate and have its maximum at full load. The smaller the cross section of adits and pressure pipelines, the higher the flow velocity and thus the friction losses. In older plants according to Bischof (1992) the efficiency of works water channels could be increased generally more than by replacing turbines and generators.
The efficiency losses in turbines depend on the turbine type (Kaplan, Francis, Pelton, etc.), the turbine output and on the ratio between turbined water amount and the rated water amount. In König (1997) examples for curve progressions of the relationship between these variables are shown. For current power plants an efficiency of 87% is assumed, more modern turbines show an efficiency of about 91%.
The efficiency of generators depends on the output, the rotation speed of the generator and the cooling system. Some relevant data can be found in König (1997). For today’s power plants an efficiency of approximately 96% is assumed, modern generators show an efficiency of about 98%. The efficiency of transformers amounts to 98%, respectively 99%.
References:
Bischof, R. (1992) Modernisierungspotential bei bestehenden Wasserkraftwerken. Vortrag beim Schweizerischen Technischen Verband, Sektion Graubünden, 21. Oktober 1992. Churwalden, Schweiz [unpublished].
König F., von (1985) Bau von Wasserkraftanlagen. C.F. Müller, Karlsruhe.

## Time period
The Annual Production Volume is valid for the year 2014

## Parameters
- gross electricity production: 1.86887e10 kWh; name gross_electricity; lognormal variance with pedigree 0.0019, pedigree (2,2,1,1,2)
  Gross production of grid-connected electricity in reservoir hydropower plants (Yacyreta) located in sub tropical regions of Argentina in 2014.
  The source (CAMMESA) provides statistics about net energy exchanges through the electric wholesale market .
  The gross production have been calculated from the net electricity production considering the losses due to auxiliary consumption within the power plant using the losses_gross_net parameter
  Source:; CAMMESA "COMPAÑÍA ADMINISTRADORA DEL MERCADO MAYORISTA ELÉCTRICO SOCIEDAD ANÓNIMA". Supporting documentation available at: http://portalweb.cammesa.com/Memnet1/default.aspx
- lifetime: 150 year; lognormal variance with pedigree 0.0014, pedigree (2,2,1,3,1)
  Estimation based on experiences.
  nan
- losses from gross electricity production: 0.01 dimensionless; name losses_gross_net; lognormal variance with pedigree 0.003225, pedigree (3,3,1,2,1)
  Literature value. Generic value taken from the IEA Electricity information 2014, part I, p. I.7: 'The difference between gross and net electricity production is generally observed to be about 7% for conventional thermal stations, 1% for hydro stations and 6% for nuclear.'
  IEA/OECD. 2014. Electricity Information 2014. International Energy Agency (IEA), Paris Cedex (FR).
  nan
  Uncertainty: Generic assumption

## Reference product
- electricity, high voltage: 1 kWh; By-product classification allocatable product; CPC 17100: Electrical energy; HS2017 271600: Electrical energy
  production volume 1.00034e10 kWh; name apv_electricity; = gross_electricity*(1-losses_gross_net)
    Literature/Calculated value.
    Net electricity production of grid-connected electricity in a reservoir hydropower plant (Yacyreta) located in a sub-tropical region in 2014.
    The source (CAMMESA) provides statistics about net energy exchanges through the electric wholesale market .
    See the comment for the parameter losses from gross electricity production for more information
    Source:; CAMMESA "COMPAÑÍA ADMINISTRADORA DEL MERCADO MAYORISTA ELÉCTRICO SOCIEDAD ANÓNIMA". Supporting documentation available at: http://portalweb.cammesa.com/Memnet1/default.aspx
  property price 0.0977 EUR2005
    Temporary price data. Calculated as 90% of purchasers price based on: 94% of the average price (to account for a 6% loss in transformation and transmission) for electricity for industrial consumersin 2005 (excluded taxes). From IEA.
  properties: carbon allocation 0 kg, carbon content 0

## Inputs from technosphere
- hydropower plant, reservoir, non-alpine regions: 4.0404e-13 unit; = 1/(lifetime*16500000000); source Bolliger, R. 2007, p. p.100 Tab. 12.5; lognormal variance with pedigree 0.044, pedigree (1,1,3,5,1)
  Literature value/calculated value. The needed amount of infrastructure per kWh produced is calculated with the lifetime and the annual net energy production (16500GWh/a).
- lubricating oil: 7.56e-6 kg; name lubricating_oil; = 0.000009*0.84; source Vögtlin H. J. 2002, p. p.36 in Bolliger et al.; lognormal variance with pedigree 0.1001, pedigree (4,2,3,5,3)
  There, a consumption of lubricating oil for turbines of 9 liters per GWh is estimated. With an oil density of 0.84 kg/l this amounts to 0.007 g/kWh. The lubricating oil is in a closed loop system (i.e. cannot get into the turbined water system) and is disposed annualy as waste oil in a hazardous waste treatment plant.
  A consumption of lubricating oil for turbines of 9 liters per GWh is estimated. With an oil density of 0.84 kg/l this amounts to 0.007 g/kWh. The lubricating oil is in a closed loop system (i.e. cannot get into the turbined water system) and is disposed annualy as waste oil in a hazardous waste treatment plant.
  Estimation. Data for a run-of-river power station were overtaken.
  properties: carbon content, fossil 0.75, dry mass 1 kg, heating value, net 40.2 MJ, wet mass 1 kg
  note on carbon content, fossil: Lubricating oil is produced from diesel. C-content/dry mass of fats and oils considered 75%, from: ecoinvent v2.2 report, n 15a, pg 40
  note on heating value, net: Literature value, Source: IPCC 2006, 2006 IPCC Guidelines for National Greenhouse Gas Inventories, Prepared by the National Greenhouse Gas Inventories Programme, Eggleston H.S., Buendia L., Miwa K., Ngara T. and Tanabe K. (eds). Published: IGES, Japan
- waste mineral oil: -7.56e-6 kg; name waste_oil; = lubricating_oil; lognormal variance with pedigree 0.0302, pedigree (4,4,2,1,1)
  calculated value
  production volume; = apv_electricity* waste_oil
    Calculated from the production volume of electricity, high voltage, hydro, reservoir in proportion to the respective output amounts.
  properties: carbon content, fossil 0.864444, dry mass 0.9 kg, heating value, net 34.7 MJ, water content 0.111111, wet mass 1 kg
  note on carbon content, fossil: Tab A.6, ecoinvent v2.2 report 13_I. C content has been calculated after data in the tables, and then referred to 1 kg DM
  note on heating value, net: Value taken from the general comment of the treatment dataset.

## Inputs from nature
- Energy, potential (in hydropower reservoir), converted [natural resource, in water]: 3.79 MJ
  Reflects range average to best performance.
- Occupation, lake, artificial [natural resource, land]: 0.0864782 m2*year; = lifetime *transformation_from_pasture; lognormal variance with pedigree 0.074, pedigree (1,1,3,5,1)
  Calculated value, based on the transformation area and the estimated life time
- Transformation, from pasture, man made [natural resource, land]: 0.000576521 m2; name transformation_from_pasture; lognormal variance with pedigree 0.198, pedigree (4,5,5,5,1)
  Literature. The water surface of one hydro power plant located in a tropical region in Argentina is considered
  Source: Inventario de Presas y Centrales Hidroeléctricas de la República Argentina,- 1a ed. Subsecretaria de Recursos Hídricos de la Nación
  Buenos Aires : Ministerio de Planificación Federal, Inversión Pública y Servicios, 2010. ISBN 978-987-23585-8-7
- Transformation, to industrial area [natural resource, land]: 5.76521e-6 m2; name transformation_to_industrial; = transformation_from_pasture*0.01; lognormal variance with pedigree 0.198, pedigree (4,5,5,5,1)
  Estimation. The area for the barrage and the power station are assumed to amount to 1% of the total land use. No land use for access roads was taken into account.
- Transformation, to lake, artificial [natural resource, land]: 0.000570756 m2; = transformation_from_pasture-transformation_to_industrial; lognormal variance with pedigree 0.198, pedigree (4,5,5,5,1)
  Calculated value, based on the transformation area
- Volume occupied, reservoir [natural resource, in water]: 0.15 m3*year; source BWW 1991, p. p.35 in Bolliger et al.; lognormal variance with pedigree 0.304, pedigree (1,1,3,5,1)
  Literature/Estimation
  The useful volume for these tropical reservoirs in Argentina was not available
  This figure has been taken from the GLO 2008 dataset, which is based on Swiss reservoir volumes.
- Water, turbine use, unspecified natural origin [natural resource, in water]: 1.35234 m3; name water_turbine_use_UNO_input; lognormal variance with pedigree 0.0706, pedigree (2,5,5,5,1)
  Calculated value/estimation. This value has been calculated with the nominal turbined flow (793.4 m3/s) and the average electricity production volume.
  Source:; CAMMESA "COMPAÑÍA ADMINISTRADORA DEL MERCADO MAYORISTA ELÉCTRICO SOCIEDAD ANÓNIMA". Supporting documentation available at: http://portalweb.cammesa.com/Memnet1/default.aspx
  Inventario de Presas y Centrales Hidroeléctricas de la República Argentina,- 1a ed. Subsecretaria de Recursos Hídricos de la Nación
  Buenos Aires : Ministerio de Planificación Federal, Inversión Pública y Servicios, 2010. ISBN 978-987-23585-8-7

## Emissions to nature
- Carbon dioxide, from soil or biomass stock [air, non-urban air or from high stacks]: 0.0285 kg; lognormal variance with pedigree 0.0987, pedigree (5,3,5,3,3)
  Literature value/calculated value taken over from the global dataset "electricity production, hydro, reservoir, tropical region, GLO, 2015": Hertwich 2013 provides an analysis of greenhouse gas emissions from hydropower plants. 55 data points are available for tropical reservoir plants, from which the average CO2 and CH4 emissions are calculated.
  Hertwich, E.G. 2013. Addressing Biogenic Greenhouse Gas Emissions from Hydropower in LCA. Environmental Sciency&Technology, 47, 9604-9611
- Methane, non-fossil [air, non-urban air or from high stacks]: 0.00136 kg; lognormal variance with pedigree 0.0987, pedigree (5,3,5,3,3)
  (same comment as for Carbon dioxide, from soil or biomass stock)
- Water [air, unspecified]: 0.0292217 m3; name water_to_air_unspecified; lognormal variance with pedigree 0.0427, pedigree (2,2,3,1,1)
  Calculated value based on literature values and expert opinion. See comments in the parametres' comment field.
  property fraction, origin: fresh water 1; name fraction_origin_fresh_water_Ww
  property fraction, origin: salt water 0; name fraction_origin_salt_water_Ww
  property fraction, origin: unspecified 0; name fraction_origin_unspecified_Ww
- Water [water, unspecified]: 1.32312 m3; name water_to_water_unspecified; = water_turbine_use_UNO_input-water_to_air_unspecified; lognormal variance with pedigree 0.130025, pedigree (4,4,5,2,4)
  (same comment as for Water)
  property fraction, origin: fresh water 1; name fraction_origin_fresh_water
  property fraction, origin: salt water 0; name fraction_origin_salt_water
  property fraction, origin: unspecified 0; name fraction_origin_unspecified

## Sampling procedure
The information provided in this dataset correspond to one reservoir (Yacyretá), the biggest hydroelectric plant in the country, located in a subtropical region. It has been considered as a reservoir due to the extension of land submerged. Representativeness is 100 %.

## Extrapolations
This dataset has been built based on the GLO 2008 dataset for reservoir plants in tropical regions.The information about annual electricity production and the area of the reservoirs have been obtained for the Yacyreta reservoir. Other exchanges, such as the occupation area and the transformed to industrial area have been calculated on the basis of that information.
