# polyphenylene sulfide production

Dataset: EcoSpold 2, unit process
Geography: GLO
Time period: 1967-01-01 to 2023-12-31
Technology level: current
Classification: ISIC rev.4 ecoinvent: 2013:Manufacture of plastics and synthetic rubber in primary forms
Classification: EcoSpold01Categories: plastics/polymers
Synonyms: PPS
Tags: ConvertedDataset
Scenario: Business-as-Usual
System model: Allocation, cut-off by classification
Generated by: Roland Hischier
Published in: Hischier R. 2007
Database: ecoinvent
isCopyrightProtected: true
accessRestrictedTo: 1

## General comment
The functional unit represent 1 kg of solid PPS. Large uncertainty of the process data due to weak data on the production process and missing data on process emissions.
[This dataset was already contained in the ecoinvent database version 2. It was not individually updated during the transfer to ecoinvent version 3. Life Cycle Impact Assessment results may still have changed, as they are affected by changes in the supply chain, i.e. in other datasets. This dataset was generated following the ecoinvent quality guidelines for version 2. It may have been subject to central changes described in the ecoinvent version 3 change report (http://www.ecoinvent.org/database/ecoinvent-version-3/reports-of-changes/), and the results of the central updates were reviewed extensively. The changes added e.g. consistent water flows and other information throughout the database. The documentation of this dataset can be found in the ecoinvent reports of version 2, which are still available via the ecoinvent website. The change report linked above covers all central changes that were made during the conversion process.]

## Included activities end
Raw materials and chemicals used for production, transport of materials to manufacturing plant, estimated emissions to air and water from production (incomplete), estimation of energy demand and infrastructure of the plant (approximation). Solid wastes omitted.

## Geography
Data used has no specific geographical origin (stoechiometry). Average europenan processes for raw materials, transport requirements and electricity mix used.

## Technology
Production from sodium sulfide nonahydrate (itself produced out of sodium hydroxide and hydrogen sulfide) and P-dichlorobenzene in an N-methyl-2-pyrrolidone solution with a yield of 85%. Inventory bases on patent information. The emissions to air (0.2 wt.% of raw material input) and water were estimated using mass balance. Treatment of the waste water in a internal waste water treatment plant assumed (elimination efficiency of 90% for C).

## Parameters
- fraction, cooling water, cooling pond system, to air: 0.032 dimensionless; name fraction_CW_CP_to_air; lognormal variance with pedigree 0.0413, pedigree (2,3,1,3,1)
  Calculated based on literature value (Scown, C.D., 2011, Water Footprint of U.S. Transportation Fuels and supplying information of the article) (Vionnet, S., Quantis Water Database - Technical Report, 2012).
- fraction, cooling water, once-through system, to air: 0.004 dimensionless; name fraction_CW_OT_to_air; lognormal variance with pedigree 0.0413, pedigree (2,3,1,3,1)
  (same comment as for fraction, cooling water, cooling pond system, to air)
- fraction, cooling water, recirculating system, to air: 0.771 dimensionless; name fraction_CW_R_to_air; lognormal variance with pedigree 0.0413, pedigree (2,3,1,3,1)
  (same comment as for fraction, cooling water, cooling pond system, to air)
- fraction, cooling water, to air: 0.3875 dimensionless; name fraction_CW_to_air; = (0.5*fraction_CW_OT_to_air)+(0.5*fraction_CW_R_to_air); lognormal variance with pedigree 0.092025, pedigree (4,4,3,2,4)
  Calculated value based on literature value (see comments of the other parametres present in this dataset) and expert opinion. In the case when no industry/literature data are available about the type of cooling or directly fraction, cooling water, to air specific for the process a default assumption is applied. It is assumed that the once-through cooling system is used in 50% of all cases and recirculating system is used in another 50% of all cases.
- fraction, process water, to air: 0.205 dimensionless; name fraction_PW_to_air; lognormal variance with pedigree 0.092025, pedigree (4,4,3,2,4)
  Literature value (Statistics Canada, 2007 & Shaffer, K.H., 2008, Consumptive water use in the Great Lakes Basin, USGS) (Vionnet, S., Quantis Water Database - Technical Report, 2012).

## Reference product
- polyphenylene sulfide: 1 kg; By-product classification allocatable product; CPC 34790: Other plastics in primary forms; ion exchangers; HS2017 390791: Polyesters; n.e.c. in heading no. 3907, unsaturated, in primary forms; CAS 26125-40-6
  EcoSpold01Location=GLO
  production volume 1 kg
    Unknown
    Dummy value to be replaced by measured, estimated or calculated value
  property carbon content, fossil 0.666667
    Poly(phenylene sulphide) (PPS, poly(thio-1,4-phenylene) is a repeating aromatic monomer unit (a benzene structure), joint by sulphur bridges (ecoinvent v2.2 report 11_II), C6H4S, MW=108 g/mol
  property heating value, net 24.67 MJ
    LHV is calculated based on the elemental composition of the substance. Based on the name of the substance, the chemical formula of the substance is assumed to be: C6H4S
  property price 1.94449 EUR2005
    Calculated based on inputs: The price of the product has been calculated as a sum of the values of the material and energy inputs for this product. This value is therefore a rough estimation. It may underestimate the real price since there are additional expenses when producing any product. These expences can include for example labour costs, treatment of waste materials and profit for the producer. Please consider carefully whether this level of data quality is acceptable for your application.
  properties: carbon allocation 0.666667 kg, carbon content 0.666667, carbon content, non-fossil 0, dry mass 1 kg, water content 0, water in wet mass 0 kg, wet mass 1 kg

## Inputs from technosphere
- N-methyl-2-pyrrolidone: 0.006 kg; lognormal variance with pedigree 0.0641, pedigree (3,4,5,3,1)
  US patent information
  EcoSpold01Location=RER
  Uncertainty: US patent information
  properties: carbon content, fossil 0.585366, dry mass 1 kg, heating value, net 29.36 MJ, wet mass 1 kg
- chemical factory, organics: 4e-10 unit; lognormal variance with pedigree 0.5761, pedigree (4,5,5,3,5)
  Estimation
  EcoSpold01Location=RER
  Uncertainty: estimation
- electricity, medium voltage: 0.333 kWh; lognormal variance with pedigree 0.208, pedigree (5,5,5,1,4)
  EcoSpold01Location=UCTE
  Estimated with data from a large chem. Plant
  Uncertainty: estimated with data from a large chem. Plant
- heat, district or industrial, natural gas: 2 MJ; lognormal variance with pedigree 0.208, pedigree (5,5,5,1,4)
  Estimated with data from a large chem. Plant
  EcoSpold01Location=RER
  Uncertainty: estimated with data from a large chem. Plant
  properties: heating value, net 1 MJ
- hydrogen sulfide: 0.0686587, 0.325931 kg (2 suppliers, which the file names only by identifier); sum of these 0.39459 kg; lognormal variance with pedigree 0.0641, pedigree (3,4,5,3,1)
  Cacluated, from US patent
  EcoSpold01Location=RER
  Uncertainty: cacluated, from US patent
  properties: dry mass 1 kg, heating value, net 7.11 MJ, wet mass 1 kg
- p-dichlorobenzene: 1.2928, 0.3232 kg (2 suppliers, which the file names only by identifier); sum of these 1.616 kg; lognormal variance with pedigree 0.0641, pedigree (3,4,5,3,1)
  Cacluated, from US patent
  EcoSpold01Location=RER
  Uncertainty: cacluated, from US patent
  properties: carbon content, fossil 0.493151, dry mass 1 kg, heating value, net 18.15 MJ, wet mass 1 kg
- sludge, NaCl electrolysis: -1.16899, -0.358468, -0.298546 kg (3 suppliers, which the file names only by identifier); sum of these -1.826 kg; lognormal variance with pedigree 0.168, pedigree (5,5,1,1,4)
  Caclulated, based on assumptions
  EcoSpold01Location=CH
  Uncertainty: caclulated, based on assumptions
  production volume
    Calculated from the production volume of polyphenylene sulfide in proportion to the respective output amounts.
  properties: dry mass 1 kg, wet mass 1 kg
- sodium hydroxide, without water, in 50% solution state: 0.0823543, 0.843376 kg (2 suppliers, which the file names only by identifier); sum of these 0.92573 kg; lognormal variance with pedigree 0.0641, pedigree (3,4,5,3,1)
  Cacluated, from US patent
  EcoSpold01Location=RER
  Uncertainty: cacluated, from US patent
  properties: dry mass 1 kg, heating value, net 3.03 MJ, wet mass 1 kg
- steam, in chemical industry: 0.059508, 0.010492 kg (2 suppliers, which the file names only by identifier); sum of these 0.07 kg; lognormal variance with pedigree 0.0641, pedigree (3,4,5,3,1)
  EcoSpold01Location=RER
  US patent information
  Uncertainty: US patent information
  properties: wet mass 1 kg

## Inputs from nature
- Water, cooling, unspecified natural origin [natural resource, in water]: 0.024 m3; name water_cooling_UNO_input; lognormal variance with pedigree 0.208, pedigree (5,5,5,1,4)
  Estimated with data from a large chem. Plant
  Uncertainty: estimated with data from a large chem. Plant
- Water, unspecified natural origin [natural resource, in water]: 0.012 m3; name water_UNO_input; lognormal variance with pedigree 0.208, pedigree (5,5,5,1,4)
  Own assumption
  Uncertainty: own assumption

## Emissions to nature
- Carbon dioxide, fossil [air, urban air close to ground]: 0.0121 kg; lognormal variance with pedigree 0.2, pedigree (5,5,5,5,4)
  Estimated from WWTP effic.
  Uncertainty: estimated from WWTP effic.
- Hydrocarbons, aromatic [air, urban air close to ground]: 0.0018515 kg; lognormal variance with pedigree 0.32, pedigree (5,5,5,5,4)
  Own assumption
  Uncertainty: own assumption
- Hydrogen sulfide [air, urban air close to ground]: 2.4e-5 kg; lognormal variance with pedigree 0.32, pedigree (5,5,5,5,4)
  Own assumption
  Uncertainty: own assumption
- Water [air, unspecified]: 0.01176 m3; name water_to_air_unspecified; = (water_cooling_UNO_input*fraction_CW_to_air)+(water_UNO_input*fraction_PW_to_air); lognormal variance with pedigree 0.0807, pedigree (2,2,5,1,1)
  Calculated value based on literature values and expert opinion. See comments in the parametres' comment field.
  property fraction, origin: fresh water 0; name fraction_origin_fresh_water
  property fraction, origin: salt water 0; name fraction_origin_salt_water
  property fraction, origin: unspecified 1; name fraction_origin_unspecified
- AOX, Adsorbable Organic Halides [water, surface water]: 2.08e-6 kg; lognormal variance with pedigree 0.24, pedigree (5,5,5,5,4)
  Estimated from WWTP effic.
  Uncertainty: estimated from WWTP effic.
- BOD5, Biological Oxygen Demand [water, surface water]: 0.00154 kg; lognormal variance with pedigree 0.24, pedigree (5,5,5,5,4)
  Estimated from WWTP effic.
  Uncertainty: estimated from WWTP effic.
- COD, Chemical Oxygen Demand [water, surface water]: 0.00154 kg; lognormal variance with pedigree 0.24, pedigree (5,5,5,5,4)
  Estimated from WWTP effic.
  Uncertainty: estimated from WWTP effic.
- DOC, Dissolved Organic Carbon [water, surface water]: 0.000366 kg; lognormal variance with pedigree 0.24, pedigree (5,5,5,5,4)
  Estimated from WWTP effic.
  Uncertainty: estimated from WWTP effic.
- Hydrocarbons, unspecified [water, surface water]: 0.0006 kg; lognormal variance with pedigree 0.5, pedigree (5,5,5,5,4)
  Estimated from WWTP effic.
  Uncertainty: estimated from WWTP effic.
- TOC, Total Organic Carbon [water, surface water]: 0.000366 kg; lognormal variance with pedigree 0.24, pedigree (5,5,5,5,4)
  Estimated from WWTP effic.
  Uncertainty: estimated from WWTP effic.
- Water [water, unspecified]: 0.02424 m3; name water_to_water_unspecified; = water_cooling_UNO_input*(1-fraction_CW_to_air)+water_UNO_input*(1-fraction_PW_to_air); lognormal variance with pedigree 0.0807, pedigree (2,2,5,1,1)
  (same comment as for Water)
  property carbon content, fossil 0; name C_content_fossil
  property carbon content, non-fossil 0; name C_content_non_fossil
  property dry mass 0 kg; name DM
  property fraction, origin: fresh water 0; name fraction_origin_fresh_water_Ww
  property fraction, origin: salt water 0; name fraction_origin_salt_water_Ww
  property fraction, origin: unspecified 1; name fraction_origin_unspecified_Ww
  property water in wet mass 1000 kg; name WWM
  property wet mass 1000 kg; name WM
- o-Dichlorobenzene [water, surface water]: 4.32e-6 kg; lognormal variance with pedigree 0.5, pedigree (5,5,5,5,4)
  Estimated from WWTP effic.
  Uncertainty: estimated from WWTP effic.

## Sampling procedure
US patent information & own assumptions

## Extrapolations
no extrapolation

## Review by Jürgen Sutter 2007-09-13
passed.
