# strontium carbonate production

Dataset: EcoSpold 2, unit process
Geography: GLO
Time period: 2014-01-01 to 2023-12-31
Technology level: current
Classification: EcoSpold01Categories: chemicals/inorganics
Classification: ISIC rev.4 ecoinvent: 2011:Manufacture of basic chemicals
Synonyms: strontianite; strontium salt of carbonic acid
Scenario: Business-as-Usual
System model: Allocation, cut-off by classification
Generated by: Daria Dellenbach
Database: ecoinvent
isCopyrightProtected: true
accessRestrictedTo: 1

## General comment
This dataset represents the production of strontium carbonate from strontium sulfate (celestite ore) via the black ash process.
The unreacted reactants are considered to be flushed out with the reaction wastewater. Sodium sulfide is formed as a by-product.
Celestite is mined mainly in Spain, China and Mexico.
Strontium carbonate is used in the manufacturing of ceramics and glass products (e.g. cathode ray tubes, X-ray absorbing glass, as a flux). Additionally, it is used in electronic applications (e.g. manufacturing of color television receivers), pyrotechnics and fireworks as a colorant.
In the black ash process, celestite concentrate is mixed with coke at 1100 °C to form stronitum sulfide and carbon dioxide. The strontium sulfide is further reacted with soda ash to collect the precipitated strontium carbonate:
SrSO4 + 2 C --> SrS + 2 CO2
SrS + Na2CO3 --> SrCO3 + Na2S
References:
Nuss P., Eckelmann M. J. (2014): Life Cycle Assessment of Metals: A Scientific Synthesis, PLoS ONE 9 (7)
Gendorf (2020). Umwelterklärung 2019, Umwelterklärung 2017, Werk Gendorf Industriepark, www.gendorf.de.

## Included activities start
This activity starts with the delivery of material and energy inputs on site.

## Included activities end
This activity ends with the production of strontium carbonate. This datasets includes the consumption of raw materials and energy, the use of infrastructure and direct emissions to the environment.
The dataset: heat production, at coal coke industrial furnace 1-10MW, GLO, version 3.7.1., was used as a proxy for coke.

## Technology
Commercial strontium carbonate is produced via the black ash process. In a first step, celestite concentrate (SrSO4) is mixed with ground coke at 1100 °C, The formed strontium sulfide is reacted with sodium carbonate in water, whereas strontium carbonate precipitates. A yield of 80% is assumed.
SrSO4 (MW 183.68) + 2 C (12.01) --> SrS (MW 119.69) + 2 CO2 (MW 44.01)
SrS (MW 119.69) + Na2CO3 (MW 105.99) --> SrCO3 (MW 147.63) + Na2S (MW 79.06)
The dataset heat production, at coal coke industrial furnace 1-10MW, GLO, version 3.7.1. was used as a proxy for coke consumption.
References:
Nuss P., Eckelmann M. J. (2014): Life Cycle Assessment of Metals: A Scientific Synthesis, PLoS ONE 9 (7)
Gendorf (2020). Umwelterklärung 2019, Umwelterklärung 2017, Werk Gendorf Industriepark, www.gendorf.de.

## Time period
Arbitrary time period chosen for the proxy.

## Reference product
- strontium carbonate: 1 kg; name RefProd; By-product classification allocatable product; CPC 34240: Phosphates of triammonium; salts and peroxysalts of inorganic acids and metals n.e.c.; HS2017 283692: Carbonates; strontium carbonate; CAS 1633-05-2
  Formula: SrCO3
  production volume 1.40049e8 kg; name RP_PV; = 220000*1000/1.570873953
    The production volume is expressed in kg and is based on the fact that for the production of 1 kg of strontium carbonate, 1.571 kg of strontium sulfate are required as an input. The global annual production of strontium sulfate was 220'000 metric tons in 2019. Source: USGS 2021 - Strontium (https://pubs.usgs.gov/periodicals/mcs2021/mcs2021-strontium.pdf)
  property carbon content, fossil 0.0813
    fossil carbon content on a dry matter basis. Based on stoichiometry, SrCO3.
  property heating value, net 2.47 MJ
    LHV is calculated based on the elemental composition of the substance. Based on the CAS number of the substance (001633-05-2), the chemical formula of the substance is found to be: CO3Sr, (PubChem 2020).
    Reference: Kim, S., Chen, J., Cheng, T., Gindulyte, A., He, J., He, S., Li, Q., Shoemaker, B. A., Thiessen, P. A., Yu, B., Zaslavsky, L., Zhang, J., & Bolton, E. E. (2019). PubChem 2019 update: improved access to chemical data. Nucleic acids research, 47(D1), D1102–D1109. https://doi.org/10.1093/nar/gky1033
  property molecular weight 147.628 g/mol; name SrCO3_mol_weight
    Taken from http://chem.sis.nlm.nih.gov/chemidplus/rn/1633-05-2
  property price 0.37 EUR2005
    Calculated value based on data from United Nations Commodity Trade Statistics Database (comtrade.un.org). UN comtrade category: 283692 Strontium carbonate. Year 2005. Using exchange rate of 1EURO = 1.209 USD. Average of price of import into 5 main markets (EU, US, JP, IN and CN).
  property strontium content 0.593375; name RefProd_Sr_content
    strontium content on a dry matter basis
  properties: allocation factor 0.569998, carbon allocation 0.0813 kg, carbon content 0.0813, carbon content, non-fossil 0, dry mass 1 kg, true value 0.37, water content 0, water in wet mass 0 kg, wet mass 1 kg

## Inputs from technosphere
- chemical factory, organics: 2.27999e-10 unit; lognormal variance with pedigree 0.309425, pedigree (2,3,2,2,3)
  Calculated based on literature data published by the industry. For this activity, no information was readily available concerning infrastructure and land-use. Therefore, the infrastructure is estimated based on data from two chemical factories, the BASF site of Ludwigshafen and the chemical factory in Gendorf (which are both located in Germany), which produce a wide range of chemical substances. Based on this data, the following assumptions are made: the built area amounts to about 4.2 ha, the plant has an average output of 50'000 t/a and a lifespan of fifty years. The estimated infrastructure amount is therefore 4.00 E-10 units per kg of produced chemical.
  EcoSpold01Location=RER
  Uncertainty: The uncertainty could not be determined, it has then been maximized.
- coke: 1.29882, 2.7562 MJ (2 suppliers, which the file names only by identifier); sum of these 4.05502 MJ; lognormal variance with pedigree 0.0022, pedigree (1,1,2,5,1)
  Stoichiometric calculation with coke carbon content 0.86915 kg/kg and coke dry mass 0.032867 kg/MJ.
  Uncertainty: Calculated variable. Uncertainty will be determined from propagation of uncertainty factors of underlying variables.
  properties: Corresponding fuel use 1.24992 MJ, carbon content, fossil 0.869149, dry mass 0.0328671 kg, heating value, net 28.6 MJ, water content 0.0638298, wet mass 0.034965 kg
  note on Corresponding fuel use: Lower heating value of the fuel input related to the heat/electricity output. Calculated from heat production, at hard coal industrial furnace, based on hard coal NHV and fuel input. fuel input: 0,04325 kg/Mj of output Hard coal NHV= 28,9 MJ/kg Corresponding fuel use= 28,9* 0,04325
- electricity, medium voltage: 0.227486 kWh; source Hischier R. 2005; lognormal variance with pedigree 0.010025, pedigree (2,3,2,2,3)
  Calculated based on literature data published by the industry. This value is a 5-year average of data (2015 - 2019) published by the Gendorf factory (Gendorf, 2016, Umwelterklärung, www.gendorf.de), (Gendorf, 2017, Umwelterklärung, www.gendorf.de), (Gendorf, 2020, Umwelterklärung, www.gendorf.de). The amount of electricity per kg of chemical substance produced is calculated using literature data published by the Gendorf factory based in Germany, which produces a wide range of chemical substances. The factory produced 1634200 tonnes of chemical substances in the year 2019 (Gendorf, 2020, Umwelterklärung, www.gendorf.de) and 870000 tonnes of intermediate products. The amount of electricity consumed in the year 2019 was 3381300 GJ (Gendorf, 2020, Umwelterklärung, www.gendorf.de). The resulting amount of electricity is 0.375 kWh/kg (year 2019) of chemical substance produced. The 5-year average (2015 - 2019, weighted by production volume) is 0.3991 kWh/kg (1.44 MJ/kg). Cross-reference: the amount of chemicals produced (excluding intermediate products) in the EU-28 in the year 2017 was 291 million tonnes (Eurostat, http://ec.europa.eu/eurostat/statistics-explained/index.php/Chemicals_production_statistics, accessed 2021-01-21). The energy (both heat and electricity) consumed per kg of chemicals produced in 2017 is 7.58 MJ/kg. This is higher than the value calculated using data published by Gendorf – 3.53 MJ/kg, but that is to be expected as the intermediate products are not accounted for.
  EcoSpold01Location=UCTE
  Uncertainty: The uncertainty could not be determined, it has then been maximized.
- hard coal ash: -8.69056e-6, -1.37181e-5, -1.93022e-5, -1.35787e-5, -2.88038e-6, -2.02212e-5, -0.000118974, -0.0395349, -0.00091818, -8.05967e-5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 kg (14 suppliers, which the file names only by identifier); sum of these -0.0425402 kg; source Röder, A. 2004; lognormal variance with pedigree 0.24, pedigree (5,5,5,5,5)
  EcoSpold01Location=PL
  Assumption: no reuse
  Uncertainty: Completeness, temporal, geographical and technological indicators adapted considering differences with original dataset.
  production volume; = BP_hard_coal_ash*RP_PV/abs(RefProd)
    Calculated from production volume of reference product using the relative outputs.
  properties: dry mass 1 kg, wet mass 1 kg
- heat, district or industrial, natural gas: 1.0773 MJ; lognormal variance with pedigree 0.010025, pedigree (2,3,2,2,3)
  Calculated based on literature data published by the industry. This value is a 5-year average of data (2015 - 2019) published by the Gendorf factory (Gendorf, 2016, Umwelterklärung, www.gendorf.de), (Gendorf, 2017, Umwelterklärung, www.gendorf.de), (Gendorf, 2020, Umwelterklärung, www.gendorf.de). The amount of heat used per kg of chemical substance produced is calculated using literature data published by the Gendorf factory based in Germany, which produces a wide range of chemical substances. The factory produced 1634200 tonnes of chemical substances in the year 2019 (Gendorf, 2020, Umwelterklärung, www.gendorf.de) and 870000 tonnes of intermediate products. The amount of heat in the year 2019 was 5101290 GJ (Gendorf, 2020, Umwelterklärung, www.gendorf.de) of which 90% was obtained from natural gas and 10% from steam. The resulting amount of heat from natural gas is 1.77 MJ/kg of chemical product produced. The 5-year average (2015 - 2019, weighted by production volume) is 1.89 MJ/kg. Cross-reference: the amount of chemicals produced (excluding intermediate products) in the EU-28 in the year 2017 was 291 million tonnes (Eurostat, http://ec.europa.eu/eurostat/statistics-explained/index.php/Chemicals_production_statistics, accessed 2021-01-21). The energy (both heat and electricity) consumed per kg of chemicals produced in 2017 is 7.58 MJ/kg. This is higher than the value calculated using data published by Gendorf – 3.53 MJ/kg, but that is to be expected as the intermediate products are not accounted for.
  properties: heating value, net 1 MJ
- heat, from steam, in chemical industry: 0.101758, 0.0179413 MJ (2 suppliers, which the file names only by identifier); sum of these 0.1197 MJ; source Hischier R. 2005; lognormal variance with pedigree 0.010025, pedigree (2,3,2,2,3)
  Calculated based on literature data published by the industry. This value is a 5-year average of data (2015 - 2019) published by the Gendorf factory (Gendorf, 2016, Umwelterklärung, www.gendorf.de), (Gendorf, 2017, Umwelterklärung, www.gendorf.de), (Gendorf, 2020, Umwelterklärung, www.gendorf.de). The amount of heat used per kg of chemical substance produced is calculated using literature data published by the Gendorf factory based in Germany, which produces a wide range of chemical substances. The factory produced 1634200 tonnes of chemical substances in the year 2019 (Gendorf, 2020, Umwelterklärung, www.gendorf.de) and 870000 tonnes of intermediate products. The amount of heat in the year 2019 was 5101290 GJ (Gendorf, 2020, Umwelterklärung, www.gendorf.de) of which 90% was obtained from natural gas and 10% from steam. The resulting amount of heat from steam is 0.27 MJ/kg of chemical product produced. The 5-year average (2015 - 2019, weighted by production volume) is 0.21 MJ/kg. Cross-reference: the amount of chemicals produced (excluding intermediate products) in the EU-28 in the year 2017 was 291 million tonnes (Eurostat, http://ec.europa.eu/eurostat/statistics-explained/index.php/Chemicals_production_statistics, accessed 2021-01-21). The energy (both heat and electricity) consumed per kg of chemicals produced in 2017 is 7.58 MJ/kg. This is higher than the value calculated using data published by Gendorf – 3.53 MJ/kg, but that is to be expected as the intermediate products are not accounted for.
  Uncertainty: The uncertainty could not be determined, it has then been maximized.
  properties: heating value, net 1 MJ
- soda ash, dense: 0.462101 kg; name Na2CO3; lognormal variance with pedigree 0.1786, pedigree (4,5,5,5,5)
  Based on stoichiometry and assumed chemical reaction yield.
  Uncertainty: Calculated variable. Uncertainty will be determined from propagation of uncertainty factors of underlying variables. Uncertainty of actual relation between variables not accounted for at this time, although this could be included in a future update.
  property molecular weight 105.988 g/mol; name Na2CO3_mol_weight
  properties: carbon content, fossil 0.113208, dry mass 1 kg, heating value, net 3.43 MJ, wet mass 1 kg
  note on molecular weight: Taken from http://chem.sis.nlm.nih.gov/chemidplus/chemidheavy.jsp
- strontium sulfate, 90% SrSO4: 0.963093 kg; name SrSO4; lognormal variance with pedigree 0.1786, pedigree (4,5,5,5,5)
  Strontium sulfate is celestite ore (see http://www.sciencedirect.com/science/article/pii/0304386X9400060G). Based on stoichiometry and assumed chemical reaction yield.
  The purity of strontium sulfate is assumed to be 90%.
  Uncertainty: Calculated variable. Uncertainty will be determined from propagation of uncertainty factors of underlying variables. Uncertainty of actual relation between variables not accounted for at this time, although this could be included in a future update.
  property carbon content, fossil 0; name SrSO4_C_content_fossil
  property carbon content, non-fossil 0; name SrSO4_C_content_non_fossil
  property dry mass 1 kg; name SrSO4_DM
  property molecular weight 183.682 g/mol; name SrSO4_mol_weight
  property strontium content 0.476916; name SrSO4_Sr_content
  property water content 0; name SrSO4_water_content
  property water in wet mass 0 kg; name SrSO4_WWM
  property wet mass 1 kg; name SrSO4_WM
  note on molecular weight: Taken from http://chem.sis.nlm.nih.gov/chemidplus/rn/7759-02-6
- wastewater, average: -6.3093e-9, -1.0499e-6, -2.51052e-7, -3.73803e-9 m3 (4 suppliers, which the file names only by identifier); sum of these -1.311e-6 m3; lognormal variance with pedigree 0.009825, pedigree (2,3,1,2,3)
  Calculated based on literature data published by the industry. This value is a 5-year average of data (2015 - 2019) published by the Gendorf factory (Gendorf, 2016, Umwelterklärung, www.gendorf.de), (Gendorf, 2017, Umwelterklärung, www.gendorf.de), (Gendorf, 2020, Umwelterklärung, www.gendorf.de). The amount of wastewater (which is later on treated in the municipal WWTP) per kg of chemical substance produced is calculated using literature data published by the Gendorf factory based in Germany, which produces a wide range of chemical substances. The factory produced 1634200 tonnes of chemical substances in the year 2019 (Gendorf, 2020, Umwelterklärung, www.gendorf.de) and 870000 tonnes of intermediate products. The amount of wastewater which is later on treated in the municipal WWTP in the year 2019 was 6821 tonnes (Gendorf, 2020, Umwelterklärung, www.gendorf.de). The resulting amount of wastewater is 2.3E-06 m3/kg of chemical product produced.
  production volume; name wastewater_PV; = RP_PV*( wastewater_amount/ RefProd)
    Calculated from production volume of reference product using the relative outputs.
  properties: carbon content, non-fossil 0.194039, dry mass 0.346837 kg, water content 2882.2, wet mass 1000 kg
  note on carbon content, non-fossil: 0.0673 kg TOC/m3 (Tab A.17, ecoinvent v2.2 report 13_I). TOC was considered as Total Carbon.
- water, completely softened: 0.00995671, 0.0133013, 0.00715649 kg (3 suppliers, which the file names only by identifier); sum of these 0.0304145 kg; source Kamberger W. 1993; lognormal variance with pedigree 0.1906, pedigree (2,5,5,5,5)
  EcoSpold01Location=RER
  Estimation. It is assumed that 2% of the feed water is additionally required as decarbonised water (6t per TJin). For wet purification 1.5t per TJin of water is needed. Due to the lack of information the water used for cleaning can not be considered.
  Uncertainty: Completeness, temporal, geographical and technological indicators adapted considering differences with original dataset.
  properties: wet mass 1 kg

## Inputs from nature
- Water, cooling, unspecified natural origin [natural resource, in water]: 0.00797997 m3; name water_cooling_UNO_input; lognormal variance with pedigree 0.010025, pedigree (2,3,2,2,3)
  Calculated based on literature data published by the industry. This value is a 5-year average of data (2015 - 2019) published by the Gendorf factory (Gendorf, 2016, Umwelterklärung, www.gendorf.de), (Gendorf, 2017, Umwelterklärung, www.gendorf.de), (Gendorf, 2020, Umwelterklärung, www.gendorf.de). The amount of water for cooling extracted per kg of chemical substance produced is calculated using literature data published by the Gendorf factory based in Germany, which produces a wide range of chemical substances. The factory produced 1634200 tonnes of chemical substances in the year 2019 (Gendorf, 2020, Umwelterklärung, www.gendorf.de) and 870000 tonnes of intermediate products. The reported amounts of water extracted as groundwater and surface water (river) are assumed to be used entirely for cooling purposes.
  Uncertainty: The uncertainty could not be determined, it has then been maximized.
- Water, unspecified natural origin [natural resource, in water]: 0.0010203 m3; name water_UNO_input; lognormal variance with pedigree 0.010025, pedigree (2,3,2,2,3)
  Calculated based on literature data published by the industry. This value is a 5-year average of data (2015 - 2019) published by the Gendorf factory (Gendorf, 2016, Umwelterklärung, www.gendorf.de), (Gendorf, 2017, Umwelterklärung, www.gendorf.de), (Gendorf, 2020, Umwelterklärung, www.gendorf.de). The amount of groundwater and surface water (river) extracted per kg of chemical substance produced is calculated using literature data published by the Gendorf factory based in Germany, which produces a wide range of chemical substances. The factory produced 1634200 tonnes of chemical substances in the year 2019 (Gendorf, 2020, Umwelterklärung, www.gendorf.de) and 870000 tonnes of intermediate products. The amount of groundwater and surface water (river) extracted in the year 2019 was 16145000 tonnes and 22635000 tonnes respectively (Gendorf, 2020, Umwelterklärung, www.gendorf.de).
  Uncertainty: The uncertainty could not be determined, it has then been maximized.

## Emissions to nature
- Acetylene [air, urban air close to ground]: 2.02763e-6 kg; source Röder, A. 2004; lognormal variance with pedigree 0.2206, pedigree (2,5,5,5,5)
  Emission from dataset 'coal coke industrial furnace 1-10MW, GLO, version 3.7.1' to represent coke use.Total NMVOC and profile estimate
  Uncertainty: Completeness, temporal, geographical and technological indicators adapted considering differences with original dataset.
- Aluminium III [air, urban air close to ground]: 4.33913e-5 kg; source Röder, A. 2004; lognormal variance with pedigree 0.848, pedigree (4,5,5,5,5)
  Emission from dataset 'coal coke industrial furnace 1-10MW, GLO, version 3.7.1' to represent coke use.From trace element balance; see report for details
  Uncertainty: Completeness, temporal, geographical and technological indicators adapted considering differences with original dataset.
- Antimony ion [air, urban air close to ground]: 6.40729e-9 kg; source Röder, A. 2004; lognormal variance with pedigree 0.848, pedigree (4,5,5,5,5)
  (same comment as for Aluminium III)
- Arsenic ion [air, urban air close to ground]: 1.02598e-7 kg; source Röder, A. 2004; lognormal variance with pedigree 0.848, pedigree (4,5,5,5,5)
  Emission from dataset 'coal coke industrial furnace 1-10MW, GLO, version 3.7.1' to represent coke use.From trace element balance; see report for details
  Uncertainty: from trace element balance; see report for details
- Barium II [air, urban air close to ground]: 5.10963e-7 kg; source Röder, A. 2004; lognormal variance with pedigree 0.848, pedigree (4,5,5,5,5)
  (same comment as for Aluminium III)
- Benzene [air, urban air close to ground]: 2.02763e-6 kg; source Röder, A. 2004; lognormal variance with pedigree 0.2206, pedigree (2,5,5,5,5)
  (same comment as for Acetylene)
- Benzo(a)pyrene [air, urban air close to ground]: 4.05526e-11 kg; source Röder, A. 2004; lognormal variance with pedigree 0.2206, pedigree (2,5,5,5,5)
  (same comment as for Acetylene)
- Beryllium II [air, urban air close to ground]: 5.10963e-9 kg; source Röder, A. 2004; lognormal variance with pedigree 0.2206, pedigree (2,5,5,5,5)
  (same comment as for Acetylene)
- Boron [air, urban air close to ground]: 1.92219e-6 kg; source Röder, A. 2004; lognormal variance with pedigree 0.848, pedigree (4,5,5,5,5)
  (same comment as for Aluminium III)
- Bromine [air, urban air close to ground]: 3.84439e-8 kg; source Röder, A. 2004; lognormal variance with pedigree 0.848, pedigree (4,5,5,5,5)
  (same comment as for Aluminium III)
- Cadmium II [air, urban air close to ground]: 6.40729e-9 kg; source Röder, A. 2004; lognormal variance with pedigree 0.848, pedigree (4,5,5,5,5)
  (same comment as for Aluminium III)
- Calcium II [air, urban air close to ground]: 5.10963e-6 kg; source Röder, A. 2004; lognormal variance with pedigree 0.848, pedigree (4,5,5,5,5)
  (same comment as for Aluminium III)
- Carbon dioxide, fossil [air, urban air close to ground]: 0.371056 kg; source Röder, A. 2004; lognormal variance with pedigree 0.1706, pedigree (2,5,5,5,5)
  Emission from dataset 'coal coke industrial furnace 1-10MW, GLO, version 3.7.1' to represent coke use.From carbon balance
  Uncertainty: Completeness, temporal, geographical and technological indicators adapted considering differences with original dataset.
- Carbon monoxide, fossil [air, urban air close to ground]: 0.000405526 kg; source Röder, A. 2004; lognormal variance with pedigree 0.8206, pedigree (2,5,5,5,5)
  Emission from dataset 'coal coke industrial furnace 1-10MW, GLO, version 3.7.1' to represent coke use.Typical value
  Uncertainty: Completeness, temporal, geographical and technological indicators adapted considering differences with original dataset.
- Chromium III [air, urban air close to ground]: 9.12436e-8 kg; source Röder, A. 2004; lognormal variance with pedigree 0.848, pedigree (4,5,5,5,5)
  (same comment as for Aluminium III)
- Chromium VI [air, urban air close to ground]: 1.12736e-8 kg; source Röder, A. 2004; lognormal variance with pedigree 0.65, pedigree (1,5,5,5,5)
  Emission from dataset 'coal coke industrial furnace 1-10MW, GLO, version 3.7.1' to represent coke use.based on range of data
  Uncertainty: Completeness, temporal, geographical and technological indicators adapted considering differences with original dataset.
- Cobalt II [air, urban air close to ground]: 1.28146e-8 kg; source Röder, A. 2004; lognormal variance with pedigree 0.848, pedigree (4,5,5,5,5)
  (same comment as for Aluminium III)
- Copper ion [air, urban air close to ground]: 6.73173e-8 kg; source Röder, A. 2004; lognormal variance with pedigree 0.848, pedigree (4,5,5,5,5)
  (same comment as for Aluminium III)
- Dinitrogen monoxide [air, urban air close to ground]: 4.05526e-6 kg; source Röder, A. 2004; lognormal variance with pedigree 0.2206, pedigree (2,5,5,5,5)
  (same comment as for Carbon monoxide, fossil)
- Dioxins, measured as 2,3,7,8-tetrachlorodibenzo-p-dioxin [air, urban air close to ground]: 8.1105e-14 kg; source Röder, A. 2004; lognormal variance with pedigree 0.4806, pedigree (2,5,5,5,5)
  Emission from dataset 'coal coke industrial furnace 1-10MW, GLO, version 3.7.1' to represent coke use.
  Uncertainty: Completeness, temporal, geographical and technological indicators adapted considering differences with original dataset.
- Ethane [air, urban air close to ground]: 6.0829e-6 kg; source Röder, A. 2004; lognormal variance with pedigree 0.2206, pedigree (2,5,5,5,5)
  (same comment as for Acetylene)
- Ethylene [air, urban air close to ground]: 1.21658e-5 kg; source Röder, A. 2004; lognormal variance with pedigree 0.2206, pedigree (2,5,5,5,5)
  (same comment as for Acetylene)
- Formaldehyde [air, urban air close to ground]: 3.24421e-7 kg; source Röder, A. 2004; lognormal variance with pedigree 0.2206, pedigree (2,5,5,5,5)
  (same comment as for Acetylene)
- Hydrocarbons, aliphatic, alkanes, unspecified [air, urban air close to ground]: 2.02763e-6 kg; source Röder, A. 2004; lognormal variance with pedigree 0.2206, pedigree (2,5,5,5,5)
  (same comment as for Acetylene)
- Hydrocarbons, aliphatic, unsaturated [air, urban air close to ground]: 2.02763e-6 kg; source Röder, A. 2004; lognormal variance with pedigree 0.2206, pedigree (2,5,5,5,5)
  (same comment as for Acetylene)
- Hydrochloric acid [air, urban air close to ground]: 0.000164238 kg; source Röder, A. 2004; lognormal variance with pedigree 0.238, pedigree (4,5,5,5,5)
  (same comment as for Aluminium III)
- Hydrogen fluoride [air, urban air close to ground]: 5.10963e-6 kg; source Röder, A. 2004; lognormal variance with pedigree 0.238, pedigree (4,5,5,5,5)
  (same comment as for Aluminium III)
- Iodine [air, urban air close to ground]: 4.623e-8 kg; source Röder, A. 2004; lognormal variance with pedigree 0.848, pedigree (4,5,5,5,5)
  (same comment as for Aluminium III)
- Iron ion [air, urban air close to ground]: 1.79243e-5 kg; source Röder, A. 2004; lognormal variance with pedigree 0.848, pedigree (4,5,5,5,5)
  (same comment as for Aluminium III)
- Lead II [air, urban air close to ground]: 3.07389e-7 kg; source Röder, A. 2004; lognormal variance with pedigree 0.848, pedigree (4,5,5,5,5)
  (same comment as for Aluminium III)
- Lead-210 [air, urban air close to ground]: 0.00018857 kBq; source Röder, A. 2004; lognormal variance with pedigree 0.848, pedigree (4,5,5,5,5)
  Emission from dataset 'coal coke industrial furnace 1-10MW, GLO, version 3.7.1' to represent coke use.From radioactivity of the elements; see report for details
  Uncertainty: Completeness, temporal, geographical and technological indicators adapted considering differences with original dataset.
- Magnesium [air, urban air close to ground]: 1.53694e-5 kg; source Röder, A. 2004; lognormal variance with pedigree 0.848, pedigree (4,5,5,5,5)
  (same comment as for Aluminium III)
- Manganese II [air, urban air close to ground]: 8.96214e-8 kg; source Röder, A. 2004; lognormal variance with pedigree 0.848, pedigree (4,5,5,5,5)
  (same comment as for Aluminium III)
- Mercury II [air, urban air close to ground]: 1.15169e-8 kg; source Röder, A. 2004; lognormal variance with pedigree 0.848, pedigree (4,5,5,5,5)
  (same comment as for Aluminium III)
- Methane, fossil [air, urban air close to ground]: 4.05526e-5 kg; source Röder, A. 2004; lognormal variance with pedigree 0.2206, pedigree (2,5,5,5,5)
  (same comment as for Carbon monoxide, fossil)
- Molybdenum VI [air, urban air close to ground]: 1.92219e-8 kg; source Röder, A. 2004; lognormal variance with pedigree 0.848, pedigree (4,5,5,5,5)
  (same comment as for Arsenic ion)
- NMVOC, non-methane volatile organic compounds [air, urban air close to ground]: 6.97507e-6 kg; source Röder, A. 2004; lognormal variance with pedigree 0.2206, pedigree (2,5,5,5,5)
  Emission from dataset 'coal coke industrial furnace 1-10MW, GLO, version 3.7.1' to represent coke use.Total NMVOC and profile estimate
  Uncertainty: total NMVOC and profile estimate
- Nickel II [air, urban air close to ground]: 7.705e-8 kg; source Röder, A. 2004; lognormal variance with pedigree 0.848, pedigree (4,5,5,5,5)
  (same comment as for Aluminium III)
- Nitrogen oxides [air, urban air close to ground]: 0.000811052 kg; source Röder, A. 2004; lognormal variance with pedigree 0.2206, pedigree (2,5,5,5,5)
  (same comment as for Carbon monoxide, fossil)
- Particulate Matter, < 2.5 um [air, urban air close to ground]: 8.1105e-5 kg; source Röder, A. 2004; lognormal variance with pedigree 0.498, pedigree (4,5,5,5,5)
  Emission from dataset 'coal coke industrial furnace 1-10MW, GLO, version 3.7.1' to represent coke use.Total PM and profile estimates
  Uncertainty: Completeness, temporal, geographical and technological indicators adapted considering differences with original dataset.
- Particulate Matter, > 10 um [air, urban air close to ground]: 4.05526e-5 kg; source Röder, A. 2004; lognormal variance with pedigree 0.238, pedigree (4,5,5,5,5)
  (same comment as for Particulate Matter, < 2.5 um)
- Particulate Matter, > 2.5 um and < 10um [air, urban air close to ground]: 8.1105e-5 kg; source Röder, A. 2004; lognormal variance with pedigree 0.318, pedigree (4,5,5,5,5)
  (same comment as for Particulate Matter, < 2.5 um)
- Phosphorus [air, urban air close to ground]: 2.56293e-7 kg; source Röder, A. 2004; lognormal variance with pedigree 0.848, pedigree (4,5,5,5,5)
  (same comment as for Aluminium III)
- Polonium-210 [air, urban air close to ground]: 0.000344697 kBq; source Röder, A. 2004; lognormal variance with pedigree 0.848, pedigree (4,5,5,5,5)
  (same comment as for Lead-210)
- Potassium I [air, urban air close to ground]: 5.10963e-6 kg; source Röder, A. 2004; lognormal variance with pedigree 0.848, pedigree (4,5,5,5,5)
  (same comment as for Aluminium III)
- Potassium-40 [air, urban air close to ground]: 5.4746e-5 kBq; source Röder, A. 2004; lognormal variance with pedigree 0.848, pedigree (4,5,5,5,5)
  (same comment as for Lead-210)
- Propane [air, urban air close to ground]: 4.05526e-6 kg; source Röder, A. 2004; lognormal variance with pedigree 0.2206, pedigree (2,5,5,5,5)
  (same comment as for Acetylene)
- Propylene [air, urban air close to ground]: 2.02763e-6 kg; source Röder, A. 2004; lognormal variance with pedigree 0.2206, pedigree (2,5,5,5,5)
  (same comment as for Acetylene)
- Radium-226 [air, urban air close to ground]: 4.86631e-5 kBq; source Röder, A. 2004; lognormal variance with pedigree 0.848, pedigree (4,5,5,5,5)
  (same comment as for Lead-210)
- Radium-228 [air, urban air close to ground]: 0.000263592 kBq; source Röder, A. 2004; lognormal variance with pedigree 0.848, pedigree (4,5,5,5,5)
  (same comment as for Lead-210)
- Radon-220 [air, urban air close to ground]: 4.05526e-6 kBq; source Röder, A. 2004; lognormal variance with pedigree 0.848, pedigree (4,5,5,5,5)
  (same comment as for Lead-210)
- Radon-222 [air, urban air close to ground]: 4.05526e-6 kBq; source Röder, A. 2004; lognormal variance with pedigree 0.848, pedigree (4,5,5,5,5)
  (same comment as for Lead-210)
- Scandium [air, urban air close to ground]: 5.10963e-9 kg; source Röder, A. 2004; lognormal variance with pedigree 0.848, pedigree (4,5,5,5,5)
  (same comment as for Aluminium III)
- Selenium IV [air, urban air close to ground]: 3.84439e-8 kg; source Röder, A. 2004; lognormal variance with pedigree 0.848, pedigree (4,5,5,5,5)
  (same comment as for Aluminium III)
- Silicon [air, urban air close to ground]: 6.40729e-5 kg; source Röder, A. 2004; lognormal variance with pedigree 0.848, pedigree (4,5,5,5,5)
  (same comment as for Aluminium III)
- Sodium I [air, urban air close to ground]: 2.56293e-6 kg; source Röder, A. 2004; lognormal variance with pedigree 0.848, pedigree (4,5,5,5,5)
  (same comment as for Aluminium III)
- Strontium II [air, urban air close to ground]: 7.705e-7 kg; source Röder, A. 2004; lognormal variance with pedigree 0.848, pedigree (4,5,5,5,5)
  (same comment as for Aluminium III)
- Sulfur dioxide [air, urban air close to ground]: 0.00202763 kg; source Röder, A. 2004; lognormal variance with pedigree 0.198, pedigree (4,5,5,5,5)
  Emission from dataset 'coal coke industrial furnace 1-10MW, GLO, version 3.7.1' to represent coke use.From S-balance
  Uncertainty: Completeness, temporal, geographical and technological indicators adapted considering differences with original dataset.
- Thallium I [air, urban air close to ground]: 6.40729e-9 kg; source Röder, A. 2004; lognormal variance with pedigree 0.848, pedigree (4,5,5,5,5)
  (same comment as for Aluminium III)
- Thorium [air, urban air close to ground]: 7.705e-9 kg; source Röder, A. 2004; lognormal variance with pedigree 0.848, pedigree (4,5,5,5,5)
  (same comment as for Aluminium III)
- Thorium-228 [air, urban air close to ground]: 2.2304e-5 kBq; source Röder, A. 2004; lognormal variance with pedigree 0.848, pedigree (4,5,5,5,5)
  (same comment as for Lead-210)
- Thorium-232 [air, urban air close to ground]: 1.41934e-5 kBq; source Röder, A. 2004; lognormal variance with pedigree 0.848, pedigree (4,5,5,5,5)
  (same comment as for Lead-210)
- Tin ion [air, urban air close to ground]: 2.56293e-9 kg; source Röder, A. 2004; lognormal variance with pedigree 0.848, pedigree (4,5,5,5,5)
  (same comment as for Aluminium III)
- Titanium ion [air, urban air close to ground]: 1.53694e-6 kg; source Röder, A. 2004; lognormal variance with pedigree 0.848, pedigree (4,5,5,5,5)
  (same comment as for Aluminium III)
- Toluene [air, urban air close to ground]: 4.05526e-7 kg; source Röder, A. 2004; lognormal variance with pedigree 0.2206, pedigree (2,5,5,5,5)
  (same comment as for Acetylene)
- Uranium [air, urban air close to ground]: 1.02598e-8 kg; source Röder, A. 2004; lognormal variance with pedigree 0.848, pedigree (4,5,5,5,5)
  (same comment as for Aluminium III)
- Uranium-238 [air, urban air close to ground]: 4.05526e-5 kBq; source Röder, A. 2004; lognormal variance with pedigree 0.848, pedigree (4,5,5,5,5)
  (same comment as for Lead-210)
- Vanadium V [air, urban air close to ground]: 1.53694e-7 kg; source Röder, A. 2004; lognormal variance with pedigree 0.848, pedigree (4,5,5,5,5)
  (same comment as for Aluminium III)
- Water [air, unspecified]: 0.000858647 m3; lognormal variance with pedigree 0.049425, pedigree (2,3,2,2,3)
  Emission from dataset 'coal coke industrial furnace 1-10MW, GLO, version 3.7.1' to represent coke use.Represents the amount of process and cooling water that is evaporated in the first reaction step.
  For the second step:
  Calculated to ensure the water balance. In general, in the case of recirculating cooling systems, 77% of the water input evaporates to air. In case of once-through cooling systems, 4% of the water input evaporates to air. The process water has in the chemical industry an average evaporation rate of 20.5%. In the specific case of the Gendorf factory, the calculated evaporation rate based on the data published is 6.3%. This matches the qualitative information, that the majority of the cooling systems in Gendorf are once-through and that the amount of cooling water used is significantly higher than the amount of process water used (Gendorf, 2020, Umwelterklärung, www.gendorf.de).
  Uncertainty: Calculated variable. Uncertainty will be determined from propagation of uncertainty factors of underlying variables. Uncertainty of actual relation between variables not accounted for at this time, although this could be included in a future update.
- Xylenes, unspecified [air, urban air close to ground]: 4.05526e-7 kg; source Röder, A. 2004; lognormal variance with pedigree 0.2206, pedigree (2,5,5,5,5)
  (same comment as for NMVOC, non-methane volatile organic compounds)
- Zinc II [air, urban air close to ground]: 1.28146e-8 kg; source Röder, A. 2004; lognormal variance with pedigree 0.848, pedigree (4,5,5,5,5)
  (same comment as for Aluminium III)
- BOD5, Biological Oxygen Demand [water, unspecified]: 0.00298261 kg; lognormal variance with pedigree 0.218, pedigree (4,5,5,5,5)
  Emission from dataset 'coal coke industrial furnace 1-10MW, GLO, version 3.7.1' to represent coke use.The values for COD, BOD, TOC, and DOC used in this inventory are calculated from the amount of toluene in the treated waste water assuming a carbon conversion of 96% for COD. For the calculation of the values for BOD and DOC the worst case scenario BOD = COD and TOC = DOC is used.
- COD, Chemical Oxygen Demand [water, unspecified]: 0.00298261 kg; lognormal variance with pedigree 0.218, pedigree (4,5,5,5,5)
  (same comment as for BOD5, Biological Oxygen Demand)
- Carbonate [water, unspecified]: 0.0273408 kg; lognormal variance with pedigree 0.218, pedigree (4,5,5,5,5)
  Based on stoichiometry. Unreacted sodium carbonate hydrolyzed into sodium and carbonate.
- DOC, Dissolved Organic Carbon [water, unspecified]: 0.000942792 kg; lognormal variance with pedigree 0.218, pedigree (4,5,5,5,5)
  (same comment as for BOD5, Biological Oxygen Demand)
- Sodium I [water, surface water]: 0.0213725 kg; lognormal variance with pedigree 0.218, pedigree (4,5,5,5,5)
  Based on stoichiometry. Unreacted sodium carbonate hydrolyzed into sodium and carbonate.
  Uncertainty: Calculated variable. Uncertainty will be determined from propagation of uncertainty factors of underlying variables. Uncertainty of actual relation between variables not accounted for at this time, although this could be included in a future update.
  property molecular weight 22.99 g/mol; name Na_mol_weight
- Strontium II [water, surface water]: 0.086351 kg; lognormal variance with pedigree 0.218, pedigree (4,5,5,5,5)
  Based on stoichiometry and assumed chemical reaction yield. Unreacted strontium sulfate hydrolyzed into strontium and sulfate.
  Uncertainty: Calculated variable. Uncertainty will be determined from propagation of uncertainty factors of underlying variables. Uncertainty of actual relation between variables not accounted for at this time, although this could be included in a future update.
  property molecular weight 87.62 g/mol; name Sr_mol_weight
- Sulfate [water, surface water]: 0.048935 kg; lognormal variance with pedigree 0.218, pedigree (4,5,5,5,5)
  Emission from dataset 'coal coke industrial furnace 1-10MW, GLO, version 3.7.1' to represent coke use.Based on stoichiometry. Unreacted strontium sulfate hydrolyzed into strontium and sulfate.
  Uncertainty: Calculated variable. Uncertainty will be determined from propagation of uncertainty factors of underlying variables. Uncertainty of actual relation between variables not accounted for at this time, although this could be included in a future update.
  property molecular weight 96.062 g/mol; name SO4_mol_weight
- Sulfide [water, unspecified]: 0.0158581 kg; lognormal variance with pedigree 0.218, pedigree (4,5,5,5,5)
  Based on stoichiometry. Unreacted strontium sulfide hydrolyzed into strontium and sulfide.
- TOC, Total Organic Carbon [water, unspecified]: 0.000942792 kg; lognormal variance with pedigree 0.218, pedigree (4,5,5,5,5)
  (same comment as for BOD5, Biological Oxygen Demand)
- Water [water, unspecified]: 0.00817165 m3; lognormal variance with pedigree 0.049425, pedigree (2,3,2,2,3)
  Emission from dataset 'coal coke industrial furnace 1-10MW, GLO, version 3.7.1' to represent coke use.Mass balance. Represents the amount of process and cooling water that is emitted back to watershed in the first reaction step.
  In the second step:
  Calculated based on literature data published by the industry (Gendorf, 2020, Umwelterklärung, www.gendorf.de). The amount of water released back to the environment consists of the amount of process water treated in the internal WWTP and then released back to the environment and the amount of cooling water released back to the environment.
  Uncertainty: Calculated variable. Uncertainty will be determined from propagation of uncertainty factors of underlying variables. Uncertainty of actual relation between variables not accounted for at this time, although this could be included in a future update.

## Sampling procedure
Raw materials are modelled with a stoichiometric calculation and 80% yield assumption. Energy consumptions are modelled with data from literature. The emissions are estimated. Infrastructures are calculated with standard values.
To represent the coke use, the dataset: heat production, at coal coke industrial furnace 1-10MW, GLO, version 3.7.1., with all emissions was included.
References:
Nuss P., Eckelmann M. J. (2014): Life Cycle Assessment of Metals: A Scientific Synthesis, PLoS ONE 9 (7)
Gendorf (2020). Umwelterklärung 2019, Umwelterklärung 2017, Werk Gendorf Industriepark, www.gendorf.de.

## Review by Carl Vadenbo 2021-06-07
Input and emissions from coke included and documented satisfactorily.

## Review by Tom Etheridge 2021-06-07
This looks good to me. Thank you for clarifying the inclusion of an organic factory and for explicity including coke.
