# tap water production, conventional treatment

Dataset: EcoSpold 2, unit process
Geography: PE
Time period: 2012-01-01 to 2023-12-31
Technology level: current
Classification: EcoSpold01Categories: water supply/production
Classification: ISIC rev.4 ecoinvent: 3600:Water collection, treatment and supply
Synonyms: potable water
Scenario: Business-as-Usual
System model: Allocation, cut-off by classification
Share of production covered: 50 %
Generated by: Laura Rubio
Published in: Gmünder S. 2017
Database: ecoinvent
isCopyrightProtected: true
accessRestrictedTo: 1

## General comment
This dataset represents production of 1 kg of tap water under pressure at facility gate, ready for distribution in network. It represents average operation of conventional treatment for production tap water. Conventional treatment includes coagulation, flocculation and decantation. In some occasions the treatment also includes, chemical application, filtration, pH stabilization and/or softening, which can be present in some plants. Inventory was constructed from reported chemicals, energy inputs and wastes from the most representative conventional treatment plant in Peru located in Lima.

## Included activities start
This activity starts from tap water, under pressure, at tap water treatment plant and fed into tap water distribution network.

## Included activities end
This dataset ends with the production of tap water, at facility gate, under pressure. It includes energy for intake pumping and treatment system, as well as the energy of the pump pressurizing water to the beginning of the network. It includes all chemicals and material added to the water during treatment. It excludes energy for pumping stations and water losses within the network as they are included in the tap water market. Emissions to the environment occurring during the treatment and during the distribution were not considered as they are assumed negligible. Main substance in water that would be released in the environment are assumed to be considered in wastewater processes.

## Geography
Extrapolated from data from one conventional treatment plant in Peru. The uncertainty was adjusted accordingly.

## Technology
Most Frequent technology in tap water production facility in Peru

## Time period
The time period is set from 2012 to the year 2017 as it is a considering period in which conventional treatment plants have not passed through drastic technological changes.

## Parameters
- unit conversion, days in a year: 365.25 d/year; name days_per_year; lognormal variance with pedigree 0.0006, pedigree (1,1,1,1,1)
  Conversion factor.

## Reference product
- tap water: 1 kg; name tapwater; By-product classification allocatable product; CPC 18000: Natural water; CAS 7732-18-5
  production volume 1.34203e12 kg; name PV_tapwater; = 1458724996000*0.92
    Calculated value based on specific available reports at Superintendecia de Servicios de Saneamiento (SUNASS,2015) - <http://www.sunass.gob.pe/websunass/index.php/component/content/article?layout=edit&id=1010 >. Further, a non-public and preliminary national study of drinking water treatment carried out by SUNASS, reflects similar results. Out of 99 assessed treatment plants (total number of official registered treatment plants in Peru), 13 incorporated patented technologies (6%) which were excluded from the assessment due to the lack of information about the specifications. Overall,The production technology shares, present in the ecoinvent database, are calculated to be as follows; tap water production, conventional treatment (92%) followed by tap water production, direct filtration treatment (8%).
  property price 0.000397 EUR2005
    Converted from EU price by using Purchasing Power Parities (0.8458 in 2003 and 0.8426 in 2004)
  properties: carbon allocation 6.08566e-7 kg, carbon content 0.0017899, carbon content, fossil 0.0017899, carbon content, non-fossil 0, dry mass 0.00034 kg, water content 2940.18, water in wet mass 0.99966 kg, wet mass 1 kg

## Inputs from technosphere
- activated carbon, granular: 1.19e-7 kg; name GAC; lognormal variance with pedigree 0.0027, pedigree (1,2,3,1,1)
  Measured value. Value reprensents average for use of organic chemical in Lima - Peru treatment plant according to SUNASS data: [ retrieved from ; http://www.sunass.gob.pe/websunass/index.php/component/content/article?layout=edit&id=1010 ]
  property carbon content, fossil 0.81; name GAC_C_content_fossil
  property carbon content, non-fossil 0; name GAC_C_content_non_fossil
  property dry mass 0.97 kg; name GAC_DM
  property water content 0.030928; name GAC_water_content
  property water in wet mass 0.03 kg; name GAC_WWM
  property wet mass 1 kg; name GAC_WM
  properties: heating value, net 30.23 MJ
  note on carbon content, fossil: Literature value. From Biomass and Bioenergy: Processing and Properties (2014) edited by Khalid Rehman Hakeem, Mohammad Jawaid, Umer Rashid (p. 252). Carbon content is in the range of 72-90%, an average value of 81% is taken.
- aluminium sulfate, powder: 1.98e-7 kg; source SUNASS 2015; lognormal variance with pedigree 0.0027, pedigree (1,2,3,1,1)
  Measured value. Value reprensents average for use of aluminium sulphate powder in Lima - Peru treatment plant according to SUNASS data: [ retrieved from ; http://www.sunass.gob.pe/websunass/index.php/component/content/article?layout=edit&id=1010 ]
  properties: dry mass 1 kg, wet mass 1 kg
- aluminium sulfate, without water, in 4.33% aluminium solution state: 1.03e-5 kg; source SUNASS 2015; lognormal variance with pedigree 0.0027, pedigree (1,2,3,1,1)
  Measured value. Value reprensents average for use of aluminium sulphate solution in Lima - Peru treatment plant according to SUNASS data: [ retrieved from ; http://www.sunass.gob.pe/websunass/index.php/component/content/article?layout=edit&id=1010 ]
  properties: dry mass 1 kg, wet mass 1 kg
- chlorine, liquid: 4.57e-6 kg; source SUNASS 2015; lognormal variance with pedigree 0.0027, pedigree (1,2,3,1,1)
  Measured value. Average use of chlorine liquid in Lima- Peru treatment plant according to SUNASS data: [ retrieved from ; http://www.sunass.gob.pe/websunass/index.php/component/content/article?layout=edit&id=1010 ]
  properties: dry mass 1 kg, wet mass 1 kg
- copper sulfate: 1.64e-7 kg; source SUNASS 2015; lognormal variance with pedigree 0.0027, pedigree (1,2,3,1,1)
  Measured value. Value reprensents average for use of Copper sulfate solution in Lima - Peru treatment plant according to SUNASS data: [ retrieved from ; http://www.sunass.gob.pe/websunass/index.php/component/content/article?layout=edit&id=1010 ]
  properties: dry mass 1 kg, wet mass 1 kg
- electricity, medium voltage: 0.000427 kWh; source SUNASS 2015; lognormal variance with pedigree 0.0058, pedigree (2,3,3,5,1)
  Measured value copied from "tap water production, conventional treatment, GLO" dataset (accessed 20170920) as it was considered adequate also for this dataset. Average electricity consumption for entire process including pumping for water intake and pumping for distribution at the plant gate. All 9 plant reported electricity use. Values reported varied from 7.32e-4 to 2.74e-4 kWh/kg.
- heat, district or industrial, natural gas: 0.000178498 MJ; source SUNASS 2015; lognormal variance with pedigree 0.004, pedigree (1,1,3,5,1)
  Calculated value.This mathematical function was taken from the "tap water production, conventional treatment, GLO" dataset (accessed 20170920) as it was considered adequate also for this dataset.
  Uncertainty: C
  property Corresponding fuel use 1.11 MJ; name fuel_use
  property fuel input in physical units, m3 4.43e-6 m3; name fuel_input
  property heating value, net 1 MJ; name heating_value
  note on Corresponding fuel use: Lower heating value of the fuel input related to the heat/electricity output
  note on fuel input in physical units, m3: Measured value. Average natural gas consumption in surveyed conventional treatment plants. Note than only 4 of the 9 conventional plants reported using natural gas. Plants not reporting natural gas were attributed an input value of 0 during the calculation of the weighted average.
- iron(III) chloride, without water, in 14% iron solution state: 6.76e-6 kg; lognormal variance with pedigree 0.0027, pedigree (1,2,3,1,1)
  (same comment as for activated carbon, granular)
  properties: dry mass 1 kg, wet mass 1 kg
- lime, hydrated, loose weight: 6.20422e-6 kg; lognormal variance with pedigree 0.0072, pedigree (2,4,3,5,1)
  Measured value taken from the "tap water production, conventional treatment, GLO" dataset (accessed 20170920) as it was considered adequate also for this dataset. Average use of lime for pH adjustment in surveyed conventional treatment plants. Note than 5 of the 9 conventional plants reported using this substance. Plants not reporting this consumable were attributed an input value of 0 during the calculation of the weighted average.
  properties: dry mass 0.997 kg, water content 0.00300903, wet mass 1 kg
- polyacrylamide: 7.26e-8 kg; source SUNASS 2015; lognormal variance with pedigree 0.0027, pedigree (1,2,3,1,1)
  Measured value. Value represents average for use of polyacrylamide in the production of flocculants for the clarification of water according to SUNASS data for Lima- Peru treatment plant: [ retrieved from ; http://www.sunass.gob.pe/websunass/index.php/component/content/article?layout=edit&id=1010 ]
  properties: carbon content, fossil 0.51, dry mass 1 kg, heating value, net 23.88 MJ, wet mass 1 kg
- silica sand: 1.49834e-6 kg; lognormal variance with pedigree 0.0072, pedigree (3,3,3,5,1)
  Calculated value taken from the existind dataset. " Tap water production, conventional treatment, GLO", as it was also considered adequate. Amount of sand to compensate losses through sand filter washing. Extrapolated to all plant from one reported value. Also includes average use of micro-sand for adjustment for this technology. Note that only 1 of the 9 conventional plants reported using micro-sand. Plants not reporting this consumable were attributed an input value of 0 during the calculation of the weighted average.
  properties: dry mass 0.99 kg, water content 0.010101, wet mass 1 kg
- tap water: 2.1e-5 kg; lognormal variance with pedigree 0.0072, pedigree (3,3,3,5,1)
  Calculated value. This value was taken from the "tap water production, conventional treatment, GLO" dataset (accessed 20170920) as it was considered adequate also for this dataset. Water content of hypochlorite solution, prehydrolysed coagulant and aluminium sulfate.
  properties: carbon content, fossil 0.00178991, dry mass 0.000337476 kg, water content 2962.17, wet mass 1 kg
  note on carbon content, fossil: Bicarbonate content is 2.93 mol/m3. CO2 content is 0.1 mol/m3 (ecoinvent v2.2 report 8, Tab 93.1).
- wastewater, unpolluted: -3.2626e-5 m3; name ww; = waterIn_R-tapwater/1000; lognormal variance with pedigree 0.0038, pedigree (2,3,1,5,1)
  Measured value. This value was taken from the "tap water production, conventional treatment, GLO" dataset (accessed 20170920) as it was considered adequate also for this dataset. It represents the average amount of wastewater produced during treatment.
  production volume; = PV_tapwater*(ww/tapwater)
    Calculated from the production volume of tap water, at user in proportion to the respective output amounts.
  properties: carbon content, fossil 0.00178991, carbon content, non-fossil 0.00178991, dry mass 0.337476 kg, water content 2962.17, wet mass 1000 kg
  note on carbon content, fossil: Assumed to be like in tap water. Bicarbonate content is 2.93 mol/m3. CO2 content is 0.1 mol/m3 (ecoinvent v2.2 report 8, Tab 93.1).
- water pump operation, diesel: 1.5967e-5 MJ; = diesel_use*density_diesel*NHV; lognormal variance with pedigree 0.004, pedigree (1,1,3,5,1)
  (same comment as for heat, district or industrial, natural gas)
  property density 0.84 kg/l; name density_diesel
  property fuel input in physical units, L 4.40008e-7 l; name diesel_use
  property heating value, net 43.2 MJ; name NHV
  properties: price 0.07 EUR2005
  note on heating value, net: Literature. net (lower) heating (calorific) value for diesel in MJ/kg
- water works, capacity 1.1E10l/year: 1.52103e-12 unit; = 1/(Q_av* days_per_year*lifetime*UnitConversion(1, 'm3', 'l')); source SUNASS 2015; lognormal variance with pedigree 0.004, pedigree (1,1,3,5,1)
  Calculated value. This mathematical relation was taken from the "tap water production, conventional treatment, GLO" dataset (accessed 20170920) as it was considered adequate also for this dataset. Amount of water works construction attributed to the production of 1kg of tap water. Value is based on assumed lifetime production of water treatment plant and an assumed typical medium-sized plant of 30,000 m3/day.
  Uncertainty: C
  property lifetime 60 year; name lifetime
  property plant average daily flow rate 30000 m3/d; name Q_av
  note on lifetime: Estimated Value. Expected lifetime of water works as defined in the construction process.
  note on plant average daily flow rate: Fixed values, Flow rate of a conventional water purification plant for a medium-size facility as defined in the water works process.

## Inputs from nature
- Water, river [natural resource, in water]: 0.00103263 m3; name waterIn_R; = tapwater*1.032626 /1000; lognormal variance with pedigree 0.0066, pedigree (3,1,3,5,1)
  Calculated value. It is assumed that the treatment process itselve have 3.3% losses and that 9% of the water is supplied by the lakes and 91% by rivers, similar to the GLO dataset.

## Sampling procedure
Based on data from the conventional treatment plants of SEDPAL representing 50.0% of the total produced tap water in Peru. Conventional tap production facilities were regionalized in accordance to this treatment plant, which is located in Lima Metropolitana (INEI, 2015). Data was taken from a national page: Instituto Nacional de Estadísticas e Informática- INEI ( Retrieved from https://www.inei.gob.pe/media/MenuRecursivo/publicaciones_digitales/Est/Lib1140/cap03.htm)

## Extrapolations
From 1 conventional tap water production facilities to all conventional facility in Peru. Conventional treatment accounts for 92% of the total produced tap water in Peru. Data was used for regionalizing chemicals and energy exchanges, the remianing exchanges were copied from the global dataset,The uncertainty has been changed accordingly.

## Review by Philippe Loubet 2017-11-23
The overall quality of this datasets is good. The dataset is documented from data about a drinking water plant located in Peru.
In the future it would be desirable to increase the representativness of this dataset by including data from other conventional drinking water treatment plants.
