# adobe brick production

Dataset: EcoSpold 2, unit process
Geography: EC
Time period: 2022-01-01 to 2023-12-31
Technology level: current
Classification: ISIC rev.4 ecoinvent: 2392:Manufacture of clay building materials
Synonyms: Lehmziegel; mud-brick; Mudbrick
Scenario: Business-as-Usual
System model: Allocation, cut-off by classification
Share of production covered: 90 %
Generated by: K.Flasher;E.Barros;J.Aguirre;S.Martines
Database: ecoinvent
isCopyrightProtected: true
accessRestrictedTo: 1

## General comment
This dataset describes the production of adobe bricks in the area of San José de Balzay in Ecuador. The dataset represents the production of 1 kg of adobe brick. Data was obtained from measurements and information provided in the factory visited. The produced adobe bricks weigh approximately 21.96 kg and have average dimensions of (23 x 48 x 13) cm (width x length x height). No electricity powered machine nor heat are used during the whole process. The dataset doesn’t include the feed and manure for the horse farming, which is used in the trampling process.
The dataset includes the whole manufacturing process of the adobe brick. The wastewater was modelled as the water difference between the amount of rainwater used in the process and the water evaporated to air during the natural drying of the adobe brick. The water is captured in a hole in the ground, where the mixing takes place. Therefore, the excess water is infiltrated by the soil and follows a natural process, where it eventually reaches groundwater or a water body. There is no waste due to damaged adobes (freshly moulded) and "casting waste" is reused in the mix.
Data collection was performed by the Inclusive Circular Economy and Sustainable Development Research Group (ECI) of the University of Cuenca (EC). This dataset contains data of 1 factory of adobe bricks located in San José de Balzay, Ecuador. The company visit took place in March and May 2022. This dataset was developed in the frame of the CEELA (Strengthening capacities for energy efficiency in buildings in Latin America) project with the support of the Swiss Agency for Development and Cooperation (SDC).

## Included activities start
This dataset starts with the reception of raw materials at the adobe brick production site.

## Included activities end
This dataset ends with the storage of the produced adobe brick. This dataset includes the whole manufacturing process to produce adobe bricks (reception of raw materials, dosing, mixing, forming, drying, and storage). The dataset does not include the packaging.

## Geography
This dataset represents the production of 1 kg adobe brick in Cuenca, Ecuador, in the area of San José de Balzay. Data come from measurements and the information provided by the owner of the factory during the visits.

## Technology
Current production technology. The manufacturing process includes the reception of raw materials, dosing, mixing, forming, drying, and storage of adobe bricks. The overall process applied in Ecuador implies that a selection of 2 or 3 types of clay is prepared, and mixed with straw and rainwater. The mix is made with the help of the trampling of a horse, then placed in a wooden mold with the shape of a brick (forming process, done by hands). The material in excess on the surface is taken away and reused for the next brick. The mass in the mold is left to dry under the sun. No electricity powered machine nor heat are used during the whole process.

## Time period
The time period is from 2022 (year of data collection) to 2023 (year of dataset compilation).

## Parameters
- adobe_brick_mass: 21.96 kg
  Mass of an adobe brick. Data from field visit, Cuenca, Ecuador.
- clay_mass: 24.2 kg
  This value represents the sum of four types of clay used for the production of 1 kg of adobe brick, according to measurements and the information provided by the owner of the factory. The types of clay used are "fina, cera, cascajo and chagralpa".

## Reference product
- adobe brick: 1 kg; By-product classification allocatable product; CPC 373: Refractory products and structural non-refractory clay products; HS2017 6901: Bricks, blocks, tiles and other ceramic goods of siliceous fossil meals (e.g. kieselguhr, tripolite or diatom[...]
  The dataset represents 1 kg of an adobe brick, with measured dimensions (23 x 48 x 13) cm (width x length x height) and measured mass of 21,96 kg.
  production volume 9.11779e7 kg; = 519000*8*21.96
    Azuay is considered a province where adobe production has a regional production scope. There are five production sectors of this material in Azuay, being the most important Sinincay and Susudel, sectors where we could find information about adobe production. The data used to estimate the production volume of Ecuador was based on the investigation of García Vélez & Amaya (2021) and Orellana (2017). To estimate the production volume, we considered the number of bricks produced annually, taking into account the number of adobe production sectors in Azuay (519'000 bricks/a). Then, this value was multiplied by the number of provinces (8 provinces) that continue producing adobe bricks to obtain a national value and finally relate it with the brick mass (21.96 kg).
    Sources:
    García Vélez, G., & Amaya, J. (2021). De cadena de producción hacia cadena de valor del adobe. Patrimonio como recurso de desarrollo (UCuenca Press, Ed.; Primera, Vol. 1). Ciudad Patrimonio Mundial CPM - Universidad de Cuenca.
    Orellana, C. (2017). Adobe, puesta en valor y estrategia para la conservación de una cultura [Master’s degree thesis on Conservation and management of built cultural heritage, Universidad de Cuenca]. http://dspace.ucuenca.edu.ec/handle/123456789/28182
  property carbon content, fossil 0
    Calculated value. According to the fossil carbon content of the raw material that makes up 1kg of adobe block.
  property carbon content, non-fossil 0.0347604; = DM_straw*straw_input*carbon_straw
    Calculated value. According to the non-fossil carbon content of the raw material that makes up 1kg of adobe block.
  property price 0.0325567 EUR2005
    Data provided by the owner of the factory in Ecuador. Price given as 0.055 USD/kg for 2022. The prices were converted to EUR based on the annual exchange rates published by the European Central Bank (https://sdw.ecb.europa.eu/quickview.do?SERIES_KEY=120.EXR.A.USD.EUR.SP00.A, last accessed on 2023-06-01) and adjusted for inflation relative to 2005 using the producer price index (PPI) of the euro area, published by eurostat (https://ec.europa.eu/eurostat/databrowser/view/STS_INPP_A__custom_6416181/default/table?lang=en, last accessed on 2023-06-01).
  properties: carbon allocation 0.0347604 kg, carbon content 0.0347604, dry mass 1 kg, heating value, net 0 MJ, water content 0, water in wet mass 0 kg, wet mass 1 kg

## Inputs from technosphere
- clay: 0.953918 kg; name clay_input; lognormal variance with pedigree 0.0026, pedigree (1,4,1,1,1)
  Calculated value. The types of clay used are "fina, cera, cascajo and chagralpa". Total amount of clay used in the beginning of the process is 24.2kg per adobe brick. This would yield roughly 1.12kg of clay/kg of adobe brick. Since casting waste is reused in the mix, the value has been recalculated according to initial shares of clay and straw used in the mix.
  property water in wet mass 0.035 kg; name WWM_clay
  properties: dry mass 0.965 kg, water content 0.0362694, wet mass 1 kg
- straw: 0.0934998 kg; name straw_input; lognormal variance with pedigree 0.0026, pedigree (1,4,1,1,1)
  Calculated value. Straw used for the production process based on measurements and the information provided by the owner of the factory. Total amount of straw used in the beginning of the process is 2.372kg per adobe brick. This would yield roughly 0.108kg of straw/kg of adobe brick. Since casting waste is reused in the mix, the value has been recalculated according to initial shares of clay and straw used in the mix.
  property carbon content, non-fossil 0.437377; name carbon_straw
  property dry mass 0.85 kg; name DM_straw
  property water in wet mass 0.15 kg; name WWM_straw
  properties: heating value, net 14.25 MJ, water content 0.176471, wet mass 1 kg
  note on heating value, net: Literature value, Source: Phyllis2, database for (treated) biomass, algae, feedstocks for biogas production and biochar, https://phyllis.nl/Biomass/View/1271, ECN.TNO
- water, harvested from rainwater: 0.379 kg; name rainwater; = 0.000379*1000; lognormal variance with pedigree 0.0026, pedigree (1,4,1,1,1)
  Calculated value. Water content used for the production process based on measurements and the information provided by the owner of the factory. Water used for the production of adobe bricks is water obtained from the rain, which is absorbed by the clay.
  properties: carbon content, fossil 0.0017899, dry mass 0.00034 kg, water content 2940.18, wet mass 1 kg

## Inputs from nature
- Occupation, bare area (non-use) [natural resource, land]: 0.000129417 m2*year; = (0.024+0.035)/2*10^4/(519000*21.96/5); lognormal variance with pedigree 0.0406, pedigree (1,3,1,1,1)
  Estimated for infrastructure. Land occupation calculated as the land occupied by the production facility (average 0.024-0.035 ha) divided by the amount of material produced per year at the facility, considering that the adobe brick production in Azuay province is 519000 bricks/year, where there are 5 production areas (see PV comment), and each brick weights on average 21.96 kg.
  The ecoinvent data quality guidelines (Section 6.7 Land occupation and transformation, Table 6.1) defins this exchange as follows: "Bare area (non-use): Areas permanently without vegetation (e.g., deserts, high alpine area...)". Such definition is the best fit to the case described in this dataset. Indeed, the factories visited are lcoated on open land areas, usually away from cities, with bare soil on which the producers use the hand-powered machines. There is no complex infrastructure around, in the best case only a simple structure for coverage is made available. The exchanges "Industrial area" and "Urban/industrial fallow (non-use)" are not used, as they would overestimate the impacts, since in the Ecuadorian workshops there are no actual buildings, no asphalted roads, no houses around.

## Emissions to nature
- Water [air, unspecified]: 0.000324781 m3; name water_to_air; = ((1.481-1)/1.481)/1000; lognormal variance with pedigree 0.042, pedigree (1,4,1,1,1)
  Calculated value. Water evaporates while the adobe bricks are drying. Weight of a just made brick and a dry brick are considered.
- Water [water, unspecified]: 0.000101632 m3; = (rainwater + clay_input*WWM_clay + straw_input*WWM_straw)/1000 - water_to_air; lognormal variance with pedigree 0.044, pedigree (3,4,1,1,1)
  Calculated value. The wastewater was modelled as the water difference between the amount of rainwater used in the process together with the water contained in the clay and straw and the water evaporated to air during the natural drying of the adobe brick. The water is captured in a hole in the ground, where the mixing takes place. Therefore, the excess water is infiltrated by the soil and follows a natural process, where it eventually reaches groundwater or a water body.

## Sampling procedure
Data gathered in adobe brick factories through technical visits and process assessment. The data represents 90% of the adobre brick production in Ecuador. Three adobe brick factories were visited in Ecuador, where the process, which is artisanal, was very similar. Therefore an average has been estimated. The production process of adobe in Ecuador as reported in literature is very similar to the process reported in this dataset. Land occupation exchange is used as an estimate of infrastructure.

## Extrapolations
No extrapolation was applied.

## Review by Bruno Peuportier 2023-08-22
Requested information has been provided by authors
