# uranium conversion facility construction

Dataset: EcoSpold 2, unit process
Geography: RoW
Time period: 1980-01-01 to 2023-12-31
Technology level: current
Classification: EcoSpold01Categories: nuclear power/production
Classification: ISIC rev.4 ecoinvent: 4290:Construction of other civil engineering projects
Tags: ConvertedDataset
Scenario: Business-as-Usual
System model: Allocation, cut-off by classification
Generated by: Roberto Dones
Published in: Dones, R. 2007
Database: ecoinvent
isCopyrightProtected: true
accessRestrictedTo: 1

## General comment
Data for material and energy requirements for construction and decommissioning are from an old study, which does not differenciate between dry and wet process. The material inventory may not correspond to currently operating facilities, which is taken into account in the uncertainties. The land use is based on actual data for the Sequoyah facility. The lifetime is assumed to be 40 years with a throughput of 5000 t/a. Although Sequoyah was operating only for 22 years, 40 years can be assumed as an average for currently operating plants.
[This dataset was already contained in the ecoinvent database version 2. It was not individually updated during the transfer to ecoinvent version 3. Life Cycle Impact Assessment results may still have changed, as they are affected by changes in the supply chain, i.e. in other datasets. This dataset was generated following the ecoinvent quality guidelines for version 2. It may have been subject to central changes described in the ecoinvent version 3 change report (http://www.ecoinvent.org/database/ecoinvent-version-3/reports-of-changes/), and the results of the central updates were reviewed extensively. The changes added e.g. consistent water flows and other information throughout the database. The documentation of this dataset can be found in the ecoinvent reports of version 2, which are still available via the ecoinvent website. The change report linked above covers all central changes that were made during the conversion process.]

## Included activities end
The module includes: land use of the factory; energy (electricity and diesel) and material requirements for the construction of the facility; transport requirements during construction; energy and transport requirements (for non-contaminated inerts concrete with reinforcing bars) during decommissioning; disposal of the non-contaminated inerts. The non contaminated metals are assumed to be recycled

## Geography
US data.

## Technology
Available construction material and energy data refer to conditions in early 1980s.

## Reference product
- uranium conversion facility: 1 unit; By-product classification allocatable product; CPC 53269: Other constructions for manufacturing
  EcoSpold01Location=US
  production volume 0.147837 unit
    1.48 kg UF6 per kg U in global mine production (http://www.world-nuclear.org/info/inf23.html), after an assumed 5% loss in yellowcake production ; Lifetime capacity of conversion facility: 320 million kg.
  property price 5.55598e7 EUR2005
    Calculated based on inputs: The price of the product has been calculated as a sum of the values of the material and energy inputs for this product. This value is therefore a rough estimation. It may underestimate the real price since there are additional expenses when producing any product. These expences can include for example labour costs, treatment of waste materials and profit for the producer. Please consider carefully whether this level of data quality is acceptable for your application.
  properties: carbon allocation 0 kg, carbon content 0

## Inputs from technosphere
- aluminium, cast alloy: 11520 kg; lognormal variance with pedigree 0.162, pedigree (1,1,5,5,1)
  own estimation
  EcoSpold01Location=RER
  properties: dry mass 1 kg, wet mass 1 kg
- aluminium, wrought alloy: 24480 kg; lognormal variance with pedigree 0.162, pedigree (1,1,5,5,1)
  own estimation
  EcoSpold01Location=RER
  properties: dry mass 1 kg, wet mass 1 kg
- concrete, normal strength: 45.7023, 10.036, 15.8628, 6.52786, 8.7168, 81.2485, 96.3161, 3445.59 m3 (8 suppliers, which the file names only by identifier); sum of these 3710 m3; lognormal variance with pedigree 0.162, pedigree (1,1,5,5,1)
  own estimation
  EcoSpold01Location=CH
  properties: dry mass 2190 kg, water content 0.086758, wet mass 2380 kg
- copper, cathode: 110000 kg; lognormal variance with pedigree 0.162, pedigree (1,1,5,5,1)
  EcoSpold01Location=RER
  own estimation
  properties: dry mass 1 kg, wet mass 1 kg
- diesel, burned in diesel-electric generating set, 10MW: 2.8e9 MJ; lognormal variance with pedigree 0.162, pedigree (1,1,5,5,1)
  EcoSpold01Location=GLO
  own estimation
  properties: heating value, net 1 MJ
- electricity, medium voltage: 2219.85, 197.437, 17214.4, 22557.8, 23888.8, 12167.8, 1680.55, 10636.7, 449.001, 71887.2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 kWh (47 suppliers, which the file names only by identifier); sum of these 1.28e6 kWh; lognormal variance with pedigree 0.162, pedigree (1,1,5,5,1)
  EcoSpold01Location=UCTE
  own estimation
- reinforcing steel: 64000 kg; lognormal variance with pedigree 0.162, pedigree (1,1,5,5,1)
  EcoSpold01Location=RER
  own estimation
  properties: carbon content, fossil 0.004, dry mass 1 kg, wet mass 1 kg
- steel, chromium steel 18/8, hot rolled: 1.85e6 kg; lognormal variance with pedigree 0.162, pedigree (1,1,5,5,1)
  EcoSpold01Location=RER
  own estimation
  properties: carbon content, fossil 0.0008, dry mass 1 kg, wet mass 1 kg
  note on carbon content, fossil: Stainless steel model is the grade 304 steel (18/8 stainless, 18% chromium 8% nickel; max. 0.08% C)
- steel, low-alloyed, hot rolled: 1.85e6 kg; lognormal variance with pedigree 0.162, pedigree (1,1,5,5,1)
  EcoSpold01Location=RER
  own estimation
  properties: carbon content, fossil 0.005, dry mass 1 kg, wet mass 1 kg
  note on carbon content, fossil: Low alloyed steel composition given in Tab. 3.2 ecoinvent v2.2 report 10_partII. Steel assumed to have a C content of 0.5%
- waste reinforced concrete: -392610, -4160, -5.60323e6 kg (3 suppliers, which the file names only by identifier); sum of these -6e6 kg; lognormal variance with pedigree 0.042, pedigree (1,1,1,5,1)
  EcoSpold01Location=CH
  own estimation
  production volume
    Calculated from the production volume of uranium conversion facility in proportion to the respective output amounts.
  properties: dry mass 0.99418 kg, water content 0.00585407, wet mass 1 kg

## Inputs from nature
All rows: lognormal variance with pedigree 0.162, pedigree (1,1,5,5,1)
- Occupation, industrial area [natural resource, land]: 1.38e7 m2*year
  own estimation
- Transformation, from industrial area [natural resource, land]: 300000 m2
  own estimation
- Transformation, from unspecified [natural resource, land]: 300000 m2
  own estimation
- Transformation, to industrial area [natural resource, land]: 300000 m2
  own estimation
- Transformation, to unspecified [natural resource, land]: 300000 m2
  own estimation

## Sampling procedure
Literature

## Extrapolations
none This dataset has been copied from an original dataset covering the geography US. The uncertainty has been adjusted accordingly.

## Review by Roberto Dones 2003-08-19
passed
for final calculation August 2003
