# electrode production, negative, LiC6

Dataset: EcoSpold 2, unit process
Geography: GLO
Time period: 2002-01-01 to 2023-12-31
Technology level: current
Classification: ISIC rev.4 ecoinvent: 2720:Manufacture of batteries and accumulators
Classification: EcoSpold01Categories: electronics/module
Tags: ConvertedDataset
Scenario: Business-as-Usual
System model: Allocation, cut-off by classification
Generated by: Wolfram Scharnhorst
Published in: Hischier R. 2007
Database: ecoinvent
isCopyrightProtected: true
accessRestrictedTo: 1

## General comment
The functional unit represents 1 kg of the negative LiC6 electrode material for the production of LiIo rechargable batteries. Process data is taken mainly from an environmental report of a battery producer as well as from literature. In addition own measurements of sizes and weights of batteries were used.
[This dataset was already contained in the ecoinvent database version 2. It was not individually updated during the transfer to ecoinvent version 3. Life Cycle Impact Assessment results may still have changed, as they are affected by changes in the supply chain, i.e. in other datasets. This dataset was generated following the ecoinvent quality guidelines for version 2. It may have been subject to central changes described in the ecoinvent version 3 change report (http://www.ecoinvent.org/database/ecoinvent-version-3/reports-of-changes/), and the results of the central updates were reviewed extensively. The changes added e.g. consistent water flows and other information throughout the database. The documentation of this dataset can be found in the ecoinvent reports of version 2, which are still available via the ecoinvent website. The change report linked above covers all central changes that were made during the conversion process.]

## Included activities end
(Raw) materials, transport and production efforts of the negative electrode of LiIo rechargable batteries. Neither waste nor emissions to air or water are taken into account.

## Geography
This module relates to the global situation.

## Technology
Construction details as described for LiIo rechargable batteries and manufacturing conditions as documented in the environmental report were adopted.

## Reference product
- electrode, negative, LiC6: 1 kg; By-product classification allocatable product; CPC 46430: Parts of primary cells, primary batteries and electric accumulators (including separators); HS2017 850690: Cells and batteries; primary, parts thereof
  EcoSpold01Location=GLO
  production volume 1 kg
    Dummy value to be replaced by measured, estimated or calculated value
  property carbon content, fossil 0.69324
    Calculated as the addition of C contents in the product composition
  property price 3.89332 EUR2005
    Calculated based on inputs: The price of the product has been calculated as a sum of the values of the material and energy inputs for this product. This value is therefore a rough estimation. It may underestimate the real price since there are additional expenses when producing any product. These expences can include for example labour costs, treatment of waste materials and profit for the producer. Please consider carefully whether this level of data quality is acceptable for your application.
  properties: carbon allocation 0.69324 kg, carbon content 0.69324, carbon content, non-fossil 0, dry mass 1 kg, water content 0, water in wet mass 0 kg, wet mass 1 kg

## Inputs from technosphere
All rows: lognormal variance with pedigree 0.094025, pedigree (4,5,5,2,3)
- aluminium, cast alloy: 0.0768 kg
  EcoSpold01Location=RER
  properties: dry mass 1 kg, wet mass 1 kg
- aluminium, wrought alloy: 0.1632 kg
  EcoSpold01Location=RER
  properties: dry mass 1 kg, wet mass 1 kg
- graphite: 0.69324 kg
  EcoSpold01Location=RER
  properties: carbon content, fossil 1, dry mass 1 kg, heating value, net 30.3 MJ, wet mass 1 kg
- lithium: 0.066765 kg
  EcoSpold01Location=GLO
  properties: dry mass 1 kg, wet mass 1 kg
- sheet rolling, aluminium: 0.24 kg
  EcoSpold01Location=RER

## Sampling procedure
Literature, measurements

## Extrapolations
see technology & general comments

## Review by Rolf Frischknecht 2007-11-08
passed.
