# electric connector production, peripheral type buss

Dataset: EcoSpold 2, unit process
Geography: GLO
Time period: 2004-01-01 to 2023-12-31
Technology level: current
Classification: EcoSpold01Categories: electronics/component
Classification: ISIC rev.4 ecoinvent: 2610:Manufacture of electronic components and boards
Scenario: Business-as-Usual
System model: Allocation, cut-off by classification
Generated by: Roland Hischier
Published in: Hischier R. 2007
Database: ecoinvent
isCopyrightProtected: true
accessRestrictedTo: 1

## General comment
This dataset represents the production of 1 kg of connectors used to plug external device onto a computer (e.g. USB port, serial port, parallel port, etc.). It is based on the assumption that a peripheric type connector of a computer has a typical weight of 10.0 g. The data represent a current computer peripherical type connector, used in current information and communication technology (i.e. computers). Material data are taken from datasheets of producers of such capacitors and from the literature. Infrastructure and production efforts are based on own assumptions and taken from the Swedish LCI database and have thus, accordingly higher uncertainty.

## Included activities start
From reception of metals and plastics at the factory gate.

## Included activities end
This dataset includes raw material input and production efforts for the production of computer peripherical type connectors.

## Geography
Data represent a global valuable composition of a serial computer port.

## Technology
average connector production technology, based on literature and assumptions

## Reference product
- electric connector, peripheral type buss: 1 kg; By-product classification allocatable product; CPC 45290: Parts and accessories of computing machines; HS2017 847340: Machinery; parts and accessories (other than covers, carrying cases and the like) of the machines of headin[...]
  EcoSpold01Location=GLO
  peripheric type connectors used to plug external device onto a computer (e.g. USB port, serial port, parallel port, etc.).
  production volume 1 kg
    Dummy value to be replaced by measured, estimated or calculated value
  property carbon content, fossil 0.160512
    Calculated as the addition of C contents in the product composition
  property price 11.5832 EUR2005
    Calculated based on inputs: The price of the product has been calculated as a sum of the values of the material and energy inputs for this product. This value is therefore a rough estimation. It may underestimate the real price since there are additional expenses when producing any product. These expences can include for example labour costs, treatment of waste materials and profit for the producer. Please consider carefully whether this level of data quality is acceptable for your application.
  properties: carbon allocation 0.160512 kg, carbon content 0.160512, carbon content, non-fossil 0, dry mass 1 kg, water content 0, water in wet mass 0 kg, wet mass 1 kg

## Inputs from technosphere
- copper, cathode: 0.087 kg; source ITT 2005; lognormal variance with pedigree 0.0761, pedigree (4,5,5,3,1)
  Estimation. The split to individual materials was estimaded based on literature.
  EcoSpold01Location=RER
  Uncertainty: estimation, calculated weight, based on qualitative information
  properties: dry mass 1 kg, wet mass 1 kg
- electricity, medium voltage: 6.51 kWh; source CPM 2006; lognormal variance with pedigree 0.1341, pedigree (3,4,5,3,4)
  Literature Value.
  EcoSpold01Location=UCTE
  Uncertainty: literature value as first approximation used
- polyethylene, high density, granulate: 0.183 kg; source ITT 2005; lognormal variance with pedigree 0.0761, pedigree (4,5,5,3,1)
  EcoSpold01Location=RER
  Estimation. The split to individual materials was estimaded based on literature.
  Uncertainty: estimation, calculated weight, based on qualitative information
  properties: carbon content, fossil 0.857143, dry mass 1 kg, heating value, net 42.47 MJ, wet mass 1 kg
  note on carbon content, fossil: Polyethylene is formed out of a huge amount of ethylene monomers (C2H4) (ecoinvent v2.2 report 11_II). MW=28 g/mol
- printed wiring board mounting facility: 2.08e-7 unit; lognormal variance with pedigree 0.5761, pedigree (4,5,5,3,5)
  EcoSpold01Location=GLO
  Proxy. Due to a lack of more specific information the dataset of the printed wiring board mounting plant was used.
  Uncertainty: rough estimation of infrastructure
- steel, low-alloyed, hot rolled: 0.731 kg; source ITT 2005; lognormal variance with pedigree 0.0761, pedigree (4,5,5,3,1)
  (same comment as for copper, cathode)
  properties: carbon content, fossil 0.005, dry mass 1 kg, wet mass 1 kg
  note on carbon content, fossil: Low alloyed steel composition given in Tab. 3.2 ecoinvent v2.2 report 10_partII. Steel assumed to have a C content of 0.5%

## Sampling procedure
literature

## Review by Rolf Frischknecht 2007-11-08
passed.

## Review by Roland Hischier 2011-09-21
Transfer of documentation done.
