# heat and power co-generation unit construction, 200kW electrical, diesel SCR, common components for heat+electricity

Dataset: EcoSpold 2, unit process
Geography: RER
Time period: 1987-01-01 to 2023-12-31
Technology level: current
Classification: EcoSpold01Categories: oil/cogeneration
Classification: ISIC rev.4 ecoinvent: 4220:Construction of utility projects
Synonyms: Selective Catalytic Reduction; SCR
Tags: ConvertedDataset
Scenario: Business-as-Usual
System model: Allocation, cut-off by classification
Generated by: Thomas Heck
Published in: Heck, T. 2007
Database: ecoinvent
isCopyrightProtected: true
accessRestrictedTo: 1

## General comment
The module summarises infrastructure components of a cogeneration unit.
[This dataset was already contained in the ecoinvent database version 2. It was not individually updated during the transfer to ecoinvent version 3. Life Cycle Impact Assessment results may still have changed, as they are affected by changes in the supply chain, i.e. in other datasets. This dataset was generated following the ecoinvent quality guidelines for version 2. It may have been subject to central changes described in the ecoinvent version 3 change report (http://www.ecoinvent.org/database/ecoinvent-version-3/reports-of-changes/), and the results of the central updates were reviewed extensively. The changes added e.g. consistent water flows and other information throughout the database. The documentation of this dataset can be found in the ecoinvent reports of version 2, which are still available via the ecoinvent website. The change report linked above covers all central changes that were made during the conversion process.]

## Included activities end
The module includes all shared components for heat and electricity production. Includes also SCR and oxidation catalytic converter.

## Geography
Extrapolated from data of a plant in Switzerland, assumed valid for Europe (RER).

## Technology
Partly extrapolated from data of a 160kWe lambda=1 natural gas plant, adjusted to diesel cogen with SCR and oxidation catalytic converters.

## Parameters
- fraction, process water, to air: 0.15 dimensionless; name fraction_PW_to_air; lognormal variance with pedigree 0.092025, pedigree (4,4,3,2,4)
  Literature value. In case when no industry/process specific data are available, default evaporation fraction value is used. This value is 15% and is based on literature (Statistics Canada, 2007 & Shaffer, K.H., 2008, Consumptive water use in the Great Lakes Basin, USGS & Shiklomanov, 2003, World Water Resources at the Beginning of the 21st Century) and has been approved by an expert.

## Reference product
- heat and power co-generation unit, 200kW electrical, diesel SCR, common components for heat+electricity: 1 unit; By-product classification allocatable product; CPC 53262: Power plants
  EcoSpold01Location=RER
  production volume 1.32237 unit
    This is a placeholder value that does not reflect real-world production volumes. This dataset does not currently require a real-world production volume to work in the database framework, and no actual data were collected yet. This has no negative effect on the results of the ecoinvent database. The placeholder value of this activity was scaled according to the nominal GDP of 2005 (source: United Nations, http://data.un.org/Glossary.aspx?q=GDP+%28current+US%24%29, accessed 20130726) to reflect an appropriate share of the global production volume, which is also a placeholder value.
  property price 48817.7 EUR2005
    Calculated based on inputs: The price of the product has been calculated as a sum of the values of the material and energy inputs for this product. This value is therefore a rough estimation. It may underestimate the real price since there are additional expenses when producing any product. These expences can include for example labour costs, treatment of waste materials and profit for the producer. Please consider carefully whether this level of data quality is acceptable for your application.
  properties: carbon allocation 0 kg, carbon content 0

## Inputs from technosphere
- air input/output unit, heat and power co-generation unit, 160kW electrical: 1 unit; lognormal variance with pedigree 0.06, pedigree (1,1,5,1,1)
  uncertainty of life time and extrapolation
  EcoSpold01Location=RER
- alkyd paint, white, without water, in 60% solution state: 40 kg; lognormal variance with pedigree 0.05, pedigree (1,1,5,1,1)
  EcoSpold01Location=RER
  Jungbluth 2003
  properties: carbon content, fossil 0.414587, carbon content, non-fossil 0.161654, dry mass 1 kg, heating value, net 17.46 MJ, wet mass 1 kg
  note on carbon content, fossil: C content was calculated as an addition of C content in the raw materials.
- catalytic converter, oxidation, 20 litre: 5 unit; lognormal variance with pedigree 0.16, pedigree (1,1,5,1,1)
  uncertainty of lifetime
  EcoSpold01Location=RER
- catalytic converter, selective catalytic reduction, 200 litre: 2.5 unit; lognormal variance with pedigree 0.25, pedigree (1,1,5,1,1)
  uncertainty of lifetime
  EcoSpold01Location=RER
- concrete, normal strength: 0.54856, 0.30144 m3 (2 suppliers, which the file names only by identifier); sum of these 0.85 m3; lognormal variance with pedigree 0.05, pedigree (1,1,5,1,1)
  EcoSpold01Location=CH
  Jungbluth 2003
  properties: dry mass 2190 kg, water content 0.086758, wet mass 2380 kg
- construction work, heat and power co-generation unit, 160kW electrical: 1 unit; lognormal variance with pedigree 0.06, pedigree (1,1,5,1,1)
  uncertainty of life time and extrapolation
  EcoSpold01Location=RER
- control cabinet, heat and power co-generation unit, 160kW electrical: 1 unit; lognormal variance with pedigree 0.06, pedigree (1,1,5,1,1)
  uncertainty of life time and extrapolation
  EcoSpold01Location=RER
- electricity, medium voltage: 344 kWh; lognormal variance with pedigree 0.1227, pedigree (3,3,5,3,4)
  EcoSpold01Location=UCTE
- energy requirement for assembly of heat and power co-generation unit, 160kW electrical: 1 unit; lognormal variance with pedigree 0.06, pedigree (1,1,5,1,1)
  uncertainty of life time and extrapolation
  EcoSpold01Location=RER
- gas motor, 206kW: 2.5 unit; lognormal variance with pedigree 0.11, pedigree (1,1,5,1,1)
  EcoSpold01Location=RER
  uncertainty of life time and extrapolation
- heat, district or industrial, natural gas: 16055 MJ; lognormal variance with pedigree 0.1227, pedigree (3,3,5,3,4)
  EcoSpold01Location=RER
  properties: heating value, net 1 MJ
- heat, district or industrial, other than natural gas: 16055 MJ; lognormal variance with pedigree 0.1227, pedigree (3,3,5,3,4)
  EcoSpold01Location=CH
  properties: heating value, net 1 MJ
- maintenance, heat and power co-generation unit, 160kW electrical: 1 unit; lognormal variance with pedigree 0.08, pedigree (1,1,5,1,1)
  uncertainty of life time and extrapolation
  EcoSpold01Location=RER
- planning, heat and power co-generation unit, 160kW electrical: 1 unit; lognormal variance with pedigree 0.06, pedigree (1,1,5,1,1)
  uncertainty of life time and extrapolation
  EcoSpold01Location=RER
- polyethylene, high density, granulate: 70 kg; lognormal variance with pedigree 0.05, pedigree (1,1,5,1,1)
  Jungbluth 2003
  EcoSpold01Location=RER
  properties: carbon content, fossil 0.857143, dry mass 1 kg, heating value, net 42.47 MJ, wet mass 1 kg
  note on carbon content, fossil: Polyethylene is formed out of a huge amount of ethylene monomers (C2H4) (ecoinvent v2.2 report 11_II). MW=28 g/mol
- sound insulation, heat and power co-generation unit, 160kW electrical: 1 unit; lognormal variance with pedigree 0.06, pedigree (1,1,5,1,1)
  EcoSpold01Location=RER
  uncertainty of life time and extrapolation
- start-up, heat and power co-generation unit, 160kW electrical: 1 unit; lognormal variance with pedigree 0.06, pedigree (1,1,5,1,1)
  uncertainty of life time and extrapolation;activityLink introduced to establish a direct link to the corresponding regional supply of this product
  EcoSpold01Location=RER
- steel, unalloyed: 3000 kg; lognormal variance with pedigree 0.05, pedigree (1,1,5,1,1)
  EcoSpold01Location=RER
  Jungbluth 2003
  properties: carbon content, fossil 0.0025, dry mass 1 kg, wet mass 1 kg
  note on carbon content, fossil: Unalloyed steels or carbon steels are those in which the level of an individual element in no case reaches or exceeds the limiting concentration given in Tab. 3.1 ecoinvent v2.2 report 10_partII. Assumed to have a C content of 0.25%

## Inputs from nature
- Water, unspecified natural origin [natural resource, in water]: 4.5 m3; name water_UNO_input; lognormal variance with pedigree 0.34, pedigree (1,1,5,1,1)
  rough estimate

## Emissions to nature
- Water [air, unspecified]: 0.675 m3; name water_to_air_unspecified; = (water_UNO_input*fraction_PW_to_air); lognormal variance with pedigree 0.0807, pedigree (2,2,5,1,1)
  Calculated value based on literature values and expert opinion. See comments in the parametres' comment field.
  property fraction, origin: fresh water 0; name fraction_origin_fresh_water
  property fraction, origin: salt water 0; name fraction_origin_salt_water
  property fraction, origin: unspecified 1; name fraction_origin_unspecified
- Water [water, unspecified]: 3.825 m3; name water_to_water_unspecified; = water_UNO_input*(1-fraction_PW_to_air); lognormal variance with pedigree 0.0807, pedigree (2,2,5,1,1)
  (same comment as for Water)
  property carbon content, fossil 0; name C_content_fossil
  property carbon content, non-fossil 0; name C_content_non_fossil
  property dry mass 0 kg; name DM
  property fraction, origin: fresh water 0; name fraction_origin_fresh_water_Ww
  property fraction, origin: salt water 0; name fraction_origin_salt_water_Ww
  property fraction, origin: unspecified 1; name fraction_origin_unspecified_Ww
  property water in wet mass 1000 kg; name WWM
  property wet mass 1000 kg; name WM

## Sampling procedure
Operator and manufacturer information

## Extrapolations
see Geography/Text, see Technolgy Text

## Review by Gerald Rebitzer (obsolete) 2003-07-03
passed
