# gold-silver mine operation with refinery

Dataset: EcoSpold 2, unit process
Geography: RoW
Time period: 2004-01-01 to 2023-12-31
Technology level: current
Classification: ISIC rev.4 ecoinvent: 0729:Mining of other non-ferrous metal ores
Tags: ConvertedDataset
Scenario: Business-as-Usual
System model: Allocation, cut-off by classification
Generated by: Matthias Tuchschmid (obsolete)
Published in: Classen M. 2009
Database: ecoinvent
isCopyrightProtected: true
accessRestrictedTo: 1

## General comment
This multi-output process "mining and refining, gold-silver deposit" delivers the two co-products "gold, from combined gold-silver-production, at refinery" and "silver, from combined gold-silver-production, at refinery". This data set includes the mining in Peru in open pit mines incl. land use. Air emissions are estimated.
As mentionned in the Geography Comment, some exchanges relate to Quebec dataset.
[This dataset was already contained in the ecoinvent database version 2. It was not individually updated during the transfer to ecoinvent version 3. Life Cycle Impact Assessment results may still have changed, as they are affected by changes in the supply chain, i.e. in other datasets. This dataset was generated following the ecoinvent quality guidelines for version 2. It may have been subject to central changes described in the ecoinvent version 3 change report (http://www.ecoinvent.org/database/ecoinvent-version-3/reports-of-changes/), and the results of the central updates were reviewed extensively. The changes added e.g. consistent water flows and other information throughout the database. The documentation of this dataset can be found in the ecoinvent reports of version 2, which are still available via the ecoinvent website. The change report linked above covers all central changes that were made during the conversion process.]

## Included activities end
This data set includes the combined mining and refining of gold and silver in open pit mines in Peru incl. energy and material use, water and air emissions of metals and land use.

## Geography
Material requirements are estimated with Australian data, water emissions are estimated with Data from Papua New Guinea. Some exchanges relate to Quebec dataset.

## Technology
The mining of ore from open pit mines is considered.

## Time period
Period of public environmental report

## Parameters
- annual production Quebec: 22936 kg; name annualProductionQuebec
- fraction, process water, to air: 0.15 dimensionless; name fraction_PW_to_air; lognormal variance with pedigree 0.092025, pedigree (4,4,3,2,4)

## Reference product
- gold: 1 kg; name RefProduct_Gold; By-product classification allocatable product; CPC 41320: Gold (including gold plated with platinum), unwrought or in semi-manufactured forms, or in powder form; HS2017 710812: Metals; gold, non-monetary, unwrought (but not powder); CAS 7440-57-5
  production volume 265464 kg; name annualProductionGlobal; = 3120000*0.1
    The total amount of gold produced in the world in 2016 was 3,120,000 (Source: USGS Minerals Yearbook 2016. Available from: https://www.usgs.gov/centers/nmic/gold-statistics-and-information [downloaded 02 July 2019], Table 8). We assume that 10% of gold is mined at gold and silver co-production sites.
  property price 25128.4 EUR2005
    Price calculated as 5-year market average (2015-2019; USD/kg; USGS [2020]) and converted to EUR2005 (USD2019/EUR2005 exchange rate: 0.62; Official Data Foundation [2020] and Macrotrends [2020]).
    References:
    Official Data Foundation (2020). Inflation Calculator [Online]. Available from: https://www.officialdata.org/us/inflation/2005?endYear=2019&amount=1 [Accessed 28/07/2020]
    USGS (2020). Mineral Commodity Summaries 2020 [Online]. Available from: https://pubs.usgs.gov/periodicals/mcs2020/mcs2020.pdf [Accessed 28/07/2020]
    Macrotrends (2020). Euro Dollar Exchange Rate (EUR USD) - Historical Chart [Online]. Available from: https://www.macrotrends.net/2548/euro-dollar-exchange-rate-historical-chart [Accessed 28/07/2020]
  properties: allocation factor 0.993837, carbon allocation 0 kg, carbon content 0, carbon content, fossil 0, carbon content, non-fossil 0, dry mass 1 kg, true value 25128.4, water content 0, water in wet mass 0 kg, wet mass 1 kg

## Inputs from technosphere
- acetylene: 0.0180759, 0.00380775 kg (2 suppliers, which the file names only by identifier); sum of these 0.0218836 kg; lognormal variance with pedigree 0.0446, pedigree (2,4,5,5,1)
  Environmental report
  Uncertainty: E
  properties: carbon content, fossil 0.923077, dry mass 1 kg, heating value, net 51.2 MJ, wet mass 1 kg
  note on carbon content, fossil: C2H2. ecoinvent v2.2 report n 8. Produced from partial oxidation of natural gas
  note on heating value, net: Based on literature, page 25 (Value may refer to HHV), Althaus H.-J., Chudacoff M., Hischier R., Jungbluth N., Osses M. and Primas A. (2007) Life Cycle Inventories of Chemicals. Final report ecoinvent data v2.0 No. 8. EMPA, Swiss Centre for Life Cycle Inventories, Dübendorf, CH, Online-Version under: www.ecoinvent.org.
- blasting: 375.161 kg; lognormal variance with pedigree 0.0426, pedigree (1,3,5,5,1)
  Environmental report
  Uncertainty: E
- charcoal: 20.0005 kg; lognormal variance with pedigree 0.0546, pedigree (3,3,5,5,1)
  Calculation, based on thesis on Australian precious metal production, data for 1999
  Uncertainty: C
  properties: carbon content, non-fossil 0.8, dry mass 1 kg, heating value, net 28.4 MJ, wet mass 1 kg
  note on heating value, net: Indicative value. Reference: Fuels - Higher and Lower Calorific Values, available at: https://www.engineeringtoolbox.com/fuels-higher-calorific-values-d_169.html
- chemical, organic: 5.51362 kg; lognormal variance with pedigree 0.0432, pedigree (2,3,5,5,1)
  Environmental report, Placer Dome Inc. 2003
  Uncertainty: E
  properties: carbon content, fossil 0.628, dry mass 1 kg, heating value, net 19.03 MJ, wet mass 1 kg
  note on carbon content, fossil: This dataset is an unweighted average of 20 organic substances (listed in Tab 88.1, ecoinvent v2.2 report 8, part II), being part of the top100 chemicals included in this database. The C-content has also been calculated as an unweighted average of the C content of the substances composing this dataset.
- chromium: 11.0393 kg; = 151.1*annualProductionQuebec/annualProductionGlobal
  Consider as a regional specificity of Quebec. The flow is scaled using the production volumes (Quebec and GLO) to avoid the accounting of this specificity in the other regions.
  properties: dry mass 1 kg, wet mass 1 kg
- diesel, burned in building machine: 67208.4 MJ; lognormal variance with pedigree 0.046, pedigree (3,4,5,5,1)
  Environmental report
  Uncertainty: E
  properties: heating value, net 1 MJ
- diesel, burned in diesel-electric generating set, 10MW: 284.046 MJ; lognormal variance with pedigree 0.046, pedigree (3,4,5,5,1)
  Environmental report
  Uncertainty: E
  properties: heating value, net 1 MJ
- electricity, medium voltage: 74.7406, 1490.91, 37.3229, 22.8882, 322.728, 4.58104, 0.983652, 104.106, 153.959, 442.505 kWh (10 suppliers, which the file names only by identifier); sum of these 2654.72 kWh; lognormal variance with pedigree 0.056, pedigree (3,4,5,5,1)
  Environmental report
  Uncertainty: E
- heat, district or industrial, natural gas: 10739.7, 29056.7 MJ (2 suppliers, which the file names only by identifier); sum of these 39796.4 MJ; lognormal variance with pedigree 0.0446, pedigree (2,4,5,5,1)
  Environmental report
  Uncertainty: E
  properties: heating value, net 1 MJ
- heat, district or industrial, other than natural gas: 7186.52, 183.607 MJ (2 suppliers, which the file names only by identifier); sum of these 7370.12 MJ; lognormal variance with pedigree 0.0446, pedigree (2,4,5,5,1)
  Environmental report
  Uncertainty: E
  properties: heating value, net 1 MJ
- hydrochloric acid, without water, in 30% solution state: 1.20259, 5.49409 kg (2 suppliers, which the file names only by identifier); sum of these 6.69668 kg; lognormal variance with pedigree 0.0446, pedigree (3,3,5,5,1)
  Environmental report
  Uncertainty: E
  properties: dry mass 1 kg, heating value, net 3.32 MJ, wet mass 1 kg
- iron scrap, unsorted: -2.22029 kg; name ironScrap; = 30.39*annualProductionQuebec/annualProductionGlobal; lognormal variance with pedigree 0.0047, pedigree (3,2,1,5,1)
  Considered as a regional specificity of Quebec. The flow is scaled using the production volumes (Quebec and GLO) to avoid the accounting of this specificity in the other regions.
  production volume; = annualProductionGlobal * (ironScrap / RefProduct_Gold)
    Calculated from production volume of reference product using the relative outputs.
  properties: dry mass 1 kg, price 0.149 EUR2005, wet mass 1 kg
- lime, packed: 387.587, 9.86797, 774.947 kg (3 suppliers, which the file names only by identifier); sum of these 1172.4 kg; lognormal variance with pedigree 0.0446, pedigree (3,3,5,5,1)
  Environmental report
  Uncertainty: E
  properties: carbon content, fossil 0.117492, dry mass 0.998 kg, water content 0.00200401, wet mass 1 kg
  note on carbon content, fossil: Table 3.1, ecoinvent v2.2 report 7, part VII, pg 3. MW CaCO3=100, MW MgCO3=84
- mine infrastructure, gold and silver: 3.14759e-7 unit; lognormal variance with pedigree 0.3606, pedigree (1,3,5,5,3)
  Annual report
  Uncertainty: A
- precious metal refinery: 2.42186e-7 unit; lognormal variance with pedigree 0.448, pedigree (4,5,5,5,5)
  Environmental report
  Uncertainty: E
- sodium cyanide: 8.10301, 49.9314 kg (2 suppliers, which the file names only by identifier); sum of these 58.0344 kg; lognormal variance with pedigree 0.0446, pedigree (3,3,5,5,1)
  Environmental report
  Uncertainty: E
  properties: carbon content, fossil 0.244898, dry mass 1 kg, heating value, net 7.43 MJ, wet mass 1 kg
- sodium hydroxide, without water, in 50% solution state: 1.03452, 10.5943 kg (2 suppliers, which the file names only by identifier); sum of these 11.6288 kg; lognormal variance with pedigree 0.0546, pedigree (3,3,5,5,1)
  (same comment as for charcoal)
  properties: dry mass 1 kg, heating value, net 3.03 MJ, wet mass 1 kg
- steel, chromium steel 18/8: 53.4085 kg; lognormal variance with pedigree 0.0432, pedigree (2,3,5,5,1)
  Environmental report, Placer Dome Inc. 2003
  Uncertainty: E
  properties: carbon content, fossil 0.0008, dry mass 1 kg, wet mass 1 kg
  note on carbon content, fossil: Stainless steel model is the grade 304 steel (18/8 stainless, 18% chromium 8% nickel; max. 0.08% C)
- sulfidic tailings, from gold mine operation: -59498.3, -34238.2, -270755, -65585.1, -13969.2, -15003.9, -106214, -15095.2, -31803.5, -50520.3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 kg (11 suppliers, which the file names only by identifier); sum of these -681705 kg; lognormal variance with pedigree 0.0046, pedigree (3,3,1,5,1)
  Environmental report
  Uncertainty: E
  production volume; = annualProductionGlobal * (sulfidicTailing / RefProduct_Gold)
    Calculated from production volume of reference product using the relative outputs.
  properties: aluminium content 0.017079, calcium content 0.0037589, carbon content, fossil 0.0087785, dry mass 0.7 kg, iron content 0.014628, magnesium content 0.0020127, oxygen content 0.88758, potassium content 0.0031243, silicon content 0.056714, sodium content 0.0014916, water content 0.428571, wet mass 1 kg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
- sulfuric acid: 4.39287, 0.574571 kg (2 suppliers, which the file names only by identifier); sum of these 4.96744 kg; lognormal variance with pedigree 0.0446, pedigree (3,3,5,5,1)
  Environmental report
  Uncertainty: E
  properties: dry mass 1 kg, wet mass 1 kg
- waste wood, untreated: -0.0955695, -0.0024877, -1.85382, -0.0340263, -0.0144383, -0.585728, -0.0228257, -0.274041 kg (8 suppliers, which the file names only by identifier); sum of these -2.88294 kg; = 39.46*annualProductionQuebec/annualProductionGlobal; lognormal variance with pedigree 0.0047, pedigree (3,2,1,5,1)
  (same comment as for iron scrap, unsorted)
  production volume; = annualProductionGlobal * (wastewood / RefProduct_Gold)
    Calculated from production volume of reference product using the relative outputs.
  properties: carbon content, non-fossil 0.48632, dry mass 0.8 kg, heating value, net 13.99 MJ, water content 0.25, wet mass 1 kg
  note on heating value, net: Value taken from the general comment of the treatment dataset.
- zinc: 2.89054 kg; lognormal variance with pedigree 0.0546, pedigree (3,3,5,5,1)
  (same comment as for charcoal)
  properties: dry mass 1 kg, wet mass 1 kg

## Inputs from nature
- Gold [natural resource, in ground]: 1.15709 kg; = 0.207127437 + 0.957136802; lognormal variance with pedigree 0.046, pedigree (3,4,5,5,1)
  The gold comes from two different ores with the following compositions:
  0.2071 kg Au: 2.1 ppm Au and 2.1 ppm Ag in ore
  0.9571 kg Au: 1.3 ppm Au and 0.46 ppm Ag in ore
  Estimation and environmental report.
  Uncertainty: E
- Silver [natural resource, in ground]: 0.549352 kg; = 0.341850425 + 0.210907914; lognormal variance with pedigree 0.046, pedigree (3,4,5,5,1)
  The silver comes from two different ores with the following compositions:
  0.3419 kg Ag: 0.46 ppm Ag and 1.3 ppm Au in ore
  0.2109 kg Ag: 2.1 ppm Ag and 2.1 ppm Au in ore
  Estimation and environmental report.
  Uncertainty: E
- Water, river [natural resource, in water]: 2.62954 m3; name water_river_input; lognormal variance with pedigree 0.0446, pedigree (3,3,5,5,1)
  Environmental report
  Uncertainty: E
- Water, unspecified natural origin [natural resource, in water]: 139.146 m3; name water_UNO_input; lognormal variance with pedigree 0.0446, pedigree (2,4,5,5,1)
  Environmental report
  Uncertainty: E
- Water, well, in ground [natural resource, in water]: 227.485 m3; name water_well_in_ground_input; lognormal variance with pedigree 0.0446, pedigree (3,3,5,5,1)
  Literature value.
  Uncertainty: E

## Emissions to nature
- Arsenic ion [air, non-urban air or from high stacks]: 7.14654e-5 kg; lognormal variance with pedigree 0.6946, pedigree (3,3,5,5,1)
  Environmental report
  Uncertainty: E
- Carbon dioxide, fossil [air, non-urban air or from high stacks]: 61.3866 kg; lognormal variance with pedigree 0.0446, pedigree (3,3,5,5,1)
  Environmental report
  Uncertainty: E
- Copper ion [air, non-urban air or from high stacks]: 7.11718e-5 kg; lognormal variance with pedigree 0.6946, pedigree (2,4,5,5,1)
  Calculation, based on Swedish production
  Uncertainty: C
- Lead II [air, non-urban air or from high stacks]: 0.000380469 kg; lognormal variance with pedigree 0.6946, pedigree (3,3,5,5,1)
  Environmental report
  Uncertainty: E
- Mercury II [air, non-urban air or from high stacks]: 0.0027157 kg; lognormal variance with pedigree 0.6946, pedigree (3,3,5,5,1)
  Environmental report
  Uncertainty: E
- Water [air, unspecified]: 55.389 m3; name water_to_air_unspecified; = water_river_input*fraction_PW_to_air+water_UNO_input*fraction_PW_to_air+water_well_in_ground_input*fraction_PW_to_air; lognormal variance with pedigree 0.0827, pedigree (2,2,5,5,1)
  Calculated value based on literature values and expert opinion. See comments in the parametres" comment field.
  property fraction, origin: fresh water 0.623177; name fraction_origin_fresh_water
  property fraction, origin: salt water 0; name fraction_origin_salt_water
  property fraction, origin: unspecified 0.376823; name fraction_origin_unspecified
- Zinc II [air, non-urban air or from high stacks]: 1.96489e-5 kg; lognormal variance with pedigree 0.6946, pedigree (2,4,5,5,1)
  Calculation, based on Swedish production
  Uncertainty: C
- Arsenic ion [water, ocean]: 0.000188645 kg; lognormal variance with pedigree 0.6946, pedigree (2,4,5,5,1)
  Environmental report
  Uncertainty: E
- Arsenic ion [water, surface water]: 0.0280024 kg; lognormal variance with pedigree 0.6946, pedigree (3,3,5,5,1)
  Estimated with data from combined production, PG
  Uncertainty: E
- Cadmium II [water, ocean]: 0.00074672 kg; lognormal variance with pedigree 0.3546, pedigree (2,4,5,5,1)
  Environmental report
  Uncertainty: E
- Cadmium II [water, surface water]: 0.131241 kg; lognormal variance with pedigree 0.3546, pedigree (3,3,5,5,1)
  Estimated with data from combined production, PG
  Uncertainty: E
- Copper ion [water, ocean]: 0.767156 kg; lognormal variance with pedigree 0.3546, pedigree (2,4,5,5,1)
  Environmental report
  Uncertainty: E
- Copper ion [water, surface water]: 6.5485 kg; lognormal variance with pedigree 0.3546, pedigree (3,3,5,5,1)
  Estimated with data from combined production, PG
  Uncertainty: E
- Cyanide [water, ocean]: 1.33624 kg; lognormal variance with pedigree 0.3546, pedigree (2,4,5,5,1)
  Environmental report
  Uncertainty: E
- Cyanide [water, surface water]: 10.5333 kg; lognormal variance with pedigree 0.3546, pedigree (3,3,5,5,1)
  Estimated with data from combined production, PG
  Uncertainty: E
- Lead II [water, ocean]: 0.00222444 kg; lognormal variance with pedigree 0.6946, pedigree (2,4,5,5,1)
  Environmental report
  Uncertainty: E
- Lead II [water, surface water]: 0.017093 kg; lognormal variance with pedigree 0.6946, pedigree (3,3,5,5,1)
  Estimated with data from combined production, PG
  Uncertainty: E
- Mercury II [water, surface water]: 0.000299458 kg; lognormal variance with pedigree 0.6946, pedigree (3,3,5,5,1)
  Estimated with data from combined production, PG
  Uncertainty: E
- Nickel II [water, ocean]: 0.00524276 kg; lognormal variance with pedigree 0.6946, pedigree (2,4,5,5,1)
  Environmental report
  Uncertainty: E
- Nickel II [water, surface water]: 1.7469 kg; lognormal variance with pedigree 0.6946, pedigree (3,3,5,5,1)
  Estimated with data from combined production, PG
  Uncertainty: E
- Water [water, unspecified]: 313.871 m3; name water_to_water_unspecified; = water_river_input*(1-fraction_PW_to_air)+water_UNO_input*(1-fraction_PW_to_air)+water_well_in_ground_input*(1-fraction_PW_to_air); lognormal variance with pedigree 0.0827, pedigree (2,2,5,5,1)
  (same comment as for Water)
  property carbon content, fossil 0; name C_content_fossil
  property carbon content, non-fossil 0; name C_content_non_fossil
  property dry mass 0 kg; name DM
  property fraction, origin: fresh water 0.623177; name fraction_origin_fresh_water_Ww
  property fraction, origin: salt water 0; name fraction_origin_salt_water_Ww
  property fraction, origin: unspecified 0.376823; name fraction_origin_unspecified_Ww
  property water in wet mass 1000 kg; name WWM
  property wet mass 1000 kg; name WM
- Zinc II [water, ocean]: 0.0499909 kg; lognormal variance with pedigree 0.6946, pedigree (2,4,5,5,1)
  Environmental report
  Uncertainty: E
- Zinc II [water, surface water]: 46.5627 kg; lognormal variance with pedigree 0.6946, pedigree (3,3,5,5,1)
  Estimated with data from combined production, PG
  Uncertainty: E

## Sampling procedure
environmental report

## Extrapolations
See Geography, estimations have been made for refinement of Gold This dataset has been copied from an original dataset covering the geography PE. The uncertainty has been adjusted accordingly.
