# beryllium hydroxide production

Dataset: EcoSpold 2, unit process
Geography: RoW
Time period: 2009-01-01 to 2023-12-31
Technology level: current
Classification: ISIC rev.4 ecoinvent: 2420:Manufacture of basic precious and other non-ferrous metals
Synonyms: Be(OH)2
Scenario: Business-as-Usual
System model: Allocation, cut-off by classification
Generated by: Nora Minas
Published in: Philip Nuss 2014
Database: ecoinvent
isCopyrightProtected: true
accessRestrictedTo: 1

## General comment
This dataset represents global production of beryllium hydroxide (Be(OH)2). It is an extrapolation from the respective US dataset. Beryllium is commercially extracted from the minerals beryl and bertrandite, the latter being the economically more important one (Petzow et al. 2005). In 2016, 70 % of the global beryllium production came from the US, where bertrandite is the only beryllium source. The processing methods for the 2 different ores differ but due to its higher economic importance, only bertrandite processing is considered in this dataset. An average bertrandite ore grade of 0.248% beryllium and a recovery rate of 88 % were assumed (Materion Corp. 2018). Be(OH)2 is an intermediate product and can be used to produce beryllium oxide, beryllium alloys and beryllium metal. Be(OH)2 has a Be content of 20.95%.
Petzow, G., Aldinger, F., Jönsson, S., Welge, P., van Kampen, V., Mensing, T., Brüning, T., 2005. Beryllium and Beryllium Compounds. In 'Ullmann’s Encyclopedia of Industrial Chemistry'. Wiley-VCH Verlag GmbH & Co. KGaA, Weinheim, Germany, p. 71. https://doi.org/10.1002/14356007.a04_011.pub2
Materion Corp., 2018. Materion 2018 Annual Report.

## Included activities start
The activity starts with the construction of the mine side and the extraction of the ore.

## Included activities end
The activity ends with the production beryllium hydroxide

## Technology
Bertrandite ore is mined using the open pit method. The ore is dissolved in sulfuric acid and insoluble residues such as silica and aluminum are removed. Solvent extraction is applied us-ing organic solvents such as ammonium di-2-ethylhexyl phosphate/di-2-ethylhexyl phos-phoric acid/kerosene (DAP). Ammonium carbonate solution is used to separate beryllium from the organic phase. Since the organic phase is returned to the process it is not accounted for. Metal impurities are removed by heat treatment.

## Parameters
- ore grade: 0.248 % (obsolete); name ore_grade
  Taken from: Materion Corp., 2018. Materion 2018 Annual Report.
- recovery rate beryllium: 0.88 dimensionless; name recovery_rate_be
  Taken from: Materion Corp., 2018. Materion 2018 Annual Report.

## Reference product
- beryllium hydroxide: 1 kg; name Amount_beryllium_hydroxide; source Philip Nuss 2014; By-product classification allocatable product; CPC 41601: Tungsten, molybdenum, tantalum, magnesium, cobalt, cadmium, titanium, zirconium, beryllium, gallium, hafnium, […]; HS2017 811219: Beryllium and articles thereof; wrought other than waste and scrap; CAS 13327-32-7
  production volume 310263 kg; name PV_beryllium_hydroxide; = 220000 /0.2095
    According to the USGS, global beryllium production in 2016 was 220.000 Kg. Be(OH)2 has a beryllium content of 0.2095. Assuming that all beryllium mined is used for Be(OH)2 production.
  property carbon content, fossil 0; name Amount_beryllium_hydr_C_content_fossil_0
    fossil carbon content on a dry matter basis
  property carbon content, non-fossil 0; name Amount_beryllium__C_content_non_fossil_0
    biogene carbon content on a dry matter basis
  property price 3.4705 EUR2005
    Calculated based on inputs: The price of the product has been calculated as a sum of the values of the material and energy inputs for this product. This value is therefore a rough estimation. It may underestimate the real price since there are additional expenses when producing any product. These expences can include for example labour costs, treatment of waste materials and profit for the producer. Please consider carefully whether this level of data quality is acceptable for your application.
  properties: beryllium content 0.2095, carbon allocation 0 kg, carbon content 0, dry mass 1 kg, water content 0, water in wet mass 0 kg, wet mass 1 kg

## Inputs from technosphere
- ammonia, anhydrous, liquid: 0.0822292, 0.353266, 0.159624, 1.76933, 0.0747905, 0.0167303, 0.614868, 0.0528553 kg (8 suppliers, which the file names only by identifier); sum of these 3.12369 kg; source Philip Nuss 2014; lognormal variance with pedigree 0.0236682, pedigree (3,2,4,5,1)
  Used for solvent extraction. Input of ammonia instead of ammonium carbonate was confirmed by personal communication with author of published source.
  properties: dry mass 1 kg, wet mass 1 kg
- conveyor belt: 6.9392e-6 m; source Philip Nuss 2014; lognormal variance with pedigree 0.449996, pedigree (2,4,5,5,4)
- diesel, burned in building machine: 22.0126 MJ; source Philip Nuss 2014; lognormal variance with pedigree 0.0236682, pedigree (3,2,4,5,1)
  properties: heating value, net 1 MJ
- electricity, medium voltage: 0.533211, 10.6364, 0.163287, 2.30239, 0.0326818, 0.00701752, 0.742705, 1.09837, 0.41689 kWh (9 suppliers, which the file names only by identifier); sum of these 15.9329 kWh; source Philip Nuss 2014; lognormal variance with pedigree 0.0236682, pedigree (3,2,4,5,1)
- heat, district or industrial, natural gas: 15.9329 MJ; source Philip Nuss 2014; lognormal variance with pedigree 0.0236682, pedigree (3,2,4,5,1)
  properties: heating value, net 1 MJ
- mine infrastructure, open cast, non-ferrous metal: 4.57023e-9 unit; source Philip Nuss 2014; lognormal variance with pedigree 0.449996, pedigree (2,4,5,5,4)
  Generic Ecoinvent process, 20,000 Mt assumed during 50 year lifetime
- non-sulfidic tailing, off-site: -142.152 kg; name Amount_non_sulf_tailings; lognormal variance with pedigree 0.0176682, pedigree (3,2,3,5,1)
  calculated value to obtain mass balance
  production volume; = PV_beryllium_hydroxide * ( Amount_non_sulf_tailings/ Amount_beryllium_hydroxide)
    Calculated from production volume of reference product using the relative outputs.
  properties: beryllium content 0.000287099, dry mass 0.7 kg, water content 0.428571, wet mass 1 kg
  note on beryllium content: beryllium content on a dry matter basis. calculated value to obtain mass balance
- sulfuric acid: 1.37192, 0.179442 kg (2 suppliers, which the file names only by identifier); sum of these 1.55136 kg; source Philip Nuss 2014; lognormal variance with pedigree 0.0236682, pedigree (3,2,4,5,1)
  Bertrandite ore is dissolved in sulfuric acid
  properties: dry mass 1 kg, wet mass 1 kg
- wastewater from pig iron production: -0.140406, -0.589265, -0.0035286 m3 (3 suppliers, which the file names only by identifier); sum of these -0.7332 m3; lognormal variance with pedigree 0.0176682, pedigree (3,2,3,5,1)
  wastewater from pig iron production is used as a proxy. This exchange was mot present in the original inventory by Nuss (2014). It has been calculated to obtain waterbalance.
  production volume; = (PV_beryllium_hydroxide) * (Amount_WW / Amount_beryllium_hydroxide)
    Calculated from production volume of reference product using the relative outputs.
  properties: carbon content, fossil 0.00360088, dry mass 0.337476 kg, water content 2962.17, wet mass 1000 kg

## Inputs from nature
- Beryllium [natural resource, in ground]: 0.238068 kg; = 0.2095/ recovery_rate_be; lognormal variance with pedigree 0.0236682, pedigree (3,2,4,5,1)
  The content of be in beryllium hydroxide is 0.2095. The amount of Be in ground was needed for the production of 1 Kg beryllium hydroxide was calculated considering the recovery rate of beryllium.
- Gangue [natural resource, in ground]: 95.7572 kg; = 0.2095/ recovery_rate_be/ (ore_grade/100)-0.2095/recovery_rate_be; lognormal variance with pedigree 0.0236682, pedigree (3,2,4,5,1)
  The total amount of gangue and beryllium mined is calculated by dividing the amount of Be in ground needed for the production of 1 Kg beryllium hydroxide (considering the recovery rate of Be) by the ore grade of bertrandite ore. Finally, the amount of Be mined is subtracted from the total.
- Transformation, from unspecified [natural resource, land]: 0.000784067 m2; source Philip Nuss 2014; lognormal variance with pedigree 0.449996, pedigree (2,4,5,5,4)
- Transformation, to mineral extraction site [natural resource, land]: 0.000784067 m2; source Philip Nuss 2014; lognormal variance with pedigree 0.449996, pedigree (2,4,5,5,4)
- Water, well, in ground [natural resource, in water]: 0.775681 m3; source Philip Nuss 2014; lognormal variance with pedigree 0.0236682, pedigree (3,2,4,5,1)

## Extrapolations
This dataset is an extrapolation from the respective US dataset. The uncertainty was adjusted accordingly
