# rape seed production

Dataset: EcoSpold 2, unit process
Geography: FR
Time period: 2000-01-01 to 2023-12-31
Technology level: current
Classification: ISIC rev.4 ecoinvent: 0111:Growing of cereals (except rice), leguminous crops and oil seeds
Scenario: Business-as-Usual
System model: Allocation, cut-off by classification
Share of production covered: 100 %
Generated by: Thomas Nemecek
Published in: Nemecek, T. 2007
Database: ecoinvent
isCopyrightProtected: true
accessRestrictedTo: 1

## General comment
This dataset represents the production of 1 kg of rape seed (fresh matter). The yield is 3020 kg/ha at a moisture content at storage of 10%.
[This dataset was already contained in the ecoinvent database version 2. It was not individually updated during the transfer to ecoinvent version 3. Life Cycle Impact Assessment results may still have changed, as they are affected by changes in the supply chain, i.e. in other datasets. This dataset was generated following the ecoinvent quality guidelines for version 2. It may have been subject to central changes described in the ecoinvent version 3 change report (http://www.ecoinvent.org/database/ecoinvent-version-3/reports-of-changes/), and the results of the central updates were reviewed extensively. The changes added e.g. consistent water flows and other information throughout the database. The documentation of this dataset can be found in the ecoinvent reports of version 2, which are still available via the ecoinvent website. The change report linked above covers all central changes that were made during the conversion process.]

## Included activities start
This activity starts after the harvest of the previous crop. The inputs of seeds, mineral fertilisers and pesticides are considered. It is assumed that no organic fertilisers are applied.

## Included activities end
The dataset includes all machine operations and corresponding machine infrastructure and sheds. Machine operations are: soil cultivation, sowing, fertilisation, weed control, pest and pathogen control, combine-harvest and transport from field to farm (2 km). Further, direct field emissions are included. This activity ends after harvest at the farm gate.

## Geography
Refers to an average production in the region Barrois (FR).

## Technology
conventional production typical for the region

## Time period
The yield data have been collected for the years 2000-2004.

## Parameters
- LUC_crop_specific: 1 dimensionless
  This parameter allows to switch between a "crop specific" and a "country specific" approach when calculating the LUC of a crop. By default, the chosen approach is "crop specific", so the value of the parameter is 1. If you want to apply a "country specific" approach, turn the parameter to 0.
- fraction, irrigation water to surface water: 0.2 dimensionless; name fraction_IW_to_surface_water; lognormal variance with pedigree 0.0886, pedigree (4,3,1,1,4)
  Literature value (Döll, 2011) cross referenced with expert opinion.
- fraction, irrigation water, to air: 0.7945 dimensionless; name fraction_IW_to_air; lognormal variance with pedigree 0.0409, pedigree (2,2,2,1,1)
  Literature value (Siebert, 2010) (Vionnet, S., Quantis Water Database - Technical Report, 2012).
- fraction, irrigation water, to ground water: 0.8 dimensionless; name fraction_IW_to_ground_water; lognormal variance with pedigree 0.0886, pedigree (4,3,1,1,4)
  Literature value (Döll, 2011) cross referenced with expert opinion.
- yield, agriculture: 3.02 metric ton/ha; name yield_agriculture
  amount (ton) of harvested agricultural products per hectare land.

## Reference product
- rape seed: 1 kg; name REF_PRODUCT; By-product classification allocatable product; CPC 01443: Rape or colza seed; HS2017 120590: Oil seeds; rape or colza seeds, other than low erucic, whether or not broken
  EcoSpold01Location=FR
  production volume 3.30652e9 kg; = 3306520*1000
    According to FAOstat, the yearly production volume of rape seed in France in 2021 was 3306520 metric tonne. Data retrieved from: https://www.fao.org/faostat/en/#data/QCL.
  property carbon content, fossil 0; name REF_PRODUCT_C_content_fossil
    fossil carbon content on a dry matter basis
  property carbon content, non-fossil 0.574; name REF_PRODUCT_C_content_non_fossil
    biogene carbon content on a dry matter basis
    Composition data obtained from Table 2.1 in Utilization of canola seed fractions in ruminant feeds, Master thesis by Ravindra Guptha Heendeniya, University of Saskatchewan (Canada), 2008 (http://library2.usask.ca/theses/available/etd-06162008-141937/unrestricted/THESES_Ravindra_Heendeniya_17_june_2008.pdf). First, composition data were refered to 1 kg dry mass. Then, C-contents were calculated considering a C-content/dry mass of 46% in carbohydrates (including fibres), 53% in proteins and 75% in fats. All data from "Evolutionary and Biochemical Aspects", A.D. Kay and T. Vrede (in Global Ecology, 2010, Elsevier B.V., S.E. Jørgensen Ed.).
  property dry mass 0.9 kg; name REF_PRODUCT_DM
  property energy content 24.8912 MJ; name REF_PRODUCT_energy_content
    See chapter 'Product Properties' in "01_crop production - yields & inputs CH & Europe_v1.0.pdf", section "AGRICULTURAL PRODUCTION IN SWITZERLAND" - pdf-document on the dedicated talk page of ecoinvent (www.ecoinvent.org/documentation)
  property price 0.304288 EUR2005
    Calculated based on inputs: The price of the product has been calculated as a sum of the values of the material and energy inputs for this product. This value is therefore a rough estimation. It may underestimate the real price since there are additional expenses when producing any product. These expences can include for example labour costs, treatment of waste materials and profit for the producer. Please consider carefully whether this level of data quality is acceptable for your application.
  property water content 0.111111; name REF_PRODUCT_water_content; = (1-REF_PRODUCT_DM)/REF_PRODUCT_DM
  property water in wet mass 0.1 kg; name REF_PRODUCT_WWM; = 1-REF_PRODUCT_DM
  property wet mass 1 kg; name REF_PRODUCT_WM
  properties: carbon allocation 0.5166 kg, carbon content 0.574

## Inputs from technosphere
- [thio]carbamate-compound: 7.9843e-5 kg; lognormal variance with pedigree 0.0407, pedigree (2,2,5,1,1)
  EcoSpold01Location=RER
  See chapter 'Yields and Inputs of Arable Crop Production' in "01_crop production - yields & inputs CH & Europe_v1.0.pdf", section "AGRICULTURAL PRODUCTION IN THE EU" - pdf-document on the dedicated talk page of ecoinvent (www.ecoinvent.org/documentation)
  properties: carbon content, fossil 0.626349, dry mass 1 kg, wet mass 1 kg
  note on carbon content, fossil: Approximated as an unweighted average of the C-content of the [thio]carbamate-compounds (Tab 2.25 Sutter, 2010) carbofuran,orbencarb, prosulfocarb
- acetamide-anillide-compound, unspecified: 0.00013363 kg; lognormal variance with pedigree 0.0407, pedigree (2,2,5,1,1)
  See chapter 'Yields and Inputs of Arable Crop Production' in "01_crop production - yields & inputs CH & Europe_v1.0.pdf", section "AGRICULTURAL PRODUCTION IN THE EU" - pdf-document on the dedicated talk page of ecoinvent (www.ecoinvent.org/documentation)
  EcoSpold01Location=RER
  properties: carbon content, fossil 0.659175, dry mass 1 kg, wet mass 1 kg
  note on carbon content, fossil: Approximated as an unweighted average of the C-content of the acetamide-anillide-compound (Tab 2.25 Sutter, 2010) alachor, metolachlor, propachlor and teflubenzuron
- ammonium nitrate: 0.104292 kg; lognormal variance with pedigree 0.0406, pedigree (2,1,5,1,1)
  EcoSpold01Location=RER
  The exchange has been updated from 'ammonium nitrate, as N' into 'ammonium nitrate' and therefore its amount has been scaled (multiplied) from 0.0365 kg by 2.8573 kg of 'ammonium nitrate' per kg of 'ammonium nitrate, as N'. Original comment of the exchange is: See chapter 'Yields and Inputs of Arable Crop Production' in "01_crop production - yields & inputs CH & Europe_v1.0.pdf", section "AGRICULTURAL PRODUCTION IN THE EU" - pdf-document on the dedicated talk page of ecoinvent (www.ecoinvent.org/documentation)
  properties: dry mass 1 kg, wet mass 1 kg
- ammonium sulfate: 0.00396 kg; lognormal variance with pedigree 0.0406, pedigree (2,1,5,1,1)
  (same comment as for [thio]carbamate-compound)
  properties: dry mass 1 kg, wet mass 1 kg
- application of plant protection product, by field sprayer: 0.0025331 ha; lognormal variance with pedigree 0.0406, pedigree (2,1,5,1,1)
  EcoSpold01Location=CH
  See chapter 'Yields and Inputs of Arable Crop Production' in "01_crop production - yields & inputs CH & Europe_v1.0.pdf", section "AGRICULTURAL PRODUCTION IN THE EU" - pdf-document on the dedicated talk page of ecoinvent (www.ecoinvent.org/documentation)
- combine harvesting: 0.00033113 ha; lognormal variance with pedigree 0.0406, pedigree (2,1,5,1,1)
  See chapter 'Yields and Inputs of Arable Crop Production' in "01_crop production - yields & inputs CH & Europe_v1.0.pdf", section "AGRICULTURAL PRODUCTION IN THE EU" - pdf-document on the dedicated talk page of ecoinvent (www.ecoinvent.org/documentation)
  EcoSpold01Location=CH
- cyclic N-compound: 2.945e-5 kg; lognormal variance with pedigree 0.0407, pedigree (2,2,5,1,1)
  (same comment as for acetamide-anillide-compound, unspecified)
  properties: carbon content, fossil 0.641962, dry mass 1 kg, wet mass 1 kg
  note on carbon content, fossil: Calculated as an unweigthed average of the C content of the cyclic N-compounds where information was avaliable in Sutter, 2010, following the classification in Tab 2.25 in Sutter 2010: Difenoconazole (C19H17Cl2N3O3), Fenpropidin (C19H31N), Fenpropimorph (C20H33NO), Flusilazole (C16H15F2N3Si), Metconazole (C17H22ClN3O), Penconazole (C13H15Cl2N3), Propiconazole (C15H17Cl2N3O2), Tebuconazole (C16H22ClN3O)
- dinitroaniline-compound: 0.00030517 kg; lognormal variance with pedigree 0.0407, pedigree (2,2,5,1,1)
  (same comment as for acetamide-anillide-compound, unspecified)
  properties: carbon content, fossil 0.55516, dry mass 1 kg, wet mass 1 kg
  note on carbon content, fossil: C content of dinitroaniline-compound was calculated after the C content of the herbicide pendimethalin, classified as dinitroaniline-compound in Tab 2.25 of Sutter 2010
- fertilising, by broadcaster: 0.00082781 ha; lognormal variance with pedigree 0.0406, pedigree (2,1,5,1,1)
  (same comment as for combine harvesting)
- inorganic phosphorus fertiliser, as P2O5: 0.0265 kg; lognormal variance with pedigree 0.0406, pedigree (2,1,5,1,1)
  (same comment as for [thio]carbamate-compound)
  properties: dry mass 1 kg, wet mass 1 kg
- irrigation: 0.274848 m3; name water_irrigation_input; source Siebert, S. 2010; lognormal variance with pedigree 0.0427, pedigree (2,2,5,1,1)
  Calculated based on literature values (Döll, 2010) and partially modelled at ETH (Pfister, S.).
  property carbon content, fossil 0; name C_content_fossil
  property carbon content, non-fossil 0; name C_content_non_fossil
  property dry mass 0.11 kg; name DM
  property water content 9089.91; name water_content
  property water in wet mass 999.89 kg; name WWM
  property wet mass 1000 kg; name WM
- land use change, annual crop: 0.0001798 ha; = (1.798E-4*LUC_crop_specific+0.0000*(1-LUC_crop_specific))
  Calculated value. Land use change (LUC) combines land transformation areas calculated with the adapted 'Direct Land Use Change Assessment Tool' version 2014 developed by Blonk Consultants and the carbon losses from soil organic carbon (SOC) and vegetation (VEG) as calculated in ecoinvent v3. See 'WFLDB-Guidelines.pdf', available at https://ecoquery.ecoinvent.org/File/Reports.
- lime: 0.0091798 kg; lognormal variance with pedigree 0.0406, pedigree (2,1,5,1,1)
  (same comment as for combine harvesting)
  properties: carbon content, fossil 0.120005, dry mass 1 kg, wet mass 1 kg
- packaging, for fertilisers: 0.23088 kg; lognormal variance with pedigree 0.0912, pedigree (4,3,5,5,4)
  Total amount of active substance/s of fertilisers needed for the production of 'rape seed' is calculated to be circa 1.15E-01 kg. Fertiliser/s used in this dataset is/are: 'ammonium nitrate, as N', 'ammonium sulfate, as N', 'lime', 'phosphate fertiliser, as P2O5', 'potassium chloride, as K2O', 'urea, as N'. The total amount of active substance/s is doubled in order to account for the packaging of the dilluted product of fertiliser/s that is/are applied. Therefore, 2.31E-01 kg of packaging for fertilisers is justified with this exchange.
  properties: carbon content, fossil 0.825301, dry mass 1 kg, heating value, net 25.01 MJ, wet mass 1 kg
  note on carbon content, fossil: Considering a chemical formula (C2H4)n for polyethylene, carbon content-fossil is calculated to be 0.856286 kg of Carbon per kg of dry mass.
- packaging, for pesticides: 0.00188341 kg; lognormal variance with pedigree 0.0912, pedigree (4,3,5,5,4)
  Total amount of active substance/s of pesticides needed for the production of rape seed is calculated to be circa 9.42E-04 kg. Pesticide/s used in this dataset is/are: '[thio]carbamate-compound', 'acetamide-anillide-compound, unspecified', 'cyclic N-compound', 'dinitroaniline-compound', 'pesticide, unspecified', 'pyrethroid-compound'. The total amount of active substance/s is doubled in order to account for the packaging of the dilluted product of pesticide/s that is/are applied. Therefore, 1.88E-03 kg of packaging for pesticides is justified with this exchange.
  properties: carbon content, fossil 0.85714, dry mass 1 kg, heating value, net 25.97 MJ, wet mass 1 kg
- pesticide, unspecified: 0.00038041 kg; lognormal variance with pedigree 0.0407, pedigree (2,2,5,1,1)
  (same comment as for [thio]carbamate-compound)
  properties: carbon content, fossil 0.486978, dry mass 1 kg, wet mass 1 kg
  note on carbon content, fossil: Mean of C content in all pesticides whose formula has been documented in Sutter 2010
- potassium chloride: 0.0288087 kg; lognormal variance with pedigree 0.0406, pedigree (2,1,5,1,1)
  EcoSpold01Location=RER
  The exchange has been updated from 'potassium chloride, as K2O' into 'potassium chloride' and therefore its amount has been scaled (multiplied) from 0.0182 kg by 1.5829 kg of 'potassium chloride' per kg of 'potassium chloride, as K2O'. Original comment of the exchange is: See chapter 'Yields and Inputs of Arable Crop Production' in "01_crop production - yields & inputs CH & Europe_v1.0.pdf", section "AGRICULTURAL PRODUCTION IN THE EU" - pdf-document on the dedicated talk page of ecoinvent (www.ecoinvent.org/documentation)
  properties: dry mass 1 kg, wet mass 1 kg
- pyrethroid-compound: 1.3204e-5 kg; lognormal variance with pedigree 0.0407, pedigree (2,2,5,1,1)
  (same comment as for acetamide-anillide-compound, unspecified)
  properties: carbon content, fossil 0.623, dry mass 1 kg, wet mass 1 kg
  note on carbon content, fossil: C content of pyrethroid-compounds was calculated as an unweigthed average of C content of the substances: cypermethrin, alpha-cypermethrin,beta-cyfluthrin, lambdacyhalothrin. Those substances are classified as pyrethroid-compounds in Tab 2.25, Sutter 2010
- rape seed, for sowing: 0.00099338 kg; name SEED; lognormal variance with pedigree 0.0406, pedigree (2,1,5,1,1)
  (same comment as for application of plant protection product, by field sprayer)
  property carbon content, non-fossil 0.574; name SEED_C_content_non_fossil
  property dry mass 0.94 kg; name SEED_DM
  property energy content 24.8912 MJ; name SEED_energy_content
  properties: water content 0.0638298, wet mass 1 kg
  note on carbon content, non-fossil: biogene carbon content on a dry matter basis Composition data obtained from Table 2.1 in Utilization of canola seed fractions in ruminant feeds, Master thesis by Ravindra Guptha Heendeniya, University of Saskatchewan (Canada), 2008 (http://library2.usask.ca/theses/available/etd-06162008-141937/unrestricted/THESES_Ravindra_Heendeniya_17_june_2008.pdf). First, composition data were refered to 1 kg dry mass. Then, C-contents were calculated considering a C-content/dry mass of 46% in carbohydrates (including fibres), 53% in proteins and 75% in fats. All data from "Evolutionary and Biochemical Aspects", A.D. Kay and T. Vrede (in Global Ecology, 2010, Elsevier B.V., S.E. Jørgensen Ed.).
  note on energy content: See chapter 'Product Properties' in "01_crop production - yields & inputs CH & Europe_v1.0.pdf", section "AGRICULTURAL PRODUCTION IN SWITZERLAND" - pdf-document on the dedicated talk page of ecoinvent (www.ecoinvent.org/documentation)
- sowing: 0.00033113 ha; lognormal variance with pedigree 0.0406, pedigree (2,1,5,1,1)
  (same comment as for combine harvesting)
- tillage, harrowing, by rotary harrow: 0.00016556 ha; lognormal variance with pedigree 0.0406, pedigree (2,1,5,1,1)
  (same comment as for application of plant protection product, by field sprayer)
- tillage, harrowing, by spring tine harrow: 0.00066225 ha; lognormal variance with pedigree 0.0406, pedigree (2,1,5,1,1)
  (same comment as for combine harvesting)
- tillage, ploughing: 0.00016556 ha; lognormal variance with pedigree 0.0406, pedigree (2,1,5,1,1)
  (same comment as for application of plant protection product, by field sprayer)
- transport, tractor and trailer, agricultural: 0.002 metric ton*km; lognormal variance with pedigree 0.0406, pedigree (2,1,5,1,1)
  (same comment as for combine harvesting)
- urea: 0.0452342 kg; lognormal variance with pedigree 0.0406, pedigree (2,1,5,1,1)
  EcoSpold01Location=RER
  The exchange has been updated from 'urea, as N' into 'urea' and therefore its amount has been scaled (multiplied) from 0.0211 kg by 2.1438 kg of 'urea' per kg of 'urea, as N'. Original comment of the exchange is: See chapter 'Yields and Inputs of Arable Crop Production' in "01_crop production - yields & inputs CH & Europe_v1.0.pdf", section "AGRICULTURAL PRODUCTION IN THE EU" - pdf-document on the dedicated talk page of ecoinvent (www.ecoinvent.org/documentation)
  properties: carbon content, fossil 0.2, dry mass 1 kg, wet mass 1 kg

## Inputs from nature
- Carbon dioxide, in air [natural resource, in air]: 1.89223 kg; = 44/12 * (REF_PRODUCT_C_content_non_fossil * REF_PRODUCT * REF_PRODUCT_DM - SEED_C_content_non_fossil * SEED * SEED_DM); lognormal variance with pedigree 0.0406, pedigree (2,1,5,1,1)
  Modelled,see chapter 'CO2 binding' in "01_crop production_direct field emissions and natural resources_v1.0.pdf" - pdf-document on the dedicated talk page of ecoinvent (www.ecoinvent.org/documentation)
- Energy, gross calorific value, in biomass [natural resource, biotic]: 23.808 MJ; lognormal variance with pedigree 0.0411891, pedigree (2,1,5,1,1)
- Occupation, annual crop, non-irrigated, intensive [natural resource, land]: 3.5872 m2*year; lognormal variance with pedigree 0.0406, pedigree (2,1,5,1,1)
  Modelled, see chapter 'Land use' in "01_crop production_direct field emissions and natural resources_v1.0.pdf" - pdf-document on the dedicated talk page of ecoinvent (www.ecoinvent.org/documentation)
- Transformation, from annual crop, non-irrigated, intensive [natural resource, land]: 3.3113 m2; lognormal variance with pedigree 0.0506, pedigree (2,1,5,1,1)
  (same comment as for Occupation, annual crop, non-irrigated, intensive)
- Transformation, to annual crop, non-irrigated, intensive [natural resource, land]: 3.3113 m2; lognormal variance with pedigree 0.0506, pedigree (2,1,5,1,1)
  (same comment as for Occupation, annual crop, non-irrigated, intensive)

## Emissions to nature
- Ammonia [air, non-urban air or from high stacks]: 0.00512292 kg; lognormal variance with pedigree 0.0507, pedigree (2,2,5,1,1)
  Modelled, based on the 'AGRAMMON model' in "01_crop production_direct field emissions and natural resources_v1.0.pdf" - pfd-document on the dedicated talk page of econinvent (www.ecoinvent.og/documentation)
- Carbon dioxide, fossil [air, non-urban air or from high stacks]: 0.029804 kg; lognormal variance with pedigree 0.0407, pedigree (2,2,5,1,1)
  Modelled, see chapter 'Release of fossil CO2 after urea applications' in "01_crop production_assessment methods of direct field emissions_v1.0.pdf" - pdf-document on the dedicated talk page of ecoinvent (www.ecoinvent.org/documentation)
- Dinitrogen monoxide [air, non-urban air or from high stacks]: 0.00143906 kg; name N2O; lognormal variance with pedigree 0.0707, pedigree (2,2,5,1,1)
  Modelled, based on chapter 'Emissions of N2O to the air' in "01_crop production_direct field emissions and natural resources_v1.0.pdf" - pfd-document on the dedicated talk page of econinvent (www.ecoinvent.og/documentation)
- Nitrogen oxides [air, non-urban air or from high stacks]: 0.000302202 kg; = 0.21 * N2O; lognormal variance with pedigree 0.0707, pedigree (2,2,5,1,1)
  Modelled, see chapter 'Emissions of NOx to the air' in "01_crop production_direct field emissions and natural resources_v1.0.pdf" - pdf-document on the dedicated talk page of ecoinvent (www.ecoinvent.org/documentation)
- Water [air, unspecified]: 0.218367 m3; name water_to_air_unspecified; = (water_irrigation_input*fraction_IW_to_air); lognormal variance with pedigree 0.0807, pedigree (2,2,5,1,1)
  Calculated value based on literature values and expert opinion. See comments in the parametres' comment field.
  property fraction, origin: fresh water 1; name fraction_origin_fresh_water
  property fraction, origin: salt water 0; name fraction_origin_salt_water
  property fraction, origin: unspecified 0; name fraction_origin_unspecified
- Cadmium II [soil, agricultural]: 1.5694e-6 kg; lognormal variance with pedigree 0.0807, pedigree (2,2,5,1,1)
  Modelled, see chapter 'Emissions of heavy metals to agricultural soil, surface water and ground water' in "01_crop production_direct field emissions and natural resources_v1.0.pdf" - pdf-document on the dedicated talk page of ecoinvent (www.ecoinvent.org/documentation)
- Carbendazim [soil, agricultural]: 7.9843e-5 kg; lognormal variance with pedigree 0.0507, pedigree (2,2,5,1,1)
  Modelled, see chapter 'Emissions of pesticides to agricultural soil' in "01_crop production_direct field emissions and natural resources_v1.0.pdf" - pdf-document on the dedicated talk page of ecoinvent (www.ecoinvent.org/documentation)
- Chlormequat [soil, agricultural]: 3.9735e-5 kg; lognormal variance with pedigree 0.0507, pedigree (2,2,5,1,1)
  (same comment as for Carbendazim)
- Chromium III [soil, agricultural]: 7.1273e-6 kg; lognormal variance with pedigree 0.0807, pedigree (2,2,5,1,1)
  (same comment as for Cadmium II)
- Clomazone [soil, agricultural]: 1.796e-5 kg; lognormal variance with pedigree 0.0507, pedigree (2,2,5,1,1)
  (same comment as for Carbendazim)
- Copper ion [soil, agricultural]: -3.7361e-7 kg
  (same comment as for Cadmium II)
- Cypermethrin [soil, agricultural]: 9.106e-6 kg; lognormal variance with pedigree 0.0507, pedigree (2,2,5,1,1)
  (same comment as for Carbendazim)
- Deltamethrin [soil, agricultural]: 2.0488e-6 kg; lognormal variance with pedigree 0.0507, pedigree (2,2,5,1,1)
  (same comment as for Carbendazim)
- Difenoconazole [soil, agricultural]: 4.1391e-6 kg; lognormal variance with pedigree 0.0507, pedigree (2,2,5,1,1)
  (same comment as for Carbendazim)
- Dimethachlor [soil, agricultural]: 0.0001166 kg; lognormal variance with pedigree 0.0507, pedigree (2,2,5,1,1)
  (same comment as for Carbendazim)
- Iprodione [soil, agricultural]: 5.2152e-5 kg; lognormal variance with pedigree 0.0507, pedigree (2,2,5,1,1)
  (same comment as for Carbendazim)
- Lambda-cyhalothrin [soil, agricultural]: 2.0488e-6 kg; lognormal variance with pedigree 0.0507, pedigree (2,2,5,1,1)
  (same comment as for Carbendazim)
- Lead II [soil, agricultural]: 1.2601e-7 kg; lognormal variance with pedigree 0.0807, pedigree (2,2,5,1,1)
  (same comment as for Cadmium II)
- Mercury II [soil, agricultural]: -4.1133e-10 kg
  (same comment as for Cadmium II)
- Metaldehyde [soil, agricultural]: 8.4437e-5 kg; lognormal variance with pedigree 0.0507, pedigree (2,2,5,1,1)
  (same comment as for Carbendazim)
- Metazachlor [soil, agricultural]: 5.1523e-5 kg; lognormal variance with pedigree 0.0507, pedigree (2,2,5,1,1)
  (same comment as for Carbendazim)
- Metconazole [soil, agricultural]: 5.2152e-7 kg; lognormal variance with pedigree 0.0507, pedigree (2,2,5,1,1)
  (same comment as for Carbendazim)
- Napropamide [soil, agricultural]: 0.00013363 kg; lognormal variance with pedigree 0.0507, pedigree (2,2,5,1,1)
  (same comment as for Carbendazim)
- Nickel II [soil, agricultural]: 1.2883e-6 kg; lognormal variance with pedigree 0.0807, pedigree (2,2,5,1,1)
  (same comment as for Cadmium II)
- Procymidone [soil, agricultural]: 1.8626e-5 kg; lognormal variance with pedigree 0.0507, pedigree (2,2,5,1,1)
  (same comment as for Carbendazim)
- Quizalofop-ethyl [soil, agricultural]: 2.3841e-6 kg; lognormal variance with pedigree 0.0507, pedigree (2,2,5,1,1)
  (same comment as for Carbendazim)
- Tebuconazole [soil, agricultural]: 6.8295e-6 kg; lognormal variance with pedigree 0.0507, pedigree (2,2,5,1,1)
  (same comment as for Carbendazim)
- Trifluralin [soil, agricultural]: 0.00030517 kg; lognormal variance with pedigree 0.0507, pedigree (2,2,5,1,1)
  (same comment as for Carbendazim)
- Vinclozolin [soil, agricultural]: 6.2086e-6 kg; lognormal variance with pedigree 0.0507, pedigree (2,2,5,1,1)
  (same comment as for Carbendazim)
- Zinc II [soil, agricultural]: 3.2913e-7 kg; lognormal variance with pedigree 0.0807, pedigree (2,2,5,1,1)
  (same comment as for Cadmium II)
- Cadmium II [water, ground-]: 1.533e-8 kg; lognormal variance with pedigree 0.1307, pedigree (2,2,5,1,1)
  (same comment as for Cadmium II)
- Cadmium II [water, surface water]: 9.7935e-9 kg; lognormal variance with pedigree 0.1307, pedigree (2,2,5,1,1)
  (same comment as for Cadmium II)
- Chromium III [water, ground-]: 6.4969e-6 kg; lognormal variance with pedigree 0.1307, pedigree (2,2,5,1,1)
  (same comment as for Cadmium II)
- Chromium III [water, surface water]: 9.8295e-7 kg; lognormal variance with pedigree 0.1307, pedigree (2,2,5,1,1)
  (same comment as for Cadmium II)
- Copper ion [water, ground-]: 9.8287e-7 kg; lognormal variance with pedigree 0.1307, pedigree (2,2,5,1,1)
  (same comment as for Cadmium II)
- Copper ion [water, surface water]: 7.3036e-7 kg; lognormal variance with pedigree 0.1307, pedigree (2,2,5,1,1)
  (same comment as for Cadmium II)
- Lead II [water, ground-]: 2.0447e-8 kg; lognormal variance with pedigree 0.1307, pedigree (2,2,5,1,1)
  (same comment as for Cadmium II)
- Lead II [water, surface water]: 8.8442e-8 kg; lognormal variance with pedigree 0.1307, pedigree (2,2,5,1,1)
  (same comment as for Cadmium II)
- Mercury II [water, ground-]: 1.9653e-11 kg; lognormal variance with pedigree 0.1307, pedigree (2,2,5,1,1)
  (same comment as for Cadmium II)
- Mercury II [water, surface water]: 1.6897e-11 kg; lognormal variance with pedigree 0.1307, pedigree (2,2,5,1,1)
  (same comment as for Cadmium II)
- Nickel II [water, surface water]: 6.6466e-7 kg; lognormal variance with pedigree 0.1307, pedigree (2,2,5,1,1)
  (same comment as for Cadmium II)
- Nitrate [water, ground-]: 0.0695725 kg; lognormal variance with pedigree 0.0807, pedigree (2,2,5,1,1)
  Modelled with the 'SALCA-NO3 model' described in "01_crop production_direct field emissions and natural resources_v1.0.pdf" - pdf-document on the dedicated talk page of ecoinvent (www.ecoinvent.org/documentation)
- Phosphate [water, ground-]: 7.1032e-5 kg; lognormal variance with pedigree 0.0807, pedigree (2,2,5,1,1)
  Modelled, based on chapter 'Emissions of phosphorous to the water' in "01_crop production_direct field emissions and natural resources_v1.0.pdf" - pfd-document on the dedicated talk page of econinvent (www.ecoinvent.og/documentation)
- Phosphate [water, surface water]: 0.00021311 kg; lognormal variance with pedigree 0.0807, pedigree (2,2,5,1,1)
  (same comment as for Phosphate)
- Phosphorus [water, surface water]: 4.1866e-5 kg; lognormal variance with pedigree 0.0807, pedigree (2,2,5,1,1)
  (same comment as for Phosphate)
- Water [water, ground-]: 0.045185 m3; name water_to_water_ground; = water_irrigation_input*(1-fraction_IW_to_air)*fraction_IW_to_ground_water; lognormal variance with pedigree 0.1286, pedigree (4,3,5,1,4)
  Calculated value. See the parameters and their comments to understand the calculation.
  property fraction, origin: fresh water 1; name fraction_origin_fresh_water_Wgw
  property fraction, origin: salt water 0; name fraction_origin_salt_water_Wgw
  property fraction, origin: unspecified 0; name fraction_origin_unspecified_Wgw
- Water [water, surface water]: 0.0112963 m3; name water_to_water_surface; = water_irrigation_input*(1-fraction_IW_to_air)*fraction_IW_to_surface_water; lognormal variance with pedigree 0.1286, pedigree (4,3,5,1,4)
  Calculated value. See the parameters and their comments to understand the calculation.
  property fraction, origin: fresh water 1; name fraction_origin_fresh_water_Wsw
  property fraction, origin: salt water 0; name fraction_origin_salt_water_Wsw
- Zinc II [water, ground-]: 5.0924e-6 kg; lognormal variance with pedigree 0.1307, pedigree (2,2,5,1,1)
  (same comment as for Cadmium II)
- Zinc II [water, surface water]: 1.0187e-6 kg; lognormal variance with pedigree 0.1307, pedigree (2,2,5,1,1)
  (same comment as for Cadmium II)

## Sampling procedure
Data come from a survey in the concerted action GL-Pro of the EU (QLK5-CT-2002-02418). Data were compiled from statistics, pilot networks, fertilising recommendations, documents from extension services, information provided by retailers and expert knowledge. The production data were verified and adjusted by a group of experts in GL-Pro and by other experts.

## Review by Hans-Jörg Althaus 2007-11-07
passed
