# treatment of lignite ash, sanitary landfill

Dataset: EcoSpold 2, unit process
Geography: GLO
Time period: 1994-01-01 to 2023-12-31
Technology level: current
Classification: ISIC rev.4 ecoinvent: 3821:Treatment and disposal of non-hazardous waste
Scenario: Business-as-Usual
System model: Allocation, cut-off by classification
Generated by: Nikolia Stoikou
Database: ecoinvent
isCopyrightProtected: true
accessRestrictedTo: 1

## General comment
This dataset represents the activity of waste disposal of 'lignite ash' in a sanitary landfill. Recommended use of this dataset: For small amounts of lignite ash from small scale furnaces, which go to disposal as part of communal waste mixture. Larger amounts will be landfilled or could be used in building material production. Inventoried waste consists of fraction: 100% lignite ash small scale; . Waste composition (wet, in ppmw): gross heating value 2.578 MJ/kg; H2O na; O 83797; H na; C 100000; S na; N na; P 392; B 2100; Cl na; Br 38.8; F na; I 16.4; Ag na; As 46; Ba 980; Cd 5.49; Co 147; Cr 134.4; Cu 58.5; Hg 0.1; Mn 198; Mo 66.5; Ni 145.5; Pb 47; Sb 38; Se 14; Sn 15.84; V 339.5; Zn 266; Be 9.8; Sc 4.95; Sr 679; Ti 980; Tl 0.19; W na; Si 470400; Fe 52920; Ca 196000; Al 46060; K 5880; Mg 29400; Na 8820. Share of carbon in initial waste waste that is biogenic 0%. Share of metals in waste not oxidised and bulk-recyclable (exclude very small or thin parts) Iron: 0%; Alu: 0%; Copper: 0%. Overall degradability of waste during 100 years: 5%. Landfill gas capture and utilisation generates 0.003793 kWh of electricity and 0.00684 MJ of useful heat. 0.4636 kg waste mass remains in the landfill even after the long term period.

## Included activities start
The activity starts with the waste being available at the gate of the treatment facility. Collection and transportation of the waste to the treatment plant is not included.

## Included activities end
The activity ends with the waste being treated and waste-specific emissions from the landfill are released to the environment (air due to landfil gas, water due to landfil leachate, and subsequent into groundwater).

## Geography
The site has mean annual temperature (MAT) of 16.743579766537 degC, mean annual precipitation (MAP) of 1250.84108527132 mm/year, and net infiltration of 790.252035689178 mm/year.The leachate percolating through the landfill has an average residence time of 6.33 years.
References
UN data, 2020. Precipitation, Environment Statistics Database, United Nations Statistics Division Available at: http://data.un.org/Data.aspx?q=precipitation&d=ENV&f=variableID%3a6;
World Bank, 2022. Surface area (sq.km), World Bank Group Available at: https://data.worldbank.org/indicator/AG.SRF.TOTL.K2;
Doka G.,2021. A model for composition-specific life cycle inventories of regionalised wastewater fates, Zurich, Switzerland. http://www.doka.ch/publications.htm

## Technology
This is an inventory for a sanitary (controlled) landfill for municipal solid waste. Ultimate average landfill height is 20 meters. Operation phase duration is 30 years. The total raw landfill gas mass produced in the landfill from this waste is 0.008923 kg. The total CH4 mass in the raw landfill gas is 0.004854 kg. Percentage of landfill gas directly emitted is 47w%. Percentage of landfill gas captured and flared is 18.02w%. Percentage of landfill gas captured and utilised is 34.98%. Conversion efficiencies are 27.8e% for electricity and 13.5e% for useful heat. Leachate collected during the first 100 years is collected and treated region-specifically before emission. Based on average waste composition and climate data the end of carbonate phase is estimated to be reached 2'863 years after waste deposition.

## Reference product
- lignite ash: -1 kg; By-product classification Waste; CPC 39990: Other wastes n.e.c.
  Main reference product of this activity
  production volume 1.85852e9 kg
    Based on "treatment of lignite ash, municipal incineration" dataset PV (lignite ash incineration PV was calculated as: based on coal usage in residences and small commerce (Exxon 2012), generic split into hard coal and lignite based on demand 2010 (WCA 2012), generic lignite ash content, and a generic global rate of 21.7w% of MSW going to incineration (Pike + UNSD 2012)). The values for "treatment of lignite ash, sanitary landfill" is adjusted for the generic global rate of 67w% MSW sent to landfill (UNSD 2011)(http://unstats.un.org/unsd/environment/wastetreatment.htm, accessed 20151008)
  property heating value, net 21.7 MJ
    Based on literature, page 52, Report 5: Dones, R., Bauer, C., Bolliger, R., Burger, B., faist Emmenegger, M., Frischknecht, R., Heck, T., Jungbluth, N., Röder, A., Tuchschmid, M. (2007) Life Cycle Inventories of Energy Systems: Resulst for current Systems in Switzerland and other UCTE Countries. ecoinvent report No. 5. Paul Scherrer Institut Villigen, Swiss Centre for Life Cycle Inventories, Dübendorf, CH
  property price 0 EUR2005
    Waste products are assigned a price of zero as they are assumed to require further treatment.
  properties: aluminium content 0.04606, antimony content 3.8e-5, arsenic content 4.6e-5, barium content 0.00098, beryllium content 9.8e-6, boron content 0.0021, bromine content 3.88e-5, cadmium content 5.49e-6, calcium content 0.196, carbon allocation 0.1 kg, carbon content 0.1, carbon content, fossil 0.1, carbon content, non-fossil 0, chromium content 0.0001344, cobalt content 0.000147, copper content 5.85e-5, dry mass 1 kg, heating value, gross 2.57767 MJ, hydrogen content 4.69687e-6, iodine content 1.64e-5, iron content 0.05292, lead content 4.7e-5, magnesium content 0.0294, manganese content 0.000198, mercury content 1e-7, molybdenum content 6.65e-5, nickel content 0.0001455, nitrogen content 3.24732e-6, oxygen content 0.083797, phosphorus content 0.000392, potassium content 0.00588, scandium content 4.95e-6, selenium content 1.4e-5, silicon content 0.4704, sodium content 0.00882, strontium content 0.000679, thallium content 1.9e-7, tin content 1.584e-5, titanium content 0.00098, vanadium content 0.0003395, water content 0, water in wet mass 0 kg, wet mass 1 kg, zinc content 0.000266

## Inputs from technosphere
- cast iron: 1.47572e-6 kg; lognormal variance with pedigree 0.32902, pedigree (1,1,4,1,1)
  For sewer auxiliary materials.
  Uncertainty: Uncertainty calculated from uncertainty in base parameters.
  properties: carbon content, fossil 0.04, dry mass 1 kg, wet mass 1 kg
- concrete, 30MPa: 6.31732e-10, 2.93416e-9, 1.24164e-7, 1.22275e-8, 3.01336e-9 m3 (5 suppliers, which the file names only by identifier); sum of these 1.42971e-7 m3; lognormal variance with pedigree 0.32902, pedigree (1,1,4,1,1)
  For leachate collection tanks and sewer pipe.
  Uncertainty: Uncertainty calculated from uncertainty in base parameters.
  properties: dry mass 2205 kg, water content 0.0816327, wet mass 2385 kg
- diesel, burned in building machine: 0.0484106 MJ; lognormal variance with pedigree 0.32902, pedigree (1,1,4,1,1)
  For waste distribution and compaction, construction diesel for base and compartment seals, for access street and sewer construction.
  Uncertainty: Uncertainty calculated from uncertainty in base parameters.
  properties: heating value, net 1 MJ
- electricity, low voltage: 1.50075e-5 kWh; lognormal variance with pedigree 0.028759, pedigree (1,1,4,1,1)
  Administrative building electricity consumption.
  Uncertainty: Uncertainty calculated from uncertainty in base parameters.
- excavation, hydraulic digger: 0.000387939 m3; lognormal variance with pedigree 0.32902, pedigree (1,1,4,1,1)
  Excavation work for landfill construction, sewer construction and recultivation.
  Uncertainty: Uncertainty calculated from uncertainty in base parameters.
- excavation, skid-steer loader: 0.000387939 m3; lognormal variance with pedigree 0.32902, pedigree (1,1,4,1,1)
  (same comment as for excavation, hydraulic digger)
- extrusion, plastic pipes: 8.49814e-5 kg; lognormal variance with pedigree 0.32902, pedigree (1,1,4,1,1)
  For base and interior drain system of landfill, sewer auxiliary materials.
  Uncertainty: Uncertainty calculated from uncertainty in base parameters.
- gravel, round: 4.16578e-5, 0.16018 kg (2 suppliers, which the file names only by identifier); sum of these 0.160222 kg; lognormal variance with pedigree 0.32902, pedigree (1,1,4,1,1)
  For base and flank gravel beds and concrete, for access street, for drainage beds, for recultivation layer.
  Uncertainty: Uncertainty calculated from uncertainty in base parameters.
  properties: dry mass 1 kg, wet mass 1 kg
- heat, district or industrial, other than natural gas: 0.00161108 MJ; lognormal variance with pedigree 0.028759, pedigree (1,1,4,1,1)
  Administrative building space heat demand.
  Uncertainty: Uncertainty calculated from uncertainty in base parameters.
  property corresponding fuel use, propane, furnace >100kW 0 MJ; name fuel_use
  properties: heating value, net 1 MJ
  note on corresponding fuel use, propane, furnace >100kW: Lower heating value of the fuel input related to the heat/electricity output, taken directly from ecoinvent v3.0 dataset "heat production, natural gas, at industrial furnace >100kW, GLO 2000".
- leachate, SLF, lignite ash: -0.00395979 m3
  Landfill leachate captured during short-term sent to wastewater treatment.
  production volume
    calculated in proportion to landfilled waste input
  properties: carbon content, non-fossil 0.00556632, dry mass 1.67028 kg, fossil share of carbon 1, mass concentration, TOC 3.67948e-5 kg/m3, mass concentration, boron 0.000178506 kg/m3, mass concentration, calcium 0.000322404 kg/m3, mass concentration, magnesium 0.000229188 kg/m3, mass concentration, potassium 5.43089e-5 kg/m3, mass concentration, silicon 0.000297051 kg/m3, mass concentration, sodium 0.000461097 kg/m3, water content 597.703, wet mass 1000 kg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
- pitch: 0.00028219, 1.26489e-5, 6.23489e-6, 2.38357e-6, 0.0001094, 1.80575e-5, 0.00159525, 0.000362525 kg (8 suppliers, which the file names only by identifier); sum of these 0.00238869 kg; lognormal variance with pedigree 0.32902, pedigree (1,1,4,1,1)
  For base and compartment seals and access street construction.
  Uncertainty: Uncertainty calculated from uncertainty in base parameters.
  properties: carbon content, fossil 0.83, dry mass 1 kg, heating value, net 28 MJ, wet mass 1 kg
- polyethylene, high density, granulate: 0.000268626 kg; lognormal variance with pedigree 0.32902, pedigree (1,1,4,1,1)
  For base and compartment seals, for base and interior drain system of landfill, sewer auxiliary materials.
  Uncertainty: Uncertainty calculated from uncertainty in base parameters.
  properties: carbon content, fossil 0.857143, dry mass 1 kg, heating value, net 42.47 MJ, wet mass 1 kg
- polypropylene, granulate: 2.23593e-7 kg; lognormal variance with pedigree 0.32902, pedigree (1,1,4,1,1)
  (same comment as for cast iron)
  properties: carbon content, fossil 0.857143, dry mass 1 kg, heating value, net 32.78 MJ, wet mass 1 kg
  note on heating value, net: Value extracted from "treatment of waste polypropylene, open burning"
- polyvinylchloride, bulk polymerised: 2.23593e-7 kg; lognormal variance with pedigree 0.32902, pedigree (1,1,4,1,1)
  (same comment as for cast iron)
  properties: carbon content, fossil 0.387097, dry mass 1 kg, heating value, net 21.5 MJ, wet mass 1 kg
- reinforcing steel: 8.72015e-6 kg; lognormal variance with pedigree 0.32902, pedigree (1,1,4,1,1)
  (same comment as for cast iron)
  properties: carbon content, fossil 0.004, dry mass 1 kg, wet mass 1 kg
- sand: 1.0122e-6, 1.21193e-8, 6.58696e-5, 5.25486e-9 kg (4 suppliers, which the file names only by identifier); sum of these 6.68992e-5 kg; lognormal variance with pedigree 0.32902, pedigree (1,1,4,1,1)
  (same comment as for cast iron)
  properties: dry mass 1 kg, wet mass 1 kg
- steel, chromium steel 18/8, hot rolled: 3.04087e-6 kg; lognormal variance with pedigree 0.32902, pedigree (1,1,4,1,1)
  (same comment as for cast iron)
  properties: carbon content, fossil 0.0008, dry mass 1 kg, wet mass 1 kg
- synthetic rubber: 8.94374e-8 kg; lognormal variance with pedigree 0.32902, pedigree (1,1,4,1,1)
  (same comment as for cast iron)
  properties: carbon content, fossil 0.871949, dry mass 1 kg, heating value, net 26.42 MJ, wet mass 1 kg
- tap water: 0.00185864 kg; lognormal variance with pedigree 0.32902, pedigree (1,1,4,1,1)
  (same comment as for cast iron)
  properties: carbon content, fossil 0.00178991, dry mass 0.000337476 kg, water content 2962.17, wet mass 1 kg

## Inputs from nature
- Organic carbon, placed in landfill [inventory indicator, waste]: 0.100006 kg; lognormal variance with pedigree 0.12932, pedigree (1,1,4,1,1)
  Mass of organic carbon in waste (without inorganic carbon), initially (year 1) put in sanitary landfill. The exchange represents a flow that is within the technosphere. This exchange should only be used to apply ecofactors for the Swiss LCIA method of Ecological Scarcity and not any other purpose.
  Uncertainty: uncertainty is derived from uncertainty in waste composition and flows.
- Waste mass, total, placed in landfill [inventory indicator, waste]: 1.0005 kg
  Mass of waste initially (year 1) put in sanitary landfill. The exchange represents a flow that is within the technosphere. This exchange should only be used to apply ecofactors for the Swiss LCIA method of Ecological Scarcity and not any other purpose.
- Occupation, construction site [natural resource, land]: 0.000250124 m2*year; lognormal variance with pedigree 0.32902, pedigree (1,1,4,1,1)
  For construction phase of the landfill.
  Uncertainty: Uncertainty calculated from uncertainty in base parameters.
- Occupation, dump site [natural resource, land]: 0.00150075 m2*year; lognormal variance with pedigree 0.32902, pedigree (1,1,4,1,1)
  For landfill operation phase.
  Uncertainty: Uncertainty calculated from uncertainty in base parameters.
- Occupation, shrub land, sclerophyllous [natural resource, land]: 0.000250124 m2*year; lognormal variance with pedigree 0.32902, pedigree (1,1,4,1,1)
  Restoration and aftercare phase.
  Uncertainty: Uncertainty calculated from uncertainty in base parameters.
- Occupation, traffic area, road network [natural resource, land]: 0.00185092 m2*year; lognormal variance with pedigree 0.32902, pedigree (1,1,4,1,1)
  For access road.
  Uncertainty: Uncertainty calculated from uncertainty in base parameters.
- Transformation, from dump site, sanitary landfill [natural resource, land]: 5.00249e-5 m2; lognormal variance with pedigree 0.32902, pedigree (1,1,4,1,1)
  Conversion after landfill operation.
  Uncertainty: Uncertainty calculated from uncertainty in base parameters.
- Transformation, from pasture, man made [natural resource, land]: 6.00298e-5 m2; lognormal variance with pedigree 0.32902, pedigree (1,1,4,1,1)
  Original conversion of landfill area and access road.
  Uncertainty: Uncertainty calculated from uncertainty in base parameters.
- Transformation, from shrub land, sclerophyllous [natural resource, land]: 5.00249e-5 m2; lognormal variance with pedigree 0.32902, pedigree (1,1,4,1,1)
  After restoration.
  Uncertainty: Uncertainty calculated from uncertainty in base parameters.
- Transformation, to dump site, sanitary landfill [natural resource, land]: 5.00249e-5 m2; lognormal variance with pedigree 0.32902, pedigree (1,1,4,1,1)
  Conversion to landfill area.
  Uncertainty: Uncertainty calculated from uncertainty in base parameters.
- Transformation, to forest, unspecified [natural resource, land]: 5.00249e-5 m2; lognormal variance with pedigree 0.32902, pedigree (1,1,4,1,1)
  Conversion to forest after renaturation.
  Uncertainty: Uncertainty calculated from uncertainty in base parameters.
- Transformation, to shrub land, sclerophyllous [natural resource, land]: 5.00249e-5 m2; lognormal variance with pedigree 0.32902, pedigree (1,1,4,1,1)
  Initial restoration and renaturation.
  Uncertainty: Uncertainty calculated from uncertainty in base parameters.
- Transformation, to traffic area, road network [natural resource, land]: 1.0005e-5 m2; lognormal variance with pedigree 0.32902, pedigree (1,1,4,1,1)
  Construction of access road.
  Uncertainty: Uncertainty calculated from uncertainty in base parameters.

## Emissions to nature
- Aluminium III [air, non-urban air or from high stacks]: 2.87971e-8 kg; lognormal variance with pedigree 1.8245, pedigree (1,1,4,1,1)
  Emission from direct release or combustion of landfill biogas.
  Uncertainty: Uncertainty calculated from uncertainty of the waste composition of this waste, uncertainty in waste decomposition and short-term leaching in landfill-
- Antimony ion [air, non-urban air or from high stacks]: 5.01537e-11 kg; lognormal variance with pedigree 2.6231, pedigree (1,1,4,1,1)
  (same comment as for Aluminium III)
- Arsenic ion [air, non-urban air or from high stacks]: 5.81142e-9 kg; lognormal variance with pedigree 1.9985, pedigree (1,1,4,1,1)
  (same comment as for Aluminium III)
- Barium II [air, non-urban air or from high stacks]: 1.45065e-8 kg; lognormal variance with pedigree 1.8809, pedigree (1,1,4,1,1)
  (same comment as for Aluminium III)
- Beryllium II [air, non-urban air or from high stacks]: 7.13308e-12 kg; lognormal variance with pedigree 2.8796, pedigree (1,1,4,1,1)
  (same comment as for Aluminium III)
- Bromine [air, non-urban air or from high stacks]: 6.84807e-8 kg; lognormal variance with pedigree 1.6757, pedigree (1,1,4,1,1)
  (same comment as for Aluminium III)
- Cadmium II [air, non-urban air or from high stacks]: 3.23608e-10 kg; lognormal variance with pedigree 2.3812, pedigree (1,1,4,1,1)
  (same comment as for Aluminium III)
- Calcium II [air, non-urban air or from high stacks]: 3.19233e-7 kg; lognormal variance with pedigree 1.5718, pedigree (1,1,4,1,1)
  (same comment as for Aluminium III)
- Carbon dioxide, fossil [air, non-urban air or from high stacks]: 0.0131238 kg; lognormal variance with pedigree 0.32188, pedigree (1,1,4,1,1)
  (same comment as for Aluminium III)
- Carbon monoxide, fossil [air, non-urban air or from high stacks]: 8.00698e-7 kg; lognormal variance with pedigree 0.96886, pedigree (1,1,4,1,1)
  (same comment as for Aluminium III)
- Chromium III [air, non-urban air or from high stacks]: 1.91541e-11 kg; lognormal variance with pedigree 2.7393, pedigree (1,1,4,1,1)
  (same comment as for Aluminium III)
- Cobalt II [air, non-urban air or from high stacks]: 5.95486e-10 kg; lognormal variance with pedigree 2.2982, pedigree (1,1,4,1,1)
  (same comment as for Aluminium III)
- Copper ion [air, non-urban air or from high stacks]: 4.09258e-12 kg; lognormal variance with pedigree 2.9393, pedigree (1,1,4,1,1)
  (same comment as for Aluminium III)
- Heat, waste [air, non-urban air or from high stacks]: 0.0768185 MJ
  Emission from direct release or incineration of landfill biogas.
- Iodine [air, non-urban air or from high stacks]: 2.89455e-8 kg; lognormal variance with pedigree 1.79, pedigree (1,1,4,1,1)
  (same comment as for Aluminium III)
- Iron ion [air, non-urban air or from high stacks]: 9.0888e-9 kg; lognormal variance with pedigree 1.9749, pedigree (1,1,4,1,1)
  (same comment as for Aluminium III)
- Lead II [air, non-urban air or from high stacks]: 4.61588e-12 kg; lognormal variance with pedigree 2.926, pedigree (1,1,4,1,1)
  (same comment as for Aluminium III)
- Magnesium [air, non-urban air or from high stacks]: 2.27082e-7 kg; lognormal variance with pedigree 1.5456, pedigree (1,1,4,1,1)
  (same comment as for Aluminium III)
- Manganese II [air, non-urban air or from high stacks]: 2.94559e-9 kg; lognormal variance with pedigree 2.0918, pedigree (1,1,4,1,1)
  (same comment as for Aluminium III)
- Mercury II [air, non-urban air or from high stacks]: 1.37251e-10 kg; lognormal variance with pedigree 2.4841, pedigree (1,1,4,1,1)
  (same comment as for Aluminium III)
- Methane, fossil [air, non-urban air or from high stacks]: 0.00170312 kg; lognormal variance with pedigree 0.36241, pedigree (1,1,4,1,1)
  (same comment as for Aluminium III)
- Molybdenum VI [air, non-urban air or from high stacks]: 8.78194e-11 kg; lognormal variance with pedigree 2.5486, pedigree (1,1,4,1,1)
  (same comment as for Aluminium III)
- NMVOC, non-methane volatile organic compounds [air, non-urban air or from high stacks]: 1.51483e-8 kg; lognormal variance with pedigree 0.36241, pedigree (1,1,4,1,1)
  (same comment as for Aluminium III)
- Nickel II [air, non-urban air or from high stacks]: 1.05823e-10 kg; lognormal variance with pedigree 2.5212, pedigree (1,1,4,1,1)
  (same comment as for Aluminium III)
- Nitrogen oxides [air, non-urban air or from high stacks]: 2.88279e-10 kg
  Emission from direct release or combustion of landfill biogas.
- Particulate Matter, < 2.5 um [air, non-urban air or from high stacks]: 2.68806e-7 kg; lognormal variance with pedigree 0.62305, pedigree (1,1,4,1,1)
  (same comment as for Aluminium III)
- Potassium I [air, non-urban air or from high stacks]: 5.37932e-8 kg; lognormal variance with pedigree 1.7117, pedigree (1,1,4,1,1)
  (same comment as for Aluminium III)
- Scandium [air, non-urban air or from high stacks]: 5.5816e-12 kg; lognormal variance with pedigree 2.9132, pedigree (1,1,4,1,1)
  (same comment as for Aluminium III)
- Selenium IV [air, non-urban air or from high stacks]: 1.84935e-11 kg; lognormal variance with pedigree 2.7557, pedigree (1,1,4,1,1)
  (same comment as for Aluminium III)
- Silicon [air, non-urban air or from high stacks]: 2.94138e-7 kg; lognormal variance with pedigree 1.6448, pedigree (1,1,4,1,1)
  (same comment as for Aluminium III)
- Sodium I [air, non-urban air or from high stacks]: 4.56642e-7 kg; lognormal variance with pedigree 1.4333, pedigree (1,1,4,1,1)
  (same comment as for Aluminium III)
- Strontium II [air, non-urban air or from high stacks]: 4.93549e-10 kg; lognormal variance with pedigree 2.3173, pedigree (1,1,4,1,1)
  (same comment as for Aluminium III)
- Thallium I [air, non-urban air or from high stacks]: 1.38247e-13 kg; lognormal variance with pedigree 3.3917, pedigree (1,1,4,1,1)
  (same comment as for Aluminium III)
- Tin ion [air, non-urban air or from high stacks]: 1.16683e-12 kg; lognormal variance with pedigree 3.1065, pedigree (1,1,4,1,1)
  (same comment as for Aluminium III)
- Titanium ion [air, non-urban air or from high stacks]: 6.13119e-10 kg; lognormal variance with pedigree 2.2887, pedigree (1,1,4,1,1)
  (same comment as for Aluminium III)
- Vanadium V [air, non-urban air or from high stacks]: 4.48831e-10 kg; lognormal variance with pedigree 2.332, pedigree (1,1,4,1,1)
  (same comment as for Aluminium III)
- Zinc II [air, non-urban air or from high stacks]: 1.40178e-10 kg; lognormal variance with pedigree 2.4824, pedigree (1,1,4,1,1)
  (same comment as for Aluminium III)
- Non-hazardous waste disposed [inventory indicator, waste]: 1.0005 kg
  Inventory indicator for waste mass disposed in landfill. To be used in EN15804 "other data" results.
- Aluminium III [water, ground-, long-term]: 0.0459474 kg; lognormal variance with pedigree 0.20401, pedigree (1,1,4,1,1)
  Emissions from long-term leachate (>100a).
  Uncertainty: Uncertainty calculated from uncertainty of the waste composition of this waste, uncertainty in waste decomposition and short-term leaching in landfill
- Ammonium [water, ground-, long-term]: 2.14057e-16 kg; lognormal variance with pedigree 2.1071, pedigree (1,1,4,1,1)
  (same comment as for Aluminium III)
- Antimony ion [water, ground-, long-term]: 2.52821e-6 kg; lognormal variance with pedigree 2.9332, pedigree (1,1,4,1,1)
  (same comment as for Aluminium III)
- Arsenic ion [water, ground-, long-term]: 5.90704e-6 kg; lognormal variance with pedigree 2.1241, pedigree (1,1,4,1,1)
  (same comment as for Aluminium III)
- BOD5, Biological Oxygen Demand [water, ground-, long-term]: 0.0245989 kg; lognormal variance with pedigree 0.12955, pedigree (1,1,4,1,1)
  Emissions from long-term leachate (>100a).
  Uncertainty: Uncertainty calculated from uncertainty of the waste composition of this waste, uncertainty in waste decomposition and short-term leaching in landfill.
- Barium II [water, ground-, long-term]: 0.000924741 kg; lognormal variance with pedigree 0.66853, pedigree (1,1,4,1,1)
  (same comment as for Aluminium III)
- Beryllium II [water, ground-, long-term]: 9.77282e-6 kg; lognormal variance with pedigree 1.2786, pedigree (1,1,4,1,1)
  (same comment as for Aluminium III)
- Boron [water, ground-, long-term]: 0.00138445 kg; lognormal variance with pedigree 0.57465, pedigree (1,1,4,1,1)
  (same comment as for Aluminium III)
- Bromine [water, ground-, long-term]: 3.38466e-5 kg; lognormal variance with pedigree 1.0972, pedigree (1,1,4,1,1)
  (same comment as for Aluminium III)
- COD, Chemical Oxygen Demand [water, ground-, long-term]: 0.103909 kg; lognormal variance with pedigree 0.12955, pedigree (1,1,4,1,1)
  (same comment as for Aluminium III)
- Cadmium II [water, ground-, long-term]: 5.44345e-6 kg; lognormal variance with pedigree 1.355, pedigree (1,1,4,1,1)
  (same comment as for Aluminium III)
- Calcium II [water, ground-, long-term]: 0.194735 kg; lognormal variance with pedigree 0.074791, pedigree (1,1,4,1,1)
  (same comment as for Aluminium III)
- Chromium VI [water, ground-, long-term]: 3.98789e-7 kg; lognormal variance with pedigree 9.399, pedigree (1,1,4,1,1)
  (same comment as for Aluminium III)
- Cobalt II [water, ground-, long-term]: 0.00014472 kg; lognormal variance with pedigree 0.91879, pedigree (1,1,4,1,1)
  (same comment as for Aluminium III)
- Copper ion [water, ground-, long-term]: 5.84863e-5 kg; lognormal variance with pedigree 1.0414, pedigree (1,1,4,1,1)
  (same comment as for Aluminium III)
- DOC, Dissolved Organic Carbon [water, ground-, long-term]: 0.0950027 kg; lognormal variance with pedigree 0.12955, pedigree (1,1,4,1,1)
  (same comment as for Aluminium III)
- Heat, waste [water, ground-, long-term]: 2.46274 MJ
  Emission from long-term decomposition of waste.
- Iodide [water, ground-, long-term]: 1.43063e-5 kg; lognormal variance with pedigree 1.2115, pedigree (1,1,4,1,1)
  (same comment as for Aluminium III)
- Iron ion [water, ground-, long-term]: 0.0528854 kg; lognormal variance with pedigree 0.18987, pedigree (1,1,4,1,1)
  (same comment as for Aluminium III)
- Lead II [water, ground-, long-term]: 4.69868e-5 kg; lognormal variance with pedigree 1.0705, pedigree (1,1,4,1,1)
  (same comment as for Aluminium III)
- Magnesium [water, ground-, long-term]: 0.028495 kg; lognormal variance with pedigree 0.25173, pedigree (1,1,4,1,1)
  (same comment as for Aluminium III)
- Manganese II [water, ground-, long-term]: 0.000186862 kg; lognormal variance with pedigree 0.87946, pedigree (1,1,4,1,1)
  (same comment as for Aluminium III)
- Mercury II [water, ground-, long-term]: 9.95356e-8 kg; lognormal variance with pedigree 1.8719, pedigree (1,1,4,1,1)
  (same comment as for Aluminium III)
- Molybdenum VI [water, ground-, long-term]: 1.85597e-5 kg; lognormal variance with pedigree 1.4307, pedigree (1,1,4,1,1)
  (same comment as for Aluminium III)
- Nickel II [water, ground-, long-term]: 0.000145087 kg; lognormal variance with pedigree 0.92013, pedigree (1,1,4,1,1)
  (same comment as for Aluminium III)
- Nitrate [water, ground-, long-term]: 2.25115e-17 kg; lognormal variance with pedigree 2.1071, pedigree (1,1,4,1,1)
  (same comment as for Aluminium III)
- Nitrite [water, ground-, long-term]: 1.16505e-17 kg; lognormal variance with pedigree 2.1071, pedigree (1,1,4,1,1)
  (same comment as for Aluminium III)
- Nitrogen, organic bound [water, ground-, long-term]: 3.49862e-16 kg; lognormal variance with pedigree 2.1071, pedigree (1,1,4,1,1)
  (same comment as for Aluminium III)
- Phosphate [water, ground-, long-term]: 8.06378e-5 kg; lognormal variance with pedigree 2.612, pedigree (1,1,4,1,1)
  (same comment as for Aluminium III)
- Potassium I [water, ground-, long-term]: 0.00566532 kg; lognormal variance with pedigree 0.44007, pedigree (1,1,4,1,1)
  (same comment as for Aluminium III)
- Scandium [water, ground-, long-term]: 4.9282e-6 kg; lognormal variance with pedigree 1.3686, pedigree (1,1,4,1,1)
  (same comment as for Aluminium III)
- Selenium IV [water, ground-, long-term]: 2.71599e-6 kg; lognormal variance with pedigree 1.9027, pedigree (1,1,4,1,1)
  (same comment as for Aluminium III)
- Silicon [water, ground-, long-term]: 0.00652685 kg; lognormal variance with pedigree 4.5979, pedigree (1,1,4,1,1)
  (same comment as for Aluminium III)
- Sodium I [water, ground-, long-term]: 0.00699368 kg; lognormal variance with pedigree 0.39287, pedigree (1,1,4,1,1)
  (same comment as for Aluminium III)
- Strontium II [water, ground-, long-term]: 0.000677043 kg; lognormal variance with pedigree 0.71628, pedigree (1,1,4,1,1)
  (same comment as for Aluminium III)
- TOC, Total Organic Carbon [water, ground-, long-term]: 0.0950027 kg; lognormal variance with pedigree 0.12955, pedigree (1,1,4,1,1)
  (same comment as for Aluminium III)
- Thallium I [water, ground-, long-term]: 1.89468e-7 kg; lognormal variance with pedigree 1.7906, pedigree (1,1,4,1,1)
  (same comment as for Aluminium III)
- Tin ion [water, ground-, long-term]: 1.58356e-5 kg; lognormal variance with pedigree 1.215, pedigree (1,1,4,1,1)
  (same comment as for Aluminium III)
- Titanium ion [water, ground-, long-term]: 0.000977657 kg; lognormal variance with pedigree 0.66824, pedigree (1,1,4,1,1)
  (same comment as for Aluminium III)
- Vanadium V [water, ground-, long-term]: 6.81774e-5 kg; lognormal variance with pedigree 1.451, pedigree (1,1,4,1,1)
  (same comment as for Aluminium III)
- Zinc II [water, ground-, long-term]: 0.000265397 kg; lognormal variance with pedigree 0.83999, pedigree (1,1,4,1,1)
  (same comment as for Aluminium III)
