# electricity production, hard coal, supercritical

Dataset: EcoSpold 2, unit process
Geography: ZA
Time period: 2016-04-01 to 2023-03-31
Technology level: modern
Classification: ISIC rev.4 ecoinvent: 3510:Electric power generation, transmission and distribution
Classification: EcoSpold01Categories: hard coal/power plants
Synonyms: bituminous coal
Tags: hard coal power; fossil fuels; coal power
Scenario: Business-as-Usual
System model: Allocation, cut-off by classification
Generated by: Philippa Notten
Published in: Notten P.J. 2017
Database: ecoinvent
isCopyrightProtected: true
accessRestrictedTo: 1

## General comment
This dataset represents the production of high voltage electricity in supercritical pulverised fuel hard coal power plants in South Africa. South Africa's state owned electricity utility, Eskom, is currently constructing two coal-fired power stations to replace some of the older generating capacity (68% of which is over 30 years old). When completed, the new stations, each with 6 units, will have installed capacities of 4,764 and 4,800 MW, respectively. As of November 2017, the one power station had two units in commercial operation (without flue gas desulphurisation (FGD)) and the other, one unit.
Both stations will be dry cooled with dry ashing facilities. In terms of abatement technology both power stations will operate with pulse jet fabric filters, but only the one station will have flue gas desulphurisation (FGD) on commissioning. The other is "FGD ready", with flue gas desulphurisation planned to be rerofitted at the first major overall of the station. Share of units with flue gas desulphurisation is entered as a parameter in the dataset, currently set to one-third. Both stations have low NOx burners but do not have selective catalytic reduction (SCR). Both power stations are dry cooled, with water only required for boiler makeup and for FGD scrubbers, and operate on a policy of zero liquid effluent, i.e. there are no return water flows. The power stations operate water circuits of cascading water quality, with all water either lost as steam leaks, used in ashing or evaporated in storage dams.
This dataset uses technical performance data developed to support South Africa's electricity resource planning process. The technical report by EPRI, considers the coal characteristics and technology to be employed at the power stations, to provide modelled values of key inputs and emissions to the power stations, including coal, water, limestone (for FGD), ash waste and major emissions: carbon dioxide, nitrous oxide, nitrogen oxides, sulphur dioxide and particulates, with the size distribution of particulate emissions taken from the previous ecoinvent electricity production dataset (in which particulate distribution was derived from German data). Mercury emissions are taken from the literature (Garnham & Langeman, 2016) from a study that provides a value for South African coal characteristics and the relevant particulate abatement technology (fabric filters).
All other emissions to air are taken from the existing electricity production from hard coal dataset in ecoinvent. Exchange factors per MJ are derived from production-weighted averages of the exchanges in datasets of 14 countries. These are extrapolated using the net electrical efficiency of the power plant (i.e. to the supercritical conditions of the power plant). The following comments apply to these extapolated emissions:
- Halogene emissions have been estimated on the basis of the content of the species in the country-specific coal input mix, assuming average retention rates.
- For CO emissions average values for the former UCTE are included (Union for the Coordination of the Transmission of Electricity, since 2009 replaced by ENTSO-E European Network of Transmission System Operators for Electricity).
- Emissions of trace elements were calculated by means of a formula (CORINAIR) using the ash content in the country-specific coal input mix and average transfer coefficients for coal power plants, taking into account the share of DeSOx installed.
- Emission of uranium and thorium radioactive isotopes were assumed proportional to the corresponding element emitted with particles; the other non-gaseous radioactive isotopes of the uranium and thorium decay chain were assumed proportional to the emitted U-238 or Th-232.
- The emission of gaseous radon and K-40 are taken from the literature.
No emissions to water are included (no official discharge streams are planned to occur on the power stations). Potential seepage from ash dams and storage ponds are similarly not included due to a lack of data
Sources:
EPRI (2015) Power Generation Technology Data for Integrated Resource Plan of South Africa. EPRI, Palo Alto, CA: 2015
Garnham, B and Langeman, K (2016) Mercury emissions from South Africa’s coal-fired power stations, Clean Air Journal, Vol. 26, No2, 2016. Available at: http://www.cleanairjournal.org.za/download/caj_vol26_no2_2016_p14.pdf
European Environment Agency (1991) CORINAIR Inventory; VOC's Default Emission Factors
[This dataset is meant to replace the following datasets:]

## Included activities start
From the constructed hard coal power plant ready to produce electricity.
From reception of hard coal and operating materials at power plant gate.

## Included activities end
This activity ends with 1kWh of high voltage electricity produced at the power plant and arrival at the busbar.

This dataset includes:
- Inputs of hard coal and outputs of ash waste;
- Inputs of decarbonised water for the cooling circuits and demineralised water for the boiler circuit to make up for water losses;
- Inputs of fuel oil for boiler start-up and stabilisation;
- Particulate removal;
- Emissions to air;
- Power station infrastructure (excludes cooling towers)

This dataset doesn't include
- Raw materials extraction, decommissioning and waste treatment (including ash disposal) as these activities are included in linked datasets
- Transformation of the electricity produced
-Spills and leachate/seepage from water containment dams.

## Geography
This dataset is representative of new build supercritical coal fired power plants in South Africa. Features unique to the South African context are covered, such as dry cooling and coal characteristics (high ash, low calorific value coals).

## Technology
This dataset is representative of new and future build coal-fired power stations in South Africa. Each station is planned to have six 800 MW units. The supercritical pulverised fuel boilers (net efficiency of 37%) are dry cooled with pulse jet fabric filters for particulate control. The stations either have wet limestone flue gas desuphurisation (FGD) on commissioning or this is planned for retrofit. The stations do not have selective catalytic reduction (SCR) for NOx abatement. The stations are planned for base load generation, with a generation load factor of 85%.

## Time period
The share of units with flue gas desulphurisatoin (FGD) will change over the time period (this is entered as a parameter). Currently only one-third of the units have FGD, but ultimately all units will have FGD (estimated to be in 10 years time). The Annual Production Volume is valid for the year 2016 (only one unit in commerical operation). Annual production volume will increase year on year as new units are being brought on line.

## Parameters
- efficiency: 0.36968 dimensionless; = 0.371*(1-fraction_FGD)+0.367*fraction_FGD; lognormal variance with pedigree 0.0018, pedigree (2,3,1,1,1)
  From new build design efficiencies (with and without FGD), weighted according to current share of units with FGD. Source :Power Generation Technology Data for Integrated Resource Plan of South Africa. EPRI, Palo Alto, CA: 2015
- factor: input of MJ for the production of 1 kWh: 9.73815 MJ/kWh; name factor_MJ_kWh; = 1*3.6/efficiency
  Calculated value. 3.6 MJ = 1kWh.
  nan
- fraction, units with desulphurisation: 0.33 dimensionless; name fraction_FGD
  In 2017, three new build units had been brought online from two different power stations currently under construction. Two without flue gas desulphurisation (FGD) and one with FGD. Ultimately this factor will be 1, although the one power station is only being built "FGD ready", whilst the other is being built with FGD. Both power stations will ultimately have 6 units at nominal rating of 800 MW per unit. Whether the units have FGD or not is important because it affects the net plant efficiency (and thus all the emissions where these are calculated using exchange factors per MJ).

## Reference product
- electricity, high voltage: 1 kWh; name electricity; By-product classification allocatable product; CPC 17100: Electrical energy; HS2017 271600: Electrical energy
  This is power sent out from power station, i.e. net power generated after allowing for own use
  production volume 3.19215e9 kWh; name electricity_apv
    Only one new-build unit in commercial operation in 2016. Calculated value, assuming 85% generation load factor (design value) and nominal capacity of 720 MW (installed capacity 794 MW, nominal capacity accounts for own electricity use at power station).
  property price 0.0977 EUR2005
    Temporary price data. Calculated as 90% of purchasers price based on: 94% of the average price (to account for a 6% loss in transformation and transmission) for electricity for industrial consumersin 2005 (excluded taxes). From IEA.
  properties: carbon allocation 0 kg, carbon content 0

## Inputs from technosphere
- SOx retained, in hard coal flue gas desulfurisation: 0.0028842 kg; = 8.74/1000*fraction_FGD; source EPRI 2015; lognormal variance with pedigree 0.0106, pedigree (3,3,3,1,1)
  The one new build power station is being built with a limestone forced oxidation system wet scrubber that will achieve 95% removal of inlet SO2. The SO2 retained is thus calculated as 95% of the SO2 for those units with flue gas desulphurisation (FGD). SO2 emissions from performance characteristics of new build power plants taking into account coal characteristics, boiler technology and coal burn rate. Source :Power Generation Technology Data for Integrated Resource Plan of South Africa. EPRI, Palo Alto, CA: 2015
  properties: dry mass 1 kg, wet mass 1 kg
- hard coal: 0.580377 kg; name hard_coal; = (1*factor_MJ_kWh/hard_coal_CV)/(1-(WWM_coal/wet_mass_coal)); source EPRI 2015; lognormal variance with pedigree 0.0052, pedigree (2,4,3,1,1)
  Specific coal use calculated from energy content of coal (17.85 MJ/kg) used in calculating performance characteristics of new build power stations and thermal efficiency of new build power stations (with and without FGD, weighted according to current share of units with FGD). Source :Power Generation Technology Data for Integrated Resource Plan of South Africa. EPRI, Palo Alto, CA: 2015
  property ash content 0.29434 kg; name hard_coal_ash; = 0.312/(1+(WWM_coal/wet_mass_coal))
  property heating value, net 17.85 MJ; name hard_coal_CV
  property sulfur content 0.0083; name hard_coal_S_content
  property water in wet mass 0.06 kg; name WWM_coal
  property wet mass 1 kg; name wet_mass_coal
  properties: carbon content, fossil 0.47, dry mass 0.94 kg, water content 0.0638298
  note on ash content: Average ash content of coal burnt, adjusted for wet basis. Source: Power Generation Technology Data for Integrated Resource Plan of South Africa. EPRI, Palo Alto, CA: 2015
  note on carbon content, fossil: Source: Power Generation Technology Data for Integrated Resource Plan of South Africa. EPRI, Palo Alto, CA: 2015
- hard coal ash: -0.170698 kg; name amount_ash; = (hard_coal*hard_coal_ash)-(particulates_lt2_5+particulates_gt10+particulates_2_5_to_10); source EPRI 2015; lognormal variance with pedigree 0.0032, pedigree (2,4,1,1,1)
  Total coal ash produced (bottom ash and fly ash) for new build with and without FGD, weighted according to current share of units with FGD. Source: Power Generation Technology Data for Integrated Resource Plan of South Africa. EPRI, Palo Alto, CA: 2015
  production volume; = amount_ash/electricity*electricity_apv
    Calculated from proportion to the respective output amounts.
  property water in wet mass 0.15 kg; name WWM_ash
  properties: carbon content, fossil 0.019, dry mass 0.85 kg, water content 0.176471, wet mass 1 kg
  note on carbon content, fossil: Industry data (average value across multiple power stations, combined coarse and fly ash value)
- hard coal power plant: 5.59585e-12 unit; name hard_coal_power_plant; = 1/ ((365*24*0.85*30)*800*1000); source EPRI 2015; lognormal variance with pedigree 0.4006, pedigree (5,3,5,5,3)
  New build power stations are nominal 800 MW units, design life of 30 years and capacity factor of 85%. Source: Power Generation Technology Data for Integrated Resource Plan of South Africa. EPRI, Palo Alto, CA: 2015).
- light fuel oil: 0.000297 kg; name light_fuel_oil; lognormal variance with pedigree 0.0512, pedigree (2,4,5,1,3)
  Fuel oil use for start ups and stabilsation. Value not specific to new build but based on annual fuel oil use at a single large (6x600 MW) power station in South Africa.
  properties: carbon content, fossil 0.862, dry mass 1 kg, heating value, net 42.6 MJ, wet mass 1 kg
- water, completely softened: 0.0334 kg; name water_boiler_makeup; source EPRI 2015; lognormal variance with pedigree 0.0052, pedigree (2,4,3,1,1)
  Makeup water from new build performance characteristics (without FGD). The new build power stations are dry cooled, with water input only for boiler water make up and flue gas desulphurisation. Source: Power Generation Technology Data for Integrated Resource Plan of South Africa. EPRI, Palo Alto, CA: 2015
  properties: wet mass 1 kg

## Emissions to nature
- 1,1,1-Trichloroethane [air, non-urban air or from high stacks]: 1.6068e-9 kg; name ethane_trichloro; = factor_MJ_kWh*0.000000000165; lognormal variance with pedigree 0.1726, pedigree (3,3,5,5,3)
  Value not specific to South Africa or supercritical power plants. Generic value from previous ecoinvent dataset, with original comment as follows: Literature value/calculated value. Emissions when producing 1kWh of electricity from hard coal, based on the value for burning 1MJ of hard coal. Weighted average with electricity production data (Itten&Frischknecht 2012) and emission values of 14 countries
  (AT, BE, ES, FR, IT, NL, PT, DE, CZ, HR, PL, SK, CN, US) (Röder et al. 2007)
  Country emissions values based on literature.
  Source:
  Itten R. and Frischknecht R. (2012) Life Cycle Inventories of Electricity Mixes and Grid. ESU-services Ltd., Uster, Switzerland.
- Acenaphthene [air, non-urban air or from high stacks]: 4.09002e-11 kg; name acenaphthene; = factor_MJ_kWh*0.0000000000042; lognormal variance with pedigree 0.1726, pedigree (3,3,5,5,3)
  (same comment as for 1,1,1-Trichloroethane)
- Acrolein [air, non-urban air or from high stacks]: 2.32742e-8 kg; name acrolein; = factor_MJ_kWh*0.00000000239; lognormal variance with pedigree 0.3906, pedigree (5,3,5,5,3)
  (same comment as for 1,1,1-Trichloroethane)
- Actinides, radioactive, unspecified [air, non-urban air or from high stacks]: 0.000166522 kBq; name actinides_radioactive_unspecified; = factor_MJ_kWh*0.0000171; lognormal variance with pedigree 0.3526, pedigree (3,3,5,5,3)
  (same comment as for 1,1,1-Trichloroethane)
- Aldehydes, unspecified [air, non-urban air or from high stacks]: 7.62497e-8 kg; name aldehydes_unspecified; = factor_MJ_kWh*0.00000000783; lognormal variance with pedigree 0.1726, pedigree (3,3,5,5,3)
  (same comment as for 1,1,1-Trichloroethane)
- Antimony ion [air, non-urban air or from high stacks]: 1.16858e-8 kg; name antimony; = factor_MJ_kWh*0.0000000012; lognormal variance with pedigree 0.7806, pedigree (5,3,5,5,3)
  Value not specific to South Africa or supercritical power plants. Generic value from previous ecoinvent dataset, with original comment as follows: Literature value/calculated value. Emissions when producing 1kWh of electricity from hard coal, based on the value for burning 1MJ of hard coal. Weighted average with electricity production data (Itten&Frischknecht 2012) and emission values of 14 countries
  (AT, BE, ES, FR, IT, NL, PT, DE, CZ, HR, PL, SK, CN, US) (Röder et al. 2007)
  Country emissions values calculated from trace element balance, input uncertain
  Source:
  Itten R. and Frischknecht R. (2012) Life Cycle Inventories of Electricity Mixes and Grid. ESU-services Ltd., Uster, Switzerland.
- Arsenic ion [air, non-urban air or from high stacks]: 9.70894e-8 kg; name arsenic; = factor_MJ_kWh*0.00000000997; lognormal variance with pedigree 0.7806, pedigree (5,3,5,5,3)
  (same comment as for Antimony ion)
- Barium II [air, non-urban air or from high stacks]: 6.32006e-7 kg; name barium; = factor_MJ_kWh*0.0000000649; lognormal variance with pedigree 0.7806, pedigree (5,3,5,5,3)
  (same comment as for Antimony ion)
- Benzene [air, non-urban air or from high stacks]: 1.3536e-6 kg; name benzene; = factor_MJ_kWh*0.000000139; lognormal variance with pedigree 0.12, pedigree (3,5,5,5,3)
  (same comment as for 1,1,1-Trichloroethane)
- Benzo(a)pyrene [air, non-urban air or from high stacks]: 4.19714e-12 kg; name benzo_a_pyrene; = factor_MJ_kWh*0.000000000000431; lognormal variance with pedigree 0.12, pedigree (3,5,5,5,3)
  (same comment as for 1,1,1-Trichloroethane)
- Beryllium II [air, non-urban air or from high stacks]: 1.6847e-9 kg; name beryllium; = factor_MJ_kWh*0.000000000173; lognormal variance with pedigree 0.7026, pedigree (3,3,5,5,3)
  Value not specific to South Africa or supercritical power plants. Generic value from previous ecoinvent dataset, with original comment as follows: Literature value/calculated value. Emissions when producing 1kWh of electricity from hard coal, based on the value for burning 1MJ of hard coal. Weighted average with electricity production data (Itten&Frischknecht 2012) and emission values of 14 countries
  (AT, BE, ES, FR, IT, NL, PT, DE, CZ, HR, PL, SK, CN, US) (Röder et al. 2007)
  Source:
  Itten R. and Frischknecht R. (2012) Life Cycle Inventories of Electricity Mixes and Grid. ESU-services Ltd., Uster, Switzerland.
- Boron [air, non-urban air or from high stacks]: 3.72971e-6 kg; name boron; = factor_MJ_kWh*0.000000383; lognormal variance with pedigree 0.7806, pedigree (5,3,5,5,3)
  (same comment as for Antimony ion)
- Bromine [air, non-urban air or from high stacks]: 3.04804e-6 kg; name bromine; = factor_MJ_kWh*0.000000313; lognormal variance with pedigree 0.2126, pedigree (3,3,5,5,3)
  (same comment as for Antimony ion)
- Butane [air, non-urban air or from high stacks]: 1.09067e-7 kg; name butane; = factor_MJ_kWh*0.0000000112; lognormal variance with pedigree 0.12, pedigree (3,5,5,5,3)
  (same comment as for 1,1,1-Trichloroethane)
- Cadmium II [air, non-urban air or from high stacks]: 1.01277e-8 kg; name cadmium; = factor_MJ_kWh*0.00000000104; lognormal variance with pedigree 0.7806, pedigree (5,3,5,5,3)
  (same comment as for Antimony ion)
- Carbon dioxide, fossil [air, non-urban air or from high stacks]: 0.93355 kg; name carbon_dioxide_fossil; = 0.9302*(1-fraction_FGD)+0.94035*fraction_FGD; source EPRI 2015; lognormal variance with pedigree 0.0106, pedigree (2,4,3,1,1)
  From new build performance characteristics (with and without FGD), weighted according to current share of units with FGD. Excludes CO2 produced from CaCO3 in FGD units. Source :Power Generation Technology Data for Integrated Resource Plan of South Africa. EPRI, Palo Alto, CA: 2015
- Carbon disulfide [air, non-urban air or from high stacks]: 1.04198e-8 kg; name carbon_disulfide; = factor_MJ_kWh*0.00000000107; lognormal variance with pedigree 0.3526, pedigree (3,3,5,5,3)
  (same comment as for Beryllium II)
- Carbon monoxide, fossil [air, non-urban air or from high stacks]: 8.58905e-5 kg; name carbon_monoxide_fossil; = factor_MJ_kWh*0.00000882; lognormal variance with pedigree 0.714, pedigree (3,4,5,5,3)
  (same comment as for 1,1,1-Trichloroethane)
- Chloroform [air, non-urban air or from high stacks]: 7.86843e-9 kg; name chloroform; = factor_MJ_kWh*0.000000000808; lognormal variance with pedigree 0.1726, pedigree (3,3,5,5,3)
  (same comment as for Beryllium II)
- Chromium III [air, non-urban air or from high stacks]: 7.98528e-8 kg; name chromium; = factor_MJ_kWh*0.0000000082; lognormal variance with pedigree 0.7806, pedigree (5,3,5,5,3)
  (same comment as for Antimony ion)
- Chromium VI [air, non-urban air or from high stacks]: 1.36334e-8 kg; name chromium_vi; = factor_MJ_kWh*0.0000000014; lognormal variance with pedigree 0.5326, pedigree (3,3,5,5,3)
  Value not specific to South Africa or supercritical power plants. Generic value from previous ecoinvent dataset, with original comment as follows: Literature value/calculated value. Emissions when producing 1kWh of electricity from hard coal, based on the value for burning 1MJ of hard coal. Weighted average with electricity production data (Itten&Frischknecht 2012) and emission values of 14 countries
  (AT, BE, ES, FR, IT, NL, PT, DE, CZ, HR, PL, SK, CN, US) (Röder et al. 2007)
  Country emissions values based on range of data.
  Source:
  Itten R. and Frischknecht R. (2012) Life Cycle Inventories of Electricity Mixes and Grid. ESU-services Ltd., Uster, Switzerland.
- Cobalt II [air, non-urban air or from high stacks]: 3.25254e-8 kg; name cobalt; = factor_MJ_kWh*0.00000000334; lognormal variance with pedigree 0.7806, pedigree (5,3,5,5,3)
  (same comment as for Antimony ion)
- Copper ion [air, non-urban air or from high stacks]: 7.99502e-8 kg; name copper; = factor_MJ_kWh*0.00000000821; lognormal variance with pedigree 0.7806, pedigree (5,3,5,5,3)
  (same comment as for Antimony ion)
- Cumene [air, non-urban air or from high stacks]: 4.37243e-10 kg; name cumene; = factor_MJ_kWh*0.0000000000449; lognormal variance with pedigree 0.1726, pedigree (3,3,5,5,3)
  (same comment as for Beryllium II)
- Cyanide [air, non-urban air or from high stacks]: 2.00606e-7 kg; name cyanide; = factor_MJ_kWh*0.0000000206; lognormal variance with pedigree 0.2106, pedigree (5,3,5,5,3)
  (same comment as for Beryllium II)
- Dichloromethane [air, non-urban air or from high stacks]: 2.32742e-8 kg; name methane_dichloro; = factor_MJ_kWh*0.00000000239; lognormal variance with pedigree 0.2106, pedigree (5,3,5,5,3)
  (same comment as for 1,1,1-Trichloroethane)
- Dinitrogen monoxide [air, non-urban air or from high stacks]: 1.39e-5 kg; name dinitrogen_monoxide; lognormal variance with pedigree 0.0501, pedigree (1,2,3,1,3)
  Value not specific to new build, but the average for Eskom's existing fleet of power stations. The figure reported by Eskom is a calculated figure based on power station design parameters, coal characteristics and coal tonnages burnt, and includes coal-fired and gas turbine power stations (burning diesel), as well as oil consumed during power station start-ups. The Eskom figure has been adjusted using the IPCC default N2O emission factor for Gas/Diesel oil combustion in energy industries and the quantity of diesel burnt by Eskom to deduct the N2O emissions from the OCGT power stations. Source: Eskom Integrated Report 31 March 2017, Available at: http://www.eskom.co.za/IR2017/Documents/Eskom_integrated_report_2017.pdf
- Dioxins, measured as 2,3,7,8-tetrachlorodibenzo-p-dioxin [air, non-urban air or from high stacks]: 1.03224e-13 kg; name dioxins; = factor_MJ_kWh*1.06E-14; lognormal variance with pedigree 0.38, pedigree (3,5,5,5,3)
  (same comment as for 1,1,1-Trichloroethane)
- Ethane [air, non-urban air or from high stacks]: 2.36637e-7 kg; name ethane; = factor_MJ_kWh*0.0000000243; lognormal variance with pedigree 0.12, pedigree (3,5,5,5,3)
  (same comment as for 1,1,1-Trichloroethane)
- Ethyl benzene [air, non-urban air or from high stacks]: 7.54707e-9 kg; name benzene_ethyl; = factor_MJ_kWh*0.000000000775; lognormal variance with pedigree 0.1726, pedigree (3,3,5,5,3)
  (same comment as for Beryllium II)
- Ethylene dichloride [air, non-urban air or from high stacks]: 3.20385e-9 kg; name ethane_dichloro; = factor_MJ_kWh*0.000000000329; lognormal variance with pedigree 0.2106, pedigree (5,3,5,5,3)
  (same comment as for 1,1,1-Trichloroethane)
- Formaldehyde [air, non-urban air or from high stacks]: 3.53495e-7 kg; name formaldehyde; = factor_MJ_kWh*0.0000000363; lognormal variance with pedigree 0.12, pedigree (3,5,5,5,3)
  (same comment as for 1,1,1-Trichloroethane)
- Furan [air, non-urban air or from high stacks]: 4.01212e-13 kg; name furan; = factor_MJ_kWh*4.12E-14; lognormal variance with pedigree 0.1726, pedigree (3,3,5,5,3)
  (same comment as for 1,1,1-Trichloroethane)
- Hexane [air, non-urban air or from high stacks]: 5.40467e-9 kg; name hexane; = factor_MJ_kWh*0.000000000555; lognormal variance with pedigree 0.2106, pedigree (5,3,5,5,3)
  (same comment as for 1,1,1-Trichloroethane)
- Hydrocarbons, aliphatic, alkanes, cyclic [air, non-urban air or from high stacks]: 4.6451e-8 kg; name hydrocarbons_al_al_cyclic; = factor_MJ_kWh*0.00000000477; lognormal variance with pedigree 0.1726, pedigree (3,3,5,5,3)
  (same comment as for 1,1,1-Trichloroethane)
- Hydrocarbons, aliphatic, alkanes, unspecified [air, non-urban air or from high stacks]: 1.31465e-6 kg; name hydrocarbons_al_al_unspec; = factor_MJ_kWh*0.000000135; lognormal variance with pedigree 0.12, pedigree (3,5,5,5,3)
  (same comment as for 1,1,1-Trichloroethane)
- Hydrocarbons, aliphatic, unsaturated [air, non-urban air or from high stacks]: 1.24648e-6 kg; name hydrocarbons_aliphatic_unsaturated; = factor_MJ_kWh*0.000000128; lognormal variance with pedigree 0.12, pedigree (3,5,5,5,3)
  (same comment as for 1,1,1-Trichloroethane)
- Hydrocarbons, chlorinated [air, non-urban air or from high stacks]: 1.62627e-8 kg; name hydrocarbons_chlorinated; = factor_MJ_kWh*0.00000000167; lognormal variance with pedigree 0.2106, pedigree (5,3,5,5,3)
  (same comment as for 1,1,1-Trichloroethane)
- Hydrochloric acid [air, non-urban air or from high stacks]: 0.000258061 kg; name hydrogen_chloride; = factor_MJ_kWh*0.0000265; lognormal variance with pedigree 0.2506, pedigree (5,3,5,5,3)
  (same comment as for Antimony ion)
- Hydrogen fluoride [air, non-urban air or from high stacks]: 2.7559e-5 kg; name hydrogen_fluoride; = factor_MJ_kWh*0.00000283; lognormal variance with pedigree 0.2506, pedigree (5,3,5,5,3)
  (same comment as for Antimony ion)
- Iodine [air, non-urban air or from high stacks]: 1.54837e-6 kg; name iodine; = factor_MJ_kWh*0.000000159; lognormal variance with pedigree 0.2506, pedigree (5,3,5,5,3)
  (same comment as for Antimony ion)
- Lead II [air, non-urban air or from high stacks]: 3.61285e-7 kg; name lead; = factor_MJ_kWh*0.0000000371; lognormal variance with pedigree 0.7806, pedigree (5,3,5,5,3)
  (same comment as for Antimony ion)
- Lead-210 [air, non-urban air or from high stacks]: 0.000674854 kBq; name lead_210; = factor_MJ_kWh*0.0000693; lognormal variance with pedigree 0.4306, pedigree (5,3,5,5,3)
  (same comment as for Antimony ion)
- Magnesium [air, non-urban air or from high stacks]: 8.82277e-7 kg; name magnesium; = factor_MJ_kWh*0.0000000906; lognormal variance with pedigree 0.7406, pedigree (5,3,5,5,3)
  (same comment as for 1,1,1-Trichloroethane)
- Manganese II [air, non-urban air or from high stacks]: 3.48626e-7 kg; name manganese; = factor_MJ_kWh*0.0000000358; lognormal variance with pedigree 0.7806, pedigree (5,3,5,5,3)
  (same comment as for Antimony ion)
- Mercury II [air, non-urban air or from high stacks]: 3.01e-8 kg; name mercury; = (0.04*(1-fraction_FGD)+0.01*fraction_FGD)/1000000; lognormal variance with pedigree 0.6552, pedigree (3,3,3,1,2)
  Mercury emissions approximated by Eskom's coal-fired power stations employing fabric filter plants (FFP) for particulate emissions abatement, from a study by Garnham and Langeman (2016). Calculated value based on the amount of coal burnt per annum per power station, the mercury content (ppm) of the coal used at each power and mercury emission reduction factors for fabric filters sourced from the US EPA (2013) and UNEP (2015). The lower end of the range determined for FFPs by Garnham and Langeman is assumed to approximate fabric filters plus wet FGD (the EPA Emissions Reduction Factors is very similar for FFP and FFP+wet FGD) whilst the average value is applied for FFP without FGD. Overall approach is that of ‘Toolkit for Identification and Quantification of Mercury Releases’ (UNEP 2015). Source: Garnham, B and Langeman, K (2016) Mercury emissions from South Africa’s coal-fired power stations, Clean Air Journal, Vol. 26, No2, 2016. Available at: http://www.cleanairjournal.org.za/download/caj_vol26_no2_2016_p14.pdf
- Methane, fossil [air, non-urban air or from high stacks]: 8.78381e-6 kg; name methane_fossil; = factor_MJ_kWh*0.000000902; lognormal variance with pedigree 0.114, pedigree (3,4,5,5,3)
  (same comment as for 1,1,1-Trichloroethane)
- Methylchloride [air, non-urban air or from high stacks]: 4.25557e-8 kg; name methane_monochloro; = factor_MJ_kWh*0.00000000437; lognormal variance with pedigree 0.1726, pedigree (3,3,5,5,3)
  (same comment as for 1,1,1-Trichloroethane)
- Molybdenum VI [air, non-urban air or from high stacks]: 1.11989e-8 kg; name molybdenum; = factor_MJ_kWh*0.00000000115; lognormal variance with pedigree 0.7806, pedigree (5,3,5,5,3)
  (same comment as for Antimony ion)
- NMVOC, non-methane volatile organic compounds [air, non-urban air or from high stacks]: 9.05648e-6 kg; name nmvoc; = factor_MJ_kWh*0.00000093; lognormal variance with pedigree 0.1726, pedigree (3,3,5,5,3)
  (same comment as for 1,1,1-Trichloroethane)
- Nickel II [air, non-urban air or from high stacks]: 1.94763e-7 kg; name nickel; = factor_MJ_kWh*0.00000002; lognormal variance with pedigree 0.7806, pedigree (5,3,5,5,3)
  (same comment as for Antimony ion)
- Nitrogen oxides [air, non-urban air or from high stacks]: 0.0019199 kg; name nitrogen_oxides; = (1.91*(1-fraction_FGD)+(1.94*fraction_FGD))/1000; source EPRI 2015; lognormal variance with pedigree 0.0446, pedigree (2,4,3,1,1)
  From new build performance characteristics (with and without FGD), weighted according to current share of units with FGD. Source :Power Generation Technology Data for Integrated Resource Plan of South Africa. EPRI, Palo Alto, CA: 2015
- PAH, polycyclic aromatic hydrocarbons [air, non-urban air or from high stacks]: 7.29388e-8 kg; name pah; = factor_MJ_kWh*0.00000000749; lognormal variance with pedigree 0.38, pedigree (3,5,5,5,3)
  (same comment as for 1,1,1-Trichloroethane)
- Particulate Matter, < 2.5 um [air, non-urban air or from high stacks]: 3.24e-5 kg; name particulates_lt2_5; source EPRI 2015; lognormal variance with pedigree 0.122, pedigree (4,4,5,5,4)
  From new build performance characteristics (the value is the same with and without FGD). The figure reported is total particulates only, so the size distribution is taken from the existing ecoinvent dataset for electricity production from hard coal (based on German data), i.e. 25% of the particulate emissions are < 2.5um, 72% are > 10 um and 3% are between 2.5 um and 10 um. Source: Power Generation Technology Data for Integrated Resource Plan of South Africa. EPRI, Palo Alto, CA: 2015
- Particulate Matter, > 10 um [air, non-urban air or from high stacks]: 9.37e-5 kg; name particulates_gt10; source EPRI 2015; lognormal variance with pedigree 0.132, pedigree (4,4,5,5,4)
  (same comment as for Particulate Matter, < 2.5 um)
- Particulate Matter, > 2.5 um and < 10um [air, non-urban air or from high stacks]: 3.89e-6 kg; name particulates_2_5_to_10; source EPRI 2015; lognormal variance with pedigree 0.212, pedigree (4,4,5,5,4)
  (same comment as for Particulate Matter, < 2.5 um)
- Pentane [air, non-urban air or from high stacks]: 8.47219e-7 kg; name pentane; = factor_MJ_kWh*0.000000087; lognormal variance with pedigree 0.12, pedigree (3,5,5,5,3)
  (same comment as for 1,1,1-Trichloroethane)
- Phenol [air, non-urban air or from high stacks]: 1.28544e-9 kg; name phenol; = factor_MJ_kWh*0.000000000132; lognormal variance with pedigree 0.1726, pedigree (3,3,5,5,3)
  (same comment as for 1,1,1-Trichloroethane)
- Polonium-210 [air, non-urban air or from high stacks]: 0.00119779 kBq; name polonium_210; = factor_MJ_kWh*0.000123; lognormal variance with pedigree 0.4306, pedigree (5,3,5,5,3)
  (same comment as for Antimony ion)
- Potassium-40 [air, non-urban air or from high stacks]: 0.000223977 kBq; name potassium_40; = factor_MJ_kWh*0.000023; lognormal variance with pedigree 0.4306, pedigree (5,3,5,5,3)
  (same comment as for Antimony ion)
- Propane [air, non-urban air or from high stacks]: 2.0158e-7 kg; name propane; = factor_MJ_kWh*0.0000000207; lognormal variance with pedigree 0.12, pedigree (3,5,5,5,3)
  (same comment as for 1,1,1-Trichloroethane)
- Propylene [air, non-urban air or from high stacks]: 9.22203e-8 kg; name propene; = factor_MJ_kWh*0.00000000947; lognormal variance with pedigree 0.12, pedigree (3,5,5,5,3)
  (same comment as for 1,1,1-Trichloroethane)
- Protactinium-234 [air, non-urban air or from high stacks]: 1.00303e-5 kBq; name protactinium_234; = factor_MJ_kWh*0.00000103; lognormal variance with pedigree 0.3526, pedigree (3,3,5,5,3)
  (same comment as for 1,1,1-Trichloroethane)
- Radium-226 [air, non-urban air or from high stacks]: 0.000178208 kBq; name radium_226; = factor_MJ_kWh*0.0000183; lognormal variance with pedigree 0.3907, pedigree (3,3,5,3,3)
  (same comment as for Antimony ion)
- Radium-228 [air, non-urban air or from high stacks]: 5.75525e-5 kBq; name radium_228; = factor_MJ_kWh*0.00000591; lognormal variance with pedigree 0.4306, pedigree (5,3,5,5,3)
  (same comment as for Antimony ion)
- Radon-220 [air, non-urban air or from high stacks]: 0.00493724 kBq; name radon_220; = factor_MJ_kWh*0.000507; lognormal variance with pedigree 0.4306, pedigree (5,3,5,5,3)
  (same comment as for Antimony ion)
- Radon-222 [air, non-urban air or from high stacks]: 0.0048496 kBq; name radon_222; = factor_MJ_kWh*0.000498; lognormal variance with pedigree 0.4306, pedigree (5,3,5,5,3)
  (same comment as for Antimony ion)
- Selenium IV [air, non-urban air or from high stacks]: 1.6068e-7 kg; name selenium; = factor_MJ_kWh*0.0000000165; lognormal variance with pedigree 0.7806, pedigree (5,3,5,5,3)
  (same comment as for Antimony ion)
- Strontium II [air, non-urban air or from high stacks]: 5.76499e-7 kg; name strontium; = factor_MJ_kWh*0.0000000592; lognormal variance with pedigree 0.7806, pedigree (5,3,5,5,3)
  (same comment as for Antimony ion)
- Styrene [air, non-urban air or from high stacks]: 1.98658e-9 kg; name styrene; = factor_MJ_kWh*0.000000000204; lognormal variance with pedigree 0.1726, pedigree (3,3,5,5,3)
  (same comment as for 1,1,1-Trichloroethane)
- Sulfate [air, non-urban air or from high stacks]: 3.83683e-9 kg; name sulfate; = factor_MJ_kWh*0.000000000394; lognormal variance with pedigree 0.2106, pedigree (5,3,5,5,3)
  (same comment as for 1,1,1-Trichloroethane)
- Sulfur dioxide [air, non-urban air or from high stacks]: 0.0062019 kg; name sulfur_dioxide; = (9.03*(1-fraction_FGD)+(0.46*fraction_FGD))/1000; source EPRI 2015; lognormal variance with pedigree 0.0052, pedigree (2,4,3,1,1)
  From new build performance characteristics (with and without flue gas desulphurisation), weighted according to current share of units with flue gas desulphurisation (FGD). In those units with FGD, a limestone forced oxidation system wet scrubber achieves 95% removal of inlet SO2. Source :Power Generation Technology Data for Integrated Resource Plan of South Africa. EPRI, Palo Alto, CA: 2015
- Tetrachloroethylene [air, non-urban air or from high stacks]: 3.44731e-9 kg; name ethene_tetrachloro; = factor_MJ_kWh*0.000000000354; lognormal variance with pedigree 0.2106, pedigree (5,3,5,5,3)
  (same comment as for 1,1,1-Trichloroethane)
- Thorium-228 [air, non-urban air or from high stacks]: 3.21359e-5 kBq; name throium_228; = factor_MJ_kWh*0.0000033; lognormal variance with pedigree 0.4306, pedigree (5,3,5,5,3)
  (same comment as for Antimony ion)
- Thorium-230 [air, non-urban air or from high stacks]: 1.00303e-5 kBq; name thorium_230; = factor_MJ_kWh*0.00000103; lognormal variance with pedigree 0.3906, pedigree (5,3,5,5,3)
  (same comment as for 1,1,1-Trichloroethane)
- Thorium-232 [air, non-urban air or from high stacks]: 4.70353e-5 kBq; name thorium_232; = factor_MJ_kWh*0.00000483; lognormal variance with pedigree 0.4306, pedigree (5,3,5,5,3)
  (same comment as for Antimony ion)
- Thorium-234 [air, non-urban air or from high stacks]: 1.00303e-5 kBq; name thorium_234; = factor_MJ_kWh*0.00000103; lognormal variance with pedigree 0.3526, pedigree (3,3,5,5,3)
  (same comment as for 1,1,1-Trichloroethane)
- Toluene [air, non-urban air or from high stacks]: 6.47587e-7 kg; name toluene; = factor_MJ_kWh*0.0000000665; lognormal variance with pedigree 0.12, pedigree (3,5,5,5,3)
  (same comment as for 1,1,1-Trichloroethane)
- Uranium-234 [air, non-urban air or from high stacks]: 1.96711e-5 kBq; name uranium_234; = factor_MJ_kWh*0.00000202; lognormal variance with pedigree 0.3906, pedigree (5,3,5,5,3)
  (same comment as for 1,1,1-Trichloroethane)
- Uranium-238 [air, non-urban air or from high stacks]: 0.000154837 kBq; name uranium_238; = factor_MJ_kWh*0.0000159; lognormal variance with pedigree 0.4306, pedigree (5,3,5,5,3)
  (same comment as for Antimony ion)
- Vanadium V [air, non-urban air or from high stacks]: 1.44125e-7 kg; name vanadium; = factor_MJ_kWh*0.0000000148; lognormal variance with pedigree 0.7806, pedigree (5,3,5,5,3)
  (same comment as for Antimony ion)
- Water [air, unspecified]: 4.26179e-5 m3; name water_to_air_unspecified; = (water_boiler_makeup+(hard_coal*(WWM_coal/wet_mass_coal)-amount_ash*WWM_ash))/1000; lognormal variance with pedigree 0.0052, pedigree (2,4,3,1,1)
  Water losses to air are assumed to equal the boiler water makeup, with boiler makeup from new build performance characteristics (without FGD). Water for boiler makeup and FGD are the only water requirements as new build power stations are dry cooled. All water use at the power station is consumptive, i.e. there are no return flows to rivers. In the power station water plants, water use is optimised through cascading water quality cycles. Any remaining water of too poor quality to be used is stored in dams on site. All water loss is therefore assumed to be evaporative, i.e. steam leaks and evaporation from storage ponds. Potential seepage losses from storage ponds are not accounted for due to a lack of data, as are occasional spills from storage dams in high rainfall events. Source :Power Generation Technology Data for Integrated Resource Plan of South Africa. EPRI, Palo Alto, CA: 2015
  property fraction, origin: fresh water 0.047882; name fraction_origin_fresh_water
  property fraction, origin: salt water 0; name fraction_origin_salt_water
  property fraction, origin: unspecified 0.952118; name fraction_origin_unspecified
- Xylenes, unspecified [air, non-urban air or from high stacks]: 5.31703e-6 kg; name xylene; = factor_MJ_kWh*0.000000546; lognormal variance with pedigree 0.12, pedigree (3,5,5,5,3)
  (same comment as for 1,1,1-Trichloroethane)
- Zinc II [air, non-urban air or from high stacks]: 4.05107e-7 kg; name zinc; = factor_MJ_kWh*0.0000000416; lognormal variance with pedigree 0.7806, pedigree (5,3,5,5,3)
  (same comment as for Antimony ion)

## Sampling procedure
Technical performance data (modelled values) taking into account the coal characteristics and technology to be employed at power stations currently under construction, including efficiency, coal, water, limestone (for flue gas desulphurisation), ash waste and major emissions (carbon dioxide, nitrous oxide, nitrogen oxides, sulphur dioxide and particulates). Mercury emissions are taken from the literature (Garnham and Langeman, 2016). Power station infrastructure and all other emissions to air are taken from the existing electricity production from hard coal dataset in ecoinvent (see extrapolation comment). Sources: Power Generation Technology Data for Integrated Resource Plan of South Africa. EPRI, Palo Alto, CA: 2015; Garnham, B and Langeman, K (2016) Mercury emissions from South Africa’s coal-fired power stations, Clean Air Journal, Vol. 26, No2, 2016. Available at: http://www.cleanairjournal.org.za/download/caj_vol26_no2_2016_p14.pdf

## Extrapolations
Emissions to air other than CO2, N2O, NOx, SOx, particulates and Hg are taken from the existing ecoivent dataset, where the following comments apply:

Data from 1993 were updated for the years 2000 (v1.0), and 2004-2005 (v2.0). Uncertainty was adjusted accordingly.

Most of the exchanges were extrapolated through production-weighted averages of the datasets of the following 14 countries: AT, BE, ES, FR, IT, NL, PT, DE, CZ, HR, PL, SK, CN, US.

The original data were valid for the burning of 1MJ of hard coal. In this dataset, the values are scaled to the net output of 1kWh of electricity, based on the electrical efficiency.

## Review by Christian Bauer 2017-12-07
passed
