# greenhouse construction, plastic walls and roof, metal tubes

Dataset: EcoSpold 2, unit process
Geography: RoW
Time period: 2005-01-01 to 2023-12-31
Technology level: current
Classification: ISIC rev.4 ecoinvent: 4100:Construction of buildings
Tags: WFLDB
Scenario: Business-as-Usual
System model: Allocation, cut-off by classification
Generated by: [System]
Database: ecoinvent
isCopyrightProtected: true
accessRestrictedTo: 1

## General comment
This global dataset is a copy of the regional FR dataset, except for the following modifications.
The production volume represents the global annual production.
The geographicalCorrelation score of every pedigree matrix of was changed to '5'.
The comments below were part of the FR regional dataset.
This dataset represents the production and dismantling of 1 m2 of greenhouse with plastic walls and roof and metal tubes.
This double-layer air-inflated film greenhouse is made of a structure of galvanized steel, covered with a double EVA (ethylene vinyl acetate) copolymer sheet. The plastic cover must be replaced every 4 years. The greenhouse structure lifetime is minimally 25 years. It comprises of a heating system and fume condenser. Such greenhouses represent recent technology (after 2002) and typically cover large surfaces (7 ha in average). A network of polypropylene pipes is used to deliver heat (hot water at 50-80°C), on the ground (thermo-siphon) and at the height of the plants (growth pipes). A boiler is used to store hot water. CO2 from combustion is recovered and injected again into the greenhouse as to increase photosynthesis. The greenhouse also includes a fertigation system made of a network of polyethylene pipes. Other auxiliary facilities are also considered.

## Included activities start
This activity starts with the production of materials used to build the greenhouse and permanent technical infrastructure.

## Included activities end
This dataset includes the production of the greenhouse as well as the permanent technical infrastructure. For the greenhouse are included its bearing structure (steel and aluminum tubes) and covering materials (plastic covers). Technical infrastrctucture includes heating and cooling systems, fertigation system, CO2 injection system, storage facilities and permanent working equipments such as trolley systems.
The activity ends with the disposal and recycling of all the materials.

## Time period
Time period referring to the data source: 2005-2009. Based on expert opinion data is considered to be valid at least up to 2012.

## Reference product
- greenhouse, plastic walls and roof: 1 m2*year; name RP; By-product classification allocatable product; CPC 38703: Prefabricated buildings, of plastics
  production volume 3.81304 m2*year; name RP_PV
    This is a placeholder value that does not reflect real-world production volumes. This dataset does not currently require a real-world production volume to work in the database framework, and no actual data were collected yet. This has no negative effect on the results of the ecoinvent database.
  property price 0.934765 EUR2005
    Calculated based on inputs: The price of the product has been calculated as a sum of the values of the material and energy inputs for this product. This value is therefore a rough estimation. It may underestimate the real price since there are additional expenses when producing any product. These expences can include for example labour costs, treatment of waste materials and profit for the producer. Please consider carefully whether this level of data quality is acceptable for your application.
  properties: carbon allocation 0 kg, carbon content 0, lifetime 25 year

## Inputs from technosphere
- acrylic varnish, with water, in 53% solution state: 0.00111111 kg; lognormal variance with pedigree 0.374402, pedigree (5,5,5,5,5)
  Literature data and primary data from French manufacturers (Boulard et al, 2011). Paint protection.
  properties: carbon content, fossil 0.2066, dry mass 0.53 kg, heating value, net 20.44 MJ, water content 0.883983, wet mass 1 kg
- agricultural machinery, unspecified: 0.0076 kg; lognormal variance with pedigree 0.374402, pedigree (5,5,5,5,5)
  Literature data and primary data from French manufacturers (Boulard et al, 2011). Ramp for the soil preparation system.
- aluminium scrap, post-consumer: -0.0064 kg; name ByP_01
  Aluminum components sent to treatment
  production volume; = ABS(ByP_01/ RP* RP_PV)
    Calculated from reference product production volume, reference product amount and byproduct amount.
  properties: dry mass 1 kg, price 0.685 EUR2005, wet mass 1 kg
- aluminium, cast alloy: 0.0064 kg; lognormal variance with pedigree 0.374402, pedigree (5,5,5,5,5)
  Literature data and primary data from French manufacturers (Boulard et al, 2011). Aluminum in the greenhouse structure.
  properties: dry mass 1 kg, wet mass 1 kg
- bitumen seal: 0.0001 kg; lognormal variance with pedigree 0.374402, pedigree (5,5,5,5,5)
  Literature data and primary data from French manufacturers (Boulard et al, 2011). Cement sealing in the greenhouse structure.
  properties: carbon content, fossil 0.643968, dry mass 1 kg, heating value, net 39.33 MJ, wet mass 1 kg
  note on heating value, net: Value taken from the general comment of the treatment dataset.
- blow moulding: 0.00316667 kg; lognormal variance with pedigree 0.374402, pedigree (5,5,5,5,5)
  Literature data and primary data from French manufacturers (Boulard et al, 2011). Tanks for the fertigation system.
- calendering, rigid sheets: 0.01 kg; lognormal variance with pedigree 0.374402, pedigree (5,5,5,5,5)
  Literature data and primary data from French manufacturers (Boulard et al, 2011). Cladding materials.
- concrete block: 0.00181883, 0.000171184, 0.104176, 0.000823823 kg (4 suppliers, which the file names only by identifier); sum of these 0.10699 kg; lognormal variance with pedigree 0.374402, pedigree (5,5,5,5,5)
  Literature data and primary data from French manufacturers (Boulard et al, 2011). Mechanical room part of for the storage system.
  properties: dry mass 1 kg, wet mass 1 kg
- concrete, normal strength: 0.000383003 m3; lognormal variance with pedigree 0.374402, pedigree (5,5,5,5,5)
  Literature data and primary data from French manufacturers (Boulard et al, 2011). Walls and mechanical room.
  properties: dry mass 2190 kg, water content 0.086758, wet mass 2380 kg
- copper, cathode: 0.000648 kg; lognormal variance with pedigree 0.374402, pedigree (5,5,5,5,5)
  Literature data and primary data from French manufacturers (Boulard et al, 2011). Cables and wires for the greenhouse structure.
  properties: dry mass 1 kg, wet mass 1 kg
- diesel, burned in building machine: 0.373733 MJ; lognormal variance with pedigree 0.374402, pedigree (5,5,5,5,5)
  Literature data and primary data from French manufacturers (Boulard et al, 2011). Energy for building the greenhouse and retention pond.
  properties: heating value, net 1 MJ
- drawing of pipe, steel: 0.32 kg; lognormal variance with pedigree 0.374402, pedigree (5,5,5,5,5)
  Literature data and primary data from French manufacturers (Boulard et al, 2011). Tubes and siphons for the heating system.
- electricity, low voltage: 0.00230922, 2.31845e-5, 0.000698816, 5.14005e-7, 8.10254e-5, 0.000166368, 7.80814e-5, 1.92752e-5, 0.00010308, 6.08073e-6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 kWh (47 suppliers, which the file names only by identifier); sum of these 0.05972 kWh; lognormal variance with pedigree 0.374402, pedigree (5,5,5,5,5)
  Literature data and primary data from French manufacturers (Boulard et al, 2011). Electricity for manufacturing of the greenhouse structure.
- electronics, for control units: 1.6e-5 kg; lognormal variance with pedigree 0.374402, pedigree (5,5,5,5,5)
  Literature data and primary data from French manufacturers (Boulard et al, 2011). Control unit for the greenhouse structure.
  properties: carbon content, fossil 0.337146, carbon content, non-fossil 0.00013442, dry mass 1 kg, wet mass 1 kg
- ethylene vinyl acetate copolymer: 0.122222 kg; lognormal variance with pedigree 0.374402, pedigree (5,5,5,5,5)
  Literature data and primary data from French manufacturers (Boulard et al, 2011). Plastic covers for the greenhouse structure.
  properties: carbon content, fossil 0.79734, dry mass 1 kg, heating value, net 35.99 MJ, wet mass 1 kg
- extrusion, plastic film: 0.169822 kg; lognormal variance with pedigree 0.374402, pedigree (5,5,5,5,5)
  Literature data and primary data from French manufacturers (Boulard et al, 2011). Mulch film.
- extrusion, plastic pipes: 0.0440556 kg; lognormal variance with pedigree 0.374402, pedigree (5,5,5,5,5)
  Literature data and primary data from French manufacturers (Boulard et al, 2011). Pipes for the fertigation system.
- gas motor, 206kW: 6.2e-10 unit; lognormal variance with pedigree 0.374402, pedigree (5,5,5,5,5)
  Literature data and primary data from French manufacturers (Boulard et al, 2011). Generating set for the heating system.
- glass fibre reinforced plastic, polyamide, injection moulded: 8e-5 kg; lognormal variance with pedigree 0.374402, pedigree (5,5,5,5,5)
  Literature data and primary data from French manufacturers (Boulard et al, 2011). Electrical gear.
  properties: carbon content, fossil 0.446018, dry mass 1 kg, wet mass 1 kg
- heat and power co-generation unit, 200kW electrical, diesel SCR, components for electricity only: 6.2e-10 unit; lognormal variance with pedigree 0.374402, pedigree (5,5,5,5,5)
  (same comment as for gas motor, 206kW)
- injection moulding: 0.0211311 kg; lognormal variance with pedigree 0.374402, pedigree (5,5,5,5,5)
  Literature data and primary data from French manufacturers (Boulard et al, 2011). Taps, gutters and stoppers for the fertigation system. Clips and joints for the greenhouse structure.
- iron scrap, unsorted: -0.605 kg; name ByP_04
  Steel and chromium steel components sent to treatment
  production volume; = ABS(ByP_04/ RP* RP_PV)
    (same comment as for aluminium scrap, post-consumer)
  properties: dry mass 1 kg, price 0.149 EUR2005, wet mass 1 kg
- oil boiler, 100kW: 1.8612e-6 unit; lognormal variance with pedigree 0.374402, pedigree (5,5,5,5,5)
  Literature data and primary data from French manufacturers (Boulard et al, 2011). Boiler for the heating system.
- polycarbonate: 0.01 kg; lognormal variance with pedigree 0.374402, pedigree (5,5,5,5,5)
  (same comment as for calendering, rigid sheets)
  properties: carbon content, fossil 0.755906, dry mass 1 kg, heating value, net 29.57 MJ, wet mass 1 kg
- polyester resin, unsaturated: 0.00136364 kg; lognormal variance with pedigree 0.374402, pedigree (5,5,5,5,5)
  Literature data and primary data from French manufacturers (Boulard et al, 2011). Roofing membrane.
  properties: carbon content, fossil 0.58584, dry mass 1 kg, heating value, net 17.75 MJ, wet mass 1 kg
- polyethylene, high density, granulate: 0.0475 kg; lognormal variance with pedigree 0.374402, pedigree (5,5,5,5,5)
  (same comment as for extrusion, plastic pipes)
  properties: carbon content, fossil 0.857143, dry mass 1 kg, heating value, net 42.47 MJ, wet mass 1 kg
- polyethylene, linear low density, granulate: 0.0476 kg; lognormal variance with pedigree 0.374402, pedigree (5,5,5,5,5)
  Literature data and primary data from French manufacturers (Boulard et al, 2011). Thermal screen for the cooling system.
  properties: carbon content, fossil 0.857143, dry mass 1 kg, heating value, net 42.47 MJ, wet mass 1 kg
- polymer foaming: 0.0049 kg; lognormal variance with pedigree 0.374402, pedigree (5,5,5,5,5)
  Literature data and primary data from French manufacturers (Boulard et al, 2011). Plastic bags part of for the support system.
- polypropylene, granulate: 0.00032 kg; lognormal variance with pedigree 0.374402, pedigree (5,5,5,5,5)
  Literature data and primary data from French manufacturers (Boulard et al, 2011). PP sleeves.
  properties: carbon content, fossil 0.857143, dry mass 1 kg, heating value, net 32.78 MJ, wet mass 1 kg
  note on heating value, net: Value extracted from "treatment of waste polypropylene, open burning"
- polystyrene, expandable: 0.0049 kg; lognormal variance with pedigree 0.374402, pedigree (5,5,5,5,5)
  (same comment as for polymer foaming)
  properties: carbon content, fossil 0.923077, dry mass 1 kg, heating value, net 38.67 MJ, wet mass 1 kg
- polyvinylfluoride: 0.0213854 kg; lognormal variance with pedigree 0.374402, pedigree (5,5,5,5,5)
  Literature data and primary data from French manufacturers (Boulard et al, 2011). Cables, wires, joints and clips for the greenhouse structure.
  properties: carbon content, fossil 0.521739, dry mass 1 kg, heating value, net 23.7 MJ, wet mass 1 kg
- section bar extrusion, aluminium: 0.0064 kg; lognormal variance with pedigree 0.374402, pedigree (5,5,5,5,5)
  Literature data and primary data from French manufacturers (Boulard et al, 2011). Roof structure.
- section bar rolling, steel: 0.225949 kg; lognormal variance with pedigree 0.374402, pedigree (5,5,5,5,5)
  Literature data and primary data from French manufacturers (Boulard et al, 2011). Poles and trellis for the greenhouse structure.
- sheet rolling, steel: 0.03552 kg; lognormal variance with pedigree 0.374402, pedigree (5,5,5,5,5)
  Literature data and primary data from French manufacturers (Boulard et al, 2011). Roofing.
- silicone product: 0.00012 kg; lognormal variance with pedigree 0.374402, pedigree (5,5,5,5,5)
  Literature data and primary data from French manufacturers (Boulard et al, 2011). Silicone.
  properties: carbon content, fossil 0.324324, dry mass 1 kg, heating value, net 9.83 MJ, wet mass 1 kg
- steel, chromium steel 18/8: 0.0344 kg; lognormal variance with pedigree 0.374402, pedigree (5,5,5,5,5)
  Literature data and primary data from French manufacturers (Boulard et al, 2011). Bolting for the greenhouse structure.
  properties: carbon content, fossil 0.0008, dry mass 1 kg, wet mass 1 kg
- steel, low-alloyed: 0.570559 kg; lognormal variance with pedigree 0.374402, pedigree (5,5,5,5,5)
  (same comment as for section bar rolling, steel)
  properties: carbon content, fossil 0.005, dry mass 1 kg, wet mass 1 kg
- synthetic rubber: 0.0003 kg; lognormal variance with pedigree 0.374402, pedigree (5,5,5,5,5)
  Literature data and primary data from French manufacturers (Boulard et al, 2011). Tubes for the soil preparation system.
  properties: carbon content, fossil 0.871949, dry mass 1 kg, heating value, net 26.42 MJ, wet mass 1 kg
- tractor, 4-wheel, agricultural: 0.0152 kg; lognormal variance with pedigree 0.374402, pedigree (5,5,5,5,5)
  Literature data and primary data from French manufacturers (Boulard et al, 2011). Tractor.
- waste concrete: -0.951264, -0.000246724 kg (2 suppliers, which the file names only by identifier); sum of these -0.951511 kg
  Concrete components sent to treatment
  production volume; = ABS(ByP_05/ RP* RP_PV)
    Calculated from production volume of reference product using the relative outputs.
  properties: dry mass 0.5 kg, water content 1, wet mass 1 kg
- waste electric and electronic equipment: -0.000664 kg; name ByP_07
  Electric and electronic components sent to treatment
  production volume; = ABS(ByP_07/ RP* RP_PV)
    Calculated from production volume of reference product using the relative outputs.
  properties: carbon content, fossil 0.0877555, carbon content, non-fossil 0.000485011, dry mass 1 kg, wet mass 1 kg
- waste plastic, mixture: -3.49195e-5, -6.15679e-6, -3.63179e-6, -2.40964e-5, -2.17199e-6, -2.24282e-6, -5.81288e-6, -2.0776e-6, -2.50814e-6, -2.42577e-5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 kg (42 suppliers, which the file names only by identifier); sum of these -0.1331 kg
  Plastic components sent to treatment
  production volume; = ABS(ByP_03/ RP* RP_PV)
    (same comment as for aluminium scrap, post-consumer)
  properties: carbon content, fossil 0.747344, dry mass 0.847 kg, heating value, net 30.79 MJ, water content 0.180638, wet mass 1 kg
- waste polyvinylchloride: -0.000185675, -0.000164961, -3.20196e-5, -2.34239e-5, -9.74431e-6, -1.40154e-5, -2.16573e-6, -3.7515e-5, -3.50695e-6, -2.41189e-5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 kg (42 suppliers, which the file names only by identifier); sum of these -0.122 kg
  Etylene vinyl acetate copolymer (plastic covers) sent to treatment
  production volume; = ABS(ByP_02/ RP* RP_PV)
    (same comment as for aluminium scrap, post-consumer)
  properties: carbon content, fossil 0.440882, dry mass 0.998 kg, heating value, net 21.51 MJ, water content 0.00200401, wet mass 1 kg
- waste rubber, unspecified: -7.72513e-6, -0.000292275 kg (2 suppliers, which the file names only by identifier); sum of these -0.0003 kg
  Synthetic rubber sent to treatment
  production volume; = ABS(ByP_06/ RP* RP_PV)
    Calculated from production volume of reference product using the relative outputs.
  properties: carbon content, fossil 0.853, dry mass 1 kg, heating value, net 27.19 MJ, wet mass 1 kg
- wire drawing, copper: 0.0018 kg; lognormal variance with pedigree 0.374402, pedigree (5,5,5,5,5)
  (same comment as for copper, cathode)
- zinc coat, coils: 0.0234405 m2; lognormal variance with pedigree 0.374402, pedigree (5,5,5,5,5)
  (same comment as for section bar rolling, steel)

## Sampling procedure
Dataset is adapted from AGRIBALYSE 1.2 database, with land occupation and transformation flows removed (these are accounted for in the crop datasets). Data was collected from French manufacturers and reported in Boulard et al. (2011).
Translated name: Serre double parrois gonflee, Nord.

## Extrapolations
The amount of the exchanges are copy from a regional dataset.
