# liquefied petroleum gas, import from RoW

Dataset: EcoSpold 2, unit process
Geography: Europe without Switzerland
Time period: 2014-01-01 to 2023-12-31
Technology level: current
Classification: ISIC rev.4 ecoinvent: 1920:Manufacture of refined petroleum products
Scenario: Business-as-Usual
System model: Allocation, cut-off by classification
Generated by: Florentine Brunner
Published in: Fehrenbach, H. 2018
Database: ecoinvent
isCopyrightProtected: true
accessRestrictedTo: 1

## General comment
This dataset represents the import of a refined petroleum products of unspecified geographical origin (as proxy for geographies in which no liquefied petroleum gas production is available in ecoinvent) of supply to the domestic/regional market for this product. The transport requirements (expressed in tkm) with tanker ship was assumed to 10'000 km by sea by default. No product losses or other aspects, besides transport requirements have been included. The dataset is only a rough proxy with large uncertainties, and it should hence be revised accordingly if its contribution is expected to be important.

## Included activities start
Activity starts with transport by sea of a refined petroleum product of unspecified geographical origin.

## Included activities end
Activity ends with the refined petroleum product entering the domestic/regional market.

## Reference product
- liquefied petroleum gas: 1 kg; By-product classification allocatable product; CPC 334: Petroleum gases and other gaseous hydrocarbons, except natural gas; HS2017 2711: Petroleum gases and other gaseous hydrocarbons; CAS 68476-85-7
  production volume 2.35646e10 kg
    According to the Eurostat database, roughly 50% (in the range of 53.3%-63.2% of total trade quantities between 2010-2016) of LPG is imported to EU28 from outside (excluding Norway and Switzerland) the Union. Therefore, it is assumed that the import volume is equal to the domestic production volume.
    Domestic production volume of 23564563882 kg, see dataset "liquefied petroleum gas production petroleum refinery operation, Europe without Switzerland, 2014-2017": "Calculated value. The production volume was calculated based on the total refinery intake in 2016 and the proportionate product output modelled in the ifeu tool. According to the applied model, on average 38.5 kg liquefied petroleum gas are produced per tonne of crude oil intake in European refineries. The total refinery intake in 2016 was 6.11E+11kg of crude oil (BP, 2017).
    Mind that this calculated value may differ from the actual production volume reported in statistics."
    Reference(s):
    BP, 2017, BP Statistical Review 2017, accessed online at https://www.bp.com/content/dam/bp-country/de_ch/PDF/bp-statistical-review-of-world-energy-2017-full-report.pdf, February 2019
    Eurostat database, EU trade since 1988 by HS6 (DS-016893), HS6-code: G_271112, Assessed on: 2018-01-09.
  property heating value, net 45.5 MJ
    Indicative value. Reference: Fuels - Higher and Lower Calorific Values, available at: https://www.engineeringtoolbox.com/fuels-higher-calorific-values-d_169.html
  property price 0.276 EUR2005
    Temporary price data. Calculated as 90% of purchasers price based on: Average 2004 prices for EU27 from UN Commodity Trade Statistics Database - Average of Propane and butane (http://data.un.org/Data.aspx?q=Butanes+&d=ComTrade&f=_l1Code%3a28%3bcmdCode%3a271113 and http://data.un.org/Data.aspx?q=propane&d=ComTrade&f=_l1Code%3a28%3bcmdCode%3a271112; accessed 1 June 2010).
  properties: carbon allocation 0.821863 kg, carbon content 0.821863, carbon content, fossil 0.821863, carbon content, non-fossil 0, dry mass 1 kg, water content 0, water in wet mass 0 kg, wet mass 1 kg

## Inputs from technosphere
- liquefied petroleum gas: 1 kg
  Unspecified geographical origin of supply assumed due to lack of information on actual origin or missing corresponding supplying activity.
  properties: carbon content, fossil 0.821863, dry mass 1 kg, heating value, net 45.5 MJ, wet mass 1 kg
  note on heating value, net: Indicative value. Reference: Fuels - Higher and Lower Calorific Values, available at: https://www.engineeringtoolbox.com/fuels-higher-calorific-values-d_169.html
- transport, freight, sea, tanker for liquefied natural gas: 10 metric ton*km; lognormal variance with pedigree 0.33, pedigree (5,5,5,5,5)
  A transport distance of 10'000 km by sea assumed by default.
