# core board production

Dataset: EcoSpold 2, unit process
Geography: RoW
Time period: 2000-01-01 to 2023-12-31
Technology level: current
Classification: ISIC rev.4 ecoinvent: 1701:Manufacture of pulp, paper and paperboard
Classification: EcoSpold01Categories: paper & cardboard/packaging papers
Tags: ConvertedDataset
Scenario: Business-as-Usual
System model: Allocation, cut-off by classification
Generated by: Roland Hischier
Published in: Hischier R. 2007
Database: ecoinvent
isCopyrightProtected: true
accessRestrictedTo: 1

## General comment
This dataset is an Identical copy of corresponding RER dataset. The functional unit represent 1 kg of core board, as produced in a modern core board mill. A coreboard is a core made from board which is used as packaging material for paper sold on rolls. Coreboards are made from recycled pulp which is assumed to be produced on-site without addition of any chemicals. The waste paper used for the recycling process is mainly
corrugated carboard and household waste paper. Additionally, starch and semi-chemical pulp are used to improve strength of the coreboard. It is assumed that the semi-chemical pulp is produced on-site out of birch wood chips without the addition of any bleaching chemicals.
The main sources for the dataset are the Corporate Environmental Reports from a Finnish coreboard producer (Corenso (2000) and Corenso (2001)).
References:
Corenso (2000) Environmental Statement 1999 Pori Coreboard Mill. Corenso United Oy Ltd, Pori (Finland) as pdf-File under:
http://www.storaenso.com/CDAvgn/main/0,,1_-2393-2097-,00.html
Corenso (2001) EMAS Environmental Statement Update for the Year 2000 Pori Coreboard Mill. Corenso United Oy Ltd, Pori (Finland) as pdf-File under: http://www.storaenso.com/CDAvgn/main/0,,1_-2393-2097-,00.html

## Included activities start
This activity starts with the reception of the raw materials, such as waste paper, starch and pulpwood.

## Included activities end
The dataset includes material input, water (cooling & process) consumption, energy consumption, emissions to air and water. Estimations for infrastructure. No waste reported.

## Geography
Data based on one finnish plant from Corenso Ltd. Representing here average European data.

## Technology
Data based on the state-of-the-art technology in Finnland in the 2000s.

## Time period
Data represent the average technology in the late 1990ies and early 2000s.

## Parameters
- fraction, cooling water, cooling pond system, to air: 0.032 dimensionless; lognormal variance with pedigree 0.0413, pedigree (2,3,1,3,1)
- fraction, cooling water, once-through system, to air: 0.004 dimensionless; lognormal variance with pedigree 0.0413, pedigree (2,3,1,3,1)
- fraction, cooling water, recirculating system, to air: 0.771 dimensionless; lognormal variance with pedigree 0.0413, pedigree (2,3,1,3,1)
- fraction, cooling water, to air: 0.3875 dimensionless; lognormal variance with pedigree 0.092025, pedigree (4,4,3,2,4)
- fraction, process water, to air: 0.15 dimensionless; lognormal variance with pedigree 0.092025, pedigree (4,4,3,2,4)

## Reference product
- core board: 1 kg; By-product classification allocatable product; CPC 32151: Corrugated paper and paperboard; HS2017 4410: Particle board, oriented strand board (OSB) and similar board (e.g. waferboard) of wood or other ligneous mat[...]
  EcoSpold01Location=RER
  production volume 2.65986 kg
    This is a placeholder value that does not reflect real-world production volumes. This dataset does not currently require a real-world production volume to work in the database framework, and no actual data were collected yet. This has no negative effect on the results of the ecoinvent database.
  property carbon content, fossil 0
    Fossil C content was calculated after fossil C contents of chemicals used in the production of board (ecoinvent v2.2 report 11_III, part 13).
  property carbon content, non-fossil 0.430314
    Biogenic C content was calculated after biogenic C contents of chemicals used in the production of board (ecoinvent v2.2 report 11_III, part 13). The cellulose content in 1 kg of paper (on a wet mas basis) was estimated as (1-chemical content), C content of cellulose was considered 0.44 kgC/kg dry mass (ecoinvent v2.2 report, n 15a, pg 40)
  property heating value, net 12.19 MJ
    LHV is calculated based on the Carbon content of the product. More details can be found on the respective documentation.
  property price 0.598 EUR2005
    Export prices for the World+ according to: http://faostat.fao.org/site/626/DesktopDefault.aspx?PageID=626#ancor downloaded 28 April 2009; calculated as export value divided by export volume.
  properties: carbon allocation 0.406646 kg, carbon content 0.430314, dry mass 0.945 kg, water content 0.0582011, water in wet mass 0.055 kg, wet mass 1 kg

## Inputs from technosphere
- aluminium sulfate, powder: 0.00519 kg; lognormal variance with pedigree 0.0432, pedigree (2,3,5,5,1)
  Data from 1 European producer
  EcoSpold01Location=RER
  Uncertainty: data from 1 European producer
  properties: dry mass 1 kg, wet mass 1 kg
- electricity, medium voltage: 0.0193906, 0.386799, 0.009683, 0.00593807, 0.0011885, 0.000255197, 0.039943, 0.114803 kWh (8 suppliers, which the file names only by identifier); sum of these 0.578 kWh; lognormal variance with pedigree 0.0432, pedigree (2,3,5,5,1)
  Data from 1 European producer
  EcoSpold01Location=NORDEL
  Uncertainty: data from 1 European producer
- heat, district or industrial, other than natural gas: 5.58 MJ; lognormal variance with pedigree 0.0438, pedigree (2,3,5,5,1)
  EcoSpold01Location=RER
  Heat input as reported by Hischier 2007. Activity Link set to the respective heat supplying activity.
  Uncertainty: data from 1 European producer
  properties: heating value, net 1 MJ
- heat, district or industrial, other than natural gas: 1.8 MJ; lognormal variance with pedigree 0.0438, pedigree (2,3,5,5,1)
  Heat input as reported by Hischier 2007. Activity Link set to the respective heat supplying activity.
  properties: corresponding fuel use, propane, furnace >100kW 1.05263 MJ, heating value, net 1 MJ
  note on corresponding fuel use, propane, furnace >100kW: Lower heating value of the fuel input related to the heat/electricity output, taken directly from ecoinvent v3.0 dataset "heat production, natural gas, at industrial furnace >100kW, GLO 2000".
- paper mill, integrated: 5.44e-11 unit; lognormal variance with pedigree 0.448, pedigree (4,5,5,5,5)
  EcoSpold01Location=RER
  Own assumption
  Uncertainty: own assumption
- potato starch: 0.091 kg; lognormal variance with pedigree 0.0432, pedigree (2,3,5,5,1)
  Data from 1 European producer
  EcoSpold01Location=DE
  Uncertainty: data from 1 European producer
  properties: carbon content, non-fossil 0.46, dry mass 0.8 kg, heating value, net 10.66 MJ, water content 0.25, wet mass 1 kg
  note on carbon content, non-fossil: C-content of starch is considered 46% on dry mass basis (from "Evolutionary and Biochemical Aspects", A.D. Kay and T. Vrede (in Global Ecology, 2010, Elsevier B.V., S.E. Jørgensen Ed.)).
- pulpwood, hardwood, measured as solid wood under bark: 0.000246 m3; lognormal variance with pedigree 0.0432, pedigree (2,3,5,5,1)
  EcoSpold01Location=NORDEL
  The amount of wood used as internal fuel is covered in the corresponding heat module and therefore subtracted (based on carbon content) from the original amount of pulpwood.
  Uncertainty: data from 1 European producer
  properties: carbon content, non-fossil 0.494, dry mass 563.2 kg, heating value, net 6071.3 MJ, water content 0.8, wet mass 1013.76 kg
  note on carbon content, non-fossil: C content of dry mass is 0.494 kgC/kg dry wood (ecoinvent v2.2 report 9)
  note on heating value, net: Value based on "hardwood forestry, mixed species, sustainable forest management"The property is based on a value of 11.58MJ/kg
- rosin size, for paper production: 0.00802 kg; lognormal variance with pedigree 0.0432, pedigree (2,3,5,5,1)
  EcoSpold01Location=RER
  Data from 1 European producer
  Uncertainty: data from 1 European producer
  properties: carbon content, non-fossil 0.515474, dry mass 1 kg, heating value, net 15.62 MJ, wet mass 1 kg
  note on carbon content, non-fossil: Mixture of rosin size (approximated by soap) (75%) and alkali (shown as sodium hydroxide) (25%). (ecoinvent v2.2 report 11-III, pg 299).
- waste paper, sorted: 0.763 kg; lognormal variance with pedigree 0.0432, pedigree (2,3,5,5,1)
  (same comment as for rosin size, for paper production)
  properties: carbon content, non-fossil 0.448889, dry mass 0.9 kg, heating value, net 14.11 MJ, water content 0.111111, wet mass 1 kg
  note on carbon content, non-fossil: The collected waste paper has a biogenic C content of 40.4% (average C-content of waste paper according to Doka 2004)

## Inputs from nature
- Water, cooling, unspecified natural origin [natural resource, in water]: 0.0153 m3; lognormal variance with pedigree 0.0432, pedigree (2,3,5,5,1)
  Data from 1 European producer
  Uncertainty: data from 1 European producer
- Water, unspecified natural origin [natural resource, in water]: 0.00593 m3; lognormal variance with pedigree 0.0432, pedigree (2,3,5,5,1)
  Data from 1 European producer
  Uncertainty: data from 1 European producer

## Emissions to nature
- Carbon dioxide, fossil [air, urban air close to ground]: 1.26e-5 kg; lognormal variance with pedigree 0.0432, pedigree (2,3,5,5,1)
  Data from 1 European producer
  Uncertainty: data from 1 European producer
- Hydrogen sulfide [air, urban air close to ground]: 2.2e-5 kg; lognormal variance with pedigree 0.0832, pedigree (2,3,5,5,1)
  Data from 1 European producer
  Uncertainty: data from 1 European producer
- Nitrogen oxides [air, urban air close to ground]: 4.08e-5 kg; lognormal variance with pedigree 0.0832, pedigree (2,3,5,5,1)
  Data from 1 European producer
  Uncertainty: data from 1 European producer
- Sulfur dioxide [air, urban air close to ground]: 1.57e-5 kg; lognormal variance with pedigree 0.0432, pedigree (2,3,5,5,1)
  Data from 1 European producer
  Uncertainty: data from 1 European producer
- Water [air, unspecified]: 0.00681825 m3; lognormal variance with pedigree 0.0827, pedigree (2,2,5,5,1)
  Calculated value based on literature values and expert opinion. See comments in the parametres' comment field.
- BOD5, Biological Oxygen Demand [water, surface water]: 0.00067 kg; lognormal variance with pedigree 0.0832, pedigree (2,3,5,5,1)
  Data from 1 European producer
  Uncertainty: data from 1 European producer
- COD, Chemical Oxygen Demand [water, surface water]: 0.00134 kg; lognormal variance with pedigree 0.0832, pedigree (2,3,5,5,1)
  Calculated as 2*BOD5.
  Uncertainty: data from 1 European producer
- DOC, Dissolved Organic Carbon [water, surface water]: 0.000496296 kg; lognormal variance with pedigree 0.0832, pedigree (2,3,5,5,1)
  Calculated as equal to TOC.
  Uncertainty: data from 1 European producer
- Nitrogen [water, surface water]: 7.5e-5 kg; lognormal variance with pedigree 0.0832, pedigree (2,3,5,5,1)
  Data from 1 European producer
  Uncertainty: data from 1 European producer
- Phosphorus [water, surface water]: 1.2e-6 kg; lognormal variance with pedigree 0.0832, pedigree (2,3,5,5,1)
  Data from 1 European producer
  Uncertainty: data from 1 European producer
- Suspended solids, unspecified [water, surface water]: 0.00049 kg; lognormal variance with pedigree 0.0832, pedigree (2,3,5,5,1)
  Data from 1 European producer
  Uncertainty: data from 1 European producer
- TOC, Total Organic Carbon [water, surface water]: 0.000496296 kg; lognormal variance with pedigree 0.0832, pedigree (2,3,5,5,1)
  Calculated by default as TOC (gC) = COD/2.7 (COD measured in g O2). Should more correctly be calculated from the carbon content of the specified emissions to water.
  Uncertainty: data from 1 European producer
- Water [water, unspecified]: 0.0144117 m3; lognormal variance with pedigree 0.0827, pedigree (2,2,5,5,1)
  (same comment as for Water)
  property carbon content, fossil 0; name C_content_fossil
  property carbon content, non-fossil 0; name C_content_non_fossil
  property dry mass 0 kg; name DM
  property water in wet mass 1000 kg; name WWM
  property wet mass 1000 kg; name WM

## Sampling procedure
Based on literature (see dataset field “Published Source”)

## Extrapolations
This dataset has been copied from an original dataset covering the geography RER. The uncertainty has been adjusted accordingly.

## Review by Hans-Jörg Althaus 2003-08-29
passed
