# phthalimide-compound production

Dataset: EcoSpold 2, unit process
Geography: RoW
Time period: 2000-01-01 to 2023-12-31
Technology level: current
Classification: EcoSpold01Categories: agricultural means of production/pesticides
Classification: ISIC rev.4 ecoinvent: 2021:Manufacture of pesticides and other agrochemical products
Tags: ConvertedDataset
Scenario: Business-as-Usual
System model: Allocation, cut-off by classification
Share of production covered: 100 %
Generated by: Jürgen Sutter
Published in: Nemecek, T. 2007
Database: ecoinvent
isCopyrightProtected: true
accessRestrictedTo: 1

## General comment
Production of phthalamide-compounds estimated with fungicides production.
[This dataset was already contained in the ecoinvent database version 2. It was not individually updated during the transfer to ecoinvent version 3. Life Cycle Impact Assessment results may still have changed, as they are affected by changes in the supply chain, i.e. in other datasets. This dataset was generated following the ecoinvent quality guidelines for version 2. It may have been subject to central changes described in the ecoinvent version 3 change report (http://www.ecoinvent.org/database/ecoinvent-version-3/reports-of-changes/), and the results of the central updates were reviewed extensively. The changes added e.g. consistent water flows and other information throughout the database. The documentation of this dataset can be found in the ecoinvent reports of version 2, which are still available via the ecoinvent website. The change report linked above covers all central changes that were made during the conversion process.]

## Geography
The inventory is modelled for Europe.

## Technology
phthalamide-compounds

## Time period
Time of publications

## Parameters
- fraction, cooling water, cooling pond system, to air: 0.032 dimensionless; name fraction_CW_CP_to_air; lognormal variance with pedigree 0.0413, pedigree (2,3,1,3,1)
  Calculated based on literature value (Scown, C.D., 2011, Water Footprint of U.S. Transportation Fuels and supplying information of the article) (Vionnet, S., Quantis Water Database - Technical Report, 2012).
- fraction, cooling water, once-through system, to air: 0.004 dimensionless; name fraction_CW_OT_to_air; lognormal variance with pedigree 0.0413, pedigree (2,3,1,3,1)
  (same comment as for fraction, cooling water, cooling pond system, to air)
- fraction, cooling water, recirculating system, to air: 0.771 dimensionless; name fraction_CW_R_to_air; lognormal variance with pedigree 0.0413, pedigree (2,3,1,3,1)
  (same comment as for fraction, cooling water, cooling pond system, to air)
- fraction, cooling water, to air: 0.3875 dimensionless; name fraction_CW_to_air; = (0.5*fraction_CW_OT_to_air)+(0.5*fraction_CW_R_to_air); lognormal variance with pedigree 0.092025, pedigree (4,4,3,2,4)
  Calculated value based on literature value (see comments of the other parametres present in this dataset) and expert opinion. In the case when no industry/literature data are available about the type of cooling or directly fraction, cooling water, to air specific for the process a default assumption is applied. It is assumed that the once-through cooling system is used in 50% of all cases and recirculating system is used in another 50% of all cases.
- fraction, process water, to air: 0.205 dimensionless; name fraction_PW_to_air; lognormal variance with pedigree 0.092025, pedigree (4,4,3,2,4)
- fraction, water, decarbonised, to air: 0.3875 dimensionless; name fraction_WDC_to_air; lognormal variance with pedigree 0.092025, pedigree (4,4,3,2,4)

## Reference product
- phthalimide-compound: 1 kg; By-product classification allocatable product; CPC 34662: Fungicides; HS2017 380892: Fungicides; other than containing goods specified in Subheading Note 1 to this Chapter; put up in forms or [...]; CAS 85-41-6
  EcoSpold01Location=RER
  production volume 8.70999e6 kg
    The consumption volume in the US in 2002 (from USGS, 2002 Pesticide use Maps) of captan has been used to estimate the production volumes of this type of pesticide in the world. For that, it has been extrapolated to a Global production mix using the ha of Arable land and Permanent crops of US versus the ha of Arable land and Permanent crops in the world in 2002 (1514/179 million ha; FAOSTAT).
  property carbon content, fossil 0.361204
    C content of Captan (C9H8Cl3NO2S) was assumed to be C content of phtalamide-compounds. Tab 10.3, ecoinvent v2.2 report 15a for classification
  property price 3.27562 EUR2005
    Calculated based on inputs: The price of the product has been calculated as a sum of the values of the material and energy inputs for this product. This value is therefore a rough estimation. It may underestimate the real price since there are additional expenses when producing any product. These expences can include for example labour costs, treatment of waste materials and profit for the producer. Please consider carefully whether this level of data quality is acceptable for your application.
  properties: carbon allocation 0.361204 kg, carbon content 0.361204, carbon content, non-fossil 0, dry mass 1 kg, water content 0, water in wet mass 0 kg, wet mass 1 kg

## Inputs from technosphere
- 1-pentanol: 0.018637 kg; lognormal variance with pedigree 0.078, pedigree (4,5,5,5,1)
  Stoechiometric calculation
  EcoSpold01Location=RER
  Uncertainty: Stoechiometric calculation
  properties: carbon content, fossil 0.681818, dry mass 1 kg, heating value, net 37.14 MJ, wet mass 1 kg
- 1-propanol: 0.012197 kg; lognormal variance with pedigree 0.078, pedigree (4,5,5,5,1)
  EcoSpold01Location=RER
  Stoechiometric calculation
  Uncertainty: Stoechiometric calculation
  properties: carbon content, fossil 0.6, dry mass 1 kg, heating value, net 34.3 MJ, wet mass 1 kg
- acetaldehyde: 0.027051 kg; lognormal variance with pedigree 0.078, pedigree (4,5,5,5,1)
  Stoechiometric calculation
  EcoSpold01Location=RER
  Uncertainty: Stoechiometric calculation
  properties: carbon content, fossil 0.545296, dry mass 1 kg, heating value, net 27.53 MJ, wet mass 1 kg
- acetic acid, without water, in 98% solution state: 0.024686 kg; lognormal variance with pedigree 0.078, pedigree (4,5,5,5,1)
  EcoSpold01Location=RER
  Stoechiometric calculation
  Uncertainty: Stoechiometric calculation
  properties: carbon content, fossil 0.400016, dry mass 1 kg, heating value, net 14.6 MJ, wet mass 1 kg
  note on heating value, net: Based on literature, page 10, Althaus H.-J., Chudacoff M., Hischier R., Jungbluth N., Osses M. and Primas A. (2007) Life Cycle Inventories of Chemicals. Final report ecoinvent data v2.0 No. 8. EMPA, Swiss Centre for Life Cycle Inventories, Dübendorf, CH, Online-Version under: www.ecoinvent.org.
- acetic anhydride: 0.042893 kg; lognormal variance with pedigree 0.078, pedigree (4,5,5,5,1)
  EcoSpold01Location=RER
  Stoechiometric calculation
  Uncertainty: Stoechiometric calculation
  properties: carbon content, fossil 0.470588, dry mass 1 kg, heating value, net 21.38 MJ, wet mass 1 kg
- acetone, liquid: 0.01436 kg; lognormal variance with pedigree 0.078, pedigree (4,5,5,5,1)
  Stoechiometric calculation
  EcoSpold01Location=RER
  Uncertainty: Stoechiometric calculation
  properties: carbon content, fossil 0.62069, dry mass 1 kg, heating value, net 31.32 MJ, wet mass 1 kg
- adipic acid: 0.027014 kg; lognormal variance with pedigree 0.078, pedigree (4,5,5,5,1)
  Stoechiometric calculation
  EcoSpold01Location=RER
  Uncertainty: Stoechiometric calculation
  properties: carbon content, fossil 0.493151, dry mass 1 kg, heating value, net 23.23 MJ, wet mass 1 kg
- aluminium hydroxide: 0.0081867 kg; lognormal variance with pedigree 0.078, pedigree (4,5,5,5,1)
  Stoechiometric calculation
  EcoSpold01Location=RER
  Uncertainty: Stoechiometric calculation
  properties: dry mass 1 kg, wet mass 1 kg
- ammonia, anhydrous, liquid: 0.00428197, 0.00831218, 0.0921352, 0.00389461, 0.000871206, 0.0320184, 0.00275236, 0.0084841 kg (8 suppliers, which the file names only by identifier); sum of these 0.15275 kg; lognormal variance with pedigree 0.078, pedigree (4,5,5,5,1)
  EcoSpold01Location=RER
  Stoechiometric calculation
  Uncertainty: Stoechiometric calculation
  properties: dry mass 1 kg, wet mass 1 kg
- ammonium thiocyanate: 0.02144 kg; lognormal variance with pedigree 0.078, pedigree (4,5,5,5,1)
  Stoechiometric calculation
  EcoSpold01Location=GLO
  Uncertainty: Stoechiometric calculation
  properties: carbon content, fossil 0.157895, dry mass 1 kg, heating value, net 11.15 MJ, wet mass 1 kg
- benzene: 0.037648 kg; lognormal variance with pedigree 0.078, pedigree (4,5,5,5,1)
  EcoSpold01Location=RER
  Stoechiometric calculation
  Uncertainty: Stoechiometric calculation
  properties: carbon content, fossil 0.923077, dry mass 1 kg, heating value, net 42.5 MJ, wet mass 1 kg
- butadiene: 0.012012 kg; lognormal variance with pedigree 0.078, pedigree (4,5,5,5,1)
  Stoechiometric calculation
  EcoSpold01Location=RER
  Uncertainty: Stoechiometric calculation
  properties: carbon content, fossil 0.857143, dry mass 1 kg, heating value, net 40.35 MJ, wet mass 1 kg
- butene, mixed: 0.032072 kg; lognormal variance with pedigree 0.078, pedigree (4,5,5,5,1)
  Stoechiometric calculation
  EcoSpold01Location=RER
  Uncertainty: Stoechiometric calculation
  properties: carbon content, fossil 0.857143, dry mass 1 kg, heating value, net 45.3 MJ, wet mass 1 kg
  note on carbon content, fossil: With mixed butenes, the four isomers 1-butene, cis-2-butene, trans-2-butene and isobutene are summed up. They are unsaturated olefinic hydrocarbons with the formula C4H8 (ecoinvent v2.2 report 11_II). MW=56
  note on heating value, net: Indicative value. Reference: Fuels - Higher and Lower Calorific Values, available at: https://www.engineeringtoolbox.com/fuels-higher-calorific-values-d_169.html
- carbon disulfide: 0.13826 kg; lognormal variance with pedigree 0.078, pedigree (4,5,5,5,1)
  Stoechiometric calculation
  EcoSpold01Location=GLO
  Uncertainty: Stoechiometric calculation
  properties: carbon content, fossil 0.157895, dry mass 1 kg, heating value, net 32.72 MJ, wet mass 1 kg
- carbon monoxide: 0.071728 kg; lognormal variance with pedigree 0.078, pedigree (4,5,5,5,1)
  EcoSpold01Location=RER
  Stoechiometric calculation
  Uncertainty: Stoechiometric calculation
  properties: carbon content, fossil 0.428571, dry mass 1 kg, heating value, net 12.99 MJ, wet mass 1 kg
  note on carbon content, fossil: CO. It is assumed that CO is produced from partial combustion of heavy heating oil.
- chemical factory, organics: 2.0531e-9 unit; lognormal variance with pedigree 0.448, pedigree (4,5,5,5,5)
  EcoSpold01Location=RER
  Estimation
  Uncertainty: Estimation
- chlorine, liquid: 0.56168 kg; lognormal variance with pedigree 0.078, pedigree (4,5,5,5,1)
  Stoechiometric calculation
  EcoSpold01Location=RER
  Uncertainty: Stoechiometric calculation
  properties: dry mass 1 kg, wet mass 1 kg
- dichloromethane: 0.055587 kg; lognormal variance with pedigree 0.078, pedigree (4,5,5,5,1)
  Stoechiometric calculation
  EcoSpold01Location=RER
  Uncertainty: Stoechiometric calculation
  properties: carbon content, fossil 0.142857, dry mass 1 kg, heating value, net 7.14 MJ, wet mass 1 kg
- dimethylamine: 0.056288 kg; lognormal variance with pedigree 0.078, pedigree (4,5,5,5,1)
  Stoechiometric calculation
  EcoSpold01Location=RER
  Uncertainty: Stoechiometric calculation
  properties: carbon content, fossil 0.533333, dry mass 1 kg, heating value, net 13.47 MJ, wet mass 1 kg
- electricity, medium voltage: 0.062783, 1.25238, 0.420796, 0.0192263, 0.00384812, 0.000826279, 0.129328 kWh (7 suppliers, which the file names only by identifier); sum of these 1.88919 kWh; lognormal variance with pedigree 0.078, pedigree (4,5,5,5,1)
  EcoSpold01Location=UCTE
  Estimation
  Uncertainty: Estimation
- ethanol, without water, in 99.7% solution state, from ethylene: 0.040869 kg; lognormal variance with pedigree 0.078, pedigree (4,5,5,5,1)
  Stoechiometric calculation
  EcoSpold01Location=RER
  Uncertainty: Stoechiometric calculation
  properties: carbon content, fossil 0.521739, dry mass 1 kg, heating value, net 28.1 MJ, wet mass 1 kg
  note on heating value, net: Based on literature, page 275, Report 17: Jungbluth, N., Chudacoff, M., Dauriat, A., Dinkel, F., Doka, G., Faist Emmenegger, M., Gnansounou, E., Kljun, N., Schleiss, K., Spielmann, M., Stettler, C., Sutter, J. 2007: Life Cycle Inventories of Bioenergy. ecoinvent report No. 17, Swiss Centre for Life Cycle Inventories, Dübendorf, CH.
- ethylene: 1.76512e-5, 0.00606405 kg (2 suppliers, which the file names only by identifier); sum of these 0.0060817 kg; lognormal variance with pedigree 0.078, pedigree (4,5,5,5,1)
  Stoechiometric calculation
  EcoSpold01Location=RER
  Uncertainty: Stoechiometric calculation
  properties: carbon content, fossil 0.857143, dry mass 1 kg, heating value, net 43.22 MJ, wet mass 1 kg
- ethylene diamine: 0.015246 kg; lognormal variance with pedigree 0.078, pedigree (4,5,5,5,1)
  Stoechiometric calculation
  EcoSpold01Location=RER
  Uncertainty: Stoechiometric calculation
  properties: carbon content, fossil 0.5, dry mass 1 kg, heating value, net 28.24 MJ, wet mass 1 kg
- ethylene oxide: 0.0080501 kg; lognormal variance with pedigree 0.078, pedigree (4,5,5,5,1)
  Stoechiometric calculation
  EcoSpold01Location=RER
  Uncertainty: Stoechiometric calculation
  properties: carbon content, fossil 0.545455, dry mass 1 kg, heating value, net 27.53 MJ, wet mass 1 kg
- formaldehyde: 0.012568 kg; lognormal variance with pedigree 0.078, pedigree (4,5,5,5,1)
  Stoechiometric calculation
  EcoSpold01Location=RER
  Uncertainty: Stoechiometric calculation
  properties: carbon content, fossil 0.4, dry mass 1 kg, heating value, net 20.19 MJ, wet mass 1 kg
- formic acid: 0.0098951 kg; lognormal variance with pedigree 0.078, pedigree (4,5,5,5,1)
  Stoechiometric calculation
  EcoSpold01Location=RER
  Uncertainty: Stoechiometric calculation
  properties: carbon content, fossil 0.4, dry mass 1 kg, heating value, net 13.17 MJ, wet mass 1 kg
- heat, district or industrial, natural gas: 0.324336, 19.7374 MJ (2 suppliers, which the file names only by identifier); sum of these 20.0617 MJ; lognormal variance with pedigree 0.078, pedigree (4,5,5,5,1)
  Uncertainty: Estimation
  properties: heating value, net 1 MJ
- heat, district or industrial, other than natural gas: 11.1924, 0.00518524 MJ (2 suppliers, which the file names only by identifier); sum of these 11.1976 MJ; lognormal variance with pedigree 0.078, pedigree (4,5,5,5,1)
  Uncertainty: Estimation
  properties: heating value, net 1 MJ
- hydrochloric acid, without water, in 30% solution state: 0.1204 kg; lognormal variance with pedigree 0.078, pedigree (4,5,5,5,1)
  Stoechiometric calculation
  EcoSpold01Location=RER
  Uncertainty: Stoechiometric calculation
  properties: dry mass 1 kg, heating value, net 3.32 MJ, wet mass 1 kg
- hydrogen fluoride: 0.0091708 kg; lognormal variance with pedigree 0.078, pedigree (4,5,5,5,1)
  Stoechiometric calculation
  EcoSpold01Location=GLO
  Uncertainty: Stoechiometric calculation
  properties: dry mass 1 kg, heating value, net 6.06 MJ, wet mass 1 kg
- hydrogen peroxide, without water, in 50% solution state: 0.0068408 kg; lognormal variance with pedigree 0.078, pedigree (4,5,5,5,1)
  EcoSpold01Location=RER
  Stoechiometric calculation
  Uncertainty: Stoechiometric calculation
  properties: dry mass 1 kg, heating value, net 7.13 MJ, wet mass 1 kg
- hydrogen sulfide: 0.0056569 kg; lognormal variance with pedigree 0.078, pedigree (4,5,5,5,1)
  EcoSpold01Location=RER
  Stoechiometric calculation
  Uncertainty: Stoechiometric calculation
  properties: dry mass 1 kg, heating value, net 7.11 MJ, wet mass 1 kg
- hydrogen, gaseous, medium pressure, merchant: 0.00347993, 0.00218507 kg (2 suppliers, which the file names only by identifier); sum of these 0.005665 kg; lognormal variance with pedigree 0.078, pedigree (4,5,5,5,1)
  EcoSpold01Location=RER
  Stoechiometric calculation
  Uncertainty: Stoechiometric calculation
  properties: dry mass 1 kg, heating value, net 120.21 MJ, wet mass 1 kg
- inert waste, for final disposal: -0.030977 kg; lognormal variance with pedigree 0.038, pedigree (4,5,1,5,1)
  EcoSpold01Location=CH
  Stoechiometric calculation
  Uncertainty: Stoechiometric calculation
  production volume
    Calculated from the production volume of phthalimide-compound in proportion to the respective output amounts.
  properties: dry mass 0.995 kg, water content 0.00502513, wet mass 1 kg
- liquefied petroleum gas: 6.18351e-5, 0.000593834, 0.000186419, 4.14925e-5, 0.0021092, 0.00882722 kg (6 suppliers, which the file names only by identifier); sum of these 0.01182 kg; lognormal variance with pedigree 0.078, pedigree (4,5,5,5,1)
  Stoechiometric calculation
  EcoSpold01Location=CH
  Uncertainty: Stoechiometric calculation
  properties: carbon content, fossil 0.821863, dry mass 1 kg, heating value, net 45.5 MJ, wet mass 1 kg
- lithium: 0.0030493 kg; lognormal variance with pedigree 0.078, pedigree (4,5,5,5,1)
  EcoSpold01Location=GLO
  Stoechiometric calculation
  Uncertainty: Stoechiometric calculation
  properties: dry mass 1 kg, wet mass 1 kg
- maleic anhydride: 0.021799 kg; lognormal variance with pedigree 0.078, pedigree (4,5,5,5,1)
  EcoSpold01Location=RER
  Stoechiometric calculation
  Uncertainty: Stoechiometric calculation
  properties: carbon content, fossil 0.489955, dry mass 1 kg, heating value, net 17.32 MJ, wet mass 1 kg
- manganese concentrate: 0.022107 kg; lognormal variance with pedigree 0.078, pedigree (4,5,5,5,1)
  EcoSpold01Location=GLO
  Stoechiometric calculation
  Uncertainty: Stoechiometric calculation
  properties: dry mass 1 kg, wet mass 1 kg
- methanol: 0.0111985, 0.0217177, 0.0020569 kg (3 suppliers, which the file names only by identifier); sum of these 0.034973 kg; lognormal variance with pedigree 0.078, pedigree (4,5,5,5,1)
  EcoSpold01Location=GLO
  Stoechiometric calculation
  Uncertainty: Stoechiometric calculation
  properties: carbon content, fossil 0.375, dry mass 1 kg, heating value, net 20 MJ, wet mass 1 kg
  note on heating value, net: Based on literature, page 533, Report 17: Jungbluth, N., Chudacoff, M., Dauriat, A., Dinkel, F., Doka, G., Faist Emmenegger, M., Gnansounou, E., Kljun, N., Schleiss, K., Spielmann, M., Stettler, C., Sutter, J. 2007: Life Cycle Inventories of Bioenergy. ecoinvent report No. 17, Swiss Centre for Life Cycle Inventories, Dübendorf, CH.
- monochlorobenzene: 0.031596 kg; lognormal variance with pedigree 0.078, pedigree (4,5,5,5,1)
  EcoSpold01Location=RER
  Stoechiometric calculation
  Uncertainty: Stoechiometric calculation
  properties: carbon content, fossil 0.642857, dry mass 1 kg, heating value, net 24.78 MJ, wet mass 1 kg
- naphtha: 4.50439e-5, 0.000564158, 0.0265954, 0.00431348, 0.000185893, 0.00116997 kg (6 suppliers, which the file names only by identifier); sum of these 0.032874 kg; lognormal variance with pedigree 0.078, pedigree (4,5,5,5,1)
  EcoSpold01Location=RER
  Stoechiometric calculation
  Uncertainty: Stoechiometric calculation
  properties: carbon content, fossil 0.919743, dry mass 1 kg, heating value, net 45 MJ, wet mass 1 kg
  note on carbon content, fossil: C-content was calculated using data from Tab 3.20, ecoinvent v2.2 report 6_IV CO2 emmissions and High heating value.
- natural gas, high pressure: 3.67862e-5, 6.20538e-5, 0.000135358, 4.52987e-5, 1.05861e-5, 6.30065e-5, 6.04595e-5, 0.00015898, 6.13767e-5, 9.49325e-5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 m3 (37 suppliers, which the file names only by identifier); sum of these 0.00476408 m3; lognormal variance with pedigree 0.078, pedigree (4,5,5,5,1)
  EcoSpold01Location=CH
  Stoechiometric calculation
  Uncertainty: Stoechiometric calculation
  properties: carbon content, fossil 0.602381, dry mass 0.84 kg, heating value, net 36 MJ, wet mass 0.84 kg
  note on carbon content, fossil: An average C content of 0.506 kg C/ m3 has been assumed (this average has been calculated using data in Tab 3.5, ecoinvent v2.2 report 6_V
  note on heating value, net: Literature value, Source: Christoph Meili;Niels Jungbluth;Maresa Bussa (2021) Life cycle inventories of crude oil and natural gas extraction. ESU-services Ltd. commissioned by BAFU & VSG, Schaffhausen, Switzerland, http://esu-services.ch/data/public-lci-reports/
- nitric acid, without water, in 50% solution state: 0.00303787, 0.011225, 0.0342717, 0.0184983, 0.00537843, 0.0044971, 0.0045138, 0.0145978 kg (8 suppliers, which the file names only by identifier); sum of these 0.09602 kg; lognormal variance with pedigree 0.078, pedigree (4,5,5,5,1)
  EcoSpold01Location=RER
  Stoechiometric calculation
  Uncertainty: Stoechiometric calculation
  properties: dry mass 1 kg, wet mass 1 kg
- o-dichlorobenzene: 0.058326 kg; lognormal variance with pedigree 0.078, pedigree (4,5,5,5,1)
  Stoechiometric calculation
  EcoSpold01Location=RER
  Uncertainty: Stoechiometric calculation
  properties: carbon content, fossil 0.493151, dry mass 1 kg, heating value, net 18.15 MJ, wet mass 1 kg
- oxygen, liquid: 0.094233 kg; lognormal variance with pedigree 0.078, pedigree (4,5,5,5,1)
  Stoechiometric calculation
  EcoSpold01Location=RER
  Uncertainty: Stoechiometric calculation
  properties: dry mass 1 kg, wet mass 1 kg
- phenol: 0.04563 kg; lognormal variance with pedigree 0.078, pedigree (4,5,5,5,1)
  Stoechiometric calculation
  EcoSpold01Location=RER
  Uncertainty: Stoechiometric calculation
  properties: carbon content, fossil 0.765957, dry mass 1 kg, heating value, net 30.93 MJ, wet mass 1 kg
- phosgene, liquid: 0.043298 kg; lognormal variance with pedigree 0.078, pedigree (4,5,5,5,1)
  Stoechiometric calculation
  EcoSpold01Location=RER
  Uncertainty: Stoechiometric calculation
  properties: carbon content, fossil 0.122449, dry mass 1 kg, heating value, net 3.68 MJ, wet mass 1 kg
- phosphoric acid, industrial grade, without water, in 85% solution state: 0.012044 kg; lognormal variance with pedigree 0.078, pedigree (4,5,5,5,1)
  Stoechiometric calculation
  EcoSpold01Location=RER
  Uncertainty: Stoechiometric calculation
  properties: dry mass 1 kg, wet mass 1 kg
- phosphorous chloride: 0.017593 kg; lognormal variance with pedigree 0.078, pedigree (4,5,5,5,1)
  EcoSpold01Location=RER
  Stoechiometric calculation
  Uncertainty: Stoechiometric calculation
  properties: dry mass 1 kg, wet mass 1 kg
- phosphorus, white, liquid: 0.0064953 kg; lognormal variance with pedigree 0.078, pedigree (4,5,5,5,1)
  Stoechiometric calculation
  EcoSpold01Location=RER
  Uncertainty: Stoechiometric calculation
  properties: dry mass 1 kg, wet mass 1 kg
- phthalic anhydride: 0.031699 kg; lognormal variance with pedigree 0.078, pedigree (4,5,5,5,1)
  EcoSpold01Location=RER
  Stoechiometric calculation
  Uncertainty: Stoechiometric calculation
  properties: carbon content, fossil 0.648649, dry mass 1 kg, heating value, net 22.93 MJ, wet mass 1 kg
- propanal: 0.02698 kg; lognormal variance with pedigree 0.078, pedigree (4,5,5,5,1)
  EcoSpold01Location=RER
  Stoechiometric calculation
  Uncertainty: Stoechiometric calculation
  properties: carbon content, fossil 0.62069, dry mass 1 kg, heating value, net 31.32 MJ, wet mass 1 kg
- propylene glycol, liquid: 0.012231 kg; lognormal variance with pedigree 0.078, pedigree (4,5,5,5,1)
  Stoechiometric calculation
  EcoSpold01Location=RER
  Uncertainty: Stoechiometric calculation
  properties: carbon content, fossil 0.473684, dry mass 1 kg, heating value, net 27.09 MJ, wet mass 1 kg
- propylene oxide, liquid: 0.013824 kg; lognormal variance with pedigree 0.078, pedigree (4,5,5,5,1)
  EcoSpold01Location=RER
  Stoechiometric calculation
  Uncertainty: Stoechiometric calculation
  properties: carbon content, fossil 0.62069, dry mass 1 kg, heating value, net 31.32 MJ, wet mass 1 kg
- silicon, metallurgical grade: 0.0035285 kg; lognormal variance with pedigree 0.078, pedigree (4,5,5,5,1)
  Stoechiometric calculation
  EcoSpold01Location=NO
  Uncertainty: Stoechiometric calculation
  properties: dry mass 1 kg, wet mass 1 kg
- sodium cyanide: 0.088081 kg; lognormal variance with pedigree 0.078, pedigree (4,5,5,5,1)
  Stoechiometric calculation
  EcoSpold01Location=RER
  Uncertainty: Stoechiometric calculation
  properties: carbon content, fossil 0.244898, dry mass 1 kg, heating value, net 7.43 MJ, wet mass 1 kg
- sodium hydroxide, without water, in 50% solution state: 0.61749 kg; lognormal variance with pedigree 0.078, pedigree (4,5,5,5,1)
  Stoechiometric calculation
  EcoSpold01Location=RER
  Uncertainty: Stoechiometric calculation
  properties: dry mass 1 kg, heating value, net 3.03 MJ, wet mass 1 kg
- sodium hypochlorite, without water, in 15% solution state: 0.099773 kg; lognormal variance with pedigree 0.078, pedigree (4,5,5,5,1)
  EcoSpold01Location=RER
  Stoechiometric calculation
  Uncertainty: Stoechiometric calculation
  properties: dry mass 1 kg, wet mass 1 kg
- sodium methoxide: 0.0085352 kg; lognormal variance with pedigree 0.078, pedigree (4,5,5,5,1)
  Stoechiometric calculation
  EcoSpold01Location=GLO
  Uncertainty: Stoechiometric calculation
  properties: carbon content, fossil 0.222222, dry mass 1 kg, heating value, net 13.47 MJ, wet mass 1 kg
- sodium tetrahydridoborate: 0.0046062 kg; lognormal variance with pedigree 0.078, pedigree (4,5,5,5,1)
  EcoSpold01Location=GLO
  Stoechiometric calculation
  Uncertainty: Stoechiometric calculation
  properties: dry mass 1 kg, heating value, net 12.81 MJ, wet mass 1 kg
- sulfur dioxide, liquid: 0.031779 kg; lognormal variance with pedigree 0.078, pedigree (4,5,5,5,1)
  Stoechiometric calculation
  EcoSpold01Location=RER
  Uncertainty: Stoechiometric calculation
  properties: dry mass 1 kg, wet mass 1 kg
- toluene, liquid: 0.11685 kg; lognormal variance with pedigree 0.078, pedigree (4,5,5,5,1)
  EcoSpold01Location=RER
  Stoechiometric calculation
  Uncertainty: Stoechiometric calculation
  properties: carbon content, fossil 0.913043, dry mass 1 kg, heating value, net 38.17 MJ, wet mass 1 kg
- urea: 0.0236907, 0.00299621, 0.0202302 kg (3 suppliers, which the file names only by identifier); sum of these 0.046917 kg; lognormal variance with pedigree 0.078, pedigree (4,5,5,5,1)
  The exchange has been updated from 'urea, as N' into 'urea' and therefore its amount has been scaled (multiplied) from 0.0219 kg by 2.1438 kg of 'urea' per kg of 'urea, as N'. Original comment of the exchange is: Stoechiometric calculation
  EcoSpold01Location=RER
  Uncertainty: Stoechiometric calculation
  properties: carbon content, fossil 0.2, dry mass 1 kg, wet mass 1 kg
- water, decarbonised: 0.000934218, 0.0136506, 0.00069907, 0.0115875, 0.00733636, 0.00181898, 8.93002e-5 kg (7 suppliers, which the file names only by identifier); sum of these 0.036116 kg; lognormal variance with pedigree 0.078, pedigree (4,5,5,5,1)
  EcoSpold01Location=RER
  Stoechiometric calculation
  Uncertainty: Stoechiometric calculation
  properties: wet mass 1 kg
- xylene, mixed: 0.027548 kg; lognormal variance with pedigree 0.078, pedigree (4,5,5,5,1)
  EcoSpold01Location=RER
  Stoechiometric calculation
  Uncertainty: Stoechiometric calculation
  properties: carbon content, fossil 0.905061, dry mass 1 kg, heating value, net 38.84 MJ, wet mass 1 kg
- zinc: 0.0078456 kg; lognormal variance with pedigree 0.078, pedigree (4,5,5,5,1)
  Stoechiometric calculation
  EcoSpold01Location=RER
  Uncertainty: Stoechiometric calculation
  properties: dry mass 1 kg, wet mass 1 kg

## Inputs from nature
- Bromine [natural resource, in water]: 0.36923 kg; name bromine_input; lognormal variance with pedigree 0.078, pedigree (4,5,5,5,1)
  0.23% Br in water; Stoechiometric calculation
  Uncertainty: Stoechiometric calculation
- Iodine [natural resource, in water]: 0.030086 kg; name iodine_input; lognormal variance with pedigree 0.078, pedigree (4,5,5,5,1)
  0.03% I; Stoechiometric calculation
  Uncertainty: Stoechiometric calculation
- Water, cooling, unspecified natural origin [natural resource, in water]: 0.1204 m3; name water_cooling_UNO_input; lognormal variance with pedigree 0.078, pedigree (4,5,5,5,1)
  Estimation
  Uncertainty: Estimation
- Water, salt, sole [natural resource, in water]: 0.260821 m3; name water_salt_sole_input; = ((bromine_input/0.0023)+(iodine_input/0.0003))/1000; lognormal variance with pedigree 0.078, pedigree (4,5,5,5,1)
  Stoechiometric calculation
  The concentration of bromine in water, salt, sole is 0.23% = 0.0023kg/kg. Cross-referenced: 0.25% (Ullmann's encyclopedia), 0.4% (USGS). The concentration of iodine in water, salt, sole is 0.03% = 0.0003kg/kg. Cross-referenced: 0.015% - 0.12% (Ullmann's encyclopedia).
  Stoechiometric calculation
  The concentration of bromine in water, salt, sole is 0.23% = 0.0023kg/kg. Cross-referenced: 0.25% (Ullmann's encyclopedia), 0.4% (USGS). The concentration of iodine in water, salt, sole is 0.03% = 0.0003kg/kg. Cross-referenced: 0.015% - 0.12% (Ullmann's encyclopedia).
  Uncertainty: Stoechiometric calculation

## Emissions to nature
- 1-Pentanol [air, urban air close to ground]: 3.7275e-5 kg; lognormal variance with pedigree 0.188, pedigree (4,5,5,5,5)
  Estimation
  Uncertainty: Estimation
- 1-Pentene [air, urban air close to ground]: 2.8168e-5 kg; lognormal variance with pedigree 0.188, pedigree (4,5,5,5,5)
  Estimation
  Uncertainty: Estimation
- Acetaldehyde [air, urban air close to ground]: 5.4102e-5 kg; lognormal variance with pedigree 0.188, pedigree (4,5,5,5,5)
  Estimation
  Uncertainty: Estimation
- Acetic acid [air, urban air close to ground]: 7.1897e-5 kg; lognormal variance with pedigree 0.188, pedigree (4,5,5,5,5)
  Estimation
  Uncertainty: Estimation
- Acetone [air, urban air close to ground]: 2.872e-5 kg; lognormal variance with pedigree 0.188, pedigree (4,5,5,5,5)
  Estimation
  Uncertainty: Estimation
- Ammonia [air, urban air close to ground]: 0.00038172 kg; lognormal variance with pedigree 0.218, pedigree (4,5,5,5,5)
  Estimation
  Uncertainty: Estimation
- Benzene [air, urban air close to ground]: 7.5297e-5 kg; lognormal variance with pedigree 0.188, pedigree (4,5,5,5,5)
  Estimation
  Uncertainty: Estimation
- Butadiene [air, urban air close to ground]: 2.4023e-5 kg; lognormal variance with pedigree 0.188, pedigree (4,5,5,5,5)
  Estimation
  Uncertainty: Estimation
- Carbon dioxide, fossil [air, urban air close to ground]: 0.48195 kg; lognormal variance with pedigree 0.1786, pedigree (4,5,5,5,5)
  Estimation
  Uncertainty: Estimation
- Carbon disulfide [air, urban air close to ground]: 7.7248e-5 kg; lognormal variance with pedigree 0.188, pedigree (4,5,5,5,5)
  Estimation
  Uncertainty: Estimation
- Carbon monoxide, fossil [air, urban air close to ground]: 0.00014346 kg; lognormal variance with pedigree 0.798, pedigree (4,5,5,5,5)
  Estimation
  Uncertainty: Estimation
- Chloramine [air, urban air close to ground]: 0.00013065 kg; lognormal variance with pedigree 0.188, pedigree (4,5,5,5,5)
  Estimation
  Uncertainty: Estimation
- Chlorine [air, urban air close to ground]: 0.00076867 kg; lognormal variance with pedigree 0.188, pedigree (4,5,5,5,5)
  Estimation
  Uncertainty: Estimation
- Dichloromethane [air, urban air close to ground]: 0.00011117 kg; lognormal variance with pedigree 0.188, pedigree (4,5,5,5,5)
  Estimation
  Uncertainty: Estimation
- Ethanol [air, urban air close to ground]: 0.00010322 kg; lognormal variance with pedigree 0.188, pedigree (4,5,5,5,5)
  Estimation
  Uncertainty: Estimation
- Ethylamine [air, urban air close to ground]: 3.2827e-5 kg; lognormal variance with pedigree 0.188, pedigree (4,5,5,5,5)
  Estimation
  Uncertainty: Estimation
- Ethylene [air, urban air close to ground]: 1.2163e-5 kg; lognormal variance with pedigree 0.188, pedigree (4,5,5,5,5)
  Estimation
  Uncertainty: Estimation
- Ethylene diamine [air, urban air close to ground]: 3.0493e-5 kg; lognormal variance with pedigree 0.188, pedigree (4,5,5,5,5)
  Estimation
  Uncertainty: Estimation
- Ethylene oxide [air, urban air close to ground]: 1.61e-5 kg; lognormal variance with pedigree 0.188, pedigree (4,5,5,5,5)
  Estimation
  Uncertainty: Estimation
- Formaldehyde [air, urban air close to ground]: 2.5135e-5 kg; lognormal variance with pedigree 0.188, pedigree (4,5,5,5,5)
  Estimation
  Uncertainty: Estimation
- Formamide [air, urban air close to ground]: 6.8173e-5 kg; lognormal variance with pedigree 0.188, pedigree (4,5,5,5,5)
  Estimation
  Uncertainty: Estimation
- Formic acid [air, urban air close to ground]: 1.979e-5 kg; lognormal variance with pedigree 0.188, pedigree (4,5,5,5,5)
  Estimation
  Uncertainty: Estimation
- Hydrogen [air, urban air close to ground]: 1.133e-5 kg; lognormal variance with pedigree 0.188, pedigree (4,5,5,5,5)
  Estimation
  Uncertainty: Estimation
- Isobutanol [air, urban air close to ground]: 6.4143e-5 kg; lognormal variance with pedigree 0.188, pedigree (4,5,5,5,5)
  Estimation
  Uncertainty: Estimation
- Methane, fossil [air, urban air close to ground]: 7.7579e-6 kg; lognormal variance with pedigree 0.188, pedigree (4,5,5,5,5)
  Estimation
  Uncertainty: Estimation
- Methanol [air, urban air close to ground]: 6.9945e-5 kg; lognormal variance with pedigree 0.188, pedigree (4,5,5,5,5)
  Estimation
  Uncertainty: Estimation
- Nitrogen oxides [air, urban air close to ground]: 0.00015296 kg; lognormal variance with pedigree 0.188, pedigree (4,5,5,5,5)
  Estimation
  Uncertainty: Estimation
- Phenol [air, urban air close to ground]: 9.1261e-5 kg; lognormal variance with pedigree 0.188, pedigree (4,5,5,5,5)
  Estimation
  Uncertainty: Estimation
- Propanal [air, urban air close to ground]: 5.3961e-5 kg; lognormal variance with pedigree 0.188, pedigree (4,5,5,5,5)
  Estimation
  Uncertainty: Estimation
- Propane [air, urban air close to ground]: 8.0373e-5 kg; lognormal variance with pedigree 0.188, pedigree (4,5,5,5,5)
  Estimation
  Uncertainty: Estimation
- Propanol [air, urban air close to ground]: 2.4394e-5 kg; lognormal variance with pedigree 0.188, pedigree (4,5,5,5,5)
  Estimation
  Uncertainty: Estimation
- Propyl amine [air, urban air close to ground]: 2.1589e-5 kg; lognormal variance with pedigree 0.188, pedigree (4,5,5,5,5)
  Estimation
  Uncertainty: Estimation
- Propylene oxide [air, urban air close to ground]: 2.7648e-5 kg; lognormal variance with pedigree 0.188, pedigree (4,5,5,5,5)
  Estimation
  Uncertainty: Estimation
- Sulfur dioxide [air, urban air close to ground]: 0.0061055 kg; lognormal variance with pedigree 0.1786, pedigree (4,5,5,5,5)
  Estimation
  Uncertainty: Estimation
- Toluene [air, urban air close to ground]: 0.0002337 kg; lognormal variance with pedigree 0.188, pedigree (4,5,5,5,5)
  Estimation
  Uncertainty: Estimation
- Water [air, unspecified]: 0.100137 m3; name water_to_air_unspecified; lognormal variance with pedigree 0.0827, pedigree (2,2,5,5,1)
  Calculated value based on literature values and expert opinion. See comments in the parametres' comment field.
  property fraction, origin: fresh water 0.000139757; name fraction_origin_fresh_water
  property fraction, origin: salt water 0.53395; name fraction_origin_salt_water
  property fraction, origin: unspecified 0.46591; name fraction_origin_unspecified
- m-Xylene [air, urban air close to ground]: 5.5095e-5 kg; lognormal variance with pedigree 0.188, pedigree (4,5,5,5,5)
  Estimation
  Uncertainty: Estimation
- o-Dichlorobenzene [air, urban air close to ground]: 6.1842e-5 kg; lognormal variance with pedigree 0.188, pedigree (4,5,5,5,5)
  Estimation
  Uncertainty: Estimation
- 1-Pentanol [water, surface water]: 8.946e-5 kg; lognormal variance with pedigree 0.448, pedigree (4,5,5,5,5)
  Estimation
  Uncertainty: Estimation
- 1-Pentene [water, surface water]: 6.7603e-5 kg; lognormal variance with pedigree 0.448, pedigree (4,5,5,5,5)
  Estimation
  Uncertainty: Estimation
- Acetaldehyde [water, surface water]: 0.00065058 kg; lognormal variance with pedigree 0.448, pedigree (4,5,5,5,5)
  Estimation
  Uncertainty: Estimation
- Acetic acid [water, surface water]: 0.001523 kg; lognormal variance with pedigree 0.448, pedigree (4,5,5,5,5)
  Estimation
  Uncertainty: Estimation
- Acetone [water, surface water]: 7.1801e-5 kg; lognormal variance with pedigree 0.448, pedigree (4,5,5,5,5)
  Estimation
  Uncertainty: Estimation
- Acetyl chloride [water, surface water]: 7.0277e-5 kg; lognormal variance with pedigree 0.448, pedigree (4,5,5,5,5)
  Estimation
  Uncertainty: Estimation
- Aluminium III [water, surface water]: 0.0002763 kg; lognormal variance with pedigree 0.798, pedigree (4,5,5,5,5)
  Estimation
  Uncertainty: Estimation
- Ammonium [water, surface water]: 0.015092 kg; lognormal variance with pedigree 0.188, pedigree (4,5,5,5,5)
  Estimation
  Uncertainty: Estimation
- Benzene [water, surface water]: 0.00018071 kg; lognormal variance with pedigree 0.448, pedigree (4,5,5,5,5)
  Estimation
  Uncertainty: Estimation
- Borate [water, surface water]: 0.0067942 kg; lognormal variance with pedigree 0.448, pedigree (4,5,5,5,5)
  Estimation
  Uncertainty: Estimation
- Boron [water, surface water]: 5.4548e-5 kg; lognormal variance with pedigree 0.798, pedigree (4,5,5,5,5)
  Estimation
  Uncertainty: Estimation
- Bromide [water, surface water]: 0.30546 kg; lognormal variance with pedigree 0.798, pedigree (4,5,5,5,5)
  Estimation
  Uncertainty: Estimation
- Carbon disulfide [water, surface water]: 0.0001854 kg; lognormal variance with pedigree 0.448, pedigree (4,5,5,5,5)
  Estimation
  Uncertainty: Estimation
- Chloramine [water, surface water]: 0.0011658 kg; lognormal variance with pedigree 0.448, pedigree (4,5,5,5,5)
  Estimation
  Uncertainty: Estimation
- Chloride [water, surface water]: 0.49592 kg; lognormal variance with pedigree 0.448, pedigree (4,5,5,5,5)
  Estimation
  Uncertainty: Estimation
- Dichloromethane [water, surface water]: 0.00015243 kg; lognormal variance with pedigree 0.448, pedigree (4,5,5,5,5)
  Estimation
  Uncertainty: Estimation
- Ethanol [water, surface water]: 0.00025214 kg; lognormal variance with pedigree 0.448, pedigree (4,5,5,5,5)
  Estimation
  Uncertainty: Estimation
- Ethylamine [water, surface water]: 7.8785e-5 kg; lognormal variance with pedigree 0.448, pedigree (4,5,5,5,5)
  Estimation
  Uncertainty: Estimation
- Ethylene [water, surface water]: 2.9192e-5 kg; lognormal variance with pedigree 0.448, pedigree (4,5,5,5,5)
  Estimation
  Uncertainty: Estimation
- Ethylene diamine [water, surface water]: 7.3183e-5 kg; lognormal variance with pedigree 0.448, pedigree (4,5,5,5,5)
  Estimation
  Uncertainty: Estimation
- Ethylene oxide [water, surface water]: 3.864e-5 kg; lognormal variance with pedigree 0.448, pedigree (4,5,5,5,5)
  Estimation
  Uncertainty: Estimation
- Fluoride [water, surface water]: 0.0015354 kg; lognormal variance with pedigree 0.188, pedigree (4,5,5,5,5)
  Estimation
  Uncertainty: Estimation
- Formaldehyde [water, surface water]: 6.0324e-5 kg; lognormal variance with pedigree 0.448, pedigree (4,5,5,5,5)
  Estimation
  Uncertainty: Estimation
- Formamide [water, surface water]: 0.00016362 kg; lognormal variance with pedigree 0.448, pedigree (4,5,5,5,5)
  Estimation
  Uncertainty: Estimation
- Formic acid [water, surface water]: 4.7496e-5 kg; lognormal variance with pedigree 0.448, pedigree (4,5,5,5,5)
  Estimation
  Uncertainty: Estimation
- Iodide [water, surface water]: 0.027318 kg; lognormal variance with pedigree 0.798, pedigree (4,5,5,5,5)
  Estimation
  Uncertainty: Estimation
- Isobutanol [water, surface water]: 0.00015394 kg; lognormal variance with pedigree 0.448, pedigree (4,5,5,5,5)
  Estimation
  Uncertainty: Estimation
- Lithium I [water, surface water]: 0.0030348 kg; lognormal variance with pedigree 0.798, pedigree (4,5,5,5,5)
  Estimation
  Uncertainty: Estimation
- Manganese II [water, surface water]: 0.00066385 kg; lognormal variance with pedigree 0.798, pedigree (4,5,5,5,5)
  Estimation
  Uncertainty: Estimation
- Methanol [water, surface water]: 0.00021313 kg; lognormal variance with pedigree 0.448, pedigree (4,5,5,5,5)
  Estimation
  Uncertainty: Estimation
- Monochlorobenzene [water, surface water]: 0.00015166 kg; lognormal variance with pedigree 0.448, pedigree (4,5,5,5,5)
  Estimation
  Uncertainty: Estimation
- Nitrate [water, surface water]: 0.0067647 kg; lognormal variance with pedigree 0.188, pedigree (4,5,5,5,5)
  Estimation
  Uncertainty: Estimation
- Phenol [water, surface water]: 0.00021902 kg; lognormal variance with pedigree 0.448, pedigree (4,5,5,5,5)
  Estimation
  Uncertainty: Estimation
- Phosphate [water, surface water]: 0.0046666 kg; lognormal variance with pedigree 0.188, pedigree (4,5,5,5,5)
  Estimation
  Uncertainty: Estimation
- Phosphorus [water, surface water]: 0.00020051 kg; lognormal variance with pedigree 0.188, pedigree (4,5,5,5,5)
  Estimation
  Uncertainty: Estimation
- Propanal [water, surface water]: 0.00012951 kg; lognormal variance with pedigree 0.448, pedigree (4,5,5,5,5)
  Estimation
  Uncertainty: Estimation
- Propanol [water, surface water]: 0.00011953 kg; lognormal variance with pedigree 0.448, pedigree (4,5,5,5,5)
  Estimation
  Uncertainty: Estimation
- Propyl amine [water, surface water]: 5.1813e-5 kg; lognormal variance with pedigree 0.448, pedigree (4,5,5,5,5)
  Estimation
  Uncertainty: Estimation
- Propylene oxide [water, surface water]: 6.6356e-5 kg; lognormal variance with pedigree 0.448, pedigree (4,5,5,5,5)
  Estimation
  Uncertainty: Estimation
- Silicon [water, surface water]: 0.00056488 kg; lognormal variance with pedigree 0.798, pedigree (4,5,5,5,5)
  Estimation
  Uncertainty: Estimation
- Sodium I [water, surface water]: 0.39577 kg; lognormal variance with pedigree 0.798, pedigree (4,5,5,5,5)
  Estimation
  Uncertainty: Estimation
- Sulfate [water, surface water]: 0.016089 kg; lognormal variance with pedigree 0.188, pedigree (4,5,5,5,5)
  Estimation
  Uncertainty: Estimation
- Toluene [water, surface water]: 0.00028211 kg; lognormal variance with pedigree 0.448, pedigree (4,5,5,5,5)
  Estimation
  Uncertainty: Estimation
- Urea [water, surface water]: 0.00014882 kg; lognormal variance with pedigree 0.448, pedigree (4,5,5,5,5)
  Estimation
  Uncertainty: Estimation
- Water [water, unspecified]: 0.28112 m3; name water_to_water_unspecified; lognormal variance with pedigree 0.0827, pedigree (2,2,5,5,1)
  (same comment as for Water)
  property carbon content, fossil 0; name C_content_fossil
  property carbon content, non-fossil 0; name C_content_non_fossil
  property dry mass 0 kg; name DM
  property fraction, origin: fresh water 7.86889e-5; name fraction_origin_fresh_water_Ww
  property fraction, origin: salt water 0.737596; name fraction_origin_salt_water_Ww
  property fraction, origin: unspecified 0.262326; name fraction_origin_unspecified_Ww
  property water in wet mass 1000 kg; name WWM
  property wet mass 1000 kg; name WM
- Zinc II [water, surface water]: 0.00072813 kg; lognormal variance with pedigree 0.798, pedigree (4,5,5,5,5)
  Estimation
  Uncertainty: Estimation
- m-Xylene [water, surface water]: 0.00013223 kg; lognormal variance with pedigree 0.448, pedigree (4,5,5,5,5)
  Estimation
  Uncertainty: Estimation
- o-Dichlorobenzene [water, surface water]: 0.00014842 kg; lognormal variance with pedigree 0.448, pedigree (4,5,5,5,5)
  Estimation
  Uncertainty: Estimation

## Sampling procedure
Literature data

## Extrapolations
Transports and emissions are modelled with standard methods. This dataset has been copied from an original dataset covering the geography RER. The uncertainty has been adjusted accordingly.

## Review by Thomas Nemecek 2010-03-14
automatic validation in Excel
none
