# pipeline construction, natural gas, low pressure distribution network

Dataset: EcoSpold 2, unit process
Geography: CH
Time period: 2012-01-01 to 2023-12-31
Technology level: current
Classification: EcoSpold01Categories: natural gas/fuels
Classification: ISIC rev.4 ecoinvent: 4220:Construction of utility projects
Scenario: Business-as-Usual
System model: Allocation, cut-off by classification
Share of production covered: 100 %
Generated by: Mireille Faist Emmenegger
Published in: Faist Emmenegger, Mireille 2015
Database: ecoinvent
isCopyrightProtected: true
accessRestrictedTo: 1

## General comment
Pipeline infrastructure for gas distribution. Life time 40 years. Annual transport of about 110 PJ over 16'000 km including the house connecting pipelines; Geography: Data is based on Swiss data.
Material requirements of the pipeline system are round 3.3t/km steel, 6.1 t/km cast iron, 4.2t/km PE, 26.8 t/km gravel, 360t/km sandt. These values are calculated based on the material density, the thickness of the pipeline wall and the kilometers of the various pipeline types.

## Included activities end
This dataset describes the infrastructure needed for the Swiss low (<0.1 bar) pressure distribution network.

## Geography
Data is based on Swiss data.

## Technology
The length of the pipelines is based on statistics, whereas the thickness of the pipeline is estimated.

## Reference product
- pipeline, natural gas, low pressure distribution network: 1 km; name pipeline_NG_LP_km; By-product classification allocatable product; CPC 53251: Local pipelines
  EcoSpold01Location=CH
  production volume 400 km; name RP_PV_1; = 16000/40
    11000km low pressure network and 5000 km connecting pipelines for the low pressure network
  property price 44038 EUR2005
    UNdata;(Average prices of EU27; 1.291 EUR/kg) http://data.un.org/Data.aspx?q=pipeline&d=ComTrade&f=_l1Code%3a74%3bcmdCode%3a730410. Pipes, line, iron or steel, for oil or gas pipelines. Weight 42.6 t (excl. sand).
  properties: carbon allocation 0 kg, carbon content 0, lifetime 40 year, lifetime capacity [MJ] 4.32e9 MJ

## Inputs from technosphere
- building, multi-storey: 50 m3; lognormal variance with pedigree 0.3486, pedigree (4,3,5,1,1)
  qualified estimate
  EcoSpold01Location=RER
  Uncertainty: qualified estimate
- cast iron: 6118.68 kg; name cast_iron_kg_LP; lognormal variance with pedigree 0.0492, pedigree (4,3,5,1,1)
  EcoSpold01Location=RER
  qualified estimate based on new statistics for material share in network.
  Uncertainty: qualified estimate
  properties: carbon content, fossil 0.04, dry mass 1 kg, wet mass 1 kg
  note on carbon content, fossil: Cast iron is made by remelting pig iron in small furnaces (e.g. cupola furnaces or electric arc furnaces) and poured into moulds to make castings. It usually contains 2% to 6% carbon (ecoinvent v2.2 report 10_partII). An average content of 4% was considered
- cement, unspecified: 2840 kg; lognormal variance with pedigree 0.0492, pedigree (4,3,5,1,1)
  EcoSpold01Location=CH
  qualified estimate based on new statistics for material share in network.
  Uncertainty: qualified estimate
  properties: dry mass 1 kg, wet mass 1 kg
- concrete, normal strength: 2.73 m3; name concrete_Kg_LP; lognormal variance with pedigree 0.0492, pedigree (4,3,5,1,1)
  (same comment as for cement, unspecified)
  properties: dry mass 2190 kg, water content 0.086758, wet mass 2380 kg
- drawing of pipe, steel: 9427.67 kg; = cast_iron_kg_LP+ steel_kg_LP; lognormal variance with pedigree 0.0492, pedigree (4,3,5,1,1)
  qualified estimate based on new statistics for material share in network.
  EcoSpold01Location=RER
  Uncertainty: qualified estimate
- excavation, skid-steer loader: 676 m3; lognormal variance with pedigree 0.0492, pedigree (4,3,5,1,1)
  qualified estimate;activityLink introduced to establish a direct link to the corresponding regional supply of this product
  EcoSpold01Location=RER
  Uncertainty: qualified estimate
- gravel, round: 26838.1 kg; name gravel_kg_LP; lognormal variance with pedigree 0.0492, pedigree (4,3,5,1,1)
  qualified estimate based on new statistics for material share in network.
  EcoSpold01Location=CH
  Uncertainty: qualified estimate
  properties: dry mass 1 kg, wet mass 1 kg
- pitch: 1220 kg; name bitume_kg_LP; lognormal variance with pedigree 0.0492, pedigree (4,3,5,1,1)
  (same comment as for cast iron)
  properties: carbon content, fossil 0.83, dry mass 1 kg, heating value, net 28 MJ, wet mass 1 kg
- polyethylene, high density, granulate: 4216.11 kg; name HDPE_kg_LP; lognormal variance with pedigree 0.0492, pedigree (4,3,5,1,1)
  (same comment as for drawing of pipe, steel)
  properties: carbon content, fossil 0.857143, dry mass 1 kg, heating value, net 42.47 MJ, wet mass 1 kg
  note on carbon content, fossil: Polyethylene is formed out of a huge amount of ethylene monomers (C2H4) (ecoinvent v2.2 report 11_II). MW=28 g/mol
- polyethylene, low density, granulate: 24.8945 kg; name LDPE_kg_LP; lognormal variance with pedigree 0.0492, pedigree (4,3,5,1,1)
  (same comment as for drawing of pipe, steel)
  properties: carbon content, fossil 0.857143, dry mass 1 kg, heating value, net 42.47 MJ, wet mass 1 kg
- reinforcing steel: 3308.99 kg; name steel_kg_LP; lognormal variance with pedigree 0.0492, pedigree (4,3,5,1,1)
  (same comment as for drawing of pipe, steel)
  properties: carbon content, fossil 0.004, dry mass 1 kg, wet mass 1 kg
- sand: 362057 kg; name sand_kg_LP; lognormal variance with pedigree 0.0492, pedigree (4,3,5,1,1)
  (same comment as for cement, unspecified)
  properties: dry mass 1 kg, wet mass 1 kg
- transport, passenger car: 27159.8 km; lognormal variance with pedigree 0.1686, pedigree (4,3,5,1,1)
  (same comment as for cement, unspecified)
- waste bitumen: -1220 kg; name BP_amount_2; = bitume_kg_LP; lognormal variance with pedigree 0.0706, pedigree (4,3,3,1,1)
  qualified estimate
  EcoSpold01Location=CH
  Uncertainty: qualified estimate
  production volume; = RP_PV_1/1* BP_amount_2
    Calculated from the production volume of pipeline, natural gas, low pressure distribution network in proportion to the respective output amounts.
  properties: carbon content, fossil 0.842657, dry mass 0.986 kg, heating value, net 40.2 MJ, water content 0.0141988, wet mass 1 kg
  note on heating value, net: Literature value, Source: IPCC 2006, 2006 IPCC Guidelines for National Greenhouse Gas Inventories, Prepared by the National Greenhouse Gas Inventories Programme, Eggleston H.S., Buendia L., Miwa K., Ngara T. and Tanabe K. (eds). Published: IGES, Japan
- waste concrete gravel: -26838.1 kg; name BP_amount_3; = gravel_kg_LP
  qualified estimate based on new statistics for material share in network.
  production volume; = RP_PV_1 * (BP_amount_3 / pipeline_NG_LP_km)
    Calculated from production volume of reference product using the relative outputs.
  properties: dry mass 1 kg, wet mass 1 kg
- waste concrete, not reinforced: -6552 kg; name BP_amount_4; = concrete_Kg_LP*2400
  Amount in m3 of concrete multiplied by density (2400 kg/m3)
  production volume; = RP_PV_1 * (BP_amount_4 / pipeline_NG_LP_km)
    Calculated from production volume of reference product using the relative outputs.
  properties: dry mass 1 kg, wet mass 1 kg
- waste plastic, mixture: -4241 kg; name waste_plastic; = ( LDPE_kg_LP+ HDPE_kg_LP); lognormal variance with pedigree 0.0706, pedigree (4,3,3,1,1)
  (same comment as for cement, unspecified)
  production volume; = RP_PV_1* waste_plastic
    (same comment as for waste bitumen)
  properties: carbon content, fossil 0.747344, dry mass 0.847 kg, heating value, net 30.79 MJ, water content 0.180638, wet mass 1 kg
  note on carbon content, fossil: C content in 1 kg DM was calculated using data in Tab A.2, ecoinvent v2.2 report 13_I
  note on heating value, net: Value taken from the general comment of the treatment dataset.
- waste reinforcement steel: -9427.67 kg; name BP_amount_1; = steel_kg_LP+ cast_iron_kg_LP; lognormal variance with pedigree 0.0906, pedigree (4,3,3,1,1)
  Steel and iron pipelines are assumed to be recycled.
  production volume; = RP_PV_1 * (BP_amount_1 / pipeline_NG_LP_km)
    Calculated from production volume of reference product using the relative outputs.
  properties: dry mass 1 kg, wet mass 1 kg

## Inputs from nature
- Occupation, construction site [natural resource, land]: 3330 m2*year; source Faist Emmenegger, M. 2007; lognormal variance with pedigree 0.0887, pedigree (4,3,5,3,1)
  qualified estimatefor CH
  Uncertainty: qualified estimate for CH
- Occupation, industrial area [natural resource, land]: 143 m2*year; source Faist Emmenegger, M. 2007; lognormal variance with pedigree 0.0886, pedigree (4,3,5,1,1)
  qualified estimate
  Uncertainty: qualified estimate
- Transformation, from unspecified [natural resource, land]: 7.14 m2; source Faist Emmenegger, M. 2007; lognormal variance with pedigree 0.1686, pedigree (4,3,5,1,1)
  qualified estimate
  Uncertainty: qualified estimate
- Transformation, to industrial area [natural resource, land]: 7.14 m2; source Faist Emmenegger, M. 2007; lognormal variance with pedigree 0.1686, pedigree (4,3,5,1,1)
  qualified estimate
  Uncertainty: qualified estimate

## Sampling procedure
statistics
