# long liner construction, steel

Dataset: EcoSpold 2, unit process
Geography: RER
Time period: 2009-01-01 to 2023-12-31
Technology level: current
Classification: ISIC rev.4 ecoinvent: 0311:Marine fishing
Scenario: Business-as-Usual
System model: Allocation, cut-off by classification
Generated by: Ian Vázquez-Rowe
Published in: Vázquez-Rowe, I. 2011
Database: ecoinvent
isCopyrightProtected: true
accessRestrictedTo: 1

## General comment
This dataset represents the construction of long liners, per 1000 kg of light ship weight (LSW), based on data from a long lining fishing fleet that operates in European waters South of Ireland in year 2009. The vessels corresponded to 12 vessels (from a fleet of 49) for which data was available with different levels of detail. Specific data for specific inventory items may be based on sub-samples for which detailed data was available. Vessel dimensions: 28 - 38 m length.
System boundaries and relation between activities

## Included activities start
Construction of vessels, including provision of all materials and work

## Included activities end
Batteries are excluded, as they do not exist in the database. Gear materials were not included, considering that their relevance in weight is insignificant in long lining vessels as compared to trawlers or other net fisheries.

## Geography
Data from Spanish vessels operating in European waters, extrapolated to global (GLO)

## Technology
Spain, especially the northern regions of Galicia and the Basque Country has various shipyards and relevant ship-building and ship-retrofitting expertise.

## Reference product
- long liner, steel: 1 kg; name LSW; = hull+copper+engine*1000+motors*1000+paint+struct_steel; source Vázquez-Rowe, I. 2011; By-product classification allocatable product; CPC 49315: Fishing vessels; factory ships and other vessels for processing or preserving fishery products
  Construction of a steel long liner, per 1000 kg of light ship weight (LSW). Regressions based on mainly primary data were created to relate the weight of each inventory item to a purse seiner's LSW, adjusted for trawler's gear. The list of inventory items (granularity) contribute >95% of environmental impacts, as described in the reference publication.
  production volume 0.2892 kg; name prod_vol
    Unquantifiable
  property price 0.513399 EUR2005
    Calculated based on inputs: The price of the product has been calculated as a sum of the values of the material and energy inputs for this product. This value is therefore a rough estimation. It may underestimate the real price since there are additional expenses when producing any product. These expences can include for example labour costs, treatment of waste materials and profit for the producer. Please consider carefully whether this level of data quality is acceptable for your application.
  properties: carbon allocation 0 kg, carbon content 0

## Inputs from technosphere
All rows: source Angel Avadí 2017
- alkyd paint, white, without solvent, in 60% solution state: 0.00630563 kg; name paint; triangular min 0.00542, mostLikely 0.00648275, max 0.00701412, pedigree (2,5,5,3,2)
  Paint and antifouling
  Uncertainty: Data from 9 vessels
  properties: carbon content, fossil 0.140367, carbon content, non-fossil 0.199629, dry mass 1 kg, heating value, net 10.3 MJ, wet mass 1 kg
  note on carbon content, fossil: C content was calculated as an addition of C content in the raw materials.
- copper, cathode: 0.00983058 kg; = copper
  Copper wire for electric circuit construction, 50% recycled
  properties: dry mass 1 kg, wet mass 1 kg
- marine electric motor: 6.36765e-6 unit; name motors; triangular min 5.23602e-6, mostLikely 6.55566e-6, max 7.31127e-6, pedigree (2,5,5,5,2)
  Electric motors and pumps
  Uncertainty: Data from 9 vessels
  property lifetime 10 year; name motors_lifetime
  property lifetime capacity [h] 20000 hour; name motors_lifetime_capacity_PMH
- marine engine: 3.30787e-5 unit; name engine; triangular min 3.15066e-5, mostLikely 3.15066e-5, max 3.62228e-5, pedigree (2,5,5,5,2)
  Marine diesel engine
  Uncertainty: Data from 9 vessels
  property lifetime 15 year; name engine_lifetime
  property lifetime capacity [h] 8000 hour; name engine_lifetime_capacity_PMH
- metal working, average for steel product manufacturing: 0.00891057 kg
  Steel hull + transmission construction, structural elements ;activityLink introduced to establish a direct link to the corresponding regional supply of this product
- reinforcing steel: 0.00891057 kg; name struct_steel; triangular min 0.00861636, mostLikely 0.00905768, max 0.00905768, pedigree (5,5,5,5,5)
  Steel hull + transmission construction, structural elements
  Uncertainty: Data from 9 vessels
  properties: carbon content, fossil 0.004, dry mass 1 kg, wet mass 1 kg
- steel, low-alloyed, hot rolled: 0.935507 kg; name hull; triangular min 0.900561, mostLikely 0.948786, max 0.957173, pedigree (2,3,5,5,1)
  Steel hull, sheets
  Uncertainty: Data from 9 vessels
  properties: carbon content, fossil 0.005, dry mass 1 kg, wet mass 1 kg
  note on carbon content, fossil: Low alloyed steel composition given in Tab. 3.2 ecoinvent v2.2 report 10_partII. Steel assumed to have a C content of 0.5%
- used long liner, steel: -1 kg; name EOL; = LSW
  EOL of a steel long liner, per 1000 kg of light ship weight (LSW), at the end of its lifetime. Regressions based on mainly primary data were created to relate the weight of each inventory item to a purse seiner's LSW, adjusted for long liner's gear. The list of inventory items (granularity) contribute >95% of environmental impacts, as described in the reference publication. Includes engines and motors
  production volume; = prod_vol * (EOL / LSW)
    Calculated from production volume of reference product using the relative outputs.
- wire drawing, copper: 0.00983058 kg; name copper; triangular min 0.00927545, mostLikely 0.0100238, max 0.0101925, pedigree (2,3,5,5,2)
  Manufacture of copper wire;activityLink introduced to establish a direct link to the corresponding regional supply of this product
  Uncertainty: Based on 8 different estimations based on reports, shipyard work orders, invoices, etc.

## Sampling procedure
A sample of 12 vessels of a population of 49 was modelled.

## Extrapolations
Valid for other long lining fisheries with vessel sizes ranging from 25-40 m.
