# phosphorus pentachloride production

Dataset: EcoSpold 2, unit process
Geography: RoW
Time period: 2009-01-01 to 2023-12-31
Technology level: current
Classification: EcoSpold01Categories: chemicals/inorganics
Classification: ISIC rev.4 ecoinvent: 2011:Manufacture of basic chemicals
Synonyms: Phosphor(V)-chlorid
Tags: ConvertedDataset
Scenario: Business-as-Usual
System model: Allocation, cut-off by classification
Generated by: Dominic Notter
Published in: Hischier, R. 2009
Database: ecoinvent
isCopyrightProtected: true
accessRestrictedTo: 1

## General comment
The dataset can be used for example as base material in the production of LiPF6. Data are based on patents.
[This dataset was already contained in the ecoinvent database version 2. It was not individually updated during the transfer to ecoinvent version 3. Life Cycle Impact Assessment results may still have changed, as they are affected by changes in the supply chain, i.e. in other datasets. This dataset was generated following the ecoinvent quality guidelines for version 2. It may have been subject to central changes described in the ecoinvent version 3 change report (http://www.ecoinvent.org/database/ecoinvent-version-3/reports-of-changes/), and the results of the central updates were reviewed extensively. The changes added e.g. consistent water flows and other information throughout the database. The documentation of this dataset can be found in the ecoinvent reports of version 2, which are still available via the ecoinvent website. The change report linked above covers all central changes that were made during the conversion process.]

## Included activities end
This dataset includes the reaction of phosporous trichloride with chlorine to phosphorous pentachloride in an autoclave with a reaction temperatur at 180-210°C and under pressure. Energy consumption, chlorine and phosphorous trichloride emissions to air are calculated. For infrastructure, the ecoinvent dataset "chemical plant, organics" is accounted. Transportation efforts are based on ecoinvent standard estimates.

## Geography
Some European datasets are used for global processes.

## Technology
This dataset includes a method of producing phosphorous pentachloride out of phosphorous trichloride and chlorine. Temperature in the autoclave reactor: 180 - 220 °C; pressure: 5-6 bar. PCL3 conversion is 93.9%.

## Reference product
- phosphorus pentachloride: 1 kg; By-product classification allocatable product; CPC 34231: Chemical elements n.e.c.; inorganic acids except phosphoric, nitric and sulphonitric; inorganic oxygen compoun[…]; HS2017 281214: Phosphorus pentachloride; CAS 10026-13-8
  EcoSpold01Location=CN
  production volume 3.80251 kg
    This is a placeholder value that does not reflect real-world production volumes. This dataset does not currently require a real-world production volume to work in the database framework, and no actual data were collected yet. This has no negative effect on the results of the ecoinvent database.
  property price 0.973776 EUR2005
    Calculated based on inputs: The price of the product has been calculated as a sum of the values of the material and energy inputs for this product. This value is therefore a rough estimation. It may underestimate the real price since there are additional expenses when producing any product. These expences can include for example labour costs, treatment of waste materials and profit for the producer. Please consider carefully whether this level of data quality is acceptable for your application.
  properties: carbon allocation 0 kg, carbon content 0, carbon content, fossil 0, carbon content, non-fossil 0, dry mass 1 kg, water content 0, water in wet mass 0 kg, wet mass 1 kg

## Inputs from technosphere
- chemical factory, organics: 4e-10 unit; lognormal variance with pedigree 0.448, pedigree (5,5,5,5,3)
  EcoSpold01Location=RER
- chlorine, liquid: 0.0604761, 0.302324 kg (2 suppliers, which the file names only by identifier); sum of these 0.3628 kg; lognormal variance with pedigree 0.0846, pedigree (2,4,5,5,1)
  EcoSpold01Location=RER
  properties: dry mass 1 kg, wet mass 1 kg
- electricity, medium voltage: 2.603e-6, 2.31515e-7, 2.01856e-5, 2.64513e-5, 2.8012e-5, 1.42679e-5, 1.97062e-6, 1.24726e-5, 5.26499e-7, 8.4295e-5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 kWh (47 suppliers, which the file names only by identifier); sum of these 0.002 kWh; lognormal variance with pedigree 0.096, pedigree (4,5,5,5,3)
  EcoSpold01Location=CN
- heat, district or industrial, natural gas: 0.086696 MJ; lognormal variance with pedigree 0.102, pedigree (4,4,5,5,1)
  EcoSpold01Location=RER
  properties: heating value, net 1 MJ
- phosphorous chloride: 0.232317, 0.470413 kg (2 suppliers, which the file names only by identifier); sum of these 0.70273 kg; lognormal variance with pedigree 0.0846, pedigree (2,4,5,5,1)
  EcoSpold01Location=RER
  properties: dry mass 1 kg, wet mass 1 kg

## Emissions to nature
- Chlorine [air, urban air close to ground]: 0.022315 kg; lognormal variance with pedigree 0.0846, pedigree (2,4,5,5,1)
- Phosphorus trichloride [air, urban air close to ground]: 0.043222 kg; lognormal variance with pedigree 0.2046, pedigree (2,4,5,5,1)

## Sampling procedure
patent, ecoinvent

## Extrapolations
see Geography This dataset has been copied from an original dataset covering the geography CN. The uncertainty has been adjusted accordingly.

## Review by Christian Bauer 2010-02-08
passed
