# concrete production, 35MPa, for building construction, with cement, CEM II/A

Dataset: EcoSpold 2, unit process
Geography: GLO
Time period: 2015-10-25 to 2023-12-31
Technology level: current
Classification: ISIC rev.4 ecoinvent: 2395:Manufacture of articles of concrete, cement and plaster
Synonyms: ready-mix concrete; ready mixed concrete
Scenario: Business-as-Usual
System model: Allocation, cut-off by classification
Generated by: [System]
Published in: Silva, F. B. 2017
Database: ecoinvent
isCopyrightProtected: true
accessRestrictedTo: 1

## General comment
This dataset is a copy of the corresponding BR dataset.

## Included activities start
From reception of raw materials at the ready-mix plant gate.

## Included activities end
This activity ends before the delivery of concrete at the construction site. The dataset includes the whole manufacturing processes to produce ready-mixed concrete, internal processes (material handling and mixing) and infrastructure. Water used for cleaning the truck and waste water were also accounted for.

## Geography
Brazilian data. For some exchanges GLO values have been used as proxy. Data quality indicators adjusted accordingly.

## Technology
Typical technology for average Brazilian production.

## Time period
Literature data are from 2015 and mix designs were provided in 2017

## Parameters
- losses: 0.038 dimensionless
  Literature value. Losses due to returned concrete from construction sites.

## Reference product
- concrete, 35MPa: 1 m3; name ref; By-product classification allocatable product; CPC 37510: Non-refractory mortars and concretes; HS2017 6810: Cement, concrete or artificial stone; whether or not reinforced, articles thereof
  35 MPa concrete is intended for building structures in general, not expposed to freeze-thaw, including residential, commercial and industrial uses.
  production volume 1.63426e6 m3; name PV
    The global production volume was calculated as follows: 1) The total production volume of each country was calculated 2) The production volume was scaled based on construction output (*) 3) The average of the results was assumed to be the GLO PV 4) The share of each different technology was calculated 5) The weighted average of the shares for each country was used to split the GLO PV into different technologies (*) Construction output assumed per country Country Share ZA 0.50% BR 2.01% CH 0.36% CO 0.58% IN 9.67% PE 0.31% CA-QC 0.37% RNA without CA-QC 9.03% AT 0.40% Source: OECD. 2018. Input-Output Tables. http://www.oecd.org/trade/input-outputtables.htm. United Nations Statistics Division. 2019. UN data. A world of information. http://data.un.org/. Timmer, M.P., E. Dietzenbacher, B. Los, R. Stehrer, and G.J. de Vries. 2015. An Illustrated User Guide to the World Input-Output Database: the Case of Global Automotive Production. Review of International Economics 23(3): 575-605. http://doi.wiley.com/10.1111/roie.12178. The data was adjusted based on PPP, data from: The World Bank. 2019. World Bank Open Data. https://data.worldbank.org/
  property cement content 329 kg; name cement
  property fly ash content 73 kg; name fly_ash
  property gravel content 1406 kg; name gravel
  property price 185 EUR2005
    Estimated to be the same price as in case of concrete, normal (Data are not easily available. Therefore, an average price of products supplied by the activities in the same ISIC 3 code has been applied.This price is obtained as '_49 Concrete, asphalt and other mineral products, EU27 virgin, EU27' in the 'EU & DK Input Output Database' (available in SimaPro). The price is assumed to be valid for both RER2003, RER 2004, world 2003 and world 2004. Multiplied by density.).
  property sand content 462 kg; name sand
  property wet mass 2386 kg; name concrete_density
  properties: carbon allocation 0 kg, carbon content 0, carbon content, fossil 0, carbon content, non-fossil 0, dry mass 2275 kg, water content 0.0487912, water in wet mass 111 kg

## Inputs from technosphere
- cement, CEM II/A: 22.1551, 0.157257, 0.325071, 318.865 kg (4 suppliers, which the file names only by identifier); sum of these 341.502 kg; lognormal variance with pedigree 0.0114, pedigree (2,3,2,5,1)
  Calculated value, Weighted average from 18 concrete mix designs. Losses considered.
  Uncertainty: V
  properties: dry mass 1 kg, wet mass 1 kg
- chemical, organic: 2.79222 kg; lognormal variance with pedigree 0.0504, pedigree (2,3,2,5,1)
  Calculated value. Value for polyfunctional admixture + superplasticizer admixture. Weighted average from 18 concrete mix designs. Losses considered.
  Uncertainty: V
  properties: bulk density 1140 kg/m3, carbon content, fossil 0.628, dry mass 1 kg, heating value, net 19.03 MJ, wet mass 1 kg
  note on carbon content, fossil: This dataset is an unweighted average of 20 organic substances (listed in Tab 88.1, ecoinvent v2.2 report 8, part II), being part of the top100 chemicals included in this database. The C-content has also been calculated as an unweighted average of the C content of the substances composing this dataset.
- concrete mixing factory: 4.57e-7 unit; source Kellenberger D. 2007; lognormal variance with pedigree 0.3326, pedigree (2,5,3,5,1)
  Literature value. From ecoinvent dataset "concrete production, 35 MPa, RNA only, GLO, 2006-2006" Access date 10.10.2017
  Uncertainty: B
- diesel, burned in building machine: 5.01 MJ; source Alessandra Castro 2015; lognormal variance with pedigree 0.0054, pedigree (2,4,2,5,1)
  Literature value. Diesel used in internal transportation equipment.
  Uncertainty: V
  property density 0.84 kg/l; name density_diesel
  property heating value, net 1 MJ; name NHV_diesel
- electricity, medium voltage: 2.99 kWh; lognormal variance with pedigree 0.2374, pedigree (2,3,2,5,1)
  Calculated value, Weighted average amount from 29 concrete plants.
  Uncertainty: V
- gravel, crushed: 62.7779, 1103.13, 0.379451, 287.395, 5.7473 kg (5 suppliers, which the file names only by identifier); sum of these 1459.43 kg; lognormal variance with pedigree 0.0144, pedigree (2,3,2,5,1)
  Calculated value = amount of artificial sand (crushed gravel is used as a proxy in this case) + amount of gravel, Weighted average from 18 concrete mix designs. Losses considered.
  Uncertainty: V
  properties: dry mass 1 kg, wet mass 1 kg
- lubricating oil: 0.0086826, 0.0412174 kg (2 suppliers, which the file names only by identifier); sum of these 0.0499 kg; lognormal variance with pedigree 0.2994, pedigree (2,3,2,5,1)
  Calculated value. Weighted average amount from 34 concrete plants.
  Uncertainty: V
  properties: carbon content, fossil 0.75, dry mass 1 kg, heating value, net 40.2 MJ, wet mass 1 kg
  note on carbon content, fossil: Lubricating oil is produced from diesel. C-content/dry mass of fats and oils considered 75%, from: ecoinvent v2.2 report, n 15a, pg 40
  note on heating value, net: Literature value, Source: IPCC 2006, 2006 IPCC Guidelines for National Greenhouse Gas Inventories, Prepared by the National Greenhouse Gas Inventories Programme, Eggleston H.S., Buendia L., Miwa K., Ngara T. and Tanabe K. (eds). Published: IGES, Japan
- sand: 7.25577, 0.0868751, 472.176, 0.0376686 kg (4 suppliers, which the file names only by identifier); sum of these 479.556 kg; lognormal variance with pedigree 0.1054, pedigree (2,3,2,5,1)
  (same comment as for cement, CEM II/A)
  properties: dry mass 1 kg, wet mass 1 kg
- scrap steel: -0.0160969, -0.00769335, -9.74723e-6 kg (3 suppliers, which the file names only by identifier); sum of these -0.0238 kg; lognormal variance with pedigree 0.0208, pedigree (2,5,2,5,1)
  Literature value. From ecoinvent dataset "concrete production, 35 MPa, RNA only, GLO, 2006-2006l". Access date: 10.10.2017.
  Uncertainty: B
  production volume; = scrap*PV/abs(ref)
    Calculated based on the relationship with the reference product.
  properties: dry mass 1 kg, wet mass 1 kg
- steel, low-alloyed, hot rolled: 0.0238 kg; name steel; source Kellenberger D. 2007; lognormal variance with pedigree 0.0226, pedigree (2,5,3,5,1)
  (same comment as for scrap steel)
  properties: carbon content, fossil 0.005, dry mass 1 kg, wet mass 1 kg
  note on carbon content, fossil: Low alloyed steel composition given in Tab. 3.2 ecoinvent v2.2 report 10_partII. Steel assumed to have a C content of 0.5%
- synthetic rubber: 0.0345 kg; name rub; lognormal variance with pedigree 0.7234, pedigree (2,3,2,5,1)
  Calculated value. Weighted average amount from 34 concrete plants.
  Uncertainty: V
  properties: carbon content, fossil 0.871949, dry mass 1 kg, heating value, net 26.42 MJ, wet mass 1 kg
  note on carbon content, fossil: EPDM (Ethylene-propene-diene terpolymer) rubber is a terpolymer of ethylene, propene, and a diene with the residual unsaturated portion of the diene in the side chain (ecoinvent v2.2 report 7-part XX & Ullmann). Chemical formula (deduced from Evidences of Solvent-Induced Miscibility in Polychloroprene-co-Ethylene-Propene Diene Terpolymer Blends, Dubey et al., Journal of Applied Polymer Science, 2009, 111:1884–1891): C20H35
- tap water: 194.106 kg; lognormal variance with pedigree 0.0054, pedigree (2,3,2,5,1)
  Calculated value. Water for concrete mix. Includes water from aggregates. Weighted average from 18 concrete mix designs. Losses considered.
  Uncertainty: V
  properties: carbon content, fossil 0.00178991, dry mass 0.000337476 kg, water content 2962.17, wet mass 1 kg
  note on carbon content, fossil: Bicarbonate content is 2.93 mol/m3. CO2 content is 0.1 mol/m3 (ecoinvent v2.2 report 8, Tab 93.1).
- waste concrete: -6.19512, -84.451, -0.0219035 kg (3 suppliers, which the file names only by identifier); sum of these -90.668 kg; source Alessandra Castro 2015; lognormal variance with pedigree 0.0052, pedigree (2,4,1,5,1)
  Literature value.
  Uncertainty: V
  production volume; = was_concrete*PV/abs(ref)
    Calculated based on the relationship with the reference product.
  properties: dry mass 0.9535 kg, water content 0.0487677, wet mass 1 kg
- waste mineral oil: -0.000339086, -0.0358638, -0.0136971 kg (3 suppliers, which the file names only by identifier); sum of these -0.0499 kg; lognormal variance with pedigree 0.2992, pedigree (2,3,1,5,1)
  Calculated value.
  Uncertainty: V
  production volume; = oil*PV/abs(ref)
    Calculated based on the relationship with the reference product.
  properties: carbon content, fossil 0.864444, dry mass 0.9 kg, heating value, net 34.7 MJ, water content 0.111111, wet mass 1 kg
  note on carbon content, fossil: Tab A.6, ecoinvent v2.2 report 13_I. C content has been calculated after data in the tables, and then referred to 1 kg DM
  note on heating value, net: Value taken from the general comment of the treatment dataset.
- waste rubber, unspecified: -0.000550632, -0.0208328, -0.0131166 kg (3 suppliers, which the file names only by identifier); sum of these -0.0345 kg; lognormal variance with pedigree 0.7232, pedigree (2,3,1,5,1)
  Calculated value.
  Uncertainty: V
  production volume; = rubber*PV/abs(ref)
    Calculated based on the relationship with the reference product.
  properties: carbon content, fossil 0.853, dry mass 1 kg, heating value, net 27.19 MJ, wet mass 1 kg
- wastewater from concrete production: -0.000774829, -0.160225 m3 (2 suppliers, which the file names only by identifier); sum of these -0.161 m3; lognormal variance with pedigree 0.3702, pedigree (2,3,1,5,1)
  Calculated value. Based on weighted average amount from 26 concrete plants, referring to water used for washing the concrete trucks and the internal circulation area in the ready-mix facility.
  Uncertainty: V
  production volume; = wastewater*PV/abs(ref)
    Calculated based on the relationship with the reference product.
  properties: carbon content, fossil 0.027074, dry mass 0.44914 kg, water content 2225.48, wet mass 1000 kg

## Inputs from nature
- Water, unspecified natural origin [natural resource, in water]: 0.161 m3; name was_water; lognormal variance with pedigree 0.3704, pedigree (2,3,2,5,1)
  Calculated value. Weighted average amount from 26 concrete plants. Water used for washing the concrete trucks and the internal circulation area in the ready-mix facility.
  Uncertainty: V

## Sampling procedure
Data on concrete mixes are a weighted average of 18 concrete ready mix facilities of 5 different companies. For other flows, the weighted average was calculated from several different concrete plants (26 for process water, 34 for rubber parts and lubricating oil, 29 for electricity), belonging to one of the 7 concrete making companies that provided data. Basic uncertainty was calculated from the coefficient of variation of the sample. Diesel consumption and waste generation values were taken from a published paper. For other materials used for maintenance (steel parts) and infrastructure, data were extrapolated from the dataset "concrete production, 35 MPa, RNA only, GLO, 2006-2009" (accessed 10.10.2017). No conversion to the geometric mean of the lognormal distribution was done, for consistency reasons with other ecoinvent datasets. Representativeness is of 8,33% based on the number of companies that provided concrete mix data (5) divided by the total number of ready-mix concrete production companies in Brazil (60), which is the number of respondant companies in the national survey carried out by ABCP in 2013.

## Extrapolations
Data from a relatively small sample concentrated mostly in the Southeastern region of Brazil, with some facilities spread out in the South, Northeast and Center-west regions, are used to represent the Brazilian concrete production. Some flows have been kept as in the dataset "concrete production, 35 MPa, RNA only, GLO, 2006-2006", but uncertainties were adjusted accordingly. This dataset is a copy of the corresponding BR dataset.
