# mecoprop production

Dataset: EcoSpold 2, unit process
Geography: RER
Time period: 2000-01-01 to 2023-12-31
Technology level: current
Classification: ISIC rev.4 ecoinvent: 2021:Manufacture of pesticides and other agrochemical products
Classification: EcoSpold01Categories: agricultural means of production/pesticides
Synonyms: Kuril; Famantar; Banvel extra; Oxitop; MP Combi plus; Bromox Duo; Combi-fluide Optica; Selectox Royal; Foxpro D+; Bilto; Belgran-P; Médox; Nova>proXX; Rasenrein plus; Aim; Burvel-P; Oxytril-P; Dicamba PP, Dicotex, Duplosan KV Combi, Duplosan KV-combi; Ruga; Break Royal; Dicotex; Foxpro D+, Foxtar D+, Foxtril P, Herba>proXX, Ioniz-P; MCPP Combi; Lazeril-P; Progazon; Erp-Actril-P; Exelor; Turf-Cleaner; Balbec Extra; Duplosan KV Combi; Progazon, Puma AD, Rasenrein plus, Ruga; Selectyl; Dicamba PP; Popuril; Ioniz-P; Famantril; Foxtar D+; Popular; PP-Kombi-Plus; Netril; Puma AD; Médox Combi; Duplosan KV-combi; MP Combi plus, Netril, Nova>proXX, Orkan; Orkan; Foxtril P; Windweg R; Herba>proXX; Erpax Combi F; Plüsstar
Tags: ConvertedDataset
Scenario: Business-as-Usual
System model: Allocation, cut-off by classification
Share of production covered: 100 %
Generated by: Jürgen Sutter
Published in: Nemecek, T. 2007
Database: ecoinvent
isCopyrightProtected: true
accessRestrictedTo: 1

## General comment
This dataset represents the production of mecoprop (1 kg of active ingredient). Raw materials are modelled with a stoichiometric calculation. Energy consumption is modelled with data from a similar process. The emissions are estimated. Infrastructure is included with a default value.
[This dataset was already contained in the ecoinvent database version 2. It was not individually updated during the transfer to ecoinvent version 3. Life Cycle Impact Assessment results may still have changed, as they are affected by changes in the supply chain, i.e. in other datasets. This dataset was generated following the ecoinvent quality guidelines for version 2. It may have been subject to central changes described in the ecoinvent version 3 change report (http://www.ecoinvent.org/database/ecoinvent-version-3/reports-of-changes/), and the results of the central updates were reviewed extensively. The changes added e.g. consistent water flows and other information throughout the database. The documentation of this dataset can be found in the ecoinvent reports of version 2, which are still available via the ecoinvent website. The change report linked above covers all central changes that were made during the conversion process.]

## Included activities start
From reception of precursors (chlorine, ethylene, methanol, carbon monoxide, water decarbonised, and phenol) at the factory gate.

## Included activities end
This activity ends with mecoprop at the factory gate. The dataset includes the input materials, energy uses, infrastructure and emissions. The dataset doesn't include emulsives, additives etc.

## Geography
The inventory is modelled for Europe.

## Technology
Mecoprop is a pesticide produced in three steps from phenol:
C6H6O + CH4O → C7H8O + H2O
C7H8O + Cl2 → C7H7ClO + HCl
C7H7ClO + C3H5ClO2 → C10H14ClO3 + HCl
A precursor that is used for the mecoprop production is 2-chloro-propionic acid (C3H5ClO2).
2-Chloro-propionic acid (C3H5ClO2) is produced from propionic acid and chlorine:
C3H6O2 + Cl2 → C3H5ClO2 + HCl

## Time period
Time of publications

## Parameters
- fraction, cooling water, cooling pond system, to air: 0.032 dimensionless; name fraction_CW_CP_to_air; lognormal variance with pedigree 0.0413, pedigree (2,3,1,3,1)
  Calculated based on literature value (Scown, C.D., 2011, Water Footprint of U.S. Transportation Fuels and supplying information of the article) (Vionnet, S., Quantis Water Database - Technical Report, 2012).
- fraction, cooling water, once-through system, to air: 0.004 dimensionless; name fraction_CW_OT_to_air; lognormal variance with pedigree 0.0413, pedigree (2,3,1,3,1)
  (same comment as for fraction, cooling water, cooling pond system, to air)
- fraction, cooling water, recirculating system, to air: 0.771 dimensionless; name fraction_CW_R_to_air; lognormal variance with pedigree 0.0413, pedigree (2,3,1,3,1)
  (same comment as for fraction, cooling water, cooling pond system, to air)
- fraction, cooling water, to air: 0.3875 dimensionless; name fraction_CW_to_air; = (0.5*fraction_CW_OT_to_air)+(0.5*fraction_CW_R_to_air); lognormal variance with pedigree 0.092025, pedigree (4,4,3,2,4)
  Calculated value based on literature value (see comments of the other parametres present in this dataset) and expert opinion. In the case when no industry/literature data are available about the type of cooling or directly fraction, cooling water, to air specific for the process a default assumption is applied. It is assumed that the once-through cooling system is used in 50% of all cases and recirculating system is used in another 50% of all cases.
- fraction, water, decarbonised, to air: 0.3875 dimensionless; name fraction_WDC_to_air; = fraction_CW_to_air; lognormal variance with pedigree 0.092025, pedigree (4,4,3,2,4)
  Calculated value. See comments in the other parametres present in this dataset. Decarbonised water is considered to be always used as cooling water, thus cooling water fractions to air are applied to all carbonised water input flows to calculate the amount of water consumed in the processes.

## Reference product
- mecoprop: 1 kg; By-product classification allocatable product; CPC 34663: Herbicides, anti-sprouting products and plant-growth regulators; HS2017 380859: Insecticides, rodenticides, fungicides, disinfectants, herbicides and the like; containing goods specified [...]; CAS 93-65-2
  EcoSpold01Location=RER
  Mecoprop is an odorless, white to light brown crystalline solid. It is moderately soluble in water and readily soluble in acetone, diethyl ether, ethanol, ethyl acetate, and chloroform. It exists as a mixture of two optically active isomers of which one, the R+ form, mecoprop-p is herbicidally active. It is stable to heat, hydrolysis, reduction, and oxidation. It is acidic. Solutions of the salts of mecoprop are stable for several years under normal storage conditions. In cooler temperatures, the salt may crystallize out of solution but will re-dissolve on warming.
  The name "MCPP" is approved by the Japanese Ministry of Agriculture, Forestry and Fisheries.
  The (R)-isomer of this substance has the ISO common name mecoprop-P.
  Mecoprop is a selective, systemic, hormonelike herbicide used post-emergence for the control of broad-leaved weeds in wheat, barley, oats, seed crops, grassland, etc.
  production volume 1.32237 kg
    This is a placeholder value that does not reflect real-world production volumes. This dataset does not currently require a real-world production volume to work in the database framework, and no actual data were collected yet. This has no negative effect on the results of the ecoinvent database. The placeholder value of this activity was scaled according to the nominal GDP of 2005 (source: United Nations, http://data.un.org/Glossary.aspx?q=GDP+%28current+US%24%29, accessed 20130726) to reflect an appropriate share of the global production volume, which is also a placeholder value.
  property price 1.65375 EUR2005
    Calculated based on inputs: The price of the product has been calculated as a sum of the values of the material and energy inputs for this product. This value is therefore a rough estimation. It may underestimate the real price since there are additional expenses when producing any product. These expences can include for example labour costs, treatment of waste materials and profit for the producer. Please consider carefully whether this level of data quality is acceptable for your application.
  properties: carbon allocation 0.55814 kg, carbon content 0.55814, carbon content, fossil 0.55814, carbon content, non-fossil 0, dry mass 1 kg, water content 0, water in wet mass 0 kg, wet mass 1 kg

## Inputs from technosphere
- carbon monoxide: 0.12293 kg; source Unger T A 1996; lognormal variance with pedigree 0.076, pedigree (4,5,5,1,1)
  Stoichiometric calculation, assuming an efficiency of 95% per reaction step.
  Further references:
  Samel et al. 2000. Ulf-Rainer Samel, Walter Kohler, Armin Otto Gamer, Ullrich Keuser: Propionic Acid and Derivatives. In: Ullmann's Encyclopedia of Industrial Chemistry, Seventh Edition, 2009 Electronic Release (ed. Fiedler E., Grossmann G., Kersebohm D., Weiss G. and Witte C.). 7 th Electronic Release Edition. Wiley InterScience, New York, Article Online Posting Date: June 15, 2000. Online-Version under: DOI: 10.1002/14356007.a22_223
  EcoSpold01Location=RER
  Uncertainty: Stoechiometric calculation
  properties: carbon content, fossil 0.428571, dry mass 1 kg, heating value, net 12.99 MJ, wet mass 1 kg
  note on carbon content, fossil: CO. It is assumed that CO is produced from partial combustion of heavy heating oil.
- chemical factory, organics: 1.1977e-9 unit; lognormal variance with pedigree 0.448, pedigree (4,5,5,5,5)
  Estimation, based on a production capacity of 50,000 t per year and a plant life time of 50 years, therefore an amount of 4X10-10 units per kg of produced chemical is aded to the unit process of the respective chemical. The amount is accounted for each production step. This might be an overestimation in some multistep syntheses.
  EcoSpold01Location=RER
  Uncertainty: Estimation
- chlorine, liquid: 0.65441 kg; source Unger T A 1996; lognormal variance with pedigree 0.076, pedigree (4,5,5,1,1)
  (same comment as for carbon monoxide)
  properties: dry mass 1 kg, wet mass 1 kg
- electricity, medium voltage: 1.04548 kWh; source Gendorf 2000; lognormal variance with pedigree 0.076, pedigree (4,5,5,1,1)
  EcoSpold01Location=UCTE
  Estimation, assuming a default value, originated from calculation of avarage consumption of electricity and heat per kg of product (3.2 MJ kg-1), and a resulting amount of electricity of 0,333 kW for every reaction step per kg reaction product, considering that the demand is made up of a mix that inlcudes 38% electricity. Additionally, reaction steps are approximated with energy consumption data, assuming that inventory flows can be estimated using process data for basic operation steps, available for specific organic chemicals.
  Further references:
  Kim S., Overcash M.: Energy in chemical manufacturing processes: gate-to-gate information for life cycle assessment. In: Journal of Chemical Technology & Biotechnology vol. 78, no. 9: 995-1005(11). 2003
  Uncertainty: Estimation
- ethylene: 0.12293 kg; source Unger T A 1996; lognormal variance with pedigree 0.076, pedigree (4,5,5,1,1)
  EcoSpold01Location=RER
  Stoichiometric calculation, assuming an efficiency of 95% per reaction step.
  Further references:
  Samel et al. 2000. Ulf-Rainer Samel, Walter Kohler, Armin Otto Gamer, Ullrich Keuser: Propionic Acid and Derivatives. In: Ullmann's Encyclopedia of Industrial Chemistry, Seventh Edition, 2009 Electronic Release (ed. Fiedler E., Grossmann G., Kersebohm D., Weiss G. and Witte C.). 7 th Electronic Release Edition. Wiley InterScience, New York, Article Online Posting Date: June 15, 2000. Online-Version under: DOI: 10.1002/14356007.a22_223
  Uncertainty: Stoechiometric calculation
  properties: carbon content, fossil 0.857143, dry mass 1 kg, heating value, net 43.22 MJ, wet mass 1 kg
- heat, district or industrial, natural gas: 4.55126 MJ; source Gendorf 2000; lognormal variance with pedigree 0.076, pedigree (4,5,5,1,1)
  Estimation, assuming a default value, originated from calculation of avarage consumption of electricity and heat per kg of product (3.2 MJ kg-1), and a resulting amount of heat of 2 MJ for every reaction step per kg reaction product, considering that the demand is made up of a mix that includes 50% natural gas. Additionally, reaction steps are approximated with energy consumption data, assuming that inventory flows can be estimated using process data for basic operation steps, available for specific organic chemicals.
  Further references:
  Kim S., Overcash M.: Energy in chemical manufacturing processes: gate-to-gate information for life cycle assessment. In: Journal of Chemical Technology & Biotechnology vol. 78, no. 9: 995-1005(11). 2003
  Uncertainty: Estimation
  properties: heating value, net 1 MJ
- heat, district or industrial, other than natural gas: 2.54032 MJ; source Gendorf 2000; lognormal variance with pedigree 0.076, pedigree (4,5,5,1,1)
  Estimation, assuming a default value, originated from calculation of avarage consumption of electricity and heat per kg of product (3.2 MJ kg-1), and a resulting amount of heat of 2 MJ for every reaction step per kg reaction product, considering that the demand is made up of a mix that inlcudes 12% steam from external energy sources. Additionally, reaction steps are approximated with energy consumption data, assuming that inventory flows can be estimated using process data for basic operation steps, available for specific organic chemicals.
  Further references:
  Kim S., Overcash M.: Energy in chemical manufacturing processes: gate-to-gate information for life cycle assessment. In: Journal of Chemical Technology & Biotechnology vol. 78, no. 9: 995-1005(11). 2003
  Uncertainty: Estimation
  properties: heating value, net 1 MJ
- methanol: 0.17441 kg; source Unger T A 1996; lognormal variance with pedigree 0.076, pedigree (4,5,5,1,1)
  EcoSpold01Location=GLO
  Stoichiometric calculation, assuming an efficiency of 95% per reaction step.
  Further references:
  Fliege 2000. Helmut Fiege: Cresols and Xylenols. In: Ullmann's Encyclopedia of Industrial Chemistry, Seventh Edition, 2009 Electronic Release (ed. Fiedler E., Grossmann G., Kersebohm D., Weiss G. and Witte C.). 7 th Electronic Release Edition. Wiley InterScience, New York, Article Online Posting Date: June 15, 2000. Online-Version under: DOI: 10.1002/14356007.a08_025
  Uncertainty: Stoechiometric calculation
  properties: carbon content, fossil 0.375, dry mass 1 kg, heating value, net 20 MJ, wet mass 1 kg
  note on heating value, net: Based on literature, page 533, Report 17: Jungbluth, N., Chudacoff, M., Dauriat, A., Dinkel, F., Doka, G., Faist Emmenegger, M., Gnansounou, E., Kljun, N., Schleiss, K., Spielmann, M., Stettler, C., Sutter, J. 2007: Life Cycle Inventories of Bioenergy. ecoinvent report No. 17, Swiss Centre for Life Cycle Inventories, Dübendorf, CH.
- phenol: 0.50176 kg; source Unger T A 1996; lognormal variance with pedigree 0.076, pedigree (4,5,5,1,1)
  EcoSpold01Location=RER
  Stoichiometric calculation, assuming an efficiency of 95% per reaction step.
  Further references:
  Fliege 2000. Helmut Fiege: Cresols and Xylenols. In: Ullmann's Encyclopedia of Industrial Chemistry, Seventh Edition, 2009 Electronic Release (ed. Fiedler E., Grossmann G., Kersebohm D., Weiss G. and Witte C.). 7 th Electronic Release Edition. Wiley InterScience, New York, Article Online Posting Date: June 15, 2000. Online-Version under: DOI: 10.1002/14356007.a08_025
  Uncertainty: Stoechiometric calculation
  properties: carbon content, fossil 0.765957, dry mass 1 kg, heating value, net 30.93 MJ, wet mass 1 kg
- sodium hydroxide, without water, in 50% solution state: 0.54217 kg; source Unger T A 1996; lognormal variance with pedigree 0.076, pedigree (4,5,5,1,1)
  Stoichiometric calculation, assuming an efficiency of 100%.
  Further references:
  Fliege 2000. Helmut Fiege: Cresols and Xylenols. In: Ullmann's Encyclopedia of Industrial Chemistry, Seventh Edition, 2009 Electronic Release (ed. Fiedler E., Grossmann G., Kersebohm D., Weiss G. and Witte C.). 7 th Electronic Release Edition. Wiley InterScience, New York, Article Online Posting Date: June 15, 2000. Online-Version under: DOI: 10.1002/14356007.a08_025
  EcoSpold01Location=RER
  Uncertainty: Stoechiometric calculation
  properties: dry mass 1 kg, heating value, net 3.03 MJ, wet mass 1 kg
- water, decarbonised: 2.50678e-5, 0.0261698, 0.00144473, 0.0394787, 0.00795871 kg (5 suppliers, which the file names only by identifier); sum of these 0.075077 kg; source Unger T A 1996; lognormal variance with pedigree 0.076, pedigree (4,5,5,1,1)
  EcoSpold01Location=RER
  Stoichiometric calculation, assuming an efficiency of 100%.
  Further references:
  Samel et al. 2000. Ulf-Rainer Samel, Walter Kohler, Armin Otto Gamer, Ullrich Keuser: Propionic Acid and Derivatives. In: Ullmann's Encyclopedia of Industrial Chemistry, Seventh Edition, 2009 Electronic Release (ed. Fiedler E., Grossmann G., Kersebohm D., Weiss G. and Witte C.). 7 th Electronic Release Edition. Wiley InterScience, New York, Article Online Posting Date: June 15, 2000. Online-Version under: DOI: 10.1002/14356007.a22_223
  Stoichiometric calculation, assuming an efficiency of 100%.
  Further references:
  Samel et al. 2000. Ulf-Rainer Samel, Walter Kohler, Armin Otto Gamer, Ullrich Keuser: Propionic Acid and Derivatives. In: Ullmann's Encyclopedia of Industrial Chemistry, Seventh Edition, 2009 Electronic Release (ed. Fiedler E., Grossmann G., Kersebohm D., Weiss G. and Witte C.). 7 th Electronic Release Edition. Wiley InterScience, New York, Article Online Posting Date: June 15, 2000. Online-Version under: DOI: 10.1002/14356007.a22_223
  Uncertainty: Stoechiometric calculation
  properties: wet mass 1 kg

## Inputs from nature
- Water, cooling, unspecified natural origin [natural resource, in water]: 0.071862 m3; name water_cooling_UNO_input; source Gendorf 2000; lognormal variance with pedigree 0.076, pedigree (4,5,5,1,1)
  Estimation (24 kg cooling water per kg produced chemical per step).
  Uncertainty: Estimation

## Emissions to nature
- Carbon dioxide, fossil [air, urban air close to ground]: 0.28357 kg; lognormal variance with pedigree 0.1786, pedigree (4,5,5,5,5)
  Estimation, based on the assumption that 0.2% of volatile input materials is emitted to air occurring from the purge vent, the destillation vent and fugitive emission sources. Remaining gases like CH4 or CO are oxidated to CO2. The carbon contained in the removed carbon compounds from wastewater treatment was accounted as CO2 emissions to air (assuming a removal efficiency of 90%).
  Uncertainty: Estimation
- Carbon monoxide, fossil [air, urban air close to ground]: 0.00024587 kg; lognormal variance with pedigree 0.798, pedigree (4,5,5,5,5)
  Estimation, based on the assumption that 0.2% of volatile input materials is emitted to air occurring from the purge vent, the destillation vent and fugitive emission sources.
  Uncertainty: Estimation
- Chlorine [air, urban air close to ground]: 0.0013088 kg; lognormal variance with pedigree 0.188, pedigree (4,5,5,5,5)
  (same comment as for Carbon monoxide, fossil)
- Ethylene [air, urban air close to ground]: 0.00024587 kg; lognormal variance with pedigree 0.188, pedigree (4,5,5,5,5)
  (same comment as for Carbon monoxide, fossil)
- Methanol [air, urban air close to ground]: 0.00034881 kg; lognormal variance with pedigree 0.188, pedigree (4,5,5,5,5)
  (same comment as for Carbon monoxide, fossil)
- Phenol [air, urban air close to ground]: 0.0010035 kg; lognormal variance with pedigree 0.188, pedigree (4,5,5,5,5)
  (same comment as for Carbon monoxide, fossil)
- Propionic acid [air, urban air close to ground]: 0.0006173 kg; lognormal variance with pedigree 0.188, pedigree (4,5,5,5,5)
  (same comment as for Carbon monoxide, fossil)
- Water [air, unspecified]: 0.0278756 m3; name water_to_air_unspecified; = (water_decarbonised_input/1000*fraction_WDC_to_air)+(water_cooling_UNO_input*fraction_CW_to_air); lognormal variance with pedigree 0.0807, pedigree (2,2,5,1,1)
  Calculated value based on literature values and expert opinion. See comments in the parametres' comment field.
  property fraction, origin: fresh water 0.00104365; name fraction_origin_fresh_water
  property fraction, origin: salt water 0; name fraction_origin_salt_water
  property fraction, origin: unspecified 0.998956; name fraction_origin_unspecified
- Chloride [water, surface water]: 0.51432 kg; lognormal variance with pedigree 0.448, pedigree (4,5,5,5,5)
  Estimation, assuming that the remaining amount of unreacted input materials leave the production process with the wastewater, wich is further treated in an internal wastewater plant.
  Uncertainty: Estimation
- Ethylene oxide [water, surface water]: 0.00059008 kg; lognormal variance with pedigree 0.448, pedigree (4,5,5,5,5)
  (same comment as for Chloride)
- Methanol [water, surface water]: 0.00083716 kg; lognormal variance with pedigree 0.448, pedigree (4,5,5,5,5)
  (same comment as for Chloride)
- Phenol [water, surface water]: 0.0014049 kg; lognormal variance with pedigree 0.448, pedigree (4,5,5,5,5)
  (same comment as for Chloride)
- Propionic acid [water, surface water]: 0.0014815 kg; lognormal variance with pedigree 0.448, pedigree (4,5,5,5,5)
  (same comment as for Chloride)
- Sodium I [water, surface water]: 0.31175 kg; lognormal variance with pedigree 0.798, pedigree (4,5,5,5,5)
  (same comment as for Chloride)
- Water [water, unspecified]: 0.0440615 m3; name water_to_water_unspecified; = (water_decarbonised_input/1000)*(1-fraction_WDC_to_air)+water_cooling_UNO_input*(1-fraction_CW_to_air); lognormal variance with pedigree 0.0807, pedigree (2,2,5,1,1)
  (same comment as for Water)
  property carbon content, fossil 0; name C_content_fossil
  property carbon content, non-fossil 0; name C_content_non_fossil
  property dry mass 0 kg; name DM
  property fraction, origin: fresh water 0.00104365; name fraction_origin_fresh_water_Ww
  property fraction, origin: salt water 0; name fraction_origin_salt_water_Ww
  property fraction, origin: unspecified 0.998956; name fraction_origin_unspecified_Ww
  property water in wet mass 1000 kg; name WWM
  property wet mass 1000 kg; name WM

## Sampling procedure
Literature data

## Review by Thomas Nemecek 2010-03-11
Passed.
none

## Review by Roland Hischier 2011-11-18
Transfer of documentation done.
