# ammonium nitrate production

Dataset: EcoSpold 2, unit process
Geography: RNA
Time period: 2011-01-01 to 2023-12-31
Technology level: current
Classification: ISIC rev.4 ecoinvent: 2012:Manufacture of fertilizers and nitrogen compounds
Synonyms: AN, Ammonsalpeter
Scenario: Business-as-Usual
System model: Allocation, cut-off by classification
Generated by: Anna Kounina
Database: ecoinvent
isCopyrightProtected: true
accessRestrictedTo: 1

## General comment
This dataset represents the production of 1 kg of ammonium nitrate (AN) with 33.5% N. Ammonium nitrate (formula NH4NO3), is a salt of ammonia and nitric acid, used widely in fertilisers and explosive. The commercial grade contains about 33.5 percent nitrogen (N), all of which is in forms utilizable by plants. Ammonium nitrate is produced through the neutralisation of aqueous nitric acid by gaseous ammonia. The production process comprises three main unit operations: neutralisation, evaporation, and solidification (prilling and granulation). In recent years, energy utilisation has improved extensively through the introduction of pressure neutralisers with recycling and heat recovery. The neutralisation reaction as the first process step is strongly exothermic. In the second step, the evaporation, a solution is formed at a high concentration and the excess water is evaporated. The last step, the solidification, makes the ammonium nitrate into prills or granules.
Ammonium nitrate is a colourless crystalline substance (melting point 169.6 °C). It is highly soluble in water; heating of the water solution decomposes the salt to nitrous oxide (laughing gas).
The main data sources for this dataset are Fertilizers Europe (2014, 2016). Additional data sources are listed as follows.
References:
Fertilizers Europe (2000): Best Available Techniques for Pollution Prevention and Control in the European Fertilizer Industry. Booklet No. 1 of 8: Production of Ammonia. Fertilizers Europe, Brussels.
Kongshaug G. (1998): Energy Consumption and Greenhouse Gas Emissions in Fertilizer Production. IFA 20th July 1998
Davies J., Haglund C. (1999): Life Cycle Inventory of Fertiliser Production. SIK-Report No 654 1999. Chalmers University of Technology, Sweden.
Fertilizers Europe (2000): Best Available Techniques for Pollution Prevention and Control in the European Fertilizer Industry. Booklet No. 2 of 8: Production of Nitric Acid. Fertilizers Europe, Brussels.
Patyk R., Reinhardt, G.A. (1997): Düngemittel - Energie- und Stoffstrombilanzen. Vieweg Verlag, Braunschweig.
Fertilizers Europe (2014): Average Emissions Year 2011. Fertilizers Europe Environmental report (internal).
Fertilizers Europe (2016): Carbon Footprint Calculator for Fertilizer Production. Specification. Version 2.1
Fertilizers Europe (2016): Average Emissions Year 2014. Fertilizers Europe Environmental report (internal). Used for updated energy and GHG emission in Carbon Footprint Calculator
Fertilizers Europe (2000): Best Available Techniques for Pollution Prevention and Control in the European Fertilizer Industry. Booklet No. 6 of 8: Production of Ammonium Nitrate and Calcium Ammonium Nitrate. Fertilizers Europe, Brussels.
Althaus H.-J., Chudacoff M., Hischier R., Jungbluth N., Osses M. and Primas A. (2007) Life Cycle Inventories of Chemicals. ecoinvent report No. 8, v2.0. EMPA Dübendorf, Swiss Centre for Life Cycle Inventories, Dübendorf, CH.

## Included activities start
The activity includes all the raw and processed materials necessary to produce this product. Liquid ammonia, nitric acid, heat (as natural gas and fuel oil) and electricity are included. Direct emissions include ammonia and particulate matter to air and nitrogen to water.

## Included activities end
The activity ends with the final product being ready for transportation at the production site.

## Geography
The dataset is representative of ammonia nitrate production in North America, adapted from data collected in European fertiliser plants.

## Technology
This datasets corresponds to the technology used in North American fertiliser plants. The production of ammonium nitrate involves the combination of liquid ammonia with nitric acid, using heat and electricity.

## Time period
Primary data were collected on fertiliser production for the year 2011. These data were based on annual average data for the year 2011.

## Reference product
- ammonium nitrate: 1 kg; name RP; By-product classification allocatable product; CPC 34613: Ammonium nitrate; HS2017 310230: Fertilizers, mineral or chemical; nitrogenous, ammonium nitrate, whether or not in aqueous solution; CAS 6484-52-2
  production volume 8.3689e9 kg; name PVRP
    Kg/y,International Fertilizers Association (2014).
  property carbon content, fossil 0
    Carbon content, fossil is calculated based on the chemical formula of the substance.
  property hydrogen content 0.0503678
    Hydrogen content (on a dry matter basis) of ammonium nitrate is calculated from the molecular formula of the substance (H4N2O3).
  property nitrogen content 0.349979
    Nitrogen content (on a dry matter basis) of ammonium nitrate is calculated from the molecular formula of the substance (H4N2O3).
  property oxygen content 0.599654
    Oxygen content (on a dry matter basis) of ammonium nitrate is calculated from the molecular formula of the substance (H4N2O3).
  property price 0.41 EUR2005
    Prices are calculated on basis of Import/Export data (tonnes and US$) from UN Trade Statistics Database (http://data.un.org/Browse.aspx?d=ComTrade, accessed 7/7-2010). N, P2O5, or K2O content (http://www.fertilizer.org/ifa/Home-Page/STATISTICS/Conversions-factors)
  properties: carbon allocation 0 kg, carbon content 0, carbon content, non-fossil 0, dry mass 1 kg, water content 0, water in wet mass 0 kg, wet mass 1 kg

## Inputs from technosphere
- ammonia, anhydrous, liquid: 0.203 kg; lognormal variance with pedigree 0.0446, pedigree (3,4,5,1,1)
  Data from Fertilizer Europe (2014).
  properties: dry mass 1 kg, hydrogen content 0.177547, nitrogen content 0.822453, wet mass 1 kg
  note on hydrogen content: Hydrogen content (on a dry matter basis) of ammonia, anhydrous, liquid is calculated from the molecular formula of the substance (H3N).
  note on nitrogen content: Nitrogen content (on a dry matter basis) of ammonia, anhydrous, liquid is calculated from the molecular formula of the substance (H3N).
- chemical factory, organics: 3.819e-10 unit; lognormal variance with pedigree 0.344, pedigree (3,4,5,1,1)
  Estimation, based on various data sources (Althaus et al. 2007).
- electricity, low voltage: 0.0833333 kWh; lognormal variance with pedigree 0.0446, pedigree (3,4,5,1,1)
  Data from Fertilizer Europe (2014).
- heat, district or industrial, natural gas: 0.4 MJ; lognormal variance with pedigree 0.0446, pedigree (3,4,5,1,1)
  Data from Fertilizer Europe (2014).
  properties: heating value, net 1 MJ
- heavy fuel oil, burned in refinery furnace: 0.00572335 MJ; lognormal variance with pedigree 0.0446, pedigree (3,4,5,1,1)
  Calculation, based on Fertilizer Europe (2014).
  properties: carbon content, fossil 0.849, dry mass 0.0242718 kg, wet mass 0.0242718 kg
- nitric acid, without water, in 50% solution state: 0.754 kg; lognormal variance with pedigree 0.0446, pedigree (3,4,5,1,1)
  Data from Fertilizer Europe (2014).
  properties: dry mass 1 kg, hydrogen content 0.0159952, nitrogen content 0.222283, oxygen content 0.761721, wet mass 1 kg
  note on hydrogen content: Hydrogen content (on a dry matter basis) of nitric acid, without water, in 50% solution state is calculated from the molecular formula of the substance (HNO3).
  note on nitrogen content: Nitrogen content (on a dry matter basis) of nitric acid, without water, in 50% solution state is calculated from the molecular formula of the substance (HNO3).
  note on oxygen content: Oxygen content (on a dry matter basis) of nitric acid, without water, in 50% solution state is calculated from the molecular formula of the substance (HNO3).
- steam, in chemical industry: 0.290909 kg; lognormal variance with pedigree 0.0446, pedigree (3,4,5,1,1)
  Calculation, based on Fertilizer Europe (2014).
  properties: dry mass 1 kg, wet mass 1 kg

## Emissions to nature
- Ammonia [air, urban air close to ground]: 0.00018 kg; lognormal variance with pedigree 0.084, pedigree (3,4,5,1,1)
  Data from Fertilizer Europe (2014).
- Particulate Matter, > 2.5 um and < 10um [air, urban air close to ground]: 0.000333 kg; lognormal variance with pedigree 0.164, pedigree (3,4,5,1,1)
  Data from Fertilizer Europe (2014).
- Water [air, unspecified]: 0.000217 m3; lognormal variance with pedigree 0.084, pedigree (3,4,5,1,1)
  Data from Fertilizer Europe (2014).
- Ammonium [water, surface water]: 0.00024656 kg; lognormal variance with pedigree 0.084, pedigree (3,4,5,1,1)
  Estimation, based on various data sources (Althaus et al. 2007).
- Nitrogen [water, surface water]: 0.00025 kg; lognormal variance with pedigree 0.084, pedigree (3,4,5,1,1)
  Data from Fertilizer Europe (2014).

## Extrapolations
The data were extrapolated from respective data for the geography of Europe, i.e. production of ammonia and nitric acid are adapted to reflect production in North America.
