# potato starch production

Dataset: EcoSpold 2, unit process
Geography: RoW
Time period: 2002-01-01 to 2023-12-31
Technology level: current
Classification: ISIC rev.4 ecoinvent: 1062:Manufacture of starches and starch products
Classification: EcoSpold01Categories: agricultural production/plant production
Tags: ConvertedDataset
Scenario: Business-as-Usual
System model: Allocation, cut-off by classification
Share of production covered: 100 %
Generated by: Thomas Nemecek
Published in: Nemecek, T. 2007
Database: ecoinvent
isCopyrightProtected: true
accessRestrictedTo: 1

## General comment
The potatoes used as input refer to IP production. In the reference the inventory is based on, by-products evolving during starch production were allocated on an economic basis. The inventory refers to potato starch with a water content of 20% by weight.
[This dataset was already contained in the ecoinvent database version 2. It was not individually updated during the transfer to ecoinvent version 3. Life Cycle Impact Assessment results may still have changed, as they are affected by changes in the supply chain, i.e. in other datasets. This dataset was generated following the ecoinvent quality guidelines for version 2. It may have been subject to central changes described in the ecoinvent version 3 change report (http://www.ecoinvent.org/database/ecoinvent-version-3/reports-of-changes/), and the results of the central updates were reviewed extensively. The changes added e.g. consistent water flows and other information throughout the database. The documentation of this dataset can be found in the ecoinvent reports of version 2, which are still available via the ecoinvent website. The change report linked above covers all central changes that were made during the conversion process.]

## Included activities end
The production steps required to obtain potato starch from potato tubers were taken into account, including washing of the potatoes, chopping, separation of the potato fruit water, washing, refinering and finally drying of the starch. Processing of process water was included. Infrastructure use is consideration.

## Geography
Values refer to the situation in Germany.

## Technology
Refers to typical potato starch production in Germany.

## Time period
Year when the data for this inventory was delivered.

## Parameters
- fraction, process water, to air: 0.9 dimensionless; name fraction_PW_to_air; lognormal variance with pedigree 0.092025, pedigree (4,4,3,2,4)
- fraction, tap water, to air: 0.9 dimensionless; name fraction_TW_to_air; lognormal variance with pedigree 0.092025, pedigree (4,4,3,2,4)

## Reference product
- potato starch: 1 kg; By-product classification allocatable product; CPC 23220: Starches; inulin; wheat gluten; dextrins and other modified starches; HS2017 110813: Starch; potato
  EcoSpold01Location=DE
  production volume 3.75794 kg
    This is a placeholder value that does not reflect real-world production volumes. This dataset does not currently require a real-world production volume to work in the database framework, and no actual data were collected yet. This has no negative effect on the results of the ecoinvent database.
  property carbon content, non-fossil 0.46
    C-content of starch is considered 46% on dry mass basis (from "Evolutionary and Biochemical Aspects", A.D. Kay and T. Vrede (in Global Ecology, 2010, Elsevier B.V., S.E. Jørgensen Ed.)).
  property heating value, net 10.66 MJ
    LHV is calculated based on the Carbon content of the product. More details can be found on the respective documentation.
  property price 0.357 EUR2005
    Calculated value based on data from United Nations Commodity Trade Statistics Database (comtrade.un.org). UN comtrade category: 110813 Potato starch. Year: 2005. Using exchange rate of 1EURO = 1.209 USD. Average of price of import into 5 main markets (EU, US, JP, IN and CN).
  properties: carbon allocation 0.368 kg, carbon content 0.46, carbon content, fossil 0, dry mass 0.8 kg, water content 0.25, water in wet mass 0.2 kg, wet mass 1 kg

## Inputs from technosphere
- chemical factory, organics: 4e-10 unit; lognormal variance with pedigree 0.3427, pedigree (2,2,5,5,1)
  EcoSpold01Location=RER
- electricity, medium voltage: 6.40277e-5, 9.58427e-5, 3.02776e-5, 0.000563583, 0.000330781, 0.000392173, 0.00476358, 1.13612e-5, 0.0950227, 0.0319273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 kWh (47 suppliers, which the file names only by identifier); sum of these 0.1675 kWh; lognormal variance with pedigree 0.0427, pedigree (2,2,5,5,1)
  EcoSpold01Location=DE
- heat, district or industrial, natural gas: 0.0262471, 1.59726, 0.000493602 MJ (3 suppliers, which the file names only by identifier); sum of these 1.624 MJ; lognormal variance with pedigree 0.0427, pedigree (2,2,5,5,1)
  EcoSpold01Location=RER
  properties: heating value, net 1 MJ
- potato: 3.91983, 0.000171665 kg (2 suppliers, which the file names only by identifier); sum of these 3.92 kg; lognormal variance with pedigree 0.0427, pedigree (2,2,5,5,1)
  properties: carbon content, non-fossil 0.4282, dry mass 0.22 kg, water content 3.54545, wet mass 1 kg
- tap water: 0.00756038, 0.0115252, 0.0215054, 0.0579339, 0.00697368, 0.290619, 0.00518287, 3.3257 kg (8 suppliers, which the file names only by identifier); sum of these 3.727 kg; source Würdinger E. 2003; lognormal variance with pedigree 0.0427, pedigree (2,2,5,5,1)
  Literature Value.
  EcoSpold01Location=RER
  properties: carbon content, fossil 0.00178991, dry mass 0.000337476 kg, water content 2962.17, wet mass 1 kg
  note on carbon content, fossil: Bicarbonate content is 2.93 mol/m3. CO2 content is 0.1 mol/m3 (ecoinvent v2.2 report 8, Tab 93.1).
- wastewater from potato starch production: -0.00578303, -2.7966e-5 m3 (2 suppliers, which the file names only by identifier); sum of these -0.005811 m3; lognormal variance with pedigree 0.0027, pedigree (2,2,1,5,1)
  EcoSpold01Location=CH
  production volume
    Calculated from the production volume of potato starch in proportion to the respective output amounts.
  properties: carbon content, non-fossil 0.993118, dry mass 0.871801 kg, water content 1146.05, wet mass 1000 kg
  note on carbon content, non-fossil: COD= 2 kg/m3 (Tab A.19, ecoinvent v2.2 report 13_I). COD was converted to TOC, using conversion factors in Tab 4.10 (ecoinvent v2.2 report 13_IV). TOC was considered as Total Carbon.

## Emissions to nature
- Water [air, unspecified]: 0.00069624 m3; name water_to_air_unspecified; lognormal variance with pedigree 0.0827, pedigree (2,2,5,5,1)
  Calculated value based on literature values and expert opinion. See comments in the parametres' comment field. The potatoes entering the process from technosphare have 0.2 water in wet mass, i.e. 3.92kg of potatoes contain (3.92*0.2=) 0.784kg of water. Part of this amount of water evaporates, part is released back to environment as water emission to water.
  property fraction, origin: fresh water 1; name fraction_origin_fresh_water
  property fraction, origin: salt water 0; name fraction_origin_salt_water
  property fraction, origin: unspecified 0; name fraction_origin_unspecified

## Sampling procedure
Data based on a detailed literature study.

## Extrapolations
Potato production in Germany approximated by Swiss data. This dataset has been copied from an original dataset covering the geography DE. The uncertainty has been adjusted accordingly.

## Review by Maggie Osses 2007-10-24
Passed.
