# hard coal briquettes production

Dataset: EcoSpold 2, unit process
Geography: RoW
Time period: 1980-01-01 to 2023-12-31
Technology level: current
Classification: EcoSpold01Categories: hard coal/fuels
Classification: ISIC rev.4 ecoinvent: 1920:Manufacture of refined petroleum products
Tags: ConvertedDataset
Scenario: Business-as-Usual
System model: Allocation, cut-off by classification
Generated by: Christian Bauer
Published in: Röder, A. 2007
Database: ecoinvent
isCopyrightProtected: true
accessRestrictedTo: 1

## General comment
Low heating value is 31.4 MJ/kg. Bulk density is 780 kg/m3. Only emission data on particles were available for the production process. The emissions of trace elements are assumed to be proportional to their relevant content in the input coal.
[This dataset was already contained in the ecoinvent database version 2. It was not individually updated during the transfer to ecoinvent version 3. Life Cycle Impact Assessment results may still have changed, as they are affected by changes in the supply chain, i.e. in other datasets. This dataset was generated following the ecoinvent quality guidelines for version 2. It may have been subject to central changes described in the ecoinvent version 3 change report (http://www.ecoinvent.org/database/ecoinvent-version-3/reports-of-changes/), and the results of the central updates were reviewed extensively. The changes added e.g. consistent water flows and other information throughout the database. The documentation of this dataset can be found in the ecoinvent reports of version 2, which are still available via the ecoinvent website. The change report linked above covers all central changes that were made during the conversion process.]

## Included activities end
The process considered is brick making using bitumen as binder, at a temperature below 100°C. The module includes energy input, transport of the coal and emissions to air.

## Geography
German conditions.

## Technology
No specific information available.

## Reference product
- hard coal briquettes: 1 MJ; By-product classification allocatable product; CPC 11020: Patent fuel and similar solid fuels manufactured from hard coal; HS2017 270120: Briquettes, ovoids and similar solid fuels; manufactured from coal
  EcoSpold01Location=RER
  production volume 2.67763 MJ
    This is a placeholder value that does not reflect real-world production volumes. This dataset does not currently require a real-world production volume to work in the database framework, and no actual data were collected yet. This has no negative effect on the results of the ecoinvent database.
  property carbon content, fossil 0.833333
    80% C and 4% water in wet mass (ecoinvent v2.1 report 6_VI Table 7.1)
  property price 0.00759 EUR2005
    The production volume of this product is small compared to other products supplied by the activities within the same ISIC 3 category. Therefore, an average price of products supplied by the activities in the same ISIC 3 code has been applied.This price is obtained as '_37 Refined petroleum products and fuels, EU27' in the 'EU & DK Input Output Database' (available in SimaPro, 0.24 EUR2003 per kg DS). The price is assumed to be valid for both RER2005, world 2005. Energy content: 31.4 MJ/kg (From Eocinvent)
  properties: carbon allocation 0.0254777 kg, carbon content 0.833333, carbon content, non-fossil 0, dry mass 0.0305732 kg, water content 0.0416667, water in wet mass 0.00127389 kg, wet mass 0.0318471 kg

## Inputs from technosphere
- electricity, medium voltage: 9.23872e-6, 0.000184292, 6.19215e-5, 2.82921e-6, 5.66264e-7, 1.2159e-7, 1.9031e-5 kWh (7 suppliers, which the file names only by identifier); sum of these 0.000278 kWh; lognormal variance with pedigree 0.342, pedigree (1,1,5,5,1)
  own assumption
  EcoSpold01Location=UCTE
- hard coal: 0.00210216, 0.000498826, 0.0148775, 0.00349395, 0.0021452, 0.00313407, 0.00463607, 0.000912269 kg (8 suppliers, which the file names only by identifier); sum of these 0.0318 kg; lognormal variance with pedigree 0.042, pedigree (1,1,5,5,1)
  EcoSpold01Location=UCTE
  standard for ressources
  properties: carbon content, fossil 0.845, dry mass 0.94 kg, heating value, net 27.91 MJ, water content 0.0638298, wet mass 1 kg
  note on carbon content, fossil: C content 75-94% (specified in Tab 1.1, report 6, part VI). A mean content of 0.845 kg C/ kg dry hard coal was considered
  note on heating value, net: Based on the Characterization factor of Hard coal in the CED method
- hard coal ash: -0.00016 kg; lognormal variance with pedigree 0.012, pedigree (1,1,1,5,1)
  own assumption
  EcoSpold01Location=DE
  production volume
    Calculated from the production volume of hard coal briquettes in proportion to the respective output amounts.
  properties: dry mass 1 kg, wet mass 1 kg
- hard coal briquettes factory: 5.31e-13 unit; lognormal variance with pedigree 0.082, pedigree (1,1,5,5,1)
  EcoSpold01Location=RER
  own assumption
- heat, district or industrial, other than natural gas: 0.00749653, 3.473e-6 MJ (2 suppliers, which the file names only by identifier); sum of these 0.0075 MJ; lognormal variance with pedigree 0.342, pedigree (1,1,5,5,1)
  own assumption
  EcoSpold01Location=RER
  properties: heating value, net 1 MJ
- pitch: 0.000310945, 1.39378e-5, 6.87022e-6, 0.000120548, 1.98976e-5, 0.0017578 kg (6 suppliers, which the file names only by identifier); sum of these 0.00223 kg; lognormal variance with pedigree 0.052, pedigree (1,1,5,5,1)
  own assumption
  EcoSpold01Location=RER
  properties: carbon content, fossil 0.83, dry mass 1 kg, heating value, net 28 MJ, wet mass 1 kg

## Emissions to nature
- Aluminium III [air, non-urban air or from high stacks]: 5e-7 kg; lognormal variance with pedigree 0.692, pedigree (1,1,5,5,1)
  own assumption
- Antimony ion [air, non-urban air or from high stacks]: 3.3e-11 kg; lognormal variance with pedigree 0.692, pedigree (1,1,5,5,1)
  own assumption
- Arsenic ion [air, non-urban air or from high stacks]: 2.9e-10 kg; lognormal variance with pedigree 0.082, pedigree (1,1,5,5,1)
  own assumption
- Barium II [air, non-urban air or from high stacks]: 5.9e-9 kg; lognormal variance with pedigree 0.692, pedigree (1,1,5,5,1)
  own assumption
- Beryllium II [air, non-urban air or from high stacks]: 6.6e-11 kg; lognormal variance with pedigree 0.692, pedigree (1,1,5,5,1)
  own assumption
- Boron [air, non-urban air or from high stacks]: 1.6e-9 kg; lognormal variance with pedigree 0.692, pedigree (1,1,5,5,1)
  own assumption
- Bromine [air, non-urban air or from high stacks]: 3.3e-10 kg; lognormal variance with pedigree 0.692, pedigree (1,1,5,5,1)
  own assumption
- Cadmium II [air, non-urban air or from high stacks]: 1.5e-11 kg; lognormal variance with pedigree 0.082, pedigree (1,1,5,5,1)
  own assumption
- Calcium II [air, non-urban air or from high stacks]: 5.9e-8 kg; lognormal variance with pedigree 0.692, pedigree (1,1,5,5,1)
  own assumption
- Chromium III [air, non-urban air or from high stacks]: 5.9e-10 kg; lognormal variance with pedigree 0.692, pedigree (1,1,5,5,1)
  own assumption
- Cobalt II [air, non-urban air or from high stacks]: 1.5e-10 kg; lognormal variance with pedigree 0.692, pedigree (1,1,5,5,1)
  own assumption
- Copper ion [air, non-urban air or from high stacks]: 4.4e-10 kg; lognormal variance with pedigree 0.692, pedigree (1,1,5,5,1)
  own assumption
- Iodine [air, non-urban air or from high stacks]: 5.9e-11 kg; lognormal variance with pedigree 0.692, pedigree (1,1,5,5,1)
  own assumption
- Iron ion [air, non-urban air or from high stacks]: 2.1e-7 kg; lognormal variance with pedigree 0.692, pedigree (1,1,5,5,1)
  own assumption
- Lead II [air, non-urban air or from high stacks]: 1.2e-9 kg; lognormal variance with pedigree 0.082, pedigree (1,1,5,5,1)
  own assumption
- Magnesium [air, non-urban air or from high stacks]: 1.8e-5 kg; lognormal variance with pedigree 0.692, pedigree (1,1,5,5,1)
  own assumption
- Manganese II [air, non-urban air or from high stacks]: 2.1e-9 kg; lognormal variance with pedigree 0.692, pedigree (1,1,5,5,1)
  own assumption
- Mercury II [air, non-urban air or from high stacks]: 2.9e-12 kg; lognormal variance with pedigree 0.342, pedigree (1,1,5,5,1)
  own assumption
- Molybdenum VI [air, non-urban air or from high stacks]: 8.8e-11 kg; lognormal variance with pedigree 0.692, pedigree (1,1,5,5,1)
  own assumption
- Nickel II [air, non-urban air or from high stacks]: 5.9e-10 kg; lognormal variance with pedigree 0.692, pedigree (1,1,5,5,1)
  own assumption
- Particulate Matter, < 2.5 um [air, non-urban air or from high stacks]: 1.91e-5 kg; lognormal variance with pedigree 0.342, pedigree (1,1,5,5,1)
  own assumption
- Particulate Matter, > 10 um [air, non-urban air or from high stacks]: 5.4e-6 kg; lognormal variance with pedigree 0.342, pedigree (1,1,5,5,1)
  own assumption
- Particulate Matter, > 2.5 um and < 10um [air, non-urban air or from high stacks]: 1.15e-5 kg; lognormal variance with pedigree 0.342, pedigree (1,1,5,5,1)
  own assumption
- Phosphorus [air, non-urban air or from high stacks]: 2.9e-9 kg; lognormal variance with pedigree 0.692, pedigree (1,1,5,5,1)
  own assumption
- Potassium I [air, non-urban air or from high stacks]: 5.9e-8 kg; lognormal variance with pedigree 0.692, pedigree (1,1,5,5,1)
  own assumption
- Scandium [air, non-urban air or from high stacks]: 1.2e-10 kg; lognormal variance with pedigree 0.692, pedigree (1,1,5,5,1)
  own assumption
- Selenium IV [air, non-urban air or from high stacks]: 2.9e-11 kg; lognormal variance with pedigree 0.692, pedigree (1,1,5,5,1)
  own assumption
- Silicon [air, non-urban air or from high stacks]: 7.4e-7 kg; lognormal variance with pedigree 0.692, pedigree (1,1,5,5,1)
  own assumption
- Sodium I [air, non-urban air or from high stacks]: 2.9e-8 kg; lognormal variance with pedigree 0.692, pedigree (1,1,5,5,1)
  own assumption
- Strontium II [air, non-urban air or from high stacks]: 5.9e-9 kg; lognormal variance with pedigree 0.692, pedigree (1,1,5,5,1)
  own assumption
- Thallium I [air, non-urban air or from high stacks]: 2.9e-11 kg; lognormal variance with pedigree 0.692, pedigree (1,1,5,5,1)
  own assumption
- Thorium [air, non-urban air or from high stacks]: 1.2e-10 kg; lognormal variance with pedigree 0.692, pedigree (1,1,5,5,1)
  own assumption
- Titanium ion [air, non-urban air or from high stacks]: 1.8e-8 kg; lognormal variance with pedigree 0.692, pedigree (1,1,5,5,1)
  own assumption
- Uranium [air, non-urban air or from high stacks]: 5.9e-11 kg; lognormal variance with pedigree 0.692, pedigree (1,1,5,5,1)
  own assumption
- Vanadium V [air, non-urban air or from high stacks]: 1.2e-9 kg; lognormal variance with pedigree 0.692, pedigree (1,1,5,5,1)
  own assumption
- Zinc II [air, non-urban air or from high stacks]: 1.5e-11 kg; lognormal variance with pedigree 0.692, pedigree (1,1,5,5,1)
  own assumption
- Zirconium [air, non-urban air or from high stacks]: 1.5e-11 kg; lognormal variance with pedigree 0.692, pedigree (1,1,5,5,1)
  own assumption

## Sampling procedure
literature

## Extrapolations
see Geography/Text This dataset has been copied from an original dataset covering the geography RER. The uncertainty has been adjusted accordingly.

## Review by Christian Bauer 2003-08-29
passed
