# bamboo pole production

Dataset: EcoSpold 2, unit process
Geography: CO
Time period: 2010-01-01 to 2023-12-31
Technology level: current
Classification: ISIC rev.4 ecoinvent: 162:Manufacture of products of wood, cork, straw and plaiting materials
Scenario: Business-as-Usual
System model: Allocation, cut-off by classification
Generated by: Edwin Zea Escamilla
Database: ecoinvent
isCopyrightProtected: true
accessRestrictedTo: 1

## General comment
This dataset represents the production of 1 Kg of bamboo pole. Bamboo culm with a water content of u =80 % is used for the production of bamboo pole. The production takes place at a bamboo processing facility and includes technical drying to a final water content of u =20% and trimming of culms. For this material, natural gas was considered the fuel used for the drying process.The figures origin from mainly calculations and literature values.
The pole is derived directly from the bamboo culm and is usually trimmed to between 4 and 6 m and treated against fungi and pests using boric acid. Bamboo poles can be used directly for the construction of columns, beams, or struts and are also the main input for other bamboo-based construction materials (BBCM) (Vogtländer et al., 2010, Vogtländer et al., 2014). This dataset was developed with the support of the International Organization for Bamboo and Rattan INBAR
Ref:
Vogtländer, J., P. van der Lugt, and H. Brezet, The sustainability of bamboo products for local and Western European applications. LCAs and land-use. Journal of Cleaner Production, 2010. 18(13): p. 1260-1269.
Vogtländer, J.G., N.M. van der Velden, and P. van der Lugt, Carbon sequestration in LCA, a proposal for a new approach based on the global carbon cycle; cases on wood and on bamboo. Int. J. Life Cycle Assess., 2014. 19(1): p. 13-23.

## Included activities start
From reception of bamboo culm and treatment products at processing facility

## Included activities end
This activity ends with Bamboo Pole (u=20%) at the processing facility. The dataset includes the inputs drying, treatment, trimming processes, as far as they are available. The dataset includes infrastructure. Losses of boric acid to the environment are not included in the dataset. However, they are not expected to be significant.

## Geography
Data for Colombia

## Technology
Current production technology

## Reference product
- bamboo pole: 1 kg; name RP; By-product classification allocatable product; CPC 31212: Wood, continuously shaped along any of its edges or faces (including strips and friezes for parquet flooring, […]; HS2017 440921: Wood; bamboo (including unassembled strips and friezes for parquet flooring), continuously shaped along any[...]
  production volume 3.88e7 kg; name PV_RP; = 1.94E+08*0.3*0.555555556/0.833333333
    The PV pf bamboo pole was calculated on the PV of bamboo culm. Similar to the Ecuadorian dataset, it was assumed that 30 % of the harvested bamboo culms are used for construction materials. The PV was adjusted based on the differences in dry mass of bamboo culm and bamboo pole.
  property heating value, net 17.68 MJ
    Jetsada P. & Panmanas S. (2017),Evaluation of lower heating value and elemental composition of bamboo using near infrared spectroscopy,Energy,Volume 121,Pages 147-158,ISSN 0360-5442,https://doi.org/10.1016/j.energy.2017.01.020.
  property price 0.529363 EUR2005
    Based on expert judgement, price given as 0.64 USD/kg. Converted with an exchange rate of 1EURO = 1.209 USD.
  properties: carbon allocation 0.411667 kg, carbon content 0.494, carbon content, fossil 0, carbon content, non-fossil 0.494, dry mass 0.833333 kg, water content 0.2, water in wet mass 0.166667 kg, wet mass 1 kg

## Inputs from technosphere
- air compressor, screw-type compressor, 300kW: 4.64e-6 unit; lognormal variance with pedigree 0.303825, pedigree (2,3,3,2,2)
  Used in the treatment process to pump the Boric acid solution into the poles. Amount estimated based on the potential service lifetime of the device.
- bamboo culm: 1.53 kg; name amount_culm; lognormal variance with pedigree 0.004425, pedigree (2,3,3,2,2)
  property wet mass 1 kg; name WM_culm
  properties: carbon content, non-fossil 0.494, dry mass 0.555556 kg, heating value, net 9.87 MJ, water content 0.8
- boric acid, anhydrous, powder: 0.00019 kg; lognormal variance with pedigree 0.004425, pedigree (2,3,3,2,2)
  Considered as the most common and low impact treatment for bio-based products. The amount reflects the amount of boric acid that is actually absorbed by the poles. The treatment solution is kept in tanks where the poles are submerged, once the treatment is finished the poles are extracted and the solution is recovered
  properties: dry mass 1 kg, wet mass 1 kg
- electricity, medium voltage: 0.3 kWh; lognormal variance with pedigree 0.004425, pedigree (2,3,3,2,2)
  Refers to the electricity required to trim the poles
- heat, central or small-scale, natural gas: 0.2419 MJ; lognormal variance with pedigree 0.004425, pedigree (2,3,3,2,2)
  Refers to the energy required in the technical drying process
  properties: heating value, net 1 MJ
- power sawing, with catalytic converter: 0.00051 hour; = 0.02/60*amount_culm; lognormal variance with pedigree 0.004425, pedigree (2,3,3,2,2)
  0.02 minutes sawing per kg of bamboo culm
- tap water: 0.00234333 kg; lognormal variance with pedigree 0.004425, pedigree (2,3,3,2,2)
  Water used for the dilution of boric acid to create a solution of ca. 7.5 %.
  properties: carbon content, fossil 0.00178991, dry mass 0.000337476 kg, water content 2962.17, wet mass 1 kg
  note on carbon content, fossil: Bicarbonate content is 2.93 mol/m3. CO2 content is 0.1 mol/m3 (ecoinvent v2.2 report 8, Tab 93.1).
- technical wood drying facility: 6.09e-7 unit; lognormal variance with pedigree 0.303825, pedigree (2,3,3,2,2)
  Amount calculated based on the lifetime capacity of the plant. Based on the default value of 3.3E-08 unit of “wooden board manufacturing plant, organic bonded boards” taken from Werner F., Althaus H.-J., Künniger T., Richter K. and Jungbluth N. (2007) Life Cycle Inventories of Wood as Fuel and Construction Material. Final report ecoinvent data v2.0 No. 9. Swiss Centre for Life Cycle Inventories, Dübendorf, CH.
- waste bamboo residues: -0.030342 kg; name bamboo_residues
  Refers to the by-product of the trimming process of panels and other products that require exact dimensions.
  production volume; = PV_RP*(bamboo_residues/RP)
    Calculated from production volume of reference product using the relative outputs.
  property dry mass 0.833333 kg; name DM_residues
  properties: carbon content, non-fossil 0.494, heating value, net 17.68 MJ, water content 0.2, wet mass 1 kg
  note on heating value, net: Jetsada P. & Panmanas S. (2017),Evaluation of lower heating value and elemental composition of bamboo using near infrared spectroscopy,Energy,Volume 121,Pages 147-158,ISSN 0360-5442,https://doi.org/10.1016/j.energy.2017.01.020.

## Emissions to nature
- Water [air, unspecified]: 0.000502191 m3; lognormal variance with pedigree 0.004425, pedigree (2,3,3,2,2)
  Value was calculated to maintain water balance. Represents the evaporated water from the drying process

## Sampling procedure
The dataset is mostly based on literature values and was developed with the support of the International Organization for Bamboo and Rattan INBAR
