# impact extrusion of aluminium, 5 strokes

Dataset: EcoSpold 2, unit process
Geography: RER
Time period: 2006-01-01 to 2023-12-31
Technology level: current
Classification: ISIC rev.4 ecoinvent: 2591:Forging, pressing, stamping and roll-forming of metal; powder metallurgy
Classification: EcoSpold01Categories: metals/chipless shaping
Tags: ConvertedDataset
Scenario: Business-as-Usual
System model: Allocation, cut-off by classification
Share of production covered: 0 %
Generated by: Roland Steiner
Published in: Steiner, R. 2007
Database: ecoinvent
isCopyrightProtected: true
accessRestrictedTo: 1

## General comment
The reference for impact extrusion is 1 kg of metal formed by impact extrusion. As there is a large variation from factory to factory with regard to the LCI, it is advised that in case this dataset becomes important in the results, it has to be investigated further if the rough estimations made are applicable or not.
[This dataset was already contained in the ecoinvent database version 2. It was not individually updated during the transfer to ecoinvent version 3. Life Cycle Impact Assessment results may still have changed, as they are affected by changes in the supply chain, i.e. in other datasets. This dataset was generated following the ecoinvent quality guidelines for version 2. It may have been subject to central changes described in the ecoinvent version 3 change report (http://www.ecoinvent.org/database/ecoinvent-version-3/reports-of-changes/), and the results of the central updates were reviewed extensively. The changes added e.g. consistent water flows and other information throughout the database. The documentation of this dataset can be found in the ecoinvent reports of version 2, which are still available via the ecoinvent website. The change report linked above covers all central changes that were made during the conversion process.]

## Included activities start
The activity starts with the workpiece entering the process. The material on which this activity is applied it is not included as input.

## Included activities end
This dataset encompasses the electricity consumption of the machine as well as common pre- and post treatments. Furthermore, machine as well as factory infrastructure and operation are considered as well. Degreasing is not included and has to be added if necessary.

## Geography
Geographical coverage encompasses the industrialised countries.

## Technology
Average technology

## Reference product
- impact extrusion of aluminium, 5 strokes: 1 kg; By-product classification allocatable product; CPC 89330: Metal forging, pressing, stamping, roll forming and powder metallurgy services
  EcoSpold01Location=RER
  production volume 1.32237 kg
    This is a placeholder value that does not reflect real-world production volumes. This dataset does not currently require a real-world production volume to work in the database framework, and no actual data were collected yet. This has no negative effect on the results of the ecoinvent database. The placeholder value of this activity was scaled according to the nominal GDP of 2005 (source: United Nations, http://data.un.org/Glossary.aspx?q=GDP+%28current+US%24%29, accessed 20130726) to reflect an appropriate share of the global production volume, which is also a placeholder value.
  property price 0.403456 EUR2005
    Calculated based on inputs: The price of the product has been calculated as a sum of the values of the material and energy inputs for this product. This value is therefore a rough estimation. It may underestimate the real price since there are additional expenses when producing any product. These expences can include for example labour costs, treatment of waste materials and profit for the producer. Please consider carefully whether this level of data quality is acceptable for your application.
  properties: carbon allocation 0 kg, carbon content 0

## Inputs from technosphere
- compressed air, 700 kPa gauge: 1.45 m3; lognormal variance with pedigree 0.1386, pedigree (4,3,5,1,4)
  Estimated
  EcoSpold01Location=RER
  Uncertainty: estimated
- energy and auxilliary inputs, metal working factory: 1 kg; lognormal variance with pedigree 0.1386, pedigree (4,3,5,1,4)
  EcoSpold01Location=RER
  Estimated
  Uncertainty: estimated
- impact extrusion of aluminium, cold, initial surface treatment: 1 kg; lognormal variance with pedigree 0.04, pedigree (1,1,5,1,1)
  EcoSpold01Location=RER
  activityLink introduced to establish a direct link to the corresponding regional supply of this product
- impact extrusion of aluminium, cold, tempering: 1 kg; lognormal variance with pedigree 0.04, pedigree (1,1,5,1,1)
  activityLink introduced to establish a direct link to the corresponding regional supply of this product
  EcoSpold01Location=RER
- impact extrusion of aluminium, deformation stroke: 5 kg; lognormal variance with pedigree 0.04, pedigree (1,1,5,1,1)
  (same comment as for impact extrusion of aluminium, cold, initial surface treatment)
- metal working factory: 4.58e-10 unit; lognormal variance with pedigree 0.4386, pedigree (4,3,5,1,4)
  Estimated
  EcoSpold01Location=RER
  Uncertainty: estimated
- metal working machine, unspecified: 3.95e-5 kg; lognormal variance with pedigree 0.4386, pedigree (4,3,5,1,4)
  Estimated
  EcoSpold01Location=RER
  Uncertainty: estimated

## Review by Sébastien Humbert 2007-09-05
passed
none
