# zirconium sponge production, from zirconium tetrachloride

Dataset: EcoSpold 2, unit process
Geography: RoW
Time period: 2020-01-01 to 2024-12-31
Technology level: current
Classification: ISIC rev.4 ecoinvent: 2420:Manufacture of basic precious and other non-ferrous metals
Scenario: Business-as-Usual
System model: Allocation, cut-off by classification
Generated by: Efstathios Kakkos
Database: ecoinvent
isCopyrightProtected: true
accessRestrictedTo: 1

## General comment
This dataset refers to the average global production of 1 kg of nuclear-grade zirconium sponge from high-purity zirconium tetrachloride (ZrCl4) (produced from the zirconium / hafnium separation process) by magnesium reduction and vaccum distillation (Kroll process - ZrCl4 + 2 Mg → Zr + 2 MgCl2). The US and France are the major producers of zirconium sponge, accounting for approximately 53.4% of the global production.
The amounts of total magnesium input, zirconium tetrachloride input and total magnesium chloride produced as a byproduct are based on the abovementioned stoichiometric equation. Infrastructural input has been included for compliance with the Ecoinvent guidelines. Due to lack of data, the electricity consumption and inert waste during the zirconium sponge production process were approximated with the respective ones from the titanium sponge production dataset, since they are both produced via the Kroll process under similar conditions (consult dataset ''titanium sponge production, from titanium tetrachloride, GLO'' available in version 3.8 of the Ecoinvent database and the respective exchange comments in the present dataset). The amount of inert waste taken from the aforementioned dataset was adjusted based on the amount of magnesium chloride produced as byproduct.

## Included activities start
The activity starts with the processing of high-purity zirconium tetrachloride (ZrCl4).

## Included activities end
The activity ends with the production of nuclear-grade zirconium sponge. MgCl2 is produced as byproduct and is sent to an electrolysis process (modelled in a separate activity) in order to recover the magnesium and chlorine. The magnesium is refined and recycled back to the distillation and reduction process for producing zirconium sponge, while the chlorine is recycled back to the chlorination and extractive distillation process for the production of ZrCl4 and HfCl4.

## Allocation
No allocation is applied.

## Geography
Dataset valid for the entire corresponding region. France and the US are the major producers of zirconium sponge, representing 53.4% of the global production.

## Technology
The hafnium-free ZrCl4 is placed in a furnace at 800-850◦C and is subsequently reduced through the addition of magnesium. The stoichiometric equation is the following: ZrCl4 + 2 Mg → Zr + 2 MgCl2. The resulting zirconium is a spongelike material, hence the name zirconium sponge. The zirconium sponge undergoes vacuum distillation, where the sponge is purified by removing the magnesium chloride, which is then separated via the electrolysis process, producing magnesium and chlorine (MgCl2 → Mg + Cl2). After refining, the magnesium is recycled and serves again as input to the reduction process, while chlorine (after it is filtrated and purified) is recycled and sent back to the chlorination process as an input. The zirconium sponge is then crushed to small pieces to ensure easier transport and handling.

## Time period
Data are considered representative of current production practices. The data are assumed to be valid on average for 5 years after the publication of that article.

## Reference product
- zirconium sponge, nuclear-grade: 1 kg; name RP_amount; By-product classification allocatable product; CPC 41601: Tungsten, molybdenum, tantalum, magnesium, cobalt, cadmium, titanium, zirconium, beryllium, gallium, hafnium, […]; HS2017 810890: Titanium; other than unwrought, n.e.c. in heading no. 8108; CAS 7440-67-7
  production volume 2.8e6 kg; name RP_PV
    The production volume is expressed in kg. Its calculation is based on the following source, which reports a global production of 6000000 kg of nuclear-grade zirconium. Source: https://www.lipmann.co.uk/zirconium
  property price 11.0839 EUR2005
    Price calculated based on the annual average price of Zirconium metal reported in the USGS Minerals Commodity Summaries for Zirconium and Hafnium (2019 to 2021) for the years 2015 to 2021.
    The prices were converted to EUR based on the annual exchange rates published by the European Central Bank (https://sdw.ecb.europa.eu/quickview.do?SERIES_KEY=120.EXR.A.USD.EUR.SP00.A, last accessed on 2022-02-15) and adjusted for inflation relative to 2005 using the producer price index (PPI) of the euro area, published by eurostat (https://appsso.eurostat.ec.europa.eu/nui/show.do?dataset=sts_inpp_a&lang=en, last accessed on 2022-05-04).
    Reference:
    USGS (2022). Zirconium and Hafnium Statistics and Information, USGS Minerals Commodity Summaries (2019 to 2021). https://www.usgs.gov/centers/national-minerals-information-center/zirconium-and-hafnium-statistics-and-information
  property zirconium content 0.9949
    The bundled zirconium & hafnium content of the zirconium sponge is minimum 99.5% (Source: https://mmta.co.uk/metal-norms/zirconium-sponge-nuclear-grade/). The pure zirconium content is calculated by subtracking the hafnium content that is still present in zirconium sponge from the zirconium & hafnium content of the zirconium sponge (99.5% - the exact value is considered here for this calculation). Based on the same source, the maximum content of hafnium in zirconium sponge (which is assumed to be the value here) is 0.01%. Complete separation of hafnium from zirconium is not possible, which is why this procedure was followed for the calculation of the zirconium content.
  properties: carbon allocation 0 kg, carbon content 0, carbon content, fossil 0, carbon content, non-fossil 0, dry mass 1 kg, water content 0, water in wet mass 0 kg, wet mass 1 kg

## Inputs from technosphere
- chemical factory, organics: 4e-10 unit; lognormal variance with pedigree 0.3126, pedigree (3,3,1,5,3)
  This infrastructural input has been included for compliance with the ecoinvent Guidelines. The chemical factory is assumed to have an average output of 50'000 t/a and a lifespan of 50 years.
- electricity, medium voltage: 0.00222865, 0.00333606, 0.00105389, 0.019617, 0.0115137, 0.105946, 0.0136506, 0.165809, 0.000395456, 3.30752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 kWh (47 suppliers, which the file names only by identifier); sum of these 4.85 kWh; = 4.85*1000/1000; lognormal variance with pedigree 0.0454, pedigree (2,4,2,5,4)
  This exchange represents the amount of electricity required for the production of 1 kg of zirconium sponge.
  Due to absence of data, the amount of electricity consumption was taken as a proxy from the dataset ''titanium sponge production, from titanium tetrachloride, GLO'' as found in Ecoinvent version 3.8, which deals with the production of titanium sponge through the Kroll process (TiCl4+ 2Mg → Ti + 2MgCl2 - same process used for the production of zirconium sponge).
  [Note: The aforementioned dataset was based on the Gao et al. (2018) publication. This publication reports an electricity consumption during the reduction and distillation process of 4.85E+03 kWh and represents the amount required for the production of 1 metric ton of titanium sponge (Table 2, column ''reduction and distillation''), which is assumed to be the same for the production of 1 metric ton of zirconium sponge. This value was scaled to represent the production of 1 kg of zirconium sponge.]
  Reference: Gao, F., Nie, Z., Yang, D., Sun, B., Liu, Y., Gong, X., & Wang, Z. (2018). Environmental impacts analysis of titanium sponge production using Kroll process in China. Journal of Cleaner Production, 174, 771-779. doi:https://doi.org/10.1016/j.jclepro.2017.09.240).
- inert waste: -0.0488005 kg; name lost_MgCl2; = 0.093*(2.0874/3.978); lognormal variance with pedigree 0.0454, pedigree (2,4,2,5,4)
  This exchange represents the inert waste produced as a byproduct during the production of 1 kg of zirconium sponge. It is assumed that this residue represents magnesium chloride that is lost in this step.
  Due to absence of data for the wastes during the production of zirconium sponge through the Kroll process, the amount of inert waste reported in the dataset ''titanium sponge production, from titanium tetrachloride'' available in version 3.8 of Ecoinvent database was considered here (0.093 kg) and is assumed here as the best available approximation, since titanium sponge is also produced through the Kroll process. However, due to the structure of the dataset, the abovementioned value in that dataset is multiplied by a scaling factor, which is based on the magnesium chloride produced as a byproduct during the process. This scaling factor equals the ratio of magnesium chloride produced as a byproduct during the production of 1 kg of zirconium sponge (2.0874 kg) to the amount of magnesium chloride produced as a byproduct during the production of 1 kg of titanium sponge (3.978 kg - consult the abovementioned dataset). Therefore, the scaling factor is approximately equal to 0.5247.
  [Note: The inert waste serves as a proxy for the output ''other residue'' that comes out of the process as a byproduct during the production of 1 kg of titanium sponge. The original value was taken from table 2, column ''reduction and distillation'' of the Gao et al. (2018) publication.
  Reference: Gao, F., Nie, Z., Yang, D., Sun, B., Liu, Y., Gong, X., & Wang, Z. (2018). Environmental impacts analysis of titanium sponge production using Kroll process in China. Journal of Cleaner Production, 174, 771-779. doi:https://doi.org/10.1016/j.jclepro.2017.09.240).]
  production volume; = RP_PV*ABS(lost_MgCl2/RP_amount)
    Calculated from production volume of reference product using the relative outputs.
  property zirconium content 0.105465; name lost_MgCl2_Zr_content
  properties: dry mass 1 kg, wet mass 1 kg
  note on zirconium content: The zirconium content value is based on zirconium mass balance between inputs and outputs containing zirconium. Due to the zirconium imbalance on the output side (zirconium amount in zirconium sponge is smaller than the amount of zirconium amount in zirconium tetrachloride), it is assumed that the amount of zirconium lost during the process ends up in the inert waste.
- magnesium: 0.0212327 kg; name Mg_make_up; = 0.53286-recycled_Mg; lognormal variance with pedigree 0.0454, pedigree (2,4,2,5,4)
  This exchange represents the amount of non-recovered magnesium that must be added separately in order to cover the stoichiometric amount that is required during the production of 1 kg of zirconium sponge.
  The amount of non-recovered magnesium is calculated by subtracting the amount of recovered magnesium from the amount of magnesium that is stoichiometrically required as input. The former amount (roughly 0.51156 kg) is represented by the exchange ''magnesium, for reuse in zirconium sponge production'' (consult the respective exchange comment) while the latter amount is based on the stoichiometric reaction ZrCl4 + 2Mg → Zr + 2MgCl2, meaning that 0.53286 kg of magnesium is required as input per 1 kg of zirconium sponge.
  properties: dry mass 1 kg, wet mass 1 kg
- magnesium chloride, from zirconium sponge production: -2.0386 kg; name recycled_MgCl2; = 2.0874 - lost_MgCl2; lognormal variance with pedigree 0.0034, pedigree (1,3,2,5,1)
  This exchange represents the magnesium chloride produced as a byproduct during the production of 1 kg of zirconium sponge.
  The amount of magnesium chloride produced as a byproduct is calculated by subtracting the assumed losses of magnesium chloride (roughly 0.0488 kg - consult exchange ''inert waste'' in the present dataset) from the amount of magnesium chloride that is stoichiometrically produced (2.0874 kg). The last amount is based on the stoichiometric reaction ZrCl4 + 2Mg → Zr + 2MgCl2, meaning that 2.0874 kg of MgCl2 is produced as byproduct per 1 kg of zirconium sponge.
  production volume; = RP_PV*ABS(recycled_MgCl2/RP_amount)
    Calculated from production volume of reference product using the relative outputs.
  properties: chlorine content 0.744725, dry mass 1 kg, magnesium content 0.255275, price 0.0935471 EUR2005, wet mass 1 kg
- magnesium, for reuse in zirconium sponge production: 0.511627 kg; name recycled_Mg; = 0.25097*recycled_MgCl2; lognormal variance with pedigree 0.0454, pedigree (2,4,2,5,4)
  This exchange represents the amount of recycled magnesium that is required as input during the production of 1 kg of zirconium sponge. The recycled magnesium is obtained from the electrolysis of magnesium chloride.
  The amount of recycled magnesium is calculated by multiplying the amount of magnesium produced as byproduct during the electrolysis of 1 kg of magnesium chloride (roughly 0.25097 kg - consult exchange ''magnesium, for reuse in zirconium sponge production'' in the dataset ''electrolysis of magnesium chloride, from titanium sponge production'', available in version 3.8 of the Ecoinvent database), by the amount of magnesium chloride produced as byproduct during the production of 1 kg of zirconium sponge (2.0386 kg - consult exchange ''magnesium chloride, from zirconium sponge production'' in the present dataset).
  [Note: The resulting overall recovery rate of magnesium is approximately 96%, which is expected considering that the dataset ''electrolysis of magnesium chloride, from zirconium sponge production'' was approximated with the dataset ''electrolysis of magnesium chloride, from titanium sponge production'', available in version 3.8 of Ecoinvent database, In the latter dataset, it was calculated that the recovery rate of magnesium is 96% (for more information, consult the exchange comment ''magnesium, for reuse in titanium sponge production'' in that dataset).
  properties: dry mass 1 kg, magnesium content 1, price 11 EUR2005, wet mass 1 kg
- zirconium tetrachloride: 2.5545 kg; lognormal variance with pedigree 0.0034, pedigree (1,3,2,5,1)
  The amount of ZrCl4 required is based on the stoichiometric equation: ZrCl4 + 2Mg → Zr + 2MgCl2 (reduction and distillation process), which means that for the production of 1 kg of Zr sponge, 2.5545 kg of ZrCl4 are needed.
  properties: chlorine content 0.6085, dry mass 1 kg, wet mass 1 kg, zirconium content 0.391484
  note on chlorine content: Chlorine content of Zirconium tetrachloride (ZrCl4) calculated based on the molecular structure. Mass contribution of each element to the total mass: Zr: 39.15% , Cl: 60.85%. Source: https://www.lenntech.com/calculators/molecular/molecular-weight-calculator.htm .
  note on zirconium content: The zirconium content in zirconium tetrachloride (ZrCl4) is calculated by multiplying the purity of ZrCl4 by the mass contribution of zirconium based on the molecular structure of ZrCl4 (39.15% - Source: <https://www.lenntech.com/calculators/molecular/molecular-weight-calculator.htm>). The purity of ZrCl4 is reduced to 99.99996, due to the presence of hafnium tetrachloride (HfCl4) in ZrCl4 (40 ppm, according to Minh et al (2015)). Reference : Minh, L. Q., Long, N. V. D., Duong, P. L. T., Jung, Y., Bahadori, A., & Lee, M. (2015). Design of an Extractive Distillation Column for the Environmentally Benign Separation of Zirconium and Hafnium Tetrachloride for Nuclear Power Reactor Applications. Energies, 8(9), 10354-10369.

## Sampling procedure
The amount of ZrCl4, total magnesium (sum of recycled magnesium and non-recovered magnesium) and total magnesium chloride (without the minor loss - see below) were calculated based on the stoichiometric equation: ZrCl4 + 2Mg → Zr + 2MgCl2. Infrastructure has been included for compliance with the Ecoinvent guidelines. An activity link has been set to the zirconium tetrachloride and magnesium chloride, to ensure that both products are supplied from the producing activity of the same geography.

Furthermore, due to the electrolysis process of magnesium chloride (MgCl2 → Mg + Cl2), magnesium is produced as byproduct, which is recycled and fed back to the zirconium sponge production process (present dataset).

All other data (electricity consumption and inert waste) were taken as a proxy from the dataset ''titanium sponge production, from titanium tetrachloride, GLO'' as found in Ecoinvent version 3.8, which deals with the production of titanium sponge through the Kroll process (TiCl4+ 2Mg → Ti + 2MgCl2 - same process used for the production of zirconium sponge), which was based on the Gao et al. (2018) publication. The inert waste is assumed to be magnesium chloride that is lost thereby reducing the actual amount of produced magnesium chloride from 2.0874 kg to 2.0386 kg that is sent to electrolysis. The amount of inert waste taken from the aforementioned dataset was adjusted based on the amount of magnesium chloride produced as byproduct. The amount of recycled magnesium was based on the fact that the overall recovery rate of magnesium is 96%. These assumptions were taken from the abovementioned datasets. For more detailed information, the individual exchange comments have to be consulted.

Reference: Gao, F., Nie, Z., Yang, D., Sun, B., Liu, Y., Gong, X., & Wang, Z. (2018). Environmental impacts analy-sis of titanium sponge production using Kroll process in China. Journal of Cleaner Production, 174, 771-779. doi:https://doi.org/10.1016/j.jclepro.2017.09.240.

## Extrapolations
Approximation of zirconium sponge production with the titanium sponge production, as they are both produced via the Kroll process under similar conditions. Uncertainty has been adjusted accordingly.
