# nuclear waste storage construction, final repository for high level radioactive waste

Dataset: EcoSpold 2, unit process
Geography: RoW
Time period: 1985-01-01 to 2023-12-31
Technology level: current
Classification: EcoSpold01Categories: nuclear power/waste treatment
Classification: ISIC rev.4 ecoinvent: 4290:Construction of other civil engineering projects
Synonyms: Intermediate level radioactive waste; High level radioactive waste; Geological repository; Conditioned Spent Fuel
Tags: ConvertedDataset
Scenario: Business-as-Usual
System model: Allocation, cut-off by classification
Generated by: Roberto Dones
Published in: Dones, R. 2007
Database: ecoinvent
isCopyrightProtected: true
accessRestrictedTo: 1

## General comment
This module is based on the Swiss project "Opalinus Clay" for a conditioned spent fuel (SF), vitrified high level waste (HLW) and intermediate level waste (ILW) repository developed to fullfill the concept of a "monitored long-term geological disposal" in deep geologic stratum. A 5 km long ramp leads to the approximately 650 m deep and 120 m thick host rock. The depository is made of: a pilot facility to be monitored; a test facility for in-situ experiments; a main facility including twentyseven 800 m long tunnels, 40 m pitch, with an inclanation of 6.1%, for the disposal of SF and HLW; and, two tunnels for the disposal of ILW. The total lenght of all tunnels is approximately 30 km. The module refers to a waste scenario of approximately 16000 m3, including 8300 m3 SF, 1015 m3 HLW and about 6700 m3 (given range 6400 m3 to 7300 m3) ILW from reprocessing of spent fuel and dismantling of nuclear power plants. After input of SF and HLW, the remaining empty space of the tunnels is backfilled with bentonite. The tunnels with ILW are backfilled with mortar. If finally approved, the remaining tunnels of the repository will be entirely refilled using the previously mined rock. Twenty percent of extracted rock is assumed to be disposed of in an inert material depository. The land use and reception building are roughly estimated on the basis of a picture. The machinery and infrastructure used have been estimated on the basis of a few drawings. Transport of materials and non radioactive waste are based on standard distances with the exception of bentonite. The total electricity supplied from the grid has been estimated on the basis of the necessary power and the duration of mining and final filling activities. Wastewater and methane to air are assumed negligible.
[This dataset was already contained in the ecoinvent database version 2. It was not individually updated during the transfer to ecoinvent version 3. Life Cycle Impact Assessment results may still have changed, as they are affected by changes in the supply chain, i.e. in other datasets. This dataset was generated following the ecoinvent quality guidelines for version 2. It may have been subject to central changes described in the ecoinvent version 3 change report (http://www.ecoinvent.org/database/ecoinvent-version-3/reports-of-changes/), and the results of the central updates were reviewed extensively. The changes added e.g. consistent water flows and other information throughout the database. The documentation of this dataset can be found in the ecoinvent reports of version 2, which are still available via the ecoinvent website. The change report linked above covers all central changes that were made during the conversion process.]

## Included activities end
This module includes the material and energy requirements as well as transports for mining and refilling of shafts and tunnels of a repository for spent fuel, vitrified high-level waste and long-lived intermediate radioactive waste in the Swiss context. Also included is disposal of part of the mined rock. Land use of the entrance area and buildings are accounted for. Wastewater is not included.

## Geography
Swiss conditions.

## Technology
Currently available knowledge.

## Reference product
- nuclear waste storage, final repository for high level radioactive waste: 1 unit; By-product classification allocatable product; CPC 54290: General construction services of other civil engineering works
  EcoSpold01Location=CH
  production volume 3.96633 unit
    This is a placeholder value that does not reflect real-world production volumes. This dataset does not currently require a real-world production volume to work in the database framework, and no actual data were collected yet. This has no negative effect on the results of the ecoinvent database.
  property price 6.70773e7 EUR2005
    Calculated based on inputs: The price of the product has been calculated as a sum of the values of the material and energy inputs for this product. This value is therefore a rough estimation. It may underestimate the real price since there are additional expenses when producing any product. These expences can include for example labour costs, treatment of waste materials and profit for the producer. Please consider carefully whether this level of data quality is acceptable for your application.
  properties: carbon allocation 0 kg, carbon content 0

## Inputs from technosphere
- building, multi-storey: 130000 m3; lognormal variance with pedigree 0.162, pedigree (1,1,5,5,1)
  EcoSpold01Location=RER
  own assumption
- concrete, normal strength: 1798.62, 394.968, 256.905, 343.051, 7616.65, 3197.55, 3790.53, 135602 m3 (8 suppliers, which the file names only by identifier); sum of these 153000 m3; lognormal variance with pedigree 0.062, pedigree (1,1,5,5,1)
  EcoSpold01Location=CH
  estimation
  properties: dry mass 2190 kg, water content 0.086758, wet mass 2380 kg
- diesel, burned in building machine: 5.2e6 MJ; lognormal variance with pedigree 0.162, pedigree (1,1,5,5,1)
  EcoSpold01Location=GLO
  own assumption
  properties: heating value, net 1 MJ
- electricity, medium voltage: 1.8073e6, 3.60516e7, 1.21132e7, 553458, 110774, 23785.7, 2.51737e6, 3.72289e6, 7.79957e6 kWh (9 suppliers, which the file names only by identifier); sum of these 6.47e7 kWh; lognormal variance with pedigree 0.062, pedigree (1,1,5,5,1)
  EcoSpold01Location=CH
  own assumption
- industrial machine, heavy, unspecified: 4.2e6 kg; lognormal variance with pedigree 0.082, pedigree (1,1,5,5,1)
  EcoSpold01Location=RER
  own assumption
- inert waste, for final disposal: -1.13e9 kg; lognormal variance with pedigree 0.042, pedigree (1,1,1,5,1)
  own assumption
  EcoSpold01Location=CH
  production volume
    Calculated from the production volume of nuclear waste storage, final repository for high level radioactive waste in proportion to the respective output amounts.
  properties: dry mass 0.995 kg, water content 0.00502513, wet mass 1 kg
- reinforcing steel: 2.94e7 kg; lognormal variance with pedigree 0.082, pedigree (1,1,5,5,1)
  EcoSpold01Location=RER
  own assumption
  properties: carbon content, fossil 0.004, dry mass 1 kg, wet mass 1 kg

## Inputs from nature
- Occupation, industrial area [natural resource, land]: 668000 m2*year; lognormal variance with pedigree 0.342, pedigree (1,1,5,5,1)
  own assumption, time factor
- Transformation, from industrial area [natural resource, land]: 32500 m2; lognormal variance with pedigree 0.082, pedigree (1,1,5,5,1)
  own assumption on preliminary project data
- Transformation, from unspecified [natural resource, land]: 32500 m2; lognormal variance with pedigree 0.082, pedigree (1,1,5,5,1)
  own assumption on preliminary project data
- Transformation, to industrial area [natural resource, land]: 32500 m2; lognormal variance with pedigree 0.082, pedigree (1,1,5,5,1)
  own assumption on preliminary project data
- Transformation, to unspecified [natural resource, land]: 32500 m2; lognormal variance with pedigree 0.082, pedigree (1,1,5,5,1)
  own assumption on preliminary project data

## Sampling procedure
Literature

## Extrapolations
none This dataset has been copied from an original dataset covering the geography CH. The uncertainty has been adjusted accordingly.

## Review by Roberto Dones 2004-04-02
Corrected for v1.1
