# alfalfa-grass mixture production, Swiss integrated production

Dataset: EcoSpold 2, unit process
Geography: CH
Time period: 2001-01-01 to 2023-12-31
Technology level: current
Classification: ISIC rev.4 ecoinvent: 0119:Growing of other non-perennial crops
Scenario: Business-as-Usual
System model: Allocation, cut-off by classification
Generated by: Thomas Nemecek
Published in: Nemecek, T. 2005
Database: ecoinvent
isCopyrightProtected: true
accessRestrictedTo: 1

## General comment
This dataset represents the production of 1 kg of alfalfa-grass mixture (dry matter). The dry matter yield is 30002 kg/ha. Moisture content at harvest is 85%. The yield refers to the whole production period of 2.5 years and is composed of 6802 and 5320 kg alfalfa/ha and 10203 and 7980 kg grass/ha in the first (sowing year + first full year) and second year (second full year), respectively. Alfalfa-grass mixture is grown on dry soils; on moist soils alfalfa is replaced by the red clover-variety 'Mattenklee'.

## Included activities start
This activity assumes alfalfa-grass mixture production on a temporary meadow during 2.5 years and represents an average of this whole period; it starts with the soil cultivation and sowing after the harvest of the previous crop. The inputs of seeds, mineral fertilisers and pesticides are considered. Farm manure as an organic fertiliser is only accounted for in terms of direct field emissions; all pre-processes are included in the animal production systems. The transport of seeds, pesticides and fertilisers from the regional storehouse to the farm is also included.

## Included activities end
The dataset includes all machine operations and corresponding machine infrastructure and sheds. Machine operations are: soil cultivation, weed control (pesticides against Rumex), sowing, fertilisation, mowing (2 cuts in sowing year, 4 cuts in first full year, 4 cuts in second full year), loading and transport to the farm (1 km). This activity ends at the farm gate after discharge of the grass.

## Geography
The data are representative for the production in the Swiss plain region.

## Technology
integrated production

## Reference product
- alfalfa-grass mixture, Swiss integrated production: 1 kg; name REF_PRODUCT; By-product classification allocatable product; CPC 01919: Forage products, n.e.c.; HS2017 0604: Foliage, branches and other parts of plants, without flowers or flower buds, and grasses, mosses and lichens;[...]
  production volume 1.4909e8 kg
    Calculated based on the average annual sales of AGFF quality seals for the certified seeds of alfalfa-grass and Mattenklee-grass mixtures in Switzerland (2001-2010). One quality seal corresponds to an average assumed package size of 15 kg of sold seeds. Assumed seed input and yield for both mixtures is 30 kg/ha and 30002 kg DM/ha, respectively.
  property carbon content, non-fossil 0.4424; name REF_PRODUCT_C_content_non_fossil
    biogene carbon content on a dry matter basis; weighted mean of grass and alfalfa according to shares in the product (alfalfa 40%, grass 60%). --- Sources: for grass: ecoinvent report 15 --- for alfalfa: USDA (1977) Relationships of carbon to nitrogen in crop residues. Conservation Agronomy Technical Notes, note no. 30. Portland, USA. http://www.nm.nrcs.usda.gov/technical/tech-notes/agro/AG30.pdf.
  property dry mass 1 kg; name REF_PRODUCT_DM
  property price 0.067 EUR2005
    Estimated based on a Cornell reference that tells about "alfalfa 10-20% more expensive than hay".
  property water content 5.66667; name REF_PRODUCT_water_content; = REF_PRODUCT_WWM/ REF_PRODUCT_DM
  property water in wet mass 5.66667 kg; name REF_PRODUCT_WWM; = REF_PRODUCT_WM- REF_PRODUCT_DM
  property wet mass 6.66667 kg; name REF_PRODUCT_WM; = REF_PRODUCT_DM/0.15
  properties: carbon allocation 0.4424 kg, carbon content 0.4424, energy content 17.897 MJ

## Inputs from technosphere
- [thio]carbamate-compound: 3.3331e-5 kg; source AGFF 1996; lognormal variance with pedigree 0.0413, pedigree (2,2,5,1,1)
  This superordinate chemical class approximates the pesticide Asulam
  properties: carbon content, fossil 0.626349, dry mass 1 kg, wet mass 1 kg
  note on carbon content, fossil: Approximated as an unweighted average of the C-content of the [thio]carbamate-compounds (Tab 2.25 Sutter, 2010) carbofuran,orbencarb, prosulfocarb
- clover seed, Swiss integrated production, for sowing: 0.00016666 kg; name SEED_1; lognormal variance with pedigree 0.0412, pedigree (2,1,5,1,1)
  Based on expert knowlege from Agroscope Reckenholz-Tänikon Research Centre (2001)
  property carbon content, non-fossil 0.469421; name SEED_1_C_content_non_fossil
  property dry mass 0.9 kg; name SEED_1_DM; = SEED_1_WM*0.9
  property water content 0.111111; name SEED_1_water_content; = SEED_1_WWM/ SEED_1_DM
  property water in wet mass 0.1 kg; name SEED_1_WWM; = SEED_1_WM- SEED_1_DM
  property wet mass 1 kg; name SEED_1_WM
  note on carbon content, non-fossil: biogene carbon content on a dry matter basis; approximated by soybean (In ecoinvent report n 17, pg 125: C content of soybeans=0.388kg/kg fresh matter). peas seeds values are used
- fertilising, by broadcaster: 6.6662e-5 ha; source Walther U. 2001; lognormal variance with pedigree 0.0412, pedigree (2,1,5,1,1)
  Based on Walther et al. 2001 and on expert knowlege from Agroscope Reckenholz-Tänikon Research Centre (2001)
  This exchange has an activity link directly to the producing activity because the product is primarily consumed in the same geographical area where it is produced.
- fodder loading, by self-loading trailer: 0.038159 m3; lognormal variance with pedigree 0.0412, pedigree (2,1,5,1,1)
  Based on expert knowlege from Agroscope Reckenholz-Tänikon Research Centre (2001)
  This exchange has an activity link directly to the producing activity because the product is primarily consumed in the same geographical area where it is produced.
- grass seed, Swiss integrated production, for sowing: 0.00083328 kg; name SEED_2; lognormal variance with pedigree 0.0412, pedigree (2,1,5,1,1)
  Based on expert knowlege from Agroscope Reckenholz-Tänikon Research Centre (2001)
  property carbon content, non-fossil 0.464601; name SEED_2_C_content_non_fossil
  property dry mass 0.9 kg; name SEED_2_DM; = SEED_2_WM*0.9
  property water content 0.111111; name SEED_2_water_content; = SEED_2_WWM/ SEED_2_DM
  property water in wet mass 0.1 kg; name SEED_2_WWM; = SEED_2_WM- SEED_2_DM
  property wet mass 1 kg; name SEED_2_WM
  note on carbon content, non-fossil: biogene carbon content on a dry matter basis; approximated by wheat grain (Composition data obtained from Wheat straw, in (http://www.uwex.edu/ces/crops/uwforage/StrawFOF.pdf ). First, composition data were refered to 1 kg dry mass. Then, C-contents were calculated considering a C-content/dry mass of 44% in carbohydrates (including fibres), 53% in proteins and 75% in fats. All data from ecoinvent report, n 15a, pg 40, except C-content in protein, that comes from Determination of protein concentration by total organic carbon analysis, Rouwenhorst et al., 1991, J Biochem and Biophys Methods, 22:119-128.). wheat grains values are used
- inorganic phosphorus fertiliser, as P2O5: 0.0042024 kg; source Walther U. 2001; lognormal variance with pedigree 0.0412, pedigree (2,1,5,1,1)
  Based on Walther et al. 2001 and on expert knowlege from Agroscope Reckenholz-Tänikon Research Centre (2001)
  properties: dry mass 1 kg, wet mass 1 kg
- liquid manure spreading, by vacuum tanker: 0.0013332 m3; source Walther U. 2001; lognormal variance with pedigree 0.0412, pedigree (2,1,5,1,1)
  (same comment as for fertilising, by broadcaster)
- mowing, by rotary mower: 0.00033331 ha; lognormal variance with pedigree 0.0412, pedigree (2,1,5,1,1)
  (same comment as for fodder loading, by self-loading trailer)
- packaging, for fertilisers: 0.0084048 kg; lognormal variance with pedigree 0.0912, pedigree (4,3,5,5,4)
  Total amount of active substance/s of fertilisers needed for the production of 'alfalfa-grass mixture, Swiss integrated production' is calculated to be circa 4.20E-03 kg. Fertiliser/s used in this dataset is/are: 'phosphate fertiliser, as P2O5'. The total amount of active substance/s is doubled in order to account for the packaging of the dilluted product of fertiliser/s that is/are applied. Therefore, 8.40E-03 kg of packaging for fertilisers is justified with this exchange.
  properties: carbon content, fossil 0.825301, dry mass 1 kg, heating value, net 25.01 MJ, price 0.0642 EUR2005, wet mass 1 kg
  note on carbon content, fossil: Considering a chemical formula (C2H4)n for polyethylene, carbon content-fossil is calculated to be 0.856286 kg of Carbon per kg of dry mass.
- packaging, for pesticides: 6.6662e-5 kg; lognormal variance with pedigree 0.0912, pedigree (4,3,5,5,4)
  Total amount of active substance/s of pesticides needed for the production of alfalfa-grass mixture, Swiss integrated production is calculated to be circa 3.33E-05 kg. Pesticide/s used in this dataset is/are: '[thio]carbamate-compound'. The total amount of active substance/s is doubled in order to account for the packaging of the dilluted product of pesticide/s that is/are applied. Therefore, 6.67E-05 kg of packaging for pesticides is justified with this exchange.
  properties: carbon content, fossil 0.85714, dry mass 1 kg, heating value, net 25.97 MJ, price 0.0642 EUR2005, wet mass 1 kg
- solid manure loading and spreading, by hydraulic loader and spreader: 0.66662 kg; source Walther U. 2001; lognormal variance with pedigree 0.0412, pedigree (2,1,5,1,1)
  (same comment as for fertilising, by broadcaster)
- sowing: 3.3331e-5 ha; lognormal variance with pedigree 0.0412, pedigree (2,1,5,1,1)
  (same comment as for fodder loading, by self-loading trailer)
- tillage, harrowing, by spring tine harrow: 3.3331e-5 ha; lognormal variance with pedigree 0.0412, pedigree (2,1,5,1,1)
  (same comment as for fodder loading, by self-loading trailer)
- tillage, ploughing: 3.3331e-5 ha; lognormal variance with pedigree 0.0412, pedigree (2,1,5,1,1)
  (same comment as for fodder loading, by self-loading trailer)
- tillage, rolling: 3.3331e-5 ha; lognormal variance with pedigree 0.0412, pedigree (2,1,5,1,1)
  (same comment as for fodder loading, by self-loading trailer)

## Inputs from nature
- Carbon dioxide, in air [natural resource, in air]: 1.6206 kg; = 44/12 * (REF_PRODUCT_C_content_non_fossil * REF_PRODUCT * REF_PRODUCT_DM - (SEED_1_C_content_non_fossil * SEED_1 * SEED_1_DM + SEED_2_C_content_non_fossil * SEED_2 * SEED_2_DM)); lognormal variance with pedigree 0.0818, pedigree (2,2,5,1,1)
  Modelled,see chapter 'CO2 binding' in '01_crop production_direct field emissions and natural resources_v1.0.pdf' - pdf-document on the dedicated talk page of ecoinvent (www.ecoinvent.org/documentation)
- Energy, gross calorific value, in biomass [natural resource, biotic]: 17.897 MJ; lognormal variance with pedigree 0.0819, pedigree (2,3,5,3,4)
  Calculated by the data provider (Agroscope).
- Occupation, pasture, man made, intensive [natural resource, land]: 0.81638 m2*year; lognormal variance with pedigree 0.0429, pedigree (2,1,5,1,1)
  Modelled, see chapter 'Land use' in '01_crop production_direct field emissions and natural resources_v1.0.pdf' - pdf-document on the dedicated talk page of ecoinvent (www.ecoinvent.org/documentation)
- Transformation, from annual crop, non-irrigated, intensive [natural resource, land]: 0.23665 m2; lognormal variance with pedigree 0.0489, pedigree (2,1,5,1,1)
  (same comment as for Occupation, pasture, man made, intensive)
- Transformation, from pasture, man made, intensive [natural resource, land]: 0.0966599 m2; lognormal variance with pedigree 0.0489, pedigree (2,1,5,1,1)
  (same comment as for Occupation, pasture, man made, intensive)
- Transformation, to pasture, man made, intensive [natural resource, land]: 0.333311 m2; lognormal variance with pedigree 0.0489, pedigree (2,1,5,1,1)
  (same comment as for Occupation, pasture, man made, intensive)

## Emissions to nature
- Ammonia [air, non-urban air or from high stacks]: 0.0013255 kg; lognormal variance with pedigree 0.049, pedigree (2,2,5,1,1)
  Modelled with the 'AGRAMMON model' described in '01_crop production_direct field emissions and natural resources_v1.0.pdf' - pdf-document on the dedicated talk page of ecoinvent (www.ecoinvent.org/documentation)
- Dinitrogen monoxide [air, non-urban air or from high stacks]: 0.00015321 kg; lognormal variance with pedigree 0.0818, pedigree (2,2,5,1,1)
  Modelled, see chapter 'Emissions of N2O to the air' in '01_crop production_direct field emissions and natural resources_v1.0.pdf' - pdf-document on the dedicated talk page of ecoinvent (www.ecoinvent.org/documentation)
- Nitrogen oxides [air, non-urban air or from high stacks]: 4.1634e-5 kg; lognormal variance with pedigree 0.0818, pedigree (2,2,5,1,1)
  Modelled, see chapter 'Emissions of NOx to the air' in '01_crop production_direct field emissions and natural resources_v1.0.pdf' - pdf-document on the dedicated talk page of ecoinvent (www.ecoinvent.org/documentation)
- Asulam [soil, agricultural]: 3.3331e-5 kg; source AGFF 1996; lognormal variance with pedigree 0.049, pedigree (2,2,5,1,1)
  Modelled, see chapter 'Emissions of pesticides to agricultural soil' in '01_crop production_direct field emissions and natural resources_v1.0.pdf' - pdf-document on the dedicated talk page of ecoinvent (www.ecoinvent.org/documentation)
- Cadmium II [soil, agricultural]: 3.8293e-7 kg; lognormal variance with pedigree 0.0818, pedigree (2,2,5,1,1)
  Modelled, see chapter 'Emissions of heavy metals to agricultural soil, surface water and ground water' in '01_crop production_direct field emissions and natural resources_v1.0.pdf' - pdf-document on the dedicated talk page of ecoinvent (www.ecoinvent.org/documentation)
- Chromium III [soil, agricultural]: 4.7782e-7 kg; lognormal variance with pedigree 0.0818, pedigree (2,2,5,1,1)
  (same comment as for Cadmium II)
- Copper ion [soil, agricultural]: -3.2134e-6 kg
  (same comment as for Cadmium II)
- Lead II [soil, agricultural]: 2.0465e-7 kg; lognormal variance with pedigree 0.0818, pedigree (2,2,5,1,1)
  (same comment as for Cadmium II)
- Mercury II [soil, agricultural]: -6.7957e-8 kg
  (same comment as for Cadmium II)
- Nickel II [soil, agricultural]: -3.2228e-7 kg
  (same comment as for Cadmium II)
- Zinc II [soil, agricultural]: -6.8835e-6 kg
  (same comment as for Cadmium II)
- Cadmium II [water, ground-]: 3.0253e-9 kg; lognormal variance with pedigree 0.1271, pedigree (2,2,5,1,1)
  (same comment as for Cadmium II)
- Cadmium II [water, surface water]: 3.0122e-9 kg; lognormal variance with pedigree 0.1271, pedigree (2,2,5,1,1)
  (same comment as for Cadmium II)
- Chromium III [water, ground-]: 1.3084e-6 kg; lognormal variance with pedigree 0.1271, pedigree (2,2,5,1,1)
  (same comment as for Cadmium II)
- Chromium III [water, surface water]: 3.0927e-7 kg; lognormal variance with pedigree 0.1271, pedigree (2,2,5,1,1)
  (same comment as for Cadmium II)
- Copper ion [water, ground-]: 2.3135e-7 kg; lognormal variance with pedigree 0.1271, pedigree (2,2,5,1,1)
  (same comment as for Cadmium II)
- Copper ion [water, surface water]: 2.6781e-7 kg; lognormal variance with pedigree 0.1271, pedigree (2,2,5,1,1)
  (same comment as for Cadmium II)
- Lead II [water, ground-]: 1.3367e-8 kg; lognormal variance with pedigree 0.1271, pedigree (2,2,5,1,1)
  (same comment as for Cadmium II)
- Lead II [water, surface water]: 9.0103e-8 kg; lognormal variance with pedigree 0.1271, pedigree (2,2,5,1,1)
  (same comment as for Cadmium II)
- Mercury II [water, ground-]: 1.105e-9 kg; lognormal variance with pedigree 0.1271, pedigree (2,2,5,1,1)
  (same comment as for Cadmium II)
- Mercury II [water, surface water]: 9.3308e-10 kg; lognormal variance with pedigree 0.1271, pedigree (2,2,5,1,1)
  (same comment as for Cadmium II)
- Nickel II [water, ground-]: 1.9803e-10 kg; lognormal variance with pedigree 0.1271, pedigree (2,2,5,1,1)
  (same comment as for Cadmium II)
- Nickel II [water, surface water]: 2.39e-7 kg; lognormal variance with pedigree 0.1271, pedigree (2,2,5,1,1)
  (same comment as for Cadmium II)
- Nitrate [water, ground-]: 0.0011343 kg; lognormal variance with pedigree 0.0818, pedigree (2,2,5,1,1)
  Modelled with the 'SQCB-NO3 model' described in '01_crop production_direct field emissions and natural resources_v1.0.pdf' - pdf-document on the dedicated talk page of ecoinvent (www.ecoinvent.org/documentation)
- Phosphate [water, ground-]: 1.8301e-5 kg; lognormal variance with pedigree 0.0818, pedigree (2,2,5,1,1)
  Modelled, see chapter 'Emissions of phosphorous to the water' in '01_crop production_direct field emissions and natural resources_v1.0.pdf' - pdf-document on the dedicated talk page of ecoinvent (www.ecoinvent.org/documentation)
- Phosphate [water, surface water]: 9.3385e-5 kg; lognormal variance with pedigree 0.0818, pedigree (2,2,5,1,1)
  (same comment as for Phosphate)
- Phosphorus [water, surface water]: 1.6087e-5 kg; lognormal variance with pedigree 0.0818, pedigree (2,2,5,1,1)
  (same comment as for Phosphate)
- Zinc II [water, ground-]: 1.7191e-6 kg; lognormal variance with pedigree 0.1271, pedigree (2,2,5,1,1)
  (same comment as for Cadmium II)
- Zinc II [water, surface water]: 5.3849e-7 kg; lognormal variance with pedigree 0.1271, pedigree (2,2,5,1,1)
  (same comment as for Cadmium II)

## Sampling procedure
The inventories were generated on the basis of literature, statistics, recommendations, consultancy documents and expert statements. Production figures refer to the year 2001.

## Review by Thomas Nemecek 2011-09-28
internally passed at ART
