# clinker production

Dataset: EcoSpold 2, unit process
Geography: ZA
Time period: 2017-01-01 to 2023-12-31
Technology level: current
Classification: ISIC rev.4 ecoinvent: 2394:Manufacture of cement, lime and plaster
Classification: EcoSpold01Categories: construction materials/binder
Scenario: Business-as-Usual
System model: Allocation, cut-off by classification
Share of production covered: 15 %
Generated by: Rachel Muigai
Published in: Muigai, R. 2017
Database: ecoinvent
isCopyrightProtected: true
accessRestrictedTo: 1

## General comment
This activity represents the production of clinker. Clinker is a constituent of Portland cement. The Association of Cementitious Material Producers (ACMP) in South Africa, describe the clinker manufacturing process as requiring the use of calcareous deposits such as limestone, marl or chalk to provide calcium carbonate (CaCO3), and very small amounts of “corrective” materials such as iron ore, bauxite, shale, clay or sand which may be needed to provide extra iron oxide (Fe2O3), Alumina (Al2O3) and silica (SiO2) to achieve the desired chemical composition of the raw mix.
The raw materials are quarried and transported to the primary/secondary crushers located at the cement plants via trucks, train, or conveyor belts. and broken into material particles that are smaller thatn 19mm in diameter. The raw meal is then conveyed from the crusher to the stockpile, where it is stored before going to the raw mill. All South African cment plants make use of a dry process raw milling process. In the raw mill, prehomogenization takes place in which different raw materials are mixed to obtain the required chemical composition, and the crushed pieces are then milled together to produce ‘raw meal’. After the raw mill, the coarse particles are separated from the fine particles. the coarse particles are sent back to the raw mill. The fine particles are transported to the raw meal silos by fans or compressed air. The raw meal is then preheated and precalcined where 60% - 80% of the calcination takes place before it enters the kiln, where it is heated to temperatures of up to 1450˚C. The intense heat causes chemical and physical reactions that partially melt the meal into clinker. From the kiln, the hot clinker falls into a grate cooler where it is cooled by incoming combustion air. Clinker is the stored before grinding which is a necessary step in order for it to be ready for cement production.
This dataset is based on primary data collection from one cement company in ZA representing 15% of the market share for raw materials and energy consumption. Several other data sources were used to elaborate this dataset:
- For energy input: (1) There is lack of documentation on the energy due to co-processing/ secondary fuel useage in local cement companies. Secondary fuel sources such as tyres and waste sludge are currently used on trial basis (2017) (2) Primary data collection is from one cement company representing 15% of the cement market share in South Africa. (3) Eskom (2011). "Concrete steps towards profitability: Solid ways to ensure energy efficient cement production", Cement brochure, <Available at: http://www.eskom.co.za/sites/idm/Documents/128251_Cement_Brochure.pdf>. Accessed 20171107
- For emissions to air: (1) Karstensen, K.H., (2007). National policy on high temperature thermal waste treatment and cement kiln alternative fuel use.In theraml waste treatment and cement kiln alternative fuel use. Department of Environmental Affairs and Tourism, South Africa.
(2) Extrapolated values from "clinker production, GLO 2003" dataset. Accessed 20171107

## Included activities start
From reception of materials at the cement plant gate.

## Included activities end
This activity ends with the clinker ready for production of cement mix.
The dataset includes the whole manufacturing process to produce clinker (raw material provision, grinding and mixing; Long dry and Pre-calciner kiln process), internal processes (transport, etc.).
The dataset does not include administration activities.

## Geography
Represents South Africa cement mills. Some of the data has been extrapolated from GLO clinker production datasets.

## Technology
Typical technology for South Africa production (including Long dry and Pre-calciner kilns).

## Time period
Average production volume during 2008.
Inventory data provided for 2008, the uncertainty has been adjusted accordingly.

## Reference product
- clinker: 1 kg; By-product classification allocatable product; CPC 37430: Cement clinkers; HS2017 252310: Cement clinkers (whether or not coloured)
  EcoSpold01Location=CH
  production volume 1.27335e10 kg
    Annual production capacity of 90% of cement mills in South Africa, in 2008. Source: C&CI (2008). Cement and Concrete Institute South Africa, "Cement and Concrete Review (annual)".
    Carbon Disclosure Project (2012). Available at: http://www.nbi.org.za/Publications/Fastfacts/Pages/default.aspx
  property price 0.047 EUR2005
    Calculated value based on data from United Nations Commodity Trade Statistics Database (comtrade.un.org). UN comtrade category: 252310 Cement Clinkers. Using exchange rate of 1EURO = 1.209 USD. Average of price of import into 5 main markets (EU, US, JP, IN and CN).
  properties: carbon allocation 0 kg, carbon content 0, carbon content, fossil 0, carbon content, non-fossil 0, dry mass 1 kg, water content 0, water in wet mass 0 kg, wet mass 1 kg

## Inputs from technosphere
- ammonia, anhydrous, liquid: 0.000918394 kg; = 0.000918393928941014*clinker; lognormal variance with pedigree 0.1006, pedigree (2,5,5,5,4)
  EcoSpold01Location=CH
  Ancillary material for nitrogen oxide removal during burning process. Extrapolated value. Adopted from the "clinker production, GLO 2003" dataset. Accessed 20171107
  properties: dry mass 1 kg, wet mass 1 kg
- bauxite: 0.04 kg; lognormal variance with pedigree 0.1006, pedigree (2,5,5,5,4)
  EcoSpold01Location=GLO
  Raw material for clinker production. Primary data collected from one cement company in SA representing 15% of the market share.
  properties: dry mass 1 kg, wet mass 1 kg
- cement factory: 6.20295e-12 unit; = 6.20295274232494E-12*clinker; lognormal variance with pedigree 0.4006, pedigree (2,5,5,5,4)
  EcoSpold01Location=CH
  Ancillary product for grinding. Extrapolated value. Adopted from the "clinker production, GLO 2003" dataset. Accessed 20171107
- diesel, burned in building machine: 0.0132239 MJ; = 0.0132238909968955*clinker; lognormal variance with pedigree 0.0146, pedigree (2,1,3,5,1)
  Extrapolated value. Adopted from the "clinker production, GLO 2003" dataset. Accessed 20171107. Calculated as a weighted average (by production volume) of the regional activities.
  properties: heating value, net 1 MJ
- diesel, low-sulfur: 0.00042672 kg; lognormal variance with pedigree 0.002, pedigree (1,1,3,1,1)
  Diesel fuel. Primary data collected from one cement company in SA representing 15% of the market share.
  Uncertainty: Calculated variable. Uncertainty will be determined from propagation of uncertainty factors of underlying variables. Uncertainty of actual relation between variables not accounted at this time.
  property density 0.84 kg/l; name density_diesel
  property fuel input in physical units, m3 5.08e-7 m3; name diesel_vol_in; = 5.08E-04*UnitConversion(1, 'l', 'm3')
  properties: carbon content, fossil 0.865, dry mass 1 kg, heating value, net 42.8 MJ, wet mass 1 kg
- electricity, medium voltage: 0.139754 kWh; source ESKOM 2011; lognormal variance with pedigree 0.003225, pedigree (2,1,3,2,1)
  EcoSpold01Location=CH
  Energy for operation (conveyors, grinding, etc.). Primary data collected from one cement company in SA representing 15% of the market share. Secondary data source: Eskom (2011). "Concrete steps towards profitability: Solid ways to ensure energy efficient cement production", Cement brochure, <Available at: http://www.eskom.co.za/sites/idm/Documents/128251_Cement_Brochure.pdf>. Accessed 20171107
- hard coal: 0.145 kg; lognormal variance with pedigree 0.003825, pedigree (2,1,3,2,2)
  EcoSpold01Location=WEU
  Kiln fuel-Cement kilns in South Africa utilize coal, and oil sludge. Primary data collected from one cement company in SA representing 15% of the market share.
  properties: carbon content, fossil 0.845, dry mass 0.94 kg, heating value, net 27.91 MJ, water content 0.0638298, wet mass 1 kg
  note on carbon content, fossil: C content 75-94% (specified in Tab 1.1, report 6, part VI). A mean content of 0.845 kg C/ kg dry hard coal was considered
  note on heating value, net: Based on the Characterization factor of Hard coal in the CED method
- industrial machine, heavy, unspecified: 3.76e-5 kg; = 0.0000376*clinker; lognormal variance with pedigree 0.418, pedigree (4,5,5,5,4)
  Kiln infrastructure. Extrapolated value. Adopted from the "clinker production, GLO 2003" dataset. Accessed 20171107
  EcoSpold01Location=RER
- iron ore, crude ore, 46% Fe: 0.000143253 kg; = 0.0001432528458089*clinker; lognormal variance with pedigree 0.012625, pedigree (2,1,3,2,1)
  Raw material for clinker production. Literature value- Orignial data given per tonne of cement.
  properties: dry mass 1 kg, wet mass 1 kg
- light fuel oil: 0.000367224 kg; = 0.000367224077268023*clinker; lognormal variance with pedigree 0.21, pedigree (5,5,5,5,5)
  Adopted from the "clinker production, GLO 2003" dataset. Accessed 20171107
  properties: carbon content, fossil 0.862, dry mass 1 kg, heating value, net 42.6 MJ, wet mass 1 kg
- lime, hydrated, loose weight: 0.00387808 kg; = 0.00387808209727492*clinker; lognormal variance with pedigree 0.0912, pedigree (2,5,5,5,4)
  (same comment as for diesel, burned in building machine)
  properties: dry mass 0.997 kg, water content 0.00300903, wet mass 1 kg
- limestone, crushed, for mill: 0.9 kg; lognormal variance with pedigree 0.012625, pedigree (2,1,3,2,1)
  Primary data collected from one cement company in SA representing 15% of the market share.
  properties: carbon content, fossil 0.117492, dry mass 0.998 kg, water content 0.00200401, wet mass 1 kg
- lubricating oil: 4.71e-5 kg; = 0.0000471*clinker; lognormal variance with pedigree 0.0146, pedigree (2,1,3,5,1)
  EcoSpold01Location=RER
  Extrapolated value. Adopted from the "clinker production, GLO 2003" dataset. Accessed 20171107. Calculated as a weighted average (by production volume) of the regional activities.
  properties: carbon content, fossil 0.75, dry mass 1 kg, heating value, net 40.2 MJ, wet mass 1 kg
  note on carbon content, fossil: Lubricating oil is produced from diesel. C-content/dry mass of fats and oils considered 75%, from: ecoinvent v2.2 report, n 15a, pg 40
  note on heating value, net: Literature value, Source: IPCC 2006, 2006 IPCC Guidelines for National Greenhouse Gas Inventories, Prepared by the National Greenhouse Gas Inventories Programme, Eggleston H.S., Buendia L., Miwa K., Ngara T. and Tanabe K. (eds). Published: IGES, Japan
- magnetite: 0.01 kg; lognormal variance with pedigree 0.04, pedigree (1,1,5,1,1)
  Primary data collected from one cement company in SA representing 15% of the market share.
  properties: dry mass 1 kg, wet mass 1 kg
- refractory, basic, packed: 0.00019 kg; = 0.00019*clinker; lognormal variance with pedigree 0.0146, pedigree (2,1,3,5,1)
  EcoSpold01Location=DE
  Process material (wearing parts in the cement kiln). Extrapolated value. Adopted from the "clinker production, GLO 2003" dataset. Accessed 20171107
  properties: dry mass 1 kg, wet mass 1 kg
- refractory, fireclay, packed: 8.21e-5 kg; = 0.0000821*clinker; lognormal variance with pedigree 0.0146, pedigree (2,1,3,5,1)
  (same comment as for refractory, basic, packed)
  properties: dry mass 1 kg, wet mass 1 kg
- refractory, high aluminium oxide, packed: 0.000137 kg; = 0.000137*clinker; lognormal variance with pedigree 0.0146, pedigree (2,1,3,5,1)
  Process material (wearing parts in the cement kiln). Extrapolated value. Adopted from the "clinker production, GLO 2003" dataset. Accessed 20171107
  EcoSpold01Location=DE
  properties: dry mass 1 kg, wet mass 1 kg
- sand: 0.05 kg; lognormal variance with pedigree 0.0021, pedigree (1,2,3,1,1)
  Primary data collected from one cement company in SA representing 15% of the market share.
  properties: dry mass 1 kg, wet mass 1 kg
- steel, chromium steel 18/8, hot rolled: 5.86e-5 kg; = 0.0000586*clinker; lognormal variance with pedigree 0.1006, pedigree (2,5,5,5,4)
  Ancillary product for grinding (wearing parts). Extrapolated value. Adopted from the "clinker production, GLO 2003" dataset. Accessed 20171107
  EcoSpold01Location=RER
  properties: carbon content, fossil 0.0008, dry mass 1 kg, wet mass 1 kg
  note on carbon content, fossil: Stainless steel model is the grade 304 steel (18/8 stainless, 18% chromium 8% nickel; max. 0.08% C)
- tap water: 0.335532 kg; name tap_water_input; = 0.335531562607796*clinker; lognormal variance with pedigree 0.21, pedigree (5,5,5,5,5)
  (same comment as for diesel, burned in building machine)
  properties: carbon content, fossil 0.00178991, dry mass 0.000337476 kg, water content 2962.17, wet mass 1 kg
  note on carbon content, fossil: Bicarbonate content is 2.93 mol/m3. CO2 content is 0.1 mol/m3 (ecoinvent v2.2 report 8, Tab 93.1).
- urea: 3.20941e-6 kg; = (1.49706795446706E-06*clinker)*2.14379903903132; lognormal variance with pedigree 0.0046, pedigree (2,1,3,5,1)
  The exchange has been updated from 'urea, as N' into 'urea' and therefore its amount has been scaled (multiplied) from 0 kg by 2.1438 kg of 'urea' per kg of 'urea, as N'. Original comment of the exchange is: Extrapolated value. Adopted from the "clinker production, GLO 2003" dataset. Accessed 20171107. Calculated as a weighted average (by production volume) of the regional activities.
  properties: carbon content, fossil 0.2, dry mass 1 kg, wet mass 1 kg

## Inputs from nature
- Water, cooling, unspecified natural origin [natural resource, in water]: 9.56771e-6 m3; name water_cooling_UNO_input; = 9.5677130044843E-06*clinker; lognormal variance with pedigree 0.002, pedigree (1,1,3,1,1)
  Calculated value. See Parameters.
  Uncertainty: Calculated variable. Uncertainty will be determined from propagation of uncertainty factors of underlying variables. Uncertainty of actual relation between variables not accounted at this time.
- Water, unspecified natural origin [natural resource, in water]: 0.00160176 m3; name water_UNO_input; = 0.00160175826146947*clinker; lognormal variance with pedigree 0.002, pedigree (1,1,3,1,1)
  (same comment as for Water, cooling, unspecified natural origin)

## Emissions to nature
- Ammonia [air, unspecified]: 2.25164e-5 kg; = 2.25163915143153E-05*clinker; lognormal variance with pedigree 0.042625, pedigree (2,1,3,2,1)
  Extrapolated value. Adopted from the "clinker production, GLO 2003" dataset. Accessed 20171107
- Antimony ion [air, unspecified]: 2.23632e-9 kg; = 2.23632286995516E-09*clinker; lognormal variance with pedigree 0.7506, pedigree (2,5,5,5,4)
  (same comment as for Ammonia)
- Arsenic ion [air, unspecified]: 1.21892e-8 kg; = 1.21892408416695E-08*clinker; lognormal variance with pedigree 0.042625, pedigree (2,1,3,2,1)
  Emissions to air- Extrapolated value. Adopted from the "clinker production, GLO 2003" dataset. Accessed 20171107
- Beryllium II [air, unspecified]: 2.96792e-9 kg; = 2.96791997240428E-09*clinker; lognormal variance with pedigree 0.1406, pedigree (2,5,5,5,4)
  Adopted from the "clinker production, GLO 2003" dataset. Accessed 20171107
- Cadmium II [air, unspecified]: 6.8738e-9 kg; = 6.87379993101069E-09*clinker; lognormal variance with pedigree 0.652625, pedigree (2,1,3,2,1)
  Emissions to air. Adopted from the "clinker production, GLO 2003" dataset. Accessed 20171107
- Carbon dioxide, fossil [air, unspecified]: 0.838345 kg; = 0.838344639530873*clinker; lognormal variance with pedigree 0.003225, pedigree (2,1,3,2,1)
  Emissions to air.Adopted from the "clinker production, GLO 2003" dataset. Accessed 20171107
- Carbon dioxide, non-fossil [air, unspecified]: 0.0154527 kg; = 0.0154526771300448*clinker; lognormal variance with pedigree 0.1006, pedigree (2,5,5,5,4)
  (same comment as for Carbon dioxide, fossil)
- Carbon monoxide, fossil [air, unspecified]: 0.000488707 kg; = 0.000488706760952052*clinker; lognormal variance with pedigree 0.652625, pedigree (2,1,3,2,1)
  (same comment as for Carbon dioxide, fossil)
- Chromium III [air, unspecified]: 2.10027e-9 kg; = 2.10027423249396E-09*clinker; lognormal variance with pedigree 0.652625, pedigree (2,1,3,2,1)
  (same comment as for Ammonia)
- Chromium VI [air, unspecified]: 5.44119e-10 kg; = 5.44118661607451E-10*clinker; lognormal variance with pedigree 0.1406, pedigree (2,5,5,5,4)
  (same comment as for Ammonia)
- Cobalt II [air, unspecified]: 3.98129e-9 kg; = 3.98128665056916E-09*clinker; lognormal variance with pedigree 0.1406, pedigree (2,5,5,5,4)
  (same comment as for Ammonia)
- Copper ion [air, unspecified]: 1.41934e-8 kg; = 1.41934494653329E-08*clinker; lognormal variance with pedigree 0.652625, pedigree (2,1,3,2,1)
  (same comment as for Ammonia)
- Dioxins, measured as 2,3,7,8-tetrachlorodibenzo-p-dioxin [air, unspecified]: 9.42895e-13 kg; = 9.42895308727147E-13*clinker; lognormal variance with pedigree 0.042625, pedigree (2,1,3,2,1)
  (same comment as for Ammonia)
- Lead II [air, unspecified]: 8.3904e-8 kg; = 8.39039875819248E-08*clinker; lognormal variance with pedigree 0.652625, pedigree (2,1,3,2,1)
  (same comment as for Ammonia)
- Manganese II [air, unspecified]: 5.74326e-10 kg; = 5.74325629527423E-10*clinker; lognormal variance with pedigree 0.302625, pedigree (2,1,3,2,1)
  (same comment as for diesel, burned in building machine)
- Mercury II [air, unspecified]: 3.25249e-8 kg; = 3.25249085891687E-08*clinker; lognormal variance with pedigree 0.652625, pedigree (2,1,3,2,1)
  (same comment as for Ammonia)
- Methane, fossil [air, unspecified]: 8.78504e-6 kg; = 8.78504311831666E-06*clinker; lognormal variance with pedigree 0.2206, pedigree (2,5,5,5,4)
  (same comment as for Ammonia)
- NMVOC, non-methane volatile organic compounds [air, unspecified]: 5.58866e-5 kg; = 5.58866022766471E-05*clinker; lognormal variance with pedigree 0.042625, pedigree (2,1,3,2,1)
  (same comment as for Ammonia)
- Nickel II [air, unspecified]: 6.71358e-9 kg; = 6.71357709555019E-09*clinker; lognormal variance with pedigree 0.652625, pedigree (2,1,3,2,1)
  (same comment as for Ammonia)
- Nitrogen oxides [air, unspecified]: 0.000977 kg; source Karstensen, K.H. 2007; lognormal variance with pedigree 0.042625, pedigree (2,1,3,2,1)
  Emissions to air- Calculated value representing an average of 20 cement kilns in ZA. Source Karstensen, K.H., (2007). National policy on high temperature thermal waste treatment and cement kiln alternative fuel use.In theraml waste treatment and cement kiln alternative fuel use. Department of Environmental Affairs and Tourism, South Africa. Accessed 20171107
- Particulate Matter, < 2.5 um [air, non-urban air or from high stacks]: 2.36975e-5 kg; = 2.36974874094515E-05*clinker; lognormal variance with pedigree 0.302625, pedigree (2,1,3,2,1)
  Emissions to air.Extrapolated value. Adopted from the "clinker production, GLO 2003" dataset. Accessed 20171107
- Particulate Matter, > 10 um [air, non-urban air or from high stacks]: 6.49968e-6 kg; = 6.49968023456364E-06*clinker; lognormal variance with pedigree 0.042625, pedigree (2,1,3,2,1)
  (same comment as for Arsenic ion)
- Particulate Matter, > 2.5 um and < 10um [air, non-urban air or from high stacks]: 0.000123 kg; source Karstensen, K.H. 2007; lognormal variance with pedigree 0.122625, pedigree (2,1,3,2,1)
  (same comment as for Nitrogen oxides)
- Selenium IV [air, unspecified]: 1.97861e-9 kg; lognormal variance with pedigree 0.7506, pedigree (2,5,5,5,4)
  (same comment as for Ammonia)
- Sulfur dioxide [air, unspecified]: 5.92e-5 kg; source Karstensen, K.H. 2007; lognormal variance with pedigree 0.003225, pedigree (2,1,3,2,1)
  (same comment as for Nitrogen oxides)
- Thallium I [air, unspecified]: 1.30171e-8 kg; = 1.30171093480511E-08*clinker; lognormal variance with pedigree 0.1406, pedigree (2,5,5,5,4)
  (same comment as for Ammonia)
- Tin ion [air, unspecified]: 9.04705e-9 kg; = 9.04705070714039E-09*clinker; lognormal variance with pedigree 0.7506, pedigree (2,5,5,5,4)
  (same comment as for Ammonia)
- Vanadium V [air, unspecified]: 4.96621e-9 kg; = 4.96620903759917E-09*clinker; lognormal variance with pedigree 0.1406, pedigree (2,5,5,5,4)
  (same comment as for Ammonia)
- Water [air, unspecified]: 0.0002943 m3; name water_to_air_unspecified; = 0.0002943*clinker; lognormal variance with pedigree 0.002, pedigree (1,1,3,1,1)
  (same comment as for Water, cooling, unspecified natural origin)
- Zinc II [air, unspecified]: 6.34157e-8 kg; = 6.34156605726112E-08*clinker; lognormal variance with pedigree 0.652625, pedigree (2,1,3,2,1)
  (same comment as for Arsenic ion)
- Arsenic ion [water, unspecified]: 1.29322e-10 kg; = 1.29321835115557E-10*clinker; lognormal variance with pedigree 0.043225, pedigree (2,3,3,2,1)
  Emissions to water- Extrapolated value. Adopted from the "clinker production, GLO 2003" dataset. Accessed 20171107. Calculated as a weighted average (by production volume) of the regional activities.
- Cadmium II [water, unspecified]: 2.58907e-11 kg; = 2.58906519489479E-11*clinker; lognormal variance with pedigree 0.653225, pedigree (2,3,3,2,1)
  Emissions to water.Adopted from the "clinker production, GLO 2003" dataset. Accessed 20171107. Calculated as a weighted average (by production volume) of the regional activities.
- Chromium III [water, unspecified]: 5.17813e-11 kg; = 5.17813038978958E-11*clinker; lognormal variance with pedigree 0.653225, pedigree (2,3,3,2,1)
  (same comment as for Arsenic ion)
- Copper ion [water, unspecified]: 2.58907e-11 kg; = 2.58906519489479E-11*clinker; lognormal variance with pedigree 0.653225, pedigree (2,3,3,2,1)
  (same comment as for Arsenic ion)
- Lead II [water, unspecified]: 2.72049e-11 kg; = 2.72048982407727E-11*clinker; lognormal variance with pedigree 0.653225, pedigree (2,3,3,2,1)
  (same comment as for diesel, burned in building machine)
- Mercury II [water, unspecified]: 2.72049e-13 kg; = 2.72048982407727E-13*clinker; lognormal variance with pedigree 0.653225, pedigree (2,3,3,2,1)
  (same comment as for diesel, burned in building machine)
- Nickel II [water, unspecified]: 2.58907e-11 kg; = 2.58906519489479E-11*clinker; lognormal variance with pedigree 0.653225, pedigree (2,3,3,2,1)
  (same comment as for diesel, burned in building machine)
- Water [water, unspecified]: 0.00165256 m3; name unspecified; = 0.00165255657*clinker; lognormal variance with pedigree 0.002, pedigree (1,1,3,1,1)
  (same comment as for Water, cooling, unspecified natural origin)
- Zinc II [water, unspecified]: 5.17813e-11 kg; = 5.17813038978958E-11*clinker; lognormal variance with pedigree 0.653225, pedigree (2,3,3,2,1)
  (same comment as for Arsenic ion)

## Sampling procedure
Several data sources were used to elaborate this dataset:
- For energy input: (1) There is lack of documentation on the energy due to co-processing/ secondary fuel useage in local cement companies. Secondary fuel sources such as tyres and waste sludge are currently used on trial basis (2017) (2) Primary data collection is from one cement company representing 15% of the cement market share in South Africa. (3) Eskom (2011). "Concrete steps towards profitability: Solid ways to ensure energy efficient cement production", Cement brochure, <Available at: http://www.eskom.co.za/sites/idm/Documents/128251_Cement_Brochure.pdf>. Accessed 20171107

- For emissions to air: (1) Karstensen, K.H., (2007). National policy on high temperature thermal waste treatment and cement kiln alternative fuel use.In theraml waste treatment and cement kiln alternative fuel use. Department of Environmental Affairs and Tourism, South Africa.
(2) Extrapolated values from "clinker production, GLO 2003" dataset. Accessed 20171107

## Review by Marion Sié 2017-11-27
Very well documented dataset
