# controller production, for electric scooter

Dataset: EcoSpold 2, unit process
Geography: GLO
Time period: 2005-01-01 to 2023-12-31
Technology level: current
Classification: ISIC rev.4 ecoinvent: 2710:Manufacture of electric motors, generators, transformers and electricity di
Scenario: Business-as-Usual
System model: Allocation, cut-off by classification
Generated by: Andrea Del Duce
Database: ecoinvent
isCopyrightProtected: true
accessRestrictedTo: 1

## General comment
This dataset describes the production of a controller suitable for the power electronics of an electric scooter. It comprises the various electronic components making out the logic control unit and the power transistors (IGBTs). The entries are given on a function of kg of device. The original data was collected for a device of approximately 1.3 kg weight. The dataset is based on direct inspection of existing commercial devices of current technology.

## Included activities start
The datasets takes as input the various electronic components required to build the controller and includes the components' production efforts. Assembly energy not included due to lack of data.

## Included activities end
The dataset returns the assembled device and production waste as a by-product.

## Reference product
- controller, for electric scooter: 1 kg; name RP_amount_1; By-product classification allocatable product; CPC 49941: Parts and accessories of motorcycles and side-cars; HS2017 854231: Electronic integrated circuits; processors and controllers, whether or not combined with memories, converte[...]
  production volume 986370 kg; name RP_PV_1
    Rough estimate based on 1% electric scooters out of 466E6 world two wheeler production projection between 2010 and 2016.(www.electric-bicycle-guide.com)
  property price 143 EUR2005
    Calculated value based on estimates and literature. The price of the batterry is 32.06euro/kg. The weight of a battery for an electric scooter is 30kg (producer's information: http://vespino.ch/?page_id=6, accessed 20130726). The market price for an electric scooter is approximatelly 4600euro (producer's information: http://vespino.ch/?page_id=6, accessed: 20130726). It is estimated, that the basic price is 1/3 lower than the market price (expert judgement). The basic price of a scooter without batterry is then calculated to be ((4600*2/3)-(32.06*30)=) 2105euro. The ratio between the price of powertrain and glider in case of electric cars is 1:17 (for more details see the comment field of these products' prices). The resulting prices are 8.4euro/kg of glider, for electric scooter and 142euro/kg of powertrain, for electric scooter. The price is considered to be the same (142euro/kg) for all the parts of the powertrain, such as motor, controller and charger.
  properties: carbon allocation 0 kg, carbon content 0

## Inputs from technosphere
- aluminium scrap, new: -0.0401575 kg; name BP_amount_1; lognormal variance with pedigree 0.0152, pedigree (3,4,3,4,3)
  Production waste, own assumption. Waste factor taken from F. Habermacher 2011.
  production volume; = RP_PV_1 * (BP_amount_1 / RP_amount_1)
    Calculated from production volume of reference product using the relative outputs.
  properties: dry mass 1 kg, price 0.806 EUR2005, wet mass 1 kg
- aluminium, cast alloy: 0.441732 kg; lognormal variance with pedigree 0.0444, pedigree (2,4,5,4,2)
  Based on the direct inspection of a commercial device.
  properties: dry mass 1 kg, wet mass 1 kg
- cable, ribbon cable, 20-pin, with plugs: 0.0472441 kg; lognormal variance with pedigree 0.0444, pedigree (2,4,5,4,2)
  Based on the direct inspection of a commercial device.
  properties: carbon content, fossil 0.648653, dry mass 1 kg, wet mass 1 kg
- capacitor, auxilliaries and energy use: 0.23474 kg; lognormal variance with pedigree 0.0444, pedigree (2,4,5,4,2)
  Based on the direct inspection of a commercial device.
- capacitor, electrolyte type, > 2cm height: 0.232283 kg; lognormal variance with pedigree 0.0444, pedigree (2,4,5,4,2)
  Based on the direct inspection of a commercial device.
  properties: carbon content, fossil 0.16971, carbon content, non-fossil 0.0349727, dry mass 1 kg, wet mass 1 kg
- capacitor, film type, for through-hole mounting: 0.00110236 kg; lognormal variance with pedigree 0.0444, pedigree (2,4,5,4,2)
  Based on the direct inspection of a commercial device.
  properties: carbon content, fossil 0.278876, dry mass 1 kg, wet mass 1 kg
- capacitor, for surface-mounting: 0.00135433 kg; lognormal variance with pedigree 0.0444, pedigree (2,4,5,4,2)
  Based on the direct inspection of a commercial device.
  properties: dry mass 1 kg, wet mass 1 kg
- copper, cathode: 0.00256205 kg; lognormal variance with pedigree 0.0444, pedigree (2,4,5,4,2)
  Based on the direct inspection of a commercial device.
  properties: dry mass 1 kg, wet mass 1 kg
- diode, auxilliaries and energy use: 0.000453543 kg; lognormal variance with pedigree 0.0444, pedigree (2,4,5,4,2)
  Based on the direct inspection of a commercial device.
- diode, glass-, for through-hole mounting: 0.000453543 kg; lognormal variance with pedigree 0.0444, pedigree (2,4,5,4,2)
  Based on the direct inspection of a commercial device.
  properties: carbon content, fossil 0.0203273, dry mass 1 kg, wet mass 1 kg
- inductor, auxilliaries and energy use: 0.0015748 kg; lognormal variance with pedigree 0.0444, pedigree (2,4,5,4,2)
  Based on the direct inspection of a commercial device.
- inductor, ring core choke type: 0.0015748 kg; lognormal variance with pedigree 0.0444, pedigree (2,4,5,4,2)
  Based on the direct inspection of a commercial device.
  properties: carbon content, fossil 0.445934, dry mass 1 kg, wet mass 1 kg
- insulated gate bipolar transistor, electric vehicle application: 0.581102 kg; lognormal variance with pedigree 0.0444, pedigree (2,4,5,4,2)
  Based on the direct inspection of a commercial device.
- integrated circuit, logic type: 0.00206299 kg; lognormal variance with pedigree 0.0444, pedigree (2,4,5,4,2)
  Based on the direct inspection of a commercial device.
  properties: carbon content, fossil 0.221701, dry mass 1 kg, wet mass 1 kg
- metal working, average for aluminium product manufacturing: 0.401575 kg; lognormal variance with pedigree 0.0532, pedigree (3,4,5,4,3)
  Own assumption.
- mounting, through-hole technology, Pb-free solder: 0.00505512 m2; lognormal variance with pedigree 0.0444, pedigree (2,4,5,4,2)
  Based on the direct inspection of a commercial device.
- polyethylene, high density, granulate: 0.00393701 kg; lognormal variance with pedigree 0.0444, pedigree (2,4,5,4,2)
  Based on the direct inspection of a commercial device.
  properties: carbon content, fossil 0.857143, dry mass 1 kg, heating value, net 42.47 MJ, wet mass 1 kg
  note on carbon content, fossil: Polyethylene is formed out of a huge amount of ethylene monomers (C2H4) (ecoinvent v2.2 report 11_II). MW=28 g/mol
- printed wiring board, for through-hole mounting, Pb free surface: 0.00505512 m2; lognormal variance with pedigree 0.0444, pedigree (2,4,5,4,2)
  Based on the direct inspection of a commercial device.
  properties: carbon content, fossil 0.210221, dry mass 3.08 kg, wet mass 3.08 kg
- resistor, auxilliaries and energy use: 0.00290236 kg; lognormal variance with pedigree 0.0444, pedigree (2,4,5,4,2)
  Based on the direct inspection of a commercial device.
- resistor, surface-mounted: 0.000540157 kg; lognormal variance with pedigree 0.0444, pedigree (2,4,5,4,2)
  Based on the direct inspection of a commercial device.
  properties: carbon content, fossil 0.00893558, dry mass 1 kg, wet mass 1 kg
- resistor, wirewound, through-hole mounting: 0.0023622 kg; lognormal variance with pedigree 0.0444, pedigree (2,4,5,4,2)
  Based on the direct inspection of a commercial device.
  properties: carbon content, fossil 0.0174395, dry mass 1 kg, wet mass 1 kg
- synthetic rubber: 0.0015748 kg; lognormal variance with pedigree 0.0444, pedigree (2,4,5,4,2)
  Based on the direct inspection of a commercial device.
  properties: carbon content, fossil 0.871949, dry mass 1 kg, heating value, net 26.42 MJ, wet mass 1 kg
  note on carbon content, fossil: EPDM (Ethylene-propene-diene terpolymer) rubber is a terpolymer of ethylene, propene, and a diene with the residual unsaturated portion of the diene in the side chain (ecoinvent v2.2 report 7-part XX & Ullmann). Chemical formula (deduced from Evidences of Solvent-Induced Miscibility in Polychloroprene-co-Ethylene-Propene Diene Terpolymer Blends, Dubey et al., Journal of Applied Polymer Science, 2009, 111:1884–1891): C20H35
- transformer, low voltage use: 0.00787402 kg; lognormal variance with pedigree 0.0444, pedigree (2,4,5,4,2)
  Based on the direct inspection of a commercial device.
  properties: carbon content, fossil 0.11936, dry mass 1 kg, wet mass 1 kg
- transistor, auxilliaries and energy use: 0.0203291 kg; lognormal variance with pedigree 0.0444, pedigree (2,4,5,4,2)
  Based on the direct inspection of a commercial device.
- transistor, surface-mounted: 0.00393701 kg; lognormal variance with pedigree 0.0444, pedigree (2,4,5,4,2)
  Based on the direct inspection of a commercial device.
  properties: carbon content, fossil 0.083636, dry mass 1 kg, wet mass 1 kg
- transistor, wired, small size, through-hole mounting: 0.000644094 kg; lognormal variance with pedigree 0.0444, pedigree (2,4,5,4,2)
  Based on the direct inspection of a commercial device.
  properties: carbon content, fossil 0.080338, dry mass 1 kg, wet mass 1 kg

## Sampling procedure
Direct inspection of a typical device of common technology.

## Extrapolations
The inspected device represents a typical technology which is believed to be representative up to 2015.

## Review by Christian Bauer 2012-05-25
passed
