# lime production, hydrated, loose weight

Dataset: EcoSpold 2, unit process
Geography: CA-QC
Time period: 2012-01-01 to 2023-12-31
Technology level: current
Classification: ISIC rev.4 ecoinvent: 2394:Manufacture of cement, lime and plaster
Classification: EcoSpold01Categories: construction materials/binder
Tags: single enterprise data
Scenario: Business-as-Usual
System model: Allocation, cut-off by classification
Share of production covered: 100 %
Generated by: Geneviève Martineau
Published in: Kellenberger D. 2004
Database: ecoinvent
isCopyrightProtected: true
accessRestrictedTo: 1

## General comment
This dataset represents the production of hydrated lime in Quebec (Canada), from quicklime in pieces.
Hydrated lime is used in a variety of industrial applications including water treatment, as an anti-stripping agent in asphalt, and in soil stabilization. Some hydrated limes are sold into the food grade market as well.
Hydrated lime Ca(OH)2 is a dry powder produced by reacting quicklime with a sufficient amount of water to satisfy the quicklime's natural affinity for moisture. The process converts CaO to Ca(OH)2. The amount of water required depends on both the subtle characteristics of the quicklime and the type of hydrating equipment available. Hydrated lime easily forms as a suspension or slurry and is often pumped to various process locations within industrial plants. The resulting solution is strongly alkaline, having a pH of 12.4. Most hydrated limes contain approximately 75 percent CaO and 25 percent H2O.
Electricity and water consumption were provided by the only hydrated lime producer in Quebec. A weighted average of their two (2) hydrated lime plants is used.
Infrastructure data was extrapolated from "lime production, hydrated, loose weight, GLO 2000-2002" ecoinvent dataset: The value of the infrastructure is normalized with a annual production capacity of about 20'000 tons of product per year. The estimated lifespan of the machines is 25 years. There are no significant dust emissions as a dust control system is installed.

## Included activities start
From quicklime in pieces

## Included activities end
This activity ends with the hydrated lime, loose, at the plant gate.

This dataset includes the processes: slaking, crushing, dust abatement (cyclone), transportation and storing. A part of the total heating energy for "production" and "administration" is included. Equipment included in the infrastructure: 1 swing hammer crusher, 2 cyclone dust catchers, 1 lime slaking plant, 2 conveyor worms, and 1 silo.

## Geography
Quebec data are from the only company that produces quicklime on the territory. Unavalable data were extrapolated based on the GLO dataset exchanges.

## Parameters
- fraction, process water, to air: 0.15 dimensionless; name fraction_PW_to_air; lognormal variance with pedigree 0.094, pedigree (4,4,3,5,4)
  Extrapolated value, based on "lime production, hydrated, loose weight, GLO 2000-2002" dataset.
- reaction water: 0.243243 kg; name reaction_water; lognormal variance with pedigree 0.0006, pedigree (1,1,1,1,1)
  Calculated value. Amount of water to produce 1 kg of hydrated lime, based on stoechiometry.
  Mass H2O = 18 *M Ca(OH)2 / 74

## Reference product
- lime, hydrated, loose weight: 1 kg; By-product classification allocatable product; CPC 37420: Quicklime, slaked lime and hydraulic lime; HS2017 252100: Limestone flux; limestone and other calcareous stone, of a kind used for the manufacture of lime or cement; CAS 1305-62-0
  EcoSpold01Location=CH
  production volume 6.49e7 kg
    Source: questionnaire. Primary data for 2012 hydrated lime production, in Quebec.
  property carbon content, fossil 0
    Mainly Ca(OH)2. Tab 3.4, ecoinvent v2.2 report 7, part VII, pg 7
  property carbon content, non-fossil 0
    Mainly Ca(OH)2. Tab 3.4, ecoinvent v2.2 report 7, part VII, pg 7
  property price 0.108 EUR2005
    Calculated value based on data from United Nations Commodity Trade Statistics Database (comtrade.un.org). UN comtrade category: 252220 Slaked lime. Year 2005. Using exchange rate of 1EURO = 1.209 USD. Average of price of import into 5 main markets (EU, US, JP, IN and CN).
  properties: carbon allocation 0 kg, carbon content 0, dry mass 0.997 kg, water content 0.00300903, water in wet mass 0.003 kg, wet mass 1 kg

## Inputs from technosphere
- electricity, medium voltage: 0.0321113 kWh; lognormal variance with pedigree 0.0086, pedigree (1,1,4,1,1)
  EcoSpold01Location=CH
  Measured value. Energy use for hydratation process. Source: questionnaire.
- heat, central or small-scale, other than natural gas: 0.00141 MJ; source Kellenberger D. 2004; lognormal variance with pedigree 0.0101, pedigree (1,2,4,5,1)
  Extrapolated value, based on "lime production, hydrated, loose weight, GLO 2000-2002" dataset.
  EcoSpold01Location=CH
  properties: heating value, net 1 MJ
- industrial machine, heavy, unspecified: 8.76e-5 kg; source Kellenberger D. 2004; lognormal variance with pedigree 0.3386, pedigree (4,3,4,5,1)
  EcoSpold01Location=RER
  Extrapolated value, based on "lime production, hydrated, loose weight, GLO 2000-2002" dataset.
- quicklime, in pieces, loose: 0.769 kg; source Kellenberger D. 2004; lognormal variance with pedigree 0.0444, pedigree (2,3,5,5,2)
  (same comment as for fraction, process water, to air)
  properties: dry mass 0.99 kg, water content 0.010101, wet mass 1 kg

## Inputs from nature
- Water, well, in ground [natural resource, in water]: 0.000736094 m3; name water_in; lognormal variance with pedigree 0.0121, pedigree (3,2,4,5,1)
  Measured value. Water used during the hydradation process, including reaction water. Source: questionnaire.

## Emissions to nature
- Water [air, unspecified]: 7.39276e-5 m3; = (water_in-reaction_water/1000)*fraction_PW_to_air; lognormal variance with pedigree 0.008, pedigree (1,1,4,1,1)
  Calculated value.
  Uncertainty: Calculated variable. Uncertainty will be determined from propagation of uncertainty factors of underlying variables. Uncertainty of actual relation between variables not accounted at this time
- Water [water, unspecified]: 0.000418923 m3; = (water_in-reaction_water/1000)*(1-fraction_PW_to_air); lognormal variance with pedigree 0.008, pedigree (1,1,4,1,1)
  (same comment as for Water)
  property carbon content, fossil 0; name C_content_fossil
  property carbon content, non-fossil 0; name C_content_non_fossil
  property dry mass 0 kg; name DM
  property water in wet mass 1000 kg; name WWM
  property wet mass 1000 kg; name WM

## Sampling procedure
Information provided by the only Quebec producer

## Extrapolations
A weighted average of the two hydrated lime production plants in Quebec was used.
When no information available, GLO exchanges have been used as proxy for Quebec. The uncertainty has been adjusted accordingly.

See Geography and Technolgy fields for details.
