# electricity, high voltage, production mix

Dataset: EcoSpold 2, unit process, production mix
Geography: IN-Northern grid
Time period: 2021-01-01 to 2023-12-31
Scenario: Business-as-Usual
System model: Allocation, cut-off by classification
Generated by: [System]
Database: ecoinvent
isCopyrightProtected: true
accessRestrictedTo: 1

## General comment
The shares of electricity technologies on this market are valid for the year 2020-21. The fiscal year in India starts on 1 April 2020 and ends 31 March 2021. The shares been calculated by the data provider and don't correspond with the production volumes entered in the undefined datasets of the different electricity supplying technologies. The shares have been calculated based on statistics from 2020-21:
Electricity generation data is sourced from:
- General Review 2022, All India Electricity Statistics containing data for the year 2020-21, Central Electricity Authority, 2022
Technology splits are calculated based on:
- S&P Global (2021). Platts World Electric Power Plant database (WEPP), version December 2021. https://www.spglobal.com
- The windpower (2022). Wind farms. https://www.thewindpower.net/windfarms_list_en.php
- For hydro the technology split was determined through individual research For each power plant.
Regional import are calculated based on:
- Grid-India (2021). Grid Controller of India Limited. URL: https://posoco.in/reports/monthly-reports/

## Reference product
- electricity, high voltage: 1 kWh; By-product classification allocatable product; CPC 17100: Electrical energy; HS2017 271600: Electrical energy
  production volume 2.51866e11 kWh
    The production volume is valid for the year 2021. See general comment for sources.
  properties: carbon allocation 0 kg, carbon content 0, price 0.0977 EUR2005

## Inputs from technosphere
- electricity, high voltage: 0.00228815, 0.000627847, 0.00188354, 0.0775042, 0.00528396, 0.000290821, 0.00697929, 0.241372, 0.000771543, 0.00208146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 kWh (45 suppliers, which the file names only by identifier); sum of these 0.984205 kWh
  Calculated from electricity generation and trade statistics. See general comment for validity and sources.
  properties: price 0.0977 EUR2005
- electricity, high voltage: 0.000140773, 0.0119262, 0.000642009, 0.00024102, 0.00276213, 8.31839e-5 kWh (6 suppliers, which the file names only by identifier); sum of these 0.0157953 kWh
  (same comment as for electricity, high voltage)
  properties: exergy 3.6 MJ, price 0.0977 EUR2005
