# 1,4-butanediol production

Dataset: EcoSpold 2, unit process
Geography: RoW
Time period: 1989-01-01 to 2023-12-31
Technology level: current
Classification: EcoSpold01Categories: chemicals/organics
Classification: ISIC rev.4 ecoinvent: 2011:Manufacture of basic chemicals
Synonyms: butylene glycol
Tags: ConvertedDataset
Scenario: Business-as-Usual
System model: Allocation, cut-off by classification
Share of production covered: 100 %
Generated by: Jürgen Sutter
Published in: Sutter, J. 2007
Database: ecoinvent
isCopyrightProtected: true
accessRestrictedTo: 1

## General comment
The process "c1,4-butanediol, at plant, RER" is modelled for the production of 1,4-butanediol from acetylene in Europe. Raw materials, Energy consumptions and emissions are modelled with literature data. Infrastructure and transports are calculated with standard values.
[This dataset was already contained in the ecoinvent database version 2. It was not individually updated during the transfer to ecoinvent version 3. Life Cycle Impact Assessment results may still have changed, as they are affected by changes in the supply chain, i.e. in other datasets. This dataset was generated following the ecoinvent quality guidelines for version 2. It may have been subject to central changes described in the ecoinvent version 3 change report (http://www.ecoinvent.org/database/ecoinvent-version-3/reports-of-changes/), and the results of the central updates were reviewed extensively. The changes added e.g. consistent water flows and other information throughout the database. The documentation of this dataset can be found in the ecoinvent reports of version 2, which are still available via the ecoinvent website. The change report linked above covers all central changes that were made during the conversion process.]

## Included activities end
Production of 1,4-butanediol including materials, energy uses, infrastructure and emissions.

## Geography
The inventory is modelled for Europe.

## Technology
Hydrgenation of butynediol from acetylene

## Time period
Time of publications

## Parameters
- fraction, cooling water, cooling pond system, to air: 0.032 dimensionless; name fraction_CW_CP_to_air; lognormal variance with pedigree 0.0413, pedigree (2,3,1,3,1)
  Calculated based on literature value (Scown, C.D., 2011, Water Footprint of U.S. Transportation Fuels and supplying information of the article) (Vionnet, S., Quantis Water Database - Technical Report, 2012).
- fraction, cooling water, once-through system, to air: 0.004 dimensionless; name fraction_CW_OT_to_air; lognormal variance with pedigree 0.0413, pedigree (2,3,1,3,1)
  (same comment as for fraction, cooling water, cooling pond system, to air)
- fraction, cooling water, recirculating system, to air: 0.771 dimensionless; name fraction_CW_R_to_air; lognormal variance with pedigree 0.0413, pedigree (2,3,1,3,1)
  (same comment as for fraction, cooling water, cooling pond system, to air)
- fraction, cooling water, to air: 0.3875 dimensionless; name fraction_CW_to_air; = (0.5*fraction_CW_OT_to_air)+(0.5*fraction_CW_R_to_air); lognormal variance with pedigree 0.092025, pedigree (4,4,3,2,4)
  Calculated value based on literature value (see comments of the other parametres present in this dataset) and expert opinion. In the case when no industry/literature data are available about the type of cooling or directly fraction, cooling water, to air specific for the process a default assumption is applied. It is assumed that the once-through cooling system is used in 50% of all cases and recirculating system is used in another 50% of all cases.
- fraction, process water, to air: 0.205 dimensionless; name fraction_PW_to_air; lognormal variance with pedigree 0.092025, pedigree (4,4,3,2,4)
  Literature value (Statistics Canada, 2007 & Shaffer, K.H., 2008, Consumptive water use in the Great Lakes Basin, USGS) (Vionnet, S., Quantis Water Database - Technical Report, 2012).
- fraction, water, deionised, to air: 0.205 dimensionless; name fraction_WDI_to_air; = fraction_PW_to_air; lognormal variance with pedigree 0.092025, pedigree (4,4,3,2,4)
  Calculated value. See comment in the other parametres present in this dataset. Deionised water is considered to be always used as process water, thus process water fractions to air are applied to all deionised water input flows to calculate the amount of water consumed in the processes.

## Reference product
- 1,4-butanediol: 1 kg; By-product classification allocatable product; CPC 34139: Other alcohols, phenols, phenol-alcohols, and their halogenated, sulphonated, nitrated or nitrosated derivativ[…]; HS2017 290531: Alcohols; acyclic, diols; ethylene glycol (ethanediol); CAS 110-63-4
  EcoSpold01Location=RER
  production volume 2.67763 kg
    This is a placeholder value that does not reflect real-world production volumes. This dataset does not currently require a real-world production volume to work in the database framework, and no actual data were collected yet. This has no negative effect on the results of the ecoinvent database.
  property heating value, net 29.6 MJ
    LHV is calculated based on the elemental composition of the substance. Based on the CAS number of the substance (000110-63-4), the chemical formula of the substance is found to be: C4H10O2, (PubChem 2020).
    Reference: Kim, S., Chen, J., Cheng, T., Gindulyte, A., He, J., He, S., Li, Q., Shoemaker, B. A., Thiessen, P. A., Yu, B., Zaslavsky, L., Zhang, J., & Bolton, E. E. (2019). PubChem 2019 update: improved access to chemical data. Nucleic acids research, 47(D1), D1102–D1109. https://doi.org/10.1093/nar/gky1033
  property price 1.23759 EUR2005
    Calculated based on inputs: The price of the product has been calculated as a sum of the values of the material and energy inputs for this product. This value is therefore a rough estimation. It may underestimate the real price since there are additional expenses when producing any product. These expences can include for example labour costs, treatment of waste materials and profit for the producer. Please consider carefully whether this level of data quality is acceptable for your application.
  properties: carbon allocation 0.533333 kg, carbon content 0.533333, carbon content, fossil 0.533333, carbon content, non-fossil 0, dry mass 1 kg, water content 0, water in wet mass 0 kg, wet mass 1 kg

## Inputs from technosphere
- acetylene: 0.32 kg; lognormal variance with pedigree 0.0726, pedigree (1,3,5,5,1)
  Chauvel 1989
  EcoSpold01Location=CH
  Uncertainty: Chauvel 1989
  properties: carbon content, fossil 0.923077, dry mass 1 kg, heating value, net 51.2 MJ, wet mass 1 kg
  note on carbon content, fossil: C2H2. ecoinvent v2.2 report n 8. Produced from partial oxidation of natural gas
  note on heating value, net: Based on literature, page 25 (Value may refer to HHV), Althaus H.-J., Chudacoff M., Hischier R., Jungbluth N., Osses M. and Primas A. (2007) Life Cycle Inventories of Chemicals. Final report ecoinvent data v2.0 No. 8. EMPA, Swiss Centre for Life Cycle Inventories, Dübendorf, CH, Online-Version under: www.ecoinvent.org.
- chemical factory, organics: 4e-10 unit; lognormal variance with pedigree 0.448, pedigree (4,5,5,5,5)
  EcoSpold01Location=RER
  Estimation
  Uncertainty: Estimation
- copper, cathode: 0.000204 kg; lognormal variance with pedigree 0.0426, pedigree (1,3,5,5,1)
  EcoSpold01Location=RER
  Cooper 2001
  Uncertainty: Cooper 2001
  properties: dry mass 1 kg, wet mass 1 kg
- electricity, medium voltage: 0.0126278, 0.251896, 0.0846364, 0.00386707, 0.000773989, 0.000166193, 0.0260122 kWh (7 suppliers, which the file names only by identifier); sum of these 0.37998 kWh; lognormal variance with pedigree 0.0726, pedigree (1,3,5,5,1)
  Chauvel 1989
  EcoSpold01Location=UCTE
  Uncertainty: Chauvel 1989
- formaldehyde: 0.7326 kg; lognormal variance with pedigree 0.0726, pedigree (1,3,5,5,1)
  EcoSpold01Location=RER
  Chauvel 1989
  Uncertainty: Chauvel 1989
  properties: carbon content, fossil 0.4, dry mass 1 kg, heating value, net 20.19 MJ, wet mass 1 kg
- heat, district or industrial, natural gas: 0.304099, 18.5059 MJ (2 suppliers, which the file names only by identifier); sum of these 18.81 MJ; lognormal variance with pedigree 0.0726, pedigree (1,3,5,5,1)
  Uncertainty: Chauvel 1989
  properties: heating value, net 1 MJ
- heat, district or industrial, other than natural gas: 10.4941, 0.00486172 MJ (2 suppliers, which the file names only by identifier); sum of these 10.4989 MJ; lognormal variance with pedigree 0.0726, pedigree (1,3,5,5,1)
  Uncertainty: Chauvel 1989
  properties: heating value, net 1 MJ
- hydrogen, gaseous, medium pressure, merchant: 0.0331714, 0.0208286 kg (2 suppliers, which the file names only by identifier); sum of these 0.054 kg; lognormal variance with pedigree 0.0726, pedigree (1,3,5,5,1)
  EcoSpold01Location=RER
  Chauvel 1989
  Uncertainty: Chauvel 1989
  properties: dry mass 1 kg, heating value, net 120.21 MJ, wet mass 1 kg
- nickel, class 1: 0.000214 kg; lognormal variance with pedigree 0.0426, pedigree (1,3,5,5,1)
  EcoSpold01Location=GLO
  Cooper 2001
  Uncertainty: Cooper 2001
  properties: dry mass 1 kg, wet mass 1 kg
- nitrogen, liquid: 0.03125 kg; lognormal variance with pedigree 0.0726, pedigree (1,3,5,5,1)
  Chauvel 1989
  EcoSpold01Location=RER
  Uncertainty: Chauvel 1989
  properties: dry mass 1 kg, wet mass 1 kg
- sodium hydroxide, without water, in 50% solution state: 0.003 kg; lognormal variance with pedigree 0.0726, pedigree (1,3,5,5,1)
  EcoSpold01Location=RER
  Chauvel 1989
  Uncertainty: Chauvel 1989
  properties: dry mass 1 kg, heating value, net 3.03 MJ, wet mass 1 kg
- water, deionised: 1 kg; name water_deionised_input; source Chauvel, A. 1989; lognormal variance with pedigree 0.0726, pedigree (1,3,5,5,1)
  EcoSpold01Location=CH
  Literature value.
  Uncertainty: Chauvel 1989
  properties: wet mass 1 kg

## Inputs from nature
- Water, cooling, unspecified natural origin [natural resource, in water]: 0.49 m3; name water_cooling_UNO_input; source Cooper, J. Smith 2001; lognormal variance with pedigree 0.0426, pedigree (1,3,5,5,1)
  Literature value.
  Uncertainty: Cooper 2001

## Emissions to nature
- Acetylene [air, urban air close to ground]: 4.61e-5 kg; lognormal variance with pedigree 0.0826, pedigree (1,3,5,5,1)
  Cooper 2001
  Uncertainty: Cooper 2001
- Butanol [air, urban air close to ground]: 3.1e-5 kg; lognormal variance with pedigree 0.0426, pedigree (1,3,5,5,1)
  Cooper 2001
  Uncertainty: Cooper 2001
- Copper ion [air, urban air close to ground]: 2.26e-6 kg; lognormal variance with pedigree 0.6926, pedigree (1,3,5,5,1)
  Cooper 2001
  Uncertainty: Cooper 2001
- Formaldehyde [air, urban air close to ground]: 5.7e-5 kg; lognormal variance with pedigree 0.0826, pedigree (1,3,5,5,1)
  Cooper 2001
  Uncertainty: Cooper 2001
- NMVOC, non-methane volatile organic compounds [air, urban air close to ground]: 0.00129 kg; lognormal variance with pedigree 0.0826, pedigree (1,3,5,5,1)
  Cooper 2001
  Uncertainty: Cooper 2001
- Nickel II [air, urban air close to ground]: 1.11e-8 kg; lognormal variance with pedigree 0.6926, pedigree (1,3,5,5,1)
  Cooper 2001
  Uncertainty: Cooper 2001
- Water [air, unspecified]: 0.19008 m3; name water_to_air_unspecified; lognormal variance with pedigree 0.0827, pedigree (2,2,5,5,1)
  Calculated value based on literature values and expert opinion. See comments in the parametres' comment field.
  property fraction, origin: fresh water 0.00107849; name fraction_origin_fresh_water
  property fraction, origin: salt water 0; name fraction_origin_salt_water
  property fraction, origin: unspecified 0.998922; name fraction_origin_unspecified
- BOD5, Biological Oxygen Demand [water, surface water]: 5.78e-5 kg; lognormal variance with pedigree 0.188, pedigree (4,5,5,5,5)
  Calculated from the water emissions
  Uncertainty: Calculated from the water emissions
- Butanol [water, surface water]: 1.1e-5 kg; lognormal variance with pedigree 0.0426, pedigree (1,3,5,5,1)
  Cooper 2001
  Uncertainty: Cooper 2001
- COD, Chemical Oxygen Demand [water, surface water]: 5.78e-5 kg; lognormal variance with pedigree 0.188, pedigree (4,5,5,5,5)
  Calculated from the water emissions
  Uncertainty: Calculated from the water emissions
- Copper ion [water, surface water]: 1.34e-6 kg; lognormal variance with pedigree 0.3426, pedigree (1,3,5,5,1)
  Cooper 2001
  Uncertainty: Cooper 2001
- DOC, Dissolved Organic Carbon [water, surface water]: 1.91e-5 kg; lognormal variance with pedigree 0.188, pedigree (4,5,5,5,5)
  Calculated from the water emissions
  Uncertainty: Calculated from the water emissions
- Formaldehyde [water, surface water]: 2.98e-5 kg; lognormal variance with pedigree 0.3426, pedigree (1,3,5,5,1)
  Cooper 2001
  Uncertainty: Cooper 2001
- Nickel II [water, surface water]: 7.7e-7 kg; lognormal variance with pedigree 0.6926, pedigree (1,3,5,5,1)
  Cooper 2001
  Uncertainty: Cooper 2001
- TOC, Total Organic Carbon [water, surface water]: 1.91e-5 kg; lognormal variance with pedigree 0.188, pedigree (4,5,5,5,5)
  Calculated from the water emissions
  Uncertainty: Calculated from the water emissions
- Water [water, unspecified]: 0.30092 m3; name water_to_water_unspecified; lognormal variance with pedigree 0.0827, pedigree (2,2,5,5,1)
  (same comment as for Water)
  property carbon content, fossil 0; name C_content_fossil
  property carbon content, non-fossil 0; name C_content_non_fossil
  property dry mass 0 kg; name DM
  property fraction, origin: fresh water 0.0026419; name fraction_origin_fresh_water_Ww
  property fraction, origin: salt water 0; name fraction_origin_salt_water_Ww
  property fraction, origin: unspecified 0.997358; name fraction_origin_unspecified_Ww
  property water in wet mass 1000 kg; name WWM
  property wet mass 1000 kg; name WM

## Sampling procedure
Literature data

## Extrapolations
Transports are modelled with standard distances. This dataset has been copied from an original dataset covering the geography RER. The uncertainty has been adjusted accordingly.

## Review by Roland Hischier 2007-09-01
passed.
