# yarn production, silk, short fibre

Dataset: EcoSpold 2, unit process
Geography: RoW
Time period: 2015-04-01 to 2023-03-31
Technology level: current
Classification: EcoSpold01Categories: textiles/processing
Classification: ISIC rev.4 ecoinvent: 1311:Preparation and spinning of textile fibres
Scenario: Business-as-Usual
System model: Allocation, cut-off by classification
Generated by: Avraam Symeonidis
Published in: Faist Emmenegger, M. 2018
Database: ecoinvent
isCopyrightProtected: true
accessRestrictedTo: 1

## General comment
This dataset is constructed using "yarn production, cotton, open end spinning" as an approximation. Short fibres of silk is a by-product of silk reeling and it cannot be directly twisted like other short length fibres. Regarding quality, yarn, silk, has lower sheen and lustre and therefore is used for products other than textiles (where highest quality is preferred) like carpets etc.

## Included activities start
Activity starts with short fibres.

## Included activities end
This activity ends with produced 1 kg yarn.

## Technology
since this dataset reflects a handloom process, there are no machinery modelled

## Reference product
- yarn, silk: 1 kg; By-product classification allocatable product; CPC 26110: Raw silk (not thrown); HS2017 5004: Silk; yarn (other than yarn spun from silk waste), not put up for retail sale
  There is no coproduct or waste being generated here. Since, reeled silk is simply doubled up and rereeled in this process. No recircularisation either.
  production volume 5.44566e8 kg; name rppv; = 6.06E+08
    Source:http://inserco.org/en/statistics; accessed on 22 Nov 2017. This is world average for year 2015.
  property carbon content, non-fossil 0.465
    "Carbon content on a dry mass basis. All carbon is assumed to be biogenic due to the nature of the product. Carbon content of cotton is 0.44 kg of non-fossil carbon per kg of dry mass of cotton. Value is calculated based on the the composition of silk which is 64% cellulose. The data uses composition of silk fibers accessed on 10/11/2017 on: http://textilefashionstudy.com/chemical-composition-of-silk-fiber-silk-natural-fiber/
  property heating value, net 13.59 MJ
    LHV is calculated based on the Carbon content of the product. More details can be found on the respective documentation.
  property price 31.0125 EUR2005
    Estimated value. This price is averaged from 3 different suppliers available in the commercial webstore of alibaba. The price refers to both bulk and commercial quantity purchase. All websites were retrieved on the 1st of July 2019. THe exchange rate used is from 2010 when 1 USD - 0.827 EUR.
    Sources:
    https://www.alibaba.com/product-detail/100-Raw-Silk-Yarn-20-22D_60581755281.html?spm=a2700.7724838.2017115.245.739d3ce0qElQov
    https://www.alibaba.com/product-detail/100-mulberry-silk-roving-raw-silk_60745859786.html?spm=a2700.7724838.2017115.48.739d3ce0qElQov
  properties: carbon allocation 0.45105 kg, carbon content 0.465, carbon content, fossil 0, dry mass 0.97 kg, water content 0.0309278, water in wet mass 0.03 kg, wet mass 1 kg

## Inputs from technosphere
- building, hall: 1.55665e-5 m2; = 8000/(10278500*50); lognormal variance with pedigree 0.3046, pedigree (2,1,3,5,1)
  total building area (square meters) divided by production per year and life time of the plant
- diesel, burned in diesel-electric generating set, 10MW: 0.22295 MJ; = 0.0049*45.5; lognormal variance with pedigree 0.3046, pedigree (2,1,3,5,1)
  Diesel used for power backup. Forumula includes diesel consumption in kg multiplied with calorific value
  properties: heating value, net 1 MJ
- electricity, low voltage: 0.0115341, 0.0624103, 0.00242547, 0.000943037, 0.0658286, 0.0156905, 0.000946261, 0.00323388, 0.00129214, 0.581003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 kWh (47 suppliers, which the file names only by identifier); sum of these 1.65 kWh; lognormal variance with pedigree 0.0066, pedigree (1,4,3,5,1)
  This is sum of grease and mobil oil used for lubircating machines
- fibre, silk, short: 1 kg; lognormal variance with pedigree 0.0072, pedigree (2,4,3,5,1)
  properties: carbon content, non-fossil 0.3769, dry mass 0.97 kg, heating value, net 11 MJ, water content 0.0309278, wet mass 1 kg
  note on carbon content, non-fossil: "Carbon content on a dry mass basis. All carbon is assumed to be biogenic due to the nature of the product. Carbon content of cotton is 0.44 kg of non-fossil carbon per kg of dry mass of cotton. Value is calculated based on the the composition of silk which is 64% cellulose. The data uses composition of silk fibers accessed on 10/11/2017 on: http://textilefashionstudy.com/chemical-composition-of-silk-fiber-silk-natural-fiber/ "
- lubricating oil: 1.74e-5, 8.26e-5 kg (2 suppliers, which the file names only by identifier); sum of these 0.0001 kg; lognormal variance with pedigree 0.0066, pedigree (1,4,3,5,1)
  This is sum of grease and mobil oil used for lubircating machines
  properties: carbon content, fossil 0.75, dry mass 1 kg, heating value, net 40.2 MJ, wet mass 1 kg
  note on carbon content, fossil: Lubricating oil is produced from diesel. C-content/dry mass of fats and oils considered 75%, from: ecoinvent v2.2 report, n 15a, pg 40
  note on heating value, net: Literature value, Source: IPCC 2006, 2006 IPCC Guidelines for National Greenhouse Gas Inventories, Prepared by the National Greenhouse Gas Inventories Programme, Eggleston H.S., Buendia L., Miwa K., Ngara T. and Tanabe K. (eds). Published: IGES, Japan
- waste mineral oil: -6.79531e-7, -7.18713e-5, -2.74491e-5 kg (3 suppliers, which the file names only by identifier); sum of these -0.0001 kg; lognormal variance with pedigree 0.0046, pedigree (1,4,1,5,1)
  This is produced dues to the use of lubricating oil necessary for the operation of machinery.
  production volume; = rppv*bp1
    Calculated from production volume of reference product using the relative outputs.
  properties: carbon content, fossil 0.864444, dry mass 0.9 kg, heating value, net 34.7 MJ, water content 0.111111, wet mass 1 kg
  note on carbon content, fossil: Tab A.6, ecoinvent v2.2 report 13_I. C content has been calculated after data in the tables, and then referred to 1 kg DM
  note on heating value, net: Value taken from the general comment of the treatment dataset.
- wastewater, average: -6.51434e-5, -0.0108402, -0.0025921, -3.85951e-5 m3 (4 suppliers, which the file names only by identifier); sum of these -0.013536 m3; = Water*.8; lognormal variance with pedigree 0.0126, pedigree (4,4,1,5,1)
  considering 80% default wastewater generation
  production volume; = rppv*bp2
    Calculated from production volume of reference product using the relative outputs.
  properties: carbon content, non-fossil 0.194039, dry mass 0.346837 kg, water content 2882.2, wet mass 1000 kg
  note on carbon content, non-fossil: 0.0673 kg TOC/m3 (Tab A.17, ecoinvent v2.2 report 13_I). TOC was considered as Total Carbon.

## Inputs from nature
- Water, well, in ground [natural resource, in water]: 0.01692 m3; name Water; lognormal variance with pedigree 0.0146, pedigree (4,4,3,5,1)
  water is used for humidification

## Emissions to nature
- Water [air, urban air close to ground]: 0.003384 m3; = Water*.20; lognormal variance with pedigree 0.0146, pedigree (4,4,3,5,1)
  Considering default value of 20% evaporation rate

## Sampling procedure
Extrapolated from IN data, uncertainty adjusted accordingly
