# navy bean production

Dataset: EcoSpold 2, unit process
Geography: CA-ON
Time period: 2020-01-01 to 2023-12-31
Technology level: current
Classification: ISIC rev.4 ecoinvent: 0111:Growing of cereals (except rice), leguminous crops and oil seeds
Scenario: Business-as-Usual
System model: Allocation, cut-off by classification
Generated by: Nicole Bamber
Published in: Food Systems PRISM Lab 2020
Database: ecoinvent
isCopyrightProtected: true
accessRestrictedTo: 1

## General comment
This dataset represents the production of 1 tonne of dried navy bean (<15% moisture) during May-September, 2020, at 2206.08 ha navy bean farms located in the Province of Ontario, Canada. Yield values were averaged over 2018-2020, and farms have an average yield of 2739.36 kg grain (<15% moisture) per ha for these crop cycles. The system boundaries include the production of all crop inputs (e.g. seeds, fertilizers, crop protection products, and fuel) and consider nitrogen credits derived from biological N fixation associated with dried navy bean production. Irrigation is not included, since it is not performed in this region. The sowing date for the crop is May 2020 and the harvesting date is September 2020. The seeding rate is 22.34 kg/tonne of navy bean production. Fertilizer applied contain nitrogen (as N) 24.42 kg/tonne, phosphate (as P2O5) 7.66 kg/tonne, potash (as K2O) 18.64 kg/tonne, and sulfur (as S) 1.44 kg/tonne. Predominant crop protection applied contain active ingredients of glyphosate 0.078 kg/tonne, bentazon 0.11 kg/tonne, and prothioconazole 0.047 kg/tonne. Machinery is used for tillage, fertilizer application, pre-plant herbicide application, planting, rolling, post-emergent herbicide application, inter-row cultivating/scuffing/hilling, fungicide application, pre-harvest desiccation, pull/undercut/knife, windrow/swathing, harvesting, and other with total fuel consumption of 13.85 kg/tonne.

## Included activities start
Starting inputs for this activity include seed, fertilizer, crop protection products and fuel on the farm. This activity begins with soil preparation about 39 weeks after the harvest of the previous crop. The soil is prepared for cultivation in last week of May and the sowing of seeds started about 5 days after soil preparation.

## Included activities end
This activity ends with navy bean drying to <15% moisture at farm gate. This takes place in September, 17 weeks after the activity starts. The activity includes the infrastructures and use of agricultural machinery.

## Allocation
Physical (mass) allocation; N credits from biological N fixation are included as a system expansion, consistent with the ISO 14044 multifunctionality hierarchy. A negative input was included of ammonia N fertilizer to represent amount of N fixed.

## Geography
Refers to weighted-average production in the Province of Ontario, Canada

## Technology
Production of navy bean includes farm practices from tillage, fertilizer application, pre-plant herbicide application, planting, rolling, post-emergent herbicide application, inter-row cultivating/scuffing/hilling, fungicide application, pre-harvest desiccation, pull/undercut/knife, windrow/swathing, harvesting, and other field activities, to aeration and drying.

## Time period
Soil cultivating date for the main crop: May 2020; Harvesting date for the main crop: September 2020. Total time from the date of sowing to the date of harvesting comes to 17 weeks. Yield data were collected and averaged for three crop cycles (2018-2020). All other data were collected for 2020 only.

## Parameters
- LUC_crop_specific: 1 dimensionless
- yield kgha: 2739.36 kg/ha; name yield_kg_ha

## Reference product
- navy bean: 1 kg; By-product classification allocatable product; CPC 01243: Broad beans and horse beans, green; HS2017 070890: Vegetables, leguminous; (other than peas and beans), shelled or unshelled, fresh or chilled
  production volume 6.04324e6 kg
    Production volume for navy bean is provided in kg. Data is for the year 2018-2020.
  property price 1.28622 EUR2005
    Calculated value based on data from United Nations Commodity Trade Statistics Database (comtrade.un.org). UN comtrade category: 071333 Vegetables, leguminous; kidney beans, including white pea beans(phaseolus vulgaris), shelled, whether or not skinned or split, dried. A total of 93 countries are considered in the average The price was converted to EUR based on the annual exchange rates published by the European Central Bank (https://sdw.ecb.europa.eu/quickview.do?SERIES_KEY=120.EXR.A.USD.EUR.SP00.A, last accessed on 2022-02-15) and adjusted for inflation relative to 2005 using the producer price index (PPI) of the euro area, published by eurostat (https://appsso.eurostat.ec.europa.eu/nui/show.do?dataset=sts_inpp_a&lang=en, last accessed on 2022-05-04).
  properties: carbon allocation 0.3705 kg, carbon content 0.475, carbon content, fossil 0, carbon content, non-fossil 0.475, dry mass 0.78 kg, water content 0.282051, water in wet mass 0.22 kg, wet mass 1 kg

## Inputs from technosphere
- ammonium nitrate: 0.0006 kg; lognormal variance with pedigree 0.002, pedigree (2,3,2,1,1)
  geometric standard deviation: 2.06
  properties: dry mass 1 kg, wet mass 1 kg
- ammonium sulfate: 0.0035 kg; lognormal variance with pedigree 0.002, pedigree (2,3,2,1,1)
  geometric standard deviation: 1.61
  properties: dry mass 1 kg, wet mass 1 kg
- application of plant protection product, by field sprayer: 0.00012 ha; lognormal variance with pedigree 0.0014, pedigree (1,3,2,1,1)
  Activity link to local supply of agricultural services. Geometric standard deviation: 1.63
- combine harvesting: 0.00156 ha; lognormal variance with pedigree 0.0014, pedigree (1,3,2,1,1)
  Activity link to local supply of agricultural services. Geometric standard deviation: 1.05
- fertilising, by broadcaster: 0.0001 ha; lognormal variance with pedigree 0.0014, pedigree (1,3,2,1,1)
  Activity link to local supply of agricultural services. Geometric standard deviation: 1.74
- glyphosate: 7.83e-5 kg; lognormal variance with pedigree 0.0014, pedigree (1,3,2,1,1)
  geometric standard deviation: 1.61
  properties: carbon content, fossil 0.214286, dry mass 1 kg, wet mass 1 kg
- land use change, annual crop: 0.000312482 ha; = (0.8560*LUC_crop_specific+0.0000*(1-LUC_crop_specific))/yield_kg_ha; lognormal variance with pedigree 0.0088, pedigree (1,3,2,1,1)
  Calculated value. Land use change (LUC) combines land transformation areas calculated with the adapted 'Direct Land Use Change Assessment Tool' version 2014 developed by Blonk Consultants and the carbon losses from soil organic carbon (SOC) and vegetation (VEG) as calculated in ecoinvent v3. See 'WFLDB-Guidelines.pdf', available at <https://ecoquery.ecoinvent.org/File/Reports>.
- monoammonium phosphate: 0.0681 kg; lognormal variance with pedigree 0.002, pedigree (2,3,2,1,1)
  geometric standard deviation: 1.33
  properties: dry mass 1 kg, nitrogen content 0.084, phosphorus content 0.226939, wet mass 1 kg
  note on nitrogen content: Nitrogen content (on a dry matter basis) of monoammonium phosphate is calculated from the molecular formula of the nutrient present in the substance.
  note on phosphorus content: Phosphorus content (on a dry matter basis) of monoammonium phosphate is calculated from the molecular formula of the nutrient present in the substance.
- navy bean seed, for sowing: 0.0223 kg; lognormal variance with pedigree 0.002, pedigree (2,3,2,1,1)
  geometric standard deviation: 1.18
  properties: carbon content, non-fossil 0.475, dry mass 0.78 kg, water content 0.282051, wet mass 1 kg
- pesticide, unspecified: 0.000951 kg; lognormal variance with pedigree 0.002, pedigree (1,3,2,1,2)
  geometric standard deviation: 1.05
  properties: carbon content, fossil 0.486978, dry mass 1 kg, wet mass 1 kg
- potassium chloride: 0.0025 kg; lognormal variance with pedigree 0.002, pedigree (2,3,2,1,1)
  geometric standard deviation: 1.38
  properties: dry mass 1 kg, wet mass 1 kg
- sowing: 0.00048 ha; lognormal variance with pedigree 0.0014, pedigree (1,3,2,1,1)
  Activity link to local supply of agricultural services. Geometric standard deviation: 1.59
- sulfur: 0.0001 kg; lognormal variance with pedigree 0.002, pedigree (2,3,2,1,1)
  geometric standard deviation: 1.05
  properties: dry mass 1 kg, wet mass 1 kg
- tillage, cultivating, chiselling: 0.00419 ha; lognormal variance with pedigree 0.0034, pedigree (1,3,2,5,1)
  Activity link to local supply of agricultural services.
- tillage, harrowing, by offset disc harrow: 0.00039 ha; lognormal variance with pedigree 0.0034, pedigree (1,3,2,5,1)
  Activity link to local supply of agricultural services.
- tillage, ploughing: 4e-5 ha; lognormal variance with pedigree 0.0021, pedigree (2,2,2,1,2)
  Activity link to local supply of agricultural services.
- tillage, rolling: 0.00028 ha; lognormal variance with pedigree 0.0014, pedigree (1,3,2,1,1)
  Activity link to local supply of agricultural services. Geometric standard deviation: 1.8
- urea: 0.0112 kg; lognormal variance with pedigree 0.002, pedigree (2,3,2,1,1)
  geometric standard deviation: 1.49
  properties: carbon content, fossil 0.2, dry mass 1 kg, wet mass 1 kg
- urea ammonium nitrate mix: 0.0449 kg; lognormal variance with pedigree 0.002, pedigree (2,3,2,1,1)
  geometric standard deviation: 1.05
  properties: carbon content, fossil 0.0879977, dry mass 0.75 kg, hydrogen content 0.095042, nitrogen content 0.401231, oxygen content 0.749063, water content 0.333333, wet mass 1 kg
  note on carbon content, fossil: Carbon content, fossil is calculated based on the chemical formula of the substance.
  note on hydrogen content: Hydrogen content (on a dry matter basis) of urea ammonium nitrate mix is calculated from the molecular formula of the substance (CH6N4O4).
  note on nitrogen content: Nitrogen content (on a dry matter basis) of urea ammonium nitrate mix is calculated from the molecular formula of the substance (CH6N4O4).
  note on oxygen content: Oxygen content (on a dry matter basis) of urea ammonium nitrate mix is calculated from the molecular formula of the substance (CH6N4O4).

## Inputs from nature
- Occupation, annual crop, non-irrigated [natural resource, land]: 3.65 m2*year; lognormal variance with pedigree 0.0028, pedigree (1,3,2,1,1)
  geometric standard deviation: 1.1
- Transformation, from unspecified [natural resource, land]: 3.65 m2; lognormal variance with pedigree 0.0088, pedigree (1,3,2,1,1)
  geometric standard deviation: 1.1
- Transformation, to annual crop, non-irrigated [natural resource, land]: 3.65 m2; lognormal variance with pedigree 0.0088, pedigree (1,3,2,1,1)
  geometric standard deviation: 1.1

## Emissions to nature
- Ammonia [air, non-urban air or from high stacks]: 0.0023012 kg; lognormal variance with pedigree 0.0108, pedigree (3,3,2,1,1)
  geometric standard deviation: 1.2
- Azoxystrobin [air, non-urban air or from high stacks]: 1.8e-6 kg; lognormal variance with pedigree 0.0408, pedigree (1,3,2,1,1)
  geometric standard deviation: 1.5
- Bentazone [air, non-urban air or from high stacks]: 1.1e-5 kg; lognormal variance with pedigree 0.0408, pedigree (1,3,2,1,1)
  geometric standard deviation: 1.5
- Carbon dioxide, fossil [air, non-urban air or from high stacks]: 0.0253807 kg; lognormal variance with pedigree 0.0014, pedigree (1,3,2,1,1)
  geometric standard deviation: 1.05
- Chlorantraniliprole [air, non-urban air or from high stacks]: 9e-8 kg; lognormal variance with pedigree 0.0408, pedigree (1,3,2,1,1)
  geometric standard deviation: 1.5
- Clethodim [air, non-urban air or from high stacks]: 2e-8 kg; lognormal variance with pedigree 0.0408, pedigree (1,3,2,1,1)
  geometric standard deviation: 1.5
- Dimethenamid-P [air, unspecified]: 2.7e-6 kg; lognormal variance with pedigree 0.0408, pedigree (1,3,2,1,1)
  geometric standard deviation: 1.5
- Dimethoate [air, non-urban air or from high stacks]: 7e-7 kg; lognormal variance with pedigree 0.0408, pedigree (1,3,2,1,1)
  geometric standard deviation: 1.5
- Dinitrogen monoxide [air, non-urban air or from high stacks]: 0.0007901 kg; lognormal variance with pedigree 0.0328, pedigree (3,3,2,1,1)
  geometric standard deviation: 1.4
- Diquat dibromide [air, non-urban air or from high stacks]: 2e-7 kg; lognormal variance with pedigree 0.0408, pedigree (1,3,2,1,1)
  geometric standard deviation: 1.5
- Fluazinam [air, unspecified]: 5.4e-6 kg; lognormal variance with pedigree 0.0408, pedigree (1,3,2,1,1)
  geometric standard deviation: 1.5
- Fluopyram [air, unspecified]: 1.2e-6 kg; lognormal variance with pedigree 0.0408, pedigree (1,3,2,1,1)
  geometric standard deviation: 1.5
- Fluxapyroxad [air, non-urban air or from high stacks]: 4e-7 kg; lognormal variance with pedigree 0.0408, pedigree (1,3,2,1,1)
  geometric standard deviation: 1.5
- Fomesafen [air, non-urban air or from high stacks]: 7e-6 kg; lognormal variance with pedigree 0.0408, pedigree (1,3,2,1,1)
  geometric standard deviation: 1.5
- Glyphosate [air, non-urban air or from high stacks]: 7.8e-6 kg; lognormal variance with pedigree 0.0408, pedigree (1,3,2,1,1)
  geometric standard deviation: 1.5
- Halosulfuron [air, unspecified]: 6e-7 kg; lognormal variance with pedigree 0.0408, pedigree (1,3,2,1,1)
  geometric standard deviation: 1.5
- Hydrocarbons, unspecified [air, non-urban air or from high stacks]: 3e-9 kg; lognormal variance with pedigree 0.08776, pedigree (2,3,2,1,1)
- Imazethapyr [air, non-urban air or from high stacks]: 7e-7 kg; lognormal variance with pedigree 0.0408, pedigree (1,3,2,1,1)
  geometric standard deviation: 1.5
- Lambda-cyhalothrin [air, non-urban air or from high stacks]: 3e-8 kg; lognormal variance with pedigree 0.0408, pedigree (1,3,2,1,1)
  geometric standard deviation: 1.5
- Metconazole [air, unspecified]: 3e-9 kg; lognormal variance with pedigree 0.0408, pedigree (1,3,2,1,1)
  geometric standard deviation: 1.5
- Nitrogen oxides [air, non-urban air or from high stacks]: 0.0004528 kg; lognormal variance with pedigree 0.0328, pedigree (3,3,2,1,1)
  geometric standard deviation: 1.4
- Pendimethalin [air, non-urban air or from high stacks]: 1.18e-5 kg; lognormal variance with pedigree 0.0408, pedigree (1,3,2,1,1)
  geometric standard deviation: 1.5
- Prothioconazole [air, non-urban air or from high stacks]: 4.7e-6 kg; lognormal variance with pedigree 0.0408, pedigree (1,3,2,1,1)
  geometric standard deviation: 1.5
- Pyraclostrobin [air, non-urban air or from high stacks]: 1e-8 kg; lognormal variance with pedigree 0.0408, pedigree (1,3,2,1,1)
  geometric standard deviation: 1.5
- Pyraclostrobin [air, unspecified]: 1e-8 kg; lognormal variance with pedigree 0.0408, pedigree (1,3,2,1,1)
  geometric standard deviation: 1.5
- Quizalofop-p-ethyl [air, unspecified]: 7e-7 kg; lognormal variance with pedigree 0.0408, pedigree (1,3,2,1,1)
  geometric standard deviation: 1.5
- S-Metolachlor [air, unspecified]: 2.25e-5 kg; lognormal variance with pedigree 0.0408, pedigree (1,3,2,1,1)
  geometric standard deviation: 1.5
- Saflufenacil [air, non-urban air or from high stacks]: 1.2e-6 kg; lognormal variance with pedigree 0.0408, pedigree (1,3,2,1,1)
  geometric standard deviation: 1.5
- Sethoxydim [air, non-urban air or from high stacks]: 2e-7 kg; lognormal variance with pedigree 0.0408, pedigree (1,3,2,1,1)
  geometric standard deviation: 1.5
- Surfactant blend [air, unspecified]: 8.01e-7 kg; lognormal variance with pedigree 0.0408, pedigree (1,3,2,1,1)
  geometric standard deviation: 1.5
- Trifluralin [air, non-urban air or from high stacks]: 1.83e-5 kg; lognormal variance with pedigree 0.0408, pedigree (1,3,2,1,1)
  geometric standard deviation: 1.5
- Azoxystrobin [soil, agricultural]: 1.41e-5 kg; lognormal variance with pedigree 0.0408, pedigree (1,3,2,1,1)
  geometric standard deviation: 1.2
- Bentazone [soil, agricultural]: 8.44e-5 kg; lognormal variance with pedigree 0.0408, pedigree (1,3,2,1,1)
  geometric standard deviation: 1.2
- Boscalid [soil, agricultural]: 4.6e-5 kg; lognormal variance with pedigree 0.0408, pedigree (1,3,2,1,1)
  geometric standard deviation: 1.2
- Cadmium II [soil, agricultural]: 3.81634e-6 kg; lognormal variance with pedigree 0.08776, pedigree (2,3,2,1,1)
- Chlorantraniliprole [soil, agricultural]: 6.7e-7 kg; lognormal variance with pedigree 0.0408, pedigree (1,3,2,1,1)
  geometric standard deviation: 1.2
- Chromium III [soil, agricultural]: 3.85649e-5 kg; lognormal variance with pedigree 0.08776, pedigree (2,3,2,1,1)
- Clethodim [soil, agricultural]: 1.4e-7 kg; lognormal variance with pedigree 0.0408, pedigree (1,3,2,1,1)
  geometric standard deviation: 1.2
- Copper ion [soil, agricultural]: 2.00654e-6 kg; lognormal variance with pedigree 0.08776, pedigree (2,3,2,1,1)
- Dimethenamid-P [soil, agricultural]: 2.05e-5 kg; lognormal variance with pedigree 0.0408, pedigree (1,3,2,1,1)
  geometric standard deviation: 1.2
- Dimethoate [soil, agricultural]: 5.6e-6 kg; lognormal variance with pedigree 0.0408, pedigree (1,3,2,1,1)
  geometric standard deviation: 1.2
- Diquat dibromide [soil, agricultural]: 1.6e-6 kg; lognormal variance with pedigree 0.0408, pedigree (1,3,2,1,1)
  geometric standard deviation: 1.2
- Fluazinam [soil, agricultural]: 4.16e-5 kg; lognormal variance with pedigree 0.0408, pedigree (1,3,2,1,1)
  geometric standard deviation: 1.2
- Fluopyram [soil, agricultural]: 9.4e-6 kg; lognormal variance with pedigree 0.0408, pedigree (1,3,2,1,1)
  geometric standard deviation: 1.2
- Fluxapyroxad [soil, agricultural]: 3.1e-6 kg; lognormal variance with pedigree 0.0408, pedigree (1,3,2,1,1)
  geometric standard deviation: 1.2
- Fomesafen [soil, agricultural]: 5.36e-5 kg; lognormal variance with pedigree 0.0408, pedigree (1,3,2,1,1)
  geometric standard deviation: 1.2
- Glyphosate [soil, agricultural]: 5.99e-5 kg; lognormal variance with pedigree 0.0408, pedigree (1,3,2,1,1)
  geometric standard deviation: 1.2
- Halosulfuron-methyl [soil, agricultural]: 4.5e-6 kg; lognormal variance with pedigree 0.0408, pedigree (1,3,2,1,1)
  geometric standard deviation: 1.2
- Hydrocarbons, unspecified [soil, agricultural]: 2.9e-8 kg; lognormal variance with pedigree 0.08776, pedigree (2,3,2,1,1)
- Imazethapyr [soil, agricultural]: 5.3e-6 kg; lognormal variance with pedigree 0.0408, pedigree (1,3,2,1,1)
  geometric standard deviation: 1.5
- Lambda-cyhalothrin [soil, agricultural]: 2.4e-7 kg; lognormal variance with pedigree 0.0408, pedigree (1,3,2,1,1)
  geometric standard deviation: 1.2
- Lead II [soil, agricultural]: 9.44908e-7 kg; lognormal variance with pedigree 0.08776, pedigree (2,3,2,1,1)
- Mercury II [soil, agricultural]: -2.76164e-9 kg
- Metconazole [soil, agricultural]: 2.6e-8 kg; lognormal variance with pedigree 0.0408, pedigree (1,3,2,1,1)
  geometric standard deviation: 1.2
- Nickel II [soil, agricultural]: 5.79033e-6 kg; lognormal variance with pedigree 0.08776, pedigree (2,3,2,1,1)
- Nitrate [soil, unspecified]: 0.0428746 kg; lognormal variance with pedigree 0.0358, pedigree (3,3,2,1,1)
  geometric standard deviation: 1.5
- Pendimethalin [soil, agricultural]: 9e-5 kg; lognormal variance with pedigree 0.0408, pedigree (1,3,2,1,1)
  geometric standard deviation: 1.2
- Picoxystrobin [soil, agricultural]: 7.5e-6 kg; lognormal variance with pedigree 0.0408, pedigree (1,3,2,1,1)
  geometric standard deviation: 1.2
- Prothioconazole [soil, agricultural]: 3.62e-5 kg; lognormal variance with pedigree 0.0408, pedigree (1,3,2,1,1)
  geometric standard deviation: 1.2
- Pyraclostrobin [soil, agricultural]: 7e-8 kg; lognormal variance with pedigree 0.0408, pedigree (1,3,2,1,1)
  geometric standard deviation: 1.2
- Quizalofop-p-ethyl [soil, agricultural]: 5.4e-6 kg; lognormal variance with pedigree 0.0408, pedigree (1,3,2,1,1)
  geometric standard deviation: 1.2
- S-Metolachlor [soil, agricultural]: 0.000172 kg; lognormal variance with pedigree 0.0408, pedigree (1,3,2,1,1)
  geometric standard deviation: 1.2
- Saflufenacil [soil, agricultural]: 9e-6 kg; lognormal variance with pedigree 0.0408, pedigree (1,3,2,1,1)
  geometric standard deviation: 1.2
- Sethoxydim [soil, agricultural]: 1.2e-6 kg; lognormal variance with pedigree 0.0408, pedigree (1,3,2,1,1)
  geometric standard deviation: 1.2
- Surfactant blend [soil, agricultural]: 6.21e-6 kg; lognormal variance with pedigree 0.0408, pedigree (1,3,2,1,1)
  geometric standard deviation: 1.2
- Trifluralin [soil, agricultural]: 0.0001401 kg; lognormal variance with pedigree 0.0408, pedigree (1,3,2,1,1)
  geometric standard deviation: 1.2
- Zinc II [soil, agricultural]: 5.18314e-6 kg; lognormal variance with pedigree 0.08776, pedigree (2,3,2,1,1)
- Azoxystrobin [water, ground-]: 1.6e-6 kg; lognormal variance with pedigree 0.0408, pedigree (1,3,2,1,1)
  geometric standard deviation: 1.5
- Bentazone [water, ground-]: 9.4e-6 kg; lognormal variance with pedigree 0.0408, pedigree (1,3,2,1,1)
  geometric standard deviation: 1.5
- Cadmium II [water, ground-]: 1.71982e-8 kg; lognormal variance with pedigree 0.08776, pedigree (2,3,2,1,1)
- Cadmium II [water, surface water]: 1.08882e-9 kg; lognormal variance with pedigree 0.08776, pedigree (2,3,2,1,1)
- Chlorantraniliprole [water, ground-]: 7e-8 kg; lognormal variance with pedigree 0.0408, pedigree (1,3,2,1,1)
  geometric standard deviation: 1.5
- Chromium III [water, ground-]: 7.53003e-6 kg; lognormal variance with pedigree 0.08776, pedigree (2,3,2,1,1)
- Chromium III [water, surface water]: 1.12904e-7 kg; lognormal variance with pedigree 0.08776, pedigree (2,3,2,1,1)
- Clethodim [water, ground-]: 2e-8 kg; lognormal variance with pedigree 0.0408, pedigree (1,3,2,1,1)
  geometric standard deviation: 1.5
- Copper ion [water, ground-]: 1.21031e-6 kg; lognormal variance with pedigree 0.08776, pedigree (2,3,2,1,1)
- Copper ion [water, surface water]: 8.91298e-8 kg; lognormal variance with pedigree 0.08776, pedigree (2,3,2,1,1)
- Dimethenamid-P [water, surface water]: 2.3e-6 kg; lognormal variance with pedigree 0.0408, pedigree (1,3,2,1,1)
  geometric standard deviation: 1.5
- Dimethoate [water, ground-]: 6e-7 kg; lognormal variance with pedigree 0.0408, pedigree (1,3,2,1,1)
  geometric standard deviation: 1.5
- Diquat dibromide [water, ground-]: 2e-7 kg; lognormal variance with pedigree 0.0408, pedigree (1,3,2,1,1)
  geometric standard deviation: 1.5
- Fluazinam [water, surface water]: 4.6e-6 kg; lognormal variance with pedigree 0.0408, pedigree (1,3,2,1,1)
  geometric standard deviation: 1.5
- Fluopyram [water, surface water]: 1e-6 kg; lognormal variance with pedigree 0.0408, pedigree (1,3,2,1,1)
  geometric standard deviation: 1.5
- Fluxapyroxad [water, ground-]: 3e-7 kg; lognormal variance with pedigree 0.0408, pedigree (1,3,2,1,1)
  geometric standard deviation: 1.5
- Fomesafen [water, surface water]: 6e-6 kg; lognormal variance with pedigree 0.0408, pedigree (1,3,2,1,1)
  geometric standard deviation: 1.5
- Glyphosate [water, ground-]: 6.7e-6 kg; lognormal variance with pedigree 0.0408, pedigree (1,3,2,1,1)
  geometric standard deviation: 1.5
- Halosulfuron [water, surface water]: 5e-7 kg; lognormal variance with pedigree 0.0408, pedigree (1,3,2,1,1)
  geometric standard deviation: 1.5
- Hydrocarbons, unspecified [water, ground-]: 3e-9 kg; lognormal variance with pedigree 0.08776, pedigree (2,3,2,1,1)
- Imazethapyr [water, ground-]: 6e-7 kg; lognormal variance with pedigree 0.0408, pedigree (1,3,2,1,1)
  geometric standard deviation: 1.5
- Lambda-cyhalothrin [water, ground-]: 3e-8 kg; lognormal variance with pedigree 0.0408, pedigree (1,3,2,1,1)
  geometric standard deviation: 1.5
- Lead II [water, ground-]: 8.26376e-8 kg; lognormal variance with pedigree 0.08776, pedigree (2,3,2,1,1)
- Lead II [water, surface water]: 3.54235e-8 kg; lognormal variance with pedigree 0.08916, pedigree (2,1,2,5,1)
- Mercury II [water, ground-]: 3.44615e-10 kg; lognormal variance with pedigree 0.08776, pedigree (2,3,2,1,1)
- Mercury II [water, surface water]: 2.55237e-10 kg; lognormal variance with pedigree 0.08776, pedigree (2,3,2,1,1)
- Metconazole [water, surface water]: 3e-9 kg; lognormal variance with pedigree 0.0408, pedigree (1,3,2,1,1)
  geometric standard deviation: 1.5
- Nickel II [water, surface water]: 8.95737e-8 kg; lognormal variance with pedigree 0.08776, pedigree (2,3,2,1,1)
- Pendimethalin [water, ground-]: 1e-5 kg; lognormal variance with pedigree 0.0408, pedigree (1,3,2,1,1)
  geometric standard deviation: 1.5
- Phosphate [water, ground-]: 2.56e-5 kg; lognormal variance with pedigree 0.0358, pedigree (3,3,2,1,1)
  geometric standard deviation: 1.5
- Phosphate [water, surface water]: 6.94e-5 kg; lognormal variance with pedigree 0.0358, pedigree (3,3,2,1,1)
  geometric standard deviation: 1.5
- Prothioconazole [water, ground-]: 4e-6 kg; lognormal variance with pedigree 0.0408, pedigree (1,3,2,1,1)
  geometric standard deviation: 1.5
- Pyraclostrobin [water, ground-]: 1e-8 kg; lognormal variance with pedigree 0.0408, pedigree (1,3,2,1,1)
  geometric standard deviation: 1.5
- Quizalofop-p-ethyl [water, surface water]: 6e-7 kg; lognormal variance with pedigree 0.0408, pedigree (1,3,2,1,1)
  geometric standard deviation: 1.5
- S-Metolachlor [water, surface water]: 1.91e-5 kg; lognormal variance with pedigree 0.0408, pedigree (1,3,2,1,1)
  geometric standard deviation: 1.5
- Saflufenacil [water, ground-]: 1e-6 kg; lognormal variance with pedigree 0.0408, pedigree (1,3,2,1,1)
  geometric standard deviation: 1.5
- Sethoxydim [water, ground-]: 1e-7 kg; lognormal variance with pedigree 0.0408, pedigree (1,3,2,1,1)
  geometric standard deviation: 1.5
- Surfactant blend [water, surface water]: 7.01e-7 kg; lognormal variance with pedigree 0.0408, pedigree (1,3,2,1,1)
  geometric standard deviation: 1.5
- Trifluralin [water, ground-]: 1.56e-5 kg; lognormal variance with pedigree 0.0408, pedigree (1,3,2,1,1)
  geometric standard deviation: 1.5
- Zinc II [water, ground-]: 7.97434e-6 kg; lognormal variance with pedigree 0.08776, pedigree (2,3,2,1,1)
- Zinc II [water, surface water]: 1.58086e-7 kg; lognormal variance with pedigree 0.08776, pedigree (2,3,2,1,1)

## Sampling procedure
Site-specific field data were collected via survey from prairie province navy bean producers for crop rotation, seeding rate, machinery and fuel use for field operations (e.g., tillage, harrowing, harvest), farm inputs (e.g., fertilizers, pesticides), and electricity for crop drying. Production weighted averages were calculated for the region. Outliers were removed from reported fuel use data based on visual inspection.

## Extrapolations
Geographical location of each farm was used to identify the Reconciliation Units (soil and climate based provincial divisions) identified by Agriculture and Agri-Food Canada (AAFC) and AAFC Reporting Zone (ecozone) to which each farm belongs. Production-weighted average datasets were calculated for each ecozone.
