# electricity production, deep geothermal

Dataset: EcoSpold 2, unit process
Geography: RU
Time period: 2015-01-01 to 2023-12-31
Technology level: modern
Classification: ISIC rev.4 ecoinvent: 3510:Electric power generation, transmission and distribution
Tags: geothermal power
Scenario: Business-as-Usual
System model: Allocation, cut-off by classification
Generated by: Karin Treyer
Published in: S Hirchberg, S Wiemer, P Burgherr 2015
Database: ecoinvent
isCopyrightProtected: true
accessRestrictedTo: 1

## General comment
This data set is based on a data set comprised in the book 'Energy from the earth'. (see field 'published source' for more details). The inventory reflects the conditions for amounts with the reference flow of “1 kWh electricity, high voltage”. This inventory includes the following elements:
• Yearly losses of the working fluid of 8% are taken into account
• “Amount” of geothermal plant needed per 1 kWh calculated from the cumulative lifetime electricity production
The inventory does not consider the possibility of leakage of geofluid to an aquifer layer. This is not considered to be normal operation (see published source, WP5 “Risks”, Section 6.1.2.6 “Geofluids”). The inventory reflects Swiss conditions, used as first approximation. Uncertainties adjusted accordingly.

## Included activities start
This dataset starts from commissioned geothermal power plants ready to generate electricity.

## Included activities end
This activity ends with the high voltage electricity produced at the power plant.

## Geography
Represents installation of a deep geothermal power plant in Russia and is based on plant data from Switzerland. Uncertainties adjusted accordingly.

## Time period
The Annual Production Volume is valid for the year 2012.

## Reference product
- electricity, high voltage: 1 kWh; source S Hirchberg, S Wiemer, P Burgherr 2015; By-product classification allocatable product; CPC 17100: Electrical energy; HS2017 271600: Electrical energy
  production volume 3.65476e8 kWh
    Literature value. Net electricity production 2012 according to the IEA electricity information 2014.
  property price 0.0977 EUR2005
    Temporary price data. Calculated as 90% of purchasers price based on: 94% of the average price (to account for a 6% loss in transformation and transmission) for electricity for industrial consumersin 2005 (excluded taxes). From IEA.
  properties: carbon allocation 0 kg, carbon content 0

## Inputs from technosphere
- benzene: 3.61314e-7, 2.68869e-6 kg (2 suppliers, which the file names only by identifier); sum of these 3.05e-6 kg; source S Hirchberg, S Wiemer, P Burgherr 2015; lognormal variance with pedigree 0.1433, pedigree (2,2,5,5,2)
  Yearly loss of 8% of refrigerant
  properties: carbon content, fossil 0.923077, dry mass 1 kg, heating value, net 42.5 MJ, wet mass 1 kg
- geothermal power plant, 5.5MWel: 5.77701e-10 unit; = 1/(5.77E7*30); source S Hirchberg, S Wiemer, P Burgherr 2015; lognormal variance with pedigree 0.1433, pedigree (2,2,5,5,2)
  = 1 / (annual electricity production * lifetime)

## Inputs from nature
- Energy, geothermal, converted [natural resource, in ground]: 25.7143 MJ; = 3.6/0.14; source S Hirchberg, S Wiemer, P Burgherr 2015; lognormal variance with pedigree 0.2106, pedigree (5,5,5,5,5)
  The gross thermal efficiency of the power plant is modelled to be 0.14.

## Emissions to nature
- Benzene [air, unspecified]: 3.05e-6 kg; source S Hirchberg, S Wiemer, P Burgherr 2015; lognormal variance with pedigree 0.1433, pedigree (2,2,5,5,2)
  Yearly loss of 8% of refrigerant

## Sampling procedure
Literature

## Extrapolations
Extrapolated from CH conditions.

## Review by Carl Vadenbo 2015-07-06
The update of the whole electricity sector for the ecoinvent v3.2 database consist of hundreds of datasets. All these datasets have passed through a streamlined review processes where the underlying modelling of production volumes, technology shares and efficiencies was reviewed in detail prior to the datasets being submitted to the database.
