# sodium hypochlorite to generic market for bleach

Dataset: EcoSpold 2, unit process
Geography: RER
Time period: 2023-01-01 to 2023-12-31
Technology level: current
Classification: EcoSpold01Categories: chemicals/inorganics
Classification: ISIC rev.4 ecoinvent: 2011:Manufacture of basic chemicals
Scenario: Business-as-Usual
System model: Allocation, cut-off by classification
Generated by: Daria Dellenbach
Database: ecoinvent
isCopyrightProtected: true
accessRestrictedTo: 1

## General comment
This activity links the output of the market for sodium hypochlorite to the generic market for bleach.

## Included activities start
Activity starting with the input of sodium hypochlorite.

## Included activities end
The activity ends with the production sodium hypochlorite for the generic market for bleaches.

## Geography
based on geographical validity of datasets producing sodium hypochlorite in chlor-alkali electrolysis.

## Technology
based on techmology validity of datasets producing sodium hypochlorite in chlor-alkali electrolysis.

## Time period
based on temporal validity of datasets producing sodium hypochlorite in chlor-alkali electrolysis.

## Reference product
- bleach: 1 kg; By-product classification allocatable product; CPC 971: Washing, cleaning and dyeing services; HS2017 282810: Hypochlorites; commercial calcium hypochlorite and other calcium hypochlorites
  production volume 1.29173e7 kg; = 258346904.799645*0.05
    Production volume based on the production volume of the producing activity. It is assumed that 5% of sodium hypochlorite is used as bleach.
  property carbon content, fossil 0.030067
    fossil carbon content on a dry matter basis, arithmetic average based on inputs.
  property price 0.576733 EUR2005
    This price was calculated as an arithmetic average of input prices.
  properties: carbon allocation 0.030067 kg, carbon content 0.030067, carbon content, non-fossil 0, dry mass 1 kg, water content 0, water in wet mass 0 kg, wet mass 1 kg

## Inputs from technosphere
- sodium hypochlorite, without water, in 15% solution state: 1 kg
  properties: dry mass 1 kg, wet mass 1 kg
