# treatment of waste wood, untreated, open dump, wet infiltration class (500mm)

Dataset: EcoSpold 2, unit process
Geography: GLO
Time period: 2006-01-01 to 2023-12-31
Technology level: current
Classification: ISIC rev.4 ecoinvent: 3821:Treatment and disposal of non-hazardous waste
Scenario: Business-as-Usual
System model: Allocation, cut-off by classification
Generated by: Nikolia Stoikou
Database: ecoinvent
isCopyrightProtected: true
accessRestrictedTo: 1

## General comment
This dataset represents the activity of waste disposal of 'waste wood, untreated' in an open dump. Recommended use of this dataset: uncontrolled disposal of the waste through dumping. Inventoried waste consists of fraction: 100% natural wood. Waste composition (wet, in ppmw): gross heating value 15.36 MJ/kg; net heating value 13.99 MJ/kg; H2O 174080; O 372180; H 50163; C 401470; S 125.51; N 986.98; P 108.97; B 2.1107; Cl 330.95; Br na; F 21.106; I na; Ag na; As 0.42213; Ba na; Cd 0.20051; Co 0.086772; Cr 0.65782; Cu 4.1482; Hg 0.31976; Mn 53.118; Mo 0.8302; Ni 0.55581; Pb 27.868; Sb na; Se na; Sn na; V na; Zn 17.807; Be na; Sc na; Sr na; Ti na; Tl na; W na; Si na; Fe 15.479; Ca 130.89; Al 6.3322; K 65.412; Mg 197.56; Na 14.071. Share of carbon in initial waste that is biogenic 100%. Share of metals in waste not oxidised and bulk-recyclable (exclude very small or thin parts) Iron: 0%; Alu: 0%; Copper: 0%. Overall degradability of waste during 100 years: 1.5%. 0.0001033 kg waste mass remains in the landfill even after the long term period.

## Included activities start
The activity starts with the waste being available at the location (gate) of the uncontrolled disposal. Collection and transportation of the waste to the treatment plant is not included.

## Included activities end
The activity ends with the waste being disposed, in an uncontrolled manner and waste-specific emissions from open dump are released to air via gas and to water via leachate.

## Geography
This dataset represents an open dump location of 'infiltration class 4 wet'. Location site with mean annual temperature (MAT) of 8 degC, mean annual precipitation (MAP) of 1100 mm/year, and net infiltration of 500 mm/year. Temperature at site can result in permafrost conditions, which slows down water flow by a factor of (alpha t) 0.999. Total climate adjustments with alpha pt of 0.999. The leachate percolating through the open dump has an average residence time of 3.5 years.
Reference for climatic parameters: Doka, G., 2018, Inventory parameters for regionalised waste disposal mixes

## Technology
This is an inventory for an open, uncontrolled waste dump for municipal solid waste. Ultimate average height is 7 meters. Operation phase duration is 15 years. The total raw gas mass produced in the open dump from this waste is 0.01199 kg. The total CH4 mass in the raw gas is 0.00584 kg. Percentage of gas directly emitted is 100w%. A Methane Correction Factor (MCF) for air emissions of 0.7057 is employed. Leachate is not treated, but emitted untreated. Based on average waste composition and climate data the end of carbonate phase is estimated to be reached 1632 years after waste deposition.

## Reference product
- waste wood, untreated: -1 kg; By-product classification Waste; CPC 3928: Sawdust and wood waste and scrap; HS2017 440140: Wood; for fuel, sawdust and wood waste and scrap, not agglomerated
  main reference product of this activity
  production volume 1.33e11 kg
    Estimated based on the total amount of this waste being treated in the database. The value is then adjusted to reflect the current treatment in the given geography
  property price 0 EUR2005
    Waste products are assigned a price of zero as they are assumed to require further treatment.
  properties: aluminium content 7.66679e-6, arsenic content 5.11102e-7, boron content 2.5556e-6, cadmium content 2.42774e-7, calcium content 0.000158475, carbon allocation 0.401467 kg, carbon content 0.486084, carbon content, fossil 0, carbon content, non-fossil 0.486084, chlorine content 0.000400704, chromium content 7.9647e-7, cobalt content 1.05061e-7, copper content 5.02245e-6, dry mass 0.825921 kg, fluorine content 2.55551e-5, heating value, gross 15.3646 MJ, heating value, net 13.9884 MJ, hydrogen content 0.0607361, iron content 1.8741e-5, lead content 3.37412e-5, magnesium content 0.000239197, manganese content 6.43142e-5, mercury content 3.87159e-7, molybdenum content 1.00518e-6, nickel content 6.72952e-7, nitrogen content 0.00119501, oxygen content 0.450623, phosphorus content 0.000131933, potassium content 7.91989e-5, sodium content 1.70373e-5, sulfur content 0.000151968, water content 0.210769, water in wet mass 0.174079 kg, wet mass 1 kg, zinc content 2.15601e-5

## Inputs from nature
- Organic carbon, placed in landfill [inventory indicator, waste]: 0.40147 kg; lognormal variance with pedigree 0.031362, pedigree (1,1,4,1,1)
  organic carbon placed in open dump (for ecoscarcity LCIA only);
- Waste mass, total, placed in landfill [inventory indicator, waste]: 1 kg; lognormal variance with pedigree 0.008, pedigree (1,1,4,1,1)
  waste mass placed in open dump (for ecoscarcity LCIA only);
- Occupation, dump site [natural resource, land]: 0.0035714 m2*year; lognormal variance with pedigree 0.32902, pedigree (1,1,4,1,1)
  for operation phase of open dump area;
- Transformation, from pasture, man made [natural resource, land]: 0.00014286 m2; lognormal variance with pedigree 0.32902, pedigree (1,1,4,1,1)
  for initial conversion of open dump;
- Transformation, to dump site [natural resource, land]: 0.00014286 m2; lognormal variance with pedigree 0.32902, pedigree (1,1,4,1,1)
  conversion to open dump area;

## Emissions to nature
- Aluminium III [air, non-urban air or from high stacks]: 1.1856e-12 kg; lognormal variance with pedigree 1.9298, pedigree (1,1,4,1,1)
  landfill gas emission from open dump;
- Arsenic ion [air, non-urban air or from high stacks]: 1.5925e-11 kg; lognormal variance with pedigree 1.9298, pedigree (1,1,4,1,1)
  landfill gas emission from open dump;
- Cadmium II [air, non-urban air or from high stacks]: 3.524e-12 kg; lognormal variance with pedigree 1.9298, pedigree (1,1,4,1,1)
  landfill gas emission from open dump;
- Calcium II [air, non-urban air or from high stacks]: 6.3835e-11 kg; lognormal variance with pedigree 1.9298, pedigree (1,1,4,1,1)
  landfill gas emission from open dump;
- Carbon dioxide, non-fossil [air, non-urban air or from high stacks]: 0.012958 kg; lognormal variance with pedigree 0.35545, pedigree (1,1,4,1,1)
  landfill gas emission from open dump;
- Chromium III [air, non-urban air or from high stacks]: 2.8085e-14 kg; lognormal variance with pedigree 1.9298, pedigree (1,1,4,1,1)
  landfill gas emission from open dump;
- Cobalt II [air, non-urban air or from high stacks]: 1.0446e-13 kg; lognormal variance with pedigree 1.9298, pedigree (1,1,4,1,1)
  landfill gas emission from open dump;
- Copper ion [air, non-urban air or from high stacks]: 8.6952e-14 kg; lognormal variance with pedigree 1.9298, pedigree (1,1,4,1,1)
  landfill gas emission from open dump;
- Hydrochloric acid [air, non-urban air or from high stacks]: 1.7998e-7 kg; lognormal variance with pedigree 1.5469, pedigree (1,1,4,1,1)
  landfill gas emission from open dump;
- Hydrogen fluoride [air, non-urban air or from high stacks]: 1.2605e-7 kg; lognormal variance with pedigree 1.6099, pedigree (1,1,4,1,1)
  landfill gas emission from open dump;
- Iron ion [air, non-urban air or from high stacks]: 7.9632e-13 kg; lognormal variance with pedigree 1.9298, pedigree (1,1,4,1,1)
  landfill gas emission from open dump;
- Lead II [air, non-urban air or from high stacks]: 8.2002e-13 kg; lognormal variance with pedigree 1.9298, pedigree (1,1,4,1,1)
  landfill gas emission from open dump;
- Magnesium [air, non-urban air or from high stacks]: 4.5662e-10 kg; lognormal variance with pedigree 1.9298, pedigree (1,1,4,1,1)
  landfill gas emission from open dump;
- Manganese II [air, non-urban air or from high stacks]: 2.2787e-10 kg; lognormal variance with pedigree 1.9298, pedigree (1,1,4,1,1)
  landfill gas emission from open dump;
- Mercury II [air, non-urban air or from high stacks]: 1.3127e-10 kg; lognormal variance with pedigree 1.9298, pedigree (1,1,4,1,1)
  landfill gas emission from open dump;
- Methane, non-fossil [air, non-urban air or from high stacks]: 0.0030742 kg; lognormal variance with pedigree 0.39598, pedigree (1,1,4,1,1)
  landfill gas emission from open dump;
- Molybdenum VI [air, non-urban air or from high stacks]: 3.2792e-13 kg; lognormal variance with pedigree 1.9298, pedigree (1,1,4,1,1)
  landfill gas emission from open dump;
- Nickel II [air, non-urban air or from high stacks]: 1.2103e-13 kg; lognormal variance with pedigree 1.9298, pedigree (1,1,4,1,1)
  landfill gas emission from open dump;
- Nitrogen oxides [air, non-urban air or from high stacks]: 2.0281e-8 kg; lognormal variance with pedigree 1.2514, pedigree (1,1,4,1,1)
  landfill gas emission from open dump;
- Potassium I [air, non-urban air or from high stacks]: 1.7913e-10 kg; lognormal variance with pedigree 1.9298, pedigree (1,1,4,1,1)
  landfill gas emission from open dump;
- Sodium I [air, non-urban air or from high stacks]: 2.1811e-10 kg; lognormal variance with pedigree 1.9298, pedigree (1,1,4,1,1)
  landfill gas emission from open dump;
- Sulfur dioxide [air, non-urban air or from high stacks]: 2.454e-7 kg; lognormal variance with pedigree 1.5956, pedigree (1,1,4,1,1)
  landfill gas emission from open dump;
- Zinc II [air, non-urban air or from high stacks]: 2.8085e-12 kg; lognormal variance with pedigree 1.9298, pedigree (1,1,4,1,1)
  landfill gas emission from open dump;
- Non-hazardous waste disposed [inventory indicator, waste]: 1 kg; lognormal variance with pedigree 0.008, pedigree (1,1,4,1,1)
  EN15804 waste mass in sanitary landfill;
- Heat, waste [soil, industrial]: 0.18165 MJ; lognormal variance with pedigree 0.21809, pedigree (1,1,4,1,1)
  from decomposed waste material in open dump;
- Aluminium III [water, ground-]: 4.7423e-9 kg; lognormal variance with pedigree 1.9298, pedigree (1,1,4,1,1)
  uncontrolled emissions in open dump in moist climate;
- Aluminium III [water, ground-, long-term]: 6.3274e-6 kg; lognormal variance with pedigree 1.3362, pedigree (1,1,4,1,1)
  emissions to groundwater in open dump;
- Ammonium [water, ground-]: 1.409e-5 kg; lognormal variance with pedigree 0.89021, pedigree (1,1,4,1,1)
  uncontrolled emissions in open dump in moist climate;
- Ammonium [water, ground-, long-term]: 0.00038738 kg; lognormal variance with pedigree 0.66746, pedigree (1,1,4,1,1)
  emissions to groundwater in open dump;
- Arsenic ion [water, ground-]: 1.136e-9 kg; lognormal variance with pedigree 1.9298, pedigree (1,1,4,1,1)
  uncontrolled emissions in open dump in moist climate;
- Arsenic ion [water, ground-, long-term]: 3.4841e-8 kg; lognormal variance with pedigree 1.9298, pedigree (1,1,4,1,1)
  emissions to groundwater in open dump;
- BOD5, Biological Oxygen Demand [water, ground-]: 4.5362e-5 kg; lognormal variance with pedigree 0.79245, pedigree (1,1,4,1,1)
  uncontrolled emissions in open dump in moist climate;
- BOD5, Biological Oxygen Demand [water, ground-, long-term]: 0.10239 kg; lognormal variance with pedigree 0.031389, pedigree (1,1,4,1,1)
  emissions to groundwater in open dump;
- Boron [water, ground-]: 2.1278e-7 kg; lognormal variance with pedigree 1.5998, pedigree (1,1,4,1,1)
  uncontrolled emissions in open dump in moist climate;
- Boron [water, ground-, long-term]: 1.8979e-6 kg; lognormal variance with pedigree 1.481, pedigree (1,1,4,1,1)
  emissions to groundwater in open dump;
- COD, Chemical Oxygen Demand [water, ground-]: 0.00019161 kg; lognormal variance with pedigree 0.79245, pedigree (1,1,4,1,1)
  uncontrolled emissions in open dump in moist climate;
- COD, Chemical Oxygen Demand [water, ground-, long-term]: 0.43253 kg; lognormal variance with pedigree 0.031389, pedigree (1,1,4,1,1)
  emissions to groundwater in open dump;
- Cadmium II [water, ground-]: 5.286e-10 kg; lognormal variance with pedigree 1.9298, pedigree (1,1,4,1,1)
  uncontrolled emissions in open dump in moist climate;
- Cadmium II [water, ground-, long-term]: 1.9998e-7 kg; lognormal variance with pedigree 1.7837, pedigree (1,1,4,1,1)
  emissions to groundwater in open dump;
- Calcium II [water, ground-]: 2.5534e-7 kg; lognormal variance with pedigree 1.501, pedigree (1,1,4,1,1)
  uncontrolled emissions in open dump in moist climate;
- Calcium II [water, ground-, long-term]: 0.00013063 kg; lognormal variance with pedigree 0.9342, pedigree (1,1,4,1,1)
  emissions to groundwater in open dump;
- Chloride [water, ground-]: 1.2486e-5 kg; lognormal variance with pedigree 1.026, pedigree (1,1,4,1,1)
  uncontrolled emissions in open dump in moist climate;
- Chloride [water, ground-, long-term]: 0.00031829 kg; lognormal variance with pedigree 0.81119, pedigree (1,1,4,1,1)
  emissions to groundwater in open dump;
- Chromium VI [water, ground-]: 1.1234e-10 kg; lognormal variance with pedigree 1.9298, pedigree (1,1,4,1,1)
  uncontrolled emissions in open dump in moist climate;
- Chromium VI [water, ground-, long-term]: 1.2162e-9 kg; lognormal variance with pedigree 1.9298, pedigree (1,1,4,1,1)
  emissions to groundwater in open dump;
- Cobalt II [water, ground-]: 4.1786e-10 kg; lognormal variance with pedigree 1.9298, pedigree (1,1,4,1,1)
  uncontrolled emissions in open dump in moist climate;
- Cobalt II [water, ground-, long-term]: 8.6354e-8 kg; lognormal variance with pedigree 1.9298, pedigree (1,1,4,1,1)
  emissions to groundwater in open dump;
- Copper ion [water, ground-]: 3.0433e-10 kg; lognormal variance with pedigree 1.9298, pedigree (1,1,4,1,1)
  uncontrolled emissions in open dump in moist climate;
- Copper ion [water, ground-, long-term]: 4.1478e-6 kg; lognormal variance with pedigree 1.3918, pedigree (1,1,4,1,1)
  emissions to groundwater in open dump;
- DOC, Dissolved Organic Carbon [water, ground-]: 0.00017519 kg; lognormal variance with pedigree 0.79245, pedigree (1,1,4,1,1)
  uncontrolled emissions in open dump in moist climate;
- DOC, Dissolved Organic Carbon [water, ground-, long-term]: 0.39545 kg; lognormal variance with pedigree 0.031389, pedigree (1,1,4,1,1)
  emissions to groundwater in open dump;
- Fluoride [water, ground-]: 2.3231e-8 kg; lognormal variance with pedigree 1.8174, pedigree (1,1,4,1,1)
  uncontrolled emissions in open dump in moist climate;
- Fluoride [water, ground-, long-term]: 2.0964e-5 kg; lognormal variance with pedigree 1.177, pedigree (1,1,4,1,1)
  emissions to groundwater in open dump;
- Heat, waste [water, ground-, long-term]: 15.134 MJ; lognormal variance with pedigree 0.059019, pedigree (1,1,4,1,1)
  from decomposed waste material in open dump;
- Hydrogen sulfide [water, ground-]: 5.101e-8 kg; lognormal variance with pedigree 1.3748, pedigree (1,1,4,1,1)
  uncontrolled emissions in open dump in moist climate;
- Hydrogen sulfide [water, ground-, long-term]: 9.0826e-6 kg; lognormal variance with pedigree 0.93979, pedigree (1,1,4,1,1)
  emissions to groundwater in open dump;
- Iron ion [water, ground-]: 3.1853e-9 kg; lognormal variance with pedigree 1.9298, pedigree (1,1,4,1,1)
  uncontrolled emissions in open dump in moist climate;
- Iron ion [water, ground-, long-term]: 1.5475e-5 kg; lognormal variance with pedigree 1.2181, pedigree (1,1,4,1,1)
  emissions to groundwater in open dump;
- Lead II [water, ground-]: 2.4601e-9 kg; lognormal variance with pedigree 1.9298, pedigree (1,1,4,1,1)
  uncontrolled emissions in open dump in moist climate;
- Lead II [water, ground-, long-term]: 2.7865e-5 kg; lognormal variance with pedigree 1.14, pedigree (1,1,4,1,1)
  emissions to groundwater in open dump;
- Magnesium [water, ground-]: 1.8265e-6 kg; lognormal variance with pedigree 1.2533, pedigree (1,1,4,1,1)
  uncontrolled emissions in open dump in moist climate;
- Magnesium [water, ground-, long-term]: 0.00019573 kg; lognormal variance with pedigree 0.87948, pedigree (1,1,4,1,1)
  emissions to groundwater in open dump;
- Manganese II [water, ground-]: 9.1146e-7 kg; lognormal variance with pedigree 1.3558, pedigree (1,1,4,1,1)
  uncontrolled emissions in open dump in moist climate;
- Manganese II [water, ground-, long-term]: 5.2207e-5 kg; lognormal variance with pedigree 1.0543, pedigree (1,1,4,1,1)
  emissions to groundwater in open dump;
- Mercury II [water, ground-]: 3.2817e-10 kg; lognormal variance with pedigree 1.9298, pedigree (1,1,4,1,1)
  uncontrolled emissions in open dump in moist climate;
- Mercury II [water, ground-, long-term]: 3.193e-7 kg; lognormal variance with pedigree 1.7242, pedigree (1,1,4,1,1)
  emissions to groundwater in open dump;
- Molybdenum VI [water, ground-]: 1.3117e-9 kg; lognormal variance with pedigree 1.9298, pedigree (1,1,4,1,1)
  uncontrolled emissions in open dump in moist climate;
- Molybdenum VI [water, ground-, long-term]: 1.5363e-7 kg; lognormal variance with pedigree 1.9298, pedigree (1,1,4,1,1)
  emissions to groundwater in open dump;
- Nickel II [water, ground-]: 4.8412e-10 kg; lognormal variance with pedigree 1.9298, pedigree (1,1,4,1,1)
  uncontrolled emissions in open dump in moist climate;
- Nickel II [water, ground-, long-term]: 5.5532e-7 kg; lognormal variance with pedigree 1.6533, pedigree (1,1,4,1,1)
  emissions to groundwater in open dump;
- Nitrate [water, ground-]: 1.4818e-6 kg; lognormal variance with pedigree 0.89021, pedigree (1,1,4,1,1)
  uncontrolled emissions in open dump in moist climate;
- Nitrate [water, ground-, long-term]: 4.0739e-5 kg; lognormal variance with pedigree 0.66746, pedigree (1,1,4,1,1)
  emissions to groundwater in open dump;
- Nitrite [water, ground-]: 7.6686e-7 kg; lognormal variance with pedigree 0.89021, pedigree (1,1,4,1,1)
  uncontrolled emissions in open dump in moist climate;
- Nitrite [water, ground-, long-term]: 2.1084e-5 kg; lognormal variance with pedigree 0.66746, pedigree (1,1,4,1,1)
  emissions to groundwater in open dump;
- Nitrogen, organic bound [water, ground-]: 2.3029e-5 kg; lognormal variance with pedigree 0.89021, pedigree (1,1,4,1,1)
  uncontrolled emissions in open dump in moist climate;
- Nitrogen, organic bound [water, ground-, long-term]: 0.00063314 kg; lognormal variance with pedigree 0.66746, pedigree (1,1,4,1,1)
  emissions to groundwater in open dump;
- Phosphate [water, ground-]: 2.7975e-7 kg; lognormal variance with pedigree 1.6344, pedigree (1,1,4,1,1)
  uncontrolled emissions in open dump in moist climate;
- Phosphate [water, ground-, long-term]: 2.2436e-5 kg; lognormal variance with pedigree 1.9298, pedigree (1,1,4,1,1)
  emissions to groundwater in open dump;
- Potassium I [water, ground-]: 7.1651e-7 kg; lognormal variance with pedigree 1.3802, pedigree (1,1,4,1,1)
  uncontrolled emissions in open dump in moist climate;
- Potassium I [water, ground-, long-term]: 6.4695e-5 kg; lognormal variance with pedigree 1.0266, pedigree (1,1,4,1,1)
  emissions to groundwater in open dump;
- Sodium I [water, ground-]: 8.7244e-7 kg; lognormal variance with pedigree 1.3954, pedigree (1,1,4,1,1)
  uncontrolled emissions in open dump in moist climate;
- Sodium I [water, ground-, long-term]: 1.3199e-5 kg; lognormal variance with pedigree 1.231, pedigree (1,1,4,1,1)
  emissions to groundwater in open dump;
- Sulfate [water, ground-]: 1.9568e-6 kg; lognormal variance with pedigree 1.3748, pedigree (1,1,4,1,1)
  uncontrolled emissions in open dump in moist climate;
- Sulfate [water, ground-, long-term]: 0.00034843 kg; lognormal variance with pedigree 0.93979, pedigree (1,1,4,1,1)
  emissions to groundwater in open dump;
- TOC, Total Organic Carbon [water, ground-]: 0.00017519 kg; lognormal variance with pedigree 0.79245, pedigree (1,1,4,1,1)
  uncontrolled emissions in open dump in moist climate;
- TOC, Total Organic Carbon [water, ground-, long-term]: 0.39545 kg; lognormal variance with pedigree 0.031389, pedigree (1,1,4,1,1)
  emissions to groundwater in open dump;
- Zinc II [water, ground-]: 1.2638e-8 kg; lognormal variance with pedigree 1.8969, pedigree (1,1,4,1,1)
  uncontrolled emissions in open dump in moist climate;
- Zinc II [water, ground-, long-term]: 1.7794e-5 kg; lognormal variance with pedigree 1.1995, pedigree (1,1,4,1,1)
  emissions to groundwater in open dump;
