# acrylic dispersion production, with water, in 58% solution state

Dataset: EcoSpold 2, unit process
Geography: RER
Time period: 1996-01-01 to 2023-12-31
Technology level: current
Classification: ISIC rev.4 ecoinvent: 2022:Manufacture of paints, varnishes and similar coatings, printing ink and mas
Scenario: Business-as-Usual
System model: Allocation, cut-off by classification
Generated by: Maggie Osses
Published in: Althaus H.-J. 2007
Database: ecoinvent
isCopyrightProtected: true
accessRestrictedTo: 1

## General comment
This dataset represents the production of 1 kg of acrylic dispersion 59% in water. Acrylic dispersions are used as binders for industrial coatings for wood, metal and plastics. This dataset is based on a literature source that contains information provided by SIGMA Coatings BV (SZFF 1996).
References:
Paint & Coatings Industry. Acrylic Dispersions for Industrial Coatings with Polymer-Bound Stabilizers, http://www.pcimag.com/articles/82901-acrylic-dispersions-for-industrial-coatings-with-polymer-bound-stabilizers (last accessed on 2017-01-06).
Schweizerische Zentralstelle für Fenster- und Fassadenbau (SZFF) and Swiss Federal Laboratories for Materials Testing and Research (EMPA) (1996) Ökologische Bewertung von Fensterkonstruktionen verschiedener Rahmenmaterialen. EMPA-SZFF-Forschungsbericht. Editor: SZFF.

## Included activities start
The activity starts when the raw materials enter the process.

## Included activities end
This activity ends with the production of 1 kg of acrylic dispersion in water. The manufacturing process takes into account the consumption of raw materials, energy, infrastructure and land use. The generation of solid wastes and emission of heat waste into air are also taken into account. No other emissions into air or into water are included, due to lack of data. No by-product is generated in the process. Consumption of auxiliaries are not included due to the lack of data. Solid wastes are assumed to be sent to hazardous waste incineration.

## Geography
The literature source used is based on information provided by SIGMA Coatings BV. The representativeness of these values for the European acrylic binder industry is unknown.

## Technology
This dataset is based on data from a company. See general comment.
References:
Paint & Coatings Industry. Acrylic Dispersions for Industrial Coatings with Polymer-Bound Stabilizers, http://www.pcimag.com/articles/82901-acrylic-dispersions-for-industrial-coatings-with-polymer-bound-stabilizers (last accessed on 2017-01-06).
Schweizerische Zentralstelle für Fenster- und Fassadenbau (SZFF) and Swiss Federal Laboratories for Materials Testing and Research (EMPA) (1996) Ökologische Bewertung von Fensterkonstruktionen verschiedener Rahmenmaterialen. EMPA-SZFF-Forschungsbericht. Editor: SZFF.

## Parameters
- fraction, process water, to air: 0.15 dimensionless; name fraction_PW_to_air; lognormal variance with pedigree 0.092025, pedigree (4,4,3,2,4)
  Literature value. In case when no industry/process specific data are available, default evaporation fraction value is used. This value is 15% and is based on literature (Statistics Canada, 2007 & Shaffer, K.H., 2008, Consumptive water use in the Great Lakes Basin, USGS & Shiklomanov, 2003, World Water Resources at the Beginning of the 21st Century) and has been approved by an expert.

## Reference product
- acrylic dispersion, with water, in 58% solution state: 1 kg; name RP; By-product classification allocatable product; CPC 35110: Paints and varnishes and related products; HS2017 320820: Paints and varnishes; based on acrylic or vinyl polymers, dispersed or dissolved in a non-aqueous medium
  Acrylic dispersions are used as binders for industrial coatings for wood, metal and plastics. For these type of coatings acrylic dispersions are currently the best available technology for VOC-compliant binders.
  production volume 0.696 kg; name RP_PV
    This is a placeholder value that does not reflect real-world production volumes. This dataset does not currently require a real-world production volume to work in the database framework, and no actual data were collected yet. This has no negative effect on the results of the ecoinvent database. The placeholder value of this activity was estimated by scaling the global production volume (which is also a placeholder value) according to the sales of chemicals products reported by Cefic (European Chemical Industry Council), and the American Chemistry Council.
    According to Cefic (2016) the global sales of chemicals in the year 2015 was 3 534 billion euros. The reported share of sales per region are: EU28 14.7%; Other Europe (Switzerland, Norway, Turkey, Russia and Ukraine) 2.7%; NAFTA (US, Canada and Mexico) 16.5%; Latin America 3.8%; China 39.9%; Japan 3.9%; Republic of Korea 3.2%; India 2.2%; Rest of Asia 11.9%; Rest of the World 1.3%. Cefic also reports the US total sales, which amount to 518.7 billion euros out of the global 3 534 billion euros (14.7%). The same share is reported by the American Chemistry Council (2016), according to which the USA sales account for 15% of global sales for the year 2016.
    References:
    Cefic 2016. Facts and figures 2016 of the European chemical industry. Accessible at: http://www.cefic.org/Facts-and-Figures/Chemicals-Industry-Profile/
    American Chemistry Council 2016. Outlook: U.S. Chemical Industry Continues to Outpace Industrial Output; Accounts for More Than One-Half of Construction Spending by Manufacturing Sector. Accessible at: https://www.americanchemistry.com/Media/PressReleasesTranscripts/ACC-news-releases/US-Chemical-Industry-Continues-to-Outpace-Industrial-Output.html
  property carbon content, fossil 0.660018; = (C_cont_binder* acrylicBinder+ C_cont_butanol* butanol+ C_cont_butylAcrylate* butylAcrylate+ C_cont_chemOrg* chemOrg+ C_cont_ethyleneGlycol* ethyleneGlycol+ C_cont_TiO2* TiO2+ c_cont_water+ water_UNO_input* c_cont_water)/RP_drymass
    The carbon content was calculated from the carbon content of the inputs.
  property dry mass 0.58 kg; name RP_drymass
  property heating value, net 16.66 MJ
    LHV is calculated based on the Carbon content of the product. More details can be found on the respective documentation.
  property price 28.3713 EUR2005
    Calculated based on inputs: The price of the product has been calculated as a sum of the values of the material and energy inputs for this product. This value is therefore a rough estimation. It may underestimate the real price since there are additional expenses when producing any product. These expences can include for example labour costs, treatment of waste materials and profit for the producer. Please consider carefully whether this level of data quality is acceptable for your application.
  property water content 0.724138; = RP_waterinwetmass/RP_dryMass
  property water in wet mass 0.42 kg; name RP_waterinwetmass
  properties: carbon allocation 0.38281 kg, carbon content 0.660018, carbon content, non-fossil 0, wet mass 1 kg

## Inputs from technosphere
- 1-butanol: 0.0051617 kg; name butanol; lognormal variance with pedigree 0.0701, pedigree (3,5,5,3,1)
  Data originally from survey in literature (SFZZ 1996), but scaled up to balance the mass of the output.
  Uncertainty: d
  property carbon content, fossil 0.648649; name C_cont_butanol
  properties: dry mass 1 kg, heating value, net 35.99 MJ, wet mass 1 kg
- acrylic binder, with water, in 54% solution state: 0.504143 kg; name acrylicBinder; lognormal variance with pedigree 0.0701, pedigree (3,5,5,3,1)
  (same comment as for 1-butanol)
  property carbon content, fossil 0.679919; name C_cont_binder
  property dry mass 0.54 kg; name drymass
  property water in wet mass 0.46 kg; name waterinwetmass
  properties: heating value, net 18.18 MJ, water content 0.851852, wet mass 1 kg
  note on carbon content, fossil: The acrylic acid ethyl ester (ethyl acrylate) is used for both solvent- and water-based paints, and in textiles as a binder in nonwoven fabrics and flocking (Acrylic acid and derivatives: uses, Ullmann). It was used as a representative example of acrylic binders. Its formula is C5H8O2
- butyl acrylate: 0.0100227 kg; name butylAcrylate; lognormal variance with pedigree 0.0701, pedigree (3,5,5,3,1)
  (same comment as for 1-butanol)
  property carbon content, fossil 0.756757; name C_cont_butylAcrylate
  properties: dry mass 1 kg, heating value, net 31.22 MJ, wet mass 1 kg
- chemical factory, organics: 4e-10 unit; lognormal variance with pedigree 0.349225, pedigree (2,3,5,2,3)
  Calculated based on literature data published by the industry. For this activity, no information was readily available concerning infrastructure and land-use. Therefore, the infrastructure is estimated based on data from two chemical factories, the BASF site of Ludwigshafen and the chemical factory in Gendorf (which are both located in Germany), which produce a wide range of chemical substances. Based on this data, the following assumptions are made: the built area amounts to about 4.2 ha, the plant has an average output of 50'000 t/a and a lifespan of fifty years. The estimated infrastructure amount is therefore 4.00 E-10 units per kg of produced chemical.
  References:
  Althaus H.-J., Chudacoff M., Hischier R., Jungbluth N., Osses M. and Primas A. (2007) Life Cycle Inventories of Chemicals. ecoinvent report No. 8, v2.0. EMPA Dübendorf, Swiss Centre for Life Cycle Inventories, Dübendorf, CH.
  Gendorf (2000) Umwelterklärung 2000, Werk Gendorf. Werk Gendorf, Burgkirchen.
- chemical, organic: 0.00501136 kg; name chemOrg; lognormal variance with pedigree 0.0701, pedigree (3,5,5,3,1)
  (same comment as for 1-butanol)
  property carbon content, fossil 0.628; name C_cont_chemOrg
  properties: dry mass 1 kg, heating value, net 19.03 MJ, wet mass 1 kg
  note on carbon content, fossil: This dataset is an unweighted average of 20 organic substances (listed in Tab 88.1, ecoinvent v2.2 report 8, part II), being part of the top100 chemicals included in this database. The C-content has also been calculated as an unweighted average of the C content of the substances composing this dataset.
- electricity, medium voltage: 0.3 kWh; lognormal variance with pedigree 0.0701, pedigree (3,5,5,3,1)
  Data from survey in literature (SFZZ 1996)
  Uncertainty: d
- ethylene glycol: 0.0400909 kg; name ethyleneGlycol; lognormal variance with pedigree 0.0701, pedigree (3,5,5,3,1)
  (same comment as for 1-butanol)
  property carbon content, fossil 0.387097; name C_cont_ethyleneGlycol
  properties: dry mass 1 kg, heating value, net 23.44 MJ, wet mass 1 kg
- titanium dioxide: 0.25157 kg; name TiO2; lognormal variance with pedigree 0.0701, pedigree (3,5,5,3,1)
  (same comment as for 1-butanol)
  property carbon content, fossil 0; name C_cont_TiO2
  properties: dry mass 1 kg, wet mass 1 kg
- waste emulsion paint: -0.00162864, -1.35824e-6 kg (2 suppliers, which the file names only by identifier); sum of these -0.00163 kg; lognormal variance with pedigree 0.0321, pedigree (3,5,3,3,1)
  Data from survey in literature (SFZZ 1996)
  Uncertainty: d
  production volume; = RP_PV*BP_waste_emulsion_paint/ABS(RP)
    Calculated from the production volume of acrylic dispersion, without water, in 65% solution state in proportion to the respective output amounts.
  properties: carbon content, fossil 0.27, dry mass 1 kg, heating value, net 8.18 MJ, wet mass 1 kg
  note on carbon content, fossil: Tab A.4, ecoinvent v2.2 report 13_I. C content has been calculated after data in the tables, and then referred to 1 kg DM

## Inputs from nature
- Water, unspecified natural origin [natural resource, in water]: 0.000184 m3; name water_UNO_input; lognormal variance with pedigree 0.0701, pedigree (3,5,5,3,1)
  Data from survey in literature (SFZZ 1996)
  Uncertainty: d
  property carbon content, fossil 0.0104329; name c_cont_water

## Sampling procedure
Literature data based on information provided by SIGMA Coatings BV.

## Review by Emilia Moreno Ruiz 2017-08-09
This dataset was additionally reviewed in a separate review process by Eric Johnson of Atlantic Consulting as well as Emilia Moreno Ruiz and Gregor Wernet of ecoinvent.
