# butyl acetate production

Dataset: EcoSpold 2, unit process
Geography: RoW
Time period: 1991-01-01 to 2023-12-31
Technology level: current
Classification: ISIC rev.4 ecoinvent: 2011:Manufacture of basic chemicals
Synonyms: Acetic acid butyl ester; N-BUTYL ACETATE; 123-86-4; 1-Butyl acetate; Butyl ethanoate
Scenario: Business-as-Usual
System model: Allocation, cut-off by classification
Share of production covered: 100 %
Generated by: Jürgen Sutter
Published in: Sutter, J. 2007
Database: ecoinvent
isCopyrightProtected: true
accessRestrictedTo: 1

## General comment
This dataset represents the production of 1 kg of butyl acetate via the esterification of 1-butanol with acetic acid. n-Butyl acetate is a clear, moderately volatile liquid with a characteristic ester odour. It is miscible with all conventional solvents such as alcohols, ketones, aldehydes, ethers, glycols, glycol ethers, aromatic hydrocarbons and aliphatic hydrocarbons. Its solubility in water is limited. It occurs in many fruits and is a constituent of apple aromas. Butyl acetate is used as a solvent with excellent solvency for cellulose nitrate, polymers, resins and oils. It is an important solvent in the manufacture of paints, leather and paper and in the chemical industry.
As there was no data available for the production of butyl acetate, the raw materials in this dataset are modelled with a stoechiometric calculation. The energy consumption is modelled with data from a similar process. The emissions are estimated and the water exchanges are estimated based on data from a large chemical factory (Gendorf 2016).
References:
Sutter, J. (2007) Life Cycle Inventories of Petrochemical Solvents. ecoinvent report No. 22. Swiss Centre for Life Cycle Inventories, Dübendorf, 2007.
Gendorf (2016) Umwelterklärung 2015, Werk Gendorf Industriepark, www.gendorf.de.

## Included activities start
From the reception of 1-butanol at the factory gate.

## Included activities end
This activity ends with the production of 1 kg of butyl acetate. The dataset includes the input materials, energy uses, infrastructure and emissions.

## Geography
The inventory is modelled for Europe but is assumed to be representative of the global production. Some values are based on data from a large chemical factory located in Germany. These are assumed to be valid for this geography.

## Technology
This production takes place via the esterification of 1-butanol with acetic acid.
Reference:
Riemenschneider, W.: Esters, organic, Chapter 2. In: Ullmann's Encyclopedia of Industrial Chemistry, Seventh Edition, 2004 Electronic Release (ed. Fiedler E., Grossmann G., Kersebohm D., Weiss G. and Witte C.). 7 th Electronic Release Edition. Wiley InterScience, New York, Online-Version under: http://www.mrw.interscience.wiley.com/ueic/articles/

## Time period
Time of publications. Some values are based on data published by the Gendorf factory that were collected between 2011 and 2015. The time period has been adjusted accordingly. For more details, see the comments of the exchanges.

## Reference product
- butyl acetate: 1 kg; name RP; By-product classification allocatable product; CPC 34140: Carboxylic acids and their anhydrides, halides, peroxides and peroxyacids and their halogenated, sulphonated, […]; HS2017 291533: Acids; saturated acyclic monocarboxylic acids; n-butyl acetate; CAS 123-86-4
  N-Butyl acetate is a clear, moderately volatile liquid with a characteristic ester odour. It is miscible with all conventional solvents such as alcohols, ketones, aldehydes, ethers, glycols, glycol ethers, aromatic hydrocarbons and aliphatic hydrocarbons. Its solubility in water is limited. It occurs in many fruits and is a constituent of apple aromas.
  Butyl acetate finds use as a solvent with excellent solvency for cellulose nitrate, polymers, resins and oils. It is an important solvent in the manufacture of paints, leather and paper and in the chemical and allied industries
  production volume 1.92733e9 kg; name RP_PV
    Estimated value. The global production volume is estimated based on information from Cefic (European Chemical Industry Council) and the American Chemistry Council.
    According to Cefic (2016) the Global sales of chemicals in the year 2015 was 3 534 billion euros. The reported share of sales per regions are: EU28 14.7%; Other Europe (Switzerland, Norway, Turkey, Russia and Ukraine) 2.7%; NAFTA (US, Canada and Mexico) 16.5%; Latin America 3.8%; China 39.9%; Japan 3.9%; Republic of Korea 3.2%; India 2.2%; Rest of Asia 11.9%; Rest of the World 1.3%. Cefic also reports the US total sales, 518.7 billion euros of the global 3 534 billion euros (14.7%). The same share is reported from the American Chemistry Council (2016), according to this source the USA sales account for 15% of global sales for the year 2016.
    This value (406000000 kg) represents the sums of different European capacities as they are reported by ICIS (2012). Since no data were found for the global production this value was scaled accordingly.
    Reference(s):
    Cefic 2016. Facts and figures 2016 of the European chemical industry. Accessible at: http://www.cefic.org/Facts-and-Figures/Chemicals-Industry-Profile/
    American Chemistry Council 2016. Outlook: U.S. Chemical Industry Continues to Outpace Industrial Output; Accounts for More Than One-Half of Construction Spending by Manufacturing Sector. Accessible at: https://www.americanchemistry.com/Media/PressReleasesTranscripts/ACC-news-releases/US-Chemical-Industry-Continues-to-Outpace-Industrial-Output.html
    ICIS. 2012. Europe chemical profile: Butyl acetate. Retrieved on 15 of June 2017 from: https://www.icis.com/resources/news/2012/03/19/9542448/europe-chemical-profile-butyl-acetate/
  property heating value, net 27.53 MJ
    LHV is calculated based on the elemental composition of the substance. Based on the CAS number of the substance (000141-78-6), the chemical formula of the substance is found to be: C4H8O2, (PubChem 2020).
    Reference: Kim, S., Chen, J., Cheng, T., Gindulyte, A., He, J., He, S., Li, Q., Shoemaker, B. A., Thiessen, P. A., Yu, B., Zaslavsky, L., Zhang, J., & Bolton, E. E. (2019). PubChem 2019 update: improved access to chemical data. Nucleic acids research, 47(D1), D1102–D1109. https://doi.org/10.1093/nar/gky1033
  property price 0.77 EUR2005
    Calculated value based on data from United Nations Commodity Trade Statistics Database (comtrade.un.org). UN comtrade category: 291533N-butyl acetate. Year 2005. Using exchange rate of 1EURO = 1.209 USD. Average of price of import into 5 main markets (EU, US, JP, IN and CN).
  properties: carbon allocation 0.62069 kg, carbon content 0.62069, carbon content, fossil 0.62069, carbon content, non-fossil 0, dry mass 1 kg, water content 0, water in wet mass 0 kg, wet mass 1 kg

## Inputs from technosphere
- 1-butanol: 0.64453 kg; source Frischknecht R. 2007; lognormal variance with pedigree 0.0382, pedigree (4,5,2,5,1)
  Stoichiometric calculation. Calculated with an assumed yield of 95 %.
  Uncertainty: S
  properties: carbon content, fossil 0.648649, dry mass 1 kg, heating value, net 35.99 MJ, wet mass 1 kg
- acetic acid, without water, in 98% solution state: 0.52218 kg; source Frischknecht R. 2007; lognormal variance with pedigree 0.0382, pedigree (4,5,2,5,1)
  Stoichiometric calculation. Calculated with an assumed yield of 95 %.
  Uncertainty: S
  properties: carbon content, fossil 0.400016, dry mass 1 kg, heating value, net 14.6 MJ, wet mass 1 kg
  note on heating value, net: Based on literature, page 10, Althaus H.-J., Chudacoff M., Hischier R., Jungbluth N., Osses M. and Primas A. (2007) Life Cycle Inventories of Chemicals. Final report ecoinvent data v2.0 No. 8. EMPA, Swiss Centre for Life Cycle Inventories, Dübendorf, CH, Online-Version under: www.ecoinvent.org.
- chemical factory, organics: 4e-10 unit; lognormal variance with pedigree 0.31, pedigree (2,3,2,4,3)
  Calculated based on literature data published by the industry. For this activity, no information was readily available concerning infrastructure and land-use. Therefore, the infrastructure is estimated based on data from two chemical factories, the BASF site of Ludwigshafen and the chemical factory in Gendorf (which are both located in Germany), which produce a wide range of chemical substances. Based on this data, the following assumptions are made: the built area amounts to about 4.2 ha, the plant has an average output of 50'000 t/a and a lifespan of fifty years. The estimated infrastructure amount is therefore 4.00 E-10 units per kg of produced chemical.
  References:
  Althaus H.-J., Chudacoff M., Hischier R., Jungbluth N., Osses M. and Primas A. (2007) Life Cycle Inventories of Chemicals. ecoinvent report No. 8, v2.0. EMPA Dübendorf, Swiss Centre for Life Cycle Inventories, Dübendorf, CH.
  Gendorf (2000) Umwelterklärung 2000, Werk Gendorf. Werk Gendorf, Burgkirchen.
- electricity, medium voltage: 0.00261466, 0.0521567, 0.0175245, 0.0008007, 0.000160259, 3.44113e-5, 0.00538599 kWh (7 suppliers, which the file names only by identifier); sum of these 0.0786772 kWh; source Kim S. 2003; lognormal variance with pedigree 0.086, pedigree (4,5,5,5,3)
  Estimation. Estimated from data for the production of ethyl acetate from ethanol esterification. This process is considered to be similar to the esterification of 1-butanol.
  Uncertainty: E
- heat, district or industrial, natural gas: 0.108616, 6.60978 MJ (2 suppliers, which the file names only by identifier); sum of these 6.7184 MJ; source Kim S. 2003; lognormal variance with pedigree 0.086, pedigree (4,5,5,5,3)
  (same comment as for electricity, medium voltage)
  properties: heating value, net 1 MJ
- heat, district or industrial, other than natural gas: 3.74819, 0.00173647 MJ (2 suppliers, which the file names only by identifier); sum of these 3.74993 MJ; source Kim S. 2003; lognormal variance with pedigree 0.086, pedigree (4,5,5,5,3)
  (same comment as for electricity, medium voltage)
  properties: heating value, net 1 MJ
- sulfuric acid: 0.0131 kg; source Wells, M. 1991; lognormal variance with pedigree 0.0721, pedigree (1,2,5,5,1)
  (same comment as for electricity, medium voltage)
  properties: dry mass 1 kg, wet mass 1 kg
- tap water: 5.28156e-5, 8.05128e-5, 0.000150233, 0.000404717, 4.8717e-5, 0.00203022, 0.0232328 kg (7 suppliers, which the file names only by identifier); sum of these 0.026 kg; lognormal variance with pedigree 0.0106, pedigree (2,3,2,4,3)
  Calculated based on literature data published by the industry. This value is a 5-year average of data (2011 - 2015) published by the Gendorf factory (Gendorf, 2016, Umwelterklärung, www.gendorf.de), (Gendorf, 2015, Umwelterklärung, www.gendorf.de), (Gendorf, 2014, Umwelterklärung, www.gendorf.de). The amount of tap water per kg of chemical substance produced is calculated using literature data published by the Gendorf factory based in Germany, which produces a wide range of chemical substances. The factory produced 1657400 tonnes of chemical substances in the year 2015 (Gendorf, 2016, Umwelterklärung, www.gendorf.de) and 740000 tonnes of intermediate products. The amount of tap water consumed in the year 2015 was 55100 tonnes (Gendorf, 2016, Umwelterklärung, www.gendorf.de). The resulting amount of tap water is 0.023 kg/kg of chemical product produced. The 5-year average (2011 - 2015, weighted by production volume) is 0.026 kg/kg.
  properties: carbon content, fossil 0.00178991, dry mass 0.000337476 kg, water content 2962.17, wet mass 1 kg
  note on carbon content, fossil: Bicarbonate content is 2.93 mol/m3. CO2 content is 0.1 mol/m3 (ecoinvent v2.2 report 8, Tab 93.1).
- wastewater, average: -2.26904e-6, -8.07865e-9 m3 (2 suppliers, which the file names only by identifier); sum of these -2.27712e-6 m3; lognormal variance with pedigree 0.0452, pedigree (2,4,1,5,4)
  Calculated based on literature data published by the GENDORF Chemical Park. The factory produced an average of 2462760 tonnes of chemical substances (including intermediates) per year in the years 2015-2019. The average ouput of wastewater going to an external wastewater treatment plant in the years 2015-2019 was 5608 m3 per year. This equals 0.000002277 m3/kg chemical produced.
  References:
  Chemiepark GENDORF, Umwelterklärung 2016, https://www.gendorf.de/Nachbarn/Umweltschutz/Industrie%20und%20Nachhaltigkeit
  Chemiepark GENDORF, Umwelterklärung 2017, https://www.gendorf.de/Nachbarn/Umweltschutz/Industrie%20und%20Nachhaltigkeit
  Chemiepark GENDORF, Umwelterklärung 2020, https://www.gendorf.de/Nachbarn/Umweltschutz/Industrie%20und%20Nachhaltigkeit
  production volume; = RP_PV*BP_wastewater_average/ABS(RP)
    Calculated from the production volume of butyl acetate in proportion to the respective output amounts.
  properties: carbon content, non-fossil 0.194039, dry mass 0.346837 kg, water content 2882.2, wet mass 1000 kg
  note on carbon content, non-fossil: 0.0673 kg TOC/m3 (Tab A.17, ecoinvent v2.2 report 13_I). TOC was considered as Total Carbon.

## Inputs from nature
- Water, cooling, unspecified natural origin [natural resource, in water]: 0.014707 m3; lognormal variance with pedigree 0.0454, pedigree (2,4,2,5,4)
  Calculated based on literature data published by the GENDORF Chemical Park. The factory produced an average of 2462760 tonnes of chemical substances (including intermediates) per year in the years 2015-2019. The average amount of cooling water released in the years 2015-2019 was 34408800 t per year. It was assumed that 5% of the cooling water was emitted to air during its use, therefore, to calculate the input of cooling water, the output value reported by GENDORF was scaled up by the factor 1/0.95. This equals 0.014707 m3/kg chemical produced.
  References:
  Chemiepark GENDORF, Umwelterklärung 2016, https://www.gendorf.de/Nachbarn/Umweltschutz/Industrie%20und%20Nachhaltigkeit
  Chemiepark GENDORF, Umwelterklärung 2017, https://www.gendorf.de/Nachbarn/Umweltschutz/Industrie%20und%20Nachhaltigkeit
  Chemiepark GENDORF, Umwelterklärung 2020, https://www.gendorf.de/Nachbarn/Umweltschutz/Industrie%20und%20Nachhaltigkeit
- Water, river [natural resource, in water]: 0.000965426 m3; lognormal variance with pedigree 0.0454, pedigree (2,4,2,5,4)
  Calculated based on literature data published by the GENDORF Chemical Park. The factory produced an average of 2462760 tonnes of chemical substances (including intermediates) per year in the years 2015-2019. The average consumption of river water in the years 2015-2019 was 22000820 t per year. However, since the cooling water is modelled as an input, the amount of river water was adjusted to avoid double counting. 55% of the input amount of cooling water was deducted from the amount of river water, as that is the share of river water versus well water. This equals 0.00096543 m3/kg chemical produced.
  References:
  Chemiepark GENDORF, Umwelterklärung 2016, https://www.gendorf.de/Nachbarn/Umweltschutz/Industrie%20und%20Nachhaltigkeit
  Chemiepark GENDORF, Umwelterklärung 2017, https://www.gendorf.de/Nachbarn/Umweltschutz/Industrie%20und%20Nachhaltigkeit
  Chemiepark GENDORF, Umwelterklärung 2020, https://www.gendorf.de/Nachbarn/Umweltschutz/Industrie%20und%20Nachhaltigkeit
- Water, well, in ground [natural resource, in water]: 0.000816522 m3; lognormal variance with pedigree 0.0454, pedigree (2,4,2,5,4)
  Calculated based on literature data published by the GENDORF Chemical Park. The factory produced an average of 2462760 tonnes of chemical substances (including intermediates) per year in the years 2015-2019. The average consumption of well water in the years 2015-2019 was 18607480 t per year. However, since the cooling water is modelled as an input, the amount of well water was adjusted to avoid double counting. 45% of the input amount of cooling water was deducted from the amount of well water, as that is the share of well water versus river water. This equals 0.00081652 m3/kg chemical produced.
  References:
  Chemiepark GENDORF, Umwelterklärung 2016, https://www.gendorf.de/Nachbarn/Umweltschutz/Industrie%20und%20Nachhaltigkeit
  Chemiepark GENDORF, Umwelterklärung 2017, https://www.gendorf.de/Nachbarn/Umweltschutz/Industrie%20und%20Nachhaltigkeit
  Chemiepark GENDORF, Umwelterklärung 2020, https://www.gendorf.de/Nachbarn/Umweltschutz/Industrie%20und%20Nachhaltigkeit

## Emissions to nature
- Acetic acid [air, urban air close to ground]: 0.0010889 kg; lognormal variance with pedigree 0.188, pedigree (4,5,5,5,5)
  Estimation. Air emissions occurring from the purge vent, the distillation vent and fugitive emission sources were estimated to 0.2% of the raw material input.
  It is assumed that the manufacturing plants are located in an urban/industrial area and consequently the emissions are categorised as emanating in a high population density area.
  Uncertainty: E
- Butanol [air, urban air close to ground]: 0.001343 kg; lognormal variance with pedigree 0.218, pedigree (4,5,5,5,5)
  Estimation. Air emissions occurring from the purge vent, the distillation vent and fugitive emission sources were estimated to 0.2% of the raw material input.
  It is assumed that the manufacturing plants are located in an urban/industrial area and consequently the emissions are categorised as emanating in a high population density area.
  Uncertainty: E
- Carbon dioxide, fossil [air, urban air close to ground]: 0.068995 kg; lognormal variance with pedigree 0.1786, pedigree (4,5,5,5,5)
  Estimation. Air emissions occurring from the purge vent, the distillation vent and fugitive emission sources were estimated to 0.2% of the raw material input.
  The carbon contained in the removed 2-methyl-2-butene during wastewater treatment was accounted for as CO2 emissions to air.
  It is assumed that the manufacturing plants are located in an urban/industrial area and consequently the emissions are categorised as emanating in a high population density area.
  Uncertainty: C
- Water [air, unspecified]: 0.00147008 m3; lognormal variance with pedigree 0.0848, pedigree (2,4,2,5,4)
  Calculated based on literature data published by the GENDORF Chemical Park. The factory produced an average of 2462760 tonnes of chemical substances (including intermediates) per year in the years 2015-2019. To determine the emissions of water to air, the difference of all water inputs (from river, well, tap water and cooling) and outputs (wastewater, emissions to water) was calculated. The average ouput of water to air in the years 2015-2019 was 3620444 m3 per year. This equals 0.00147 m3/kg chemical produced. For more information on the other water exchanges please consult the respective exchange comment.
  References:
  Chemiepark GENDORF, Umwelterklärung 2016, https://www.gendorf.de/Nachbarn/Umweltschutz/Industrie%20und%20Nachhaltigkeit
  Chemiepark GENDORF, Umwelterklärung 2017, https://www.gendorf.de/Nachbarn/Umweltschutz/Industrie%20und%20Nachhaltigkeit
  Chemiepark GENDORF, Umwelterklärung 2020, https://www.gendorf.de/Nachbarn/Umweltschutz/Industrie%20und%20Nachhaltigkeit
  property fraction, origin: fresh water 0; name fraction_origin_fresh_water
  property fraction, origin: salt water 0; name fraction_origin_salt_water
  property fraction, origin: unspecified 1; name fraction_origin_unspecified
- Acetic acid [water, surface water]: 0.0026134 kg; lognormal variance with pedigree 0.448, pedigree (4,5,5,5,5)
  Estimation. The remaining amount of unreacted acetic acid and butanol was assumed to leave the production process with the waste water.
  It is assumed that the manufacturing plants are located in an urban/industrial area and consequently the emissions are categorised as emanating in a high population density area.
  Water emissions are assumed to be emitted into rivers.
  Uncertainty: E
- BOD5, Biological Oxygen Demand [water, unspecified]: 0.0106889 kg; lognormal variance with pedigree 0.218, pedigree (4,5,5,5,5)
  Calculated value. The BOD, COD, TOC and BOD5 are calculated based on the amount and type of emissions released to water in the same activity.
- Butanol [water, surface water]: 0.0032232 kg; lognormal variance with pedigree 0.218, pedigree (4,5,5,5,5)
  Estimation. The remaining amount of unreacted acetic acid and butanol (4.8% of the input) was assumed to leave the production process with the waste water.
  It is assumed that the manufacturing plants are located in an urban/industrial area and consequently the emissions are categorised as emanating in a high population density area.
  Water emissions are assumed to be emitted into rivers.
  Uncertainty: E
- COD, Chemical Oxygen Demand [water, unspecified]: 0.0106889 kg; lognormal variance with pedigree 0.218, pedigree (4,5,5,5,5)
  (same comment as for BOD5, Biological Oxygen Demand)
- DOC, Dissolved Organic Carbon [water, unspecified]: 0.00313171 kg; lognormal variance with pedigree 0.218, pedigree (4,5,5,5,5)
  (same comment as for BOD5, Biological Oxygen Demand)
- Sulfate [water, surface water]: 0.012833 kg; lognormal variance with pedigree 0.188, pedigree (4,5,5,5,5)
  Estimation.
  It is assumed that the manufacturing plants are located in an urban/industrial area and consequently the emissions are categorised as emanating in a high population density area.
  Water emissions are assumed to be emitted into rivers.
  Uncertainty: E
- TOC, Total Organic Carbon [water, unspecified]: 0.00313171 kg; lognormal variance with pedigree 0.218, pedigree (4,5,5,5,5)
  (same comment as for BOD5, Biological Oxygen Demand)
- Water [water, unspecified]: 0.0150391 m3; lognormal variance with pedigree 0.0848, pedigree (2,4,2,5,4)
  Calculated based on literature data published by the GENDORF Chemical Park. The factory produced an average of 2462760 tonnes of chemical substances (including intermediates) per year in the years 2015-2019. The amount of water released back to the environment consists of the sum of the amount of process water treated in the internal WWTP that is then released back to the environment and the amount of cooling water released back to the environment. The average ouput of the internal WWTP in the years 2015-2019 was 2628800 m3 and that of cooling water released back to the environment was 34408800 m3. This gives a yearly average of 37037600 m3 emissions of water to water. This equals 0.01504 m3/kg chemical produced.
  References:
  Chemiepark GENDORF, Umwelterklärung 2016, https://www.gendorf.de/Nachbarn/Umweltschutz/Industrie%20und%20Nachhaltigkeit
  Chemiepark GENDORF, Umwelterklärung 2017, https://www.gendorf.de/Nachbarn/Umweltschutz/Industrie%20und%20Nachhaltigkeit
  Chemiepark GENDORF, Umwelterklärung 2020, https://www.gendorf.de/Nachbarn/Umweltschutz/Industrie%20und%20Nachhaltigkeit
  property carbon content, fossil 0; name C_content_fossil
  property carbon content, non-fossil 0; name C_content_non_fossil
  property dry mass 0 kg; name DM
  property fraction, origin: fresh water 0; name fraction_origin_fresh_water_Ww
  property fraction, origin: salt water 0; name fraction_origin_salt_water_Ww
  property fraction, origin: unspecified 1; name fraction_origin_unspecified_Ww
  property water in wet mass 1000 kg; name WWM
  property wet mass 1000 kg; name WM

## Sampling procedure
Literature data. Some values are calculated based on data from a large chemical factory located in Germany. For more details, see the comments of the exchanges.

## Extrapolations
This dataset has been copied from an original dataset covering the geography RER. The uncertainty has been adjusted accordingly.

## Review by Gregor Wernet 2017-08-04
This dataset was additionally reviewed in a separate review process by Eric Johnson of Atlantic Consulting as well as Emilia Moreno Ruiz and Gregor Wernet of ecoinvent.
