# fertilising, by injection

Dataset: EcoSpold 2, unit process
Geography: US
Time period: 2021-01-01 to 2023-12-31
Technology level: current
Classification: ISIC rev.4 ecoinvent: 0161:Support activities for crop production
Scenario: Business-as-Usual
System model: Allocation, cut-off by classification
Generated by: Juanita Barrera
Database: ecoinvent
isCopyrightProtected: true
accessRestrictedTo: 1

## General comment
This dataset models the process of fertilising by injection. The fertiliser is not included. Functional Unit is one ha fertilised.

## Included activities start
The activity starts from the agricultural field foreseen to be processed.

## Included activities end
This activity ends with fertilser are applied on the field.The inventory takes into account the diesel fuel consumption and the amount of agricultural machinery and of the shed, which has to be attributed to the fertilising. Also taken into consideration is the amount of emissions to the air from combustion and the emission to the soil from tyre abrasion during the work process. The following activities were considered part of the work process: preliminary work at the farm, like attaching the adequate machine to the tractor; transfer to field (with an assumed distance of 1 km); field work (for a parcel of land of 1 ha surface); transfer to farm and concluding work, like uncoupling the machine. The overlapping during the field work is considered. The amount of spread fertiliser is not taken into account. Not included are dust other than from combustion and noise.

## Geography
The inventory is extrapolated from the Global geography. Data quality indicators are adjusted accordingly.

## Technology
Fuel consumption and emissions per kg diesel have been extrapolated to the US, but others inputs were taken from the original values.

## Reference product
- fertilising, by injection: 1 ha; By-product classification allocatable product; CPC 86119: Other support services to crop production
  production volume 3.15474e8 ha
    FAOSTAT data source for the year 2020: 2 applications per year assumed in the area of arable land and permanent crops. (own estimation)
  property price 19.5926 EUR2005
    The price is from the year 2023. The price is estimated as a proxy based on the source: https://ag.purdue.edu/commercialag/home/resource/2023/03/indiana-farm-custom-rates/. The prices were adjusted for inflation relative to 2005 using the producer price index (PPI) of the euro area, published by eurostat (https://ec.europa.eu/eurostat/databrowser/view/STS_INPP_A__custom_6416181/default/table?lang=en, last accessed on 2023-06-01).
  properties: carbon allocation 0 kg, carbon content 0

## Inputs from technosphere
- agricultural machinery, unspecified: 0.53 kg; lognormal variance with pedigree 0.3042, pedigree (1,4,2,5,1)
  proxy from "application of plant protection product, by field sprayer, CH"
- diesel: 4.32152 kg; lognormal variance with pedigree 0.0028, pedigree (1,4,2,1,1)
  Iowa State University, 2001. Fuel Required for Field Operations, Machinery Management, Iowa State Universit Available at: https://store.extension.iastate.edu/product/Fuel-Required-for-Field-Operations-Machinery-Management
  properties: carbon content, fossil 0.865, dry mass 1 kg, heating value, net 42.8 MJ, wet mass 1 kg
- shed: 0.00198 m2; lognormal variance with pedigree 0.3042, pedigree (1,4,2,5,1)
  proxy from "application of plant protection product, by field sprayer, CH"
- tractor, 4-wheel, agricultural: 0.321 kg; lognormal variance with pedigree 0.3042, pedigree (1,4,2,5,1)
  proxy from "application of plant protection product, by field sprayer, CH"

## Emissions to nature
- Ammonia [air, non-urban air or from high stacks]: 8.6676e-5 kg; lognormal variance with pedigree 0.058325, pedigree (1,2,2,2,3)
  adapted from "application of plant protection product, by field sprayer, CH" to match the diesel consumption
- Benzene [air, non-urban air or from high stacks]: 3.16748e-5 kg; lognormal variance with pedigree 0.058325, pedigree (1,2,2,2,3)
  (same comment as for Ammonia)
- Benzo(a)pyrene [air, non-urban air or from high stacks]: 1.29891e-7 kg; lognormal variance with pedigree 0.658325, pedigree (1,2,2,2,3)
  (same comment as for Ammonia)
- Cadmium II [air, non-urban air or from high stacks]: 4.32152e-8 kg; lognormal variance with pedigree 0.658325, pedigree (1,2,2,2,3)
  (same comment as for Ammonia)
- Carbon dioxide, fossil [air, non-urban air or from high stacks]: 13.4802 kg; lognormal variance with pedigree 0.018325, pedigree (1,2,2,2,3)
  (same comment as for Ammonia)
- Carbon monoxide, fossil [air, non-urban air or from high stacks]: 0.024063 kg; lognormal variance with pedigree 0.652225, pedigree (1,4,2,2,1)
  (same comment as for Ammonia)
- Chromium III [air, non-urban air or from high stacks]: 2.16567e-7 kg; lognormal variance with pedigree 0.658325, pedigree (1,2,2,2,3)
  (same comment as for Ammonia)
- Copper ion [air, non-urban air or from high stacks]: 7.36623e-6 kg; lognormal variance with pedigree 0.658325, pedigree (1,2,2,2,3)
  (same comment as for Ammonia)
- Dinitrogen monoxide [air, non-urban air or from high stacks]: 0.000520547 kg; lognormal variance with pedigree 0.058325, pedigree (1,2,2,2,3)
  (same comment as for Ammonia)
- Methane, fossil [air, non-urban air or from high stacks]: 0.000559834 kg; lognormal variance with pedigree 0.058325, pedigree (1,2,2,2,3)
  (same comment as for Ammonia)
- NMVOC, non-methane volatile organic compounds [air, non-urban air or from high stacks]: 0.016574 kg; lognormal variance with pedigree 0.042225, pedigree (1,4,2,2,1)
  (same comment as for Ammonia)
- Nickel II [air, non-urban air or from high stacks]: 3.02015e-7 kg; lognormal variance with pedigree 0.658325, pedigree (1,2,2,2,3)
  (same comment as for Ammonia)
- Nitrogen oxides [air, non-urban air or from high stacks]: 0.194223 kg; lognormal variance with pedigree 0.042225, pedigree (1,4,2,2,1)
  (same comment as for Ammonia)
- PAH, polycyclic aromatic hydrocarbons [air, non-urban air or from high stacks]: 1.42414e-5 kg; lognormal variance with pedigree 0.318325, pedigree (1,2,2,2,3)
  (same comment as for Ammonia)
- Particulate Matter, < 2.5 um [air, non-urban air or from high stacks]: 0.0113685 kg; lognormal variance with pedigree 0.318325, pedigree (1,2,2,2,3)
  (same comment as for Ammonia)
- Selenium IV [air, non-urban air or from high stacks]: 4.32152e-8 kg; lognormal variance with pedigree 0.058325, pedigree (1,2,2,2,3)
  (same comment as for Ammonia)
- Sulfur dioxide [air, non-urban air or from high stacks]: 0.00437063 kg; lognormal variance with pedigree 0.018325, pedigree (1,2,2,2,3)
  (same comment as for Ammonia)
- Zinc II [air, non-urban air or from high stacks]: 4.32152e-6 kg; lognormal variance with pedigree 0.658325, pedigree (1,2,2,2,3)
  (same comment as for Ammonia)
- Cadmium II [soil, agricultural]: 1.75e-7 kg; lognormal variance with pedigree 0.0442, pedigree (1,4,2,5,1)
  proxy from "application of plant protection product, by field sprayer, CH"
- Lead II [soil, agricultural]: 7.8e-7 kg; lognormal variance with pedigree 0.0442, pedigree (1,4,2,5,1)
  proxy from "application of plant protection product, by field sprayer, CH"
- Zinc II [soil, agricultural]: 0.00046 kg; lognormal variance with pedigree 0.0442, pedigree (1,4,2,5,1)
  proxy from "application of plant protection product, by field sprayer, CH"

## Extrapolations
The dataset is modeled for agricultural production system in US. Data Quality indicators are adjusted accordingly.
