# transport, freight, lorry, all sizes, EURO3 to generic market for transport, freight, lorry, unspecified

Dataset: EcoSpold 2, unit process
Geography: RoW
Time period: 2010-01-01 to 2023-12-31
Technology level: old
Classification: ISIC rev.4 ecoinvent: 4923:Freight transport by road
Tags: linking activity
Scenario: Business-as-Usual
System model: Allocation, cut-off by classification
Generated by: Tereza Levova
Database: ecoinvent
isCopyrightProtected: true
accessRestrictedTo: 1

## General comment
This is a linking activity which transfers part of the production volume of the specific transport, freight, lorry of all sizes, EURO3 to the generic market for transport, freight, lorry, unspecified.
The transport, freight, lorry, unspecified is meant to be used by activities, where the size and EURO class of the transport supplied is unkown.
[This dataset is meant to replace the following datasets:
- size-specific lorry transport to generic market for lorry transport, GLO, 2005 - 2005]

## Reference product
- transport, freight, lorry, unspecified: 1 metric ton*km; name transport_RP; By-product classification allocatable product; CPC 6511: Road transport services of freight
  production volume 2.14288e12 metric ton*km; name transport_RP_PV; = (((27167000000+20000000000)/0.202442595098182)*0.9*0.5)+(((32601000000+24000000000)/0.202442595098182)*0.9*0.5)+(((154550000000+204000000000)/0.202442595098182)*0.9*0.5)+(((389400000000+357000000000)/0.202442595098182)*0.9*0.5)
    The production volume is calculated as a sum of all the "transport, freight, lorry, ..., EURO3" activities. The GLO production volumes are scaled based on the regional correspondent. The scaling is based on data on total tkm reported by OECD in OECD data for freight transport (accessible at <https://data.oecd.org/transport/freight-transport.htm>). OECD reports total tkm for 50 locations. The year of the data taken is 2019, data from previous years has been used when data for 2019 was not available. Since BR was not included in the list of countries, the total production volume for the relevant transport in BR has been added to calculate a proxy for GLO.
    It is estimated, that 10% of this transport is used for transport of goods in need of atmosphere control. And thus this production volume is included in the "transport, freight, lorry ... with refrigeration machine" datasets.
    It is also estimated, that 50% of the production volume of this transport is transfered to the generic market for transport, freight, lorry, unspecified. Which means, that 50% of people using this transport do not know or do not care about the size of the vehicle and the EURO class.
  property price 0.0244767 EUR2005
    Calculated based on inputs: The price of the product has been calculated as a sum of the values of the material and energy inputs for this product. This value is therefore a rough estimation. It may underestimate the real price since there are additional expenses when producing any product. These expences can include for example labour costs, treatment of waste materials and profit for the producer. Please consider carefully whether this level of data quality is acceptable for your application.
  properties: carbon allocation 0 kg, carbon content 0

## Inputs from technosphere
- transport, freight, lorry 16-32 metric ton, EURO3: 0.2967 metric ton*km; name trans_04; lognormal variance with pedigree 0.0086, pedigree (1,1,4,1,1)
  Calculated from the production volumes.
  The production volume is taken from the "transport, freight, lorry, ..., EURO3" activities. There the production volumes for Europe are taken from the TREMOVE project and the GLO production volumes are calculated using GDP scaling. If the GDP of the whole world (GLO) is 1 the GDP of Europe (RER) is 0.289.
  It is estimated, that 10% of this transport is used for transport of goods in need of atmosphere control. And thus this production volume is included in the "transport, freight, lorry ... with refrigeration machine" datasets.
  It is also estimated, that 50% of the production volume of this transport is transfered to the generic market for transport, freight, lorry, unspecified. Which means, that 50% of people using this transport do not know or do not care about the size of the vehicle and the EURO class.
- transport, freight, lorry 3.5-7.5 metric ton, EURO3: 0.0391 metric ton*km; name trans_02; lognormal variance with pedigree 0.0086, pedigree (1,1,4,1,1)
  (same comment as for transport, freight, lorry 16-32 metric ton, EURO3)
- transport, freight, lorry 7.5-16 metric ton, EURO3: 0.0468 metric ton*km; name trans_03; lognormal variance with pedigree 0.0086, pedigree (1,1,4,1,1)
  (same comment as for transport, freight, lorry 16-32 metric ton, EURO3)
- transport, freight, lorry >32 metric ton, EURO3: 0.6175 metric ton*km; name trans_01; lognormal variance with pedigree 0.0086, pedigree (1,1,4,1,1)
  (same comment as for transport, freight, lorry 16-32 metric ton, EURO3)
