# uranium production, in yellowcake, in-situ leaching

Dataset: EcoSpold 2, unit process
Geography: GLO
Time period: 2005-01-01 to 2023-12-31
Technology level: current
Classification: EcoSpold01Categories: nuclear power/production
Classification: ISIC rev.4 ecoinvent: 0721:Mining of uranium and thorium ores
Tags: uranium; in-situ leaching
Scenario: Business-as-Usual
System model: Allocation, cut-off by classification
Generated by: Xiaojin Zhang
Published in: Gabor Doka 2011
Database: ecoinvent
isCopyrightProtected: true
accessRestrictedTo: 1

## General comment
This dataset is solely for the technology of in-situ leaching (ISL) of uranium, in other words, excluding the conventional open-pit and underground mining of uranium. In 2013 ISL made up 46% of the worlds uranium mine supply (World Uranium Mining Production, 2013, available at http://www.world-nuclear.org/info/Nuclear-Fuel-Cycle/Mining-of-Uranium/World-Uranium-Mining-Production/), however in this dataset, the production volume in 2011 is referred, in order to keep the consistency of reference year between this dataset and the dataset for uranium, in yellowcake production by conventional technologies.
ISL produces yellowcake without milling and therefore replaces the
functions of mining and milling. The function unit in this dataset is 1 kg of yellowcake as natural uranium.
For the inventory, diesel consumption in mining is estimated based on WNA 2009-27, Heathgate 2006, p/45 and Mudd & Diesendorf 2007. Both Heathgate 2006 and Mudd & Diesendorf 2007 refer to data in ISL site in Beverley Australia. Acid consumption is estimated from WNA 2009-27. Water consumption is estimated from Mudd & Diesendorf 2007. Emissions of radon-222 is estimated from the report IAEA 2005. Steel consumption for injection and recovery wells in remediation is estimated based on an assumed site, with recovery rate of uranium assumed based on Red Book 203, p.265. No re-use or recycling of steel is considered in this dataset. The energy intensity in remediation is assumed to be identical to uranium mining, as the processes are similar: both include pumping and separation. Land transformation and occupation is estimated based an assumed site. Groundwater emissions are calculated using the Ecoinvent residual landfill model, in Doka 2008.
References:
WNA 2009-27: World Nuclear Association (2009) In Situ Leach Mining (ISL) of Uranium. WNA Information Paper, June 2009. http://www.world-nuclear.org/info/inf27.html (11 June 2010)
Heathgate 2006: Heathgate Resources (2006) Annual Environment Report 2005 , Heathgate Resources Pty Ltd, Adelaide, 31 March 2006. http://www.heathgateresources.com.au/public/download.jsp?id=777 (16 April 2010)
Mudd & Diesendorf 2007: Mudd G. M., Diesendorf M. (2007) Sustainability Aspects of Uranium Mining : Towards Accurate Accounting ? 2nd International Conference on Sustainability Engineering and Science, Auckland, New Zealand, February 2007. http://civil.eng.monash.edu.au/about/staff/muddpersonal/2007-SustEngSci-Sust-v-Uranium-Mining.pdf (25 June 2007)
IAEA 2005: IAEA (2005) Guidebook on environmental impact assessment for in situ leach mining projects. IAEATECDOC-1428, International Atomic Energy Agency, Vienna, May 2005. http://wwwpub.iaea.org/MTCD/publications/PDF/te_1428_web.pdf (17. April 2010)
Red Book 2003: Uranium 2003: Resources, Production and Demand. NEA report Nr. 5291, OECD Nuclear Energy Agency and International Atomic Energy Agency IAEA, Paris 2004.
Doka 2008: Doka G. (2008) Non-radiological emissions from uranium tailings: A generic, global model for Life Cycle
Inventory data. Doka Life Cycle Assessments, Zurich, November 2008.
Note that the dry mass of this dataset is not balanced, which is mostly caused by the relatively large long-term and short-term emissions from sulphate and nitrate, but this is the groundwater emissions from residual landfill directly taken from the Tab. 2.1 in the Doka 2011 reference. The dry mass won't be balanced in this technology, as the pregnant solution has introduced a lot of other substances from underground, which are not considered in the inputs.
Please note that this dataset is the first tentative dataset for the mining of uranium by in-situ leaching, with limited data and information. Future improvements on data quality is necessary.

## Included activities start
The activity starts from uranium under the ground

## Included activities end
The activity includes: input of diesel that needs to be fed into the diesel generators; acid consumption for in-situ dissolvation of uranium; water consumption; radon emissions; the requirement for steel for contructing the injection and recovery wells; diesel consumption required during drilling of the wells; remediation, which includes water and energy consumption, leachate reatment, landfill of residual material; land transformation and occupation; resource extraction and recovery.

## Geography
Global dataset for uranium mining with in-situ leaching technology represented by data derieved from Australia and Kazakhstan.

## Technology
In-situ leaching (ISL), also called in-situ recovery (ISR) or solution mining, is a mining process used to recover minerals through boreholes drilled into a deposit in situ. The process initially involves drilling of holes into the ore deposit. Leaching solution is pumped into the deposit via a borehole, where it makes contact with the ore. The solution bearing the dissolved ore content is then extracted via a second borehole and pumped to the surface being further processed. This process allows the extraction of metals from an ore body without the need for conventional mining involving drill-and-blast, open-cut or underground mining. The technology parameters for this particular dataset is dereived from data for urainium production activity with in-situ leaching process from 2005 to 2009 in Australia and Kazakhstan.

## Reference product
- uranium, in yellowcake: 1 kg; By-product classification allocatable product; CPC 13000: Uranium and thorium ores and concentrates; HS2017 261210: Uranium ores and concentrates
  Literature value
  production volume 2.1863e7 kg
    Data from year 2010; in Tabelle 9: Historische Entwicklung der Uranproduktion nach einzelnen Ländern.
  property price 39.2668 EUR2005
    Calculated based on inputs: The price of the product has been calculated as a sum of the values of the material and energy inputs for this product. This value is therefore a rough estimation. It may underestimate the real price since there are additional expenses when producing any product. These expences can include for example labour costs, treatment of waste materials and profit for the producer. Please consider carefully whether this level of data quality is acceptable for your application.
  properties: carbon allocation 0 kg, carbon content 0, carbon content, fossil 0, carbon content, non-fossil 0, dry mass 1 kg, water content 0, water in wet mass 0 kg, wet mass 1 kg

## Inputs from technosphere
- diesel, burned in diesel-electric generating set, 10MW: 886.6 MJ; source World Nuclear Association 2009; lognormal variance with pedigree 0.1167, pedigree (3,3,5,4,2)
  The diesel consumption here includes diesel consumption in two processes: uranium mining and remedation. Diesel consumption in uranium mining is referenced from WNA 2009-27 (253 MJ diesel/kg U) , while the intensity of diesel consumption in remediation is assumed to be identical to uranium ming, as methods they are using are similar: pumping and separation. However, since the proces of remediation is longer (5 years) than that of mining process (2.5 years), the energy requirement is scaled up by 5 years ÷ 2 years = 2.5 times, which equals to 253*2.5=633.3 MJ diesel/kg U. The total diesel consumption therefore becomes 253+633.3=886.3 MJ diesel/kg of U.
  properties: heating value, net 1 MJ
- steel, chromium steel 18/8: 0.108 kg; source OECD NEA & IAEA 2004; lognormal variance with pedigree 0.3909, pedigree (5,5,5,3,1)
  No data was found for the specific infrastructure of an ISL field. Therefore, an estimate of the probably most important part - the injection and recovery pipes was made based on a assumed site, with 20m-edge, hexagonal wellfield pattern geometry with central recovery well, wells running 120m deep and 10 kg steel per metre of piping, 15 m ore aquifer height with 0.168% U3O8 ore grade and 75% overall recovery rate (Red Book 2003, p.265). This results in 32 kg U recovered per m2 surface area and 0.108 kg steel pre kg uranium recovered.
  properties: carbon content, fossil 0.0008, dry mass 1 kg, wet mass 1 kg
  note on carbon content, fossil: Stainless steel model is the grade 304 steel (18/8 stainless, 18% chromium 8% nickel; max. 0.08% C)
- sulfuric acid: 17.6866, 2.31335 kg (2 suppliers, which the file names only by identifier); sum of these 20 kg; source World Nuclear Association 2009; lognormal variance with pedigree 0.2298, pedigree (3,3,5,3,2)
  estimated from the mid-range value from ISL Beverley, Australia (7.7 kg sulfuric acid/kg U) and ISL Kazakhstan (40 kg sulfuric acid/kg U) as listed in WNA 2009-27.
  properties: dry mass 1 kg, wet mass 1 kg
- water, decarbonised: 0.248875, 204.39, 2986.5, 152.944, 2535.14, 259.816, 1605.06, 397.959, 14.3434, 391.948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 kg (13 suppliers, which the file names only by identifier); sum of these 9123 kg; source Mudd G. M., Diesendorf M. 2007; lognormal variance with pedigree 0.0432, pedigree (1,4,5,3,1)
  estimated from Mudd & Diesendorf 2007
  properties: wet mass 1 kg

## Inputs from nature
- Occupation, mineral extraction site [natural resource, land]: 0.2185 m2*year; source Gabor Doka 2011; lognormal variance with pedigree 0.1313, pedigree (5,5,5,3,1)
  Literature value
- Transformation, from mineral extraction site [natural resource, land]: 0.03122 m2; source OECD NEA & IAEA 2004; lognormal variance with pedigree 0.2098, pedigree (5,5,5,3,1)
  No data was found for the specific infrastructure of an ISL field. Therefore assumed site was used to estimate landuse, with 20m-edge, hexagonal wellfield pattern geometry with central recovery well, wells running 120m deep and 10 kg steel per metre of piping, 15 m ore aquifer height with 0.168% U3O8 ore grade and 75% overall recovery rate (Red Book 2003), resulting in 32 kg U recovered per m2 surface area.
  This gives a landuse estimate of 1 m^2/32 kg=0.0312 m^2/kg U
- Transformation, from unspecified [natural resource, land]: 0.03122 m2; source OECD NEA & IAEA 2004; lognormal variance with pedigree 0.2098, pedigree (5,5,5,3,1)
  (same comment as for Transformation, from mineral extraction site)
- Transformation, to mineral extraction site [natural resource, land]: 0.03122 m2; source Gabor Doka 2011; lognormal variance with pedigree 0.2098, pedigree (5,5,5,3,1)
  Literature value
- Transformation, to unspecified [natural resource, land]: 0.03122 m2; source OECD NEA & IAEA 2004; lognormal variance with pedigree 0.2098, pedigree (5,5,5,3,1)
  (same comment as for Transformation, from mineral extraction site)
- Uranium [natural resource, in ground]: 1.33 kg; source OECD NEA & IAEA 2004; lognormal variance with pedigree 0.0491, pedigree (1,2,5,1,1)
  Recovery rate of uranium of about 75% is assumed, based on Red Book 2003. Non-recovered uranium (0.33 kg) is assumed to remain underground, but is assumed to be worthless uranium leftover in an exploited deposit. There for it is inventoried as resource extraction for the impact assessment.

## Emissions to nature
- Radon-222 [air, low population density, long-term]: 21550 kBq; source International Atomic Energy Agency 2005; lognormal variance with pedigree 0.3454, pedigree (2,4,5,3,1)
  Estimated based on IAEA 2005: 43100 kBq Rn-222/kg U, which is given as upper estimate of 100 GBq per day, converted with annual production of 1000 t
  yellowcake in same production = 847 t U. This is figure is reduced by 50% to be 21550 kBq Rn-222/kg U,
- Water [air, unspecified]: 9.123 m3; source Gabor Doka 2011; lognormal variance with pedigree 0.0432, pedigree (1,4,5,3,1)
  Assume that all water goes to air as usually reservoir is created at the site of in-situ leaching, and the wastewater is evaporated
- Aluminium III [water, ground-]: 0.0002917 kg; source Gabor Doka 2011; lognormal variance with pedigree 0.3728, pedigree (3,3,5,3,2)
  Literature value
- Aluminium III [water, ground-, long-term]: 0.1747 kg; source Gabor Doka 2011; lognormal variance with pedigree 0.5239, pedigree (3,3,5,3,2)
  Literature value
- Antimony ion [water, ground-]: 0.0008849 kg; source Gabor Doka 2011; lognormal variance with pedigree 0.4378, pedigree (3,3,5,3,2)
  Literature value
- Antimony ion [water, ground-, long-term]: 0.001624 kg; source Gabor Doka 2011; lognormal variance with pedigree 0.3924, pedigree (5,5,5,5,5)
  Literature value
- Arsenic ion [water, ground-]: 0.009171 kg; source Gabor Doka 2011; lognormal variance with pedigree 0.36, pedigree (3,3,5,3,2)
  Literature value
- Arsenic ion [water, ground-, long-term]: 9.171e-12 kg; source Gabor Doka 2011; lognormal variance with pedigree 0.36, pedigree (3,3,5,3,2)
  Literature value
- Barium II [water, ground-]: 5.962e-9 kg; source Gabor Doka 2011; lognormal variance with pedigree 0.9246, pedigree (3,3,5,3,2)
  Literature value
- Barium II [water, ground-, long-term]: 3.571e-6 kg; source Gabor Doka 2011; lognormal variance with pedigree 6.2806, pedigree (4,4,5,4,2)
  Literature value
- Beryllium II [water, ground-]: 2.251e-7 kg; source Gabor Doka 2011; lognormal variance with pedigree 0.6972, pedigree (3,3,5,3,2)
  Literature value
- Beryllium II [water, ground-, long-term]: 0.0001348 kg; source Gabor Doka 2011; lognormal variance with pedigree 0.746, pedigree (3,3,5,3,2)
  Literature value
- Boron [water, ground-]: 1.271e-5 kg; source Gabor Doka 2011; lognormal variance with pedigree 0.5066, pedigree (3,3,5,3,2)
  Literature value
- Boron [water, ground-, long-term]: 0.001595 kg; source Gabor Doka 2011; lognormal variance with pedigree 0.4018, pedigree (3,3,5,3,2)
  Literature value
- Cadmium II [water, ground-]: 2.852e-9 kg; source Gabor Doka 2011; lognormal variance with pedigree 0.9629, pedigree (3,3,5,3,2)
  Literature value
- Cadmium II [water, ground-, long-term]: 1.709e-6 kg; source Gabor Doka 2011; lognormal variance with pedigree 6.7892, pedigree (4,4,5,4,2)
  Literature value
- Calcium II [water, ground-]: 0.0003298 kg; source Gabor Doka 2011; lognormal variance with pedigree 0.3927, pedigree (3,3,5,3,2)
  Literature value
- Calcium II [water, ground-, long-term]: 0.1975 kg; source Gabor Doka 2011; lognormal variance with pedigree 1.5636, pedigree (4,4,5,4,2)
  Literature value
- Chloride [water, ground-]: 0.5642 kg; source Gabor Doka 2011; lognormal variance with pedigree 0.143, pedigree (3,3,5,3,2)
  Literature value
- Chloride [water, ground-, long-term]: 1.408 kg; source Gabor Doka 2011; lognormal variance with pedigree 0.1346, pedigree (3,3,5,3,2)
  Literature value
- Chromium VI [water, ground-]: 3.021e-5 kg; source Gabor Doka 2011; lognormal variance with pedigree 0.5463, pedigree (3,3,5,3,2)
  Literature value
- Chromium VI [water, ground-, long-term]: 9.544e-5 kg; source Gabor Doka 2011; lognormal variance with pedigree 1.1468, pedigree (3,3,5,3,2)
  Literature value
- Cobalt II [water, ground-]: 1.721e-6 kg; source Gabor Doka 2011; lognormal variance with pedigree 0.6256, pedigree (3,3,5,3,2)
  Literature value
- Cobalt II [water, ground-, long-term]: 0.001031 kg; source Gabor Doka 2011; lognormal variance with pedigree 1.1622, pedigree (3,3,5,3,2)
  Literature value
- Copper ion [water, ground-]: 2.321e-7 kg; source Gabor Doka 2011; lognormal variance with pedigree 0.7258, pedigree (3,3,5,3,2)
  Literature value
- Copper ion [water, ground-, long-term]: 0.000139 kg; source Gabor Doka 2011; lognormal variance with pedigree 3.0622, pedigree (4,4,5,4,2)
  Literature value
- Fluoride [water, ground-]: 0.003066 kg; source Gabor Doka 2011; lognormal variance with pedigree 0.3253, pedigree (3,3,5,3,2)
  Literature value
- Fluoride [water, ground-, long-term]: 0.0535 kg; source Gabor Doka 2011; lognormal variance with pedigree 0.2848, pedigree (3,3,5,3,2)
  Literature value
- Iron ion [water, ground-]: 1.357e-6 kg; source Gabor Doka 2011; lognormal variance with pedigree 0.6404, pedigree (3,3,5,3,2)
  Literature value
- Iron ion [water, ground-, long-term]: 0.000813 kg; source Gabor Doka 2011; lognormal variance with pedigree 7.2315, pedigree (4,4,5,4,2)
  Literature value
- Lead II [water, ground-]: 9.267e-9 kg; source Gabor Doka 2011; lognormal variance with pedigree 0.9014, pedigree (3,3,5,3,2)
  Literature value
- Lead II [water, ground-, long-term]: 5.551e-6 kg; source Gabor Doka 2011; lognormal variance with pedigree 7.4032, pedigree (4,4,5,4,2)
  Literature value
- Magnesium [water, ground-]: 0.0001479 kg; source Gabor Doka 2011; lognormal variance with pedigree 0.4126, pedigree (3,3,5,3,2)
  Literature value
- Magnesium [water, ground-, long-term]: 0.0886 kg; source Gabor Doka 2011; lognormal variance with pedigree 1.332, pedigree (3,3,5,3,2)
  Literature value
- Manganese II [water, ground-]: 2.124e-6 kg; source Gabor Doka 2011; lognormal variance with pedigree 0.6222, pedigree (3,3,5,3,2)
  Literature value
- Manganese II [water, ground-, long-term]: 0.001272 kg; source Gabor Doka 2011; lognormal variance with pedigree 5.97724, pedigree (4,4,5,4,2)
  Literature value
- Mercury II [water, ground-]: 2.673e-9 kg; source Gabor Doka 2011; lognormal variance with pedigree 0.9797, pedigree (3,3,5,3,2)
  Literature value
- Mercury II [water, ground-, long-term]: 1.601e-6 kg; source Gabor Doka 2011; lognormal variance with pedigree 3.0035, pedigree (4,4,5,4,2)
  Literature value
- Molybdenum VI [water, ground-]: 0.02616 kg; source Gabor Doka 2011; lognormal variance with pedigree 0.3013, pedigree (3,3,5,3,2)
  Literature value
- Molybdenum VI [water, ground-, long-term]: 0.0001206 kg; source Gabor Doka 2011; lognormal variance with pedigree 0.3013, pedigree (3,3,5,3,2)
  Literature value
- Nickel II [water, ground-]: 1.434e-6 kg; source Gabor Doka 2011; lognormal variance with pedigree 0.6404, pedigree (3,3,5,3,2)
  Literature value
- Nickel II [water, ground-, long-term]: 0.0008592 kg; source Gabor Doka 2011; lognormal variance with pedigree 0.6892, pedigree (3,3,5,3,2)
  Literature value
- Nitrate [water, ground-]: 4.449 kg; source Gabor Doka 2011; lognormal variance with pedigree 0.0784, pedigree (3,3,5,3,2)
  Literature value
- Nitrate [water, ground-, long-term]: 19.11 kg; source Gabor Doka 2011; lognormal variance with pedigree 0.0636, pedigree (3,3,5,3,2)
  Literature value
- Phosphate [water, ground-]: 0.0005546 kg; source Gabor Doka 2011; lognormal variance with pedigree 0.3764, pedigree (3,3,5,3,2)
  Literature value
- Phosphate [water, ground-, long-term]: 0.3322 kg; source Gabor Doka 2011; lognormal variance with pedigree 0.7052, pedigree (3,3,5,3,2)
  Literature value
- Potassium I [water, ground-]: 0.05014 kg; source Gabor Doka 2011; lognormal variance with pedigree 0.2316, pedigree (3,3,5,3,2)
  Literature value
- Potassium I [water, ground-, long-term]: 0.1277 kg; source Gabor Doka 2011; lognormal variance with pedigree 0.223, pedigree (3,3,5,3,2)
  Literature value
- Selenium IV [water, ground-]: 0.00225 kg; source Gabor Doka 2011; lognormal variance with pedigree 0.3891, pedigree (3,3,5,3,2)
  Literature value
- Selenium IV [water, ground-, long-term]: 0.004131 kg; source Gabor Doka 2011; lognormal variance with pedigree 0.3819, pedigree (3,3,5,3,2)
  Literature value
- Silicon [water, ground-]: 0.000151 kg; source Gabor Doka 2011; lognormal variance with pedigree 0.3928, pedigree (3,3,5,3,2)
  Literature value
- Silicon [water, ground-, long-term]: 0.06701 kg; source Gabor Doka 2011; lognormal variance with pedigree 0.2408, pedigree (3,3,5,3,2)
  Literature value
- Silver I [water, ground-]: 1.506e-9 kg; source Gabor Doka 2011; lognormal variance with pedigree 1.0102, pedigree (3,3,5,3,2)
  Literature value
- Silver I [water, ground-, long-term]: 9.023e-7 kg; source Gabor Doka 2011; lognormal variance with pedigree 3.3468, pedigree (4,4,5,4,2)
  Literature value
- Sodium I [water, ground-]: 1.168 kg; source Gabor Doka 2011; lognormal variance with pedigree 0.1151, pedigree (3,3,5,3,2)
  Literature value
- Sodium I [water, ground-, long-term]: 1.944 kg; source Gabor Doka 2011; lognormal variance with pedigree 0.1089, pedigree (3,3,5,3,2)
  Literature value
- Strontium II [water, ground-]: 3.648e-6 kg; source Gabor Doka 2011; lognormal variance with pedigree 0.5955, pedigree (3,3,5,3,2)
  Literature value
- Strontium II [water, ground-, long-term]: 0.002185 kg; source Gabor Doka 2011; lognormal variance with pedigree 0.6442, pedigree (3,3,5,3,2)
  Literature value
- Sulfate [water, ground-]: 16.48 kg; source Gabor Doka 2011; lognormal variance with pedigree 0.0659, pedigree (3,3,5,3,2)
  Literature value
- Sulfate [water, ground-, long-term]: 137.1 kg; source Gabor Doka 2011; lognormal variance with pedigree 0.04022, pedigree (1,2,5,1,1)
  Literature value.
  Note that there might seem to be a mass balance gap, but the reason behind is that the underground is not inventoried as an input material (only uranium resource itself is). Sulfate emitted to water here is not from the operational inputs of sulphuric acid, but from the 5-year remediation phase of the mine site (and subsequent landfilling of isolated pollutants). The long-term emissions to water here may look a bit high, but given 25'000 liters of flushing water used per kg of produced uranium, a total 155 kg of sulfate in 25'000 kg water is about the concentration of mineral water. The ISL reactions will chemically change the underground. The mine's remediation phase will bring pollutants to the surface where they are separated and landfilled, probably at a different location, where a certain part will be emitted over time.
- Titanium ion [water, ground-]: 1.582e-5 kg; source Gabor Doka 2011; lognormal variance with pedigree 0.5048, pedigree (3,3,5,3,2)
  Literature value
- Titanium ion [water, ground-, long-term]: 0.009475 kg; source Gabor Doka 2011; lognormal variance with pedigree 0.6553, pedigree (3,3,5,3,2)
  Literature value
- Vanadium V [water, ground-]: 3.496e-5 kg; source Gabor Doka 2011; lognormal variance with pedigree 0.4714, pedigree (3,3,5,3,2)
  Literature value
- Vanadium V [water, ground-, long-term]: 0.01095 kg; source Gabor Doka 2011; lognormal variance with pedigree 0.3396, pedigree (3,3,5,3,2)
  Literature value
- Zinc II [water, ground-]: 1.204e-7 kg; source Gabor Doka 2011; lognormal variance with pedigree 0.7603, pedigree (3,3,5,3,2)
  Literature value
- Zinc II [water, ground-, long-term]: 7.209e-5 kg; source Gabor Doka 2011; lognormal variance with pedigree 5.2289, pedigree (4,4,5,4,2)
  Literature value

## Sampling procedure
Literature (inventory data is referenced from literature report Life Cycle Inventory of generic uranium in-situ leaching by Gabor Doka, Doka Life Cycle Assessment, Zürich, 2011) unless otherwise specified in the particular input comment field.

## Extrapolations
Yes, there are extrapolation based on other references, The energy demand in mining is derived from WNA 2009-27, Heathgate 2006 and Mudd & Diesendorf 2007; the acid consumption are derived from WNA 2009-27; emissions of radon is derived from IAEA 2005; resource extraction and recovery is extrapolated based on acid ISL process given in Red Book 2003; while steel consumption, energy demand in remediation landuse are estimated with assumptions in calculation; and groundwater emissions are estimated using ecoinvent residual landfill model, from Doka 2008.

References:

WNA 2009-27: World Nuclear Association (2009) In Situ Leach Mining (ISL) of Uranium. WNA Information Paper, June 2009. http://www.world-nuclear.org/info/inf27.html (11 June 2010)

Heathgate 2006: Heathgate Resources (2006) Annual Environment Report 2005 , Heathgate Resources Pty Ltd, Adelaide, 31 March 2006. http://www.heathgateresources.com.au/public/download.jsp?id=777 (16 April 2010)

Mudd & Diesendorf 2007: Mudd G. M., Diesendorf M. (2007) Sustainability Aspects of Uranium Mining : Towards Accurate Accounting ? 2nd International Conference on Sustainability Engineering and Science, Auckland, New Zealand, February 2007. http://civil.eng.monash.edu.au/about/staff/muddpersonal/2007-SustEngSci-Sust-v-Uranium-Mining.pdf (25 June 2007)

IAEA 2005: IAEA (2005) Guidebook on environmental impact assessment for in situ leach mining projects. IAEATECDOC-1428, International Atomic Energy Agency, Vienna, May 2005. http://wwwpub.iaea.org/MTCD/publications/PDF/te_1428_web.pdf (17. April 2010)

Red Book 2003: Uranium 2003: Resources, Production and Demand. NEA report Nr. 5291, OECD Nuclear Energy Agency and International Atomic Energy Agency IAEA, Paris 2004.

Doka 2008: Doka G. (2008) Non-radiological emissions from uranium tailings: A generic, global model for Life Cycle
Inventory data. Doka Life Cycle Assessments, Zurich, November 2008.
http://www.doka.ch/PSIuraniumtailingsDoka.pdf (19 Feb 2009)
