# treatment of basic oxygen furnace waste, residual material landfill

Dataset: EcoSpold 2, unit process
Geography: IN
Time period: 2010-01-01 to 2023-12-31
Technology level: current
Classification: ISIC rev.4 ecoinvent: 3822:Treatment and disposal of hazardous waste
Scenario: Business-as-Usual
System model: Allocation, cut-off by classification
Generated by: Nikolia Stoikou
Database: ecoinvent
isCopyrightProtected: true
accessRestrictedTo: 1

## General comment
This dataset represents the activity of waste disposal of 'basic oxygen furnace waste' in a residual material landfill (RMLF). Recommended use of this dataset: for wastes-residues that are low in organic carbon (< 5 w-%) and are not biologically or chemically reactive in water. Inventoried waste consists of fraction: 100% BOF waste mix. Waste composition (wet, in ppmw): H2O na; O 346840; H na; C na; S 4168.6; N na; P 33252; B na; Cl na; Br na; F na; I na; Ag na; As na; Ba na; Cd na; Co na; Cr 3994.9; Cu na; Hg na; Mn 10423; Mo na; Ni na; Pb na; Sb na; Se na; Sn na; V na; Zn na; Be na; Sc na; Sr na; Ti na; Tl na; W na; Si 83852; Fe 105500; Ca 376640; Al 13267; K na; Mg 22058; Na na. Share of carbon in initial waste input that is biogenic 61.4%. Additional solidification of residues with 0.4 kg of cement.

## Included activities start
The activity starts with the waste being available at the gate of the treatment facility. Collection and transportation of the waste to the treatment plant is not included.

## Included activities end
The activity ends with the waste being treated and waste-specific emissions from the landfill are released to water (short-term emissions to water from leachate and long-term emissions to ground water). Expenditures for solidificalion with cement are also included.

## Geography
This dataset represents a landfill site with mean annual temperature (MAT) of 24.7211538461538 degC, mean annual precipitation (MAP) of 1083 mm/year, mean annual actual evaporation (EAT) of 573 mm/year, and net infiltration of 510 mm/year. The leachate percolating through the residual material landfill has an average residence time of 6.86 years.
Reference for climatic parameters:
World Bank, 2022. Average precipitation in depth (mm per year), World Bank Group Available at: https://data.worldbank.org/indicator/AG.LND.PRCP.MM?end=2019&start=2019
WMO, 2022. India Meteorological Department and World Meteorological Organization. Available: https://worldweather.wmo.int/en/country.html?countryCode=66
undata, 2020. Actual evapotranspiration, United Nations Statistics Division Available at: http://data.un.org/Data.aspx?d=ENV&f=variableID%3a7
World Bank, 2022. Surface area (sq.km), World Bank Group Available at: https://data.worldbank.org/indicator/AG.SRF.TOTL.K2

## Technology
Residual material landfill for polluted, inorganic waste (VVEA Type C). With base seal and leachate collection system. Ultimate average landfill height is 10 meters. Operation phase duration is 30 years. Recultivation after closure. Additional solidification with cement requested. Based on average waste composition and climate data the end of carbonate phase in the residual material landfill is estimated to be reached after 60 000 years.

## Reference product
- basic oxygen furnace waste: -1 kg; By-product classification Waste; CPC 39990: Other wastes n.e.c.
  main reference product of this activity
  production volume 1.1542e8 kg
    Estimated based on the total amount of this waste being generated in the database and scaled based on the GDP of India
  property price 0 EUR2005
    Waste products are assigned a price of zero as they are assumed to require further treatment.
  properties: aluminium content 0.0132666, calcium content 0.376642, carbon allocation 0 kg, carbon content 0, carbon content, fossil 0, carbon content, non-fossil 0, chromium content 0.00399488, dry mass 1 kg, heating value, gross 0 MJ, heating value, net 0 MJ, iron content 0.105499, magnesium content 0.0220579, manganese content 0.0104232, oxygen content 0.346844, phosphorus content 0.0332517, silicon content 0.0838518, sulfur content 0.00416856, water content 0, water in wet mass 0 kg, wet mass 1 kg

## Inputs from technosphere
- cast iron: 5.0555e-6 kg; lognormal variance with pedigree 0.31529, pedigree (1,1,2,1,1)
  for residual material landfill infrastructure
  properties: carbon content, fossil 0.04, dry mass 1 kg, wet mass 1 kg
- cement, unspecified: 0.4 kg; lognormal variance with pedigree 0.009284, pedigree (1,1,2,1,1)
  cement required for solidification of landfilled residual material
  properties: dry mass 1 kg, wet mass 1 kg
- concrete, 25MPa: 4.6937e-7 m3; lognormal variance with pedigree 0.31529, pedigree (1,1,2,1,1)
  for residual material landfill infrastructure
  property cement content 206 kg; name cement
  property fly ash content 69 kg; name fly_ash
  property gravel content 1100 kg; name gravel
  property sand content 910 kg; name sand
  properties: dry mass 2285 kg, water content 0.0538293, wet mass 2408 kg
- diesel, burned in building machine: 0.028614 MJ; lognormal variance with pedigree 0.012675, pedigree (1,1,2,1,1)
  for residual material landfill infrastructure and operation
  properties: heating value, net 1 MJ
- electricity, low voltage: 8.5714e-6 kWh; lognormal variance with pedigree 0.012648, pedigree (1,1,2,1,1)
  for residual material landfill operation
- excavation, hydraulic digger: 0.00030086 m3; lognormal variance with pedigree 0.31529, pedigree (1,1,2,1,1)
  for residual material landfill infrastructure
- excavation, skid-steer loader: 0.00030086 m3; lognormal variance with pedigree 0.31529, pedigree (1,1,2,1,1)
  for residual material landfill infrastructure
- extrusion, plastic pipes: 8.1818e-5 kg; lognormal variance with pedigree 0.31529, pedigree (1,1,2,1,1)
  for residual material landfill infrastructure
- gravel, round: 0.1367 kg; lognormal variance with pedigree 0.31529, pedigree (1,1,2,1,1)
  for residual material landfill infrastructure
  properties: dry mass 1 kg, wet mass 1 kg
- heat, district or industrial, other than natural gas: 0.00092016 MJ; lognormal variance with pedigree 0.012648, pedigree (1,1,2,1,1)
  for residual material landfill operation
  property corresponding fuel use, propane, furnace >100kW 0 MJ; name fuel_use
  properties: heating value, net 1 MJ
  note on corresponding fuel use, propane, furnace >100kW: Lower heating value of the fuel input related to the heat/electricity output, taken directly from ecoinvent v3.0 dataset "heat production, natural gas, at industrial furnace >100kW, GLO 2000".
- pitch: 0.0012857 kg; lognormal variance with pedigree 0.31529, pedigree (1,1,2,1,1)
  for residual material landfill infrastructure
  property calculation property, kg 0 kg; name m_bitumen
  properties: carbon content, fossil 0.83, dry mass 1 kg, heating value, net 28 MJ, wet mass 1 kg
  note on calculation property, kg: Mass output. Defined here for use in the combined production calculations.
- polyethylene, high density, granulate: 0.00024899 kg; lognormal variance with pedigree 0.31529, pedigree (1,1,2,1,1)
  for residual material landfill infrastructure
  properties: carbon content, fossil 0.857143, dry mass 1 kg, heating value, net 42.47 MJ, wet mass 1 kg
- polypropylene, granulate: 8.1981e-7 kg; lognormal variance with pedigree 0.31529, pedigree (1,1,2,1,1)
  for residual material landfill infrastructure
  properties: carbon content, fossil 0.857143, dry mass 1 kg, heating value, net 32.78 MJ, wet mass 1 kg
  note on heating value, net: Value extracted from "treatment of waste polypropylene, open burning"
- polyvinylchloride, bulk polymerised: 8.1981e-7 kg; lognormal variance with pedigree 0.31529, pedigree (1,1,2,1,1)
  for residual material landfill infrastructure
  properties: carbon content, fossil 0.387097, dry mass 1 kg, heating value, net 21.5 MJ, wet mass 1 kg
- reinforcing steel: 2.9923e-5 kg; lognormal variance with pedigree 0.31529, pedigree (1,1,2,1,1)
  for residual material landfill infrastructure
  properties: carbon content, fossil 0.004, dry mass 1 kg, wet mass 1 kg
- sand: 0.00022955 kg; lognormal variance with pedigree 0.31529, pedigree (1,1,2,1,1)
  for residual material landfill infrastructure
  properties: dry mass 1 kg, wet mass 1 kg
- steel, chromium steel 18/8, hot rolled: 1.0384e-5 kg; lognormal variance with pedigree 0.31529, pedigree (1,1,2,1,1)
  for residual material landfill infrastructure
  properties: carbon content, fossil 0.0008, dry mass 1 kg, wet mass 1 kg
- synthetic rubber: 2.7327e-7 kg; lognormal variance with pedigree 0.31529, pedigree (1,1,2,1,1)
  for residual material landfill infrastructure
  properties: carbon content, fossil 0.871949, dry mass 1 kg, heating value, net 26.42 MJ, wet mass 1 kg
- tap water: 0.0063763 kg; lognormal variance with pedigree 0.31529, pedigree (1,1,2,1,1)
  for residual material landfill infrastructure
  properties: carbon content, fossil 0.00178991, dry mass 0.000337476 kg, water content 2962.17, wet mass 1 kg
- waste cement, hydrated: -1 kg; lognormal variance with pedigree 0.004734, pedigree (1,1,1,1,1)
  hydrated cement output for solidification of landfilled residual material
  production volume
    calculated in proportion to reference product waste input to incinerator
  properties: dry mass 1 kg, wet mass 1 kg

## Inputs from nature
- Waste mass, total, placed in landfill [inventory indicator, waste]: 1 kg; lognormal variance with pedigree 0.0002, pedigree (1,1,2,1,1)
  waste mass placed in residual material landfill (for ecoscarcity LCIA only)
- Occupation, construction site [natural resource, land]: 0.00028571 m2*year; lognormal variance with pedigree 0.21182, pedigree (1,1,2,1,1)
  for residual material landfill construction
- Occupation, dump site [natural resource, land]: 0.0017143 m2*year; lognormal variance with pedigree 0.21182, pedigree (1,1,2,1,1)
  for residual material landfill area during operation
- Occupation, shrub land, sclerophyllous [natural resource, land]: 0.00028571 m2*year; lognormal variance with pedigree 0.21182, pedigree (1,1,2,1,1)
  for residual material landfill area initial aftercare recultivation
- Occupation, traffic area, road network [natural resource, land]: 0.0025714 m2*year; lognormal variance with pedigree 0.21182, pedigree (1,1,2,1,1)
  for access road of residual material landfill during construction, operation, and aftercare
- Transformation, from dump site [natural resource, land]: 5.7143e-5 m2; lognormal variance with pedigree 0.53191, pedigree (1,1,2,1,1)
  for residual material landfill area initial aftercare recultivation
- Transformation, from pasture, man made [natural resource, land]: 9.1429e-5 m2; lognormal variance with pedigree 0.53191, pedigree (1,1,2,1,1)
  for residual material landfill and access road
- Transformation, from shrub land, sclerophyllous [natural resource, land]: 5.7143e-5 m2; lognormal variance with pedigree 0.53191, pedigree (1,1,2,1,1)
  for residual material landfill area initial aftercare recultivation
- Transformation, from traffic area, road network [natural resource, land]: 3.4286e-5 m2; lognormal variance with pedigree 0.53191, pedigree (1,1,2,1,1)
  for recultivation of access road of residual material landfill after aftercare period
- Transformation, to dump site [natural resource, land]: 5.7143e-5 m2; lognormal variance with pedigree 0.53191, pedigree (1,1,2,1,1)
  for residual material landfill area
- Transformation, to forest, unspecified [natural resource, land]: 5.7143e-5 m2; lognormal variance with pedigree 0.53191, pedigree (1,1,2,1,1)
  for residual material landfill area aftercare recultivation
- Transformation, to pasture, man made [natural resource, land]: 3.4286e-5 m2; lognormal variance with pedigree 0.53191, pedigree (1,1,2,1,1)
  for recultivation of landfill and access road of residual material landfill after aftercare period
- Transformation, to shrub land, sclerophyllous [natural resource, land]: 5.7143e-5 m2; lognormal variance with pedigree 0.53191, pedigree (1,1,2,1,1)
  for residual material landfill area initial aftercare recultivation
- Transformation, to traffic area, road network [natural resource, land]: 3.4286e-5 m2; lognormal variance with pedigree 0.53191, pedigree (1,1,2,1,1)
  for access road of residual material landfill

## Emissions to nature
- Heat, waste [air, urban air close to ground]: 3.0857e-5 MJ; lognormal variance with pedigree 0.012648, pedigree (1,1,2,1,1)
  from electricity consumption in residual material landfill operation
- Hazardous waste disposed [inventory indicator, waste]: 1 kg; lognormal variance with pedigree 0.0002, pedigree (1,1,2,1,1)
  EN15804 waste mass in residual material landfill
- Aluminium III [water, ground-, long-term]: 0.0047223 kg; lognormal variance with pedigree 0.60078, pedigree (1,1,2,1,1)
  emissions to groundwater in residual material landfill
- Aluminium III [water, surface water]: 7.8837e-6 kg; lognormal variance with pedigree 1.0547, pedigree (1,1,2,1,1)
  emissions to surface water in residual material landfill
- Calcium II [water, ground-, long-term]: 0.064352 kg; lognormal variance with pedigree 0.80714, pedigree (1,1,2,1,1)
  emissions to groundwater in residual material landfill
- Calcium II [water, surface water]: 0.00010743 kg; lognormal variance with pedigree 0.84369, pedigree (1,1,2,1,1)
  emissions to surface water in residual material landfill
- Chromium VI [water, ground-, long-term]: 0.0034695 kg; lognormal variance with pedigree 0.48513, pedigree (1,1,2,1,1)
  emissions to groundwater in residual material landfill
- Chromium VI [water, surface water]: 1.3659e-5 kg; lognormal variance with pedigree 0.97603, pedigree (1,1,2,1,1)
  emissions to surface water in residual material landfill
- Iron ion [water, ground-, long-term]: 0.00072022 kg; lognormal variance with pedigree 1.922, pedigree (1,1,2,1,1)
  emissions to groundwater in residual material landfill
- Iron ion [water, surface water]: 1.2024e-6 kg; lognormal variance with pedigree 1.3594, pedigree (1,1,2,1,1)
  emissions to surface water in residual material landfill
- Magnesium [water, ground-, long-term]: 0.0034996 kg; lognormal variance with pedigree 1.1229, pedigree (1,1,2,1,1)
  emissions to groundwater in residual material landfill
- Magnesium [water, surface water]: 5.8425e-6 kg; lognormal variance with pedigree 1.1024, pedigree (1,1,2,1,1)
  emissions to surface water in residual material landfill
- Manganese II [water, ground-, long-term]: 0.00021489 kg; lognormal variance with pedigree 1.922, pedigree (1,1,2,1,1)
  emissions to groundwater in residual material landfill
- Manganese II [water, surface water]: 3.5874e-7 kg; lognormal variance with pedigree 1.4594, pedigree (1,1,2,1,1)
  emissions to surface water in residual material landfill
- Phosphate [water, ground-, long-term]: 0.012577 kg; lognormal variance with pedigree 1.3247, pedigree (1,1,2,1,1)
  emissions to groundwater in residual material landfill
- Phosphate [water, surface water]: 2.0997e-5 kg; lognormal variance with pedigree 1.0904, pedigree (1,1,2,1,1)
  emissions to surface water in residual material landfill
- Silicon [water, ground-, long-term]: 0.083606 kg; lognormal variance with pedigree 0.13751, pedigree (1,1,2,1,1)
  emissions to groundwater in residual material landfill
- Silicon [water, surface water]: 0.00024593 kg; lognormal variance with pedigree 0.65261, pedigree (1,1,2,1,1)
  emissions to surface water in residual material landfill
- Sulfate [water, ground-, long-term]: 0.011878 kg; lognormal variance with pedigree 0.47511, pedigree (1,1,2,1,1)
  emissions to groundwater in residual material landfill
- Sulfate [water, surface water]: 0.00062786 kg; lognormal variance with pedigree 0.66048, pedigree (1,1,2,1,1)
  emissions to surface water in residual material landfill
