# heat production, softwood chips from forest, at furnace 300kW, state-of-the-art 2014

Dataset: EcoSpold 2, unit process
Geography: CH
Time period: 2014-01-01 to 2023-12-31
Technology level: modern
Classification: ISIC rev.4 ecoinvent: 3530:Steam and air conditioning supply
Classification: EcoSpold01Categories: wood energy/heating systems
Synonyms: automatic wood heating system
Scenario: Business-as-Usual
System model: Allocation, cut-off by classification
Share of production covered: 100 %
Generated by: Christian Bauer
Published in: Bauer, C. 2007
Database: ecoinvent
isCopyrightProtected: true
accessRestrictedTo: 1

## General comment
This activity represents the combustion of natural wood chips from forest in Switzerland in new (=installed in 2014) boilers. Equipped with an industrila electrostatic precipitator in order to comply with PM emission regulation. Characteristics of the of wood chips to be burned: Dry wood density 650kg/m3; Energy content (LHV, oven-dry) 19.1 MJ/kg. The humidity of the wood chips when burned is assumed to be in an accurate range for appropriate combustion conditions, which is achieved after some weeks of natural drying in the storage. Air emission factors as well as the boiler efficiency represent average annual operation including start and stop (warm-up and shut-down). Therefore, emission data will be higher and efficiency will be lower than rated values provided by manufacturers. The inventory shall be considered as being representative also for boilers with nominal capacities in the approximate range of 70 kW to 500 kW.

## Included activities start
from delivery of wood chips

## Included activities end
This activity describes the combustion of natural wood chips from forest in new (=installed in 2014) boilers. Included are the infrastructure, the wood requirements (wood chips from forest), the emissions to air, the electricity needed for operation, and the disposal of the ashes.

## Geography
Represents average Swiss conditions and could be used for Europe as well.

## Technology
Modern boiler technology available on the Swiss market, installed in 2014.

## Time period
Key emission factors PM, CO, NMVOC, CH4, NOx as well as the average annual efficiency have been updated using the latest available information. Other emission data (which hardly depend on the combustion technology) are from the second half of the 1990´s.

## Parameters
- scaling factor: 1.25 dimensionless; name scaling_factor; = 1/0.8; lognormal variance with pedigree 0.0016, pedigree (2,1,1,1,1)
  The scaling factor corresponds to the inverse of the average annual efficiency of the heating system, including start/stop (warm up and cool down). Therefore, this efficiency will be lower than figures provided by manufacturers. The estimated value was provided by T.Nussbaumer, Verenum, and represents newly (=in 2014) installed boiler in this size category in Switzerland.

## Reference product
- heat, district or industrial, other than natural gas: 1 MJ; = 0.8* scaling_factor; source Thomas Nussbaumer 2014; By-product classification allocatable product; CPC 17300: Steam and hot water
  The numbers used in the mathematical relation refer to the input of one MJ of fuel with the heat output depending on the efficiency of the furnace. Using the "scaling factor" (inverse of the efficiency) allows for scaling of the amount of the reference product to 1.
  EcoSpold01Location=CH
  production volume 1 MJ; name heat_apv
    Set to zero in order to obtain the correct share of heat from wood on the market for heat, district or industrial, other than natural gas in Switzerland.
    //Original Comment:
    Estimation: useful energy in Switzerland in 2012 in furnace categories12a and 14a; 20% of APV produced in "modern technology" boilers; 34% of wood chips used in 2012 are softwood chips.
    3.14e9*0.2*0.34
  property price 0.0106 EUR2005
    Average European district heat price from Ecoheatcool and Euroheat 2005-2006, Ecoheat Work package 1: The European heat market. Final report. 10.6 EUR/GJ i s the price of district heat. http://www.solarthermalworld.org/files/Ecoheatcool%20WP1%20Web.pdf?download
  properties: Corresponding fuel use 1.21951 MJ, carbon allocation 0 kg, carbon content 0, heating value, net 1 MJ

## Inputs from technosphere
- dust collector, electrostatic precipitator, for industrial use: 2.31481e-8 unit; = 1/(300*20*2000*3.6); lognormal variance with pedigree 0.4706, pedigree (2,1,5,1,1)
  estimation based on 20a lifetime, 2000h/a, 300kW capacity
- electricity, low voltage: 0.0052125 kWh; = 0.00417 * scaling_factor; source Bauer, C. 2007; lognormal variance with pedigree 0.4706, pedigree (2,1,5,1,1)
  literature. Original value [per MJ fuel input] was scaled to 1 MJ reference product output
  EcoSpold01Location=CH
- furnace, wood chips, with silo, 300kW: 2.31481e-8 unit; = 1/(300*20*2000*3.6); lognormal variance with pedigree 0.4706, pedigree (2,1,5,1,1)
  estimation based on 20a lifetime, 2000h/a, 300kW capacity
- wood ash mixture, pure: -0.000595 kg; name wood_ash; = 0.000476 * scaling_factor; source Bauer, C. 2007; lognormal variance with pedigree 0.4386, pedigree (2,1,4,1,1)
  EcoSpold01Location=CH
  literature. Original value [per MJ fuel input] was scaled to 1 MJ reference product output
  production volume; = heat_apv*wood_ash
    Calculated from the production volume of wood chips, from forest, softwood, burned in furnace 300kW in proportion to the respective output amounts.
  properties: carbon content, non-fossil 0.012, dry mass 1 kg, wet mass 1 kg
- wood chips, wet, measured as dry mass: 0.065445 kg; = 1/19.1 * scaling_factor; lognormal variance with pedigree 0.4706, pedigree (2,1,5,1,1)
  EcoSpold01Location=RER
  uncertainty on energy and water content, and bulk density
  Amount was scaled to the amount of reference product.
  properties: carbon content, non-fossil 0.494, dry mass 1 kg, heating value, net 10.84 MJ, water content 1.4, wet mass 2.4 kg
  note on carbon content, non-fossil: C content of dry mass is 0.494 kgC/kg dry wood (ecoinvent v2.2 report 9).
  note on heating value, net: Value based on the dataset 'softwood forestry, mixed species, sustainable forest management'

## Emissions to nature
- Acetaldehyde [air, urban air close to ground]: 7.625e-8 kg; = 6.1E-08 * scaling_factor; source Bauer, C. 2007; lognormal variance with pedigree 0.4706, pedigree (2,1,5,1,1)
  literature. Original value [per MJ fuel input] was scaled to 1 MJ reference product output
- Ammonia [air, urban air close to ground]: 2.1625e-6 kg; = 1.73E-06 * scaling_factor; source Bauer, C. 2007; lognormal variance with pedigree 0.4706, pedigree (2,1,5,1,1)
  literature. Original value [per MJ fuel input] was scaled to 1 MJ reference product output
- Arsenic ion [air, urban air close to ground]: 1.25e-9 kg; = 1E-09 * scaling_factor; source Bauer, C. 2007; lognormal variance with pedigree 0.4706, pedigree (2,1,5,1,1)
  literature. Original value [per MJ fuel input] was scaled to 1 MJ reference product output
- Benzene [air, urban air close to ground]: 1.1375e-6 kg; = 9.1E-07 * scaling_factor; source Bauer, C. 2007; lognormal variance with pedigree 0.4706, pedigree (2,1,5,1,1)
  literature. Original value [per MJ fuel input] was scaled to 1 MJ reference product output
- Benzo(a)pyrene [air, urban air close to ground]: 6.25e-10 kg; = 5E-10 * scaling_factor; source Bauer, C. 2007; lognormal variance with pedigree 0.4706, pedigree (2,1,5,1,1)
  literature. Original value [per MJ fuel input] was scaled to 1 MJ reference product output
- Bromine [air, urban air close to ground]: 7.5e-8 kg; = 6E-08 * scaling_factor; source Bauer, C. 2007; lognormal variance with pedigree 0.4706, pedigree (2,1,5,1,1)
  literature. Original value [per MJ fuel input] was scaled to 1 MJ reference product output
- Cadmium II [air, urban air close to ground]: 8.75e-10 kg; = 7E-10 * scaling_factor; source Bauer, C. 2007; lognormal variance with pedigree 0.4706, pedigree (2,1,5,1,1)
  literature. Original value [per MJ fuel input] was scaled to 1 MJ reference product output
- Calcium II [air, urban air close to ground]: 7.3125e-6 kg; = 5.85E-06 * scaling_factor; source Bauer, C. 2007; lognormal variance with pedigree 0.4706, pedigree (2,1,5,1,1)
  literature. Original value [per MJ fuel input] was scaled to 1 MJ reference product output
- Carbon dioxide, non-fossil [air, urban air close to ground]: 0.1275 kg; = 0.102 * scaling_factor; source Bauer, C. 2007; lognormal variance with pedigree 0.4706, pedigree (2,1,5,1,1)
  literature. Original value [per MJ fuel input] was scaled to 1 MJ reference product output
- Carbon monoxide, non-fossil [air, urban air close to ground]: 0.00046875 kg; = 3.75E-04 * scaling_factor; source Thomas Nussbaumer 2014; lognormal variance with pedigree 0.4386, pedigree (2,1,4,1,1)
  expert estimation (see source)
- Chlorine [air, urban air close to ground]: 2.25e-7 kg; = 1.8E-07 * scaling_factor; source Bauer, C. 2007; lognormal variance with pedigree 0.4706, pedigree (2,1,5,1,1)
  literature. Original value [per MJ fuel input] was scaled to 1 MJ reference product output
- Chromium III [air, urban air close to ground]: 4.95e-9 kg; = 3.96E-09 * scaling_factor; source Bauer, C. 2007; lognormal variance with pedigree 0.4706, pedigree (2,1,5,1,1)
  literature. Original value [per MJ fuel input] was scaled to 1 MJ reference product output
- Chromium VI [air, urban air close to ground]: 5e-11 kg; = 4E-11 * scaling_factor; source Bauer, C. 2007; lognormal variance with pedigree 0.4706, pedigree (2,1,5,1,1)
  literature. Original value [per MJ fuel input] was scaled to 1 MJ reference product output
- Copper ion [air, urban air close to ground]: 2.75e-8 kg; = 2.2E-08 * scaling_factor; source Bauer, C. 2007; lognormal variance with pedigree 0.4706, pedigree (2,1,5,1,1)
  literature. Original value [per MJ fuel input] was scaled to 1 MJ reference product output
- Dinitrogen monoxide [air, urban air close to ground]: 3.125e-6 kg; = 2.5E-06 * scaling_factor; source Bauer, C. 2007; lognormal variance with pedigree 0.4706, pedigree (2,1,5,1,1)
  literature. Original value [per MJ fuel input] was scaled to 1 MJ reference product output
- Dioxins, measured as 2,3,7,8-tetrachlorodibenzo-p-dioxin [air, urban air close to ground]: 3.875e-14 kg; = 3.1E-14 * scaling_factor; source Bauer, C. 2007; lognormal variance with pedigree 0.4706, pedigree (2,1,5,1,1)
  literature. Original value [per MJ fuel input] was scaled to 1 MJ reference product output
- Ethyl benzene [air, urban air close to ground]: 3.75e-8 kg; = 3E-08 * scaling_factor; source Bauer, C. 2007; lognormal variance with pedigree 0.4706, pedigree (2,1,5,1,1)
  literature. Original value [per MJ fuel input] was scaled to 1 MJ reference product output
- Fluorine [air, urban air close to ground]: 6.25e-8 kg; = 5E-08 * scaling_factor; source Bauer, C. 2007; lognormal variance with pedigree 0.4706, pedigree (2,1,5,1,1)
  literature. Original value [per MJ fuel input] was scaled to 1 MJ reference product output
- Formaldehyde [air, urban air close to ground]: 1.625e-7 kg; = 1.3E-07 * scaling_factor; source Bauer, C. 2007; lognormal variance with pedigree 0.4706, pedigree (2,1,5,1,1)
  literature. Original value [per MJ fuel input] was scaled to 1 MJ reference product output
- Hexachlorobenzene [air, urban air close to ground]: 9e-15 kg; = 7.2E-15 * scaling_factor; source Bauer, C. 2007; lognormal variance with pedigree 0.4706, pedigree (2,1,5,1,1)
  literature. Original value [per MJ fuel input] was scaled to 1 MJ reference product output
- Hydrocarbons, aliphatic, alkanes, unspecified [air, urban air close to ground]: 1.1375e-6 kg; = 9.1E-07 * scaling_factor; source Bauer, C. 2007; lognormal variance with pedigree 0.4706, pedigree (2,1,5,1,1)
  literature. Original value [per MJ fuel input] was scaled to 1 MJ reference product output
- Hydrocarbons, aliphatic, unsaturated [air, urban air close to ground]: 3.875e-6 kg; = 3.1E-06 * scaling_factor; source Bauer, C. 2007; lognormal variance with pedigree 0.4706, pedigree (2,1,5,1,1)
  literature. Original value [per MJ fuel input] was scaled to 1 MJ reference product output
- Lead II [air, urban air close to ground]: 3.125e-8 kg; = 2.5E-08 * scaling_factor; source Bauer, C. 2007; lognormal variance with pedigree 0.4706, pedigree (2,1,5,1,1)
  literature. Original value [per MJ fuel input] was scaled to 1 MJ reference product output
- Magnesium [air, urban air close to ground]: 4.5e-7 kg; = 3.6E-07 * scaling_factor; source Bauer, C. 2007; lognormal variance with pedigree 0.4706, pedigree (2,1,5,1,1)
  literature. Original value [per MJ fuel input] was scaled to 1 MJ reference product output
- Manganese II [air, urban air close to ground]: 2.125e-7 kg; = 1.7E-07 * scaling_factor; source Bauer, C. 2007; lognormal variance with pedigree 0.4706, pedigree (2,1,5,1,1)
  literature. Original value [per MJ fuel input] was scaled to 1 MJ reference product output
- Mercury II [air, urban air close to ground]: 3.75e-10 kg; = 3E-10 * scaling_factor; source Bauer, C. 2007; lognormal variance with pedigree 0.4706, pedigree (2,1,5,1,1)
  literature. Original value [per MJ fuel input] was scaled to 1 MJ reference product output
- Methane, non-fossil [air, urban air close to ground]: 4.875e-6 kg; = 3.9E-06 * scaling_factor; source Thomas Nussbaumer 2014; lognormal variance with pedigree 0.4386, pedigree (2,1,4,1,1)
  expert estimation (see source)
- NMVOC, non-methane volatile organic compounds [air, urban air close to ground]: 1.1375e-5 kg; = 9.1E-06 * scaling_factor; source Thomas Nussbaumer 2014; lognormal variance with pedigree 0.4386, pedigree (2,1,4,1,1)
  expert estimation (see source)
- Nickel II [air, urban air close to ground]: 7.5e-9 kg; = 6E-09 * scaling_factor; source Bauer, C. 2007; lognormal variance with pedigree 0.4706, pedigree (2,1,5,1,1)
  literature. Original value [per MJ fuel input] was scaled to 1 MJ reference product output
- Nitrogen oxides [air, urban air close to ground]: 0.000125 kg; = 1e-4* scaling_factor; source Thomas Nussbaumer 2014; lognormal variance with pedigree 0.4386, pedigree (2,1,4,1,1)
  expert estimation (see source)
- PAH, polycyclic aromatic hydrocarbons [air, urban air close to ground]: 1.3875e-8 kg; = 1.11E-08 * scaling_factor; source Bauer, C. 2007; lognormal variance with pedigree 0.4706, pedigree (2,1,5,1,1)
  literature. Original value [per MJ fuel input] was scaled to 1 MJ reference product output
- Particulate Matter, < 2.5 um [air, urban air close to ground]: 2.8125e-5 kg; = 22.5E-06 * scaling_factor; source Thomas Nussbaumer 2014; lognormal variance with pedigree 0.4386, pedigree (2,1,4,1,1)
  expert estimation (see source)
- Particulate Matter, > 2.5 um and < 10um [air, urban air close to ground]: 1.625e-6 kg; = 1.3E-06 * scaling_factor; source Thomas Nussbaumer 2014; lognormal variance with pedigree 0.4386, pedigree (2,1,4,1,1)
  expert estimation (see source)
- Pentachlorophenol [air, urban air close to ground]: 1.0125e-11 kg; = 8.1E-12 * scaling_factor; source Bauer, C. 2007; lognormal variance with pedigree 0.4706, pedigree (2,1,5,1,1)
  literature. Original value [per MJ fuel input] was scaled to 1 MJ reference product output
- Phosphorus [air, urban air close to ground]: 3.75e-7 kg; = 3E-07 * scaling_factor; source Bauer, C. 2007; lognormal variance with pedigree 0.4706, pedigree (2,1,5,1,1)
  literature. Original value [per MJ fuel input] was scaled to 1 MJ reference product output
- Potassium I [air, urban air close to ground]: 2.925e-5 kg; = 2.34E-05 * scaling_factor; source Bauer, C. 2007; lognormal variance with pedigree 0.4706, pedigree (2,1,5,1,1)
  literature. Original value [per MJ fuel input] was scaled to 1 MJ reference product output
- Sodium I [air, urban air close to ground]: 1.625e-6 kg; = 1.3E-06 * scaling_factor; source Bauer, C. 2007; lognormal variance with pedigree 0.4706, pedigree (2,1,5,1,1)
  literature. Original value [per MJ fuel input] was scaled to 1 MJ reference product output
- Sulfur dioxide [air, urban air close to ground]: 3.125e-6 kg; = 2.5E-06 * scaling_factor; source Bauer, C. 2007; lognormal variance with pedigree 0.4706, pedigree (2,1,5,1,1)
  literature. Original value [per MJ fuel input] was scaled to 1 MJ reference product output
- Toluene [air, urban air close to ground]: 3.75e-7 kg; = 3E-07 * scaling_factor; source Bauer, C. 2007; lognormal variance with pedigree 0.4706, pedigree (2,1,5,1,1)
  literature. Original value [per MJ fuel input] was scaled to 1 MJ reference product output
- Water [air, urban air close to ground]: 0.0001 m3; lognormal variance with pedigree 0.0143, pedigree (2,2,4,1,2)
  introduced in order to ensure a correct water balance; the quantity represents both H2O emissions from combustion as well as from nytural wood chips drying in the storage silo
- Zinc II [air, urban air close to ground]: 3.75e-7 kg; = 3E-07 * scaling_factor; source Bauer, C. 2007; lognormal variance with pedigree 0.4706, pedigree (2,1,5,1,1)
  literature. Original value [per MJ fuel input] was scaled to 1 MJ reference product output
- m-Xylene [air, urban air close to ground]: 1.5e-7 kg; = 1.2E-07 * scaling_factor; source Bauer, C. 2007; lognormal variance with pedigree 0.4706, pedigree (2,1,5,1,1)
  literature. Original value [per MJ fuel input] was scaled to 1 MJ reference product output

## Sampling procedure
literature
