# maize silage production

Dataset: EcoSpold 2, unit process
Geography: ZA
Time period: 2014-01-01 to 2023-12-31
Technology level: current
Classification: ISIC rev.4 ecoinvent: 0119:Growing of other non-perennial crops
Synonyms: Zea mays L.; corn; corn silage
Scenario: Business-as-Usual
System model: Allocation, cut-off by classification
Generated by: Matthias Stucki
Published in: de Kock, L. 2017
Database: ecoinvent
isCopyrightProtected: false
accessRestrictedTo: 1

## General comment
This dataset represents the production of 1 kg of maize silage (fresh matter) for feed production. This dataset represents both rainfed and irrigated maize production: 89% of the production area is rainfed and the remaining 11% is produced under irrigation. The average weighted yield is 21.35 t/ha*a at a moisture content at storage of 63%, based on yields from 2007 and under the assumption that the yields quoted in the Census of commercial agriculture refer to dry matter yields (Source: Stats SA (2009) Census of commercial agriculture 2007. Available at: http://www.statssa.gov.za/publications/Report-11-02-01/Report-11-02-012007.pdf)
The inputs of seeds, fertilisers, pesticides, silage additives, and irrigation water (weighted average of irrigated and rainfed production) are considered. Compost is applied as organic fertiliser and total mineral N-P2O5-K2O application is 30-12-2 kg/ha*a. Cultivation steps as mowing, tillage, sowing, fertilising, application of pesticides and harvesting are considered. Transport of the harvested yield from the field to the farm (4.5 km) are included. Direct field emissions are calculated.
Land use change is not accounted in this dataset as maize area harvested in South Africa is shrinking during the period of the last 20 years. Data originate from FAOSTAT.

## Included activities start
This activity starts with the harvest of the previous crop.

## Included activities end
This activity ends after 8.42 months storage in a silage bunker.

## Geography
The inventory is modelled for South Africa

## Technology
Cultivation of silage maize

## Parameters
- LUC_crop_specific: 1 dimensionless
  This parameter allows to switch between a 'crop specific' and a 'country specific' approach when calculating the LUC of a crop. By default, the chosen approach is 'crop specific', so the value of the parameter is 1. If you want to apply a 'country specific' approach, turn the parameter to 0.
- compost application: 0.25 ha; name compost_application; lognormal variance with pedigree 0.0106, pedigree (3,5,1,1,1)
  Measured value. Average value, compost is applied by 25% of farmers once a year. Data from interviews with four South African maize silage producers in Gauteng, Mpumalanga, Free State and Limpopo.
- fertiliser application: 2.75 ha; name fertiliser_application; lognormal variance with pedigree 0.0106, pedigree (3,5,1,1,1)
  Measured value. Average value, fertiliser is applied between 0 and 4 times per year depending on the farm. Data from interviews with four South African maize silage producers in Gauteng, Mpumalanga, Free State and Limpopo.
- irrigation water fraction to air: 0.72 dimensionless; name fraction_iw_to_air; lognormal variance with pedigree 0.31, pedigree (3,5,1,1,1)
  Literature value: Siebert, (2010); Vionnet, S., Quantis Water Database - Technical Report (2012)
- irrigation water fraction to ground water: 0.8 dimensionless; name fraction_iw_to_ground_water; lognormal variance with pedigree 0.31, pedigree (3,5,1,1,1)
  Fraction of irrigation water emitted to ground water
- irrigation water fracton to surface water: 0.2 dimensionless; name fraction_IW_to_surface_water; lognormal variance with pedigree 0.31, pedigree (3,5,1,1,1)
  Fraction of irrigation water emitted to surface water
- maize yield: 21355.2 kg/ha.yr; name yield; lognormal variance with pedigree 0.0156, pedigree (1,5,3,1,2)
  Weighted average yield (of rainfed and irrigated silage maize): 21.36 t/ha*a, based on yield data from 2007 from Stats SA (2009), under the assumption that the yields quoted refer to dry matter. Fresh matter yields were calculated based on a water content of 37.1%. Source: Source: Stats SA (2009) Census of commercial agriculture 2007. Available at: http://www.statssa.gov.za/publications/Report-11-02-01/Report-11-02-012007.pdf
- monoammonium phosphate, as N: 4.8 kg N/ha; name Monoammonium_phosphate; lognormal variance with pedigree 0.0106, pedigree (3,5,1,1,1)
  Total N in kg/ha*a from monoammonium phosphate
- monoammonium phosphate, as P2O5: 10.4 kg P2O5/ha; name monoammonium_phospahte_p; lognormal variance with pedigree 0.0106, pedigree (3,5,1,1,1)
  Total P in kg/ha*a from monoammonium phosphate
- nitrogen fertiliser: 12.4667 kg N/ha; name Nfertiliser; lognormal variance with pedigree 0.0106, pedigree (3,5,1,1,1)
  Total N in kg/ha*a from other nitrogen fertilisers
- pesticides unspecified: 1.72658 kg; name pesticides_unspecified; lognormal variance with pedigree 0.0106, pedigree (3,5,1,1,1)
  Sum of all pesticides for which no specific datase exists: benoxacor, thiocarbamate, dichlormid, chlorantraniliprole, pescidies with unknown active ingredients
- phosphate fertiliser: 1.5 kg P2O5/ha; name Pfertiliser; lognormal variance with pedigree 0.0106, pedigree (3,5,1,1,1)
  Total P in kg/ha*a from other phosphate fertilisers
- thiacloprid: 151.2 kg; lognormal variance with pedigree 0.0106, pedigree (3,5,1,1,1)
  Total applied kg/ha*a

## Reference product
- maize silage: 1 kg; By-product classification allocatable product; CPC 01911: Maize for forage and silage; HS2017 100510: Cereals; maize (corn), seed
  Maize silage production, South African production, rainfed (89% of production area) and irrigated (11% of production area).
  production volume 5.71929e8 kg
    Total production, irrigated and rainfed silage maize, data from 2007.
  property price 0.0349023 EUR2005
    Average prices in EUR were estimated from a series of prices in BRL from 2006 to 2015 that were considered by Embrapa Pecus project (https://www.embrapa.br/pecuaria-sudeste/busca-de-projetos/-/projeto/38213/projeto-da-rede-pecus), the same source of data used to build the beef cattle datasets for BR region.
  properties: carbon allocation 0.167055 kg, carbon content 0.4773, carbon content, fossil 0, carbon content, non-fossil 0.4773, dry mass 0.35 kg, energy content 6.6325 MJ, water content 1.85714, water in wet mass 0.65 kg, wet mass 1 kg

## Inputs from technosphere
- [thio]carbamate-compound: 6.7431e-5 kg; = 1.44000000000000000/ yield; lognormal variance with pedigree 0.018, pedigree (3,5,3,1,1)
  Measured value. References: Active ingredient thiocarbamate. Data from interviews with three South African maize silage producers in Gauteng and Limpopo
  properties: carbon content, fossil 0.626349, dry mass 1 kg, wet mass 1 kg
- ammonium sulfate: 0.00033075 kg; = 7.06321578124212000/ yield; lognormal variance with pedigree 0.0126, pedigree (3,5,3,1,1)
  Measured value. References: Data from interviews with three South African maize silage producers in Gauteng, Mpumalanga and Limpopo
  properties: dry mass 1 kg, wet mass 1 kg
- anthranilic acid: 7.02406e-7 kg; = 0.01500000000000000/ yield; lognormal variance with pedigree 0.0126, pedigree (3,5,3,1,1)
  Measured value. References: Active ingredient chlorantraniliprole. Data from interviews with three South African maize silage producers in Gauteng and Limpopo
  properties: carbon content, fossil 0.613083, dry mass 1 kg, heating value, net 24.76 MJ, wet mass 1 kg
- application of plant protection product, by field sprayer: 0.000257549 ha; = 5.50000000000000000/ yield; lognormal variance with pedigree 0.127964, pedigree (3,5,3,1,1)
  Measured value. Average value, between 0-13 pesticide applications per year, depending on the farm. Data from interviews with four South African maize silage producers in Gauteng, Mpumalanga, Free State and Limpopo
- atrazine: 3.19501e-5 kg; = 0.68230000000000000/ yield; lognormal variance with pedigree 0.0126, pedigree (3,5,3,1,1)
  Measured value. References: Data from interviews with three South African maize silage producers in Gauteng and Limpopo
  properties: carbon content, fossil 0.446512, dry mass 1 kg, wet mass 1 kg
- boron trifluoride: 7.34353e-8 kg; = 0.00156822386679001/ yield; lognormal variance with pedigree 0.0126, pedigree (3,5,3,1,1)
  (same comment as for ammonium sulfate)
  properties: dry mass 1 kg, wet mass 1 kg
- chopping, maize: 4.68271e-5 ha; = 1.00000000000000000/ yield; lognormal variance with pedigree 0.0126, pedigree (3,5,3,1,1)
  Measured value. once per year. Data from interviews with four South African maize silage producers in Gauteng, Mpumalanga, Free State and Limpopo
- combine harvesting: 4.68271e-5 ha; = 1.00000000000000000/ yield; lognormal variance with pedigree 0.127577, pedigree (3,5,3,1,1)
  (same comment as for chopping, maize)
- compost: 0.109263 kg; = 2333.33333333333000000/ yield; lognormal variance with pedigree 0.0126, pedigree (3,5,3,1,1)
  (same comment as for ammonium sulfate)
  properties: cadmium content 3.6e-7, carbon content, non-fossil 0.183645, chromium content 2.23e-5, copper content 5.77e-5, dry mass 0.5 kg, lead content 4.9e-5, mercury content 1.2e-7, nickel content 1.63e-5, nitrogen content 0.014, phosphorus content 0.0035, potassium content 0.01, water content 1, wet mass 1 kg, zinc content 0.000184
- fertilising, by broadcaster: 0.000140481 ha; = (compost_application+ fertiliser_application)/ yield; lognormal variance with pedigree 0.127577, pedigree (3,5,3,1,1)
  Measured value: combined compost and fertiliser applications. Average value, maximum of 4 fertiliser applications are carried out per year. Data from interviews with four South African maize silage producers in Gauteng, Mpumalanga, Free State and Limpopo. Average value, maximum of 1 compost application per year. Data from interviews with four South African maize silage producers in Gauteng, Mpumalanga, Free State and Limpopo
- gypsum, mineral: 7.80451e-6 kg; = 0.16666666666666700/ yield; lognormal variance with pedigree 0.0066, pedigree (3,4,3,1,1)
  (same comment as for ammonium sulfate)
  properties: dry mass 1 kg, wet mass 1 kg
- inorganic nitrogen fertiliser, as N: 0.000808547 kg; = (Monoammonium_phosphate+ Nfertiliser)/ yield; lognormal variance with pedigree 0.127577, pedigree (3,5,3,1,1)
  Measured value. References: Data from interviews with three South African maize silage producers in Gauteng, Mpumalanga and Limpopo. N from monoammonium phosphate and N fertilisers
  properties: dry mass 1 kg, wet mass 1 kg
- inorganic phosphorus fertiliser, as P2O5: 0.000557242 kg; = ( monoammonium_phospahte_p+ Pfertiliser)/ yield; lognormal variance with pedigree 0.0126, pedigree (3,5,3,1,1)
  Measured value. References: Data from interviews with three South African maize silage producers in Gauteng, Mpumalanga and Limpopo. Phosphate from monoammonium phosphate and P fertilisers
  properties: dry mass 1 kg, wet mass 1 kg
- inorganic potassium fertiliser, as K2O: 9.05323e-5 kg; = 1.93333333333333000/ yield; lognormal variance with pedigree 0.0126, pedigree (3,5,3,1,1)
  (same comment as for ammonium sulfate)
  properties: dry mass 1 kg, wet mass 1 kg
- irrigation: 0.0374909 m3; = 800.62547791876800000/ yield; lognormal variance with pedigree 0.312, pedigree (3,5,3,1,1)
  Measured value. Weighted average: 11% of the total production area is irrigated with centre pivot irrigation systems, using groundwater. Average water consumption on irrigated land: 7248 m3/ha/a. The remaining 89% is rainfed.
  Further references: Data from interviews with two South African maize silage producers in Mpumalanga and Limpopo.
  properties: dry mass 0.11 kg, water content 9089.91, wet mass 1000 kg
- lime: 3.1218e-5 kg; = 0.66666666666666700/ yield; lognormal variance with pedigree 0.0126, pedigree (3,5,3,1,1)
  (same comment as for ammonium sulfate)
  properties: carbon content, fossil 0.120005, dry mass 1 kg, wet mass 1 kg
- magnesium oxide: 1.2947e-8 kg; = 0.00027648631968731/ yield; lognormal variance with pedigree 0.0126, pedigree (3,5,3,1,1)
  (same comment as for ammonium sulfate)
  properties: dry mass 1 kg, wet mass 1 kg
- maize seed, for sowing: 0.00102395 kg; name maize_seed_sowing; = 21.86666666666670000/ yield; lognormal variance with pedigree 0.0126, pedigree (3,5,3,1,1)
  Measured value. References: Data from interviews with two South African maize silage producers in Mpumalanga and Gauteng
  property carbon content, fossil 0; name maize_seed_sowing_C_content_fossil
  property carbon content, non-fossil 0.45263; name maize_seed_sowing_C_content_non_fossil
  property dry mass 0.88 kg; name maize_seed_sowing_DM; = maize_seed_sowing_WM- maize_seed_sowing_WWM
  property water content 0.136364; name maize_seed_sowing_water_content; = maize_seed_sowing_WWM/ maize_seed_sowing_DM
  property water in wet mass 0.12 kg; name maize_seed_sowing_WWM
  property wet mass 1 kg; name maize_seed_sowing_WM
  note on carbon content, non-fossil: biogene carbon content on a dry matter basis; Composition data obtained from Corn Grain Whole, in (http://beefmagazine.com/images/2009%20feed%20table.pdf). First, composition data were refered to 1 kg dry mass. Then, C-contents were calculated considering a C-content/dry mass of 44% in carbohydrates (including fibres), 53% in proteins and 75% in fats. All data from ecoinvent report, n 15a, pg 40, except C-content in protein, that comes from Determination of protein concentration by total organic carbon analysis, Rouwenhorst et al., 1991, J Biochem and Biophys Methods, 22:119-128.
- metolachlor: 1.46288e-5 kg; = 0.31240000000000000/ yield; lognormal variance with pedigree 0.0126, pedigree (3,5,3,1,1)
  (same comment as for atrazine)
  properties: carbon content, fossil 0.633803, dry mass 1 kg, wet mass 1 kg
- molybdenum trioxide: 4.68287e-9 kg; name MoO3; = 0.00010000347403161/ yield; lognormal variance with pedigree 0.0126, pedigree (3,5,3,1,1)
  (same comment as for ammonium sulfate)
  property bismuth content 8e-5; name MoO3_Bi_content
  property copper content 0.0006; name MoO3_Cu_content
  property iron content 0.0044; name MoO3_Fe_content
  property lead content 0.00015; name MoO3_Pb_content
  property molecular weight 143.9 g/mol; name MoO3_mol_weight
  property molybdenum content 0.62; name MoO3_Mo_content
  property oxygen content 0.29; name MoO3_O_content
  property sulfur content 0.0003; name MoO3_S_content
- mowing, by rotary mower: 1.17068e-5 ha; = 0.25000000000000000/ yield; lognormal variance with pedigree 0.0126, pedigree (3,5,3,1,1)
  Measured value. Average value, maximum of 1 mowing per year. Data from interviews with four South African maize silage producers in Gauteng, Mpumalanga, Free State and Limpopo
- packaging, for fertilisers: 0.00422662 kg; lognormal variance with pedigree 0.0532, pedigree (4,3,3,5,4)
  Total amount of active substance/s of fertilisers needed for the production of 'maize silage' is calculated to be circa 2.11E-03 kg. Fertiliser/s used in this dataset is/are: 'ammonium sulfate, as N', 'gypsum, mineral', 'lime', 'magnesium oxide', 'nitrogen fertiliser, as N', 'phosphate fertiliser, as P2O5', 'potassium fertiliser, as K2O', 'urea, as N'. The total amount of active substance/s is doubled in order to account for the packaging of the dilluted product of fertiliser/s that is/are applied. Therefore, 4.23E-03 kg of packaging for fertilisers is justified with this exchange.
  properties: carbon content, fossil 0.825301, dry mass 1 kg, heating value, net 25.01 MJ, price 0.0642 EUR2005, wet mass 1 kg
  note on carbon content, fossil: Considering a chemical formula (C2H4)n for polyethylene, carbon content-fossil is calculated to be 0.856286 kg of Carbon per kg of dry mass.
- packaging, for pesticides: 0.00044366 kg; lognormal variance with pedigree 0.0532, pedigree (4,3,3,5,4)
  Total amount of active substance/s of pesticides needed for the production of maize silage is calculated to be circa 2.22E-04 kg. Pesticide/s used in this dataset is/are: '[thio]carbamate-compound', 'anthranilic acid', 'atrazine', 'boron trifluoride', 'metolachlor', 'molybdenum trioxide', 'pesticide, unspecified', 'pyrethroid-compound', 'triazine-compound, unspecified', 'zinc oxide'. The total amount of active substance/s is doubled in order to account for the packaging of the dilluted product of pesticide/s that is/are applied. Therefore, 4.44E-04 kg of packaging for pesticides is justified with this exchange.
  properties: carbon content, fossil 0.85714, dry mass 1 kg, heating value, net 25.97 MJ, price 0.0642 EUR2005, wet mass 1 kg
- pesticide, unspecified: 9.05448e-5 kg; = 1.93360000E+00/ yield; lognormal variance with pedigree 0.0126, pedigree (3,5,3,1,1)
  Measured value. References: Sum of all other pesticides for which there are no specific datasets. Data from interviews with three South African maize silage producers in Gauteng and Limpopo
  properties: carbon content, fossil 0.486978, dry mass 1 kg, wet mass 1 kg
- pyrethroid-compound: 9.92733e-8 kg; = 0.00212000000000000/ yield; lognormal variance with pedigree 0.0126, pedigree (3,5,3,1,1)
  Measured value. References: Active ingredient lambda-cyhalothrine. Data from interviews with three South African maize silage producers in Gauteng and Limpopo
  properties: carbon content, fossil 0.623, dry mass 1 kg, wet mass 1 kg
- sowing: 4.68271e-5 ha; = 1.00000000000000000/ yield; lognormal variance with pedigree 0.127577, pedigree (3,5,3,1,1)
  (same comment as for chopping, maize)
- tillage, cultivating, chiselling: 1.17068e-5 ha; = 0.25000000000000000/ yield; lognormal variance with pedigree 0.0126, pedigree (3,5,3,1,1)
  Measured value. Average value, maximum of 1 chiselling per year. Data from interviews with four South African maize silage producers in Gauteng, Mpumalanga, Free State and Limpopo
- tillage, harrowing, by rotary harrow: 2.34135e-5 ha; = 0.50000000000000000/ yield; lognormal variance with pedigree 0.312, pedigree (3,5,3,1,1)
  Measured value.Average value, maximum of 1 harrowing with rotary harrow per year. Data from interviews with four South African maize silage producers in Gauteng, Mpumalanga, Free State and Limpopo
- tillage, ploughing: 1.5609e-5 ha; = 0.33333333333333300/ yield; lognormal variance with pedigree 0.118177, pedigree (2,1,3,1,1)
  Measured value. Average value, maximum of 1 ploughing per year. Data from interviews with four South African maize silage producers in Gauteng, Mpumalanga, Free State and Limpopo
- tillage, rolling: 3.1218e-5 ha; = 0.66666666666666700/ yield; lognormal variance with pedigree 0.0126, pedigree (3,5,3,1,1)
  Measured value. Average value, maximum of 1 rolling per year. Data from interviews with four South African maize silage producers in Gauteng, Mpumalanga, Free State and Limpopo
- transport, tractor and trailer, agricultural: 0.00705332 metric ton*km; = 150.62500000000000000/ yield; lognormal variance with pedigree 0.158439, pedigree (3,5,3,1,1)
  Measured value. Transport of harvested maize from the field to the farm for storage (4.5 km). Data from interviews with four South African maize silage producers in Gauteng, Mpumalanga, Free State and Limpopo
- triazine-compound: 1.63567e-5 kg; = 0.34930000000000000/ yield; lognormal variance with pedigree 0.0126, pedigree (3,5,3,1,1)
  Measured value. References: Active ingredient terbuthylazine. Data from interviews with three South African maize silage producers in Gauteng and Limpopo
  properties: carbon content, fossil 0.475616, dry mass 1 kg, wet mass 1 kg
- urea: 0.000615712 kg; = (6.13333333333333000/ yield )*2.14379903903132; lognormal variance with pedigree 0.0126, pedigree (3,5,3,1,1)
  The exchange has been updated from 'urea, as N' into 'urea' and therefore its amount has been scaled (multiplied) from 0.0003 kg by 2.1438 kg of 'urea' per kg of 'urea, as N'. Original comment of the exchange is: Measured value. References: Data from interviews with three South African maize silage producers in Gauteng, Mpumalanga and Limpopo
  properties: carbon content, fossil 0.2, dry mass 1 kg, wet mass 1 kg
- zinc oxide: 3.88626e-8 kg; = 0.00082991740593454/ yield; lognormal variance with pedigree 0.0126, pedigree (3,5,3,1,1)
  (same comment as for ammonium sulfate)
  properties: dry mass 1 kg, wet mass 1 kg

## Inputs from nature
- Carbon dioxide, in air [natural resource, in air]: 0.648874 kg; = 13856.81127769280000000/ yield; source Nemecek, T. 2011; lognormal variance with pedigree 0.0171498, pedigree (3,5,3,1,1)
  Calculated value: calculated according to Nemecek und Schnetzer (2011).
- Energy, gross calorific value, in biomass [natural resource, biotic]: 5.31 MJ; source SNSF 2017; lognormal variance with pedigree 0.0171498, pedigree (3,5,3,1,1)
  Literature value. Source: ecoinvent GLO maize silage dataset
- Occupation, annual crop, irrigated [natural resource, land]: 0.0237077 m2*year; = 506.28220756912500000/ yield; source Stats SA 2009; lognormal variance with pedigree 0.014, pedigree (3,5,3,1,1)
  Calculated value: cultivation period: 5.5 months, irrigated production: 11% of total production area
  Further references: William Hall, Klipstapel Farm, South Africa
- Occupation, annual crop, non-irrigated [natural resource, land]: 0.295052 m2*year; = 6300.89719436287000000/ yield; source Stats SA 2009; lognormal variance with pedigree 0.014, pedigree (3,5,3,1,1)
  Calculated value: cultivation period: 8.5 months, rainfed production: 89% of total production area
  Further references: William Hall, Klipstapel Farm, South Africa
- Occupation, industrial area [natural resource, land]: 0.000362821 m2*year; = 7.74810465976331000/ yield; lognormal variance with pedigree 0.008, pedigree (3,4,3,1,1)
  Calculated value
- Transformation, from annual crop, irrigated [natural resource, land]: 0.0517259 m2; = 1104.61572560536/ yield; source Stats SA 2009; lognormal variance with pedigree 0.02, pedigree (3,5,3,1,1)
  Calculated value: 11% of the total production area is irrigated
- Transformation, from annual crop, non-irrigated [natural resource, land]: 0.416545 m2; = 8895.38427439464000000/ yield; source Stats SA 2009; lognormal variance with pedigree 0.02, pedigree (3,5,3,1,1)
  Calculated value: 89% of the total production area is rainfed
- Transformation, from unspecified [natural resource, land]: 7.25642e-6 m2; = 0.15496209319526600/ yield; lognormal variance with pedigree 0.02, pedigree (3,5,3,1,1)
  Calculated value: change in use once every 50 years
- Transformation, to annual crop, irrigated [natural resource, land]: 0.0517259 m2; = 1104.61572560536/ yield; source Stats SA 2009; lognormal variance with pedigree 0.02, pedigree (3,5,3,1,1)
  Calculated value: 11% of the total production area is irrigated
- Transformation, to annual crop, non-irrigated [natural resource, land]: 0.416545 m2; = 8895.38427439464000000/ yield; source Stats SA 2009; lognormal variance with pedigree 0.02, pedigree (3,5,3,1,1)
  Calculated value: 89% of the total production area is rainfed
- Transformation, to industrial area [natural resource, land]: 7.25642e-6 m2; = 0.15496209319526600/ yield; lognormal variance with pedigree 0.02, pedigree (3,5,3,1,1)
  Calculated value: change in use once every 50 years

## Emissions to nature
- Ammonia [air, non-urban air or from high stacks]: 0.000719045 kg; = 15.35532392916600000/ yield; source Nemecek, T. 2011; lognormal variance with pedigree 0.02, pedigree (3,5,3,1,1)
  Calculated value: emissions arising from fertiliser use, calculated using the AGRAMMON model from Nemecek und Schnetzer (2012).
- Carbon dioxide, fossil [air, non-urban air or from high stacks]: 0.000450913 kg; = 9.62933333333333000/ yield; source Nemecek, T. 2011; lognormal variance with pedigree 0.0126, pedigree (3,5,3,1,1)
  Calculated value: CO2 emissions from urea application according to Nemecek und Schnetzer (2012).
- Dinitrogen monoxide [air, non-urban air or from high stacks]: 9.35112e-5 kg; = 1.99694828612904000/ yield; source Nemecek, T. 2011; lognormal variance with pedigree 0.042, pedigree (3,5,3,1,1)
  Calculated value: emissions arising from fertiliser use, calculated according to Nemecek und Schnetzer (2011), N content and dry matter values of compost according to Candinas (1999).
  Further references: Candinas, T.; Golder, E.; Kupper, T.; Besson, J.-M., (1999) Nähr- und Schadstoffe im Kompost, Eigenössische Forschungsanstalt für Agrarökologie und Landbau (FAL) & Institut für Umweltschuzt und Landwirtschaft (IUL), Liebefeld
- Nitrogen oxides [air, non-urban air or from high stacks]: 4.22212e-5 kg; = 0.90164211856430500/ yield; source Nemecek, T. 2011; lognormal variance with pedigree 0.042, pedigree (3,5,3,1,1)
  Calculated value: calculated from N2O emissions according to Nemecek und Schnetzer (2011).
- Water [air, unspecified]: 0.0269935 m3; = 576.45034410151300000/yield; lognormal variance with pedigree 0.0126, pedigree (3,5,3,1,1)
  Calculated value: water_irrigation_input*fraction_IW_to_air. Fraction of irrigation water to air: 0.72 Literature value (Siebert, 2010) (Vionnet, S., Quantis Water Database - Technical Report, 2012).
- 2,4-D [soil, agricultural]: 3.37155e-6 kg; = 0.07200000000000000/ yield; lognormal variance with pedigree 0.045, pedigree (3,5,3,1,1)
  Calculated value: 100% of input quantity, active ingredient: 2,4-D dichlorophenoxy
- Acetochlor [soil, agricultural]: 4.45747e-5 kg; = 0.95190000000000000/ yield; lognormal variance with pedigree 0.045, pedigree (3,5,3,1,1)
  Calculated value: 100% of input quantity
- Atrazine [soil, agricultural]: 3.19501e-5 kg; = 0.68230000000000000/ yield; lognormal variance with pedigree 0.045, pedigree (3,5,3,1,1)
  Calculated value: 100% of input quantity
- Cadmium II [soil, agricultural]: 2.42652e-8 kg; = 0.00051818688853381/ yield; source Nemecek, T. 2011; lognormal variance with pedigree 0.052, pedigree (3,5,3,1,1)
  Calculated value: calculated according to Nemecek und Schnetzer (2011). Heavy metal content of inorganic fertilisers according to Desaules & Struder (1993), heavy-metal contents of organic fertilisers according to Candinas et al. (1999), heavy metal content of plant material and deposition according to Freiermuth (2006), leaching rates according to Wolfensberger & Dinkel (1997), heavy metal content of the soil according to Keller & Desaules (2001), soil erosion according to Kooman & Critchley; Le Roux at al. (2008); UWC (2015), accumulation factor according to Wilke & Schaub (1986), erosion factor: 0.05, since surface waters between agricultural fields are rare and the distance to the next river or lake is greater than 100 m. Source: Freiermuth (2006).
  Further references: Wolfensberger U. & Dinkel F. (1997) Beurteilung nachwachsender Rohstoffe in der Schweiz in den Jahren 1993-1996, FAT und Carbotech, im Auftrag des Bundesamtes für Landwirtschaft, Bern; Desaules A. & Studer K. (1993) NABO: Nationales Beobachtungsnetz, Messresultate 1985-1991, Schriftenreihe Umwelt Nr. 200, BUWAL (Bundesamt für Umwelt, Wald und Landschaft), Bern; Freiermuth R. (2006) Modell zur Berechnung der Schwermetallflüsse in der Landwirtschaftlichen Ökobilanz - SALCA-Schwermetall, Forschungsanstalt Agroscope Reckenholz-Tänikon (ART), 28p; Candinas, T.; Golder, E.; Kupper, T.; Besson, J.-M., (1999) Nähr- und Schadstoffe im Kompost, Eigenössische Forschungsanstalt für Agrarökologie und Landbau (FAL) & Institut für Umweltschuzt und Landwirtschaft (IUL), Liebefeld
- Chlorpyrifos [soil, agricultural]: 3.27789e-5 kg; = 0.70000000000000000/ yield; lognormal variance with pedigree 0.045, pedigree (3,5,3,1,1)
  Calculated value: 100% of input quantity
- Chromium III [soil, agricultural]: -1.39103e-6 kg; = -0.02970571246052620/ yield; source Nemecek, T. 2011; lognormal variance with pedigree 0.046, pedigree (3,4,3,1,1)
  (same comment as for Cadmium II)
- Copper ion [soil, agricultural]: 1.25394e-6 kg; = 0.02677811196699970/ yield; source Nemecek, T. 2011; lognormal variance with pedigree 0.052, pedigree (3,5,3,1,1)
  (same comment as for Cadmium II)
- Epoxiconazole [soil, agricultural]: 5.26804e-6 kg; = 0.11250000000000000/ yield; lognormal variance with pedigree 0.045, pedigree (3,5,3,1,1)
  Calculated value: 100% of input quantity
- Flumetsulam [soil, agricultural]: 4.68271e-7 kg; = 0.01000000000000000 / yield; lognormal variance with pedigree 0.045, pedigree (3,5,3,1,1)
  Calculated value: 100% of input quantity
- Indoxacarb [soil, agricultural]: 2.10722e-6 kg; = 0.04500000000000000/ yield; lognormal variance with pedigree 0.039, pedigree (3,4,3,1,1)
  Calculated value: 100% of input quantity
- Lambda-cyhalothrin [soil, agricultural]: 9.92733e-8 kg; = 0.00212000000000000/ yield; lognormal variance with pedigree 0.045, pedigree (3,5,3,1,1)
  Calculated value: 100% of input quantity
- Lead II [soil, agricultural]: 2.24762e-6 kg; = 0.04799828654478520/ yield; source Nemecek, T. 2011; lognormal variance with pedigree 0.052, pedigree (3,5,3,1,1)
  (same comment as for Cadmium II)
- Mercury II [soil, agricultural]: 6.45745e-9 kg; = 0.00013790001482064/ yield; source Nemecek, T. 2011; lognormal variance with pedigree 0.052, pedigree (3,5,3,1,1)
  (same comment as for Cadmium II)
- Mesotrione [soil, agricultural]: 7.30502e-6 kg; = 0.15600000000000000/ yield; lognormal variance with pedigree 0.045, pedigree (3,5,3,1,1)
  Calculated value: 100% of input quantity
- Metolachlor [soil, agricultural]: 1.46288e-5 kg; = 0.31240000000000000/ yield; lognormal variance with pedigree 0.045, pedigree (3,5,3,1,1)
  Calculated value: 100% of input quantity
- Nickel II [soil, agricultural]: 7.00734e-7 kg; = 0.01496429169992780/ yield; source Nemecek, T. 2011; lognormal variance with pedigree 0.052, pedigree (3,5,3,1,1)
  Calculated value: calculated according to Nemecek und Schnetzer (2011). Heavy metal content of inorganic fertilisers according to Desaules & Struder (1993), heavy-metal contents of organic fertilisers according to Candinas et al. (1999), heavy metal content of plant material and deposition according to Freiermuth (2006), leaching rates according to Wolfensberger & Dinkel (1997), heavy metal content of the soil according to Keller & Desaules (2001), soil erosion according to Kooman & Critchley; Le Roux at al. (2008); UWC (2015), accumulation factor according to Wilke & Schaub (1986), erosion factor: 0.05, since surface waters between agricultural fields are rare and the distance to the next river or lake is greater than 100 m. Source: Freiermuth (2006).
  Further references: Desaules A. & Studer K. (1993) NABO: Nationales Beobachtungsnetz, Messresultate 1985-1991, Schriftenreihe Umwelt Nr. 200, BUWAL (Bundesamt für Umwelt, Wald und Landschaft), Bern; Freiermuth R. (2006) Modell zur Berechnung der Schwermetallflüsse in der Landwirtschaftlichen Ökobilanz - SALCA-Schwermetall, Forschungsanstalt Agroscope Reckenholz-Tänikon (ART), 28p; Perkow W. und Ploss H., 1994. Wirksubstanzen der Pflanzenschutz- und Schädlingsbekämpfungsmittel. Berlin: Blackwell Wissenschafts-Verlag; Candinas, T.; Golder, E.; Kupper, T.; Besson, J.-M., (1999) Nähr- und Schadstoffe im Kompost, Eigenössische Forschungsanstalt für Agrarökologie und Landbau (FAL) & Institut für Umweltschuzt und Landwirtschaft (IUL), Liebefeld
- Pesticides, unspecified [soil, agricultural]: 8.08506e-5 kg; = (pesticides_unspecified)/ yield; lognormal variance with pedigree 0.045, pedigree (3,5,3,1,1)
  Calculated value: 100% of input quantity. Sum of all pesticides for which no specific datase exists: benoxacor, thiocarbamate, dichlormid, chlorantraniliprole, pescidies with unknown active ingredients
- Pyraclostrobin [soil, agricultural]: 5.26804e-6 kg; = 0.11250000000000000/ yield; lognormal variance with pedigree 0.039, pedigree (3,4,3,1,1)
  Calculated value: 100% of input quantity
- Terbuthylazin [soil, agricultural]: 1.63567e-5 kg; = 0.34930000000000000/ yield; lognormal variance with pedigree 0.045, pedigree (3,5,3,1,1)
  Calculated value: 100% of input quantity
- Zinc II [soil, agricultural]: 4.75916e-7 kg; = 0.01016326503668380/ yield; source Nemecek, T. 2011; lognormal variance with pedigree 0.052, pedigree (3,5,3,1,1)
  (same comment as for Cadmium II)
- Cadmium II [water, ground-]: 1.39885e-8 kg; = 0.00029872769509263/ yield; source Nemecek, T. 2011; lognormal variance with pedigree 0.102, pedigree (3,5,3,1,1)
  Calculated value: calculated according to Nemecek und Schnetzer (2011). Leaching rates according to Wolfensberger & Dinkel (1997), heavy metal content of inorganic fertilisers according to Desaules & Struder (1993), heavy-metal contents of organic fertilisers according to Candinas et al. (1999), deposition and content of seeds according to Freiermuth (2006).
  Further references:
  Wolfensberger U. & Dinkel F. (1997) Beurteilung nachwachsender Rohstoffe in der Schweiz in den Jahren 1993-1996, FAT und Carbotech, im Auftrag des Bundesamtes für Landwirtschaft, Bern;
  Desaules A. & Studer K. (1993) NABO: Nationales Beobachtungsnetz, Messresultate 1985-1991, Schriftenreihe Umwelt Nr. 200, BUWAL (Bundesamt für Umwelt, Wald und Landschaft), Bern;
  Freiermuth R. (2006) Modell zur Berechnung der Schwermetallflüsse in der Landwirtschaftlichen Ökobilanz - SALCA-Schwermetall, Forschungsanstalt Agroscope Reckenholz-Tänikon (ART), 28p
  Candinas, T.; Golder, E.; Kupper, T.; Besson, J.-M., (1999) Nähr- und Schadstoffe im Kompost, Eigenössische Forschungsanstalt für Agrarökologie und Landbau (FAL) & Institut für Umweltschuzt und Landwirtschaft (IUL), Liebefeld
- Cadmium II [water, surface water]: 1.37379e-9 kg; = 0.00002933744947966/ yield; source Nemecek, T. 2011; lognormal variance with pedigree 0.102, pedigree (3,5,3,1,1)
  Calculated value: calculated according to Nemecek und Schnetzer (2011). Soil heavy metal contents according to Keller & Desaules (2001), erosion average value according to Kooman & Critchley (2013), Le Roux et al. (2008) and UWC Erosion (2015), accumulation factor according to Prasuhn (2006), erosion factor: 0.05, since surface waters between agricultural fields are rare and the distance to the next river or lake is greater than 100 m according to Freiermuth (2006), heavy metal content of inorganic fertilisers according to Desaules & Struder (1993), heavy-metal contents of organic fertilisers according to Candinas et al. (1999), deposition and content of seeds according to Freiermuth (2006).
  Further references:
  Keller T. & Desaules A. (2001) Böden der Schweiz: Schadstoffgehalte und Orientierungswerte (1990 - 1996). Umwelt-Materialien Nr. 139. Bern: Bundesamt für Umwelt, Wald und Landschaft BUWAL.
  Kooman, G.; Critchley, W. R. S. GIS-Assisted Modelling of Soil Erosion in a South African Catchment: Evaluating the USLE and SLEMSA Approach. In Water Resources Planning, Development and Management; Breetzke, G. D., Ed.; InTech, 2013;
  Le Roux, J. J.; Morgenthal, T. L.; Malherbe, J.; Pretorius, D. J.; Sumner, P. D. Water erosion prediction at a national scale for South Africa. Water SA 2008, 34, 305-314.; Candinas, T.; Golder, E.; Kupper, T.; Besson, J.-M., (1999) Nähr- und Schadstoffe im Kompost, Eigenössische Forschungsanstalt für Agrarökologie und Landbau (FAL) & Institut für Umweltschuzt und Landwirtschaft (IUL), Liebefeld
  UWC Erosion http://www.botany.uwc.ac.za/envfacts/facts/erosion.htm (accessed Apr 28, 2015).
  Prasuhn V. (2006) Erfassung der PO4-Austräge für die Ökobilanzierung SALCA Phosphor. Agroscope Reckenholz - Tänikon ART, 20p. Online at http://www.art.admin.ch/themen/00617/00744/index.html?lang=en.
  Desaules A. & Studer K. (1993) NABO: Nationales Beobachtungsnetz, Messresultate 1985-1991, Schriftenreihe Umwelt Nr. 200, BUWAL (Bundesamt für Umwelt, Wald und Landschaft), Bern;
  Freiermuth R. (2006) Modell zur Berechnung der Schwermetallflüsse in der Landwirtschaftlichen Ökobilanz - SALCA-Schwermetall, Forschungsanstalt Agroscope Reckenholz-Tänikon (ART), 28p
- Chromium III [water, ground-]: 8.98811e-7 kg; = 0.01919427912908080/ yield; source Nemecek, T. 2011; lognormal variance with pedigree 0.102, pedigree (3,5,3,1,1)
  (same comment as for Cadmium II)
- Chromium III [water, surface water]: 2.09053e-6 kg; = 0.04464353923887690/ yield; source Nemecek, T. 2011; lognormal variance with pedigree 0.102, pedigree (3,5,3,1,1)
  (same comment as for Cadmium II)
- Copper ion [water, ground-]: 1.63173e-7 kg; = 0.00348458382518751/ yield; source Nemecek, T. 2011; lognormal variance with pedigree 0.102, pedigree (3,5,3,1,1)
  (same comment as for Cadmium II)
- Copper ion [water, surface water]: 1.864e-7 kg; = 0.00398061433270296/ yield; source Nemecek, T. 2011; lognormal variance with pedigree 0.102, pedigree (3,5,3,1,1)
  (same comment as for Cadmium II)
- Lead II [water, ground-]: 2.14649e-8 kg; = 0.00045838766061394/ yield; source Nemecek, T. 2011; lognormal variance with pedigree 0.102, pedigree (3,5,3,1,1)
  (same comment as for Cadmium II)
- Lead II [water, surface water]: 1.42731e-7 kg; = 0.00304804874925236/ yield; source Nemecek, T. 2011; lognormal variance with pedigree 0.102, pedigree (3,5,3,1,1)
  (same comment as for Cadmium II)
- Mercury II [water, ground-]: 4.54397e-11 kg; = 0.00000097037237982/ yield; source Nemecek, T. 2011; lognormal variance with pedigree 0.102, pedigree (3,5,3,1,1)
  (same comment as for Cadmium II)
- Mercury II [water, surface water]: 5.2206e-10 kg; = 0.00001114868291573/ yield; source Nemecek, T. 2011; lognormal variance with pedigree 0.102, pedigree (3,5,3,1,1)
  (same comment as for Cadmium II)
- Nickel II [water, surface water]: 1.74678e-7 kg; = 0.00373028259064414/ yield; source Nemecek, T. 2011; lognormal variance with pedigree 0.102, pedigree (3,5,3,1,1)
  (same comment as for Cadmium II)
- Nitrate [water, ground-]: 0.00082 kg; source Faist Emmenegger M. 2009; lognormal variance with pedigree 0.052, pedigree (3,5,3,1,1)
  Calculated value: emissions arising from fertiliser use, calculated using the SQCB-NO3 model from Faist Emmenegger et al. (2009). Clay content according to the WFLDB, root depth according to FAO (2011).
  Further references: FAO (2011) Crop water information. Natural Resources and Environment Department, Food and Agriculture Organization of the United Nations. Online, accessed February 2011. Available at: http://www.fao.org/nr/water/cropinfo.html.
- Phosphate [water, ground-]: 1.00505e-5 kg; = 0.21463004721316300/ yield; source Nemecek, T. 2011; lognormal variance with pedigree 0.052, pedigree (3,5,3,1,1)
  Calculated value: emissions arising from fertiliser use, calculated according to Nemecek und Schnetzer (2011).
- Phosphate [water, surface water]: 2.67532e-5 kg; = 0.57131835692553700/ yield; source Nemecek, T. 2011; lognormal variance with pedigree 0.052, pedigree (3,5,3,1,1)
  Calculated value: emissions arising from fertiliser use, calculated according to Nemecek und Schnetzer (2011). P2O5 content of manure according to Flisch et al. (2009).
  Further references: Flisch, R., Sinaj, S., Charles, R. & Richner, W., 2009. GRUDAF 2009 - Grundlagen für die Düngung im Acker und Futterbau. Agrarforschung 16 (2), 197.
- Phosphorus [water, surface water]: 9.10177e-6 kg; = 0.19437000000000000/ yield; source Nemecek, T. 2011; lognormal variance with pedigree 0.052, pedigree (3,5,3,1,1)
  Calculated value: emissions arising from fertiliser use, calculated according to Nemecek und Schnetzer (2011). Soil erosion according to Kooman & Critchley; Le Roux at al. (2008); UWC (2015), P content in topsoil according to Nemecek, Kägi T. & Blaser S. (2007), enrichment factor for P according to Wilke & Schaub (1996), fraction of eroded soil that reaches river according to Nemecek, Kägi & Blaser (2007).
  Further references: Kooman, G.; Critchley, W. R. S. GIS-Assisted Modelling of Soil Erosion in a South African Catchment: Evaluating the USLE and SLEMSA Approach. In Water Resources Planning, Development and Management; Breetzke, G. D., Ed.; InTech, 2013 ISBN 978-953-51-1092-7; Le Roux, J. J.; Morgenthal, T. L.; Malherbe, J.; Pretorius, D. J.; Sumner, P. D. Water erosion prediction at a national scale for South Africa. Water SA 2008, 34, 305-314; UWC Erosion Available online: http://www.botany.uwc.ac.za/envfacts/facts/erosion.htm (accessed on Apr 28, 2015); Nemecek, T., Kagi, T., & Blaser, S. (2007). Life Cycle Inventories of Swiss and European Agricultural Production Systems. Final report; Wilke B. & Schaub D. (1996) Phosphatanreicherung bei Bodenerosion. Mitt. Deutsche Bodenkundl. Gesellsch. 79, 435-438.
- Water [water, ground-]: 0.00839797 m3; = 179.34010705380400000/ yield; lognormal variance with pedigree 0.0126, pedigree (3,5,3,1,1)
  Calculated value: water_irrigation_input*(1-fraction_IW_to_air)*fraction_IW_to_ground_water. Fraction of irrigation to ground water: 0.8
- Water [water, surface water]: 0.00209949 m3; = 44.83502676345100000/ yield; lognormal variance with pedigree 0.0126, pedigree (3,5,3,1,1)
  Calculated value: water_irrigation_input*(1-fraction_IW_to_air)*fraction_IW_to_surface_water. Fraction of irrigation to surface water: 0.2
- Zinc II [water, ground-]: 1.11903e-6 kg; = 0.02389708248246640/ yield; source Nemecek, T. 2011; lognormal variance with pedigree 0.102, pedigree (3,5,3,1,1)
  (same comment as for Cadmium II)
- Zinc II [water, surface water]: 3.44124e-7 kg; = 0.00734883080500808/ yield; source Nemecek, T. 2011; lognormal variance with pedigree 0.102, pedigree (3,5,3,1,1)
  (same comment as for Cadmium II)

## Sampling procedure
Modelling is based on interviews with five maize silage producers in South Africa, one in Gauteng, one in Mpumalanga, one in Free State, one in Limpopo and one silage producer in Free State who produces silage but does not cultivate maize. Production area, yields and the ratio of rainfed to irrigated production were obtained from Statistics South Africa (2010) Census of commercial agriculture 2007 Financial and production statistics, Stats SA, Pretoria, South Africa, available at http://www.statssa.gov.za/publications/Report-11-02-01/Report-11-02-012007.pdf

## Extrapolations
This dataset represents both rainfed and irrigated maize production: 89% of the production area is rainfed and the remaining 11% is under irrigation (source: http://www.statssa.gov.za/publications/Report-11-02-01/Report-11-02-012007.pdf).

## Review by Assumpció ANTON 2017-09-28
Please,be aware to consider further flow updates as far as better information or emission models are available.
