# maize silage production

Dataset: EcoSpold 2, unit process
Geography: BR
Time period: 2012-01-01 to 2023-12-31
Technology level: current
Classification: ISIC rev.4 ecoinvent: 0119:Growing of other non-perennial crops
Synonyms: corn silage
Scenario: Business-as-Usual
System model: Allocation, cut-off by classification
Share of production covered: 24 %
Generated by: Fernando Dias
Published in: Folegatti-Matsuura M. 2018
Database: ecoinvent
isCopyrightProtected: true
accessRestrictedTo: 1

## General comment
This dataset represents the production of 1 kg of maize silage(fresh matter).
There is no irrigation to this crop production.
References:
May et al., 2015: Contributions from experts here listed: André May, Embrapa Milho e Sorgo, andre.may@embrapa.br; Marília I. S. Folegatti Matsuura, Embrapa Meio Ambiente, marilia.folegatti@embrapa.br; Marco Antônio F. Gomes, Embrapa Meio Ambiente, marco.gomes@embrapa.br; Henrique Debiasi, Embrapa Soja, henrique.debiasi@embrapa.br; Jane Rodrigues de Assis Machado; Embrapa Milho e Sorgo, jane.machado@embrapa.br; Cláudio Doro, Emater Passo Fundo-RS, cdoro@emater.tche.br.
Canals, 2003: Contributions to LCA Methodology for Agricultural Systems. Site-dependency and soil degradation impact assessment: http://www.tdx.cat/handle/10803/3155
CONAB, 2015: http://www.conab.gov.br/conteudos.php?a=1252&t=2
Duarte,A. P.; Cantarella, H.Adubação em sistemas de produção de soja e milho safrinha. In: Seminário sobre a cultura do milho safrinha: Rumo à estabilidade, 9., 2007, Dourados. Anais... Dourados: Embrapa Agropecuária Oeste, 2007. p. 44-61. (EmbrapaAgropecuária Oeste. Documentos, 89).
Nemecek & Schnetzer: Methods of assessment of direct field emissions for LCIs of agricultural production systems, Data v3.0 (2011): http://www.ecoinvent.org/fileadmin/talkpages/pages/01-01-crop-production/01_crop_production_-_direct_field_emissions___natural_resources_v1.1.pdf
Nemecek & Kagi (2007) Life Cycle Inventories of Swiss and European Agricultural Production Systems. Final report ecoinvent v2.0 nº 15a. Agroscope Reckenholz - Taenikon Research Station ART, Swiss Center for Life Cycle Inventories, Zurich and Dubendorf, CH, retrieved from: www.ecoinvent.ch.
Novais & Smyth (1999) Fósforo em solo e planta em condições tropicais. Viçosa: Universidade Federal de Viçosa, p. 399.
Zolin, Cornelio Alberto et al. (2016) Perda de solo e agua sob integracao lavoura-floresta e em sucessao soja-milho. Pesquisa Agropecuária Brasileira, Brasília, v. 51, n. 9, p.1223-1230, set. 2016. Disponível em: <http://www.scielo.br/pdf/pab/v51n9/0100-
Anjos & Mattiazzo (2000). Metais pesados em plantas de milho cultivadas em latossolos repetidamente tratados com biossolido. Scientia Agricola, v. 57, n, 4, p,769-776, out-dez 2000. Available in <http://www.scielo.br/pdf/sa/v57n4/a27v57n4.pdf> Accessed in 15 feb 2017.
Bordin, Ivan et al. (2008) Materia seca, carbono e nitrogenio de raizes de soja e milho em plantio direto e convencional. Pesquisa Agropecuaria Brasileira, Brasilia, v. 43, n. 12, p. 1785-1792, dez. 2008. Available in <https://seer.sct.embrapa.br/index.php/pab/article/view/1087> Acessed in: 07 mar. 2017.
Coelho, Antonio Marcos (2007). Manejo da adubacao nitrogenada na cultura do milho. Embrapa Milho e Sorgo, Sete Lagoas, dez. 2007. Available in <http://www.cnpms.embrapa.br/publicacoes/publica/2007/circular/Circ_96.pdf> Acessed in: 22 mar. 2017.
Novaes, Renan M. L. et al. (2017) Estimating 20-year land use change and derived CO2 emissions associated with crops, parture and forestry in Brazil and each of its 27 states. Global Change Biology, 2017, 1-13.
Nemecek T., Bengoa X., Lansche J., Mouron P., Riedener E., Rossi V. & Humbert S. (2015) Methodological Guidelines for the Life Cycle Inventory of Agricultural Products. Version 3.0, July 2015. World Food LCA Database (WFLDB). Quantis and Agroscope, Lausanne and Zurich, Switzerland.
CRUZ, J.C.; PEREIRA FILHO, I.A.; RODRIGUES, J.A.S.; FERREIRA, J.J. (Eds.) Produção e utilização de silagem de milho e sorgo. Sete Lagoas: Embrapa Milho e Sorgo, 2001. 544p.
IBGE, 2017. Levantamento Sistemático da Produção Agrícola Tabela 1618 - Área plantada, área colhida e produção, por ano da safra e produto. https://sidra.ibge.gov.br/Tabela/1618
Dataset authors:
Fernando Rodrigues Teixeira Dias, fernando.dias@embrapa.br; Leticia De S. Barrantes, leticia.desantib@gmail.com; Andre May, andre.may@embrapa.br; Marília I. S. Folegatti Matsuura, marilia.folegatti@embrapa.br; Jane Rodrigues de Assis Machado, Embrapa Milho e Sorgo, jane.machado@embrapa.br; Cláudio Doro, Emater Passo Fundo-RS, cdoro@emater.tche.br.2016

## Included activities start
This activity starts after the harvest of the previous crop.

## Included activities end
The dataset includes the inputs of seeds, mineral fertilisers and pesticides. It is assumed that no organic fertilisers are applied.
The dataset also includes all machine operations and corresponding machine infrastructure and sheds. Machine operations are: limestone and gypsum application, by spreader; application of plant protection product, by field sprayer; planting with starter fertiliser, by no till planter; fertilising, by broadcaster; and chopping and fodder loading. Includes the transportation of products inside the farm: water from water source to field, fertilisers from farm gate to field and grains from harvester to truck.
Furthermore, direct field and land use change emissions are included, with important regionalizations added. Due to phosphorus low mobility in Brazilian soils, its emissions through leaching and run-off were disregarded.
The dataset doesn't include: storage and serving the silage.
The activity ends after harvest at the farm gate. There is no irrigation to this crop production.

## Geography
The inventory is modelled for the state of Rio Grande do Sul, in Brazil, but supposed to be a good approximation for the whole country.

## Technology
Cultivation of maize like first harvest of grains in cropping system (e.g. maize followed by wheat), but adapted for silage, with no following crop on the same area the same year.

## Time period
Time period of the most of the data collected for this dataset.

## Parameters
- LUC_crop_specific: 1 dimensionless
  This parameter allows to switch between a "crop specific" and a "country specific" approach when calculating the LUC of a crop. By default, the chosen approach is "crop specific", so the value of the parameter is 1. If you want to apply a "country specific" approach, turn the parameter to 0.
- clay content into soil: 55 % (obsolete); name Clay_content; lognormal variance with pedigree 0.0487, pedigree (4,2,1,1,4)
  This value represents the fraction of clay content into soil (%).
  Used in the SQCB-NO3 model for the calculation of leaching of NO3.
  From May et al. (2016).
- land transformation to: 0.198649 m2/kg; name T_t; = 10/50.34; lognormal variance with pedigree 0.0193, pedigree (3,3,4,3,2)
  This value will be used to transform exchanges per ha to exchanges per kg of maize grain. From May et al. (2016).
  Uncertainty: Variance of log-transformed data as recommended by Ecoinvent for "Land use, transformation" for agriculture.
- nitrogen in crop residues: 30 kg N/ha; name Ncrop_residues; lognormal variance with pedigree 0.0408, pedigree (1,2,1,3,4)
  N contained in the crop residues.
- nitrogen uptake by plant: 196 kg N/ha; name Nuptake_plant; lognormal variance with pedigree 0.0606, pedigree (4,5,3,5,4)
  This value represents the N taken by plant during its growth (kg N/ha). Used in the SQCB-NO3 model for the calculation of leaching of NO3.
  From Nemececk & Schnetzer (2011),
- organic nitrogen into soil: 10000 kg N/ha; name Norg_soil; lognormal variance with pedigree 0.0488, pedigree (4,2,1,3,4)
  Norg is the mass of organic nitrogen contained in the upper 50 cm of soil per ha (kg N/ha). Used in the SQCB-NO3 model for the calculation of leaching of NO3.
  From May et al. (2016).
- precipitation, annual: 1397 mm/year; name precipitation; lognormal variance with pedigree 0.0014, pedigree (2,2,1,3,1)
  This value represents the average annual precipitation in Rio Grande do Sul, Brazil.
  Used in the SQCB-NO3 model for the calculation of leaching of NO3.
- rooting depth: 0.46 m; name root_depth; lognormal variance with pedigree 0.0509, pedigree (4,4,2,3,4)
  This value represents the rooting depth of the crop (m).
  Used in the SQCB-NO3 model for the calculation of leaching of NO3.
  From Bordin et al. (2008).
- soil eroded: 251 kg/ha.yr; name soil_eroded; lognormal variance with pedigree 0.0408, pedigree (1,2,1,3,4)
- total liming: 666.667 kg/ha; name L_total; = 2000/3; lognormal variance with pedigree 0.0408, pedigree (1,2,1,3,4)
  Amount for typical system from May et al. (2016) alocated between soybean and maize in cropping system where maize occupies the ground for four months and limestone is applied each three years.
- total nitrogen: 130 kg/ha; name N_total; lognormal variance with pedigree 0.0408, pedigree (1,2,1,3,4)
  This value represents the total nitrogen in mineral fertilisers (kg N/ha). From May et al. (2016).
- water content at harvest: 0.65 kg/kg; name harvest_wc; lognormal variance with pedigree 0.0007, pedigree (1,2,1,1,1)
  Crop water content at harvest (% fresh basis). From May et al. (2016).

## Reference product
- maize silage: 1 kg; name REF_PRODUCT; By-product classification allocatable product; CPC 01911: Maize for forage and silage; HS2017 100510: Cereals; maize (corn), seed
  1 Kg of maize silage produced used as reference. The corn cob and part of the straw is included, part of the straw and root is left on the field.
  production volume 2.38059e10 kg; = 9%*5254464*50340
    Brazil maize silage production is roughly estimated from 2016 average Brazil maize first crop total area (5.2545E+6 ha, IBGE, 2017), assuming 9% is dedicated to maize silage (Yara website, http://www.yara.co.uk/crop-nutrition/crops/maize/key-facts/world-production/default.aspx), and considering an average yield of 50340 kg wet matter/ha of silage in Brazil (average maize silage yield in the US in 2011-2012 is 41761 kg wet matter/ha - USDA 2013, http://www.usda.gov/oce/forum/presentations/Newell.pdf - and it is over 36000 kg wet matter/ha in Quebec).
    IBGE, 2017. Levantamento Sistemático da Produção Agrícola Tabela 1618 - Área plantada, área colhida e produção, por ano da safra e produto. https://sidra.ibge.gov.br/Tabela/1618
  property carbon content, fossil 0; name REF_PRODUCT_C_content_fossil
  property carbon content, non-fossil 0.4773; name REF_PRODUCT_C_content_non_fossil
  property dry mass 0.35 kg; name REF_PRODUCT_DM; = REF_PRODUCT_WM - REF_PRODUCT_WWM
  property energy content 6.6325 MJ; name REF_PRODUCT_energy_content
  property price 0.0349023 EUR2005
    Average prices in EUR were estimated from a series of prices in BRL from 2006 to 2015 that were considered by Embrapa Pecus project (https://www.embrapa.br/pecuaria-sudeste/busca-de-projetos/-/projeto/38213/projeto-da-rede-pecus), the same source of data used to build the beef cattle datasets for BR region.
  property water content 1.85714; name REF_PRODUCT_water_content; = REF_PRODUCT_WWM / REF_PRODUCT_DM
  property water in wet mass 0.65 kg; name REF_PRODUCT_WWM
  property wet mass 1 kg; name REF_PRODUCT_WM
  properties: carbon allocation 0.167055 kg, carbon content 0.4773

## Inputs from technosphere
- application of plant protection product, by field sprayer: 5.95948e-5 ha; = 3*T_t*1E-04; lognormal variance with pedigree 0.3421, pedigree (3,2,5,1,1)
  Agricultural operation. Amount for typical system from May et al. (2016).
- atrazine: 4.9544e-5 kg; lognormal variance with pedigree 0.0434, pedigree (2,2,3,3,4)
  Amount for typical system from May et al. (2016).
  properties: carbon content, fossil 0.446512, dry mass 1 kg, wet mass 1 kg
- chopping, maize: 1.98649e-5 ha; = T_t * 1E-04; lognormal variance with pedigree 0.0421, pedigree (3,2,5,1,1)
  Complete harvest of cropland area. See parameters.
- fertilising, by broadcaster: 1.98649e-5 ha; = 1*T_t*1E-04; lognormal variance with pedigree 0.0427, pedigree (3,2,5,1,1)
  Agricultural operation. Amount for typical system from May et al. (2016).
- fodder loading, by self-loading trailer: 0.002293 m3; lognormal variance with pedigree 0.0099, pedigree (2,2,3,4,2)
  As modelled in the machinery QC-CA dataset process, it includes cutting, loading, tranport to farm and discharge/compacting.
- glyphosate: 1.4307e-5 kg; lognormal variance with pedigree 0.0434, pedigree (2,2,3,3,4)
  Amount for typical system from May et al. (2016).
  properties: carbon content, fossil 0.214286, dry mass 1 kg, wet mass 1 kg
- inorganic phosphorus fertiliser, as P2O5: 0.0017382 kg; lognormal variance with pedigree 0.0434, pedigree (2,2,3,3,4)
  Amount for typical system from May et al. (2016).
  Uncertainty: Variance of log-transformed data as recommended by Ecoinvent for "Primary energy carriers, metals, salts" for agriculture.
  properties: dry mass 1 kg, wet mass 1 kg
- inorganic potassium fertiliser, as K2O: 0.0017382 kg; lognormal variance with pedigree 0.0434, pedigree (2,2,3,3,4)
  (same comment as for inorganic phosphorus fertiliser, as P2O5)
  properties: dry mass 1 kg, wet mass 1 kg
- lime: 0.0132433 kg; = L_total*T_t*1E-04; lognormal variance with pedigree 0.0434, pedigree (2,2,3,3,4)
  Amount for typical system from May et al. (2016) alocated between soybean and maize in cropping system where maize occupies the groudn for four months.
  Uncertainty: Variance of log-transformed data as recommended by Ecoinvent for "Primary energy carriers, metals, salts" for agriculture.
  properties: carbon content, fossil 0.120005, dry mass 1 kg, wet mass 1 kg
- limestone and gypsum application, by spreader: 6.62164e-6 ha; = 1/3*T_t*1E-04; lognormal variance with pedigree 0.0453, pedigree (3,3,3,3,4)
  Agricultural operation. Amount for typical system from May et al. (2016) alocated between maize and wheat in cropping system where maize occupies the ground for four months plus the fallow period and limestone is applied each three years.
- maize seed, for sowing: 0.00039612 kg; name SEED; lognormal variance with pedigree 0.0434, pedigree (2,2,3,3,4)
  Amount for typical system from May et al. (2016).
  property carbon content, fossil 0; name maize_seed_sowing_C_content_fossil
  property carbon content, non-fossil 0.45263; name maize_seed_sowing_C_content_non_fossil
  property dry mass 0.88 kg; name maize_seed_sowing_DM; = maize_seed_sowing_WM- maize_seed_sowing_WWM
  property water content 0.136364; name maize_seed_sowing_water_content; = maize_seed_sowing_WWM/ maize_seed_sowing_DM
  property water in wet mass 0.12 kg; name maize_seed_sowing_WWM
  property wet mass 1 kg; name maize_seed_sowing_WM
  note on carbon content, non-fossil: biogene carbon content on a dry matter basis; Composition data obtained from Corn Grain Whole, in (http://beefmagazine.com/images/2009%20feed%20table.pdf). First, composition data were refered to 1 kg dry mass. Then, C-contents were calculated considering a C-content/dry mass of 44% in carbohydrates (including fibres), 53% in proteins and 75% in fats. All data from ecoinvent report, n 15a, pg 40, except C-content in protein, that comes from Determination of protein concentration by total organic carbon analysis, Rouwenhorst et al., 1991, J Biochem and Biophys Methods, 22:119-128.
- packaging, for fertilisers: 0.0386042 kg; lognormal variance with pedigree 0.0532, pedigree (4,3,3,5,4)
  Total amount of active substance/s of fertilisers needed for the production of 'maize silage' is calculated to be circa 1.93E-02 kg. Fertiliser/s used in this dataset is/are: 'lime', 'phosphate fertiliser, as P2O5', 'potassium fertiliser, as K2O', 'urea, as N'. The total amount of active substance/s is doubled in order to account for the packaging of the dilluted product of fertiliser/s that is/are applied. Therefore, 3.86E-02 kg of packaging for fertilisers is justified with this exchange.
  properties: carbon content, fossil 0.825301, dry mass 1 kg, heating value, net 25.01 MJ, price 0.0642 EUR2005, wet mass 1 kg
  note on carbon content, fossil: Considering a chemical formula (C2H4)n for polyethylene, carbon content-fossil is calculated to be 0.856286 kg of Carbon per kg of dry mass.
- packaging, for pesticides: 0.000156554 kg; lognormal variance with pedigree 0.0532, pedigree (4,3,3,5,4)
  Total amount of active substance/s of pesticides needed for the production of maize silage is calculated to be circa 7.83E-05 kg. Pesticide/s used in this dataset is/are: 'atrazine', 'glyphosate', 'pesticide, unspecified'. The total amount of active substance/s is doubled in order to account for the packaging of the dilluted product of pesticide/s that is/are applied. Therefore, 1.57E-04 kg of packaging for pesticides is justified with this exchange.
  properties: carbon content, fossil 0.85714, dry mass 1 kg, heating value, net 25.97 MJ, price 0.0642 EUR2005, wet mass 1 kg
- pesticide, unspecified: 1.4426e-5 kg; lognormal variance with pedigree 0.0434, pedigree (2,2,3,3,4)
  Amount for typical system from May et al. (2016). This exchange represents the input of Imidacloprid (16.5%); Thiodicarb (18.6%); Beta-Cyfluthrin (1.3%); Methyl esther (49.6%); and Tembotrione (13.9%).
  Uncertainty: Variance of log-transformed data as recommended by Ecoinvent for "Primary energy carriers, metals, salts" for agriculture.
  properties: carbon content, fossil 0.486978, dry mass 1 kg, wet mass 1 kg
- planting with starter fertiliser, by no till planter: 1.98649e-5 ha; = 1*T_t*1E-04; lognormal variance with pedigree 0.0427, pedigree (3,2,5,1,1)
  Maize seeds planting operation with the application of starter fertiliser inside the groove. Amount for typical system from May et al. (2016).
- tap water: 0.011919 kg; name water_dilution; = 3*T_t*1E-04*200; lognormal variance with pedigree 0.0434, pedigree (2,2,3,3,4)
  Water is used to dilute pesticides in a rate of 200 liters per application. Amount for typical system from May et al. (2016).
  properties: carbon content, fossil 0.00178991, dry mass 0.000337476 kg, water content 2962.17, wet mass 1 kg
  note on carbon content, fossil: Bicarbonate content is 2.93 mol/m3. CO2 content is 0.1 mol/m3 (ecoinvent v2.2 report 8, Tab 93.1).
- transport, tractor and trailer, agricultural: 7.35538e-5 metric ton*km; = 3.7027 * T_t * 1E-04; lognormal variance with pedigree 0.3447, pedigree (3,3,3,3,4)
  Transports inside the field of: grains (total distance = 0.6 km/ha; total load = 0.6 t/ha), side dressing fertiliser (total distance = 0.14 km/ha; total load = 0.14 t/ha), starter fertiliser (total distance = 0.16 km/ha; total load = 0.16 t/ha) and water (total distance = 0.13 km/ha; total load = 0.13 t/ha) respectively. Amount for typical system from May et al. (2016). Transport of water from the water source to the field to supply the pesticide sprayer. Long distances are involved in maize production in Brasil what makes necessary the transportation, e.g., of water from the captation to the application in order to keep the operation of pesticide spraying continuos. Amount for typical system from May et al. (2016).
- urea: 0.00553623 kg; name N_fert; = (N_total * T_t * 1E-04)*2.14379903903132; lognormal variance with pedigree 0.0434, pedigree (2,2,3,3,4)
  The exchange has been updated from 'urea, as N' into 'urea' and therefore its amount has been scaled (multiplied) from 0.0026 kg by 2.1438 kg of 'urea' per kg of 'urea, as N'. Original comment of the exchange is: Urea as Nitrogen fertiliser. Amount for typical system from May et al. (2016).
  properties: carbon content, fossil 0.2, dry mass 1 kg, wet mass 1 kg

## Inputs from nature
- Carbon dioxide, in air [natural resource, in air]: 0.611956 kg; = 44/12 * (REF_PRODUCT_C_content_non_fossil * REF_PRODUCT * REF_PRODUCT_DM - maize_seed_sowing_C_content_non_fossil * SEED * maize_seed_sowing_DM); lognormal variance with pedigree 0.0434, pedigree (2,2,3,3,4)
  CO2 absorbed during photosyntesis. See "3.1 CO2 from the Atmosphere" in Nemececk & Schnetzer (2011).
  Uncertainty: Variance of log-transformed data as recommended by Ecoinvent for "Primary energy carriers, metals, salts" for agriculture.
- Energy, gross calorific value, in biomass [natural resource, biotic]: 6.6325 MJ; = REF_PRODUCT_energy_content; lognormal variance with pedigree 0.0434, pedigree (2,2,3,3,4)
  Calorific value of maize silage based on Ecoinvent database.
  Uncertainty: Variance of log-transformed data as recommended by Ecoinvent for "Primary energy carriers, metals, salts" for agriculture.
- Occupation, annual crop, non-irrigated, intensive [natural resource, land]: 0.198649 m2*year; = T_t; lognormal variance with pedigree 0.0441, pedigree (3,2,5,1,1)
  Maize occupation may range around 120 days. Users must adjust this mathematical relation to their needs. The final amount was allocated due to being a cropping system. The fallow period considered is around 130 days.
  Uncertainty: Variance of log-transformed data as recommended by Ecoinvent for "Land use, occupation" for agriculture.
- Transformation, from annual crop, non-irrigated [natural resource, land]: 0.198649 m2; = T_t; lognormal variance with pedigree 0.0501, pedigree (3,2,5,1,1)
  Amount for typical system from May et al. (2016).
- Transformation, to annual crop, non-irrigated [natural resource, land]: 0.198649 m2; = T_t; lognormal variance with pedigree 0.0501, pedigree (3,2,5,1,1)
  Amount for typical system from May et al. (2016).

## Emissions to nature
- Ammonia [air, non-urban air or from high stacks]: 0.000627164 kg; name NH3; = 17/14*N_fert*0.466461632733939*0.2; lognormal variance with pedigree 0.0587, pedigree (4,3,3,3,4)
  NH3 emissions from applied mineral fertilisers are calculated according to EEA/EMEP (2013), page 35. For urea it is 20% to soils with pH<=7 (brazilian conditions).
  Uncertainty: Variance of log-transformed data as recommended by Ecoinvent for "CH4, NH3" for agriculture.
- Carbon dioxide, fossil [air, non-urban air or from high stacks]: 0.0101243 kg; = ((44/12*0.125*L_total)+(N_total*1.57))* T_t*1E-04; lognormal variance with pedigree 0.0513, pedigree (4,3,3,3,4)
  Emissions of CO2 to air from limestone and urea application based on IPCC (2006).
  Uncertainty: Variance of log-transformed data as recommended by Ecoinvent for "CO2" for combustion emissions.
- Dinitrogen monoxide [air, non-urban air or from high stacks]: 6.78808e-5 kg; name N2O; = 44/28*(0.01*((N_total+ Ncrop_residues)*T_t*1E-04)+ 0.01*14/17*NH3 + 0.0075*14/62*NO3); lognormal variance with pedigree 0.1987, pedigree (4,3,5,3,5)
  Emissions of N2O to the air. See "2.4 EMISSIONS OF N2O TO THE AIR" in Nemecek & Schnetzer (2011), with "nitrogen contained in the crop residues" Ncr = 30 kg N/ha from Coelho (2007).
  Uncertainty: Variance of log-transformed data as recommended by Ecoinvent for "NOX, N2O" for agriculture.
- Nitrogen oxides [air, non-urban air or from high stacks]: 1.4255e-5 kg; = N2O*0.21; lognormal variance with pedigree 0.0807, pedigree (4,3,3,3,4)
  Emissions of NOx to the air. See "2.5 EMISSIONS OF NOX TO THE AIR" in Nemecek & Schnetzer (2011).
  Uncertainty: Variance of log-transformed data as recommended by Ecoinvent for "NOX, N2O" for agriculture.
- Atrazine [soil, agricultural]: 4.9544e-5 kg; lognormal variance with pedigree 0.0837, pedigree (4,3,3,3,4)
  "All pesticides applied for crop production were assumed to end up as emissions to the soil. The amounts of pesticides used as inputs were thus simultaneously calculated as outputs (emissions to agricultural soil)", as recomended by Nemecek & Schnetzer (2011), "2.9 EMISSIONS OF PESTICIDES TO AGRICULTURAL SOIL" (page 21).
- Cadmium II [soil, agricultural]: 3.299e-8 kg; lognormal variance with pedigree 0.0907, pedigree (4,3,3,3,4)
  Emissions of heavy metals to soil and surface water estimated from mineral fertilisers and liming as recommended by Canals (2003), metal content in maize from Anjos & Mattiazzo (2000).
  Uncertainty: Variance of log-transformed data as recommended by Ecoinvent for "Heavy metals" for agriculture.
- Chromium III [soil, agricultural]: 3.5473e-7 kg; lognormal variance with pedigree 0.0907, pedigree (4,3,3,3,4)
  (same comment as for Cadmium II)
- Copper ion [soil, agricultural]: 3.4645e-8 kg; lognormal variance with pedigree 0.0907, pedigree (4,3,3,3,4)
  Emissions of heavy metals to soil and surface water estimated from mineral fertilisers and liming as recommended by Canals (2003), metal content in maize from Anjos & Mattiazzo (2000).
- Glyphosate [soil, agricultural]: 1.4307e-5 kg; lognormal variance with pedigree 0.0837, pedigree (4,3,3,3,4)
  (same comment as for Atrazine)
- Imidacloprid [soil, agricultural]: 2.3767e-6 kg; lognormal variance with pedigree 0.0837, pedigree (4,3,3,3,4)
  "All pesticides applied for crop production were assumed to end up as emissions to the soil. The amounts of pesticides used as inputs were thus simultaneously calculated as outputs (emissions to agricultural soil)", as recomended by Nemecek & Schnetzer (2011), "2.9 EMISSIONS OF PESTICIDES TO AGRICULTURAL SOIL" (page 21).
  Uncertainty: Variance of log-transformed data as recommended by Ecoinvent for "Pesticides" for agriculture.
- Lead II [soil, agricultural]: 8.6081e-7 kg; lognormal variance with pedigree 0.0907, pedigree (4,3,3,3,4)
  (same comment as for Cadmium II)
- Nickel II [soil, agricultural]: 4.5169e-7 kg; lognormal variance with pedigree 0.0907, pedigree (4,3,3,3,4)
  (same comment as for Cadmium II)
- Pesticides, unspecified [soil, agricultural]: 1.2061e-5 kg; lognormal variance with pedigree 0.0837, pedigree (4,3,3,3,4)
  "All pesticides applied for crop production were assumed to end up as emissions to the soil. The amounts of pesticides used as inputs were thus simultaneously calculated as outputs (emissions to agricultural soil)", as recomended by Nemecek & Schnetzer (2011), "2.9 EMISSIONS OF PESTICIDES TO AGRICULTURAL SOIL" (page 21). This exchange represents the emissions of methyl ester (59.5%); thiodicarb (22.3%); tembotrione (16.7); and beta-cyfluthrin (1.5%).
  Uncertainty: Variance of log-transformed data as recommended by Ecoinvent for "Pesticides" for agriculture.
- Zinc II [soil, agricultural]: -2.7905e-6 kg; normal variance with pedigree 0.1, pedigree (4,3,3,3,4)
  Emissions of heavy metals to soil and surface water estimated from mineral fertilisers and liming as recommended by Canals (2003), metal content in maize from Anjos & Mattiazzo (2000). Nemecek & Schnetzer (2011) state that "some of the values for emissions of heavy metals to the soil are negative. This means that more heavy metals are exported than imported. It must, however, be borne in mind that these heavy metals are transferred either to the water bodies or to the products harvested from the field".
- Cadmium II [water, surface water]: 3.299e-12 kg; lognormal variance with pedigree 0.1407, pedigree (4,3,3,3,4)
  (same comment as for Cadmium II)
- Chromium III [water, surface water]: 3.5473e-11 kg; lognormal variance with pedigree 0.1407, pedigree (4,3,3,3,4)
  (same comment as for Copper ion)
- Copper ion [water, surface water]: 3.4645e-12 kg; lognormal variance with pedigree 0.1407, pedigree (4,3,3,3,4)
  (same comment as for Copper ion)
- Lead II [water, surface water]: 8.6081e-11 kg; lognormal variance with pedigree 0.1407, pedigree (4,3,3,3,4)
  (same comment as for Cadmium II)
- Nickel II [water, surface water]: 4.5169e-11 kg; lognormal variance with pedigree 0.1407, pedigree (4,3,3,3,4)
  (same comment as for Cadmium II)
- Nitrate [water, ground-]: 0.00368937 kg; name NO3; = 62/14*((21.37 + precipitation/(Clay_content*root_depth) * (0.0037*N_total + 0.0000601*Norg_soil - 0.00362*Nuptake_plant)) * T_t * 1E-04); lognormal variance with pedigree 0.0907, pedigree (4,3,3,3,4)
  See "2.2.2 The SQCB-NO3 model" in Nemececk & Schnetzer (2011), as "SALCA-NO3 model" has "Geographic scope of application: Europe". U= 196 Kg N/ha for Nitrogen uptake also from Nemececk & Schnetzer (2011), table 2.16. Norg = 10 t/ha for typical system from May et al. (2016).
  Uncertainty: Variance of log-transformed data as recommended by Ecoinvent for "NO3, PO4" for agriculture.
- Phosphorus [water, surface water]: 1.76209e-6 kg; = soil_eroded * 0.00095 * 1.86 * 0.2 * T_t*1E-04; lognormal variance with pedigree 0.0907, pedigree (4,3,3,3,4)
  Due to phosphorus low mobility in Brazilian soils, its emissions through leaching and run-off were disregarded (Novais & Smyth, 1999). Only P emission by water erosion through surface water was considered, as in "2.3.3 Phorsphorous Emissions Through Water Erosion to Surface Water" Nemecek and Schnetzer (2011).
  Uncertainty: Variance of log-transformed data as recommended by Ecoinvent for "NO3, PO4" for agriculture.
- Zinc II [water, unspecified]: -2.7905e-10 kg; normal variance with pedigree 0.1, pedigree (4,3,3,4,4)
  (same comment as for Zinc II)

## Sampling procedure
The main source of data for agricultural inputs and operations are projects conducted by Embrapa Milho e Sorgo (CNPMS) and Embrapa Soja (CNPSO). Data are also provided by relevant experts related to agricultural sector of maize in Rio Grande do Sul state (BR).
Emissions from the agricultural process are estimated according to Nemecek and Schnetzer (2011) and Canals (2003).
This model for the maize silage production for cattle feed was based on the system for maize grain production used in the northwest region of Rio Grande do Sul state. This maize grain production system was chosen as basis for estimating maize silage production exchanges because it is one of the last systems in Brazil that do not depend on rotation with soybean (that does not occur in maize silage production, either). Fertilisers, pesticides and al other exchanges used were assumed to be the same use for the maize grain production system, adjusted proportionally to the yield for maize silage production usual in Brazil, that is much higher for maize silage, as it includes most of the plant: 5 kg/m2/year; and with a much higher moisture content: 65% of water content in wet mass. Pedigree matrix was adjusted for all exchanges considering these assumptions.

Potassium fertiliser used is K2O, phosphate fertiliser used is P2O5 (87,5 kg/ha/year each), nitrogen fertiliser used is urea (130 kg/ha/year).

Pesticides used are atrazine (2,5 kg/ha/year, glyphosate (720 g/ha/year) and other unspecified (720 g/ha/year).

## Extrapolations
A system for maize grain production was used as basis for the maize silage BR production. The maize grain system used corresponds to the northwest region of Rio Grande do Sul state that represents 24% of the total production in BR-RS, according to grains survey from IBGE/SIDRA (2016) (https://sidra.ibge.gov.br/home/ipca15/brasil).
Carbon content, water content and gross calorific value are based on ecoinvent database for all exchanges.

## Review by Jens Lansche 2017-11-17
All review comments considered.
