# atrazine production

Dataset: EcoSpold 2, unit process
Geography: RoW
Time period: 2000-01-01 to 2023-12-31
Technology level: current
Classification: ISIC rev.4 ecoinvent: 2021:Manufacture of pesticides and other agrochemical products
Classification: EcoSpold01Categories: agricultural means of production/pesticides
Synonyms: Dicazin; Mais Mextrol Ultra, Maizim, Metrazin LG, Primagram S Gold, Sailor 550, Trilox LG; Atrazin Hoko; Atrazin Omya; Azit; Mais-Certrol; Atrazin 500 flow; Atratex WG; Apan; Primagram S Gold; Trilox LG; Atrazin 90 WG; Maizim; Atrazin 50; Metrazin LG; Atrazin 500 fl; Mais Mextrol Ultra; Laddok; Century; Sailor 550; Gesaprim; Atrazin S; Atrabenz; Atratex WP
Scenario: Business-as-Usual
System model: Allocation, cut-off by classification
Share of production covered: 100 %
Generated by: Jürgen Sutter
Published in: Nemecek, T. 2007
Database: ecoinvent
isCopyrightProtected: true
accessRestrictedTo: 1

## General comment
This dataset represents the production of atrazine (1 kg of active ingredient). Raw materials are modelled with a stoichiometric calculation. Energy consumption is modelled with data from a similar process. The emissions are estimated. Infrastructure is included with a default value.

## Included activities start
From reception of precursors (ammonia, cyanuric chloride, ethanol, isopropanol, and sodium hydroxide) at the factory gate.

## Included activities end
This activity ends with atrazine at the factory gate. The dataset includes the input materials, energy uses, infrastructure and emissions. The dataset doesn't include emulsives, additives etc.

## Geography
The inventory is modelled for Europe.

## Technology
pesticides

## Time period
Time of publications

## Parameters
- fraction, cooling water, cooling pond system, to air: 0.032 dimensionless; name fraction_CW_CP_to_air; lognormal variance with pedigree 0.0413, pedigree (2,3,1,3,1)
  Calculated based on literature value (Scown, C.D., 2011, Water Footprint of U.S. Transportation Fuels and supplying information of the article) (Vionnet, S., Quantis Water Database - Technical Report, 2012).
- fraction, cooling water, once-through system, to air: 0.004 dimensionless; name fraction_CW_OT_to_air; lognormal variance with pedigree 0.0413, pedigree (2,3,1,3,1)
  (same comment as for fraction, cooling water, cooling pond system, to air)
- fraction, cooling water, recirculating system, to air: 0.771 dimensionless; name fraction_CW_R_to_air; lognormal variance with pedigree 0.0413, pedigree (2,3,1,3,1)
  (same comment as for fraction, cooling water, cooling pond system, to air)
- fraction, cooling water, to air: 0.3875 dimensionless; name fraction_CW_to_air; = (0.5*fraction_CW_OT_to_air)+(0.5*fraction_CW_R_to_air); lognormal variance with pedigree 0.092025, pedigree (4,4,3,2,4)
  Calculated value based on literature value (see comments of the other parametres present in this dataset) and expert opinion. In the case when no industry/literature data are available about the type of cooling or directly fraction, cooling water, to air specific for the process a default assumption is applied. It is assumed that the once-through cooling system is used in 50% of all cases and recirculating system is used in another 50% of all cases.

## Reference product
- atrazine: 1 kg; By-product classification allocatable product; CPC 34663: Herbicides, anti-sprouting products and plant-growth regulators; HS2017 380893: Herbicides, anti-sprouting products and plant-growth regulators; other than containing goods of Subheading [...]; CAS 1912-24-9
  EcoSpold01Location=RER
  production volume 8.24971e7 kg; = 2E8*0.7
    Estimated production from 70% of the precursor cyanuric chloride (200 million kg) as suggested by Ullmann's.
  property price 2.60468 EUR2005
    Calculated based on inputs: The price of the product has been calculated as a sum of the values of the material and energy inputs for this product. This value is therefore a rough estimation. It may underestimate the real price since there are additional expenses when producing any product. These expences can include for example labour costs, treatment of waste materials and profit for the producer. Please consider carefully whether this level of data quality is acceptable for your application.
  properties: carbon allocation 0.446512 kg, carbon content 0.446512, carbon content, fossil 0.446512, carbon content, non-fossil 0, dry mass 1 kg, water content 0, water in wet mass 0 kg, wet mass 1 kg

## Inputs from technosphere
- ammonia, anhydrous, liquid: 0.00503241, 0.00976894, 0.108282, 0.00457717, 0.00102389, 0.0376298, 0.00323473, 0.00997099 kg (8 suppliers, which the file names only by identifier); sum of these 0.17952 kg; = (17.03*2/215.686)/0.95^2.5; lognormal variance with pedigree 0.078, pedigree (4,5,5,5,1)
  EcoSpold01Location=RER
  Stoichiometric calculation, assuming an efficiency of 95% per reaction step.
  Further references:
  Eller et al. 2000. Karsten Eller, Erhard Henkes, Roland Rossbacher, Hartmut Höke: Amines, Aliphatic. In: Ullmann's Encyclopedia of Industrial Chemistry, Seventh Edition, 2009 Electronic Release (ed. Fiedler E., Grossmann G., Kersebohm D., Weiss G. and Witte C.). 7 th Electronic Release Edition. Wiley InterScience, New York, Article Online Posting Date: June 15, 2000. Online-Version under: DOI: 10.1002/14356007.a02_001
  Frauenkron et al. 2001. Matthias Frauenkron, Johann-Peter Melder, Günther Ruider, Roland Rossbacher, Hartmut Höke: Ethanolamines and Propanolamines. In: Ullmann's Encyclopedia of Industrial Chemistry, Seventh Edition, 2009 Electronic Release (ed. Fiedler E., Grossmann G., Kersebohm D., Weiss G. and Witte C.). 7 th Electronic Release Edition. Wiley InterScience, New York, Article Online Posting Date: September 15, 2001. Online-Version under: DOI: 10.1002/14356007.a10_001
  Kim et al. 2003. Kim S., Overcash M.: Energy in chemical manufacturing processes: gate-to-gate information for life cycle assessment. In: Journal of Chemical Technology & Biotechnology vol. 78, no. 9: 995-1005(11). 2003
  Uncertainty: Stoechiometric calculation
  properties: dry mass 1 kg, wet mass 1 kg
- chemical factory, organics: 1.6e-9 unit; = 4*4E-10; lognormal variance with pedigree 0.318, pedigree (4,1,5,1,1)
  EcoSpold01Location=RER
  Estimation, based on a production capacity of 50,000 t per year and a plant life time of 50 years, therefore an amount of 4X10-10 units per kg of produced chemical is aded to the unit process of the respective chemical. The amount is accounted for each production step. This might be an overestimation in some multistep syntheses.
  Uncertainty: Estimation
- cyanuric chloride: 0.947366 kg; = (184.411/215.686)/0.95^2
  stoichiometric relation between cyanuric chloride and atrazine (original data were per kg atrazine) considering a product loss of 5% in each of 2 production steps from cyanuric chloride to atrazine.
  properties: carbon content, fossil 0.1954, dry mass 1 kg, wet mass 1 kg
- electricity, medium voltage: 0.027502, 0.548603, 0.184329, 0.00842205, 0.00168566, 0.00036195, 0.0566518 kWh (7 suppliers, which the file names only by identifier); sum of these 0.827556 kWh; = 0.38*3.2*2.45/3.6; lognormal variance with pedigree 0.078, pedigree (4,5,5,5,1)
  Estimation, assuming a default value, originated from calculation of avarage consumption of electricity and heat per kg of product (3.2 MJ kg-1), and a resulting amount of electricity of 0,333 kW for every reaction step per kg reaction product, considering that the demand is made up of a mix that inlcudes 38% electricity. Additionally, reaction steps are approximated with energy consumption data, assuming that inventory flows can be estimated using process data for basic operation steps, available for specific organic chemicals.
  Calculation of product amounts of the different process steps: atrazine 1 kg; Precursor (C5H6Cl2N4) 0.942 kg; isopropylamine 0.288 kg; ethylamine 0.22 kg
  Further references:
  Kim S., Overcash M.: Energy in chemical manufacturing processes: gate-to-gate information for life cycle assessment. In: Journal of Chemical Technology & Biotechnology vol. 78, no. 9: 995-1005(11). 2003
  EcoSpold01Location=UCTE
  Uncertainty: Estimation
- ethanol, without water, in 99.7% solution state, from ethylene: 0.248751 kg; = (46/215.686)/0.95^3; lognormal variance with pedigree 0.078, pedigree (4,5,5,5,1)
  EcoSpold01Location=RER
  Stoichiometric calculation, assuming an efficiency of 95% per reaction step.
  Uncertainty: Stoechiometric calculation
  properties: carbon content, fossil 0.521739, dry mass 1 kg, heating value, net 28.1 MJ, wet mass 1 kg
  note on heating value, net: Based on literature, page 275, Report 17: Jungbluth, N., Chudacoff, M., Dauriat, A., Dinkel, F., Doka, G., Faist Emmenegger, M., Gnansounou, E., Kljun, N., Schleiss, K., Spielmann, M., Stettler, C., Sutter, J. 2007: Life Cycle Inventories of Bioenergy. ecoinvent report No. 17, Swiss Centre for Life Cycle Inventories, Dübendorf, CH.
- heat, district or industrial, natural gas: 0.0620809, 3.77792 MJ (2 suppliers, which the file names only by identifier); sum of these 3.84 MJ; = 0.5*3.2*2.4; lognormal variance with pedigree 0.078, pedigree (4,5,5,5,1)
  Estimation, assuming a default value, originated from calculation of avarage consumption of electricity and heat per kg of product (3.2 MJ kg-1), and a resulting amount of heat of 2 MJ for every reaction step per kg reaction product, considering that the demand is made up of a mix that includes 50% natural gas. Additionally, reaction steps are approximated with energy consumption data, assuming that inventory flows can be estimated using process data for basic operation steps, available for specific organic chemicals.
  Calculation of product amounts of the different process steps: atrazine 1 kg; Precursor (C5H6Cl2N4) 0.942 kg; isopropylamine 0.288 kg; ethylamine 0.22 kg
  Further references:
  Kim S., Overcash M.: Energy in chemical manufacturing processes: gate-to-gate information for life cycle assessment. In: Journal of Chemical Technology & Biotechnology vol. 78, no. 9: 995-1005(11). 2003
  Uncertainty: Estimation
  properties: heating value, net 1 MJ
- heat, district or industrial, other than natural gas: 0.940364, 0.000435653 MJ (2 suppliers, which the file names only by identifier); sum of these 0.9408 MJ; = 0.12*3.2*2.45; lognormal variance with pedigree 0.078, pedigree (4,5,5,5,1)
  Estimation, assuming a default value, originated from calculation of avarage consumption of electricity and heat per kg of product (3.2 MJ kg-1), and a resulting amount of heat of 2 MJ for every reaction step per kg reaction product, considering that the demand is made up of a mix that inlcudes 12% steam from external energy sources. Additionally, reaction steps are approximated with energy consumption data, assuming that inventory flows can be estimated using process data for basic operation steps, available for specific organic chemicals.
  Calculation of product amounts of the different process steps: atrazine 1 kg; Precursor (C5H6Cl2N4) 0.942 kg; isopropylamine 0.288 kg; ethylamine 0.22 kg
  Further references:
  Kim S., Overcash M.: Energy in chemical manufacturing processes: gate-to-gate information for life cycle assessment. In: Journal of Chemical Technology & Biotechnology vol. 78, no. 9: 995-1005(11). 2003
  Uncertainty: Estimation
  properties: heating value, net 1 MJ
- isopropanol: 0.308749 kg; = (60.1/215.686)/0.95^2; lognormal variance with pedigree 0.078, pedigree (4,5,5,5,1)
  Stoichiometric calculation, assuming an efficiency of 95% per reaction step.
  Further references:
  Frauenkron et al. 2001. Matthias Frauenkron, Johann-Peter Melder, Günther Ruider, Roland Rossbacher, Hartmut Höke: Ethanolamines and Propanolamines. In: Ullmann's Encyclopedia of Industrial Chemistry, Seventh Edition, 2009 Electronic Release (ed. Fiedler E., Grossmann G., Kersebohm D., Weiss G. and Witte C.). 7 th Electronic Release Edition. Wiley InterScience, New York, Article Online Posting Date: September 15, 2001. Online-Version under: DOI: 10.1002/14356007.a10_001
  Kim et al. 2003. Kim S., Overcash M.: Energy in chemical manufacturing processes: gate-to-gate information for life cycle assessment. In: Journal of Chemical Technology & Biotechnology vol. 78, no. 9: 995-1005(11). 2003
  EcoSpold01Location=RER
  Uncertainty: Stoechiometric calculation
  properties: carbon content, fossil 0.6, dry mass 1 kg, heating value, net 34.3 MJ, wet mass 1 kg
- sodium hydroxide, without water, in 50% solution state: 0.37091 kg; = 40*2/215.686; lognormal variance with pedigree 0.078, pedigree (4,5,5,5,1)
  EcoSpold01Location=RER
  Stoichiometric calculation, assuming an efficiency of 100%
  Uncertainty: Stoechiometric calculation
  properties: dry mass 1 kg, heating value, net 3.03 MJ, wet mass 1 kg

## Inputs from nature
- Water, cooling, unspecified natural origin [natural resource, in water]: 0.0588 m3; name water_cooling_UNO_input; = 0.024*2.45; source Gendorf 2000; lognormal variance with pedigree 0.078, pedigree (4,5,5,5,1)
  Estimation (24 kg cooling water per kg produced chemical per step):
  Calculation of product amounts of the different process steps: atrazine 1 kg; Precursor (C5H6Cl2N4) 0.942 kg; isopropylamine 0.288 kg; ethylamine 0.22 kg
  Estimation (24 kg cooling water per kg produced chemical per step):
  Calculation of product amounts of the different process steps: atrazine 1 kg; Precursor (C5H6Cl2N4) 0.942 kg; isopropylamine 0.288 kg; ethylamine 0.22 kg
  Uncertainty: Estimation

## Emissions to nature
- Ammonia [air, urban air close to ground]: 0.00035967 kg; lognormal variance with pedigree 0.088, pedigree (4,1,5,1,1)
  Estimation, based on the assumption that 0.2% of volatile input materials is emitted to air occurring from the purge vent, the destillation vent and fugitive emission sources.
  Uncertainty: Estimation
- Carbon dioxide, fossil [air, urban air close to ground]: 0.18 kg; lognormal variance with pedigree 0.0486, pedigree (4,1,5,1,1)
  (same comment as for Ammonia)
- Ethanol [air, urban air close to ground]: 0.00052682 kg; lognormal variance with pedigree 0.058, pedigree (4,1,5,1,1)
  (same comment as for Ammonia)
- Ethylamine [air, urban air close to ground]: 0.00046383 kg; lognormal variance with pedigree 0.058, pedigree (4,1,5,1,1)
  (same comment as for Ammonia)
- Isopropanol [air, urban air close to ground]: 0.00065279 kg; lognormal variance with pedigree 0.058, pedigree (4,1,5,1,1)
  (same comment as for Ammonia)
- Isopropylamine [air, urban air close to ground]: 0.00057772 kg; lognormal variance with pedigree 0.058, pedigree (4,1,5,1,1)
  (same comment as for Ammonia)
- Water [air, unspecified]: 0.022785 m3; name water_to_air_unspecified; = water_cooling_UNO_input*fraction_CW_to_air; lognormal variance with pedigree 0.0827, pedigree (2,2,5,5,1)
  Calculated value based on literature values and expert opinion. See comments in the parametres' comment field.
  property fraction, origin: fresh water 0; name fraction_origin_fresh_water
  property fraction, origin: salt water 0; name fraction_origin_salt_water
  property fraction, origin: unspecified 1; name fraction_origin_unspecified
- Ammonium [water, surface water]: 0.0026339 kg; lognormal variance with pedigree 0.058, pedigree (4,1,5,1,1)
  Estimation, assuming that the remaining amount of unreacted input materials leave the production process with the wastewater, wich is further treated in an internal wastewater plant.
  Uncertainty: Estimation
- Chloride [water, surface water]: 0.4412 kg; = 1.103*2/5; lognormal variance with pedigree 0.318, pedigree (4,1,5,1,1)
  (same comment as for Ammonium)
- Ethanol [water, surface water]: 0.0025814 kg; lognormal variance with pedigree 0.318, pedigree (4,1,5,1,1)
  (same comment as for Ammonium)
- Ethylamine [water, surface water]: 0.0011132 kg; lognormal variance with pedigree 0.318, pedigree (4,1,5,1,1)
  (same comment as for Ammonium)
- Isopropanol [water, surface water]: 0.0031987 kg; lognormal variance with pedigree 0.318, pedigree (4,1,5,1,1)
  (same comment as for Ammonium)
- Isopropylamine [water, surface water]: 0.0013865 kg; lognormal variance with pedigree 0.318, pedigree (4,1,5,1,1)
  (same comment as for Ammonium)
- Sodium I [water, surface water]: 0.24588 kg; = 0.6147*2/5; lognormal variance with pedigree 0.668, pedigree (4,1,5,1,1)
  (same comment as for Ammonium)
- Water [water, unspecified]: 0.036015 m3; name water_to_water_unspecified; = water_cooling_UNO_input*(1-fraction_CW_to_air); lognormal variance with pedigree 0.0827, pedigree (2,2,5,5,1)
  (same comment as for Water)
  property carbon content, fossil 0; name C_content_fossil
  property carbon content, non-fossil 0; name C_content_non_fossil
  property dry mass 0 kg; name DM
  property fraction, origin: fresh water 0; name fraction_origin_fresh_water_Ww
  property fraction, origin: salt water 0; name fraction_origin_salt_water_Ww
  property fraction, origin: unspecified 1; name fraction_origin_unspecified_Ww
  property water in wet mass 1000 kg; name WWM
  property wet mass 1000 kg; name WM

## Sampling procedure
Literature data

## Extrapolations
Transports and emissions are modelled with standard methods. This dataset has been copied from an original dataset covering the geography RER. The uncertainty has been adjusted accordingly.

## Review by Thomas Nemecek 2010-03-11
Passed.
none
