# electricity production, nuclear, aluminium industry

Dataset: EcoSpold 2, unit process
Geography: IAI Area, EU27 & EFTA
Time period: 2015-01-01 to 2023-12-31
Technology level: current
Classification: EcoSpold01Categories: hard coal/power plants
Classification: ISIC rev.4 ecoinvent: 3510:Electric power generation, transmission and distribution
Tags: electricity, primary aluminium industry; re-labelling activity
Scenario: Business-as-Usual
System model: Allocation, cut-off by classification
Generated by: Djibril RENE
Database: ecoinvent
isCopyrightProtected: true
accessRestrictedTo: 1

## General comment
This is a dataset used to create an aluminium industry specific electricity market for aluminium-producing countries within EU27 and EFTA (see Geography comment field for list of countries). The production volume represents the total amount of electricity from nuclear used for aluminium production (electrolysis and ingot casting) in the region. The dataset also identifies the technology and country providing the electricity from nuclear power plants.
Electricity markets specific to the aluminium-industry are needed in an LCI database because primary aluminium production is very energy intensive, and hence the location of production plants is often determined by access to large amounts of cheap electricity, which often results in an electricity mix that is different from the general grid mix of the countries where the production plants are located.
It is assumed that the production of electricity in general and in aluminium industry specific power plants is identical. Details on actual electricity generation with each technology can be found in the corresponding datasets.
The share of electricity produced using pressure water reactors and boiling water reactors is calculated using both (1) estimates of the share of nuclear power coming from each country within EU27+EFTA; and (2) ecoinvent v3.2 country-specific split of nuclear power plants between pressure water reactors and boiling water reactors. The share of nuclear electricity in each country was calculated by distributing the total nuclear electricity used in aluminium production in the EU27+EFTA region (using regional data supplied by the International Aluminium Institute [IAI] and the European Aluminium Association [EAA]). The distribution is weighted by country-specific aluminium production volumes (source: EAA personal communication) and general grid mix in the respective countries (source: International Energy Agency). Exceptions to the general procedure are Greece, Slovakia and Slovania, for which the IAI provided country-specific aluminium-specific grid mixes.
Calculations are detailed in the report 'Calculating grid mixes for the aluminium industry in ecoinvent v3', available on the ecoinvent website.

## Included activities start
Re-labelling dataset, not representing a real transformation activity. Conceptually, the activity can be said to start with the production of electricity.

## Included activities end
Re-labelling dataset, not representing a real transformation activity. Conceptually, the activity can be said to end with a given amount of high voltage electricity labelled as specifically used for the production of electricity.

## Geography
Aluminium producing European countries within EU27 and EFTA whose aluminium producers are part of the European Aluminium Association (France, Germany, Greece, Iceland, Italy, Netherlands, Norway, Spain, Sweden, United Kingdom, Romania, Slovakia and Slovenia)

## Time period
Production volume updated with 2015 data from IAI

## Reference product
- electricity, high voltage, aluminium industry: 1 kWh; = Boil_SE+Boil_GB+Boil_DE+Boil_ES+Pres_SK+Pres_GB+Pres_ES+Pres_NL+Pres_FR+Pres_SI+Pres_DE+Pres_SE+PWHR_RO; By-product classification allocatable product; CPC 17100: Electrical energy; HS2017 271600: Electrical energy
  Expressed as sum of contributing technologies (inputs) to allow uncertainty analysis: each technology share is uncertain, and in a Monte Carlo analysis will always be normalized by the sum contribution of each technology
  production volume 8.9077e9 kWh
    The production volume, which is ultimately used to determine the share of nuclear-based electricity in the downstream market for aluminium industry specific high voltage electricity, is calculated by multiplying the following data:
    (1) electricity mix used to produce aluminium in the EU27+EFTA region, provided by the European Aluminium Association (EAA) and validated by the International Aluminium Institute.
    (2) primary aluminium production volumes of each aluminium producing country in the EU27+EFTA region, provided by EAA.
    (3) electricity requirements, per tonne primary aluminium, for both Söderberg (global average) and prebake (region-specific data) electrolysis technologies, as well as the EU27+EFTA specific proportion of aluminium produced by each technology.
    (4) electricity compensating line and transformation losses from production to consumption as medium voltage electricity. Losses estimated using country-level ecoinvent v3.2 data for all countries.
    (5) electricity consumed in ingot casting.
  property price 0.0977 EUR2005
    Calculated in temporary price data. 94% of the average price (to account for a 6% loss in transformation and transmission) for electricity for industrial consumersin 2005 (excluded taxes). From IEA.
  properties: carbon allocation 0 kg, carbon content 0

## Inputs from technosphere
All rows: lognormal variance with pedigree 0.0113, pedigree (3,2,4,1,2)
- electricity, high voltage: 0.0242718 kWh; name Boil_DE
  Calculated amount (see general comments).
- electricity, high voltage: 0.0024831 kWh; name Pres_GB
  Calculated amount (see general comments).
- electricity, high voltage: 0.0638061 kWh; name PWHR_RO
  Calculated amount (see general comments). Represents Pressure water reactor, heavy water moderated in RO.
- electricity, high voltage: 0.40039 kWh; name Pres_FR
  Calculated amount (see general comments).
- electricity, high voltage: 0.0580006 kWh; name Boil_SE
  Calculated amount (see general comments).
- electricity, high voltage: 0.0896131 kWh; name Pres_DE
  Calculated amount (see general comments).
- electricity, high voltage: 0.0276298 kWh; name Boil_ES
  Calculated amount (see general comments).
- electricity, high voltage: 0.0435747 kWh; name Pres_SI
  Calculated amount (see general comments).
- electricity, high voltage: 0.0167625 kWh; name Boil_GB
  Calculated amount (see general comments).
- electricity, high voltage: 0.11083 kWh; name Pres_ES
  Calculated amount (see general comments).
- electricity, high voltage: 0.0244346 kWh; name Pres_SE
  Calculated amount (see general comments).
- electricity, high voltage: 0.0055229 kWh; name Pres_NL
  Calculated amount (see general comments).
- electricity, high voltage: 0.13268 kWh; name Pres_SK
  Calculated amount (see general comments).

## Sampling procedure
IAI data used for total electricity used in the production of aluminium that is from nuclear power plants. ecoinvent data used to split nuclear-based electricity production to the respective technologies (pressure water reactor and boiling water reactor). The cited 97% representativeness is for IAI data (data based on 97% of regional aluminium production). The percent representativeness of data used to split nuclear-based electricity production to different technologies (national grid proxy) is 100%.

## Extrapolations
For the split of nuclear-based electricity production to the respective technologies (pressure water reactor, boiling water reactor), relative output of different types of nuclear power plants in the countries, when available, were used as a proxy for the split relevant for the aluminium industry, else 'Rest-of-world' split (over 99% pressure water reactor) was used, see general comments.
