# application of plant protection product, by field sprayer

Dataset: EcoSpold 2, unit process
Geography: US
Time period: 2021-01-01 to 2023-12-31
Technology level: current
Classification: ISIC rev.4 ecoinvent: 0161:Support activities for crop production
Scenario: Business-as-Usual
System model: Allocation, cut-off by classification
Generated by: Juanita Barrera
Database: ecoinvent
isCopyrightProtected: true
accessRestrictedTo: 1

## General comment
This dataset represents the service of fertilising with a combination of the self-propelled and fueled sprayers. The plant protection product not included. Functional Unit is one ha of agricultural land treated.

## Included activities start
The activity starts from the agricultural field foreseen to be processed.

## Included activities end
This activity ends with the application of plant protection product. The inventory takes into account the diesel fuel consumption and the amount of agricultural machinery and of the shed, which has to be attributed to the application of plant protection. Also taken into consideration is the amount of emissions to the air from combustion and the emission to the soil from tyre abrasion during the work process. The following activities were considered part of the work process: preliminary work at the farm, like attaching the adequate machine to the tractor; transfer to field (with an assumed distance of 1 km); field work (for a parcel of land of 1 ha surface); transfer to farm and concluding work, like uncoupling the machine. The overlapping during the field work is considered. The amount of sprayed plant protection products is not taken into account. Not included are dust other than from combustion and noise.

## Geography
The inventory is extrapolated from the geography of Quebec, Canada. Data quality indicators are adjusted accordingly.

## Technology
Fuel consumption and emissions per kg diesel have been extrapolated to the US, but others inputs were taken from the original values.

## Reference product
- application of plant protection product, by field sprayer: 1 ha; By-product classification allocatable product; CPC 86119: Other support services to crop production
  production volume 3.15474e8 ha
    FAOSTAT data source for the year 2020: 2 applications per year assumed in the area of arable land and permanent crops. (own estimation)
  property price 12.7145 EUR2005
    The price is from the year 2020. Price information has been directly provided by the data provider based on the following reference: University of Minnesota, Machinery cost estimates, W.F. Lazarus, 2020. The prices were adjusted for inflation relative to 2005 using the producer price index (PPI) of the euro area, published by eurostat (https://ec.europa.eu/eurostat/databrowser/view/STS_INPP_A__custom_6416181/default/table?lang=en, last accessed on 2023-06-01).
  properties: carbon allocation 0 kg, carbon content 0

## Inputs from technosphere
- agricultural machinery, unspecified: 0.53 kg; lognormal variance with pedigree 0.3042, pedigree (1,4,2,5,1)
  proxy from "application of plant protection product, by field sprayer, CA-QC"
- diesel: 0.636683 kg; lognormal variance with pedigree 0.0028, pedigree (1,4,2,1,1)
  combination of the self-propelled and fueled sprayers consumption- UMN Farm Machinery Economic Cost Estimation Spreadsheet (MACHDATA.XLSM) Lazarus, 2022; 2021 Nebraska Crop budget projections, Robert Klein and Glennis McClure, UNL Extension
  properties: carbon content, fossil 0.865, dry mass 1 kg, heating value, net 42.8 MJ, wet mass 1 kg
- shed: 0.00198 m2; lognormal variance with pedigree 0.3042, pedigree (1,4,2,5,1)
  proxy from "application of plant protection product, by field sprayer, CA-QC"
- tractor, 4-wheel, agricultural: 0.321 kg; lognormal variance with pedigree 0.3042, pedigree (1,4,2,5,1)
  proxy from "application of plant protection product, by field sprayer, CA-QC"

## Emissions to nature
- Ammonia [air, non-urban air or from high stacks]: 1.27698e-5 kg; lognormal variance with pedigree 0.058325, pedigree (1,2,2,2,3)
  adapted from "application of plant protection product, by field sprayer, CA-QC" to match the diesel consumption
- Benzene [air, non-urban air or from high stacks]: 4.6666e-6 kg; lognormal variance with pedigree 0.058325, pedigree (1,2,2,2,3)
  (same comment as for Ammonia)
- Benzo(a)pyrene [air, non-urban air or from high stacks]: 1.91367e-8 kg; lognormal variance with pedigree 0.658325, pedigree (1,2,2,2,3)
  (same comment as for Ammonia)
- Cadmium II [air, non-urban air or from high stacks]: 6.36683e-9 kg; lognormal variance with pedigree 0.658325, pedigree (1,2,2,2,3)
  (same comment as for Ammonia)
- Carbon dioxide, fossil [air, non-urban air or from high stacks]: 1.98602 kg; lognormal variance with pedigree 0.018325, pedigree (1,2,2,2,3)
  (same comment as for Ammonia)
- Carbon monoxide, fossil [air, non-urban air or from high stacks]: 0.00354517 kg; lognormal variance with pedigree 0.652225, pedigree (1,4,2,2,1)
  (same comment as for Ammonia)
- Chromium III [air, non-urban air or from high stacks]: 3.19065e-8 kg; lognormal variance with pedigree 0.658325, pedigree (1,2,2,2,3)
  (same comment as for Ammonia)
- Copper ion [air, non-urban air or from high stacks]: 1.08525e-6 kg; lognormal variance with pedigree 0.658325, pedigree (1,2,2,2,3)
  (same comment as for Ammonia)
- Dinitrogen monoxide [air, non-urban air or from high stacks]: 7.66913e-5 kg; lognormal variance with pedigree 0.058325, pedigree (1,2,2,2,3)
  (same comment as for Ammonia)
- Methane, fossil [air, non-urban air or from high stacks]: 8.24794e-5 kg; lognormal variance with pedigree 0.058325, pedigree (1,2,2,2,3)
  (same comment as for Ammonia)
- NMVOC, non-methane volatile organic compounds [air, non-urban air or from high stacks]: 0.00244182 kg; lognormal variance with pedigree 0.042225, pedigree (1,4,2,2,1)
  (same comment as for Ammonia)
- Nickel II [air, non-urban air or from high stacks]: 4.44954e-8 kg; lognormal variance with pedigree 0.658325, pedigree (1,2,2,2,3)
  (same comment as for Ammonia)
- Nitrogen oxides [air, non-urban air or from high stacks]: 0.0286145 kg; lognormal variance with pedigree 0.042225, pedigree (1,4,2,2,1)
  (same comment as for Ammonia)
- PAH, polycyclic aromatic hydrocarbons [air, non-urban air or from high stacks]: 2.09816e-6 kg; lognormal variance with pedigree 0.318325, pedigree (1,2,2,2,3)
  (same comment as for Ammonia)
- Particulate Matter, < 2.5 um [air, non-urban air or from high stacks]: 0.00167491 kg; lognormal variance with pedigree 0.318325, pedigree (1,2,2,2,3)
  (same comment as for Ammonia)
- Selenium IV [air, non-urban air or from high stacks]: 6.36683e-9 kg; lognormal variance with pedigree 0.058325, pedigree (1,2,2,2,3)
  (same comment as for Ammonia)
- Sulfur dioxide [air, non-urban air or from high stacks]: 0.000643918 kg; lognormal variance with pedigree 0.018325, pedigree (1,2,2,2,3)
  (same comment as for Ammonia)
- Zinc II [air, non-urban air or from high stacks]: 6.36683e-7 kg; lognormal variance with pedigree 0.658325, pedigree (1,2,2,2,3)
  (same comment as for Ammonia)
- Cadmium II [soil, agricultural]: 1.75e-7 kg; lognormal variance with pedigree 0.0442, pedigree (1,4,2,5,1)
  proxy from "application of plant protection product, by field sprayer, CA-QC"
- Lead II [soil, agricultural]: 7.8e-7 kg; lognormal variance with pedigree 0.0442, pedigree (1,4,2,5,1)
  proxy from "application of plant protection product, by field sprayer, CA-QC"
- Zinc II [soil, agricultural]: 0.00046 kg; lognormal variance with pedigree 0.0442, pedigree (1,4,2,5,1)
  proxy from "application of plant protection product, by field sprayer, CA-QC"

## Extrapolations
The dataset is modeled for agricultural production system in US. Data Quality indicators are adjusted accordingly.
