# bamboo forestry, sustainable forest management

Dataset: EcoSpold 2, unit process
Geography: EC
Time period: 2010-01-01 to 2028-12-31
Technology level: current
Classification: ISIC rev.4 ecoinvent: 0230:Gathering of non-wood forest products
Scenario: Business-as-Usual
System model: Allocation, cut-off by classification
Generated by: K.Padron;E.Barros;J.Aguirre;S.Martines
Database: ecoinvent
isCopyrightProtected: true
accessRestrictedTo: 1

## General comment
This dataset represents the production of 1 kg of bamboo culms. Ecuador possesses about 50 different species of bamboo (Ruiz-Sanchet et al., 2021), of which about a fifth are endemic. The most commonly used species in the construction sector in Ecuador is Guadua angustifolia Kunth (caña Guadua angustifolia). Culms are normally extracted manually using a machete or a hatchet. The production of bamboo culms takes place at a bamboo forest or intermediary processing facility. In contrast to other countries, the production of bamboo culms in Ecuador does generally not make use of fertilisers and the culms are collected without mechanical support. When untreated, the service life of bamboo culms is approximately three years (De Flander and Rovers, 2009; Riaño et al., 2002). Due to their high water content (u= ca. 80 %), bamboo culms lack a direct application as a construction material. However, they are used for the production of bamboo poles which can be used directly for the construction of columns, beams, or struts and other bamboo-based construction materials. This dataset was developed by Estefania Barros, Kristi Padrón, Jonnathan Aguirre and Juan Sebastian Martines, under the lead of Prof. Paul Vanegas and Prof. Dolores Sucozhañay from the Inclusive Circular Economy and Sustainable Development Research Group of the University of Cuenca (ECI) in the frame of the CEELA (Strengthening capacities for energy efficiency in buildings in Latin America) project with the support of the Swiss Agency for Development and Cooperation (SDC). The figures origin mainly from an original dataset covering the geography CO and were adjusted with information provided by producers in Ecuador.
Ref:
Ruiz-Sanchez, E., Tyrrell, C. D., Londoño, X., Oliveira, R. P., and Clark, L. G.. (2021). Diversity, distribution, and classification of Neotropical woody bamboos (Poaceae: Bambusoideae) in the 21st Century. Botanical Sciences, 99(2), 198-228. Epub 08 de abril de 2021.https://doi.org/10.17129/botsci.2722
De Flander, K. and R. Rovers, One laminated bamboo-frame house per hectare per year. Construction and Building Materials, 2009. 23(1): p. 210-218.
Riaño, N.M., et al., Plant growth and biomass distribution on Guadua angustifolia Kunth in relation to ageing in the Valle del Cauca – Colombia. Bamboo Science and Culture, 2002. 16(1): p. 43-51.

## Included activities start
From transformation of land into bamboo forest

## Included activities end
This activity ends with bamboo culms (u=80%) at forest. The dataset includes the CO2 absorption from air and the land use for bamboo growth. The dataset does not include soil preparation, changes in carbon content in soil, use of pesticides or fertilisers, irrigation, plantation of seedlings, leaching of pesticides and fertilisers, infrastructure and use of mechanical equipment. Generally, none of them are used for the production of bamboo culms in Ecuador. According to Juan Carlos Salazar, agricultural engineer and Fabian Moreno, project manager of the International Bamboo and Rattan Organization (INBAR) Ecuador; the use of fertilizers is very unusual in natural bamboo forests, which represent approximately 97% of total bamboo area in Ecuador. The remaining 3% represent areas where bamboo is cultivated. There fertilizers are used once a year for two years. As bamboo generates shade and there is no competition with weeds, the use of herbicides is not common. Since branches and leaves stay on the ground in the forest, i.e. do not leave the system, they are neglected in this dataset.

## Geography
Data for Ecuador

## Technology
Current production technology. The International Bamboo and Rattan Organization (INBAR) Ecuador has been working with many bamboo producers throughout Ecuador, especially on the coast and in the Amazon. According to its project director, Fabián Moreno, most bamboo plantations are managed by small producers and the management of the plantations does not include the use of machinery or technical processes.

## Time period
Time period referring to the data source: 2010-2023. Based on expert opinion data is considered to be valid at least up to 2028.

## Reference product
- bamboo culm: 1 kg; By-product classification allocatable product; CPC 31450: Plywood, veneer panels and similar laminated wood of bamboo
  production volume 4.65942e8 kg; = 15531400*30
    Production volume is expressed in kg. About 15,531,400 culms of Guadua Angustifolia Kunt were harvested in Ecuador in 2022 on approximately 15,000 ha (INBAR 2015). A culm weights about 30 kg (Fabian Moreno, project manager INBAR Ecuador) and its density is about 118.84 kg/m3
    Reference:
    INBAR (2015) ESTUDIO DE LA CADENA DESDE LA PRODUCCIÓN AL CONSUMO DEL BAMBÚ EN ECUADOR CON ÉNFASIS EN LA ESPECIE Guadua angustifolia
    https://bambuecuador.files.wordpress.com/2018/01/2015-estudio-de-la-cadena-desde-la-producciocc81n-al-consumo-del-bmabucc81-en-ecuador.pdf
  property carbon content, non-fossil 0.494; name CC_culm
    biogenic carbon content on a dry matter basis
  property dry mass 0.555556 kg; name DM_culm
  property heating value, net 9.87 MJ
    LHV is calculated based on Carbon and water in wet mass content.
  property price 0.107527 EUR2005
    Based on expert judgement, price given as 0.13 USD/kg. Converted with an exchange rate of 1EURO = 1.209 USD.
  property wet mass 1 kg; name WM_culm
  properties: carbon allocation 0.274444 kg, carbon content 0.494, carbon content, fossil 0, water content 0.8, water in wet mass 0.444444 kg

## Inputs from nature
- Carbon dioxide, in air [natural resource, in air]: 1.0063 kg; = DM_culm* CC_culm/(12/44); lognormal variance with pedigree 0.0041, pedigree (3,3,2,3,2)
  Carbon uptake from air into the product calculated based on the carbon content and dry mass of the product. Scaled to the molar mass from C to CO2. Branches and leaves are not taken into account, since they do not leave the system.
- Energy, gross calorific value, in biomass [natural resource, biotic]: 10.7056 MJ; = DM_culm*19.27; lognormal variance with pedigree 0.0041, pedigree (3,3,2,3,2)
  dry mass of the culm x gross calorific value of bamboo. The gross calorific value of bamboo refers to Guadua Angustifolia Kuhnt Bamboo, and is taken from the existing dataset "bamboo forestry, sustainable forest management, CO".
- Occupation, forest, intensive [natural resource, land]: 0.326531 m2*year; = 10000/30625; lognormal variance with pedigree 0.0435, pedigree (3,3,2,3,2)
  Value has been calculated based on an average yearly harvest of 30,625 kg per hectare. The value is specific for Guadua Angustifolia Kuhnt bamboo. Guadua Angustifolia Kunth is mostly of natural regeneration. The plant needs generally 8 years before being harvested (more than 9 cm in diameter). Once the forest produces commercial culms, the harvest can be annual. Even, depending on the cutting plan, it can take place twice a year. The harvest is selective of the culms that are 5 years old, but while these are cut, new shoots emerge (every year) so the harvest is continuous. Approximately 25% of the commercial culms are extracted each year.
- Transformation, from forest, intensive [natural resource, land]: 0.0653061 m2; = 10000/(30625*5); lognormal variance with pedigree 0.130825, pedigree (3,3,2,2,3)
  (same comment as for Occupation, forest, intensive)
- Transformation, to forest, intensive [natural resource, land]: 0.0653061 m2; = 10000/(30625*5); lognormal variance with pedigree 0.130825, pedigree (3,3,2,2,3)
  (same comment as for Occupation, forest, intensive)
- Wood, unspecified, standing [natural resource, biotic]: 0.00841468 m3; = DM_culm/ DM_wood_standing; lognormal variance with pedigree 0.0041, pedigree (3,3,2,3,2)
  This input is used as a proxy to reflect bamboo, standing. The water properties have been adjusted according to the properties of the specific bamboo species (Dendrocalamus asper)
  property dry mass 66.0222 kg; name DM_wood_standing

## Sampling procedure
This data is based on the dataset "bamboo forestry, sustainable forest management, CO, 2010-2020" available in ecoinvent v.3.9.1, due to its similarities with Ecuador and the fact that the bamboo species is the same (Guadua Angustifolia Kuhnt).

## Extrapolations
The input of bamboo is approximated with “wood, unspecified, standing”. The properties have been modified in order to reflect bamboo (Species: Guadua angustifolia Kunth). The data is based on Colombia (CO) original dataset due to the similarities with Ecuador and the fact that the bamboo specie is the same (Guadua Angustifolia Kuhnt).

## Review by Fabio Valebona 2023-02-23
Dataset is very well documented, and the assumptions considered are reasonable.
