# treatment of hard coal ash, municipal incineration

Dataset: EcoSpold 2, unit process
Geography: GLO
Time period: 2006-01-01 to 2023-12-31
Technology level: current
Classification: ISIC rev.4 ecoinvent: 3821:Treatment and disposal of non-hazardous waste
Scenario: Business-as-Usual
System model: Allocation, cut-off by classification
Generated by: Nikolia Stoikou
Database: ecoinvent
isCopyrightProtected: true
accessRestrictedTo: 1

## General comment
The process represents the treatment of 'hard coal ash' in a municipal solid waste incinerator (MSWI). Recommended use of this dataset: For small amounts of hard coal ash from small scale furnaces, which go to disposal as part of communal waste mixture. Larger amounts will be landfilled or could be used in building material production.Inventoried waste consists of fraction: 100% hard coal ash small scale; . Waste composition (wet, in ppmw): gross heating value 0.4712 MJ/kg; H2O na; O 298030; H na; C 100000; S na; N na; P 980; B 350; Cl na; Br 97; F na; I 16.4; Ag na; As 92; Ba 1960; Cd 4.5; Co 49; Cr 192; Cu 146.25; Hg 0.1; Mn 693; Mo 28.5; Ni 194; Pb 376; Sb 9.5; Se 7; Sn 19.8; V 388; Zn 475; Be 19.6; Sc 39.6; Sr 1940; Ti 5880; Tl 9.5; W na; Si 245000; Fe 68600; Ca 19600; Al 166600; K 19600; Mg 58800; Na 9800. Share of carbon in initial waste input that is biogenic 0%.Share of metals in waste not oxidised and bulk-recyclable (exclude very small or thin parts) Iron: 0%; Alu: 0%; Copper: 0%.Recovery of metal scrap from bottom ash to recycling: 0g iron scrap, 0g aluminium scrap, 0g copper scrap. Net energy production: 0MJ/kg electric energy and 0MJ/kg thermal energy.

## Included activities start
The activity starts with the waste being available at the gate of the treatment facility. Collection and transportation of the waste to the treatment plant is not included.

## Included activities end
The activity ends with the waste being treated and waste-specific emissions from the incineration process and auxiliary material consumption for flue gas cleaning are released to the environment (air and water). Infrastructure and waste-specific energy demands for Municipal Solid Waste Incineration (MSWI) and net energy generation are included.

## Geography
Modelling parameters affecting the treatment technology are not specific to this geography.

## Technology
The waste is treated in the incineration plant with flue gas cleaning. Incineration is the controlled combustion of a waste. Auxiliary material consumption for this step of air pollution control (APC) are included in the process. Air polution control includes electrostatic precipitator for fly ash (ESP), wet flue gas scrubber and 25% SNCR , 42.77% SCR-high dust , 32.68% SCR-low dust -DeNOx facilities and 0% without DeNOx (weighted according to mass of burnt waste). Efficiency of iron scrap separation from slag : 58%. Efficiency of aluminium scrap separation from slag : 31%. Efficiency of copper scrap separation from slag : 31%. Gross electric efficiency technology mix 15.84% and Gross thermal efficiency technology mix 28.51%

## Reference product
- hard coal ash: -1 kg; By-product classification Waste; CPC 39320: Ash and residue (except from the manufacture of iron or steel), containing metals or metallic compounds, excep[…]; HS2017 262099: Slag, ash and residues; (not from the manufacture of iron or steel), containing mainly metals or their comp[...]
  main reference product of this activity (supply of disposal service).
  production volume 2.6649e9 kg
    based on coal usage in residences and small commerce (Exxon 2012), generic split into hard coal and lignite based on demand 2010 (WCA 2012), generic hard coal ash content, and a generic global rate of 21.7w% of MSW going to incineration (Pike + UNSD 2012)
  property price 0 EUR2005
    Waste products are assigned a price of zero as they are assumed to require further treatment.
  properties: aluminium content 0.1666, antimony content 9.5e-6, arsenic content 9.2e-5, barium content 0.00196, beryllium content 1.96e-5, boron content 0.00035, bromine content 9.7e-5, cadmium content 4.5e-6, calcium content 0.0196, carbon allocation 0.1 kg, carbon content 0.1, carbon content, fossil 0.1, carbon content, non-fossil 0, chromium content 0.000192, cobalt content 4.9e-5, copper content 0.00014625, dry mass 1 kg, heating value, gross 0.471218 MJ, heating value, net 0 MJ, iodine content 1.64e-5, iron content 0.0686, lead content 0.000376, magnesium content 0.0588, manganese content 0.000693, mercury content 1e-7, molybdenum content 2.85e-5, nickel content 0.000194, oxygen content 0.298033, phosphorus content 0.00098, potassium content 0.0196, scandium content 3.96e-5, selenium content 7e-6, silicon content 0.245, sodium content 0.0098, strontium content 0.00194, thallium content 9.5e-6, tin content 1.98e-5, titanium content 0.00588, vanadium content 0.000388, water content 0, water in wet mass 0 kg, wet mass 1 kg, zinc content 0.000475

## Inputs from technosphere
- ammonia, anhydrous, liquid: 3.29779e-6, 1.41677e-5, 6.40168e-6, 7.09585e-5, 2.99946e-6, 6.70965e-7, 2.46592e-5, 2.11975e-6, 6.53408e-6 kg (9 suppliers, which the file names only by identifier); sum of these 0.000131809 kg; lognormal variance with pedigree 0.12926, pedigree (1,1,4,1,1)
  Input to DeNOx stage (100% NH3).
  Uncertainty: uncertainty calculated from uncertainty in average DeNOx input, uncertainty in the share of thermal NOx, uncertainty of nitrogen content in average municipal waste and the uncertainty in nitrogen content in *this* waste.
  properties: dry mass 1 kg, wet mass 1 kg
- bottom ash, MSWI, hard coal ash: -1.61296 kg; lognormal variance with pedigree 0.011591, pedigree (1,1,1,1,1)
  waste-specific bottom ash from the incineration of this waste
  Uncertainty: uncertainty is calculated from uncertainties in waste composition and transfer coefficients in incinerator
  production volume
    calculated in proportion to incinerated waste input
  properties: aluminium content 0.118121, calcium content 0.0138965, carbon content, fossil 0.0709007, dry mass 0.87443 kg, iron content 0.0486379, magnesium content 0.0416896, oxygen content 0.502301, potassium content 0.0138965, silicon content 0.173707, sodium content 0.00694827, water content 0.143603, wet mass 1 kg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
- chromium trioxide, flakes: 1.68534e-7 kg; lognormal variance with pedigree 0.45542, pedigree (1,1,4,1,1)
  Input to DeNOx stage. Active component in SCR catalyst (vanadium pentoxide, V2O5), here approximated with the available chromium trioxide.
  Uncertainty: uncertainty calculated from uncertainty in average DeNOx input, uncertainty in the share of thermal NOx, uncertainty of nitrogen content in average municipal waste and the uncertainty in nitrogen content in *this* waste.
  properties: dry mass 1 kg, wet mass 1 kg
- electricity, for reuse in municipal waste incineration only: 4.02642e-6, 0.000583202, 0.000113376, 0.00056052, 0.000580016, 0.00145566, 2.47943e-5, 9.11242e-6, 0.000437608, 0.000307491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 kWh (26 suppliers, which the file names only by identifier); sum of these 0.0486937 kWh; lognormal variance with pedigree 0.00859512, pedigree (1,1,4,1,1)
  Net electricity required to incinerate this waste (subsidised from high-calorific waste fractions).
  Uncertainty: uncertainty is calculated from uncertainties in waste composition and uncertainties in energy efficiency and the uncertainty in internal energy demand
- heat, district or industrial, natural gas: 0.0246482 MJ; lognormal variance with pedigree 0.12926, pedigree (1,1,4,1,1)
  Input to DeNOx stage, to heat up flue gas in low-dust SCR.
  Uncertainty: uncertainty calculated from uncertainty in average DeNOx input, uncertainty in the share of thermal NOx, uncertainty of nitrogen content in average municipal waste and the uncertainty in nitrogen content in *this* waste.
  properties: heating value, net 1 MJ
- heat, for reuse in municipal waste incineration only: 0.00164541, 2.78883e-5, 0.000426293, 0.00102948, 0.00164143, 0.00218087, 0.124768, 5.81671e-5, 0.000520317, 3.42628e-5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 MJ (26 suppliers, which the file names only by identifier); sum of these 0.183009 MJ; lognormal variance with pedigree 0.00859512, pedigree (1,1,4,1,1)
  Net heat required to incinerate this waste (subsidised from high-calorific waste fractions).
  Uncertainty: uncertainty is calculated from uncertainties in waste composition and uncertainties in energy efficiency and the uncertainty in internal energy demand
- municipal waste incineration facility: 2.5e-10 unit
  Infrastructure demands per kilogram incinerated waste.
- titanium dioxide: 5.50544e-6, 2.75272e-6 kg (2 suppliers, which the file names only by identifier); sum of these 8.25816e-6 kg; lognormal variance with pedigree 0.45542, pedigree (1,1,4,1,1)
  Input to DeNOx stage (TiO2 catalyst carrier)
  Uncertainty: uncertainty calculated from uncertainty in average DeNOx input, uncertainty in the share of thermal NOx, uncertainty of nitrogen content in average municipal waste and the uncertainty in nitrogen content in *this* waste.
  properties: dry mass 1 kg, wet mass 1 kg

## Inputs from nature
- Oxygen [natural resource, in air]: 0.820847 kg; lognormal variance with pedigree 0.047235, pedigree (1,1,4,1,1)
  oxygen from ambient air needed to combust and oxidise this waste. Net demand, i.e. without O2 leaving the plant in flue gas uncombusted.
  Uncertainty: uncertainty is calculated from uncertainties in waste composition and transfer coefficients to flue gas and solid residues in incinerator

## Emissions to nature
- Ammonia [air, urban air close to ground]: 1.54974e-7 kg; lognormal variance with pedigree 0.17159, pedigree (1,1,4,1,1)
  Nitrogen species emitted to air after DeNOx stage.
  Uncertainty: uncertainty calculated from uncertainty in average N-emissions and uncertainty in the share of thermal NOx and the uncertainty in nitrogen content in *this* waste.
- Benzene [air, urban air close to ground]: 4.53351e-8 kg; lognormal variance with pedigree 0.0491, pedigree (1,1,4,1,1)
  Incomplete combustion product emitted to air.
  Uncertainty: uncertainty calculated from uncertainty in average operation emissions, and the uncertainty of the flue gas volume from this waste.
- Benzo(a)pyrene [air, urban air close to ground]: 1.00885e-12 kg; lognormal variance with pedigree 0.30974, pedigree (1,1,4,1,1)
  (same comment as for Benzene)
- Carbon monoxide, fossil [air, urban air close to ground]: 7.70645e-5 kg; lognormal variance with pedigree 0.65557, pedigree (1,1,4,1,1)
  (same comment as for Benzene)
- Dioxins, measured as 2,3,7,8-tetrachlorodibenzo-p-dioxin [air, urban air close to ground]: 9.06641e-14 kg; lognormal variance with pedigree 0.30974, pedigree (1,1,4,1,1)
  (same comment as for Benzene)
- Heat, waste [air, urban air close to ground]: 0.383528 MJ; lognormal variance with pedigree 1.1241, pedigree (1,1,4,1,1)
  Waste heat generated from heating value of this waste plus any electricity required to process it.
  Uncertainty: uncertainty is calculated from uncertainties in waste composition and uncertainties in energy efficiency and the uncertainty in internal energy demand
- Hexachlorobenzene [air, urban air close to ground]: 9.47934e-11 kg; lognormal variance with pedigree 0.0491, pedigree (1,1,4,1,1)
  (same comment as for Benzene)
- Methane, fossil [air, urban air close to ground]: 6.80027e-7 kg; lognormal variance with pedigree 0.0491, pedigree (1,1,4,1,1)
  (same comment as for Benzene)
- NMVOC, non-methane volatile organic compounds [air, urban air close to ground]: 2.06319e-6 kg; lognormal variance with pedigree 0.0491, pedigree (1,1,4,1,1)
  (same comment as for Benzene)
- Nitrogen oxides [air, urban air close to ground]: 4.90751e-5 kg; lognormal variance with pedigree 0.17159, pedigree (1,1,4,1,1)
  sum of fuel-NOx and thermal-NOx emitted to air after DeNOx stage.
  Uncertainty: uncertainty calculated from uncertainty in average N-emissions and uncertainty in the share of thermal NOx and the uncertainty in nitrogen content in *this* waste.
- Particulate Matter, < 2.5 um [air, urban air close to ground]: 5.41265e-6 kg; lognormal variance with pedigree 0.30974, pedigree (1,1,4,1,1)
  (same comment as for Benzene)
- Particulate Matter, > 2.5 um and < 10um [air, urban air close to ground]: 2.71992e-8 kg; lognormal variance with pedigree 0.12811, pedigree (1,1,4,1,1)
  (same comment as for Benzene)
- Pentachlorobenzene [air, urban air close to ground]: 2.39521e-10 kg; lognormal variance with pedigree 0.0491, pedigree (1,1,4,1,1)
  (same comment as for Benzene)
- Pentachlorophenol [air, urban air close to ground]: 1.97428e-11 kg; lognormal variance with pedigree 0.0491, pedigree (1,1,4,1,1)
  (same comment as for Benzene)
- Toluene [air, urban air close to ground]: 9.06703e-8 kg; lognormal variance with pedigree 0.0491, pedigree (1,1,4,1,1)
  (same comment as for Benzene)
- Non-hazardous waste disposed [inventory indicator, waste]: 1 kg
  Inventory indicator for waste mass disposed. To be used in EN15804 "other data" results.
- Heat, waste [water, surface water]: 0.0876894 MJ; lognormal variance with pedigree 1.1241, pedigree (1,1,4,1,1)
  (same comment as for Heat, waste)
