# corrugated board box production

Dataset: EcoSpold 2, unit process
Geography: RER
Time period: 2021-01-01 to 2023-12-31
Technology level: current
Classification: ISIC rev.4 ecoinvent: 1702:Manufacture of corrugated paper and paperboard and of containers of paper a
Scenario: Business-as-Usual
System model: Allocation, cut-off by classification
Share of production covered: 73 %
Generated by: Michael Sturges
Published in: FEFCO and CCB 2021
Database: ecoinvent
isCopyrightProtected: true
accessRestrictedTo: 1

## General comment
Corrugated Board is manufactured from several specially conditioned layers of recycled or virgin papers, with the Fluting Medium being the middle layer and Linerboard used for the outside layers. Reels of Fluting Medium and Linerboard are fed into a machine which is called a Corrugator (FEFCO, 2021). In integrated plants such as the ones represented here, the finished board is further folded into boxes.
The data on corrugated board production are based on 470 plants (mostly integrated plants with corrugated board and box production on the same site) in Austria, Belgium, Bulgaria, Czech Republic, Denmark, Estonia, Finland, France, Germany, Greece, Hungary, Ireland, Italy, Latvia, Lithuania, the Netherlands, Norway, Poland, Portugal, Romania, Russia, Serbia, Slovakia, Spain, Sweden, Switzerland, Turkey and the United Kingdom. Together they produced 18,730,000 tonnes saleable product, which is 73% of the total annual production of corrugated board products in Europe. Each of the production sites produces on average 33.600 tonnes of corrugated sheets, ranging from 329– 148.000 tonnes each. Reference(s): https://www.fefco.org/sites/default/files/documents/2022-07-07_FEFCO%20LCA%202021.pdf, last accessed March 2023
For this dataset the European average of recycled and virgin paper inputs (wellenstoff, semichemical fluting, kraftliner, testliner) was used.
The following air emissions were reported in the study: Particulates, <2.5μm, Particulates, >2.5μm and <10μm, Particulates, >10μm, CO2 (fossil), CO2 (biomass) , NOx (as NO2) , SOx (as SO2) .
For a more complete air emission profile, additional air emissions (beyond the ones listed above) were added for the combustion of the external fuels using LCI datasets for combustion of different fuels as proxy. The air emissions were calculated based on the mix of the external fuels in the study. More information about the fuel mix and the proxy are provided under "Extrapolations".

## Included activities start
The process starts as reels of Fluting Medium and Linerboard are fed into a machine called a Corrugator.

## Included activities end
This activity ends with folded “corrugated board boxes” ready for delivery.

## Geography
Data for main producers in Europe (Austria, Belgium, Bulgaria, Czech Republic, Denmark, Estonia, Finland, France, Germany, Greece, Hungary, Ireland, Italy, Latvia, Lithuania, the Netherlands, Norway, Poland, Portugal, Romania, Russia, Serbia, Slovakia, Spain, Sweden, Switzerland, Turkey and the United Kingdom)

## Technology
Average of present used technology
The Fluting Medium paper is conditioned with heat and steam and fed between large corrugating rolls that give the paper its fluted shape in the Single Facer. Starch is applied to the tips of the flutes on one side and the inner liner is glued to the fluting. The corrugated fluting medium with liner attached to it is called single face web and travels along the machine towards the Double Backer where the single face web meets the outer liner and forms corrugated board. A number of layers of single faced web may be built up to produce double and triple wall corrugated board. The corrugated board is slit into the required widths and cut into sheets which are then stacked or palletised. The final stage of the process consists of printing and then slotting, folding and gluing the corrugated board to manufacture a corrugated box.

## Reference product
- corrugated board box: 1 kg; name corrugatedBoardAmount; By-product classification allocatable product; CPC 32153: Cartons, boxes, cases, record sleeves and other packing containers (except bags) of paper, paperboard, cellulo[…]; HS2017 481910: Paper and paperboard; cartons, boxes and cases, of corrugated paper or paperboard
  production volume 2.8019e10 kg; name corrugatedBoardProductionVolume
    Reported as total shipments of corrugated board in Europe in 2021 by FEFCO (2021). Reference(s): FEFCO. 2021. Annual Statistics 2021, accessible online at https://www.fefco.org/sites/default/files/documents/Fefco_AnnualEvaluation_2021_0.pdf, last accessed March 2023
  property Quebec production volume 0 kg; name corrugatedBoardAmount_QCProdVol
  property carbon content, fossil 0.00147177
    C content was calculated as an addition of C content in the raw materials.
  property heating value, net 12.86 MJ
    LHV is calculated based on the Carbon content of the product. More details can be found on the respective documentation.
  properties: carbon allocation 0.41784 kg, carbon content 0.451719, carbon content, non-fossil 0.450248, dry mass 0.925 kg, price 0.844 EUR2005, water content 0.0810811, water in wet mass 0.075 kg, wet mass 1 kg

## Inputs from technosphere
- acrylic varnish, with water, in 53% solution state: 0.001 kg; = 0.53/0.53; lognormal variance with pedigree 0.0009, pedigree (1,2,2,1,1)
  FEFCO 2021. Reported as varnish for printing. Reported as dry mass
  properties: carbon content, fossil 0.609815, dry mass 0.53 kg, heating value, net 20.44 MJ, water content 0.886792, wet mass 1 kg
- borax, anhydrous, powder: 0.00024 kg; lognormal variance with pedigree 0.0009, pedigree (1,2,2,1,1)
  FEFCO 2021
  properties: dry mass 1 kg, wet mass 1 kg
- containerboard, fluting medium: 0.472389 kg; = 0.421775898520085*1.12*1000; lognormal variance with pedigree 0.0009, pedigree (1,2,2,1,1)
  From FEFCO 2021 LCI Report: 1120 kg paper consumption for 1000kg corrugated board production. This amount was split based on the European average consumption shares of different types of cartonboard (kraftliner+brown kraftliner+testliner+other recycled liner) from FEFCO Annual Statistics 2021 (the sum of shares was scaled to add up to 100%). The resulting average share of fluting medium to corrugated board production is 42.18%
  properties: carbon content, non-fossil 0.46, dry mass 0.92406 kg, heating value, net 15.92 MJ, water content 0.0821806, wet mass 1 kg
- containerboard, linerboard: 0.647611 kg; = 0.578224101479915*1.12*1000; lognormal variance with pedigree 0.0009, pedigree (1,2,2,1,1)
  From FEFCO 2021 LCI Report: 1120 kg paper consumption for 1000kg corrugated board production. This amount was split based on the European average consumption shares of different types of cartonboard (kraftliner+brown kraftliner+testliner+other recycled liner) from FEFCO Annual Statistics 2021 (the sum of shares was scaled to add up to 100%). The resulting average share of linerboard consumption to corrugated board production is 57.82%.
  property water content 0.0831608; name U
  property water in wet mass 0.0767761 kg; name WWM
  property wet mass 1 kg; name WM
  properties: carbon content, non-fossil 0.46, dry mass 0.923224 kg, heating value, net 15.92 MJ
- diesel, low-sulfur: 2.33645e-5 kg; = 0.001*1000/42.8; lognormal variance with pedigree 0.0026, pedigree (2,3,2,1,2)
  Data provided by FEFCO 2021, indicated in energy content and given as 0.001 GJ/t Calculation into mass/volume was done by using the following conversion factor: Diesel MJ/kg 42.8. Based on literature, page 16, Report6, part 4. Source: https://ecoinvent.org/wp-content/uploads/2021/09/LHV_fuels.xlsx
  properties: carbon content, fossil 0.865, dry mass 1 kg, heating value, net 42.8 MJ, wet mass 1 kg
- electricity, medium voltage: 0.123333 kWh; lognormal variance with pedigree 0.0009, pedigree (1,2,2,1,1)
  FEFCO 2021. Reported as bought electricity
- ethylene vinyl acetate copolymer: 0.0011 kg; lognormal variance with pedigree 0.0026, pedigree (2,3,2,1,2)
  FEFCO 2021. Proxy for glue, cold + hot melts
  properties: carbon content, fossil 0.79734, dry mass 1 kg, heating value, net 35.99 MJ, wet mass 1 kg
- hard coal: 0.000465783 kg; = 0.013*1000/27.91; lognormal variance with pedigree 0.0026, pedigree (2,3,2,1,2)
  Data provided by FEFCO 2021, indicated in energy content and given as 0.013 GJ/t . Calculation into mass/volume was done by using the following conversion factor: Hard coal: MJ/kg 27.91. Based on the Characterization factor of Hard coal in the CED method. Source: https://ecoinvent.org/wp-content/uploads/2021/09/LHV_fuels.xlsx
  properties: carbon content, fossil 0.845, dry mass 0.94 kg, heating value, net 27.91 MJ, water content 0.0638298, wet mass 1 kg
  note on carbon content, fossil: C content 75-94% (specified in Tab 1.1, report 6, part VI). A mean content of 0.845 kg C/ kg dry hard coal was considered
  note on heating value, net: Based on the Characterization factor of Hard coal in the CED method
- heat, district or industrial, natural gas: 0.032 MJ; lognormal variance with pedigree 0.0009, pedigree (1,2,2,1,1)
  FEFCO 2021. Reported as steam
  properties: heating value, net 1 MJ
- heavy fuel oil: 0.000242718 kg; = 0.010*1000/41.2; lognormal variance with pedigree 0.0026, pedigree (2,3,2,1,2)
  Data provided by FEFCO 2021, indicated in energy content and given as 0.010 GJ/t. Calculation into mass/volume was done by using the following conversion factor: Heavy fuel oil: MJ/kg 41.2. Based on literature, page 21, Report6, part 4. Source: https://ecoinvent.org/wp-content/uploads/2021/09/LHV_fuels.xlsx
  property calculation property, kg 0 kg; name m_hfo
  properties: carbon content, fossil 0.849, dry mass 1 kg, heating value, net 41.2 MJ, wet mass 1 kg
  note on calculation property, kg: Mass output. Defined here for use in the combined production calculations.
- light fuel oil: 0.000211268 kg; = 0.009*1000/42.6; lognormal variance with pedigree 0.0026, pedigree (2,3,2,1,2)
  Data provided by FEFCO 2021, indicated in energy content and given as 0.009 GJ/t. Calculation into mass/volume was done by using the following conversion factor: Light fuel oil: MJ/kg 42.6 Based on literature, page 18, Report6, part 4. Source: https://ecoinvent.org/wp-content/uploads/2021/09/LHV_fuels.xlsx
  property calculation property, kg 0 kg; name m_lfo
  properties: carbon content, fossil 0.862, dry mass 1 kg, heating value, net 42.6 MJ, wet mass 1 kg
- liquefied petroleum gas: 0.000240535, 1.22331e-6 kg (2 suppliers, which the file names only by identifier); sum of these 0.000241758 kg; = 0.011*1000/45.50; lognormal variance with pedigree 0.0026, pedigree (2,3,2,1,2)
  FEFCO 2021. Reported as 0.011 GJ/t. Converted to kg using the lower heating value (45.50 MJ/kg). The LHV represents an indicative value. Reference: Fuels - Higher and Lower Calorific Values, available at: https://www.engineeringtoolbox.com/fuels-higher-calorific-values-d_169.html
  properties: carbon content, fossil 0.821863, dry mass 1 kg, heating value, net 45.5 MJ, wet mass 1 kg
  note on heating value, net: Indicative value. Reference: Fuels - Higher and Lower Calorific Values, available at: https://www.engineeringtoolbox.com/fuels-higher-calorific-values-d_169.html
- maize starch: 0.00999419 kg; = 8.595/0.86; lognormal variance with pedigree 0.0026, pedigree (2,3,2,1,2)
  FEFCO 2021. Proxy for corn starch (6.04 kg) and for half of "starch, modified" (3.95kg), and "wheat starch" (1.16 kg). Other half of latter two starches modelled as potato starch. Given as dry mass
  properties: carbon content, non-fossil 0.46, dry mass 0.86 kg, heating value, net 11.64 MJ, water content 0.162791, wet mass 1 kg
  note on carbon content, non-fossil: C-content of starch is considered 46% on dry mass basis (from "Evolutionary and Biochemical Aspects", A.D. Kay and T. Vrede (in Global Ecology, 2010, Elsevier B.V., S.E. Jørgensen Ed.)).
- municipal solid waste: -0.00025 kg; name mswAmount; lognormal variance with pedigree 0.0026, pedigree (2,3,2,1,2)
  FEFCO 2021. Reported as starch, glue (30% dry content).
  production volume; = corrugatedBoardProductionVolume * mswAmount / corrugatedBoardAmount
    Calculated from production volume of reference product using the relative outputs.
  properties: carbon content, fossil 0.171549, carbon content, non-fossil 0.261655, dry mass 0.3 kg, heating value, net 11.74 MJ, water content 2.33333, wet mass 1 kg
  note on carbon content, fossil: MSW composition in tab 4.1, ecoinvent v2.2 report 13_I. C content referred to 1 kg DM
  note on heating value, net: Value taken from the general comment of the treatment dataset.
- natural gas, high pressure: 0.000154449, 0.0221511 m3 (2 suppliers, which the file names only by identifier); sum of these 0.0223056 m3; = 0.803*1000/36; lognormal variance with pedigree 0.0026, pedigree (2,3,2,1,2)
  Data provided by FEFCO 2021, indicated in energy content and given as 0.803 GJ/t. Calculation into mass/volume was done by using the following conversion factor: 36 MJ/m3. Literature value, Source: Christoph Meili;Niels Jungbluth;Maresa Bussa (2021) Life cycle inventories of crude oil and natural gas extraction. ESU-services Ltd. commissioned by BAFU & VSG, Schaffhausen, Switzerland, http://esu-services.ch/data/public-lci-reports/
  properties: carbon content, fossil 0.741, dry mass 0.735 kg, heating value, gross 40 MJ, heating value, net 36 MJ, wet mass 0.735 kg
  note on heating value, gross: At standard conditions; based on Meili et al. (2022) section 5.2
- packaging box factory: 1.42857e-9 unit; = 1/14000/50; lognormal variance with pedigree 0.4686, pedigree (4,3,5,1,5)
  The amount is calculated based on the annual capacity of the factory (14kt paper) and the lifetime of 50 years. See ecoinvent datasets "packaging box factory construction, RER, 1993-2000".
- potato starch: 0.00319375 kg; = 2.555/0.8; lognormal variance with pedigree 0.0026, pedigree (2,3,2,1,2)
  FEFCO 2021. Proxy for half of "starch, modified" (3.95kg), and "wheat starch" (1.16 kg). Other half of latter two starches modelled as maize starch. Given as dry mass
  properties: carbon content, non-fossil 0.46, dry mass 0.8 kg, heating value, net 10.66 MJ, water content 0.25, wet mass 1 kg
- printing ink, offset, without solvent, in 47.5% solution state: 0.00093 kg; lognormal variance with pedigree 0.0009, pedigree (1,2,2,1,1)
  FEFCO 2021. Reported as "Water based ink for flexo printing"
  properties: carbon content, fossil 0.455266, carbon content, non-fossil 0.221773, dry mass 1 kg, heating value, net 20.51 MJ, wet mass 1 kg
  note on carbon content, fossil: C content was calculated as an addition of C content in the raw materials.
- sludge from pulp and paper production: -0.000439675, -3.25146e-7 kg (2 suppliers, which the file names only by identifier); sum of these -0.00044 kg; lognormal variance with pedigree 0.0009, pedigree (1,2,2,1,1)
  FEFCO 2021. Reported as organic sludges (43% dry content). Refers to sludges from the internal wastewater treatment process.
  production volume; = corrugatedBoardProductionVolume * organicSludgesAmount / corrugatedBoardAmount
    Calculated from production volume of reference product using the relative outputs.
  properties: carbon content, non-fossil 0.21, dry mass 0.382899 kg, heating value, net 2.65 MJ, water content 1.61166, wet mass 1 kg
- sodium hydroxide, without water, in 50% solution state: 0.00117 kg; lognormal variance with pedigree 0.0009, pedigree (1,2,2,1,1)
  FEFCO 2021
  properties: dry mass 1 kg, heating value, net 3.03 MJ, wet mass 1 kg
- tap water: 0.28 kg; lognormal variance with pedigree 0.0009, pedigree (1,2,2,1,1)
  FEFCO 2021. Reported as Municipal water supply
  properties: carbon content, fossil 0.00178991, dry mass 0.000337476 kg, water content 2962.17, wet mass 1 kg
  note on carbon content, fossil: Bicarbonate content is 2.93 mol/m3. CO2 content is 0.1 mol/m3 (ecoinvent v2.2 report 8, Tab 93.1).
- waste mineral oil: -1.03879e-6, -4.19612e-5 kg (2 suppliers, which the file names only by identifier); sum of these -4.3e-5 kg; lognormal variance with pedigree 0.0009, pedigree (1,2,2,1,1)
  FEFCO 2021. Reported as residue, lubricants and oil
  production volume; = corrugatedBoardProductionVolume * wasteLubricantsAmount / corrugatedBoardAmount
    Calculated from production volume of reference product using the relative outputs.
  properties: carbon content, fossil 0.864444, dry mass 0.9 kg, heating value, net 34.7 MJ, water content 0.111111, wet mass 1 kg
  note on carbon content, fossil: Tab A.6, ecoinvent v2.2 report 13_I. C content has been calculated after data in the tables, and then referred to 1 kg DM
- waste paint: -0.00199243, -7.56971e-6 kg (2 suppliers, which the file names only by identifier); sum of these -0.002 kg; lognormal variance with pedigree 0.0026, pedigree (2,3,2,1,2)
  FEFCO 2021. Proxy for "Ink residues" ( 50% dry content).
  production volume; = corrugatedBoardProductionVolume * inkResiduesAmount / corrugatedBoardAmount
    Calculated from production volume of reference product using the relative outputs.
  properties: carbon content, fossil 0.65, dry mass 0.5 kg, heating value, net 19.7 MJ, water content 1, wet mass 1 kg
- waste paperboard, sorted: -0.121 kg; name wastePaperBoardAmount; lognormal variance with pedigree 0.0009, pedigree (1,2,2,1,1)
  FEFCO 2021. Reported as paper for recycling (90% dry content).
  production volume; = corrugatedBoardProductionVolume * wastePaperBoardAmount / corrugatedBoardAmount
    Calculated from production volume of reference product using the relative outputs.
  property carbon content, non-fossil 0.46; name wastePaperBoardAm_C_content_non_fossil_0
  properties: dry mass 0.9 kg, heating value, net 15.92 MJ, price 0.0436 EUR2005, water content 0.111111, wet mass 1 kg
- wood chips, dry, measured as dry mass: 0.000588235 kg; = 0.008*1000/13.6; lognormal variance with pedigree 0.0026, pedigree (2,3,2,1,2)
  Data provided by FEFCO 2021. Reported biofuels (bark, scrap wood and tall oil) given as 0.008 GJ/tonne product. A LHV of 13.6 MJ/kg was assumed.
  properties: carbon content, non-fossil 0.494, dry mass 1 kg, heating value, net 9.99 MJ, water content 0.4, wet mass 1.4 kg
  note on carbon content, non-fossil: C content of dry mass is 0.494 kgC/kg dry wood (ecoinvent v2.2 report 9).

## Inputs from nature
- Oxygen [natural resource, in air]: 0.0356032 kg; name O2; = (CO2_fossil+CO2_non_fossil)/(16*2+12) * (16*2) + (CO_fossil+CO_non_fossil)/(16+12) *16; lognormal variance with pedigree 0.0174, pedigree (4,3,2,1,3)
  Estimation based on fuel input data and emission factors from corresponding ecoinvent fuel combustion datasets (see "Extrapolations" comment).
- Water, river [natural resource, in water]: 1e-5 m3; lognormal variance with pedigree 0.0009, pedigree (1,2,2,1,1)
  FEFCO 2021. Reported as Surface water (0.01 m3/t)
- Water, well, in ground [natural resource, in water]: 0.0001 m3; lognormal variance with pedigree 0.0026, pedigree (2,3,2,1,2)
  FEFCO 2021. Reported as 0.01 m3/t "Ground water fossil/non-renewable" and 0.09 m3/t "Ground water non fossil/renewable"

## Emissions to nature
- Acetaldehyde [air, unspecified]: 2.78018e-9 kg; lognormal variance with pedigree 0.0508, pedigree (3,3,2,1,3)
  (same comment as for Oxygen)
- Acetic acid [air, unspecified]: 1.28012e-7 kg; lognormal variance with pedigree 0.0508, pedigree (3,3,2,1,3)
  (same comment as for Oxygen)
- Acetone [air, unspecified]: 1.47819e-9 kg; lognormal variance with pedigree 0.0508, pedigree (3,3,2,1,3)
  (same comment as for Oxygen)
- Acetylene [air, unspecified]: 6.50039e-9 kg; lognormal variance with pedigree 0.0508, pedigree (3,3,2,1,3)
  (same comment as for Oxygen)
- Aluminium III [air, unspecified]: 1.39108e-7 kg; lognormal variance with pedigree 0.6608, pedigree (3,3,2,1,3)
  (same comment as for Oxygen)
- Ammonia [air, unspecified]: 1.5435e-8 kg; lognormal variance with pedigree 0.0508, pedigree (3,3,2,1,3)
  (same comment as for Oxygen)
- Antimony ion [air, unspecified]: 2.05412e-11 kg; lognormal variance with pedigree 0.4108, pedigree (3,3,2,1,3)
  (same comment as for Oxygen)
- Arsenic ion [air, unspecified]: 4.65029e-10 kg; lognormal variance with pedigree 0.0508, pedigree (3,3,2,1,3)
  (same comment as for Oxygen)
- Barium II [air, unspecified]: 1.6381e-9 kg; lognormal variance with pedigree 0.0508, pedigree (3,3,2,1,3)
  (same comment as for Oxygen)
- Benzene [air, unspecified]: 3.39527e-7 kg; lognormal variance with pedigree 0.0508, pedigree (3,3,2,1,3)
  (same comment as for Oxygen)
- Benzo(a)pyrene [air, unspecified]: 1.28252e-11 kg; lognormal variance with pedigree 0.0508, pedigree (3,3,2,1,3)
  (same comment as for Oxygen)
- Beryllium II [air, unspecified]: 1.6381e-11 kg; lognormal variance with pedigree 0.0508, pedigree (3,3,2,1,3)
  (same comment as for Oxygen)
- Boron [air, unspecified]: 6.16237e-9 kg; lognormal variance with pedigree 0.6608, pedigree (3,3,2,1,3)
  (same comment as for Oxygen)
- Bromine [air, unspecified]: 6.03247e-10 kg; lognormal variance with pedigree 0.0508, pedigree (3,3,2,1,3)
  (same comment as for Oxygen)
- Butane [air, unspecified]: 5.72938e-7 kg; lognormal variance with pedigree 0.0508, pedigree (3,3,2,1,3)
  (same comment as for Oxygen)
- Cadmium II [air, unspecified]: 2.61412e-11 kg; lognormal variance with pedigree 0.6608, pedigree (3,3,2,1,3)
  (same comment as for Oxygen)
- Calcium II [air, unspecified]: 6.4265e-8 kg; lognormal variance with pedigree 0.0508, pedigree (3,3,2,1,3)
  (same comment as for Oxygen)
- Carbon dioxide, fossil [air, unspecified]: 0.04762 kg; name CO2_fossil; lognormal variance with pedigree 0.0009, pedigree (1,2,2,1,1)
  FEFCO 2021
- Carbon dioxide, non-fossil [air, unspecified]: 0.00133 kg; name CO2_non_fossil; lognormal variance with pedigree 0.0009, pedigree (1,2,2,1,1)
  FEFCO 2021
- Carbon monoxide, fossil [air, unspecified]: 3.11835e-6 kg; name CO_fossil; lognormal variance with pedigree 0.6668, pedigree (4,3,2,1,3)
  (same comment as for Oxygen)
- Carbon monoxide, non-fossil [air, unspecified]: 2.4e-6 kg; name CO_non_fossil; lognormal variance with pedigree 0.6668, pedigree (4,3,2,1,3)
  (same comment as for Oxygen)
- Chlorine [air, unspecified]: 1.44e-9 kg; lognormal variance with pedigree 0.0508, pedigree (3,3,2,1,3)
  (same comment as for Oxygen)
- Chromium III [air, unspecified]: 3.72978e-10 kg; lognormal variance with pedigree 0.6608, pedigree (3,3,2,1,3)
  (same comment as for Oxygen)
- Chromium VI [air, unspecified]: 3.69549e-11 kg; lognormal variance with pedigree 0.6608, pedigree (3,3,2,1,3)
  (same comment as for Oxygen)
- Cobalt II [air, unspecified]: 3.66284e-10 kg; lognormal variance with pedigree 0.6608, pedigree (3,3,2,1,3)
  (same comment as for Oxygen)
- Copper ion [air, unspecified]: 7.53289e-9 kg; lognormal variance with pedigree 0.6608, pedigree (3,3,2,1,3)
  (same comment as for Oxygen)
- Dinitrogen monoxide [air, unspecified]: 1.2667e-7 kg; lognormal variance with pedigree 0.0508, pedigree (3,3,2,1,3)
  (same comment as for Oxygen)
- Dioxins, measured as 2,3,7,8-tetrachlorodibenzo-p-dioxin [air, unspecified]: 5.41359e-16 kg; lognormal variance with pedigree 0.0508, pedigree (3,3,2,1,3)
  (same comment as for Oxygen)
- Ethane [air, unspecified]: 1.95012e-8 kg; lognormal variance with pedigree 0.0508, pedigree (3,3,2,1,3)
  (same comment as for Oxygen)
- Ethanol [air, unspecified]: 2.95638e-9 kg; lognormal variance with pedigree 0.0508, pedigree (3,3,2,1,3)
  (same comment as for Oxygen)
- Ethyl benzene [air, unspecified]: 2.4e-10 kg; lognormal variance with pedigree 0.0508, pedigree (3,3,2,1,3)
  (same comment as for Oxygen)
- Ethylene [air, unspecified]: 3.90023e-8 kg; lognormal variance with pedigree 0.0508, pedigree (3,3,2,1,3)
  (same comment as for Oxygen)
- Fluorine [air, unspecified]: 4e-10 kg; lognormal variance with pedigree 0.0508, pedigree (3,3,2,1,3)
  (same comment as for Oxygen)
- Formaldehyde [air, unspecified]: 9.68926e-8 kg; lognormal variance with pedigree 0.0508, pedigree (3,3,2,1,3)
  (same comment as for Oxygen)
- Hexachlorobenzene [air, unspecified]: 5.76e-17 kg; lognormal variance with pedigree 0.0508, pedigree (3,3,2,1,3)
  (same comment as for Oxygen)
- Hydrocarbons, aliphatic, alkanes, unspecified [air, unspecified]: 2.44818e-8 kg; lognormal variance with pedigree 0.0508, pedigree (3,3,2,1,3)
  (same comment as for Oxygen)
- Hydrocarbons, aliphatic, unsaturated [air, unspecified]: 3.1596e-8 kg; lognormal variance with pedigree 0.0508, pedigree (3,3,2,1,3)
  (same comment as for Oxygen)
- Hydrocarbons, aromatic [air, unspecified]: 1.77748e-9 kg; lognormal variance with pedigree 0.0508, pedigree (3,3,2,1,3)
  (same comment as for Oxygen)
- Hydrochloric acid [air, unspecified]: 5.4166e-7 kg; lognormal variance with pedigree 0.0508, pedigree (3,3,2,1,3)
  (same comment as for Oxygen)
- Hydrogen fluoride [air, unspecified]: 1.69438e-8 kg; lognormal variance with pedigree 0.0508, pedigree (3,3,2,1,3)
  (same comment as for Oxygen)
- Iodine [air, unspecified]: 1.48209e-10 kg; lognormal variance with pedigree 0.0508, pedigree (3,3,2,1,3)
  (same comment as for Oxygen)
- Iron ion [air, unspecified]: 6.55442e-8 kg; lognormal variance with pedigree 0.6608, pedigree (3,3,2,1,3)
  (same comment as for Oxygen)
- Lead II [air, unspecified]: 2.61437e-9 kg; lognormal variance with pedigree 0.6608, pedigree (3,3,2,1,3)
  (same comment as for Oxygen)
- Lead-210 [air, unspecified]: 6.04536e-7 kBq; lognormal variance with pedigree 0.3108, pedigree (3,3,2,1,3)
  (same comment as for Oxygen)
- Magnesium [air, unspecified]: 5.2153e-8 kg; lognormal variance with pedigree 0.0508, pedigree (3,3,2,1,3)
  (same comment as for Oxygen)
- Manganese II [air, unspecified]: 1.64732e-9 kg; lognormal variance with pedigree 0.0508, pedigree (3,3,2,1,3)
  (same comment as for Oxygen)
- Mercury II [air, unspecified]: 7.02084e-11 kg; lognormal variance with pedigree 0.6608, pedigree (3,3,2,1,3)
  (same comment as for Oxygen)
- Methane, fossil [air, unspecified]: 1.79753e-6 kg; lognormal variance with pedigree 0.0508, pedigree (3,3,2,1,3)
  (same comment as for Oxygen)
- Methane, non-fossil [air, unspecified]: 2.4e-8 kg; lognormal variance with pedigree 0.0508, pedigree (3,3,2,1,3)
  (same comment as for Oxygen)
- Methanol [air, unspecified]: 5.02584e-9 kg; lognormal variance with pedigree 0.0508, pedigree (3,3,2,1,3)
  (same comment as for Oxygen)
- Molybdenum VI [air, unspecified]: 1.4046e-10 kg; lognormal variance with pedigree 0.6608, pedigree (3,3,2,1,3)
  (same comment as for Oxygen)
- NMVOC, non-methane volatile organic compounds [air, unspecified]: 7.83613e-8 kg; lognormal variance with pedigree 0.0508, pedigree (3,3,2,1,3)
  (same comment as for Oxygen)
- Nickel II [air, unspecified]: 5.12376e-9 kg; lognormal variance with pedigree 0.6608, pedigree (3,3,2,1,3)
  (same comment as for Oxygen)
- Nitrogen oxides [air, unspecified]: 1.8e-5 kg; lognormal variance with pedigree 0.0403, pedigree (1,2,2,1,1)
  FEFCO 2021
- PAH, polycyclic aromatic hydrocarbons [air, unspecified]: 8.24024e-9 kg; lognormal variance with pedigree 0.3108, pedigree (3,3,2,1,3)
  (same comment as for Oxygen)
- Particulate Matter, < 2.5 um [air, unspecified]: 7.7e-7 kg; lognormal variance with pedigree 0.3003, pedigree (1,2,2,1,1)
  FEFCO 2021
- Particulate Matter, > 10 um [air, unspecified]: 2.3e-7 kg; lognormal variance with pedigree 0.0403, pedigree (1,2,2,1,1)
  FEFCO 2021
- Particulate Matter, > 2.5 um and < 10um [air, unspecified]: 3e-7 kg; lognormal variance with pedigree 0.1203, pedigree (1,2,2,1,1)
  FEFCO 2021
- Pentachlorophenol [air, unspecified]: 6.48e-14 kg; lognormal variance with pedigree 0.0508, pedigree (3,3,2,1,3)
  (same comment as for Oxygen)
- Pentane [air, unspecified]: 9.78887e-7 kg; lognormal variance with pedigree 0.0508, pedigree (3,3,2,1,3)
  (same comment as for Oxygen)
- Phosphorus [air, unspecified]: 3.22165e-9 kg; lognormal variance with pedigree 0.0508, pedigree (3,3,2,1,3)
  (same comment as for Oxygen)
- Polonium-210 [air, unspecified]: 1.10507e-6 kBq; lognormal variance with pedigree 0.3108, pedigree (3,3,2,1,3)
  (same comment as for Oxygen)
- Potassium I [air, unspecified]: 2.03581e-7 kg; lognormal variance with pedigree 0.0508, pedigree (3,3,2,1,3)
  (same comment as for Oxygen)
- Potassium-40 [air, unspecified]: 1.75511e-7 kBq; lognormal variance with pedigree 0.3108, pedigree (3,3,2,1,3)
  (same comment as for Oxygen)
- Propane [air, unspecified]: 1.76296e-7 kg; lognormal variance with pedigree 0.0508, pedigree (3,3,2,1,3)
  (same comment as for Oxygen)
- Propionic acid [air, unspecified]: 1.62799e-8 kg; lognormal variance with pedigree 0.0508, pedigree (3,3,2,1,3)
  (same comment as for Oxygen)
- Propylene [air, unspecified]: 6.50039e-9 kg; lognormal variance with pedigree 0.0508, pedigree (3,3,2,1,3)
  (same comment as for Oxygen)
- Radium-226 [air, unspecified]: 1.56009e-7 kBq; lognormal variance with pedigree 0.3108, pedigree (3,3,2,1,3)
  (same comment as for Oxygen)
- Radium-228 [air, unspecified]: 8.45051e-7 kBq; lognormal variance with pedigree 0.3108, pedigree (3,3,2,1,3)
  (same comment as for Oxygen)
- Radon-220 [air, unspecified]: 1.30008e-8 kBq; lognormal variance with pedigree 0.3108, pedigree (3,3,2,1,3)
  (same comment as for Oxygen)
- Radon-222 [air, unspecified]: 1.30008e-8 kBq; lognormal variance with pedigree 0.3108, pedigree (3,3,2,1,3)
  (same comment as for Oxygen)
- Scandium [air, unspecified]: 1.6381e-11 kg; lognormal variance with pedigree 0.0508, pedigree (3,3,2,1,3)
  (same comment as for Oxygen)
- Selenium IV [air, unspecified]: 2.41502e-10 kg; lognormal variance with pedigree 0.0508, pedigree (3,3,2,1,3)
  (same comment as for Oxygen)
- Silicon [air, unspecified]: 2.05412e-7 kg; lognormal variance with pedigree 0.0508, pedigree (3,3,2,1,3)
  (same comment as for Oxygen)
- Sodium I [air, unspecified]: 2.60074e-8 kg; lognormal variance with pedigree 0.0508, pedigree (3,3,2,1,3)
  (same comment as for Oxygen)
- Strontium II [air, unspecified]: 2.47015e-9 kg; lognormal variance with pedigree 0.0508, pedigree (3,3,2,1,3)
  (same comment as for Oxygen)
- Sulfur dioxide [air, unspecified]: 1.1e-5 kg; lognormal variance with pedigree 0.0009, pedigree (1,2,2,1,1)
  FEFCO 2021
- Thallium I [air, unspecified]: 2.05412e-11 kg; lognormal variance with pedigree 0.0508, pedigree (3,3,2,1,3)
  (same comment as for Oxygen)
- Thorium [air, unspecified]: 2.47015e-11 kg; lognormal variance with pedigree 0.0508, pedigree (3,3,2,1,3)
  (same comment as for Oxygen)
- Thorium-228 [air, unspecified]: 7.15043e-8 kBq; lognormal variance with pedigree 0.3108, pedigree (3,3,2,1,3)
  (same comment as for Oxygen)
- Thorium-232 [air, unspecified]: 4.55027e-8 kBq; lognormal variance with pedigree 0.3108, pedigree (3,3,2,1,3)
  (same comment as for Oxygen)
- Tin ion [air, unspecified]: 8.21649e-12 kg; lognormal variance with pedigree 0.6608, pedigree (3,3,2,1,3)
  (same comment as for Oxygen)
- Titanium ion [air, unspecified]: 4.9273e-9 kg; lognormal variance with pedigree 0.6608, pedigree (3,3,2,1,3)
  (same comment as for Oxygen)
- Toluene [air, unspecified]: 1.67094e-7 kg; lognormal variance with pedigree 0.0508, pedigree (3,3,2,1,3)
  (same comment as for Oxygen)
- Uranium [air, unspecified]: 3.2892e-11 kg; lognormal variance with pedigree 0.0508, pedigree (3,3,2,1,3)
  (same comment as for Oxygen)
- Uranium-238 [air, unspecified]: 1.30008e-7 kBq; lognormal variance with pedigree 0.3108, pedigree (3,3,2,1,3)
  (same comment as for Oxygen)
- Vanadium V [air, unspecified]: 1.03473e-8 kg; lognormal variance with pedigree 0.0508, pedigree (3,3,2,1,3)
  (same comment as for Oxygen)
- Water [air, unspecified]: 0.00020964 m3; lognormal variance with pedigree 0.0438, pedigree (2,3,3,1,2)
  FEFCO 2021. Calculated as water input- output
- Xylenes, unspecified [air, unspecified]: 1.30008e-9 kg; lognormal variance with pedigree 0.0508, pedigree (3,3,2,1,3)
  (same comment as for Oxygen)
- Zinc II [air, unspecified]: 9.96649e-9 kg; lognormal variance with pedigree 0.6608, pedigree (3,3,2,1,3)
  (same comment as for Oxygen)
- m-Xylene [air, unspecified]: 9.6e-10 kg; lognormal variance with pedigree 0.0508, pedigree (3,3,2,1,3)
  (same comment as for Oxygen)
- BOD5, Biological Oxygen Demand [water, unspecified]: 0.000155 kg; lognormal variance with pedigree 0.0902, pedigree (4,4,2,1,4)
  Calculated as BOD5 = 0.5*COD
- COD, Chemical Oxygen Demand [water, unspecified]: 0.00031 kg; lognormal variance with pedigree 0.0403, pedigree (1,2,2,1,1)
  FEFCO 2021
- DOC, Dissolved Organic Carbon [water, unspecified]: 0.000114815 kg; lognormal variance with pedigree 0.0902, pedigree (4,4,2,1,4)
  Assumed to be equal to TOC
- Nitrogen [water, unspecified]: 6.1e-6 kg; lognormal variance with pedigree 0.0403, pedigree (1,2,2,1,1)
  FEFCO 2021
- Phosphorus [water, unspecified]: 1.2e-6 kg; lognormal variance with pedigree 0.0403, pedigree (1,2,2,1,1)
  FEFCO 2021
- TOC, Total Organic Carbon [water, unspecified]: 0.000114815 kg; lognormal variance with pedigree 0.0902, pedigree (4,4,2,1,4)
  Calculated value: COD = 2.7*TOC
- Water [water, unspecified]: 0.00018036 m3; lognormal variance with pedigree 0.0438, pedigree (2,3,3,1,2)
  FEFCO 2021. Accounts for both "thermally polluted" (0.00036 m3) and "process water after treatment" (0,18 m3) water output

## Sampling procedure
Data were collected from the producers by Cepi CCB (ContainerBoard) and FEFCO (European Federation of Corrugated Board Manufacturers) for the European Database for Corrugated Board Life Cycle Studies), checked by technical experts and reviewed by the Institut für Energie- und Umweltforschung Heidelberg (ifeu). Data on corrugated board production are based on 470 plants (mostly integrated plants with corrugated board and box production on the same site). Together they produced 18,730,000 tonnes saleable product, which is 73% of the total annual production of corrugated board products in Europe. Each of the production sites produces on average 33.600 tonnes of corrugated sheets, ranging from 329 – 148.000 tonnes each. Reference(s): https://www.fefco.org/sites/default/files/documents/2022-07-07_FEFCO%20LCA%202021.pdf, last accessed March 2023

## Extrapolations
Additional air emissions from the combustion of fossil fuels estimated based on industrial heating datasets from the ecoinvent database and matched as follows: natural gas: heat production, natural gas, at industrial furnace >100kW, Europe without Switzerland; heavy fuel oil: heat production, heavy fuel oil, at industrial furnace 1MW, Europe without Switzerland; light fuel oil: heat production, light fuel oil, at industrial furnace 1MW, Europe without Switzerland; Diesel: heat production, light fuel oil, at industrial furnace 1MW, Europe without Switzerland; LPG: heat production, natural gas, at industrial furnace >100kW, Europe without Switzerland; Coal: heat production, at hard coal industrial furnace 1-10MW, Europe without Switzerland; Biofuel (bark, scrap wood, tall oil): heat production, wood chips from industry, at furnace 1000kW, CH
