# polyethylene terephthalate production, granulate, bottle grade

Dataset: EcoSpold 2, unit process
Geography: CA-QC
Time period: 1999-01-01 to 2023-12-31
Technology level: current
Classification: ISIC rev.4 ecoinvent: 2013:Manufacture of plastics and synthetic rubber in primary forms
Classification: EcoSpold01Categories: plastics/polymers
Synonyms: PET
Tags: recontextualization
Scenario: Business-as-Usual
System model: Allocation, cut-off by classification
Generated by: Pascal Lesage
Published in: Hischier R. 2007
Database: ecoinvent
isCopyrightProtected: true
accessRestrictedTo: 1

## General comment
Data are based on the average unit process from the Eco-profiles of the European plastics industry
[This dataset was already contained in the ecoinvent database version 2. It was not individually updated during the transfer to ecoinvent version 3. Life Cycle Impact Assessment results may still have changed, as they are affected by changes in the supply chain, i.e. in other datasets. This dataset was generated following the ecoinvent quality guidelines for version 2. It may have been subject to central changes described in the ecoinvent version 3 change report (http://www.ecoinvent.org/database/ecoinvent-version-3/reports-of-changes/), and the results of the central updates were reviewed extensively. The changes added e.g. consistent water flows and other information throughout the database. The documentation of this dataset can be found in the ecoinvent reports of version 2, which are still available via the ecoinvent website. The change report linked above covers all central changes that were made during the conversion process.]
Child dataset exchanges identical to GLO dataset. Created to enable linking to regional markets (e.g. for electricity). Data uncertainty adjusted accordingly.

## Included activities end
Average data for the production of bottle grade PET out of ethylene glycol, PTA and amorphous PET. The data include material and energy input, waste as well as air and water emissions. Missing sum parameters to water (DOC, TOC, COD), transport and infrastructure are estimated.

## Geography
Data from several European production sites
Child dataset exchanges identical to GLO dataset. Created to enable linking to regional markets (e.g. for electricity). Data uncertainty adjusted accordingly.

## Technology
PET production out of PTA and ethylene gylcol

## Time period
date of publication

## Parameters
- Quebec gross domestic product 2011: 3.11e11 USD(2011); name quebecGDP2011; lognormal variance with pedigree 0.0006, pedigree (1,1,1,1,1)
  Quebec Gross domestic product for 2011, expressed in 2011 USD. Source: Institut de la statistique du Québec. Converted from CAD to USD using a yearly average exchange rate of 0.989 CAD/USD (Source: bank of Canada).
- fraction, cooling water, cooling pond system, to air: 0.032 dimensionless; lognormal variance with pedigree 0.0413, pedigree (2,3,1,3,1)
- fraction, cooling water, once-through system, to air: 0.004 dimensionless; lognormal variance with pedigree 0.0413, pedigree (2,3,1,3,1)
- fraction, cooling water, recirculating system, to air: 0.771 dimensionless; lognormal variance with pedigree 0.0413, pedigree (2,3,1,3,1)
- fraction, cooling water, to air: 0.3875 dimensionless; lognormal variance with pedigree 0.092025, pedigree (4,4,3,2,4)
- fraction, process water, to air: 0.205 dimensionless; lognormal variance with pedigree 0.092025, pedigree (4,4,3,2,4)
- world gross domestic product 2011: 7e13 USD(2011); name worldGDP2011; lognormal variance with pedigree 0.0006, pedigree (1,1,1,1,1)
  World Gross domestic product for 2011, expressed in 2011 USD. Source: World Bank.

## Reference product
- polyethylene terephthalate, granulate, bottle grade: 1 kg; name RefProd; By-product classification allocatable product; CPC 34710: Polymers of ethylene, in primary forms; HS2017 390130: Ethylene polymers; in primary forms, ethylene-vinyl acetate copolymers; CAS 25038-59-9
  production volume 0.0177714 kg; name ProdVol
    Gross approximation of Quebec production volume using relative value of Quebec GDP to world GDP.
  property carbon content, fossil 0.625
    Polymer of the ethylen terephtalate monomer (C10H8O4)n (ecoinvent v2.2 report 11_II), MW=192 g/mol
  properties: carbon allocation 0.625 kg, carbon content 0.625, carbon content, non-fossil 0, dry mass 1 kg, heating value, net 22.95 MJ, price 1.29 EUR2005, water content 0, water in wet mass 0 kg, wet mass 1 kg

## Inputs from technosphere
- average incineration residue: -0.00181 kg; name IncinRes; lognormal variance with pedigree 0.0132, pedigree (2,3,1,5,1)
  European average value, based on industrial survey
  Uncertainty: e
  production volume; = ProdVol*IncinRes/RefProd
    Calculated from the production volume of polyethylene terephthalate, granulate, bottle grade in proportion to the respective output amounts.
  properties: carbon content, fossil 0.0325466, carbon content, non-fossil 0.0511208, dry mass 1 kg, wet mass 1 kg
  note on carbon content, fossil: Tab A.1, ecoinvent v2.2 report 13_I. It is considered that 61.1% of the C has a biogenic origin
- chemical factory, organics: 4e-10 unit; lognormal variance with pedigree 0.448, pedigree (4,5,5,5,5)
  Estimation
  Uncertainty: e
- electricity, medium voltage: 0.189 kWh; lognormal variance with pedigree 0.0532, pedigree (2,3,5,5,1)
  European average value, based on industrial survey
  Uncertainty: e
- ethylene glycol: 0.0761 kg; lognormal variance with pedigree 0.0532, pedigree (2,3,5,5,1)
  European average value, based on industrial survey
  Uncertainty: e
  properties: carbon content, fossil 0.387097, dry mass 1 kg, heating value, net 23.44 MJ, wet mass 1 kg
- hazardous waste, for underground deposit: -0.00043 kg; name HazWaste; lognormal variance with pedigree 0.0132, pedigree (2,3,1,5,1)
  European average value, based on industrial survey
  Uncertainty: e
  production volume; = ProdVol*HazWaste/RefProd
    (same comment as for average incineration residue)
  properties: carbon content, fossil 0.554667, dry mass 1 kg, wet mass 1 kg
  note on carbon content, fossil: Tab A.6, ecoinvent v2.2 report 13_I, average hazardous waste composition was used, and referred to 0% water mass. No waste-specific emission are currently inventoried for underground deposits. Accordingly, no waste composition must be specified. For generic, average waste to underground deposit deposition in a 200 liter steel drum without cement solidification is assumed (ecoinvent v2.2 report 13_I).
- heat, district or industrial, natural gas: 0.379 MJ; lognormal variance with pedigree 0.1332, pedigree (2,3,5,5,4)
  Amount industrial survey - distribution according to cumulated data
  Uncertainty: a
  properties: heating value, net 1 MJ
- heat, district or industrial, other than natural gas: 0.5506 MJ; lognormal variance with pedigree 0.1332, pedigree (2,3,5,5,4)
  Amount industrial survey - distribution according to cumulated data
  Uncertainty: a
  properties: heating value, net 1 MJ
- municipal solid waste: -4e-5 kg; name MSW; lognormal variance with pedigree 0.0132, pedigree (2,3,1,5,1)
  European average value, based on industrial survey
  Uncertainty: e
  production volume; = ProdVol*MSW/RefProd
    (same comment as for average incineration residue)
  properties: carbon content, fossil 0.171549, carbon content, non-fossil 0.261655, dry mass 0.771 kg, heating value, net 11.74 MJ, water content 0.297017, wet mass 1 kg
  note on carbon content, fossil: MSW composition in tab 4.1, ecoinvent v2.2 report 13_I. C content referred to 1 kg DM
  note on heating value, net: Value taken from the general comment of the treatment dataset.
- nitrogen, liquid: 0.0366 kg; lognormal variance with pedigree 0.0532, pedigree (2,3,5,5,1)
  European average value, based on industrial survey
  Uncertainty: e
  properties: dry mass 1 kg, wet mass 1 kg
- polyethylene terephthalate, granulate, amorphous: 0.78 kg; lognormal variance with pedigree 0.0532, pedigree (2,3,5,5,1)
  European average value, based on industrial survey
  Uncertainty: e
  properties: carbon content, fossil 0.625, dry mass 1 kg, heating value, net 22.95 MJ, wet mass 1 kg
  note on carbon content, fossil: Polymer of the ethylen terephtalate monomer (C10H8O4)n (ecoinvent v2.2 report 11_II), MW=192 g/mol
- purified terephthalic acid: 0.194 kg; lognormal variance with pedigree 0.0532, pedigree (2,3,5,5,1)
  European average value, based on industrial survey
  Uncertainty: e
  properties: carbon content, fossil 0.578313, dry mass 1 kg, heating value, net 21.9 MJ, wet mass 1 kg
- steam, in chemical industry: 0.1 kg; lognormal variance with pedigree 0.0532, pedigree (2,3,5,5,1)
  European average value, based on industrial survey
  Uncertainty: e
  properties: dry mass 1 kg, wet mass 1 kg
- waste plastic, mixture: -0.00063 kg; name PlastWaste; lognormal variance with pedigree 0.0132, pedigree (2,3,1,5,1)
  European average value, based on industrial survey
  Uncertainty: e
  production volume; = ProdVol*PlastWaste/RefProd
    (same comment as for average incineration residue)
  properties: carbon content, fossil 0.747344, dry mass 0.847 kg, heating value, net 30.79 MJ, water content 0.180638, wet mass 1 kg
  note on carbon content, fossil: C content in 1 kg DM was calculated using data in Tab A.2, ecoinvent v2.2 report 13_I

## Inputs from nature
- Water, cooling, unspecified natural origin [natural resource, in water]: 0.00484 m3; lognormal variance with pedigree 0.0532, pedigree (2,3,5,5,1)
  European average value, based on industrial survey
  Uncertainty: e
- Water, unspecified natural origin [natural resource, in water]: 1.43e-5 m3; lognormal variance with pedigree 0.0532, pedigree (2,3,5,5,1)
  European average value, based on industrial survey
  Uncertainty: e

## Emissions to nature
- NMVOC, non-methane volatile organic compounds [air, urban air close to ground]: 1e-6 kg; lognormal variance with pedigree 0.1832, pedigree (2,3,5,5,1)
  European average value, based on industrial survey
  Uncertainty: e
- Particulate Matter, < 2.5 um [air, urban air close to ground]: 2.5e-7 kg; lognormal variance with pedigree 0.3632, pedigree (2,3,5,5,1)
  European average value, based on industrial survey
  Uncertainty: e
- Particulate Matter, > 10 um [air, urban air close to ground]: 3.2e-7 kg; lognormal variance with pedigree 0.1032, pedigree (2,3,5,5,1)
  European average value, based on industrial survey
  Uncertainty: e
- Particulate Matter, > 2.5 um and < 10um [air, urban air close to ground]: 4.3e-7 kg; lognormal variance with pedigree 0.1832, pedigree (2,3,5,5,1)
  European average value, based on industrial survey
  Uncertainty: e
- Water [air, unspecified]: 0.00187843 m3; lognormal variance with pedigree 0.0827, pedigree (2,2,5,5,1)
  Calculated value based on literature values and expert opinion. See comments in the parametres" comment field.
- BOD5, Biological Oxygen Demand [water, surface water]: 0.000631 kg; lognormal variance with pedigree 0.1032, pedigree (2,3,5,5,1)
  European average value, based on industrial survey
  Uncertainty: e
- COD, Chemical Oxygen Demand [water, surface water]: 0.000631 kg; lognormal variance with pedigree 0.23, pedigree (5,5,5,5,4)
  Estimated, based on rules in Frischknecht 2003
  Uncertainty: e
- DOC, Dissolved Organic Carbon [water, surface water]: 6.41e-7 kg; lognormal variance with pedigree 0.23, pedigree (5,5,5,5,4)
  Estimated, based on rules in Frischknecht 2003
  Uncertainty: e
- Hydrocarbons, unspecified [water, surface water]: 1e-6 kg; lognormal variance with pedigree 0.3632, pedigree (2,3,5,5,1)
  European average value, based on industrial survey
  Uncertainty: e
- Suspended solids, unspecified [water, surface water]: 9e-6 kg; lognormal variance with pedigree 0.1032, pedigree (2,3,5,5,1)
  European average value, based on industrial survey
  Uncertainty: e
- TOC, Total Organic Carbon [water, surface water]: 6.41e-7 kg; lognormal variance with pedigree 0.23, pedigree (5,5,5,5,4)
  Estimated, based on rules in Frischknecht 2003
  Uncertainty: e
- Water [water, unspecified]: 0.00297587 m3; lognormal variance with pedigree 0.0827, pedigree (2,2,5,5,1)
  (same comment as for Water)
  property carbon content, fossil 0; name C_content_fossil
  property carbon content, non-fossil 0; name C_content_non_fossil
  property dry mass 0 kg; name DM
  property water in wet mass 1000 kg; name WWM
  property wet mass 1000 kg; name WM

## Sampling procedure
company data

## Extrapolations
no extrapolation
The exchanges in this child dataset are identical to those of the corresponding GLO dataset. It was created to enable linking to regional markets (e.g. for electricity). Data uncertainty adjusted accordingly.
The GLO dataset was itself originally based on an original dataset covering the geography RER. The uncertainty had also been adjusted accordingly.
