# treatment of coating from waste cathode ray tube display, municipal incineration

Dataset: EcoSpold 2, unit process
Geography: GLO
Time period: 2006-01-01 to 2023-12-31
Technology level: current
Classification: ISIC rev.4 ecoinvent: 3821:Treatment and disposal of non-hazardous waste
Scenario: Business-as-Usual
System model: Allocation, cut-off by classification
Generated by: Nikolia Stoikou
Database: ecoinvent
isCopyrightProtected: true
accessRestrictedTo: 1

## General comment
The process represents the treatment of 'coating from waste cathode ray tube display' in a municipal solid waste incinerator (MSWI). Recommended use of this dataset: Only for incineration of the inner coating (lumiphore) of cathode ray tube screens, separated during the recycling of used CRT screensInventoried waste consists of fraction: 100% CRT coating; . Waste composition (wet, in ppmw): H2O 100000; O 44700; H na; C na; S 225000; N na; P na; B na; Cl na; Br na; F na; I na; Ag 3020; As na; Ba 3100; Cd na; Co na; Cr na; Cu 2570; Hg na; Mn na; Mo na; Ni na; Pb na; Sb na; Se na; Sn na; V na; Zn 368020; Be na; Sc na; Sr 248000; Ti na; Tl na; W na; Si na; Fe na; Ca na; Al 5590; K na; Mg na; Na na. Share of carbon in initial waste input that is biogenic 61.4%.Share of metals in waste not oxidised and bulk-recyclable (exclude very small or thin parts) Iron: 0%; Alu: 0%; Copper: 0%.Recovery of metal scrap from bottom ash to recycling: 0g iron scrap, 0g aluminium scrap, 0g copper scrap. Net energy production: 0MJ/kg electric energy and 0MJ/kg thermal energy.

## Included activities start
The activity starts with the waste being available at the gate of the treatment facility. Collection and transportation of the waste to the treatment plant is not included.

## Included activities end
The activity ends with the waste being treated and waste-specific emissions from the incineration process and auxiliary material consumption for flue gas cleaning are released to the environment (air and water). Infrastructure and waste-specific energy demands for Municipal Solid Waste Incineration (MSWI) and net energy generation are included.

## Geography
Modelling parameters affecting the treatment technology are not specific to this geography.

## Technology
The waste is treated in the incineration plant with flue gas cleaning. Incineration is the controlled combustion of a waste. Auxiliary material consumption for this step of air pollution control (APC) are included in the process. Air polution control includes electrostatic precipitator for fly ash (ESP), wet flue gas scrubber and 25% SNCR , 42.77% SCR-high dust , 32.68% SCR-low dust -DeNOx facilities and 0% without DeNOx (weighted according to mass of burnt waste). Efficiency of iron scrap separation from slag : 58%. Efficiency of aluminium scrap separation from slag : 31%. Efficiency of copper scrap separation from slag : 31%. Gross electric efficiency technology mix 15.84% and Gross thermal efficiency technology mix 28.51%

## Reference product
- coating from waste cathode ray tube display: -1 kg; By-product classification Waste; CPC 39380: Waste and scrap of primary cells, primary batteries and electric accumulators; spent primary cells, primary ba[…]
  main reference product of this activity (supply of disposal service).
  production volume 1.0243e6 kg
    based on estimate on MSW in WTE globally and estimate of share of WEEE residues in Swiss MSW based on unqualified estimate waste CRT screens in CH and rate of this CRT coating waste per CRT device (from Hischier et al. 2007-V)
  property price 0 EUR2005
    Waste products are assigned a price of zero as they are assumed to require further treatment.
  properties: aluminium content 0.00621111, barium content 0.00344444, carbon allocation 0 kg, carbon content 0, carbon content, fossil 0, carbon content, non-fossil 0, copper content 0.00285556, dry mass 0.9 kg, heating value, gross 0 MJ, heating value, net 0 MJ, oxygen content 0.0496667, silver content 0.00335556, strontium content 0.275556, sulfur content 0.25, water content 0.111111, water in wet mass 0.1 kg, wet mass 1 kg, zinc content 0.408911

## Inputs from technosphere
- ammonia, anhydrous, liquid: 3.49018e-6, 1.49942e-5, 6.77516e-6, 7.50983e-5, 3.17445e-6, 7.10109e-7, 2.60978e-5, 2.24342e-6, 6.91529e-6 kg (9 suppliers, which the file names only by identifier); sum of these 0.000139499 kg; lognormal variance with pedigree 0.12926, pedigree (1,1,4,1,1)
  Input to DeNOx stage (100% NH3).
  Uncertainty: uncertainty calculated from uncertainty in average DeNOx input, uncertainty in the share of thermal NOx, uncertainty of nitrogen content in average municipal waste and the uncertainty in nitrogen content in *this* waste.
  properties: dry mass 1 kg, wet mass 1 kg
- bottom ash, MSWI, coating from waste CRT display: -1.51665 kg; lognormal variance with pedigree 0.012262, pedigree (1,1,1,1,1)
  waste-specific bottom ash from the incineration of this waste
  Uncertainty: uncertainty is calculated from uncertainties in waste composition and transfer coefficients in incinerator
  production volume
    calculated in proportion to incinerated waste input
  properties: aluminium content 0.00418925, barium content 0.0023232, copper content 0.00192601, dry mass 0.87981 kg, oxygen content 0.359022, silver content 0.00226324, strontium content 0.185856, sulfur content 0.168619, water content 0.136609, wet mass 1 kg, zinc content 0.275801
- chromium trioxide, flakes: 1.78366e-7 kg; lognormal variance with pedigree 0.45542, pedigree (1,1,4,1,1)
  Input to DeNOx stage. Active component in SCR catalyst (vanadium pentoxide, V2O5), here approximated with the available chromium trioxide.
  Uncertainty: uncertainty calculated from uncertainty in average DeNOx input, uncertainty in the share of thermal NOx, uncertainty of nitrogen content in average municipal waste and the uncertainty in nitrogen content in *this* waste.
  properties: dry mass 1 kg, wet mass 1 kg
- electricity, for reuse in municipal waste incineration only: 4.14099e-6, 0.000599797, 0.000116602, 0.00057647, 0.000596521, 0.00149708, 2.54998e-5, 9.37172e-6, 0.000450061, 0.000316241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 kWh (26 suppliers, which the file names only by identifier); sum of these 0.0500793 kWh; lognormal variance with pedigree 0.00859512, pedigree (1,1,4,1,1)
  Net electricity required to incinerate this waste (subsidised from high-calorific waste fractions).
  Uncertainty: uncertainty is calculated from uncertainties in waste composition and uncertainties in energy efficiency and the uncertainty in internal energy demand
- heat, district or industrial, natural gas: 0.0260862 MJ; lognormal variance with pedigree 0.12926, pedigree (1,1,4,1,1)
  Input to DeNOx stage, to heat up flue gas in low-dust SCR.
  Uncertainty: uncertainty calculated from uncertainty in average DeNOx input, uncertainty in the share of thermal NOx, uncertainty of nitrogen content in average municipal waste and the uncertainty in nitrogen content in *this* waste.
  properties: heating value, net 1 MJ
- heat, for reuse in municipal waste incineration only: 0.00174141, 2.95154e-5, 0.000451163, 0.00108954, 0.00173719, 0.0023081, 0.132047, 6.15606e-5, 0.000550672, 3.62617e-5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 MJ (26 suppliers, which the file names only by identifier); sum of these 0.193686 MJ; lognormal variance with pedigree 0.00859512, pedigree (1,1,4,1,1)
  Net heat required to incinerate this waste (subsidised from high-calorific waste fractions).
  Uncertainty: uncertainty is calculated from uncertainties in waste composition and uncertainties in energy efficiency and the uncertainty in internal energy demand
- municipal waste incineration facility: 2.5e-10 unit
  Infrastructure demands per kilogram incinerated waste.
- titanium dioxide: 5.82663e-6, 2.91332e-6 kg (2 suppliers, which the file names only by identifier); sum of these 8.73995e-6 kg; lognormal variance with pedigree 0.45542, pedigree (1,1,4,1,1)
  Input to DeNOx stage (TiO2 catalyst carrier)
  Uncertainty: uncertainty calculated from uncertainty in average DeNOx input, uncertainty in the share of thermal NOx, uncertainty of nitrogen content in average municipal waste and the uncertainty in nitrogen content in *this* waste.
  properties: dry mass 1 kg, wet mass 1 kg

## Inputs from nature
- Oxygen [natural resource, in air]: 0.868736 kg; lognormal variance with pedigree 0.2071, pedigree (1,1,4,1,1)
  oxygen from ambient air needed to combust and oxidise this waste. Net demand, i.e. without O2 leaving the plant in flue gas uncombusted.
  Uncertainty: uncertainty is calculated from uncertainties in waste composition and transfer coefficients to flue gas and solid residues in incinerator

## Emissions to nature
- Ammonia [air, urban air close to ground]: 1.64015e-7 kg; lognormal variance with pedigree 0.17159, pedigree (1,1,4,1,1)
  Nitrogen species emitted to air after DeNOx stage.
  Uncertainty: uncertainty calculated from uncertainty in average N-emissions and uncertainty in the share of thermal NOx and the uncertainty in nitrogen content in *this* waste.
- Benzene [air, urban air close to ground]: 4.5044e-8 kg; lognormal variance with pedigree 0.0491, pedigree (1,1,4,1,1)
  Incomplete combustion product emitted to air.
  Uncertainty: uncertainty calculated from uncertainty in average operation emissions, and the uncertainty of the flue gas volume from this waste.
- Benzo(a)pyrene [air, urban air close to ground]: 1.00237e-12 kg; lognormal variance with pedigree 0.30974, pedigree (1,1,4,1,1)
  (same comment as for Benzene)
- Carbon monoxide, fossil [air, urban air close to ground]: 2.95559e-5 kg; lognormal variance with pedigree 0.65557, pedigree (1,1,4,1,1)
  (same comment as for Benzene)
- Carbon monoxide, non-fossil [air, urban air close to ground]: 4.70137e-5 kg; lognormal variance with pedigree 0.65557, pedigree (1,1,4,1,1)
  (same comment as for Benzene)
- Dioxins, measured as 2,3,7,8-tetrachlorodibenzo-p-dioxin [air, urban air close to ground]: 9.00819e-14 kg; lognormal variance with pedigree 0.30974, pedigree (1,1,4,1,1)
  (same comment as for Benzene)
- Hexachlorobenzene [air, urban air close to ground]: 9.41846e-11 kg; lognormal variance with pedigree 0.0491, pedigree (1,1,4,1,1)
  (same comment as for Benzene)
- Methane, fossil [air, urban air close to ground]: 2.60805e-7 kg; lognormal variance with pedigree 0.0491, pedigree (1,1,4,1,1)
  (same comment as for Benzene)
- Methane, non-fossil [air, urban air close to ground]: 4.14855e-7 kg; lognormal variance with pedigree 0.0491, pedigree (1,1,4,1,1)
  (same comment as for Benzene)
- NMVOC, non-methane volatile organic compounds [air, urban air close to ground]: 2.04994e-6 kg; lognormal variance with pedigree 0.0491, pedigree (1,1,4,1,1)
  (same comment as for Benzene)
- Nitrogen oxides [air, urban air close to ground]: 5.19382e-5 kg; lognormal variance with pedigree 0.17159, pedigree (1,1,4,1,1)
  sum of fuel-NOx and thermal-NOx emitted to air after DeNOx stage.
  Uncertainty: uncertainty calculated from uncertainty in average N-emissions and uncertainty in the share of thermal NOx and the uncertainty in nitrogen content in *this* waste.
- Particulate Matter, < 2.5 um [air, urban air close to ground]: 5.37789e-6 kg; lognormal variance with pedigree 0.30974, pedigree (1,1,4,1,1)
  (same comment as for Benzene)
- Particulate Matter, > 2.5 um and < 10um [air, urban air close to ground]: 2.70246e-8 kg; lognormal variance with pedigree 0.12811, pedigree (1,1,4,1,1)
  (same comment as for Benzene)
- Pentachlorobenzene [air, urban air close to ground]: 2.37983e-10 kg; lognormal variance with pedigree 0.0491, pedigree (1,1,4,1,1)
  (same comment as for Benzene)
- Pentachlorophenol [air, urban air close to ground]: 1.9616e-11 kg; lognormal variance with pedigree 0.0491, pedigree (1,1,4,1,1)
  (same comment as for Benzene)
- Toluene [air, urban air close to ground]: 9.0088e-8 kg; lognormal variance with pedigree 0.0491, pedigree (1,1,4,1,1)
  (same comment as for Benzene)
- Non-hazardous waste disposed [inventory indicator, waste]: 1 kg
  Inventory indicator for waste mass disposed. To be used in EN15804 "other data" results.
