# maleic anhydride production by catalytic oxidation of benzene

Dataset: EcoSpold 2, unit process
Geography: RoW
Time period: 1999-01-01 to 2023-12-31
Technology level: old
Classification: ISIC rev.4 ecoinvent: 2011:Manufacture of basic chemicals
Synonyms: Maleic acid anhydride; Toxilic anhydride; 2,5-Furandione; 108-31-6; Furan-2,5-dione
Scenario: Business-as-Usual
System model: Allocation, cut-off by classification
Generated by: Iasonas Ioannou
Published in: Althaus H.-J. 2007
Database: ecoinvent
isCopyrightProtected: true
accessRestrictedTo: 1

## General comment
This dataset represents the production of 1 kg of maleic anhydride, with steam as by product. Maleic anhydride is an organic chemical compound which consists of white crystalline flakes that have a pungent, acrid odor. It is soluble in acetone, ether and petroleum. According to (IPPC Chemicals, 2002), maleic anhydride is used to produce unsaturated polyesters, fumaric and maleic acid, and is also used as an intermediate for the production of pesticides.
In 1991, one-third of maleic acid production capacity was based on benzene oxidation and the rest was from the oxidation of butane and butene. Notably, the n-butane pathway is classified as the most economic raw material for maleic anhydride production. Thereofe, n-butane is the preferred pathway in the US and Japan, while existing facilities were converted to accept C4 feedstocks instead of benzene. Major manufacturers include Lonza, Bayer and Huntsman, among many others (Wells, 1999).
Maleic anhydride reacts with water to form maleic acid and will dimerize in the presence of UV light. A decomposition/polymerization reaction will occur with alkalis at elevated temperatures. It is a skin, eye and mucous membrane irritant (Wells, 1999).
In this dataset, the raw material inputs, and process-specific material exchanges, are modelled with a generic stoichiometry-based tool, using literature or estimated yields. The emissions are modelled with a default value, which is estimated based on losses, unreacted chemicals, among others. At the same time, the energy consumption is based on data from personal communications and literature sources. Finally, the auxiliary (i.e., cooling water and infrastructure) exchanges are modelled with a default value based on industry data from literature sources. For more information on the calculations refer to the sampling procedure.
References:
Althaus H.-J., Chudacoff M., Hischier R., Jungbluth N., Osses M. and Primas A. (2007) Life Cycle Inventories of Chemicals. ecoinvent report No. 8, v2.0. EMPA Dübendorf, Swiss Centre for Life Cycle Inventories, Dübendorf, CH.
Personal communication, Giovanni.Montiglio, Lonza, May 2003
G. Margaret Wells, “Handbook of Petrochemicals and Processes”, 2nd edition, Ashgate, 1999

## Included activities start
The activity starts when the raw materials enter the process.

## Included activities end
This activity ends with the production of maleic anhydride, with steam as a byproduct. All precursors and infrastructure are included.

## Geography
The inventory is modelled at the Global level. The main material inputs and outputs of this activity are generated with on a generic stoichiometry-based model, using literature or estimated yields. Furthermore, the source of information for the heat and electricity inputs is literature data for the specific technology. Finally, the main source of information for the values for water (process and cooling), nitrogen, chemical factory is industry data from the GENDORF Chemical Park, which is based in Germany and produced an average of 2462760 tonnes of chemical substances in the years 2015-2019. For more information on the calculations refer to the sampling procedure.
The dataset could also be considered as not geography-specific, and thus, valid for a broader geographical coverage.
References:
Hischier, R. (2005) Establishing Life Cycle Inventories of Chemicals Based on Differing Data Availability (9 pp). The International Journal of Life Cycle Assessment, Volume 10, Issue 1, pp 59-67. 10.1065/lca2004.10.181.7
Chemiepark GENDORF, Umwelterklärung 2016, https://www.gendorf.de/Nachbarn/Umweltschutz/Industrie%20und%20Nachhaltigkeit
Chemiepark GENDORF, Umwelterklärung 2017, https://www.gendorf.de/Nachbarn/Umweltschutz/Industrie%20und%20Nachhaltigkeit
Chemiepark GENDORF, Umwelterklärung 2020, https://www.gendorf.de/Nachbarn/Umweltschutz/Industrie%20und%20Nachhaltigkeit
Chauvel, Alain, Gilles Lefebvre, and L. Castex in "Petrochemical processes. Technical and economical characteristics Vol. 2." (1989)

## Technology
Air is preheated and compressed and mixed with benzene over a catalyst Heat from the strongly process exothermic serves to produce steam (molten salts are used to remove heat). The exit gases contain maleic anhydride, carbon monoxide, carbon dioxide and traces of aromatics. 50-60% of the anhydride is obtained directly from the reaction gas mixture. The remainder is recovered in the form of maleic acid. The maleic acid is then converted to anhydride via dehydration, usually by distillation with xylene (Falcke et al., 2017). Off gases leaving the scrubber are sent to a catalytic incinerator (personal communication Lonza).
C6H6 + 4½ O2 -> C4H2O3 + H2O + 2 CO2
The reaction occurs at slightly elevated pressure and temperatures of 350 – 450 °C and 1.5–2.5 bar with residence times over the catalysts of about 0.1 s and an air excess. The oxidation reaction in modern plants is performed at higher concentrations of benzene in air, reducing the amount of air required by the process. This reduces the amount of electricity needed for the air compressor, which is the larger portion of the overall electricity consumption, according (personal communication Lonza).
Regarding the catalytic system, vanadium oxides are used on different promoters such as phosphorus and the oxides of Fe, Cr, Ti, Co, Ni, Mo (such as V2O5-H3PO4).
In this dataset, a yield of 88% was assumed, according to Wells (1999). The treated exhaust gas contains undreacted benzene and carbon monoxide, and thus, is being combusted. Please note that the catalytic system is not covered.
References:
Althaus H.-J., Chudacoff M., Hischier R., Jungbluth N., Osses M. and Primas A. (2007) Life Cycle Inventories of Chemicals. ecoinvent report No. 8, v2.0. EMPA Dübendorf, Swiss Centre for Life Cycle Inventories, Dübendorf, CH.
G. Margaret Wells, “Handbook of Petrochemicals and Processes”, 2nd edition, Ashgate, 1999
Falcke, Heino, et al. "Best Available Techniques (BAT) reference document for the production of large volume organic chemicals." Publications Office of the European Union: Luxembourg (2017).

## Time period
The time period spans from the earliest year from which at least one of the input values was obtained until 2022, but overall form the most realistic picture of the production. Besides, the activity is partly generated, in terms of material inputs and outputs, based on a generic stoichiometry-based model, using literature or estimated yields, which does not expect to change over time.
The source of information for the heat and electricity inputs is literature data (from 2007) for the specific technology. Finally, the main source of information for the values for water (process and cooling), nitrogen, chemical factory is industry data from the GENDORF Chemical Park. The values are a 5-year average of data from 2015-2019 published by the GENDORF Chemical Park, which is based in Germany and produced an average of tonnes of chemical substances in the years 2462760. The end time period is therefore set based on the years from Gendorf reference.
For more information on the calculations refer to the sampling procedure and in the comments of the exchanges.
References:
Hischier, R. (2005) Establishing Life Cycle Inventories of Chemicals Based on Differing Data Availability (9 pp). The International Journal of Life Cycle Assessment, Volume 10, Issue 1, pp 59-67. 10.1065/lca2004.10.181.7
Chemiepark GENDORF, Umwelterklärung 2016, https://www.gendorf.de/Nachbarn/Umweltschutz/Industrie%20und%20Nachhaltigkeit
Chemiepark GENDORF, Umwelterklärung 2017, https://www.gendorf.de/Nachbarn/Umweltschutz/Industrie%20und%20Nachhaltigkeit
Chemiepark GENDORF, Umwelterklärung 2020, https://www.gendorf.de/Nachbarn/Umweltschutz/Industrie%20und%20Nachhaltigkeit
Althaus H.-J., Chudacoff M., Hischier R., Jungbluth N., Osses M. and Primas A. (2007) Life Cycle Inventories of Chemicals. ecoinvent report No. 8, v2.0. EMPA Dübendorf, Swiss Centre for Life Cycle Inventories, Dübendorf, CH.

## Reference product
- maleic anhydride: 1 kg; name RP; By-product classification allocatable product; CPC 34140: Carboxylic acids and their anhydrides, halides, peroxides and peroxyacids and their halogenated, sulphonated, […]; HS2017 291714: Acids; acyclic polycarboxylic acids; maleic anhydride; CAS 108-31-6
  Maleic anhydride is an organic chemical compound which consists of white crystalline flakes that have a pungent, acrid odor. It is soluble in acetone, ether and petroleum. According to (IPPC Chemicals, 2002), maleic anhydride is used to produce unsaturated polyesters, fumaric and maleic acid, and is also used as an intermediate for the production of pesticides. Reference(s): European Comission, Directionate General, Joint Reserach Center, 'Reference Documetn on Best Available Techniques in the Large Volume Organic Chemical Industry', February 2002
  production volume 2.852e8 kg; name RP_PV
    Year 2000 capacity according to Felthouse T R, Burnett J C, Horrell B, Mummey M J, Kuo Y -J. (2001). Malic anhydride, malic acid, and fumaric acid. KirkOnline. http://www.southalabama.edu/chemistry/barletta/felthouse.pdf
  property heating value, net 17.32 MJ
    LHV is calculated based on the elemental composition of the substance. Based on the CAS number of the substance (000108-31-6), the chemical formula of the substance is found to be: C4H2O3, (PubChem 2020). Reference: Kim, S., Chen, J., Cheng, T., Gindulyte, A., He, J., He, S., Li, Q., Shoemaker, B. A., Thiessen, P. A., Yu, B., Zaslavsky, L., Zhang, J., & Bolton, E. E. (2019). PubChem 2019 update: improved access to chemical data. Nucleic acids research, 47(D1), D1102–D1109. https://doi.org/10.1093/nar/gky1033
  property price 0.792 EUR2005
    Temporary price data. Calculated as 90% of purchasers price based on: 2004 prices for leading producing European country from Import/Export data (US$ and tonnes) from UN Commodity Trade Statistics Database (http://data.un.org/Explorer.aspxDatabase [Accessed 2 July 2010]). Commodity: Maleic anhydride
  properties: allocation factor 0.754586, carbon allocation 0.489955 kg, carbon content 0.489955, carbon content, fossil 0.489955, carbon content, non-fossil 0, dry mass 1 kg, true value 0.792, water content 0, water in wet mass 0 kg, wet mass 1 kg

## Inputs from technosphere
- benzene: 0.857209 kg; lognormal variance with pedigree 0.0046, pedigree (2,3,2,5,2)
  Value reported by G. Margaret Wells, “Handbook of Petrochemicals and Processes”, 2nd edition, Ashgate, 1999 for the production of maleic anhydride from the catalytic oxidation of benzene.
  properties: carbon content, fossil 0.923077, dry mass 1 kg, heating value, net 42.5 MJ, wet mass 1 kg
- chemical factory, organics: 3.01834e-10 unit; lognormal variance with pedigree 0.3448, pedigree (2,4,2,5,4)
  Calculated based on literature data published by the industry. For this activity, no information was readily available concerning infrastructure and land-use. Therefore, the infrastructure is estimated based on data from two chemical factories, the BASF site of Ludwigshafen and the chemical factory in Gendorf (which are both located in Germany), which produce a wide range of chemical substances. Based on this data, the following assumptions are made: the built area amounts to about 4.2 ha, the plant has an average output of 50'000 t/a and a lifespan of fifty years. The estimated infrastructure amount is therefore 4.00 E-10 units per kg of produced chemical. References: Althaus H.-J., Chudacoff M., Hischier R., Jungbluth N., Osses M. and Primas A. (2007) Life Cycle Inventories of Chemicals. ecoinvent report No. 8, v2.0. EMPA Dübendorf, Swiss Centre for Life Cycle Inventories, Dübendorf, CH. Gendorf (2000) Umwelterklärung 2000, Werk Gendorf. Werk Gendorf, Burgkirchen.
- electricity, medium voltage: 0.0150462, 0.300138, 0.100845, 0.00460766, 0.000922219, 0.000198021, 0.0309939 kWh (7 suppliers, which the file names only by identifier); sum of these 0.452751 kWh; lognormal variance with pedigree 0.0046, pedigree (2,3,2,5,2)
  According to personal communications with Lonza (in 2003), the catalytic oxidation of benzene to maleic anhydride requires 0.6 kWh of electricity per kg of maleic anhydride (Althaus, 2007). At the same time, Chauvel and Lefebvre (1989) reported a value of 1.5 kWh of electricity per kg of maleic anhydride. We, here, use the most up-to-date value, i.e., the personal communications with Lonza, in alignment with the heat output source.
  References:
  Althaus H.-J., Chudacoff M., Hischier R., Jungbluth N., Osses M. and Primas A. (2007) Life Cycle Inventories of Chemicals. ecoinvent report No. 8, v2.0. EMPA Dübendorf, Swiss Centre for Life Cycle Inventories, Dübendorf, CH.
  Personal communication, Giovanni.Montiglio, Lonza, May 2003
  Chauvel, Alain, Gilles Lefebvre, and L. Castex in "Petrochemical processes. Technical and economical characteristics Vol. 2." (1989).
- wastewater, average: -0.00038553, -1.37263e-6 m3 (2 suppliers, which the file names only by identifier); sum of these -0.000386903 m3; lognormal variance with pedigree 0.0118, pedigree (2,3,1,5,3)
  (same comment as for chemical factory, organics)
  production volume; = RP_PV*BP_wastewater_average/ABS(RP)
    Calculated from the production volume of maleic anhydride in proportion to the respective output amounts.
  properties: carbon content, non-fossil 0.194039, dry mass 0.346837 kg, mass concentration, TOC 0.1091 kg/m3, mass concentration, calcium 0.039453 kg/m3, mass concentration, chlorine 0.030031 kg/m3, mass concentration, hydrogen 0.013365 kg/m3, mass concentration, nitrogen 0.031015 kg/m3, mass concentration, oxygen 0.069824 kg/m3, mass concentration, sodium 0.06456 kg/m3, mass concentration, sulfur 0.015602 kg/m3, water content 2882.2, wet mass 1000 kg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
  note on carbon content, non-fossil: 0.0673 kg TOC/m3 (Tab A.17, ecoinvent v2.2 report 13_I). TOC was considered as Total Carbon.

## Inputs from nature
- Oxygen [natural resource, in air]: 1.78334 kg; lognormal variance with pedigree 0.0046, pedigree (2,3,2,5,2)
  Calculated value based on stoichiometric calculations and literature data. For more information on the calculations refer to the sampling procedure.
- Water, cooling, unspecified natural origin [natural resource, in water]: 0.0110977 m3; lognormal variance with pedigree 0.012, pedigree (2,3,2,5,3)
  Calculated based on literature data published by the industry. This value is a 5-year average of data (2011 - 2015) published by the Gendorf factory (Gendorf, 2016, Umwelterklärung, www.gendorf.de), (Gendorf, 2015, Umwelterklärung, www.gendorf.de), (Gendorf, 2014, Umwelterklärung, www.gendorf.de). The amount of water for cooling extracted per kg of chemical substance produced is calculated using literature data published by the Gendorf factory based in Germany, which produces a wide range of chemical substances. The factory produced 1657400 tonnes of chemical substances in the year 2015 (Gendorf, 2016, Umwelterklärung, www.gendorf.de) and 740000 tonnes of intermediate products. The reported amounts of water extracted as groundwater and surface water (river) are assumed to be used entirely for cooling purposes.
- Water, river [natural resource, in water]: 0.0007285 m3; lognormal variance with pedigree 0.012, pedigree (2,3,2,5,3)
  Calculated based on literature data published by the industry. This value is a 5-year average of data (2011 - 2015) published by the Gendorf factory (Gendorf, 2016, Umwelterklärung, www.gendorf.de), (Gendorf, 2015, Umwelterklärung, www.gendorf.de), (Gendorf, 2014, Umwelterklärung, www.gendorf.de). The amount of groundwater and surface water (river) extracted per kg of chemical substance produced is calculated using literature data published by the Gendorf factory based in Germany, which produces a wide range of chemical substances. The factory produced 1657400 tonnes of chemical substances in the year 2015 (Gendorf, 2016, Umwelterklärung, www.gendorf.de) and 740000 tonnes of intermediate products. The amount of groundwater and surface water (river) extracted in the year 2015 was 19950000 tonnes and 21488100 tonnes respectively (Gendorf, 2016, Umwelterklärung, www.gendorf.de).
- Water, well, in ground [natural resource, in water]: 0.000616134 m3; lognormal variance with pedigree 0.012, pedigree (2,3,2,5,3)
  (same comment as for Water, river)

## Emissions to nature
- Benzene [air, urban air close to ground]: 0.00306759 kg; lognormal variance with pedigree 0.006, pedigree (3,3,2,5,2)
  Calculated losses, based on the boiling point of a chemical, to water or to air. In addition, unreacted chemicals are assumed to go to wastewater treatment, which has a conversion rate in biological treatment of 95% of carbon into carbon dioxide. The remaining 5% are released as emissions to water.
- Carbon dioxide, fossil [air, urban air close to ground]: 1.51421 kg; lognormal variance with pedigree 0.006, pedigree (3,3,2,5,2)
  (same comment as for Benzene)
- Carbon monoxide, fossil [air, urban air close to ground]: 0.00179386 kg; lognormal variance with pedigree 0.006, pedigree (3,3,2,5,2)
  (same comment as for Benzene)
- Oxygen [air, unspecified]: 0.0175882 kg; lognormal variance with pedigree 0.006, pedigree (3,3,2,5,2)
  (same comment as for Benzene)
- Water [air, unspecified]: 0.00110924 m3; lognormal variance with pedigree 0.012, pedigree (2,3,2,5,3)
  Calculated to ensure the water balance. In general, in the case of recirculating cooling systems, 77% of the water input evaporates to air. In case of once-through cooling systems, 4% of the water input evaporates to air. The process water has in the chemical industry an average evaporation rate of 20.5%. In the specific case of the Gendorf factory, the calculated evaporation rate based on the data published is 6.3%. This matches the qualitative information, that the majority of the cooling systems in Gendorf are once-through and that the amount of cooling water used is significantly higher than the amount of process water used (Gendorf, 2016, Umwelterklärung, www.gendorf.de).
- BOD5, Biological Oxygen Demand [water, unspecified]: 0.00550434 kg; lognormal variance with pedigree 0.218, pedigree (4,5,5,5,5)
  Calculated value. The BOD, COD, TOC and BOD5 are calculated based on the amount and type of emissions released to water in the same activity.
- Benzene [water, unspecified]: 0.00453808 kg; lognormal variance with pedigree 0.006, pedigree (3,3,2,5,2)
  (same comment as for Benzene)
- COD, Chemical Oxygen Demand [water, unspecified]: 0.00550434 kg; lognormal variance with pedigree 0.218, pedigree (4,5,5,5,5)
  (same comment as for BOD5, Biological Oxygen Demand)
- DOC, Dissolved Organic Carbon [water, unspecified]: 0.00431158 kg; lognormal variance with pedigree 0.218, pedigree (4,5,5,5,5)
  (same comment as for BOD5, Biological Oxygen Demand)
- Maleic anhydride [water, unspecified]: 0.000188646 kg; lognormal variance with pedigree 0.006, pedigree (3,3,2,5,2)
  (same comment as for Benzene)
- TOC, Total Organic Carbon [water, unspecified]: 0.00431158 kg; lognormal variance with pedigree 0.218, pedigree (4,5,5,5,5)
  (same comment as for BOD5, Biological Oxygen Demand)
- Water [water, unspecified]: 0.011349 m3; lognormal variance with pedigree 0.012, pedigree (2,3,2,5,3)
  Calculated based on literature data published by the industry (Gendorf, 2016, Umwelterklärung, www.gendorf.de). The amount of water released back to the environment consists of the amount of process water treated in the internal WWTP and then released back to the environment and the amount of cooling water released back to the environment.

## Sampling procedure
Literature data and stoichiometric calculation. This inventory is partially based on a generic model of the production of chemicals. The data generated by this model have been improved with compound-specific data when available. The model of the production of chemicals is using specific industry or literature data wherever possible and more generic data on chemical production processes to fill compound-specific data gaps when necessary. The basic principles of the model have been published in literature (Hischier, 2005). The model has been updated and extended with newly available data from the chemical industry. In the model, unreacted fractions are treated in a waste treatment process, and emissions reported are after a waste treatment process that is included in the scope of this dataset. For volatile reactants, a small level of evaporation is assumed. Solvents and catalysts are mostly recycled in closed-loop systems within the scope of the dataset and reported flows are for losses from this system. The source of information for the heat and electricity inputs is based on personal communication with a manufacturing company (reported in 2007), cross validated with literature data from 1989, for the specific technology. Finally, the main source of information for the values for water (process and cooling), nitrogen, and chemical factory is industry data from the GENDORF Chemical Park. The values are a 5-year average of data from 2015 to 2019 published by the GENDORF Chemical Park, which is based in Germany and produced an average of 2462760 tonnes of chemical substances in the years 2015-2019. For more information refer to the comments of the exchanges. References: Hischier, R. (2005) Establishing Life Cycle Inventories of Chemicals Based on Differing Data Availability (9 pp). The International Journal of Life Cycle Assessment, Volume 10, Issue 1, pp 59-67. 10.1065/lca2004.10.181.7 Chemiepark GENDORF, Umwelterklärung 2016, https://www.gendorf.de/Nachbarn/Umweltschutz/Industrie%20und%20Nachhaltigkeit Chemiepark GENDORF, Umwelterklärung 2017, https://www.gendorf.de/Nachbarn/Umweltschutz/Industrie%20und%20Nachhaltigkeit Chemiepark GENDORF, Umwelterklärung 2020, https://www.gendorf.de/Nachbarn/Umweltschutz/Industrie%20und%20Nachhaltigkeit Althaus H.-J., Chudacoff M., Hischier R., Jungbluth N., Osses M. and Primas A. (2007) Life Cycle Inventories of Chemicals. ecoinvent report No. 8, v2.0. EMPA Dübendorf, Swiss Centre for Life Cycle Inventories, Dübendorf, CH. Chauvel, Alain, Gilles Lefebvre, and L. Castex in "Petrochemical processes. Technical and economical characteristics Vol. 2." (1989)

## Extrapolations
This dataset has been copied from an original dataset covering the geography RER. The uncertainty has been adjusted accordingly.
