# ammonium sulfate production

Dataset: EcoSpold 2, unit process
Geography: RoW
Time period: 1998-01-01 to 2023-12-31
Technology level: current
Classification: ISIC rev.4 ecoinvent: 2012:Manufacture of fertilizers and nitrogen compounds
Synonyms: Ammonsulfat
Scenario: Business-as-Usual
System model: Allocation, cut-off by classification
Share of production covered: 70 %
Generated by: Avraam Symeonidis
Database: ecoinvent
isCopyrightProtected: true
accessRestrictedTo: 1

## General comment
This activity represents the production of ammonium sulfate from ammonia and sulfuric acid.
Ammonia and sulfuric acid react given the formula: 2 NH3 + H2SO4 → (NH4)2SO4.
The reaction yield is assumed to be 98.1%.
The vast majority of ammonium sulfate produced worldwide is further used in agriculture as a fertiliser.
Ammonium sulfate is mostly produced as by-product but this dataset describes a primary production of it.
The reaction is highly exothermic and it is assumed that it does not require an external input of heat.
References:
Gendorf (2016) Umwelterklärung 2015, Werk Gendorf Industriepark, www.gendorf.de
For more information on the model please refer to the dedicate ecoinvent report, access it in the Report section of ecoQuery (http://www.ecoinvent.org/login-databases.html)
Zapp, K.-H., Wostbrock, K.-H., Schäfer, M., Sato, K., Seiter, H., Zwick, W., … Leiter, H. (2012). Amino acids. In Ullmann’s Encyclopedia of Industrial Chemistry. In Ullmann’s Encyclopedia of Industrial Chemistry (Vol. 3, pp. 1–58). https://doi.org/10.1002/14356007.a02

## Included activities start
The activity starts when the raw materials enter the process.

## Included activities end
Materials entering the process are included as well as energy uses, infrastructure and emissions. The dataset considers no heat input.

## Geography
The inputs to the process are calculated based on stoichiometry and literature data, they are therefore considered to be valid for the chosen geography.

## Reference product
- ammonium sulfate: 1 kg; By-product classification allocatable product; CPC 34612: Ammonium sulphate; HS2017 310221: Fertilizers, mineral or chemical; nitrogenous, ammonium sulphate; CAS 7783-20-2
  production volume 2.46e9 kg
    Source: IFA production and trade statistics http://www.fertilizer.org/ifa/Home-Page/STATISTICS/Production-and-trade
  property carbon content, fossil 0
    Carbon content, fossil is calculated based on the chemical formula of the substance.
  property hydrogen content 0.0610205
    Hydrogen content (on a dry matter basis) of ammonium sulfate is calculated from the molecular formula of the substance (H8N2O4S).
  property nitrogen content 0.211999
    Nitrogen content (on a dry matter basis) of ammonium sulfate is calculated from the molecular formula of the substance (H8N2O4S).
  property oxygen content 0.48432
    Oxygen content (on a dry matter basis) of ammonium sulfate is calculated from the molecular formula of the substance (H8N2O4S).
  property price 0.38 EUR2005
    Prices are calculated on basis of Import/Export data (tonnes and US$) from UN Trade Statistics Database (http://data.un.org/Browse.aspx?d=ComTrade, accessed 7/7-2010). N, P2O5, or K2O content (http://www.fertilizer.org/ifa/Home-Page/STATISTICS/Conversions-factors)
  property sulfur content 0.242661
    Sulfur content (on a dry matter basis) of ammonium sulfate is calculated from the molecular formula of the substance (H8N2O4S).
  properties: carbon allocation 0 kg, carbon content 0, carbon content, non-fossil 0, dry mass 1 kg, water content 0, water in wet mass 0 kg, wet mass 1 kg

## Inputs from technosphere
- ammonia, anhydrous, liquid: 0.00743976, 0.0144421, 0.160081, 0.00676674, 0.00151369, 0.0556307, 0.00478213, 0.0147408 kg (8 suppliers, which the file names only by identifier); sum of these 0.265397 kg
  Stoichiometric calculation of reactants necessary considering the yield of the reaction.
  properties: dry mass 1 kg, wet mass 1 kg
- chemical factory, organics: 4e-10 unit; lognormal variance with pedigree 0.3846, pedigree (2,4,5,5,4)
  Calculated based on literature data published by the industry. For this activity, no information was readily available concerning infrastructure and land-use. Therefore, the infrastructure is estimated based on data from two chemical factories, the BASF site of Ludwigshafen and the chemical factory in Gendorf (which are both located in Germany), which produce a wide range of chemical substances. Based on this data, the following assumptions are made: the built area amounts to about 4.2 ha, the plant has an average output of 50'000 t/a and a lifespan of fifty years. The estimated infrastructure amount is therefore 4.00 E-10 units per kg of produced chemical.
- electricity, medium voltage: 0.00655016, 0.130661, 0.0439017, 0.00200588, 0.000401475, 8.62057e-5, 0.0134928 kWh (7 suppliers, which the file names only by identifier); sum of these 0.197099 kWh; = 0.33*2.15*0.2778; lognormal variance with pedigree 0.1306, pedigree (2,5,5,5,4)
  Assumed electricity input.
- sulfuric acid: 0.760394 kg
  Stoichiometric calculation of reactants necessary considering the yield of the reaction.
  properties: dry mass 1 kg, wet mass 1 kg

## Inputs from nature
- Water, cooling, unspecified natural origin [natural resource, in water]: 0.014707 m3; lognormal variance with pedigree 0.0852, pedigree (2,4,5,5,4)
  Calculated based on literature data published by the GENDORF Chemical Park. The factory produced an average of 2462760 tonnes of chemical substances (including intermediates) per year in the years 2015-2019. The average amount of cooling water released in the years 2015-2019 was 34408800 t per year. It was assumed that 5% of the cooling water was emitted to air during its use, therefore, to calculate the input of cooling water, the output value reported by GENDORF was scaled up by the factor 1/0.95. This equals 0.014707 m3/kg chemical produced.
- Water, river [natural resource, in water]: 0.00096543 m3; lognormal variance with pedigree 0.0852, pedigree (2,4,5,5,4)
  Calculated based on literature data published by the GENDORF Chemical Park. The factory produced an average of 2462760 tonnes of chemical substances (including intermediates) per year in the years 2015-2019. The average consumption of river water in the years 2015-2019 was 22000820 t per year. However, since the cooling water is modelled as an input, the amount of river water was adjusted to avoid double counting. 55% of the input amount of cooling water was deducted from the amount of river water, as that is the share of river water versus well water. This equals 0.00096543 m3/kg chemical produced.
- Water, well, in ground [natural resource, in water]: 0.00081652 m3; lognormal variance with pedigree 0.0852, pedigree (2,4,5,5,4)
  Calculated based on literature data published by the GENDORF Chemical Park. The factory produced an average of 2462760 tonnes of chemical substances (including intermediates) per year in the years 2015-2019. The average consumption of well water in the years 2015-2019 was 18607480 t per year. However, since the cooling water is modelled as an input, the amount of well water was adjusted to avoid double counting. 45% of the input amount of cooling water was deducted from the amount of well water, as that is the share of well water versus river water. This equals 0.00081652 m3/kg chemical produced.

## Emissions to nature
- Ammonia [air, unspecified]: 0.00132699 kg
  Estimated from the unreacted reactants.
- NMVOC, non-methane volatile organic compounds [air, urban air close to ground]: 0.00052 kg; lognormal variance with pedigree 0.1112, pedigree (2,3,5,5,3)
  Emmissions estimated
- Water [air, unspecified]: 0.00147 m3; lognormal variance with pedigree 0.1246, pedigree (2,4,5,5,4)
  Calculated based on literature data published by the GENDORF Chemical Park. The factory produced an average of 2462760 tonnes of chemical substances (including intermediates) per year in the years 2015-2019. To determine the emissions of water to air, the difference of all water inputs (from river, well, tap water and cooling) and outputs (wastewater, emissions to water) was calculated. The average ouput of water to air in the years 2015-2019 was 3620444 m3 per year. This equals 0.00147 m3/kg chemical produced. For more information on the other water exchanges please consult the respective exchange comment.
- Ammonium [water, unspecified]: 0.00504857 kg
  Estimated from the unreacted reactants.
- Sulfuric acid [water, surface water]: 0.0137251 kg
  Estimated from the unreacted reactants.
- Water [water, unspecified]: 0.01504 m3; lognormal variance with pedigree 0.1246, pedigree (2,4,5,5,4)
  Calculated based on literature data published by the GENDORF Chemical Park. The factory produced an average of 2462760 tonnes of chemical substances (including intermediates) per year in the years 2015-2019. The amount of water released back to the environment consists of the sum of the amount of process water treated in the internal WWTP that is then released back to the environment and the amount of cooling water released back to the environment. The average ouput of the internal WWTP in the years 2015-2019 was 2628800 m3 and that of cooling water released back to the environment was 34408800 m3. This gives a yearly average of 37037600 m3 emissions of water to water. This equals 0.01504 m3/kg chemical produced.

## Extrapolations
Data have been compiled using literature and flows have been calculated using stoichiometry. Data are considered valid for the geography of Europe.
