# sand quarry operation, extraction from river bed

Dataset: EcoSpold 2, unit process
Geography: RoW
Time period: 2015-01-01 to 2023-12-31
Technology level: current
Classification: ISIC rev.4 ecoinvent: 0810:Quarrying of stone, sand and clay
Synonyms: aggregate; natural sand; river bed sand; sand
Scenario: Business-as-Usual
System model: Allocation, cut-off by classification
Generated by: Gustavo Moraga
Published in: Silva, F. B. 2017
Database: ecoinvent
isCopyrightProtected: true
accessRestrictedTo: 1

## General comment
This dataset describes mining of natural sand from riverbed deposits and its processing. Pumps dredge the slurry, which consists of sand, water, clay, silt, and gravel, from the river bed. The sand is separated from the slurry and transported by a vessel to the loading ports, where the sand is washed to clean fines and transported to the storage piles and loaded in trucks for delivery (does not the delivery itself). The sand’s coproducts (clay, silt, and gravel) return to the river during the process not being recovered for economic purposes, furthermore they don’t receive any allocation. Sand is not sorted by grain size in this dataset.
The dataset includes the sand extraction and processing, as well as equipment maintenance. Machinery is taken into account within the dataset "diesel, burned in building machine", as all machinery runs on diesel. Administration buildings and the quarry’s end of life are not taken into account. Data were collected from literature and some additional data were measured in one quarry located in the state of Rio Grande do Sul, Brazil, with current technology.
The representativeness of the dataset on a national scale is low ( >1%).

## Included activities start
From the extraction of sand from the river bed by dredging.

## Included activities end
The activities end with the sand in storage piles at the loading port. Includes the dredging of the slurry (a mix of sand, water, clay, silt, and gravel). The sand is separated from the slurry and transported by a vessel to the loading ports, where the sand is washed to clean fines and transported to the storage piles and loaded in trucks for delivery (does not include the delivery itself). The dataset also includes the land use for sand processing (at river bank). Machinery is considered within the dataset "diesel burned in building machine". Occupation of the river is not considered since mining occurs in a barge. Recultivation of closed mines is not taken into account due to lack of data. Administration buildings not included. No dust included because it is a wet process. Sand sorting by grain size is not included.

## Geography
This dataset represents production of sand representative for the whole world. Data were collected from literature and some data come from primary data collection in Brazil. Uncertainty has been adjusted accordingly.
Some values were taken from the dataset sand quarry operation, extraction from open pit mine/BR (accessed 20170828)

## Technology
Typical technology for sand dredging in Brazil.
The technology involves two steps: extraction and processing. Sand is the only product from this process, even though gravel can be extracted, it is not recovered. Suction Hopper Dredger (autonomous vessels that perform all stages of sand mining, i.e., extraction, loading, transport, and unloading) is considered. Extraction and loading stages are executed by centrifugal pumps powered by diesel engines. The pumps dredge the sand from the riverbed, along with water, clay, silt, and gravel, are extracted, forming the slurry. This fluid is pumped through the pipeline up to the vessel top where it is poured into steel sieves. Coarse materials (gravel, leaves, and sticks) are retained by the sieves and are returned to the river. The rest of the slurry (sand, water, and mud) falls into big chambers inside the vessel. Sand decants faster from the slurry, due its density and size, and deposits at the chamber’s bottom. Most of the water overflows from the vessel to the river, carrying a great amount of the mud (silt and clay). Auxiliary suction pumps drain water surplus of the sand to lower the cargo weight.
After completing the extraction and loading stages, the same vessel transports the dredged sand until loading ports. The pulp is then pumped to the loading port by pipelines to semi-closed chambers at the loading port. Sand deposits at the bottom of the port’s chambers, water returns to the river carrying part of the fines. Some companies may sort the sand by grain size in this stage. In the end, Sand is washed to clean the fines and is transported by heavy equipment to storage piles.
Dredged sand from alluvial deposits can generate several local environmental issues. Problems related with changes in the natural sedimentation process, erosion of margins, changes in the stream bed conditions, changes in the suspended sediments of river water and even problems related with local and regional sand availability. “Continued and indiscriminate sand mining not only changes the physical characteristics of the river basin environments, but also disturbs its closely linked flora, fauna, and human life” (PADMALAL; MAYA, 2014)
None of these problems were assessed in this dataset due the lack of data, but they should be taken in consideration.
For further information, please refer to Padmalal, D. & Maya, K., 2014. Sand Mining, Dordrecht: Springer Netherlands. Available at: http://link.springer.com/10.1007/978-94-017-9144-1.
Image source: Bernardo Jardim Ribeiro https://goo.gl/EcJiNy

## Time period
The time period is set to the year 2015 as the data were collected in the year 2015

## Parameters
- diesel consumption for port operations: 0.000566 l; name diesel_port; lognormal variance with pedigree 0.0032, pedigree (2,4,1,1,1)
  Measured value, nonverified measurement from one company. Diesel used for port operations with excavators, liter per kg of produced sand.
  Uncertainty: Default basic uncertainty
- diesel consumption for pump operation: 0.00025 l; name diesel_pump; lognormal variance with pedigree 0.0106, pedigree (3,5,1,1,1)
  Calculated Value for diesel used in the mining process with pumps for dredging. Pump volume is based on the annual production of sand mined from one river in Rio Grande do Sul state. Theoretical data for pump’s flows and consumptions obtained from one pump industry in Brazil. Flows rates can vary from 700 up to 2100 m3/h (head height of 10 m). Diesel consumption for the pumps is in average 16,7 liter/h. (Itubombas, Comercial especification for the pumps http://itubombas.com.br/arquivos/especificacoes-tecnicas.pdf)
  Uncertainty: Default basic uncertainty
- diesel consumption for transport operation: 0.000572262 l; name diesel_transport; lognormal variance with pedigree 0.128, pedigree (1,5,1,1,1)
  Calculated value, liters of diesel used in the internal transport within the industrial process. Sand is mined with “Suction Hopper dredgers”, that is, barges that transport the sand from the river to the port, diesel consumption was estimated from ecoinvent process "transport, freight, inland waterways, barge tanker”. The transport considers 1kg for 55km of distance (measured distance mine-port of one industry).
  Uncertainty: Default basic uncertainty

## Reference product
- sand: 1 kg; By-product classification allocatable product; CPC 15310: Natural sands; HS2017 250590: Sands; natural, (other than silica and quartz sands), whether or not coloured, (other than metal-bearing sa[...]
  Sand used as aggregate for construction, usually applied in concrete production, mortar production, pavement layers, among others. According to the Brazilian standard ABNT NBR 7211, fine aggregates (which include sand) have a particle size of less than 4,75mm. Sand is not sorted by grain size in this dataset.
  production volume 5.06242e12 kg; name sand_PV; = 50*0.35*0.3*1E12
    Estimated value. Information regarding production volume and mining technology for sand and aggregates is very scarce (Peduzzia, et al. 2014). It is estimated that around 50 billion tonnes of sand and gravel are mined each year (WWF, 2018).
    According to the WWF (2018), the demand of sand and aggregated in general has and is increasing, the demand comes in particular from developing countries, for example, “China consumed more sand between 2011-2013 than the US did in the whole of the 20th Century.”. This has contributed to the, today’s significant, illegal sand market. Most of illegal sand comes from rivers and coastal areas (WWF 2018; The Third Pole, 2017). Lai et al. (2014) report the estimated amount of sand mined from the biggest sand mine in the world, the Poyang Lake, China. The estimate is of 448 billion kg of sand (De Leeuw 2010). As a frame of reference, the country of Brazil as whole mines 266 billion kg of sand per year.
    The demand of sand has also increased in the US in the past 15 years as the it was found that sand could be used in fracking in order to increase yield (Edwards, 2015). Sand is also used by cities to enlarge their territory “517 million metric tons of sand in the past 20 years” (Edwards, 2015) citing UNEP (2014).
    Of the estimated 50 billion tonnes of sand and gravel, it is assumed that 35% is sand, following ecoinvent v2 report 7. This results in 17.5 billion tonnes. Double check with Tweedie (2018), which reports a world consumption of sand between 15 and 20 billion tonnes, and Peduzzia, P. et al. (2014). The production of gravel is therefore set to 50*0.65 billion tonnes. Of which 85% is considered to be gravel, round and 15% is considered to be crushed (see general comment of the activity “gravel production, gravel, CH” in date 12th October 2018).
    No information was found regarding the technologies used for sand mining. The WWF (2018) refers to Europe as the region where no sand is mined from rivers. On the other hand we know that 70% of sand mined in Brazil comes from rivers (see the dataset “sand quarry operation, extraction from river bed, BR, in date 12th October 2012). Some report quarry as the most prominent mining technology (n.d. 2017), others highlight how the growing illegal market source sand from rivers and coastal areas. ecoinvent does not report data regarding illegal mining. It is therefore estimated that 70% of sand is produced via quarry.
    References:
    UNEP, 2014. Sand, Rarer Than One Thinks. In: Bruce Edwards, 2015. The Insatiable Demand for Sand. FINANCE & DEVELOPMENT, December 2015, Vol. 52, No. 4. Retrieved from: https://www.imf.org/external/pubs/ft/fandd/2015/12/edwards.htm, accessed 12th October 2018
    Edwards, B. 2015. The Insatiable Demand for Sand. FINANCE & DEVELOPMENT, December 2015, Vol. 52, No. 4. Retrieved from: https://www.imf.org/external/pubs/ft/fandd/2015/12/edwards.htm, accessed 12th October 2018
    De Leeuw, et al. 2010. Strategic assessment of the magnitude and impacts of sand mining in Poyang Lake, China. Reg. Environ. Change 10, 95-102. In: Lai et al. 2014. Sand mining and increasing Poyang Lake’s discharge ability: A reassessment of causes for lake decline in China. Journal of Hydrology. Retrieved from: <https://www.researchgate.net/publication/277575909_Sand_mining_and_increasing_Poyang_Lake's_discharge_ability_A_reassessment_of_causes_for_lake_decline_in_China>, accessed 12th October 2018
    Lai et al. 2014. Sand mining and increasing Poyang Lake’s discharge ability: A reassessment of causes for lake decline in China. Journal of Hydrology. Retrieved from: <https://www.researchgate.net/publication/277575909_Sand_mining_and_increasing_Poyang_Lake's_discharge_ability_A_reassessment_of_causes_for_lake_decline_in_China>, accessed 12th October 2018
    n.d. 2017. What Is Sand Mining? Environmental Technology. Retrieved from: <https://www.envirotech-online.com/news/water-wastewater/9/breaking-news/what-is-sand-mining/42070>, accessed 12th October 2018.
    Peduzzia, P. et al. 2014. Sand, rarer than one thinks. UNEP. Retrieved from: <https://na.unep.net/geas/archive/pdfs/GEAS_Mar2014_Sand_Mining.pdf>, accessed 12th October 2018
    The Third Pole, 2017. Sandmining is destroying Asia’s rivers. Retrieved from: <https://www.thethirdpole.net/en/2017/05/05/sandmining-is-destroying-asias-rivers/>, accessed 12th October 2018
    Tweedie, N. 2018. Is the world running out of sand? The truth behind stolen beaches and dredged islands. The Guardian. Retrieved from: <https://www.theguardian.com/global/2018/jul/01/riddle-of-the-sands-the-truth-behind-stolen-beaches-and-dredged-islands>, accessed 12th October 2018
    Vince Beiser, 2017. Sand mining: the global environmental crisis you’ve probably never heard of. The Guardian. Retrieved from: <https://www.theguardian.com/cities/2017/feb/27/sand-mining-global-environmental-crisis-never-heard>, accessed 12th October 2018
    WWF, 2018. Uncovering sand mining’s impacts on the world’s rivers. Retrieved from: <https://wwf.panda.org/our_work/water/?333451/Uncovering-sand-minings-impacts-on-the-worlds-rivers>, accessed 12th October 2018
  property price 0.00651133 EUR2005
    Price, average unit value, dollars per metric ton in 2022 of construction sand and gravel of 11 USD/metric ton. Same price for the products "sand" and "gravel, round", since they are quarried together. The price is the annual average free-on-board
    plant prices, usually at the first point of sale or captive use, as reported by construction-sand-and-gravel-producing companies. This value does not include transportation from the plant or yard to the consumer. it does, however, include all costs of mining, processing, in-plant transportation, overhead, and profit. Value retrieved from USGS, Mineral Commodity Summaries 2023, accessed on 20230918: https://pubs.usgs.gov/periodicals/mcs2023/mcs2023-sand-gravel.pdf from https://www.usgs.gov/centers/national-minerals-information-center/construction-sand-and-gravel-statistics-and
    The price was converted to EUR based on the annual exchange rates published by the European Central Bank (https://sdw.ecb.europa.eu/quickview.do?SERIES_KEY=120.EXR.A.USD.EUR.SP00.A, last accessed on 2023-06-01) and adjusted for inflation relative to 2005 using the producer price index (PPI) of the euro area, published by eurostat (https://ec.europa.eu/eurostat/databrowser/view/STS_INPP_A__custom_6416181/default/table?lang=en, last accessed on 2023-06-01).
  properties: carbon allocation 0 kg, carbon content 0, carbon content, fossil 0, carbon content, non-fossil 0, dry mass 0.95 kg, water content 0.0526316, water in wet mass 0.05 kg, wet mass 1 kg

## Inputs from technosphere
- building, hall: 1.13e-7 m2; lognormal variance with pedigree 0.322, pedigree (3,4,4,5,3)
  Approximation,administrative infrastructure is considered to be equal to the dataset sand quarry operation, extraction from open pit mine/BR (accessed 20170828).
  Uncertainty: Default basic uncertainty.
- diesel, burned in building machine: 0.049911 MJ; source Duarte, J. 2017; lognormal variance with pedigree 0.0206, pedigree (3,5,4,5,1)
  Calculated Value, see parameters, based on annual production of river sand from Rio Grande do Sul state. “diesel, burned in building machine” is a proxy for Diesel consumption with pumps for dredging, internal transport from the river mine area to the port, and port processing operations.
  Uncertainty: Default basic uncertainty
  property density 0.84 kg/l; name diesel_density
  property heating value, net 1 MJ; name net_cal_value
  note on heating value, net: Literature value, net heating value, Table 5.1 (Weidema et al., 2013) per liter of diesel (MJ / liter)
- electricity, medium voltage: 9.54977e-8, 1.21776e-7, 4.26089e-9, 1.0831e-8, 9.92896e-8, 9.44344e-7, 1.23747e-6, 1.31049e-6, 5.03397e-8, 6.67497e-7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 kWh (69 suppliers, which the file names only by identifier); sum of these 0.00013 kWh; lognormal variance with pedigree 0.0132, pedigree (2,4,4,5,1)
  Measured Value, electricity for administrative purposes, based on nonverified measurements of one industry.
  Uncertainty: Default basic uncertainty
- scrap steel: -1.21741e-5, -5.8185e-6, -7.37185e-9 kg (3 suppliers, which the file names only by identifier); sum of these -1.8e-5 kg; lognormal variance with pedigree 0.0206, pedigree (4,4,1,5,3)
  Estimation. Same amount as the input.
  Uncertainty: Default basic uncertainty
  production volume; = sand_PV * steel
    Estimation. Same amount as the input.
  properties: carbon content, fossil 0.005, dry mass 1 kg, wet mass 1 kg
- steel, low-alloyed, hot rolled: 1.8e-5 kg; name steel; lognormal variance with pedigree 0.0286, pedigree (4,4,4,5,3)
  Approximation, maintenance of equipment is considered to be equal to the dataset sand quarry operation, extraction from open pit mine/BR (accessed 20170828).
  Uncertainty: Default basic uncertainty
  property carbon content, fossil 0.005; name cc_steel
  properties: dry mass 1 kg, wet mass 1 kg
  note on carbon content, fossil: Low alloyed steel composition given in Tab. 3.2 ecoinvent v2.2 report 10_partII. Steel assumed to have a C content of 0.5%
- synthetic rubber: 3.44e-6 kg; name rubber; lognormal variance with pedigree 0.0286, pedigree (4,4,4,5,3)
  (same comment as for steel, low-alloyed, hot rolled)
  property carbon content, fossil 0.871949; name cc_rubber
  properties: dry mass 1 kg, heating value, net 26.42 MJ, wet mass 1 kg
  note on carbon content, fossil: EPDM (Ethylene-propene-diene terpolymer) rubber is a terpolymer of ethylene, propene, and a diene with the residual unsaturated portion of the diene in the side chain (ecoinvent v2.2 report 7-part XX & Ullmann). Chemical formula (deduced from Evidences of Solvent-Induced Miscibility in Polychloroprene-co-Ethylene-Propene Diene Terpolymer Blends, Dubey et al., Journal of Applied Polymer Science, 2009, 111:1884–1891): C20H35
- waste rubber, unspecified: -5.49036e-8, -2.07724e-6, -1.30786e-6 kg (3 suppliers, which the file names only by identifier); sum of these -3.44e-6 kg; lognormal variance with pedigree 0.0206, pedigree (4,4,1,5,3)
  Estimation. Same amount as the input.
  Uncertainty: Default basic uncertainty
  production volume; = sand_PV * rubber
    Estimation. Same amount as the input.
  properties: carbon content, fossil 0.871949, dry mass 1 kg, heating value, net 27.19 MJ, wet mass 1 kg
  note on heating value, net: Value taken from the general comment of the treatment dataset.

## Inputs from nature
- Occupation, mineral extraction site [natural resource, land]: 0.015476 m2*year; lognormal variance with pedigree 0.0526, pedigree (2,4,4,5,1)
  Measured Value, occupation x service life estimation (100y) of the loading port. No occupation of the river considered since mining occurs in a barge.
  Uncertainty: Default basic uncertainty
- Sand, unspecified [natural resource, in ground]: 0.95 kg; source Calliari, L. 2000, p. 26; lognormal variance with pedigree 0.0206, pedigree (3,5,4,5,1)
  Estimated value. No losses considered in the process. For 1 kg of wet sand for construction with 5% of humidity, 0.95 kg of sand comes from the environment.
  Uncertainty: Default basic uncertainty
- Transformation, from forest, unspecified [natural resource, land]: 7.738e-5 m2; lognormal variance with pedigree 0.1326, pedigree (2,4,4,5,1)
  Measured Value, loading ports installation occur on the margin of rivers with special permissions. According to local environmental law, constructions on the riverside should protect at least 30 m of distance for riparian forest recovery. (Brazilian Law Nº 12.651, from 2012), in this case, the transformation, from the forest, considered as 50% of the original area. Transformation of the river is not considered.
  Uncertainty: Default basic uncertainty
- Transformation, from wetland, inland (non-use) [natural resource, land]: 7.738e-5 m2; lognormal variance with pedigree 0.1326, pedigree (2,4,4,5,1)
  Measured Value, loading ports installation occur on the margin of rivers with special permissions. According to local environmental law, constructions on the riverside should protect at least 30 m of distance for riparian forest recovery. (Brazilian Law Nº 12.651, from 2012), in this case, the transformation, from the wetland, considered as 50% of the original area. Transformation of the river is not considered.
  Uncertainty: Default basic uncertainty
- Transformation, to mineral extraction site [natural resource, land]: 0.00015476 m2; name land; lognormal variance with pedigree 0.1326, pedigree (2,4,4,5,1)
  Measured Value, occupation and production estimate of one company with 5 different loading ports, based on aerial images. The total area of the ports is 2.69E+5 m2, while the production of sand is1.03E+09 kg.
  Transformation of the river is not considered.
- Water, river [natural resource, in water]: 0.0002 m3; lognormal variance with pedigree 0.0132, pedigree (2,4,4,5,1)
  Estimation. Water in the sand before evaporation.
  Uncertainty: Default basic uncertainty
- Water, well, in ground [natural resource, in water]: 0.008 m3; name sand_wash; lognormal variance with pedigree 0.0132, pedigree (2,4,4,5,1)
  Measured Value, water used to wash the sand in the port. Value based on nonverified measurement of one industry. A system with recirculation uses 80 liters of water per ton of sand. The system recovers 90% of the water, only 8 L are spent.
  Uncertainty: Default basic uncertainty

## Emissions to nature
- Water [air, unspecified]: 0.00015 m3; lognormal variance with pedigree 0.0132, pedigree (2,4,4,5,1)
  Estimation. Water that evaporates in the process.
  Uncertainty: Default basic uncertainty
- Water [water, unspecified]: 0.008 m3; lognormal variance with pedigree 0.0132, pedigree (2,4,4,5,1)
  Measured Value, water used to wash the sand in the port. Value based on nonverified measurement of one industry. A system with recirculation uses 80 liters of water per ton of sand. The system recovers 90% of the water, only 8 L are spent. The water discharged in the river is considered not polluted.
  Uncertainty: Default basic uncertainty

## Extrapolations
Extrapolated from Brazilian data, uncertainty adjusted accordingly,
