# acetaldehyde production, ethylene oxidation

Dataset: EcoSpold 2, unit process
Geography: RER
Time period: 1989-01-01 to 2023-12-31
Technology level: current
Classification: ISIC rev.4 ecoinvent: 2011:Manufacture of basic chemicals
Synonyms: Ethanal; Aldehyde; Acetaldehyde; Ethyl aldehyde; 75-07-0; Acetic aldehyde
Scenario: Business-as-Usual
System model: Allocation, cut-off by classification
Generated by: Iasonas Ioannou
Published in: Althaus H.-J. 2007
Database: ecoinvent
isCopyrightProtected: true
accessRestrictedTo: 1

## General comment
This dataset represents the production of 1 kg of acetaldehyde by means of direct oxidation of ethylene (Wacker process), which is the most widely used method for producing acetaldehyde.
Acetaldehyde (C2H4O, CAS N° 75-07-0) is a colorless, and mobile, liquid with a pungent, suffocating odor that is slightly fruity when diluted. Moreover, it is completely miscible with water and most organic solvents.
Acetaldehyde is used in the manufacturing of pyrine and pyridine bases, peracetic acid, 1,3-butylene glycol, and others. Acetaldehyde could also oxidized with oxygen (or air) to yield acetic acid, and acetic anhydride or reduced to ethanol. Furthermore, acetaldehyde could activate the oxidation of p-xylene to terephthalic acid and of ethanol to acetic acid.
In this dataset, the raw material inputs, and process-specific material exchanges, are modelled with a generic stoichiometry-based tool, using literature or estimated yields. The emissions are modelled with a default value, which is estimated based on losses, unreacted chemicals, among others. At the same time, the energy consumption is based on data from literature sources. Finally, the auxiliary (i.e., cooling water and infrastructure) exchanges are modelled with a default value based on industry data from literature sources. For more information on the calculations refer to the sampling procedure.
References:
Eckert, M., Fleischmann, G., Jira, R., Bolt, H. M. and Golka, K. 2006. Acetaldehyde. Ullmann's Encyclopedia of Industrial Chemistry.
Althaus H.-J., Chudacoff M., Hischier R., Jungbluth N., Osses M. and Primas A. (2007) Life Cycle Inventories of Chemicals. Final report ecoinvent data v2.0 No. 8. Swiss Centre for Life Cycle Inventories, Dübendorf, CH.
Chauvel, Alain, Gilles Lefebvre, and L. Castex in "Petrochemical processes. Technical and economical characteristics Vol. 2." (1986)
Kirk, Raymond E., Donald F. Othmer, and Charles A. Mann. "Encyclopedia of Chemical Technology." 2004.

## Included activities start
The activity starts when the raw materials enter the process.

## Included activities end
The activity ends with acetaldehyde being ready for further transformation or transportation at the production site gate. Materials entering the process are included as well as energy uses, infrastructure and emissions.

## Geography
The inventory is modelled for Europe. The main material inputs and outputs of this activity are generated with on a generic stoichiometry-based model, using literature or estimated yields. Furthermore, the source of information for the heat and electricity inputs is literature data for the specific technology. Finally, the main source of information for the values for water (process and cooling), nitrogen, chemical factory is industry data from the GENDORF Chemical Park, which is based in Germany and produced an average of 2462760 tonnes of chemical substances in the years 2015-2019. For more information on the calculations refer to the sampling procedure.
The dataset could also be considered as not geography-specific, and thus, valid for a broader geographical coverage.
References:
Hischier, R. (2005) Establishing Life Cycle Inventories of Chemicals Based on Differing Data Availability (9 pp). The International Journal of Life Cycle Assessment, Volume 10, Issue 1, pp 59-67. 10.1065/lca2004.10.181.7
Chemiepark GENDORF, Umwelterklärung 2016, https://www.gendorf.de/Nachbarn/Umweltschutz/Industrie%20und%20Nachhaltigkeit
Chemiepark GENDORF, Umwelterklärung 2017, https://www.gendorf.de/Nachbarn/Umweltschutz/Industrie%20und%20Nachhaltigkeit
Chemiepark GENDORF, Umwelterklärung 2020, https://www.gendorf.de/Nachbarn/Umweltschutz/Industrie%20und%20Nachhaltigkeit
Chauvel, Alain, Gilles Lefebvre, and L. Castex in "Petrochemical processes. Technical and economical characteristics Vol. 2." (1989)

## Technology
Ethylene is the most important starting material for the production of acetaldehyde and most of the present capacity works by its direct oxidation (Wacker process). One- and two-stage versions of the process are on stream. In the one-stage method, an ethylene-oxygen mixture reacts with the catalyst solution. In the two-stage process the reaction is carried out with ethylene and then with oxygen in two separate reactors. The catalyst solution is alternately reduced and oxidized. At the same time the degree of oxidation of the catalyst changes alternately. Air is used instead of pure oxygen for the catalyst oxidation.
Reaction:
C2H4 + 0.5O2 --> C2H4O
This dataset covers the direct oxidation (Wacker process) of the acetaldehyde production. Namely, ethylene and oxygen, along with a recycle stream, are fed to a reactor filled with the catalyst solution, under slight pressure. The reactor effluent is scrubbed with water, and the top gaseous mixture is the recycled into the reactor. Finally, the scrubbed mixture is fed into a distillation column.
The direct oxidation of ethylene is catalysed with an aqueous solution of PdCl2 and CuCl2. Notably, only a small amount of PdCl2 is used in this process since the metallic palladium is reoxidized by CuCl2 that, in turn, is regenerated with oxygen.
In this dataset, a yield of 95% was assumed, while the catalytic system is not covered.
References:
Eckert, M., Fleischmann, G., Jira, R., Bolt, H. M. and Golka, K. 2006. Acetaldehyde. Ullmann's Encyclopedia of Industrial Chemistry.
Althaus H.-J., Chudacoff M., Hischier R., Jungbluth N., Osses M. and Primas A. (2007) Life Cycle Inventories of Chemicals. Final report ecoinvent data v2.0 No. 8. Swiss Centre for Life Cycle Inventories, Dübendorf, CH.
Kirk, Raymond E., Donald F. Othmer, and Charles A. Mann. "Encyclopedia of Chemical Technology." 2004.

## Time period
The time period spans from the earliest year from which at least one of the input values was obtained until 2022, but overall form the most realistic picture of the production. Besides, the activity is partly generated, in terms of material inputs and outputs, based on a generic stoichiometry-based model, using literature or estimated yields, which does not expect to change over time.
The source of information for the heat and electricity inputs is literature data (from 1989) for the specific technology. Finally, the main source of information for the values for water (process and cooling), nitrogen, chemical factory is industry data from the GENDORF Chemical Park. The values are a 5-year average of data from 2015 to 2019 published by the GENDORF Chemical Park, which is based in Germany and produced an average of 2462760 tonnes of chemical substances in the years 2015-2019. The end time period is therefore set based on the years from Gendorf reference.
For more information on the calculations refer to the sampling procedure and in the comments of the exchanges.
References:
Hischier, R. (2005) Establishing Life Cycle Inventories of Chemicals Based on Differing Data Availability (9 pp). The International Journal of Life Cycle Assessment, Volume 10, Issue 1, pp 59-67. 10.1065/lca2004.10.181.7
Chemiepark GENDORF, Umwelterklärung 2016, https://www.gendorf.de/Nachbarn/Umweltschutz/Industrie%20und%20Nachhaltigkeit
Chemiepark GENDORF, Umwelterklärung 2017, https://www.gendorf.de/Nachbarn/Umweltschutz/Industrie%20und%20Nachhaltigkeit
Chemiepark GENDORF, Umwelterklärung 2020, https://www.gendorf.de/Nachbarn/Umweltschutz/Industrie%20und%20Nachhaltigkeit
Chauvel, Alain, Gilles Lefebvre, and L. Castex in "Petrochemical processes. Technical and economical characteristics Vol. 2." (1989)

## Reference product
- acetaldehyde: 1 kg; name RP; By-product classification allocatable product; CPC 34170: Ethers, alcohol peroxides, ether peroxides, epoxides, acetals and hemiacetals, and their halogenated, sulphona[…]; HS2017 291212: Aldehydes; acyclic, without other oxygen function, ethanal (acetaldehyde); CAS 75-07-0
  Acetaldehyde is a colorless liquid with a pungent, suffocating odor that is slightly fruity when diluted. Acetaldehyde is used in the manufacturing of acetic acid, acetic anhydride, acetate esters, pyrine and pyridine bases, peracetic acid, 1,3-butylene glycol, and others.
  production volume 1.33284e8 kg; name RP_PV
    Estimated value. The European production volume is extrapolated from the global production volume based on reports from Cefic (European Chemical Industry Council), and the American Chemistry Council. According to Cefic (2016) the Global sales of chemicals in the year 2015 was 3 534 billion euros. The reported share of sales per regions are: EU28 14.7%; Other Europe (Switzerland, Norway, Turkey, Russia and Ukraine) 2.7%; NAFTA (US, Canada and Mexico) 16.5%; Latin America 3.8%; China 39.9%; Japan 3.9%; Republic of Korea 3.2%; India 2.2%; Rest of Asia 11.9%; Rest of the World 1.3%. Cefic also reports the US total sales, 518.7 billion euros of the global 3 534 billion euros (14.7%). The same share is reported from the American Chemistry Council (2016), according to this source the USA sales account for 15% of global sales for the year 2016. According to 'Ullmann's encyclopedia of industrial chemistry' the global world consumption is 766 000 000 kg for the year 2003. Since no data were found for the European production this value was scaled accordingly. Reference(s): Cefic 2016. Facts and figures 2016 of the European chemical industry. Accessible at: http://www.cefic.org/Facts-and-Figures/Chemicals-Industry-Profile/ American Chemistry Council 2016. Outlook: U.S. Chemical Industry Continues to Outpace Industrial Output; Accounts for More Than One-Half of Construction Spending by Manufacturing Sector. Accessible at: https://www.americanchemistry.com/Media/PressReleasesTranscripts/ACC-news-releases/US-Chemical-Industry-Continues-to-Outpace-Industrial-Output.html Eckert, M., Fleischmann, G., Jira, R., Bolt, H. M. and Golka, K. 2006. Acetaldehyde. Ullmann's Encyclopedia of Industrial Chemistry.
  property heating value, net 27.53 MJ
    LHV is calculated based on the elemental composition of the substance. Based on the CAS number of the substance (000075-07-0), the chemical formula of the substance is found to be: C2H4O, (PubChem 2020). Reference: Kim, S., Chen, J., Cheng, T., Gindulyte, A., He, J., He, S., Li, Q., Shoemaker, B. A., Thiessen, P. A., Yu, B., Zaslavsky, L., Zhang, J., & Bolton, E. E. (2019). PubChem 2019 update: improved access to chemical data. Nucleic acids research, 47(D1), D1102–D1109. https://doi.org/10.1093/nar/gky1033
  properties: carbon allocation 0.545296 kg, carbon content 0.545296, carbon content, fossil 0.545296, carbon content, non-fossil 0, dry mass 1 kg, price 0.81 EUR2005, water content 0, water in wet mass 0 kg, wet mass 1 kg

## Inputs from technosphere
- chemical factory, organics: 4e-10 unit; lognormal variance with pedigree 0.309425, pedigree (2,3,2,2,3)
  Calculated based on literature data published by the industry. For this activity, no information was readily available concerning infrastructure and land-use. Therefore, the infrastructure is estimated based on data from two chemical factories, the BASF site of Ludwigshafen and the chemical factory in Gendorf (which are both located in Germany), which produce a wide range of chemical substances. Based on this data, the following assumptions are made: the built area amounts to about 4.2 ha, the plant has an average output of 50'000 t/a and a lifespan of fifty years. The estimated infrastructure amount is therefore 4.00 E-10 units per kg of produced chemical. References: Althaus H.-J., Chudacoff M., Hischier R., Jungbluth N., Osses M. and Primas A. (2007) Life Cycle Inventories of Chemicals. ecoinvent report No. 8, v2.0. EMPA Dübendorf, Swiss Centre for Life Cycle Inventories, Dübendorf, CH. Gendorf (2000) Umwelterklärung 2000, Werk Gendorf. Werk Gendorf, Burgkirchen.
- electricity, medium voltage: 0.1 kWh; lognormal variance with pedigree 0.0026, pedigree (2,3,2,1,2)
  Value reported by Chauvel, Alain, Gilles Lefebvre, and L. Castex in "Petrochemical processes. Technical and economical characteristics Vol. 2." (1989).
- ethylene: 0.67707 kg; lognormal variance with pedigree 0.0026, pedigree (2,3,2,1,2)
  Calculated value based on stoichiometric calculations and literature data. For more information on the calculations refer to the sampling procedure.
  properties: carbon content, fossil 0.857143, dry mass 1 kg, heating value, net 43.22 MJ, wet mass 1 kg
- heat, from steam, in chemical industry: 3.3 MJ; lognormal variance with pedigree 0.0026, pedigree (2,3,2,1,2)
  (same comment as for electricity, medium voltage)
  properties: heating value, net 1 MJ
- hydrochloric acid, without water, in 30% solution state: 0.01 kg; lognormal variance with pedigree 0.0026, pedigree (2,3,2,1,2)
  Make-up HCl in the reactor. Value reported by Chauvel, Alain, Gilles Lefebvre, and L. Castex in "Petrochemical processes. Technical and economical characteristics Vol. 2." (1989).
  properties: dry mass 1 kg, heating value, net 3.32 MJ, wet mass 1 kg
- municipal solid waste: -0.0121 kg; name BP_municipal_solid_waste; lognormal variance with pedigree 0.0321, pedigree (3,5,3,3,1)
  Estimation. von Däniken et al. 1995 mentions the generation of 1.21E-02 kg solid waste per kg acetaldehyde manufactured. Reference: von Däniken A. and Chudacoff M. (1995) Vergleichende ökologische Bewertung von Anstrichstoffen im Baubereich - Band 2: Daten. Buwal Schriftenreihe Umwelt Nr. 232. BUWAL, Bern.
  production volume; = RP_PV*BP_municipal_solid_waste/ABS(RP)
    Calculated from the production volume of acetaldehyde in proportion to the respective output amounts.
  properties: carbon content, fossil 0.171549, carbon content, non-fossil 0.261655, dry mass 0.771 kg, heating value, net 11.74 MJ, water content 0.297017, wet mass 1 kg
  note on carbon content, fossil: MSW composition in tab 4.1, ecoinvent v2.2 report 13_I. C content referred to 1 kg DM
  note on heating value, net: Value taken from the general comment of the treatment dataset.
- oxygen, liquid: 0.386141 kg; lognormal variance with pedigree 0.0026, pedigree (2,3,2,1,2)
  (same comment as for ethylene)
  properties: dry mass 1 kg, wet mass 1 kg
- wastewater, average: -5.5895e-8, -2.2241e-6 m3 (2 suppliers, which the file names only by identifier); sum of these -2.28e-6 m3; lognormal variance with pedigree 0.0438, pedigree (2,4,1,4,4)
  Calculated based on literature data published by the GENDORF Chemical Park. The factory produced an average of 2462760 tonnes of chemical substances (including intermediates) per year in the years 2015-2019. The average ouput of wastewater going to an external wastewater treatment plant in the years 2015-2019 was 5608 m3 per year. This equals 0.000002277 m3/kg chemical produced. References: Chemiepark GENDORF, Umwelterklärung 2016, https://www.gendorf.de/Nachbarn/Umweltschutz/Industrie%20und%20Nachhaltigkeit Chemiepark GENDORF, Umwelterklärung 2017, https://www.gendorf.de/Nachbarn/Umweltschutz/Industrie%20und%20Nachhaltigkeit Chemiepark GENDORF, Umwelterklärung 2020, https://www.gendorf.de/Nachbarn/Umweltschutz/Industrie%20und%20Nachhaltigkeit
  production volume; = RP_PV*BP_wastewater_average/ABS(RP)
    (same comment as for municipal solid waste)
  properties: carbon content, non-fossil 0.194039, dry mass 0.346837 kg, mass concentration, TOC 0.1091 kg/m3, mass concentration, calcium 0.039453 kg/m3, mass concentration, chlorine 0.030031 kg/m3, mass concentration, hydrogen 0.013365 kg/m3, mass concentration, nitrogen 0.031015 kg/m3, mass concentration, oxygen 0.069824 kg/m3, mass concentration, sodium 0.06456 kg/m3, mass concentration, sulfur 0.015602 kg/m3, water content 2882.2, wet mass 1000 kg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
  note on carbon content, non-fossil: 0.0673 kg TOC/m3 (Tab A.17, ecoinvent v2.2 report 13_I). TOC was considered as Total Carbon.

## Inputs from nature
- Water, cooling, unspecified natural origin [natural resource, in water]: 0.178386 m3; name CW_u; = 0.891930591 * ( 200 / 1000 ); lognormal variance with pedigree 0.044, pedigree (2,4,2,4,4)
  This value is estimated based on the cooling requirements reported by Chauvel, Alain, Gilles Lefebvre, and L. Castex in "Petrochemical processes. Technical and economical characteristics Vol. 2." (1989). The value of cooling water input for the latter process is 0.2 m3 per kg.
  At the same time, the latter amount was split between the following sources (1) "Water, cooling, unspecified natural origin", (2) "Water, river", and (3) "Water, well. in ground"
- Water, river [natural resource, in water]: 0.01171 m3; name CW_r; = 0.058550155 * ( 200/ 1000 ); lognormal variance with pedigree 0.044, pedigree (2,4,2,4,4)
  (same comment as for Water, cooling, unspecified natural origin)
- Water, well, in ground [natural resource, in water]: 0.00990385 m3; name CW_g; = 0.049519254 * ( 200 / 1000 ); lognormal variance with pedigree 0.044, pedigree (2,4,2,4,4)
  (same comment as for Water, cooling, unspecified natural origin)

## Emissions to nature
- Acetaldehyde [air, unspecified]: 0.005 kg; lognormal variance with pedigree 0.004, pedigree (3,3,2,1,2)
  Calculated losses, based on the boiling point of a chemical, to water or to air. In addition, unreacted chemicals are assumed to go to wastewater treatment, which has a conversion rate in biological treatment of 95% of carbon into carbon dioxide. The remaining 5% are released as emissions to water.
- Carbon dioxide, fossil [air, unspecified]: 0.100401 kg; lognormal variance with pedigree 0.004, pedigree (3,3,2,1,2)
  (same comment as for Acetaldehyde)
- Ethylene [air, unspecified]: 0.00506956 kg; lognormal variance with pedigree 0.004, pedigree (3,3,2,1,2)
  (same comment as for Acetaldehyde)
- Oxygen [air, unspecified]: 0.00289123 kg; lognormal variance with pedigree 0.004, pedigree (3,3,2,1,2)
  (same comment as for Acetaldehyde)
- Water [air, unspecified]: 0.0178074 m3; = 0.089036947 * (CW_u + CW_r + CW_g ); lognormal variance with pedigree 0.0834, pedigree (2,4,2,4,4)
  Calculated value. This output flow is estimated based on the inputs. For more details, see Mathematical Relation.
- BOD5, Biological Oxygen Demand [water, surface water]: 0.00480281 kg; lognormal variance with pedigree 0.218, pedigree (4,5,5,5,5)
  Calculated value. The BOD, COD, TOC and BOD5 are calculated based on the amount and type of emissions released to water in the same activity.
- COD, Chemical Oxygen Demand [water, surface water]: 0.00480281 kg; lognormal variance with pedigree 0.218, pedigree (4,5,5,5,5)
  (same comment as for BOD5, Biological Oxygen Demand)
- DOC, Dissolved Organic Carbon [water, surface water]: 0.00144084 kg; lognormal variance with pedigree 0.218, pedigree (4,5,5,5,5)
  (same comment as for BOD5, Biological Oxygen Demand)
- TOC, Total Organic Carbon [water, surface water]: 0.00144084 kg; lognormal variance with pedigree 0.218, pedigree (4,5,5,5,5)
  (same comment as for BOD5, Biological Oxygen Demand)
- Water [water, unspecified]: 0.182193 m3; = 0.910963053 * (CW_u + CW_r + CW_g ); lognormal variance with pedigree 0.0834, pedigree (2,4,2,4,4)
  (same comment as for Water)

## Sampling procedure
Literature data and stoichiometric calculation. This inventory is partially based on a generic model of the production of chemicals. The data generated by this model have been improved with compound-specific data when available. The model of the production of chemicals is using specific industry or literature data wherever possible and more generic data on chemical production processes to fill compound-specific data gaps when necessary. The basic principles of the model have been published in literature (Hischier, 2005). The model has been updated and extended with newly available data from the chemical industry. In the model, unreacted fractions are treated in a waste treatment process, and emissions reported are after a waste treatment process that is included in the scope of this dataset. For volatile reactants, a small level of evaporation is assumed. Solvents and catalysts are mostly recycled in closed-loop systems within the scope of the dataset and reported flows are for losses from this system.
The source of information for the heat and electricity inputs is literature data (from 1989) for the specific technology. Finally, the main source of information for the values for water (process and cooling), nitrogen, and chemical factory is industry data from the GENDORF Chemical Park. The values are a 5-year average of data from 2015 to 2019 published by the GENDORF Chemical Park, which is based in Germany and produced an average of 2462760 tonnes of chemical substances in the years 2015-2019. For more information refer to the comments of the exchanges.

References:
Hischier, R. (2005) Establishing Life Cycle Inventories of Chemicals Based on Differing Data Availability (9 pp). The International Journal of Life Cycle Assessment, Volume 10, Issue 1, pp 59-67. 10.1065/lca2004.10.181.7
Chemiepark GENDORF, Umwelterklärung 2016, https://www.gendorf.de/Nachbarn/Umweltschutz/Industrie%20und%20Nachhaltigkeit
Chemiepark GENDORF, Umwelterklärung 2017, https://www.gendorf.de/Nachbarn/Umweltschutz/Industrie%20und%20Nachhaltigkeit
Chemiepark GENDORF, Umwelterklärung 2020, https://www.gendorf.de/Nachbarn/Umweltschutz/Industrie%20und%20Nachhaltigkeit
Chauvel, Alain, Gilles Lefebvre, and L. Castex in "Petrochemical processes. Technical and economical characteristics Vol. 2." (1989)
