# hardwood forestry, eucalyptus ssp., planted forest management

Dataset: EcoSpold 2, unit process
Geography: BR-GO
Time period: 2012-01-01 to 2023-12-31
Technology level: current
Classification: ISIC rev.4 ecoinvent: 0210:Silviculture and other forestry activities
Synonyms: energy wood; wood fuel
Scenario: Business-as-Usual
System model: Allocation, cut-off by classification
Share of production covered: 100 %
Generated by: Marília I. S. Folegatti Matsuura
Published in: Folegatti-Matsuura M. 2018
Database: ecoinvent
isCopyrightProtected: true
accessRestrictedTo: 1

## General comment
This dataset represents the production of 1 kg of eucalyptus wood fuel (fresh matter) from planted forest management as the prevailing management practices in a region that concentrates wood for energy purposes production in Brazil. Assumed wood basic density of 529 kg.m³-1. The actitivity lasts 14 years with 2 harvesting events. MAI is 42 m³/ha.year-1 in the first harvest and 38 m³/ha.year-1 in the second, resulting in a total of 562 m³.ha-1. Final moisture content of storage is 30%. The total amount of mineral fertilizers (N-P-K) and pesticides (glyphosate, sulfluramide, isoxaflutole, flumioxazine and 2.4 D) apllied are 155 kg N.ha-1; 75 kg P2O5.ha-1; 345 kg K2O.ha-1 and 8,17 kg pesticides.ha-1, respectively. Specie mainly cultivated is E. urophylla, in a rate of 1666 seedlings.hectare-1.
References:
Canals, 2003: Contributions to LCA Methodology for Agricultural Systems. Site-dependency and soil degradation impact assessment: http://www.tdx.cat/handle/10803/3155
Nemecek & Schnetzer: Methods of assessment of direct field emissions for LCIs of agricultural production systems, Data v3.0 (2011): http://www.ecoinvent.org/fileadmin/talkpages/pages/01-01-crop-production/01_crop_production_-_direct_field_emissions___natural_resources_v1.1.pdf
MATSUURA, M. I. S. F; PICOLI, J. F.; NOVAES, R. M. L.; DIAS, F. R. T.; HIRAKURI, M. H.; CASTRO, C.; ZORTEA, R. B. Workbook for life cycle inventories of agricultural products. Jaguariúna. Empresa Brasileira de Pesquisa Agropecuária, 2017.
Novais & Smyth (1999) Fósforo em solo e planta em condições tropicais. Viçosa: Universidade Federal de Viçosa, p. 399.
SISTEMA CNA-SENAR (2016). Available in (http://www.cnabrasil.org.br/campo-futuro), acessed in 31 jul 2017.
QUIRINO, Waldir F.; VALE, Ailton Teixeira do; ANDRADE, Ana Paula Abreu de; ABREU, Vera Lúcia Silva; AZEVEDO, Ana Cristina dos Santos. Poder calorífico da madeira e de materiais lignocelulósicos. Revista da Madeira, n. 89, p. 100-106, 2005.
Novaes, Renan M. L. et al. (2016) Estimating 20-year land use change and derived CO2 emissions associated with crops, parture and forestry in Brazil and each of its 27 states. Global Change Biology, 2017, 1-13.
Nemecek T., Bengoa X., Lansche J., Mouron P., Riedener E., Rossi V. & Humbert S. (2015) Methodological Guidelines for the Life Cycle Inventory of Agricultural Products. Version 3.0, July 2015. World Food LCA Database (WFLDB). Quantis and Agroscope, Lausanne and Zurich, Switzerland.

## Included activities start
Activity starts with road grader and forestry mulcher, followed by the establishment of the eucalyptus plantation in the first year. After, covers the maintenance during six years and the first harvesting in the seventh. Eucalyptus sprouts are conducted to regrowth and the same process is repited.
Operations cover all activities of forest management, planting, fertilising, weed and ant control and harvesting operations.

## Included activities end
The processing of wood is not performed as the final product are logs for energy. Due to lack of data this dataset does not cover the maintenance and construction of forest roads and firebreaks.
This activity ends with the logs at the forest road and includes time for drying in air before transportation. The dataset does not include the seedling production.

## Geography
The inventory is modelled for the state of Goiás, in Brazil.

## Technology
Cultivation of wood to generate energy inside industries, specially drying of grains. Machines used in the harvesting step are: chainsaw to fell trees, tractor coupled to a trailer auto loadable to extract the wood from the field to the forest boarder and forestry loader to load the transportation vehicle.

## Time period
Time period of the most of the data collected for this dataset.

## Parameters
- LUC_crop_specific: 1 dimensionless
  This parameter allows to switch between a "crop specific" and a "country specific" approach when calculating the LUC of a crop. By default, the chosen approach is "crop specific", so the value of the parameter is 1. If you want to apply a "country specific" approach, turn the parameter to 0.
- clay content into soil: 35 % (obsolete); name Clay_content; lognormal variance with pedigree 0.0487, pedigree (4,2,1,1,4)
  This value represents the fraction of clay content into soil (%).
  Used in the SQCB-NO3 model for the calculation of leaching of NO3.
  From Folegatti et al. (2016).
- land transformation to: 3.36381e-6 m2/kg; name T_t; = 1/(yield*density); lognormal variance with pedigree 0.008, pedigree (1,1,1,1,1)
  This value will be used to transform exchanges per ha to exchanges per kg of cleft timber. From Folegatti et al. (2016).
  Uncertainty: Variance of log-transformed data as recommended by Ecoinvent for "Land use, transformation" for agriculture.
- nitrogen in crop residues: 7983 kg N/ha; name Ncrop_residues; lognormal variance with pedigree 0.0467, pedigree (3,4,3,3,4)
  This value represents the nitrogen contained in the crop residues (kg N/ha). Used for the calculation of emissions of N2O to the air.
  From Barreto et al. (2008).
- nitrogen uptake by plant: 150 kg N/ha; name Nuptake_plant; lognormal variance with pedigree 0.0606, pedigree (4,5,3,5,4)
  This value represents the N taken by plant during its growth (kg N/ha). Used in the SQCB-NO3 model for the calculation of leaching of NO3.
  From Nemececk & Schnetzer (2011),
- organic nitrogen into soil: 3458 kg N/ha; name Norg_soil; lognormal variance with pedigree 0.0487, pedigree (4,2,1,1,4)
  Norg is the mass of organic nitrogen contained in the upper 50 cm of soil per ha. Naturally only a fraction of this mass is mineralised and, hence, available for uptake by plants and leaching to the ground water.
  This fraction is determined by the mineralisation rate, which is 1.6% here and implicitly included in the regression coefficient of the term Norg. Used in the SQCB-NO3 model for the calculation of leaching of NO3. From Gatto (2010).
- precipitation, annual: 1414 mm/year; name precipitation; lognormal variance with pedigree 0.0013, pedigree (2,2,1,1,1)
  This value represents the average annual precipitation in Goiás, Brazil.
  Used in the SQCB-NO3 model for the calculation of leaching of NO3.
- rooting depth: 2.5 m; name root_depth; lognormal variance with pedigree 0.0509, pedigree (4,4,2,3,4)
  This value represents the rooting depth of the crop (m).
  Used in the SQCB-NO3 model for the calculation of leaching of NO3.
  From Foelkel (2016).
- soil eroded: 5404 kg/ha.yr; name soil_eroded; lognormal variance with pedigree 0.0447, pedigree (3,4,1,3,4)
  This value represents the quantity of soil eroded (kg/(ha*yr)).
  Used for the calculation of P emissions through water erosion to surface water. From Pires et al. (2006).
- total liming: 5000 kg/ha; name L_total; lognormal variance with pedigree 0.002, pedigree (1,1,1,1,1)
  This value represents the total limestone applied (kg N/ha). From Folegatti et al. (2016).
- total nitrogen: 155 kg/ha; name N_total; lognormal variance with pedigree 0.002, pedigree (1,1,1,1,1)
  This value represents the total nitrogen in mineral fertilisers (kg N/ha). From Folegatti et al. (2016).
- yield, hardwood, m3: 561.97 m³/ha; name yield
  Total yield per hectare, from Folegatti et al. (2016).

## Reference product
- cleft timber, measured as dry mass: 1 kg; name REF_PRODUCT; By-product classification allocatable product; CPC 3110: Wood, sawn or chipped lengthwise, sliced or peeled, of a thickness exceeding 6 mm; railway or tramway sleepers […]; HS2017 4401: Fuel wood, in logs, billets, twigs, faggots or similar forms; wood in chip or particles; sawdust and wood was[...]
  1 kg of dry mass, including bark. The total yield is 561,97 m³.ha-1 with a final moisture content at storage of 30%.
  production volume 1.73914e9 kg; = 3287605*density
    The production of cleft timber from eucalyptus in Goiás (BR), in 2016, is 3287605 m³ (IBGE - PEVS, 2016).
  property basic density 529 kg/m3; name density
    Assumed the average wood density found in the literature.
  property carbon content, fossil 0; name cleft_timber_C_content_fossil
    fossil carbon content on a dry matter basis
  property carbon content, non-fossil 0.494; name cleft_timber_C_content_non_fossil
    biogene carbon content on a dry matter basis
  property dry mass 0.7 kg; name cleft_timber_DM; = cleft_timber_WM - cleft_timber_WWM
  property heating value, gross 20.4556 MJ; name gross_energy; = UnitConversion(4889, 'kilocalorie thermochemical', 'MJ')
    gross (upper) heating (calorific) value
  property price 0.073 EUR2005
    Calculated based on data from FAOSTAT (accessed 20140429). The price is calculated by using data on total world import quantity (m3) and import value (1000 USD), year 2005. 3411751 m3 of Wood Fuel Trd was imported in the world in 2005. The import value was 161229000 USD. The calculated price is thus (161229000/3411751=47.3*0.8=) 38.1 Euro/m3. The density of cleft timber, measured as dry mass is 541.2 kg/m3. The recalculated price is (1/541.2*38.1=) 0.07 Euro/kg. Using the same approach the calculated price for 2010 was 0.112 Euro/kg.
  property water content 0.428571; = cleft_timber_WWM / cleft_timber_DM
  property water in wet mass 0.3 kg; name cleft_timber_WWM
  property wet mass 1 kg; name cleft_timber_WM
  properties: carbon allocation 0.3458 kg, carbon content 0.494, heating value, net 14.46 MJ

## Inputs from technosphere
- ammonium nitrate: 0.00148978 kg; name N_an; = (N_total / yield / density)*2.85731828339295; lognormal variance with pedigree 0.0033, pedigree (2,2,3,1,1)
  The exchange has been updated from 'ammonium nitrate, as N' into 'ammonium nitrate' and therefore its amount has been scaled (multiplied) from 0.0005 kg by 2.8573 kg of 'ammonium nitrate' per kg of 'ammonium nitrate, as N'. Original comment of the exchange is: Ammonium nitrate as source of N. N is applied through NPK-fertilizer and was converted using the NPK formulation. Amount for typical system from Folegatti et al. (2016).
  Original values per ha were attributed to total volume of wood produced per hectare (changing the reference product from ha to m3) and to density (changing the reference product from m3 to kg).
  Uncertainty: Variance of log-transformed data as recommended by Ecoinvent for "Primary energy carriers, metals, salts" for agriculture.
  properties: dry mass 1 kg, wet mass 1 kg
- diesel, burned in agricultural machinery: 0.00391 MJ; = 3.91E-03; lognormal variance with pedigree 0.0033, pedigree (2,2,3,1,1)
  Related to Loading of harvested wood. Amount for typical system from Folegatti et al. (2016).
- eucalyptus seedling, for planting: 0.0056512 unit; name SEEDLING; = 1.68E+03 / yield / density; lognormal variance with pedigree 0.0033, pedigree (2,2,3,1,1)
  Amount for typical system from Folegatti et al. (2016).
  Original values per ha were attributed to total volume of wood produced per hectare (changing the reference product from ha to m3) and to density (changing the reference product from m3 to kg).
  property carbon content, fossil 0; name SEEDLING_C_content_fossil
  property carbon content, non-fossil 0.494; name SEEDLING_C_content_non_fossil
  property dry mass 0.6 kg; name SEEDLING_DM; = SEEDLING_WM-SEEDLING_WWM
  property water content 0.666667; name SEEDLING_water_content; = SEEDLING_WWM/ SEEDLING_DM
  property water in wet mass 0.4 kg; name SEEDLING_WWM
  property wet mass 1 kg; name SEEDLING_WM
- fertilising, by broadcaster: 3.86e-5 ha; = 1.15E-05 + 2.71E-05; lognormal variance with pedigree 0.0033, pedigree (2,2,3,1,1)
  Related to Fertilising and Limestone and gypsum application, respectively. Amount for typical system from Folegatti et al. (2016).
- glyphosate: 2.42194e-5 kg; = 7.20 / yield / density; lognormal variance with pedigree 0.0033, pedigree (2,2,3,1,1)
  (same comment as for eucalyptus seedling, for planting)
  properties: carbon content, fossil 0.214286, dry mass 1 kg, wet mass 1 kg
- gypsum, mineral: 0.00672762 kg; = 2.00E+03 / yield / density; lognormal variance with pedigree 0.0033, pedigree (2,2,3,1,1)
  Amount for typical system from Folegatti et al. (2016).
  Original values per ha were attributed to total volume of wood produced per hectare (changing the reference product from ha to m3) and to density (changing the reference product from m3 to kg).
  Uncertainty: Variance of log-transformed data as recommended by Ecoinvent for "Primary energy carriers, metals, salts" for agriculture.
  properties: dry mass 1 kg, wet mass 1 kg
- inorganic phosphorus fertiliser, as P2O5: 0.000252286 kg; = 75 / yield / density; lognormal variance with pedigree 0.0033, pedigree (2,2,3,1,1)
  Single superphosphate as source of P2O5. P2O5 is applied through NPK-fertilizer and was converted using the NPK formulation. Amount for typical system from Folegatti et al. (2016).
  Original values per ha were attributed to total volume of wood produced per hectare (changing the reference product from ha to m3) and to density (changing the reference product from m3 to kg).
  Uncertainty: Variance of log-transformed data as recommended by Ecoinvent for "Primary energy carriers, metals, salts" for agriculture.
  properties: dry mass 1 kg, wet mass 1 kg
- land use change, forest, intensive: 2.16629e-5 ha; = 0.0000216629233650876*LUC_crop_specific+(4.42806247332783E-06*(1-LUC_crop_specific))
  Calculated value. Land use change (LUC) from Novaes et al. (2017).
- lime: 0.016819 kg; name limestone; = L_total / yield / density; lognormal variance with pedigree 0.0033, pedigree (2,2,3,1,1)
  (same comment as for gypsum, mineral)
  properties: carbon content, fossil 0.120005, dry mass 1 kg, wet mass 1 kg
- machine operation, diesel, >= 18.64 kW and < 74.57 kW, high load factor: 1.73e-5 hour; lognormal variance with pedigree 0.0033, pedigree (2,2,3,1,1)
  Related to Weed control. Amount for typical system from Folegatti et al. (2016).
- machine operation, diesel, >= 74.57 kW, high load factor: 1.5e-6 hour; lognormal variance with pedigree 0.0033, pedigree (2,2,3,1,1)
  Related to road grader. Amount for typical system from Folegatti et al. (2016).
- mulching: 2.9e-5 ha; lognormal variance with pedigree 0.0033, pedigree (2,2,3,1,1)
  Related to Forestry mulcher. Amount for typical system from Folegatti et al. (2016).
  Uncertainty: Variance of log-transformed data as recommended by Ecoinvent for "Primary energy carriers, metals, salts" for agriculture.
- pesticide, unspecified: 3.24944e-6 kg; = 0.966 / yield / density; lognormal variance with pedigree 0.0033, pedigree (2,2,3,1,1)
  Amount for typical system from Folegatti et al. (2016). Related to the input of pesticide to aint control - sulfluramide (6,75%), 2.4 D (83.42%); isoxaflutole (7.76%); flumioxaine (2.07%).
  Original values per ha were attributed to total volume of wood produced per hectare (changing the reference product from ha to m3) and to density (changing the reference product from m3 to kg).
  Uncertainty: Variance of log-transformed data as recommended by Ecoinvent for "Primary energy carriers, metals, salts" for agriculture.
  properties: carbon content, fossil 0.486978, dry mass 1 kg, wet mass 1 kg
- potassium chloride: 0.00183697 kg; = (345 / yield / density)*1.58289736294535; lognormal variance with pedigree 0.0033, pedigree (2,2,3,1,1)
  The exchange has been updated from 'potassium chloride, as K2O' into 'potassium chloride' and therefore its amount has been scaled (multiplied) from 0.0012 kg by 1.5829 kg of 'potassium chloride' per kg of 'potassium chloride, as K2O'. Original comment of the exchange is: Potassium chloride as source of K2O. K2O is applied through NPK-fertilizer and was converted using the NPK formulation. Amount for typical system from Folegatti et al. (2016).
  Original values per ha were attributed to total volume of wood produced per hectare (changing the reference product from ha to m3) and to density (changing the reference product from m3 to kg).
  Uncertainty: Variance of log-transformed data as recommended by Ecoinvent for "Primary energy carriers, metals, salts" for agriculture.
  properties: dry mass 1 kg, wet mass 1 kg
- power sawing, with catalytic converter: 0.000251 hour; lognormal variance with pedigree 0.0033, pedigree (2,2,3,1,1)
  Related to Harvesting with chainsaw. Amount for typical system from Folegatti et al. (2016).
- tap water: 0.0186355 kg; name water; = 5540 / yield / density; lognormal variance with pedigree 0.0532, pedigree (4,3,3,5,4)
  Related to water consumption for the dilution of pesticides and for planting trees. Amount for typical system from Folegatti et al. (2016).
  Original values per ha were attributed to total volume of wood produced per hectare (changing the reference product from ha to m3) and to density (changing the reference product from m3 to kg).
  properties: carbon content, fossil 0.00178991, dry mass 0.000337476 kg, water content 2962.17, wet mass 1 kg
  note on carbon content, fossil: Bicarbonate content is 2.93 mol/m3. CO2 content is 0.1 mol/m3 (ecoinvent v2.2 report 8, Tab 93.1).
- tillage, harrowing, by offset disc harrow: 2.65741e-6 ha; = 0.79 / yield / density; lognormal variance with pedigree 0.0033, pedigree (2,2,3,1,1)
  Related to heavy tillage. Amount for typical system from Folegatti et al. (2016).
- tillage, ploughing: 3.48e-6 ha; lognormal variance with pedigree 0.0033, pedigree (2,2,3,1,1)
  Related to Subsoiling with fertilizer application. Amount for typical system from Folegatti et al. (2016).
- transport, tractor and trailer, agricultural: 0.012924 metric ton*km; = 1.13E-02 + 4.54E-04 + 1.17E-03; lognormal variance with pedigree 0.1227, pedigree (2,2,3,1,1)
  "Related respectively to:
  - Extraction of wood from the harvest place to the border of the road
  - Transport of inputs inside the field
  - Water application with tractor and trailer
  Amounts for typical system from Folegatti et al. (2016)"
  Uncertainty: Variance of log-transformed data as recommended by Ecoinvent for "Transport Services" for agriculture.

## Inputs from nature
- Carbon dioxide, in air [natural resource, in air]: 1.26793 kg; = 44/12 * ( cleft_timber_C_content_non_fossil * REF_PRODUCT * cleft_timber_DM ); source Nemecek, T. 2011; lognormal variance with pedigree 0.0033, pedigree (2,2,3,1,1)
  Resource input, referring to total biomass harvested, i.e. wood including bark. CO2 absorbed during photosyntesis. See "3.1 CO2 from the Atmosphere" in Nemececk & Schnetzer (2011).
  Uncertainty: Variance of log-transformed data as recommended by Ecoinvent for "Primary energy carriers, metals, salts" for agriculture.
- Energy, gross calorific value, in biomass [natural resource, biotic]: 20.4556 MJ; = gross_energy; lognormal variance with pedigree 0.0033, pedigree (2,2,3,1,1)
  Calorific value of Eucalyptus wood.
  Uncertainty: Variance of log-transformed data as recommended by Ecoinvent for "Primary energy carriers, metals, salts" for agriculture.
- Occupation, forest, intensive [natural resource, land]: 4.70933e-5 m2*year; = T_t*14; lognormal variance with pedigree 0.005325, pedigree (2,2,3,2,2)
  Area occupied for the production of wood over two rotation periods; 1 ha produces 562 m³/ha during 14 years.
- Transformation, from forest, intensive [natural resource, land]: 1.6819e-7 m2; = T_t/20; lognormal variance with pedigree 0.011325, pedigree (2,2,3,2,2)
  Transformation related to the area occupied for the production of wood over two rotation periods.
- Transformation, to forest, intensive [natural resource, land]: 1.6819e-7 m2; = T_t/20; lognormal variance with pedigree 0.011325, pedigree (2,2,3,2,2)
  (same comment as for Transformation, from forest, intensive)

## Emissions to nature
- Ammonia [air, non-urban air or from high stacks]: 1.89935e-5 kg; name NH3; = 17/14*N_an*0.349978511603734*0.03; source Nemecek T. 2015; lognormal variance with pedigree 0.0187, pedigree (4,3,3,3,1)
  NH3 emissions from applied mineral fertilisers are calculated according to Agrammon model available in EEA/EMEP (2013), page 35. Constant emission factor for ammonium sulphate is 1.1% to soils with pH<=7 (brazilian conditions).
  Uncertainty: Variance of log-transformed data as recommended by Ecoinvent for "CH4, NH3" for agriculture.
- Carbon dioxide, fossil [air, non-urban air or from high stacks]: 0.00770873 kg; = limestone * 0.125 * 44/12; source Nemecek T. 2015; lognormal variance with pedigree 0.0113, pedigree (4,3,3,3,1)
  Emissions of CO2 to air from limestone application.
  Uncertainty: Variance of log-transformed data as recommended by Ecoinvent for "CO2" for combustion emissions.
- Dinitrogen monoxide [air, non-urban air or from high stacks]: 0.000430173 kg; name N2O; = 44/28*((0.01*(N_total+ Ncrop_residues)+ (0.01*14/17*NH3) + 0.0075*14/62*NO3) / yield / density); source Nemecek, T. 2011; lognormal variance with pedigree 0.1987, pedigree (4,3,5,3,5)
  Emissions of N2O to the air are calculated through the showed mathematical relation that is in accordance with "2.4 EMISSIONS OF N2O TO THE AIR" in Nemecek & Schnetzer (2011).
  Original values per ha were attributed to total volume of wood produced per hectare (changing the reference product from ha to m3) and to density (changing the reference product from m3 to kg).
  Uncertainty: Variance of log-transformed data as recommended by Ecoinvent for "NOX, N2O" for agriculture.
- Nitrogen oxides [air, non-urban air or from high stacks]: 9.03364e-5 kg; = N2O*0.21; source Nemecek, T. 2011; lognormal variance with pedigree 0.0407, pedigree (4,3,3,3,1)
  Emissions of NOx to the air are calculated through the showed mathematical relation that is in accordance with "2.5 EMISSIONS OF NOX TO THE AIR" in Nemecek & Schnetzer (2011).
  Uncertainty: Variance of log-transformed data as recommended by Ecoinvent for "NOX, N2O" for agriculture.
- Water [air, non-urban air or from high stacks]: 1.86355e-5 m3; name water_air; = water/1000; lognormal variance with pedigree 0.0986, pedigree (4,5,5,5,4)
  It is assumed that the total water applied evaporates.
- 2,4-D [soil, agricultural]: 2.71123e-6 kg; = 8.06E-01 / yield / density; source Nemecek, T. 2011; lognormal variance with pedigree 0.0437, pedigree (4,3,3,3,1)
  "All pesticides applied for crop production were assumed to end up as emissions to the soil. The amounts of pesticides used as inputs were thus simultaneously calculated as outputs (emissions to agricultural soil)", as recomended by Nemecek & Schnetzer (2011), "2.9 EMISSIONS OF PESTICIDES TO AGRICULTURAL SOIL" (page 21).
  Original values per ha were attributed to total volume of wood produced per hectare (changing the reference product from ha to m3) and to density (changing the reference product from m3 to kg).
- Cadmium II [soil, forestry]: 5.61756e-9 kg; = 1.67E-03 / yield / density; source Milà i Canals, L. 2003; lognormal variance with pedigree 0.0507, pedigree (4,3,3,3,1)
  Emissions of heavy metals to soil and surface water estimated from mineral fertilisers and liming as recommended by Canals (2003). Due to lack of data about metal content in wood, it was considered zero absorption.
  Original values per ha were attributed to total volume of wood produced per hectare (changing the reference product from ha to m3) and to density (changing the reference product from m3 to kg).
- Chromium III [soil, forestry]: 2.41185e-7 kg; = 7.17E-02 / yield / density; source Milà i Canals, L. 2003; lognormal variance with pedigree 0.0507, pedigree (4,3,3,3,1)
  (same comment as for Cadmium II)
- Copper ion [soil, forestry]: -9.82232e-6 kg; = -2.92E+00 / yield / density; source Milà i Canals, L. 2003; lognormal variance with pedigree 0.0507, pedigree (4,3,3,3,1)
  Emissions of heavy metals to soil and surface water estimated from mineral fertilisers and liming as recommended by Canals (2003). It was considered copper absorption in wood. According to Andrade et al. (2011), there is 10 mg Cu/kg wood in a similar product.
  Nemecek & Schnetzer (2011) state that "some of the values for emissions of heavy metals to the soil are negative. This means that more heavy metals are exported than imported. It must, however, be borne in mind that these heavy metals are transferred either to the water bodies or to the products harvested from the field".
  Original values per ha were attributed to total volume of wood produced per hectare (changing the reference product from ha to m3) and to density (changing the reference product from m3 to kg).
- Flumioxazin [soil, agricultural]: 6.72762e-8 kg; = 2.00E-02 / yield / density; source Nemecek, T. 2011; lognormal variance with pedigree 0.0437, pedigree (4,3,3,3,1)
  (same comment as for 2,4-D)
- Glyphosate [soil, agricultural]: 2.42194e-5 kg; = glyphosate; source Nemecek, T. 2011; lognormal variance with pedigree 0.0437, pedigree (4,3,3,3,1)
  (same comment as for 2,4-D)
- Isoxaflutole [soil, agricultural]: 2.52286e-7 kg; = 7.50E-02 / yield / density; source Nemecek, T. 2011; lognormal variance with pedigree 0.0437, pedigree (4,3,3,3,1)
  (same comment as for 2,4-D)
- Lead II [soil, forestry]: 7.83767e-8 kg; = 2.33E-02 / yield / density; source Milà i Canals, L. 2003; lognormal variance with pedigree 0.0507, pedigree (4,3,3,3,1)
  (same comment as for Cadmium II)
- Nickel II [soil, forestry]: -1.44644e-7 kg; = -4.3E-02 / yield / density; source Milà i Canals, L. 2003; lognormal variance with pedigree 0.0507, pedigree (4,3,3,3,1)
  Emissions of heavy metals to soil and surface water estimated from mineral fertilisers and liming as recommended by Canals (2003), metal content in wood from Freddo et al. (1999). According to the authors, there is 0,195 mg Ni/kg wood in a similar product.
  Nemecek & Schnetzer (2011) state that "some of the values for emissions of heavy metals to the soil are negative. This means that more heavy metals are exported than imported. It must, however, be borne in mind that these heavy metals are transferred either to the water bodies or to the products harvested from the field".
  Original values per ha were attributed to total volume of wood produced per hectare (changing the reference product from ha to m3) and to density (changing the reference product from m3 to kg).
- Pesticides, unspecified [soil, agricultural]: 2.19657e-7 kg; = 6.53E-02 / yield / density; source Nemecek, T. 2011; lognormal variance with pedigree 0.0437, pedigree (4,3,3,3,1)
  "All pesticides applied for crop production were assumed to end up as emissions to the soil. The amounts of pesticides used as inputs were thus simultaneously calculated as outputs (emissions to agricultural soil)", as recomended by Nemecek & Schnetzer (2011), "2.9 EMISSIONS OF PESTICIDES TO AGRICULTURAL SOIL" (page 21).
  This exchange represents the input of sulfluramide.
  Original values per ha were attributed to total volume of wood produced per hectare (changing the reference product from ha to m3) and to density (changing the reference product from m3 to kg).
- Zinc II [soil, forestry]: -4.57478e-5 kg; = -1.36E+01 / yield / density; source Milà i Canals, L. 2003; lognormal variance with pedigree 0.0507, pedigree (4,3,3,3,1)
  Emissions of heavy metals to soil and surface water estimated from mineral fertilisers and liming as recommended by Canals (2003), metal content in wood from Andrade et al. (2011). According to the authors, there is 46 mg Zn/kg wood in a similar product.
  Nemecek & Schnetzer (2011) state that "some of the values for emissions of heavy metals to the soil are negative. This means that more heavy metals are exported than imported. It must, however, be borne in mind that these heavy metals are transferred either to the water bodies or to the products harvested from the field".
  Original values per ha were attributed to total volume of wood produced per hectare (changing the reference product from ha to m3) and to density (changing the reference product from m3 to kg).
- Cadmium II [water, surface water]: 5.61756e-13 kg; = 1.67E-07 / yield / density; source Milà i Canals, L. 2003; lognormal variance with pedigree 0.1007, pedigree (4,3,3,3,1)
  Emissions of heavy metals to soil and surface water estimated from mineral fertilisers and liming as recommended by Canals (2003). Due to lack of data about metal content in wood, it was considered zero absorption.
  Original values per ha were attributed to total volume of wood produced per hectare (changing the reference product from ha to m3) and to density (changing the reference product from m3 to kg).
  Uncertainty: Variance of log-transformed data as recommended by Ecoinvent for "Heavy metals" for agriculture.
- Chromium III [water, surface water]: 2.41185e-11 kg; = 7.17E-06 / yield / density; source Milà i Canals, L. 2003; lognormal variance with pedigree 0.1007, pedigree (4,3,3,3,1)
  (same comment as for Cadmium II)
- Copper ion [water, surface water]: -9.82232e-10 kg; = -2.92E-04 / yield / density; source Milà i Canals, L. 2003
  Emissions of heavy metals to soil and surface water estimated from mineral fertilisers and liming as recommended by Canals (2003), metal content in wood from Andrade et al. (2011). According to the authors, there is 10 mg Cu/kg wood in a similar product.
  Nemecek & Schnetzer (2011) state that "some of the values for emissions of heavy metals to the soil are negative. This means that more heavy metals are exported than imported. It must, however, be borne in mind that these heavy metals are transferred either to the water bodies or to the products harvested from the field".
  Original values per ha were attributed to total volume of wood produced per hectare (changing the reference product from ha to m3) and to density (changing the reference product from m3 to kg).
- Lead II [water, surface water]: 7.83767e-12 kg; = 2.33E-06 / yield / density; source Milà i Canals, L. 2003; lognormal variance with pedigree 0.1007, pedigree (4,3,3,3,1)
  (same comment as for Cadmium II)
- Nickel II [water, surface water]: -1.44644e-11 kg; = -4.3E-06 / yield / density; source Milà i Canals, L. 2003
  (same comment as for Nickel II)
- Nitrate [water, ground-]: 0.000375719 kg; name NO3; = 62/14*((21.37 + precipitation/(Clay_content*root_depth) * (0.0037*N_total + 0.0000601*Norg_soil - 0.00362*Nuptake_plant)) / yield / density); source Nemecek, T. 2011; lognormal variance with pedigree 0.0507, pedigree (4,3,3,3,1)
  Emissions of nitrate to the groundwater are calculated through the showed mathematical relation that is in accordance with "2.2.2 The SQCB-NO3 model" in Nemececk & Schnetzer (2011), as "SALCA-NO3 model" has "Geographic scope of application: Europe"
  Original values per ha were attributed to total volume of wood produced per hectare (changing the reference product from ha to m3) and to density (changing the reference product from m3 to kg).
  Uncertainty: Variance of log-transformed data as recommended by Ecoinvent for "NO3, PO4" for agriculture.
- Phosphorus [water, surface water]: 6.42411e-6 kg; = (soil_eroded * 0.00095 * 1.86 * 0.2) / yield / density; source Nemecek, T. 2011; lognormal variance with pedigree 0.0507, pedigree (4,3,3,3,1)
  Due to phosphorus low mobility in Brazilian soils, its emissions through leaching and run-off were disregarded (Novais & Smyth, 1999). Only P emission by water erosion through surface water was considered. They are calculated through the showed mathematical relation that is in accordance with "2.3.3 Phorsphorous Emissions Through Water Erosion to Surface Water" Nemecek and Schnetzer (2011).
  Uncertainty: Variance of log-transformed data as recommended by Ecoinvent for "NO3, PO4" for agriculture.
- Zinc II [water, surface water]: -4.57478e-9 kg; = -1.36E-03 / yield / density; source Milà i Canals, L. 2003
  (same comment as for Zinc II)

## Sampling procedure
The main source of data for forestry inputs and operations is the project "Projeto Campo Futuro" developed by SISTEMA CNA-SENAR in 2016. Data are also provided by relevant experts related to forestry sector of Eucalyptus wood for energy in Goiás (GO).
Emissions from the agricultural process are estimated according to Nemecek and Schnetzer (2011) and Canals (2003).
The system of Eucalyptus production analyzed corresponds to the city of Cristalina in Goiás state.

## Extrapolations
Carbon content is based on ecoinvent database.
