# extrusion, plastic film

Dataset: EcoSpold 2, unit process
Geography: RoW
Time period: 1993-01-01 to 2023-12-31
Technology level: current
Classification: EcoSpold01Categories: plastics/processing
Classification: ISIC rev.4 ecoinvent: 2220:Manufacture of plastics products
Tags: ConvertedDataset
Scenario: Business-as-Usual
System model: Allocation, cut-off by classification
Generated by: Roland Hischier
Published in: Hischier R. 2007
Database: ecoinvent
isCopyrightProtected: true
accessRestrictedTo: 1

## General comment
1 kg of this process equals 0.976 kg of extruded plastic film.
[This dataset was already contained in the ecoinvent database version 2. It was not individually updated during the transfer to ecoinvent version 3. Life Cycle Impact Assessment results may still have changed, as they are affected by changes in the supply chain, i.e. in other datasets. This dataset was generated following the ecoinvent quality guidelines for version 2. It may have been subject to central changes described in the ecoinvent version 3 change report (http://www.ecoinvent.org/database/ecoinvent-version-3/reports-of-changes/), and the results of the central updates were reviewed extensively. The changes added e.g. consistent water flows and other information throughout the database. The documentation of this dataset can be found in the ecoinvent reports of version 2, which are still available via the ecoinvent website. The change report linked above covers all central changes that were made during the conversion process.]

## Included activities end
This process contains the auxillaries and energy demand for the mentioned convertion process of plastics. The converted amount of plastics is NOT included into the dataset.

## Geography
information from different European and Swiss converting companies

## Technology
present technologies

## Time period
time to which data refer

## Parameters
- fraction, cooling water, cooling pond system, to air: 0.032 dimensionless; lognormal variance with pedigree 0.0413, pedigree (2,3,1,3,1)
- fraction, cooling water, once-through system, to air: 0.004 dimensionless; lognormal variance with pedigree 0.0413, pedigree (2,3,1,3,1)
- fraction, cooling water, recirculating system, to air: 0.771 dimensionless; lognormal variance with pedigree 0.0413, pedigree (2,3,1,3,1)
- fraction, cooling water, to air: 0.3875 dimensionless; lognormal variance with pedigree 0.092025, pedigree (4,4,3,2,4)

## Reference product
- extrusion, plastic film: 1 kg; By-product classification allocatable product; CPC 89200: Moulding, pressing, stamping, extruding and similar plastic manufacturing services
  EcoSpold01Location=RER
  production volume 2.65986 kg
    This is a placeholder value that does not reflect real-world production volumes. This dataset does not currently require a real-world production volume to work in the database framework, and no actual data were collected yet. This has no negative effect on the results of the ecoinvent database.
  property price 0.153387 EUR2005
    Calculated based on inputs: The price of the product has been calculated as a sum of the values of the material and energy inputs for this product. This value is therefore a rough estimation. It may underestimate the real price since there are additional expenses when producing any product. These expences can include for example labour costs, treatment of waste materials and profit for the producer. Please consider carefully whether this level of data quality is acceptable for your application.
  properties: carbon allocation 0 kg, carbon content 0

## Inputs from technosphere
- EUR-flat pallet: 0.00144 unit; lognormal variance with pedigree 0.0612, pedigree (2,3,5,5,3)
  Typical values, based on a European and a Swiss study
  EcoSpold01Location=RER
  Uncertainty: typical values, based on a European and a Swiss study
  properties: carbon content, fossil 0.0311351, carbon content, non-fossil 0.58833, dry mass 18.3333 kg, heating value, net 335.11 MJ, water content 0.2, wet mass 22 kg
  note on carbon content, fossil: C content in components of the pallet (ecoinvent v2.2 report 7_part XVIII)
- core board: 0.00732 kg; lognormal variance with pedigree 0.0612, pedigree (2,3,5,5,3)
  (same comment as for EUR-flat pallet)
  properties: carbon content, non-fossil 0.430314, dry mass 0.945 kg, heating value, net 12.19 MJ, water content 0.0582011, wet mass 1 kg
  note on carbon content, non-fossil: Biogenic C content was calculated after biogenic C contents of chemicals used in the production of board (ecoinvent v2.2 report 11_III, part 13). The cellulose content in 1 kg of paper (on a wet mas basis) was estimated as (1-chemical content), C content of cellulose was considered 0.44 kgC/kg dry mass (ecoinvent v2.2 report, n 15a, pg 40)
- electricity, medium voltage: 0.0221415, 0.441674, 0.0110567, 0.00678049, 0.00135711, 0.000291402, 0.0456096, 0.13109 kWh (8 suppliers, which the file names only by identifier); sum of these 0.66 kWh; lognormal variance with pedigree 0.0612, pedigree (2,3,5,5,3)
  EcoSpold01Location=UCTE
  Typical values, based on a European and a Swiss study
  Uncertainty: typical values, based on a European and a Swiss study
- heat, district or industrial, natural gas: 0.601 MJ; lognormal variance with pedigree 0.0612, pedigree (2,3,5,5,3)
  (same comment as for EUR-flat pallet)
  properties: heating value, net 1 MJ
- heat, district or industrial, other than natural gas: 0.2091 MJ; lognormal variance with pedigree 0.0612, pedigree (2,3,5,5,3)
  (same comment as for EUR-flat pallet)
  properties: heating value, net 1 MJ
- lubricating oil: 0.000105 kg; lognormal variance with pedigree 0.0612, pedigree (2,3,5,5,3)
  (same comment as for EUR-flat pallet)
  properties: carbon content, fossil 0.75, dry mass 1 kg, heating value, net 40.2 MJ, wet mass 1 kg
  note on carbon content, fossil: Lubricating oil is produced from diesel. C-content/dry mass of fats and oils considered 75%, from: ecoinvent v2.2 report, n 15a, pg 40
  note on heating value, net: Literature value, Source: IPCC 2006, 2006 IPCC Guidelines for National Greenhouse Gas Inventories, Prepared by the National Greenhouse Gas Inventories Programme, Eggleston H.S., Buendia L., Miwa K., Ngara T. and Tanabe K. (eds). Published: IGES, Japan
- packaging box factory: 1.4e-9 unit; lognormal variance with pedigree 0.448, pedigree (4,5,5,5,5)
  EcoSpold01Location=RER
  Estimation
  Uncertainty: estimation
- particleboard, uncoated: 2.15e-5 m3; lognormal variance with pedigree 0.0612, pedigree (2,3,5,5,3)
  Typical values, based on a European and a Swiss study
  Uncertainty: typical values, based on a European and a Swiss study
  properties: carbon content, fossil 0.045339, carbon content, non-fossil 0.4416, dry mass 599.3 kg, heating value, net 8749.71 MJ, water content 0.0629067, wet mass 637 kg
- polyethylene, low density, granulate: 0.00215 kg; lognormal variance with pedigree 0.0612, pedigree (2,3,5,5,3)
  (same comment as for EUR-flat pallet)
  properties: carbon content, fossil 0.857143, dry mass 1 kg, heating value, net 42.47 MJ, wet mass 1 kg
  note on carbon content, fossil: Polyethylene is formed out of a huge amount of ethylene monomers (C2H4) (ecoinvent v2.2 report 11_II). MW=28 g/mol
- polypropylene, granulate: 0.000683 kg; lognormal variance with pedigree 0.0612, pedigree (2,3,5,5,3)
  EcoSpold01Location=RER
  Typical values, based on a European and a Swiss study
  Uncertainty: typical values, based on a European and a Swiss study
  properties: carbon content, fossil 0.857143, dry mass 1 kg, heating value, net 32.78 MJ, wet mass 1 kg
  note on carbon content, fossil: Polypropylene is formed by the polymerisation of propylene, C3H6 (ecoinvent v2.2 report 11_II)
  note on heating value, net: Value extracted from "treatment of waste polypropylene, open burning"
- polyvinylchloride, suspension polymerised: 4.88e-5 kg; lognormal variance with pedigree 0.0612, pedigree (2,3,5,5,3)
  (same comment as for EUR-flat pallet)
  properties: carbon content, fossil 0.387097, dry mass 1 kg, heating value, net 21.5 MJ, wet mass 1 kg
  note on carbon content, fossil: Monomer is vynyl chloride, C2H3Cl (ecoinvent v2.2 report 11_II). MW=62 g/mol
- solid bleached and unbleached board carton: 0.000976 kg; lognormal variance with pedigree 0.0612, pedigree (2,3,5,5,3)
  (same comment as for particleboard, uncoated)
  properties: carbon content, fossil 0.0190874, carbon content, non-fossil 0.327779, dry mass 0.945 kg, heating value, net 9.8 MJ, water content 0.0582011, wet mass 1 kg
- steam, in chemical industry: 0.058 kg; lognormal variance with pedigree 0.0612, pedigree (2,3,5,5,3)
  (same comment as for polypropylene, granulate)
  properties: dry mass 1 kg, wet mass 1 kg
- waste plastic, mixture: -6.38751e-6, -6.06554e-6, -0.0238369, -0.000231453, -1.54648e-5, -2.58048e-6, -1.16958e-6 kg (7 suppliers, which the file names only by identifier); sum of these -0.0241 kg; lognormal variance with pedigree 0.0214, pedigree (2,3,2,5,3)
  Typical values, based on a European and a Swiss study
  EcoSpold01Location=CH
  Uncertainty: typical values, based on a European and a Swiss study
  production volume
    Calculated from the production volume of extrusion, plastic film in proportion to the respective output amounts.
  properties: carbon content, fossil 0.747344, dry mass 0.847 kg, heating value, net 30.79 MJ, water content 0.180638, wet mass 1 kg
  note on carbon content, fossil: C content in 1 kg DM was calculated using data in Tab A.2, ecoinvent v2.2 report 13_I
  note on heating value, net: Value taken from the general comment of the treatment dataset.

## Inputs from nature
- Water, cooling, unspecified natural origin [natural resource, in water]: 0.0437 m3; lognormal variance with pedigree 0.0612, pedigree (2,3,5,5,3)
  (same comment as for particleboard, uncoated)

## Emissions to nature
- Water [air, unspecified]: 0.0169338 m3; lognormal variance with pedigree 0.0827, pedigree (2,2,5,5,1)
  Calculated value based on literature values and expert opinion. See comments in the parametres' comment field.
- Water [water, unspecified]: 0.0267662 m3; lognormal variance with pedigree 0.0827, pedigree (2,2,5,5,1)
  (same comment as for Water)
  property carbon content, fossil 0; name C_content_fossil
  property carbon content, non-fossil 0; name C_content_non_fossil
  property dry mass 0 kg; name DM
  property water in wet mass 1000 kg; name WWM
  property wet mass 1000 kg; name WM

## Sampling procedure
company data

## Extrapolations
no extrapolation This dataset has been copied from an original dataset covering the geography RER. The uncertainty has been adjusted accordingly.

## Review by Hans-Jörg Althaus 2005-07-19
Passed
