# dimethenamide production

Dataset: EcoSpold 2, unit process
Geography: RER
Time period: 2000-01-01 to 2023-12-31
Technology level: current
Classification: ISIC rev.4 ecoinvent: 2021:Manufacture of pesticides and other agrochemical products
Classification: EcoSpold01Categories: agricultural means of production/pesticides
Synonyms: Wing; Frontier 900 EC; Century; Frontier 720 EC
Tags: ConvertedDataset
Scenario: Business-as-Usual
System model: Allocation, cut-off by classification
Share of production covered: 100 %
Generated by: Jürgen Sutter
Published in: Nemecek, T. 2007
Database: ecoinvent
isCopyrightProtected: true
accessRestrictedTo: 1

## General comment
This dataset represents the production of dimethenamide (1 kg of active ingredient). Raw materials are modelled with a stoichiometric calculation. Energy consumption is modelled with data from a similar process. The emissions are estimated. Infrastructure is included with a default value.
[This dataset was already contained in the ecoinvent database version 2. It was not individually updated during the transfer to ecoinvent version 3. Life Cycle Impact Assessment results may still have changed, as they are affected by changes in the supply chain, i.e. in other datasets. This dataset was generated following the ecoinvent quality guidelines for version 2. It may have been subject to central changes described in the ecoinvent version 3 change report (http://www.ecoinvent.org/database/ecoinvent-version-3/reports-of-changes/), and the results of the central updates were reviewed extensively. The changes added e.g. consistent water flows and other information throughout the database. The documentation of this dataset can be found in the ecoinvent reports of version 2, which are still available via the ecoinvent website. The change report linked above covers all central changes that were made during the conversion process.]

## Included activities start
From reception of precursors (acetic anhydride, acetone, ammonia, carbon monoxide, chlorine, ethylene, hydrochloric acid, hydrogen cyanide, hydrogen sulfide, methanol, propylene oxide, sodium hydroxide, sulfur, sulfur dioxide, sulfuric acid, and water decarbonised) at the factory gate.

## Included activities end
This activity ends with dimethenamide at the factory gate. The dataset includes the input materials, energy uses, infrastructure and emissions. The dataset doesn't include emulsives, additives etc.

## Geography
The inventory is modelled for Europe.

## Technology
Dimethenamide is a pesticide produced in nine steps from ethylene:
C2H4 + CO + H2O → C3H6O2
C3H6O2 + Cl2 → C3H5ClO + HCl
C3H5ClO + NaSH + H2O → C3H5O2SNa + HCl + H2
C3H5O2SNa + HCl → C3H6O2S + NaCl
C3H6O2S + C4H6O2 → C7H12O4S
C7H12O4S → C6H10OS + CO2 + H2O
C6H10OS + C4H11NO → C10H19NOS + H2O
2 C10H19NOS + 2 SOCl2 → 2 C10H17NOS + SO2 + S + 4 HCl
C10H17NOS + C2H2Cl2O → C12H18ClNO2S + HCl
Precursors that are used for the dimethenamide production are chloroacetyl chloride (C2H2Cl2O), methacrylic acid (C4H6O2), 1-methoxy-2-amino-propane (C4H11NO), sodium hydrogren sulfide (NaSH), and thionyl chloride (SOCl2).
Chloroacetyl chloride (C2H2Cl2O) is produced in two steps from acetic acid:
C2H4O2 + Cl2 → C2H3ClO2 + HCl
C2H3ClO2 + SOCl2 → C2H2Cl2O + HCl + SO2
Methacrylic acid (C4H6O2) is produced in three steps from acetone:
C3H6O + HCN → C4H7NO
C4H7NO + H2SO4 → C4H9NO5S
C4H9NO5S + H2O → C4H6O2 + NH4HSO4
1-Methoxy-2-amino-propane (C4H11NO) is produced in two steps from propylene oxide:
C3H6O + NH3 → C3H9NO
C3H9NO + CH4O → C4H11NO + H2O
Sodium hydrogen sulfide (NaSH) is produced from hydrogen sulfide and sodium hydroxide:
H2S + NaOH → NaSH + H2O
Thionyl chloride (SOCl2) is produced in two steps from sulphur:
S + Cl2 → SCl2
SCl2 + SO2 + Cl2 → 2 SOCl2

## Time period
Time of publications

## Parameters
- fraction, cooling water, cooling pond system, to air: 0.032 dimensionless; name fraction_CW_CP_to_air; lognormal variance with pedigree 0.0413, pedigree (2,3,1,3,1)
  Calculated based on literature value (Scown, C.D., 2011, Water Footprint of U.S. Transportation Fuels and supplying information of the article) (Vionnet, S., Quantis Water Database - Technical Report, 2012).
- fraction, cooling water, once-through system, to air: 0.004 dimensionless; name fraction_CW_OT_to_air; lognormal variance with pedigree 0.0413, pedigree (2,3,1,3,1)
  (same comment as for fraction, cooling water, cooling pond system, to air)
- fraction, cooling water, recirculating system, to air: 0.771 dimensionless; name fraction_CW_R_to_air; lognormal variance with pedigree 0.0413, pedigree (2,3,1,3,1)
  (same comment as for fraction, cooling water, cooling pond system, to air)
- fraction, cooling water, to air: 0.3875 dimensionless; name fraction_CW_to_air; = (0.5*fraction_CW_OT_to_air)+(0.5*fraction_CW_R_to_air); lognormal variance with pedigree 0.092025, pedigree (4,4,3,2,4)
  Calculated value based on literature value (see comments of the other parametres present in this dataset) and expert opinion. In the case when no industry/literature data are available about the type of cooling or directly fraction, cooling water, to air specific for the process a default assumption is applied. It is assumed that the once-through cooling system is used in 50% of all cases and recirculating system is used in another 50% of all cases.
- fraction, water, decarbonised, to air: 0.3875 dimensionless; name fraction_WDC_to_air; = fraction_CW_to_air; lognormal variance with pedigree 0.092025, pedigree (4,4,3,2,4)
  Calculated value. See comments in the other parametres present in this dataset. Decarbonised water is considered to be always used as cooling water, thus cooling water fractions to air are applied to all carbonised water input flows to calculate the amount of water consumed in the processes.

## Reference product
- dimethenamide: 1 kg; By-product classification allocatable product; CPC 34663: Herbicides, anti-sprouting products and plant-growth regulators; HS2017 380893: Herbicides, anti-sprouting products and plant-growth regulators; other than containing goods of Subheading [...]; CAS 87674-68-8
  Dimethenamid is a yellow-brown viscous liquid which is fairly soluble in water and readily soluble in heptane, ethanol, and diethyl ether.
  The (S)-isomer of this substance has the ISO common name dimethenamid-P.
  Dimethenamid is used pre-emergence for the control of annual grasses and many broad-leaved weeds in maize, soya beans, and other crops.
  EcoSpold01Location=RER
  production volume 1.32237 kg
    This is a placeholder value that does not reflect real-world production volumes. This dataset does not currently require a real-world production volume to work in the database framework, and no actual data were collected yet. This has no negative effect on the results of the ecoinvent database. The placeholder value of this activity was scaled according to the nominal GDP of 2005 (source: United Nations, http://data.un.org/Glossary.aspx?q=GDP+%28current+US%24%29, accessed 20130726) to reflect an appropriate share of the global production volume, which is also a placeholder value.
  property carbon content, fossil 0.521739
    C12H18ClNO2S. MW=276 g/mol (ecoinvent v2.2 report Sutter 2010)
  property price 5.3033 EUR2005
    Calculated based on inputs: The price of the product has been calculated as a sum of the values of the material and energy inputs for this product. This value is therefore a rough estimation. It may underestimate the real price since there are additional expenses when producing any product. These expences can include for example labour costs, treatment of waste materials and profit for the producer. Please consider carefully whether this level of data quality is acceptable for your application.
  properties: carbon allocation 0.521739 kg, carbon content 0.521739, carbon content, non-fossil 0, dry mass 1 kg, water content 0, water in wet mass 0 kg, wet mass 1 kg

## Inputs from technosphere
- acetic anhydride: 0.2727 kg; source Unger T A 1996; lognormal variance with pedigree 0.076, pedigree (4,5,5,1,1)
  EcoSpold01Location=RER
  Stoichiometric calculation, assuming an efficiency of 95% per reaction step.
  Further references:
  Samel et al. 2000. Ulf-Rainer Samel, Walter Kohler, Armin Otto Gamer, Ullrich Keuser: Propionic Acid and Derivatives. In: Ullmann's Encyclopedia of Industrial Chemistry, Seventh Edition, 2009 Electronic Release (ed. Fiedler E., Grossmann G., Kersebohm D., Weiss G. and Witte C.). 7 th Electronic Release Edition. Wiley InterScience, New York, Article Online Posting Date: June 15, 2000. Online-Version under: DOI: 10.1002/14356007.a22_223
  Uncertainty: Stoechiometric calculation
  properties: carbon content, fossil 0.470588, dry mass 1 kg, heating value, net 21.38 MJ, wet mass 1 kg
- acetone, liquid: 0.31791 kg; source Bauer W. 2009; lognormal variance with pedigree 0.076, pedigree (4,5,5,1,1)
  EcoSpold01Location=RER
  Stoichiometric calculation, assuming an efficiency of 95% per reaction step.
  Uncertainty: Stoechiometric calculation
  properties: carbon content, fossil 0.62069, dry mass 1 kg, heating value, net 31.32 MJ, wet mass 1 kg
- ammonia, anhydrous, liquid: 0.079891 kg; source Eller K. 2009; lognormal variance with pedigree 0.076, pedigree (4,5,5,1,1)
  Stoichiometric calculation, assuming an efficiency of 95% per reaction step.
  Further references:
  Kim et al. 2003. Kim S., Overcash M.: Energy in chemical manufacturing processes: gate-to-gate information for life cycle assessment. In: Journal of Chemical Technology & Biotechnology vol. 78, no. 9: 995-1005(11). 2003
  EcoSpold01Location=RER
  Uncertainty: Stoechiometric calculation
  properties: dry mass 1 kg, wet mass 1 kg
- carbon monoxide: 0.66416 kg; source Unger T A 1996; lognormal variance with pedigree 0.076, pedigree (4,5,5,1,1)
  (same comment as for acetic anhydride)
  properties: carbon content, fossil 0.428571, dry mass 1 kg, heating value, net 12.99 MJ, wet mass 1 kg
  note on carbon content, fossil: CO. It is assumed that CO is produced from partial combustion of heavy heating oil.
- chemical factory, organics: 4.3772e-9 unit; lognormal variance with pedigree 0.448, pedigree (4,5,5,5,5)
  Estimation, based on a production capacity of 50,000 t per year and a plant life time of 50 years, therefore an amount of 4X10-10 units per kg of produced chemical is aded to the unit process of the respective chemical. The amount is accounted for each production step. This might be an overestimation in some multistep syntheses.
  EcoSpold01Location=RER
  Uncertainty: Estimation
- chlorine, liquid: 1.334 kg; source Unger T A 1996; lognormal variance with pedigree 0.076, pedigree (4,5,5,1,1)
  EcoSpold01Location=RER
  Stoichiometric calculation, assuming an efficiency of 95% per reaction step.
  Further references:
  Kim et al. 2003. Kim S., Overcash M.: Energy in chemical manufacturing processes: gate-to-gate information for life cycle assessment. In: Journal of Chemical Technology & Biotechnology vol. 78, no. 9: 995-1005(11). 2003
  Samel et al. 2000. Ulf-Rainer Samel, Walter Kohler, Armin Otto Gamer, Ullrich Keuser: Propionic Acid and Derivatives. In: Ullmann's Encyclopedia of Industrial Chemistry, Seventh Edition, 2009 Electronic Release (ed. Fiedler E., Grossmann G., Kersebohm D., Weiss G. and Witte C.). 7 th Electronic Release Edition. Wiley InterScience, New York, Article Online Posting Date: June 15, 2000. Online-Version under: DOI: 10.1002/14356007.a22_223
  Uncertainty: Stoechiometric calculation
  properties: dry mass 1 kg, wet mass 1 kg
- electricity, medium voltage: 3.50721 kWh; source Gendorf 2000; lognormal variance with pedigree 0.076, pedigree (4,5,5,1,1)
  EcoSpold01Location=UCTE
  Estimation, assuming a default value, originated from calculation of avarage consumption of electricity and heat per kg of product (3.2 MJ kg-1), and a resulting amount of electricity of 0,333 kW for every reaction step per kg reaction product, considering that the demand is made up of a mix that inlcudes 38% electricity. Additionally, reaction steps are approximated with energy consumption data, assuming that inventory flows can be estimated using process data for basic operation steps, available for specific organic chemicals.
  Further references:
  Kim S., Overcash M.: Energy in chemical manufacturing processes: gate-to-gate information for life cycle assessment. In: Journal of Chemical Technology & Biotechnology vol. 78, no. 9: 995-1005(11). 2003
  Uncertainty: Estimation
- ethylene: 0.66416 kg; source Unger T A 1996; lognormal variance with pedigree 0.076, pedigree (4,5,5,1,1)
  Stoichiometric calculation, assuming an efficiency of 95% per reaction step.
  Further references:
  Samel et al. 2000. Ulf-Rainer Samel, Walter Kohler, Armin Otto Gamer, Ullrich Keuser: Propionic Acid and Derivatives. In: Ullmann's Encyclopedia of Industrial Chemistry, Seventh Edition, 2009 Electronic Release (ed. Fiedler E., Grossmann G., Kersebohm D., Weiss G. and Witte C.). 7 th Electronic Release Edition. Wiley InterScience, New York, Article Online Posting Date: June 15, 2000. Online-Version under: DOI: 10.1002/14356007.a22_223
  EcoSpold01Location=RER
  Uncertainty: Stoechiometric calculation
  properties: carbon content, fossil 0.857143, dry mass 1 kg, heating value, net 43.22 MJ, wet mass 1 kg
- heat, district or industrial, natural gas: 15.4082 MJ; source Gendorf 2000; lognormal variance with pedigree 0.076, pedigree (4,5,5,1,1)
  Estimation, assuming a default value, originated from calculation of avarage consumption of electricity and heat per kg of product (3.2 MJ kg-1), and a resulting amount of heat of 2 MJ for every reaction step per kg reaction product, considering that the demand is made up of a mix that includes 50% natural gas. Additionally, reaction steps are approximated with energy consumption data, assuming that inventory flows can be estimated using process data for basic operation steps, available for specific organic chemicals.
  Further references:
  Kim S., Overcash M.: Energy in chemical manufacturing processes: gate-to-gate information for life cycle assessment. In: Journal of Chemical Technology & Biotechnology vol. 78, no. 9: 995-1005(11). 2003
  Uncertainty: Estimation
  properties: heating value, net 1 MJ
- heat, district or industrial, other than natural gas: 8.60023 MJ; source Gendorf 2000; lognormal variance with pedigree 0.076, pedigree (4,5,5,1,1)
  Estimation, assuming a default value, originated from calculation of avarage consumption of electricity and heat per kg of product (3.2 MJ kg-1), and a resulting amount of heat of 2 MJ for every reaction step per kg reaction product, considering that the demand is made up of a mix that inlcudes 12% steam from external energy sources. Additionally, reaction steps are approximated with energy consumption data, assuming that inventory flows can be estimated using process data for basic operation steps, available for specific organic chemicals.
  Further references:
  Kim S., Overcash M.: Energy in chemical manufacturing processes: gate-to-gate information for life cycle assessment. In: Journal of Chemical Technology & Biotechnology vol. 78, no. 9: 995-1005(11). 2003
  Uncertainty: Estimation
  properties: heating value, net 1 MJ
- hydrochloric acid, without water, in 30% solution state: 0.18795 kg; source Unger T A 1996; lognormal variance with pedigree 0.076, pedigree (4,5,5,1,1)
  EcoSpold01Location=RER
  Stoichiometric calculation, assuming an efficiency of 100%.
  Further references:
  Samel et al. 2000. Ulf-Rainer Samel, Walter Kohler, Armin Otto Gamer, Ullrich Keuser: Propionic Acid and Derivatives. In: Ullmann's Encyclopedia of Industrial Chemistry, Seventh Edition, 2009 Electronic Release (ed. Fiedler E., Grossmann G., Kersebohm D., Weiss G. and Witte C.). 7 th Electronic Release Edition. Wiley InterScience, New York, Article Online Posting Date: June 15, 2000. Online-Version under: DOI: 10.1002/14356007.a22_223
  Uncertainty: Stoechiometric calculation
  properties: dry mass 1 kg, heating value, net 3.32 MJ, wet mass 1 kg
- hydrogen cyanide: 0.14799 kg; source Bauer W. 2009; lognormal variance with pedigree 0.076, pedigree (4,5,5,1,1)
  Stoichiometric calculation, assuming an efficiency of 95% per reaction step
  EcoSpold01Location=RER
  Uncertainty: Stoechiometric calculation
  properties: carbon content, fossil 0.444444, dry mass 1 kg, heating value, net 17.95 MJ, wet mass 1 kg
- hydrogen sulfide: 0.18636 kg; source Lange L. 2009; lognormal variance with pedigree 0.076, pedigree (4,5,5,1,1)
  (same comment as for acetone, liquid)
  properties: dry mass 1 kg, heating value, net 7.11 MJ, wet mass 1 kg
- inert waste, for final disposal: -0.60168 kg; lognormal variance with pedigree 0.036, pedigree (4,5,1,1,1)
  EcoSpold01Location=CH
  Stoichiometric calculation.
  Uncertainty: Stoechiometric calculation
  production volume
    Calculated from the production volume of dimethenamide in proportion to the respective output amounts.
  properties: dry mass 0.995 kg, water content 0.00502513, wet mass 1 kg
- methanol: 0.14286 kg; source Eller K. 2009; lognormal variance with pedigree 0.076, pedigree (4,5,5,1,1)
  Stoichiometric calculation, assuming an efficiency of 95% per reaction step.
  Further refrences:
  Kim et al. 2003. Kim S., Overcash M.: Energy in chemical manufacturing processes: gate-to-gate information for life cycle assessment. In: Journal of Chemical Technology & Biotechnology vol. 78, no. 9: 995-1005(11). 2003
  EcoSpold01Location=GLO
  Uncertainty: Stoechiometric calculation
  properties: carbon content, fossil 0.375, dry mass 1 kg, heating value, net 20 MJ, wet mass 1 kg
  note on heating value, net: Based on literature, page 533, Report 17: Jungbluth, N., Chudacoff, M., Dauriat, A., Dinkel, F., Doka, G., Faist Emmenegger, M., Gnansounou, E., Kljun, N., Schleiss, K., Spielmann, M., Stettler, C., Sutter, J. 2007: Life Cycle Inventories of Bioenergy. ecoinvent report No. 17, Swiss Centre for Life Cycle Inventories, Dübendorf, CH.
- propylene oxide, liquid: 0.27257 kg; source Eller K. 2009; lognormal variance with pedigree 0.076, pedigree (4,5,5,1,1)
  EcoSpold01Location=RER
  Stoichiometric calculation, assuming an efficiency of 95% per reaction step.
  Further refrences:
  Kim et al. 2003. Kim S., Overcash M.: Energy in chemical manufacturing processes: gate-to-gate information for life cycle assessment. In: Journal of Chemical Technology & Biotechnology vol. 78, no. 9: 995-1005(11). 2003
  Uncertainty: Stoechiometric calculation
  properties: carbon content, fossil 0.62069, dry mass 1 kg, heating value, net 31.32 MJ, wet mass 1 kg
- sodium hydroxide, without water, in 50% solution state: 1.5055 kg; source Lange L. 2009; lognormal variance with pedigree 0.076, pedigree (4,5,5,1,1)
  Stoichiometric calculation, assuming an efficiency of 100%.
  EcoSpold01Location=RER
  Uncertainty: Stoechiometric calculation
  properties: dry mass 1 kg, heating value, net 3.03 MJ, wet mass 1 kg
- sulfur: 0.06786 kg; source Kim S. 2003; lognormal variance with pedigree 0.076, pedigree (4,5,5,1,1)
  Stoichiometric calculation, assuming an efficiency of 95% per reaction step.
  EcoSpold01Location=RER
  Uncertainty: Stoechiometric calculation
  properties: dry mass 1 kg, wet mass 1 kg
- sulfur dioxide, liquid: 0.13572 kg; source Kim S. 2003; lognormal variance with pedigree 0.076, pedigree (4,5,5,1,1)
  (same comment as for acetone, liquid)
  properties: dry mass 1 kg, wet mass 1 kg
- sulfuric acid: 0.5103 kg; source Bauer W. 2009; lognormal variance with pedigree 0.076, pedigree (4,5,5,1,1)
  (same comment as for sulfur)
  properties: dry mass 1 kg, wet mass 1 kg
- water, decarbonised: 0.000165161, 0.172421, 0.00951868, 0.260108, 0.0524365 kg (5 suppliers, which the file names only by identifier); sum of these 0.49465 kg; source Unger T A 1996; lognormal variance with pedigree 0.076, pedigree (4,5,5,1,1)
  EcoSpold01Location=RER
  Stoichiometric calculation, assuming an efficiency of 100%.
  Further references:
  Samel et al. 2000. Ulf-Rainer Samel, Walter Kohler, Armin Otto Gamer, Ullrich Keuser: Propionic Acid and Derivatives. In: Ullmann's Encyclopedia of Industrial Chemistry, Seventh Edition, 2009 Electronic Release (ed. Fiedler E., Grossmann G., Kersebohm D., Weiss G. and Witte C.). 7 th Electronic Release Edition. Wiley InterScience, New York, Article Online Posting Date: June 15, 2000. Online-Version under: DOI: 10.1002/14356007.a22_223
  Bauer 2000. William Bauer Jr.: Methacrylic Acid and Derivatives. In: Ullmann's Encyclopedia of Industrial Chemistry, Seventh Edition, 2009 Electronic Release (ed. Fiedler E., Grossmann G., Kersebohm D., Weiss G. and Witte C.). 7 th Electronic Release Edition. Wiley InterScience, New York, Article Online Posting Date: June 15, 2000. Online-Version under: DOI: 10.1002/14356007.a16_441
  Stoichiometric calculation, assuming an efficiency of 100%.
  Further references:
  Samel et al. 2000. Ulf-Rainer Samel, Walter Kohler, Armin Otto Gamer, Ullrich Keuser: Propionic Acid and Derivatives. In: Ullmann's Encyclopedia of Industrial Chemistry, Seventh Edition, 2009 Electronic Release (ed. Fiedler E., Grossmann G., Kersebohm D., Weiss G. and Witte C.). 7 th Electronic Release Edition. Wiley InterScience, New York, Article Online Posting Date: June 15, 2000. Online-Version under: DOI: 10.1002/14356007.a22_223
  Bauer 2000. William Bauer Jr.: Methacrylic Acid and Derivatives. In: Ullmann's Encyclopedia of Industrial Chemistry, Seventh Edition, 2009 Electronic Release (ed. Fiedler E., Grossmann G., Kersebohm D., Weiss G. and Witte C.). 7 th Electronic Release Edition. Wiley InterScience, New York, Article Online Posting Date: June 15, 2000. Online-Version under: DOI: 10.1002/14356007.a16_441
  Uncertainty: Stoechiometric calculation
  properties: wet mass 1 kg

## Inputs from nature
- Water, cooling, unspecified natural origin [natural resource, in water]: 0.26263 m3; name water_cooling_UNO_input; source Gendorf 2000; lognormal variance with pedigree 0.076, pedigree (4,5,5,1,1)
  Estimation (24 kg cooling water per kg produced chemical per step).
  Uncertainty: Estimation

## Emissions to nature
- 2-Aminopropanol [air, urban air close to ground]: 0.00066967 kg; lognormal variance with pedigree 0.188, pedigree (4,5,5,5,5)
  Estimation, based on the assumption that 0.2% of volatile input materials is emitted to air occurring from the purge vent, the destillation vent and fugitive emission sources.
  Uncertainty: Estimation
- Acetic acid [air, urban air close to ground]: 6.1889e-5 kg; lognormal variance with pedigree 0.188, pedigree (4,5,5,5,5)
  (same comment as for 2-Aminopropanol)
- Acetone [air, urban air close to ground]: 0.00063582 kg; lognormal variance with pedigree 0.188, pedigree (4,5,5,5,5)
  (same comment as for 2-Aminopropanol)
- Ammonia [air, urban air close to ground]: 0.00015978 kg; lognormal variance with pedigree 0.218, pedigree (4,5,5,5,5)
  (same comment as for 2-Aminopropanol)
- Carbon dioxide, fossil [air, urban air close to ground]: 0.65771 kg; lognormal variance with pedigree 0.1786, pedigree (4,5,5,5,5)
  Estimation, based on the assumption that 0.2% of volatile input materials is emitted to air occurring from the purge vent, the destillation vent and fugitive emission sources. Remaining gases like CH4 or CO are oxidated to CO2. The carbon contained in the removed carbon compounds from wastewater treatment was accounted as CO2 emissions to air (assuming a removal efficiency of 90%).
  Uncertainty: Estimation
- Carbon monoxide, fossil [air, urban air close to ground]: 0.0013283 kg; lognormal variance with pedigree 0.798, pedigree (4,5,5,5,5)
  (same comment as for 2-Aminopropanol)
- Chlorine [air, urban air close to ground]: 0.00094597 kg; lognormal variance with pedigree 0.188, pedigree (4,5,5,5,5)
  (same comment as for 2-Aminopropanol)
- Ethylene [air, urban air close to ground]: 0.0013283 kg; lognormal variance with pedigree 0.188, pedigree (4,5,5,5,5)
  (same comment as for 2-Aminopropanol)
- Hydrogen [air, urban air close to ground]: 1.9787e-5 kg; lognormal variance with pedigree 0.188, pedigree (4,5,5,5,5)
  (same comment as for 2-Aminopropanol)
- Hydrogen sulfide [air, urban air close to ground]: 0.00037272 kg; lognormal variance with pedigree 0.188, pedigree (4,5,5,5,5)
  (same comment as for 2-Aminopropanol)
- Methanol [air, urban air close to ground]: 0.00028573 kg; lognormal variance with pedigree 0.188, pedigree (4,5,5,5,5)
  (same comment as for 2-Aminopropanol)
- Propionic acid [air, urban air close to ground]: 0.00081122 kg; lognormal variance with pedigree 0.188, pedigree (4,5,5,5,5)
  (same comment as for 2-Aminopropanol)
- Propylene oxide [air, urban air close to ground]: 0.00054514 kg; lognormal variance with pedigree 0.188, pedigree (4,5,5,5,5)
  (same comment as for 2-Aminopropanol)
- Sulfur dioxide [air, urban air close to ground]: 0.28434 kg; lognormal variance with pedigree 0.1786, pedigree (4,5,5,5,5)
  (same comment as for 2-Aminopropanol)
- Water [air, unspecified]: 0.101961 m3; name water_to_air_unspecified; = (water_decarbonised_input/1000*fraction_WDC_to_air)+(water_cooling_UNO_input*fraction_CW_to_air); lognormal variance with pedigree 0.0807, pedigree (2,2,5,1,1)
  Calculated value based on literature values and expert opinion. See comments in the parametres' comment field.
  property fraction, origin: fresh water 0.00187991; name fraction_origin_fresh_water
  property fraction, origin: salt water 0; name fraction_origin_salt_water
  property fraction, origin: unspecified 0.99812; name fraction_origin_unspecified
- 2-Aminopropanol [water, surface water]: 0.0016072 kg; lognormal variance with pedigree 0.448, pedigree (4,5,5,5,5)
  Estimation, assuming that the remaining amount of unreacted input materials leave the production process with the wastewater, wich is further treated in an internal wastewater plant. For the nitrogen containing compounds within the wastewater a removal efficiency of 50% was assumed. The nitrogen emitted to air (N2) is neglected.
  Uncertainty: Estimation
- Acetic acid [water, surface water]: 0.0030882 kg; lognormal variance with pedigree 0.448, pedigree (4,5,5,5,5)
  Estimation, assuming that the remaining amount of unreacted input materials leave the production process with the wastewater, wich is further treated in an internal wastewater plant.
  Uncertainty: Estimation
- Acetone [water, surface water]: 0.001526 kg; lognormal variance with pedigree 0.448, pedigree (4,5,5,5,5)
  (same comment as for Acetic acid)
- Ammonium [water, surface water]: 0.0019174 kg; lognormal variance with pedigree 0.188, pedigree (4,5,5,5,5)
  (same comment as for 2-Aminopropanol)
- Chloride [water, surface water]: 1.491 kg; lognormal variance with pedigree 0.448, pedigree (4,5,5,5,5)
  (same comment as for Acetic acid)
- Chloroacetyl chloride [water, surface water]: 0.0021435 kg; lognormal variance with pedigree 0.448, pedigree (4,5,5,5,5)
  (same comment as for Acetic acid)
- Ethylene oxide [water, surface water]: 0.003188 kg; lognormal variance with pedigree 0.448, pedigree (4,5,5,5,5)
  (same comment as for Acetic acid)
- Methanol [water, surface water]: 0.00068575 kg; lognormal variance with pedigree 0.448, pedigree (4,5,5,5,5)
  (same comment as for Acetic acid)
- Propionic acid [water, surface water]: 0.0019469 kg; lognormal variance with pedigree 0.448, pedigree (4,5,5,5,5)
  (same comment as for Acetic acid)
- Propylene oxide [water, surface water]: 0.0013083 kg; lognormal variance with pedigree 0.448, pedigree (4,5,5,5,5)
  (same comment as for Acetic acid)
- Sodium I [water, surface water]: 0.86568 kg; lognormal variance with pedigree 0.798, pedigree (4,5,5,5,5)
  (same comment as for Acetic acid)
- Sulfate [water, surface water]: 0.024994 kg; lognormal variance with pedigree 0.188, pedigree (4,5,5,5,5)
  (same comment as for Acetic acid)
- Sulfur [water, surface water]: 0.006786 kg; lognormal variance with pedigree 0.188, pedigree (4,5,5,5,5)
  (same comment as for Acetic acid)
- Water [water, unspecified]: 0.161164 m3; name water_to_water_unspecified; = (water_decarbonised_input/1000)*(1-fraction_WDC_to_air)+water_cooling_UNO_input*(1-fraction_CW_to_air); lognormal variance with pedigree 0.0807, pedigree (2,2,5,1,1)
  (same comment as for Water)
  property carbon content, fossil 0; name C_content_fossil
  property carbon content, non-fossil 0; name C_content_non_fossil
  property dry mass 0 kg; name DM
  property fraction, origin: fresh water 0.00187991; name fraction_origin_fresh_water_Ww
  property fraction, origin: salt water 0; name fraction_origin_salt_water_Ww
  property fraction, origin: unspecified 0.99812; name fraction_origin_unspecified_Ww
  property water in wet mass 1000 kg; name WWM
  property wet mass 1000 kg; name WM

## Sampling procedure
Literature data

## Review by Thomas Nemecek 2010-03-11
Passed.
none

## Review by Roland Hischier 2011-11-18
Transfer of documentation done.
