# trawler construction, steel

Dataset: EcoSpold 2, unit process
Geography: RoW
Time period: 2010-01-01 to 2023-12-31
Technology level: current
Classification: ISIC rev.4 ecoinvent: 0311:Marine fishing
Scenario: Business-as-Usual
System model: Allocation, cut-off by classification
Generated by: Angel Avadí
Published in: Avadí, A. 2018
Database: ecoinvent
isCopyrightProtected: true
accessRestrictedTo: 1

## General comment
This dataset represents the construction of steel trawlers, per 1000 kg of light ship weight, based on data from Peru (2004-3013), corresponding to 9 vessels (from a fleet of 54) for which data was avilable with different levels of detail. Specific data for specific inventory items may be based on sub-samples for which detailed data was available. Vessel dimensions: 34 - 275 m3 (16 - 34 m length).
System boundaries and relation between activities

## Included activities start
Construction of vessels, including provision of all materials and work

## Included activities end
Batteries are excluded, as they do not exist in the database

## Geography
Data from Peru, extrapolated to global (GLO)

## Technology
Peru features various shipyards and relevant ship-building and ship-retrofitting expertise.

## Reference product
- trawler, steel: 1 kg; name LSW; = hull+gear+copper+nylon+engine*1000+motors*1000+paint+struct_steel+rubber; source Angel Avadí 2017; By-product classification allocatable product; CPC 49315: Fishing vessels; factory ships and other vessels for processing or preserving fishery products; HS2017 890200: Fishing vessels, factory ships and other vessels; for processing or preserving fishery products
  Construction of a steel trawler, per 1000 kg of light ship weight (LSW). Regressions based on mainly primary data were created to relate the weight of each inventory item to a purse seiner's LSW, adjusted for trawler's gear. The list of inventory items (granularity) contribute >95% of environmental impacts, as described in the reference publication.
  production volume 0.997077 kg; name prod_vol
    Unquantifiable
  property lifetime 30 year; name LSW_lifetime
  property lifetime capacity [h] 48000 hour; name LSW_lifetime_capacity_PMH; = 8*200*LSW_lifetime
    8 h/d times 200 d/y times lifetime
  property price 0.518323 EUR2005
    Calculated based on inputs: The price of the product has been calculated as a sum of the values of the material and energy inputs for this product. This value is therefore a rough estimation. It may underestimate the real price since there are additional expenses when producing any product. These expences can include for example labour costs, treatment of waste materials and profit for the producer. Please consider carefully whether this level of data quality is acceptable for your application.
  properties: carbon allocation 0 kg, carbon content 0

## Inputs from technosphere
All rows: source Angel Avadí 2017
- alkyd paint, white, without solvent, in 60% solution state: 0.00503392 kg; triangular min 0.00432691, mostLikely 0.00517532, max 0.00559953, pedigree (2,5,4,3,2)
  Paint and antifouling
  Uncertainty: Data from 9 vessels
  properties: carbon content, fossil 0.140367, carbon content, non-fossil 0.199629, dry mass 1 kg, heating value, net 10.3 MJ, wet mass 1 kg
  note on carbon content, fossil: C content was calculated as an addition of C content in the raw materials.
- alkyd paint, white, without solvent, in 60% solution state: 0.00106041 kg; triangular min 0.000911479, mostLikely 0.0010902, max 0.00117956, pedigree (2,5,4,3,2)
  Paint and antifouling
  Uncertainty: Data from 9 vessels
- copper, cathode: 0.00950116 kg; = copper
  Copper wire for electric circuit construction, 50% recycled
  properties: dry mass 1 kg, wet mass 1 kg
- marine electric motor: 6.15428e-6 unit; name motors; triangular min 5.06056e-6, mostLikely 6.33599e-6, max 7.06628e-6, pedigree (2,5,4,5,2)
  Electric motors and pumps
  Uncertainty: Data from 9 vessels
  property lifetime 10 year; name motors_lifetime
  property lifetime capacity [h] 20000 hour; name motors_lifetime_capacity_PMH
- marine engine: 3.19703e-5 unit; name engine; triangular min 3.04509e-5, mostLikely 3.04509e-5, max 3.5009e-5, pedigree (2,5,4,5,2)
  Marine diesel engine
  Uncertainty: Data from 9 vessels
  property lifetime 15 year; name engine_lifetime
  property lifetime capacity [h] 8000 hour; name engine_lifetime_capacity_PMH
- metal working, average for steel product manufacturing: 0.00861199 kg
  Steel hull + transmission construction, structural elements
- nylon 6-6: 0.00339074 kg; triangular min 0.00251488, mostLikely 0.00300718, max 0.00465016, pedigree (2,3,2,5,1)
  Fishing gear construction
  Uncertainty: Data from 9 vessels
  properties: carbon content, fossil 0.637168, dry mass 1 kg, heating value, net 30.9 MJ, wet mass 1 kg
  note on heating value, net: Assumed equal to Nylon-66. Reference: Walters, R. N., Hackett, S. M. and Lyon, R. E. (2000) ‘Heats of combustion of high temperature polymers’, Fire and Materials, 24(5), pp. 245–252. doi: 10.1002/1099-1018(200009/10)24:5<245::AID-FAM744>3.0.CO;2-7.
- nylon 6-6: 0.00167455 kg; triangular min 0.001242, mostLikely 0.00148512, max 0.00229652, pedigree (2,3,2,5,1)
  Fishing gear construction
  Uncertainty: Data from 9 vessels
- reinforcing steel: 0.00861199 kg; name struct_steel; triangular min 0.00832763, mostLikely 0.00875417, max 0.00875417, pedigree (5,5,5,5,5)
  Steel hull + transmission construction, structural elements
  Uncertainty: Data from 9 vessels
  properties: carbon content, fossil 0.004, dry mass 1 kg, wet mass 1 kg
- steel, low-alloyed: 0.0263155 kg; name gear; triangular min 0.0132959, mostLikely 0.0194888, max 0.0461619, pedigree (2,3,2,5,1)
  Fishing gear construction
  Uncertainty: Data from 9 vessels
  properties: carbon content, fossil 0.005, dry mass 1 kg, wet mass 1 kg
- steel, low-alloyed, hot rolled: 0.904159 kg; name hull; triangular min 0.870384, mostLikely 0.916994, max 0.9251, pedigree (2,3,2,5,1)
  Steel hull, sheets
  Uncertainty: Data from 9 vessels
  properties: carbon content, fossil 0.005, dry mass 1 kg, wet mass 1 kg
  note on carbon content, fossil: Low alloyed steel composition given in Tab. 3.2 ecoinvent v2.2 report 10_partII. Steel assumed to have a C content of 0.5%
- synthetic rubber: 0.00212802 kg; name rubber; triangular min 0.00107624, mostLikely 0.00173666, max 0.00357116, pedigree (2,3,2,1,1)
  Fishing gear construction
  Uncertainty: Data from 9 vessels
  properties: carbon content, fossil 0.871949, dry mass 1 kg, heating value, net 26.42 MJ, wet mass 1 kg
  note on carbon content, fossil: EPDM (Ethylene-propene-diene terpolymer) rubber is a terpolymer of ethylene, propene, and a diene with the residual unsaturated portion of the diene in the side chain (ecoinvent v2.2 report 7-part XX & Ullmann). Chemical formula (deduced from Evidences of Solvent-Induced Miscibility in Polychloroprene-co-Ethylene-Propene Diene Terpolymer Blends, Dubey et al., Journal of Applied Polymer Science, 2009, 111:1884–1891): C20H35
- used trawler, steel: -1 kg; name EOL; = LSW
  EOL of a steel trawler, per 1000 kg of light ship weight (LSW), at the end of its lifetime. Regressions based on mainly primary data were created to relate the weight of each inventory item to a purse seiner's LSW, adjusted for trawler's gear. The list of inventory items (granularity) contribute >95% of environmental impacts, as described in the reference publication. Includes engines and motors
  production volume; = ABS(prod_vol*EOL/LSW)
    Calculated from production volume of reference product using the relative outputs.
  property carbon content, fossil 0.0100447; name EOL_C_content_fossil; = 0.005*99.28%+0.63717*0.51%+0.87195*0.21%
  property carbon content, non-fossil 0.00121774; name EOL_C_content_non_fossil; = 0.19963*0.61%
  property dry mass 1 kg; name EOL_DM
  property water content 0; name EOL_water_content
  property water in wet mass 0 kg; name EOL_WWM
  property wet mass 1 kg; name EOL_WM
  note on carbon content, fossil: Calculated from the fossil carbon content of the hull and gear materials, multiplied by their relative proportions
  note on carbon content, non-fossil: Calculated from the fossil carbon content of thepaint, multiplied by its relative proportion
- wire drawing, copper: 0.00950116 kg; name copper; triangular min 0.00896464, mostLikely 0.00968793, max 0.00985092, pedigree (2,3,3,5,2)
  Manufacture of copper wire
  Uncertainty: Based on 8 different estimations based on reports, shipyard work orders, invoices, etc.
