# anchovy, capture by steel purse seiner and landing whole, fresh

Dataset: EcoSpold 2, unit process
Geography: RoW
Time period: 2010-01-01 to 2023-12-31
Technology level: current
Classification: ISIC rev.4 ecoinvent: 0311:Marine fishing
Scenario: Business-as-Usual
System model: Allocation, cut-off by classification
Generated by: Angel Avadí
Published in: Avadí, A. 2018
Database: ecoinvent
isCopyrightProtected: false
accessRestrictedTo: 1

## General comment
This activity represents capture and landing of anchovy species (Engraulis spp.) by steel purse seiners. The life cycle inventories were produced based on a large representative sample of Peruvian and Spanish vessels and their activities.
System boundaries and relation between activities

## Included activities start
From vessel use and maintenance phases, including all upstream activities

## Included activities end
Port landing operations are excluded from the system boundary.

## Geography
Anchovy species (Engraulis spp.) is captured in different parts of the world, including the Cantabrian Sea and the West South American Coast

## Technology
Current technology deployed includes purse seining and advanced fish detection equipment, including satellital data.

## Time period
Data corresponds to the landings-weighted average of annual operations in anchovy (Engraulis spp.) fisheries between 2006 and 2016.

## Parameters
- annual landings per vessel: 7.657e6 kg; name landings_vessel_year; lognormal variance with pedigree 0.078767, pedigree (1,1,1,1,1)
  Average annual landings per individual vessel
  Uncertainty: Based on 561 datapoints on annual landings and fuel consumption from 316 vessels in 2008-2010
- average_weight_seiner: 167000 kg; name WeightSeiner
- lifetime: 35 year
- marine fuel use efficiency: 16.6 kg; name FUE; lognormal variance with pedigree 0.018104, pedigree (1,1,1,1,1)
  Amount of marine fuel consumed per landed unit of fish
  Uncertainty: Based on 561 datapoints on annual landings and fuel consumption from 316 vessels in 2008-2010
- net calorific value: 42.7 MJ/kg; name net_cal_value; triangular min 41.4, mostLikely 42.7, max 43.3, pedigree (3,5,3,5,5)
  Net calorific value of marine diesel oil (MDO)
  Uncertainty: Most likely value from Wild (2005) Determination of energy cost of electrical energy on board sea-going vessels: "The net calorific value of marine diesel oil (MDO) and marine gas oil (MGO) is 42,700 kJ/kg". Uncertainty data from 2006 IPCC Guidelines for National Greenhouse Gas Inventories, Vol 1, Table 1.2 Default net calorific values (NCVs) and lower and upper limits of the 95 percent confidence intervals (data for Gas/Diesel Oil)

## Reference product
- landed anchovy, fresh: 1 kg; name landed; source Pierre Fréon 2014; By-product classification allocatable product; CPC 04261: Other wild pelagic fish, live, fresh or chilled; HS2017 030242: Fish; fresh or chilled, anchovies (Engraulis spp.), excluding fillets, fish meat of 0304, and edible fish o[...]
  Fresh whole European anchovy (Engraulis encrasicolus) captured in the Cantabrian Sea within the Spanish EEZ and landed for fresh consumption and canning. The values is calculated as a weighted average from the two regional activities in Peru and Spain. Production volume was used as weight. Peruvian PV: 4212000000 kg, Spanish PV: 7000000 kg.
  production volume 5.781e9 kg; name ProdVol
    Engraulis rigens (Peruvian anchoveta) is the most landed fish species in the world. With annual landings as high as 7 or 8 million metric tons. Japanese anchovy (Engraulis japonicus) is another highly relevant ancho species (over 1.5 million metric tons landed annually. Other highly landed anchovy species include European anchovy (Engraulis encrausicolus) or Californian anchovy (Engraulis mordax). Therefore, a proxy of 10 million metric tons landed annually has been modelled, although this value is highly variable depending mainly on the performance of the Peruvian anchoveta stock.
  property ash content 0.02 kg; name anch_ash
    http://frida.fooddata.dk/ShowFood.php?foodid=1121&2
  property carbon content, non-fossil 0.481541; = (1-anch_protein-anch_fat-anch_ash)*0.444+anch_protein*0.535+anch_fat*0.774
    Calculated from C_content = polysaccharids*0.444+protein*0.535+lipids*0.774 and polysaccharids = 1-(protein+lipids+ash)
  property fat content 0.088; name anch_fat
    Data for Peruvian anchovies
  property price 0.539258 EUR2005
    Calculated value based on data from United Nations Commodity Trade Statistics Database (comtrade.un.org). UN comtrade category: 30242 Fish; fresh or chilled, anchovies (Engraulis spp.), excluding fillets, livers, roes, and other fish meat of heading 0304. Year 2014. Using exchange rate of 1EURO = 1.209 USD. Average of price of import into 3 main markets (EU, US and CN).
  property protein content 0.191; name anch_protein
    Data for Peruvian anchovies
  properties: allocation factor 0.998567, carbon allocation 0.126173 kg, carbon content 0.481541, dry mass 0.26202 kg, energy content 7.9 MJ, true value 539.258, water content 2.81651, water in wet mass 0.73798 kg, wet mass 1 kg

## Inputs from technosphere
- antifouling paint emissions: -1.31016e-5 kg; name BP_amount_2; source Pierre Fréon 2014; triangular min -1.96523e-5, mostLikely -1.21657e-5, max -7.48661e-6, pedigree (1,1,1,5,1)
  Mass of solids from antifouling paint. Two thirds of applied is emitted to ocean. The values is calculated as a weighted average from the two regional activities in Peru and Spain. Production volume was used as weight. Peruvian PV: 4212000000 kg, Spanish PV: 7000000 kg.
  Uncertainty: Data from a sample of 22 vessels. Table 1 in "Fréon et al (2014) Life cycle assessment of the Peruvian industrial anchoveta fleet: boundary setting in life cycle inventory analyses of complex and plural means of production"
  production volume; = (ProdVol* BP_amount_2)
    10.4 g antifouling solids per landed t, 5.5 million t landed per year in 2008-2010. 82% landed by steel vessels
  properties: carbon content, fossil 0.21, carbon content, non-fossil 0.21, dry mass 1 kg, wet mass 1 kg
- diesel, burned in fishing vessel: 0.730683 MJ; source Pierre Fréon 2014
  Landings-weighted average fuel use efficiency. Uncertainty data for fuel use efficiency described in the parameter definition. The values is calculated as a weighted average from the two regional activities in Peru and Spain. Production volume was used as weight. Peruvian PV: 4212000000 kg, Spanish PV: 7000000 kg.
- lubricating oil: 8.40456e-5 kg; name oil; source Pierre Fréon 2014; triangular min 6.15878e-5, mostLikely 7.52118e-5, max 0.000115337, pedigree (1,1,2,5,1)
  Lubricating oil for vessel engine. The values is calculated as a weighted average from the two regional activities in Peru and Spain. Production volume was used as weight. Peruvian PV: 4212000000 kg, Spanish PV: 7000000 kg.
  Uncertainty: Data from a sample of 24 vessels. Table 1 in "Fréon et al (2014) Life cycle assessment of the Peruvian industrial anchoveta fleet: boundary setting in life cycle inventory analyses of complex and plural means of production"
  property carbon content, fossil 0.75; name oil_CCF
  properties: dry mass 1 kg, heating value, net 40.2 MJ, wet mass 1 kg
  note on carbon content, fossil: Lubricating oil is produced from diesel. C-content/dry mass of fats and oils considered 75%, from: ecoinvent v2.2 report, n 15a, pg 40
  note on heating value, net: Literature value, Source: IPCC 2006, 2006 IPCC Guidelines for National Greenhouse Gas Inventories, Prepared by the National Greenhouse Gas Inventories Programme, Eggleston H.S., Buendia L., Miwa K., Ngara T. and Tanabe K. (eds). Published: IGES, Japan
- operation, reefer, freezing: 0.000643047 kg*day
  Ice consumed for 1000 kg of landed anchovy on board. The values is calculated as a weighted average from the two regional activities in Peru and Spain. Production volume was used as weight. Peruvian PV: 4212000000 kg, Spanish PV: 7000000 kg.
- purse seiner maintenance, steel: 0.00193735 kg; source Pierre Fréon 2014
  Maintenance of a purse seiner, per 1000 kg of light ship weight (LSW) over 35 years lifetime. Regressions based on mainly primary data were created to relate the weight of each inventory item to a purse seiner's LSW. The list of inventory items (granularity) contribute >95% of environmental impacts, as described in the reference publication. The values is calculated as a weighted average from the two regional activities in Peru and Spain. Production volume was used as weight. Peruvian PV: 4212000000 kg, Spanish PV: 7000000 kg.
- purse seiner, steel: 0.00193735 kg; source Pierre Fréon 2014
  Construction of a purse seiner, per 1000 kg of light ship weight (LSW). Regressions based on mainly primary data were created to relate the weight of each inventory item to a purse seiner's LSW. The list of inventory items (granularity) contribute >95% of environmental impacts, as described in the reference publication. The values is calculated as a weighted average from the two regional activities in Peru and Spain. Production volume was used as weight. Peruvian PV: 4212000000 kg, Spanish PV: 7000000 kg.
  property lifetime 35 year; name lifetime
  properties: lifetime capacity [h] 56000 hour
- waste mineral oil: -7.87194e-7, -8.32584e-5 kg (2 suppliers, which the file names only by identifier); sum of these -8.40456e-5 kg; source Pierre Fréon 2014
  Waste lubricating oil treated inland. The values is calculated as a weighted average from the two regional activities in Peru and Spain. Production volume was used as weight. Peruvian PV: 4212000000 kg, Spanish PV: 7000000 kg.
  production volume; = ProdVol* BP_amount_1
    Based on GDP to avoid distortions linked to different levels of efficiency in vessels
  properties: carbon content, fossil 0.75, dry mass 0.9 kg, heating value, net 34.7 MJ, water content 0.111111, wet mass 1 kg
  note on carbon content, fossil: Tab A.6, ecoinvent v2.2 report 13_I. C content has been calculated after data in the tables, and then referred to 1 kg DM
  note on heating value, net: Value taken from the general comment of the treatment dataset.

## Inputs from nature
- Fish, pelagic, in ocean [natural resource, biotic]: 1.03989 kg; name captured; source Pierre Fréon 2014; triangular min 1.01687, mostLikely 1.03989, max 1.06291, pedigree (2,1,2,5,1)
  Fish captured, including discards. The values is calculated as a weighted average from the two regional activities in Peru and Spain. Production volume was used as weight. Peruvian PV: 4212000000 kg, Spanish PV: 7000000 kg.
  Uncertainty: Data from Torrejón J, Díaz E Limache J (2012) Descarte por exceso de captura en la pesquería del stock norte-centro de la anchoveta peruana (Engraulis ringens J.) entre el 2005 – 2011 (Discards due to overfishing in the Peruvian anchoveta north-central stock in 2005-2011). In: Indacochea A (ed) Libro de resúmenes digital. III
  CONCIMAR Congreso de Ciencias del Mar del Perú (p361) Retrieved from http://concimarperu2012.com/
  property ash content 0.015 kg; name fishp_ash
  property fat content 0.07; name fishp_fat
  property protein content 0.179; name fishp_protein

## Emissions to nature
- Discarded fish, pelagic, to ocean [water, ocean]: 0.0391709 kg; source Pierre Fréon 2014
  Pelagic fish discarded by fisheries. Based on Vázquez-Rowe et al. (2011) in Marine Policy, a 3.2% discard rate was assumed for this fishery. The values is calculated as a weighted average from the two regional activities in Peru and Spain. Production volume was used as weight. Peruvian PV: 4212000000 kg, Spanish PV: 7000000 kg.
  property ash content 0.015 kg; name discardsp_ash
  property fat content 0.07; name discardsp_fat
  property protein content 0.179; name discardsp_protein

## Extrapolations
Valid for all GLO: extraploated from PE and ES, uncertainty adjusted accordingly.
