# palladium to generic market for metal catalyst for catalytic converter

Dataset: EcoSpold 2, unit process
Geography: GLO
Time period: 2019-01-01 to 2023-12-31
Technology level: current
Classification: ISIC rev.4 ecoinvent: 2420:Manufacture of basic precious and other non-ferrous metals
Scenario: Business-as-Usual
System model: Allocation, cut-off by classification
Generated by: David FitzGerald
Database: ecoinvent
isCopyrightProtected: true
accessRestrictedTo: 1

## General comment
This activity links palladium to the generic market for metal catalyst for catalytic converter. All metals that enter this market provide the function of a metal catalyst for use in a catalytic converter.
The product "metal catalyst for catalytic converter" should be used only in cases where the specific metal catalyst is not known. Three metals are commonly used as metal catalysts in catalytic converters: palladium, platinum and rhodium. Their function is to reduce the amount of toxic exhaust emissions from the combustion of fuels.

## Included activities start
The activity starts with the reception of palladium.

## Included activities end
The activity ends with the renaming of palladium to a generic metal catalyst, which supplies the market for metal catalyst for catalytic converter. As this is a renaming activity, no other inputs or outputs are included.

## Reference product
- metal catalyst for catalytic converter: 1 kg; By-product classification allocatable product; CPC 41350: Base metals clad with silver, and base metals, silver or gold clad with platinum, not further worked than semi[…]; HS2017 870810: Vehicles; bumpers and parts thereof, for the vehicles of heading no. 8701 to 8705
  production volume 195000 kg
    The worldwide use of palladium in catalytic converters amounted to 195000 kg in 2016 (USGS 2018).
    Reference:
    USGS (2018) 2016 Minerals Yearbook, Platinum-Group Metals. U.S. Department of the Interior, U.S. Geological Survey.
  property price 11835.9 EUR2005
    Calaced as the weighted arithmetic mean of prices for rhodium, palladium and platinum, where their respective annual global production volumes are used as weights
  properties: carbon allocation 0 kg, carbon content 0, carbon content, fossil 0, carbon content, non-fossil 0, dry mass 1 kg, water content 0, water in wet mass 0 kg, wet mass 1 kg

## Inputs from technosphere
- palladium: 1 kg
  properties: dry mass 1 kg, wet mass 1 kg
