# hake, capture by trawler and landing whole, fresh

Dataset: EcoSpold 2, unit process
Geography: PE
Time period: 2010-01-01 to 2023-12-31
Technology level: current
Classification: ISIC rev.4 ecoinvent: 0311:Marine fishing
Scenario: Business-as-Usual
System model: Allocation, cut-off by classification
Generated by: Angel Avadí
Published in: Avadí, A. 2018
Database: ecoinvent
isCopyrightProtected: false
accessRestrictedTo: 1

## General comment
This activity represents capture and landing of the demersal Peruvian hake (Merluccius gayi peruanus) by trawling. The life cycle inventories were produced based on a representative sample of Peruvian vessels and their activity in the Peruvian EEZ: from a sample of 9 vessels in 2006-2010, hake landings by Peruvian steel vessels (70 trawlers) were characterised. The activity may be used as proxy for other mid-water trawling of demersal species. The Peruvian industrial fleet targets Peruvian hake, one of the two sub-species of the South Pacific hake. Annual landings < 50 000 t. The Peruvian hake fishery is composed of an industrial fleet, nearly mono-specific, and a small-scale fleet also targeting other demersal species. Historically, the industrial trawling fleet consisted of three sub-fleets, namely coastal trawlers (32.6–142 m3 holding capacity), medium-sized trawlers (142–425 m3 holding capacity) and large trawlers (>425 m3 holding capacity), all of which utilised off-board produced ice to preserve the fish. Today, mainly coastal trawlers and a handful of medium sized trawlers remain in the fishery. Trawling sets take place at different bottom depths.As of 2012 and according to Ministry of Production (PRODUCE) statistics, the fleet nominally consisted of ~70 vessels, yet the actual number of operating vessels has diminished from 46 in 2008 to 19 in 2012, 10 of which were responsible for the bulk of landings (IMARPE data). The industrial hake fleet concentrates in the area of Paita (5° S), in Northern Peru, which is historically the area of greater resource concentration.
System boundaries and relation between activities

## Included activities start
From the vessel use (including landing) and maintenance phases, including all upstream activities

## Geography
Peruvian hake (Merluccius gayi peruanus), is captured in the Peruvian EEZ.

## Technology
Mid-water trawling, fish conservation with ice.

## Time period
Data corresponds to the landings-weighted average of annual opperation for 2006 and 2010.

## Parameters
- annual landings per vessel: 1.68496e6 kg; name landings_vessel_year; triangular min 518296, mostLikely 1.68496e6, max 4.53279e6, pedigree (1,4,1,1,1)
  Amount of landings per vessel per year
  Uncertainty: Based on 32 datapoints from 9 vessels in 2006-2010
- light ship weight: 101000 kg; name Weight_vessel
  Weight of the vessel without any load or fishing tackle
- marine fuel use efficiency: 120 kg; name FUE; triangular min 72, mostLikely 120, max 168, pedigree (2,4,1,1,1)
  Amount of marine fuel consumed per landed unit of fish
  Uncertainty: Based on 32 datapoints from 9 vessels in 2006-2010. Expressed in kg/t.
- net calorific value: 42.7 MJ/kg; name net_cal_value; triangular min 41.4, mostLikely 42.7, max 43.3, pedigree (3,5,3,5,5)
  Net calorific value of marine diesel oil (MDO)
  Uncertainty: Most likely value from Wild (2005) Determination of energy cost of electrical energy on board sea-going vessels: "The net calorific value of marine diesel oil (MDO) and marine gas oil (MGO) is 42,700 kJ/kg". Uncertainty data from 2006 IPCC Guidelines for National Greenhouse Gas Inventories, Vol 1, Table 1.2 Default net calorific values (NCVs) and lower and upper limits of the 95 percent confidence intervals (data for Gas/Diesel Oil)

## Reference product
- demersal fish, fresh: 1 kg; name bycatch; source Angel Avadí 2017; By-product classification allocatable product; CPC 04241: Wild fish of Gadiformes, live, fresh or chilled; HS2017 030259: Fish; fresh or chilled, n.e.c. in item no. 0302.5, excluding fillets, fish meat of 0304, and edible fish of[...]
  Eastern Pacific Ocean (EPO) demersal biomass removed from ocean
  production volume 2.64894e6 kg; = ABS(prod_vol*bycatch/landed)
    6% of hake landings
  property ash content 0.015 kg; name hakebc_ash
    Ash content of fish is between 1-2% of the edible portion, http://www.fao.org/wairdocs/tan/x5916e/x5916e01.htm
  property carbon content, non-fossil 0.466681; name bycatch_C_content_non_fossil; = (1-hakebc_protein-bycatch_fat_content-hakebc_ash)*0.444+hakebc_protein*0.535+bycatch_fat_content*0.774
    Calculated from C_content = polysaccharids*0.444+protein*0.535+lipids*0.774 and polysaccharids = 1-(protein+lipids+ash)
  property dry mass 0.56397 kg; name bycatch_DM
  property energy content 3.914 MJ; name bycatch_energy_content
    Average of 15 demersal fish species, http://www.fao.org/wairdocs/tan/x5916e/x5916e01.htm
  property fat content 0.039; name bycatch_fat_content
    Average of 15 demersal fish species, http://www.fao.org/wairdocs/tan/x5916e/x5916e01.htm
  property price 0.539258 EUR2005
    Calculated value based on data from United Nations Commodity Trade Statistics Database (comtrade.un.org). UN comtrade category: 30242 Fish; fresh or chilled, anchovies (Engraulis spp.), excluding fillets, livers, roes, and other fish meat of heading 0304. Year 2014. Using exchange rate of 1EURO = 1.209 USD. Average of price of import into 3 main markets (EU, US and CN).
  property protein content 0.181; name hakebc_protein
    Average of 15 demersal fish species, http://www.fao.org/wairdocs/tan/x5916e/x5916e01.htm
  property water content 0.77316; name bycatch_water_content
  property water in wet mass 0.43603 kg; name bycatch_WWM
  property wet mass 1 kg; name bycatch_WM
  properties: allocation factor 0.0285786, carbon allocation 0.263194 kg, carbon content 0.466681, true value 32.3555

## Inputs from technosphere
- antifouling paint emissions: -0.000361996 kg; name antif; source Pierre Fréon 2014; triangular min -0.000399332, mostLikely -0.000370113, max -0.000316544, pedigree (3,3,1,1,1)
  Mass of solids from antifouling paint
  Uncertainty: Estimations on emissions and assumptions on the paint ingredients
  production volume; = ABS(prod_vol*antif/landed)
    Calculated from production volume of reference product using the relative outputs.
  property dry mass 1 kg; name antif_DM
  property water content 0; name antif_water_content
  property water in wet mass 0 kg; name antif_WWM
  property wet mass 1 kg; name antif_WM
- diesel, burned in fishing vessel: 2.44062 MJ; = FUE*net_cal_value; source Angel Avadí 2017
  Combustion of diesel in marine engines. Average diesel use and combustion used for all energy needs onboard.
- lubricating oil: 5.23942e-5 kg; name oil; source Angel Avadí 2017; triangular min 3.81048e-5, mostLikely 5.23942e-5, max 6.66835e-5, pedigree (1,3,2,1,1)
  Lubricating oil for vessel engine
  Uncertainty: Monthly data for 9 vessels over 2006-2010
  properties: carbon content, fossil 0.75, dry mass 1 kg, heating value, net 40.2 MJ, wet mass 1 kg
  note on carbon content, fossil: Lubricating oil is produced from diesel. C-content/dry mass of fats and oils considered 75%, from: ecoinvent v2.2 report, n 15a, pg 40
  note on heating value, net: Literature value, Source: IPCC 2006, 2006 IPCC Guidelines for National Greenhouse Gas Inventories, Prepared by the National Greenhouse Gas Inventories Programme, Eggleston H.S., Buendia L., Miwa K., Ngara T. and Tanabe K. (eds). Published: IGES, Japan
- operation, reefer, freezing: 0.285786 kg*day; source Angel Avadí 2017; triangular min 0.257208, mostLikely 0.285786, max 0.314365, pedigree (4,3,2,1,1)
  Proxy for ice used in fish preservation: 0.6 kg ice/kg fish
  Uncertainty: Uncertainty data unavailable, 10% difference considered
- trawler maintenance, steel: 0.000951701 kg; = Weight_vessel/(landings_vessel_year*lifetime)*1000; source Angel Avadí 2017
  Maintenance of a trawler, per 1000 kg of light ship weight (LSW) over 35 years lifetime. Regressions based on mainly primary data were created to relate the weight of each inventory item to a trawler's LSW. The list of inventory items (granularity) contribute >95% of environmental impacts, as described in the reference publication.
- trawler, steel: 0.000951701 kg; = Weight_vessel/(landings_vessel_year*lifetime)*1000; source Angel Avadí 2017
  Construction of a trawler, per 1000 kg of light ship weight (LSW). Regressions based on mainly primary data were created to relate the weight of each inventory item to a trawler's LSW. The list of inventory items (granularity) contribute >95% of environmental impacts, as described in the reference publication.
  property lifetime 30 year; name lifetime
  properties: lifetime capacity [h] 48000 hour
- waste mineral oil: -5.23942e-5 kg; = oil; source Avadí, A. 2018
  Spent lubricating oil treated inland
  production volume; = ABS(prod_vol*oil/landed)
    Calculated from production volume of reference product using the relative outputs.
  properties: carbon content, fossil 0.864444, dry mass 0.9 kg, heating value, net 34.7 MJ, water content 0.111111, wet mass 1 kg
  note on carbon content, fossil: Tab A.6, ecoinvent v2.2 report 13_I. C content has been calculated after data in the tables, and then referred to 1 kg DM
  note on heating value, net: Value taken from the general comment of the treatment dataset.

## Inputs from nature
- Fish, demersal, in ocean [natural resource, biotic]: 0.547757 kg; = landed+bycatch+discards; source Angel Avadí 2017
  Peruvian hake (TL = 4.4 ± 0.6) biomass removed from ocean
  property ash content 0.015 kg; name fishd_ash
  property fat content 0.039; name fishd_fat
  property protein content 0.181; name fishd_protein

## Emissions to nature
- Discarded fish, demersal, to ocean [water, ocean]: 0.0714466 kg; name discards; source Angel Avadí 2017; triangular min 0.0476311, mostLikely 0.0714466, max 0.0952621, pedigree (3,3,2,1,1)
  Fish caught and discarded to ocean
  Uncertainty: Data based on expert opinions, as no detailed records exist
  property ash content 0.015 kg; name discardsd_ash
  property carbon content, non-fossil 0.466681; name discards_C_content_non_fossil; = (1-discardsd_protein-discards_fat_content-discardsd_ash)*0.444+discardsd_protein*0.535+discards_fat_content*0.774
  property dry mass 0.56397 kg; name discards_DM
  property energy content 3.914 MJ; name discards_energy_content
  property fat content 0.039; name discards_fat_content
  property protein content 0.181; name discardsd_protein
  property water content 0.77316; name discards_water_content
  property water in wet mass 0.43603 kg; name discards_WWM
  property wet mass 1 kg; name discards_WM

## Sampling procedure
13 vessels out of 107, over two years of operations. Sample belongs to a single company, representative of national operations. Peruvian data.
