# fibre-reinforced concrete production, steel

Dataset: EcoSpold 2, unit process
Geography: BR
Time period: 2016-01-01 to 2023-12-31
Technology level: current
Classification: ISIC rev.4 ecoinvent: 2395:Manufacture of articles of concrete, cement and plaster
Classification: EcoSpold01Categories: construction materials/concrete
Synonyms: ready-mix concrete; ready mixed concrete; fibre-reinforced concrete
Scenario: Business-as-Usual
System model: Allocation, cut-off by classification
Share of production covered: 1.67 %
Generated by: Gustavo Moraga
Published in: Silva, F. B. 2017
Database: ecoinvent
isCopyrightProtected: true
accessRestrictedTo: 1

## General comment
The dataset represents the production of fibre-reinforced concrete used for the production of industrial floor in Brazil. This concrete contains discrete long steel fibres acting as the reinforcement material for structural strength. This concrete has a compressive strength (fck) of 35 MPa. The production considers ready-mix concrete with blended cement (cement, limestone 6-10%). Ingredients for 1 m³: cement 357 kg, water 200 kg, gravel 913 kg, sand 724 kg, polyfunctional admixture 3,57 kg, steel long fibre 25 kg.
Fibre reinforcement is employed replacing totally or partially the conventional structural reinforcement in concrete industrial floors, road pavements, and tunnel linings. Fiber serves as bridge transferring the stress in the concrete cracks, acting as structural reinforcement (FIGUEIREDO; CECCATO, 2015). Fibres also reduce water bleeding, reducing concrete permeability. Even improving concretes properties, the market for fibre-reinforced concrete is small compared to ordinary concrete. The world consumption of fibres in concrete is estimated to be 300,000 tons (MEHTA; MONTEIRO, 2006).
Data for the concrete ingredients, but fibre content, were taken from one company with low representativeness in Brazil for industrial floor applications. The fibre incorporation is made by the client at the construction site in different proportions; since small fibre content does not affect the dosage of other concretes ingredients.
The fibre content was estimated from technical bibliography data. For fiber content lower than 50 kg/m3, concrete compressive strength is not affected and concrete workability is minimally influenced (FIGUEIREDO et al., 2006). Other data for the life cycle inventory were extrapolated from concrete production, 25MPa, with cement blast furnace slag 6-34%/BR (accessed 20171120) and concrete production, 25 MPa, RNA only/GLO (accessed 10.10.2017).
Reinforced steel is used as a proxy for steel fibre reinforcement.
The dataset represents the production of fresh concrete. If necessary (e.g. when the delivery truck covers great distance or traffic), part of the water can be stored in a reservoir within the truck to be added in the construction site, for consistency adjustment. In those cases, a rigorous control system must be established to document the amount of water added at the dosing central and at the construction site, to avoid surpassing the amount predicted in the mix. Exchange properties are declared for the fresh concrete. Concrete dry mass considers the amount of water that reacts with cement to form hydrates. As a consequence, this dataset is not water balanced according to ecoinvent guidelines.
FIGUEIREDO, A.; CECCATO, M. Workability Analysis of Steel Fiber Reinforced Concrete Using Slump and Ve-Be Test. Materials Research, v. 18, n. 6, p. 1284-1290, 2015
FIGUEIREDO, A.; et al. Mix design method of steel fiber reinforced concrete for pavements. Proceedings of the 48o Brazilian Congress of Concrete. Rio de Janeiro: IBRACON, 2006
MEHTA, P.; MONTEIRO, P. Concrete: microstructure, properties, and materials. 3. ed. New York, US: McGraw-Hill, 2006

## Included activities start
From reception of raw materials at the ready-mix plant gate.

## Included activities end
This activity ends before the delivery of concrete at the construction site.
The dataset includes the whole manufacturing processes to produce ready-mixed concrete, internal processes (material handling and mixing) and infrastructure. It includes fiber addition, although it happens in the construction site.

## Geography
The mix design is based on Brazilian data; the fiber content is an estimation from several Brazilian bibliographic sources.
For some exchanges GLO values in the dataset concrete production, 25 MPa, RNA only/GLO (accessed 10.10.2017) have been used as a proxy. Data quality indicators adjusted accordingly.

## Technology
Technology existent for fibre-reinforced concrete production in Brazil, for industrial floors only.

## Time period
The mix designs are from 2017; literature data are estimated from different years.

## Parameters
- losses: 0.038 dimensionless
  Literature value. Losses due to returned concrete from construction sites.

## Reference product
- fibre-reinforced concrete, steel: 1 m3; name rer; By-product classification allocatable product; CPC 37510: Non-refractory mortars and concretes; HS2017 6810: Cement, concrete or artificial stone; whether or not reinforced, articles thereof
  production volume 68152.1 m3; name PV; = 2271735*0,03
    Estimated value. Production volume and proportion per strength class derived from a report published by the Brazilian Association for Portland cement in 2013. Production volumes adjusted to 2016 based on more recent data for cement consumption from ABCP. Proportion of steel fiber reinforced concrete in relation to total ready-mix concrete from three experts" opinion.
  property cement content 357 kg; name cement
  property fibre content 25 kg; name fibre
  property gravel content 997 kg; name gravel
  property price 185 EUR2005
    Calculated value based on data from United Nations Commodity Trade Statistics Database (comtrade.un.org). UN comtrade category: 681019 Tiles & flagstones of cement, concrete, artificial ston. Year 2005. Using exchange rate of 1EURO = 1.209 USD. Average of price of import into 5 main markets (EU, US, JP, IN and CN).
  property sand content 724 kg; name sand
  property wet mass 2307 kg; name concrete_density
  properties: carbon allocation 0 kg, carbon content 0, carbon content, fossil 0, carbon content, non-fossil 0, dry mass 2189 kg, water content 0.0539059, water in wet mass 118 kg

## Inputs from technosphere
- cement, CP II-F: 370.566 kg; = cement*(1+losses); lognormal variance with pedigree 0.0206, pedigree (2,5,3,1,1)
  Measured value. Based on one company fiber-reinforced concrete mix design for industrial floor (35 MPa).
  Uncertainty: V
  properties: dry mass 1 kg, wet mass 1 kg
- chemical, organic: 3.70566 kg; = 3.57*(1+losses); lognormal variance with pedigree 0.0206, pedigree (2,5,3,1,1)
  Measured value. "Chemical organic" is used as a proxy for polyfunctional admixture. Based on one company fiber-reinforced concrete mix design for industrial floor (35 MPa).
  Uncertainty: V
  properties: bulk density 1140 kg/m3, dry mass 1 kg, heating value, net 19.03 MJ, wet mass 1 kg
- concrete mixing factory: 4.57e-7 unit; source Kellenberger D. 2007; lognormal variance with pedigree 0.3706, pedigree (2,5,5,5,1)
  Literature value. From ecoinvent dataset "concrete production, 25 MPa, RNA only/GLO (accessed 20171120).
  Uncertainty: B
- diesel, burned in building machine: 5.01 MJ; source Alessandra Castro 2015; lognormal variance with pedigree 0.0052, pedigree (2,4,3,1,1)
  Literature value. Diesel used in internal transportation equipment.
  Uncertainty: V
  property density 0.84 kg/l; name density_diesel
  property heating value, net 1 MJ; name NHV_diesel
- electricity, medium voltage: 2.99 kWh; lognormal variance with pedigree 0.2372, pedigree (2,3,3,1,1)
  Calculated value, Weighted average amount from 29 concrete plants.
  Uncertainty: V
- gravel, crushed: 1034.89 kg; = gravel*(1+losses); lognormal variance with pedigree 0.0206, pedigree (2,5,3,1,1)
  (same comment as for cement, CP II-F)
  properties: dry mass 1 kg, wet mass 1 kg
- lubricating oil: 0.0499 kg; name lub_oil; lognormal variance with pedigree 0.2992, pedigree (2,3,3,1,1)
  Calculated value. Weighted average amount from 34 concrete plants.
  Uncertainty: V
  properties: dry mass 1 kg, heating value, net 40.2 MJ, wet mass 1 kg
  note on heating value, net: Literature value, Source: IPCC 2006, 2006 IPCC Guidelines for National Greenhouse Gas Inventories, Prepared by the National Greenhouse Gas Inventories Programme, Eggleston H.S., Buendia L., Miwa K., Ngara T. and Tanabe K. (eds). Published: IGES, Japan
- reinforcing steel: 25 kg; source Figueiredo, A. 2006; lognormal variance with pedigree 0.024, pedigree (3,5,3,1,1)
  Estimation. Industrial floor normally has low fiber content, up to 50 kg of steel fibres (FIGUEIREDO et al., 2006). Proxy for fibre reinforcement.
  Uncertainty: V
  properties: carbon content, fossil 0.004, dry mass 1 kg, wet mass 1 kg
- sand: 751.512 kg; = sand*(1+losses); lognormal variance with pedigree 0.0206, pedigree (2,5,3,1,1)
  (same comment as for cement, CP II-F)
  properties: dry mass 1 kg, wet mass 1 kg
- scrap steel: -0.0238 kg; = steel; lognormal variance with pedigree 0.0208, pedigree (2,5,2,5,1)
  (same comment as for concrete mixing factory)
  production volume; = PV * steel /rer
    Calculated from production volume of reference product using the relative outputs.
  properties: dry mass 1 kg, wet mass 1 kg
- steel, low-alloyed, hot rolled: 0.0238 kg; name steel; source Kellenberger D. 2007; lognormal variance with pedigree 0.0606, pedigree (2,5,5,5,1)
  (same comment as for concrete mixing factory)
  properties: dry mass 1 kg, wet mass 1 kg
- synthetic rubber: 0.0345 kg; name rub; lognormal variance with pedigree 0.7232, pedigree (2,3,3,1,1)
  Calculated value. Weighted average amount from 34 concrete plants.
  Uncertainty: V
  properties: dry mass 1 kg, heating value, net 26.42 MJ, wet mass 1 kg
- tap water: 207.6 kg; = 200*(1+losses); lognormal variance with pedigree 0.0206, pedigree (2,5,3,1,1)
  (same comment as for cement, CP II-F)
  properties: wet mass 1 kg
- waste concrete: -87.666 kg; name was_concrete; = concrete_density*losses; source Alessandra Castro 2015; lognormal variance with pedigree 0.0032, pedigree (2,4,1,1,1)
  Literature value.
  Uncertainty: V
  production volume; = PV * was_concrete /rer
    Calculated from production volume of reference product using the relative outputs.
  property carbon content, fossil 0; name was_concrete_C_content_fossil
  properties: dry mass 0.9499 kg, water content 0.0527424, wet mass 1 kg
- waste mineral oil: -0.0499 kg; = lub_oil; lognormal variance with pedigree 0.2972, pedigree (2,3,1,1,1)
  Calculated value.
  Uncertainty: V
  production volume; = PV * lub_oil /rer
    Calculated from production volume of reference product using the relative outputs.
  properties: carbon content, fossil 0.864444, dry mass 0.9 kg, heating value, net 34.7 MJ, water content 0.111111, wet mass 1 kg
  note on carbon content, fossil: Tab A.6, ecoinvent v2.2 report 13_I. C content has been calculated after data in the tables, and then referred to 1 kg DM
  note on heating value, net: Value taken from the general comment of the treatment dataset.
- waste rubber, unspecified: -0.0345 kg; = rub; lognormal variance with pedigree 0.7212, pedigree (2,3,1,1,1)
  Calculated value.
  Uncertainty: V
  production volume; = PV * rub /rer
    Calculated from production volume of reference product using the relative outputs.
  properties: carbon content, fossil 0.853, dry mass 1 kg, heating value, net 27.19 MJ, wet mass 1 kg
- wastewater from concrete production: -0.161 m3; = was_water; lognormal variance with pedigree 0.3682, pedigree (2,3,1,1,1)
  Calculated value.
  Uncertainty: V
  production volume; = PV * was_water /rer
    Calculated from production volume of reference product using the relative outputs.
  property dry mass 0.44914 kg; name was_water_DM
  properties: carbon content, fossil 0.027074, water content 2225.48, wet mass 1000 kg

## Inputs from nature
- Water, unspecified natural origin [natural resource, in water]: 0.161 m3; name was_water; lognormal variance with pedigree 0.3702, pedigree (2,3,3,1,1)
  Calculated value. Weighted average amount from 26 concrete plants. Water used for washing the concrete trucks and the internal circulation area in the ready-mix facility.
  Uncertainty: V

## Sampling procedure
Data on concrete are based on the design mix for 35 MPa fibre-reinforced concrete used for industrial floor, from one ready-mix concrete company. For fibre content, an estimated value from different sources is set considering literature values. Concrete ingredients" basic uncertainty for the lognormal distribution was calculated considering a coefficient of variation of 10%, based on the coefficients of variation calculated for the ready-mix concrete datasets for BR, so that data represent the variation expected for the whole country.
For other flows, the weighted average was calculated from several different concrete plants (26 for process water, 34 for rubber parts and lubricating oil, 29 for electricity), belonging to one of the 7 concrete making companies that provided data for normal ready-mix concrete for Brazil. Basic uncertainty was calculated from the coefficient of variation of the sample.
Diesel consumption and waste generation values were taken from a published paper. For other materials used for maintenance (steel parts) and infrastructure, data were extrapolated from the dataset "concrete production, 25 MPa, RNA only, GLO, 2006-2009" (accessed 10.10.2017).
No conversion to the geometric mean of the lognormal distribution was done, for consistency reasons with other ecoinvent datasets.
Representativeness is of 1,67% based on the number of companies that provided concrete mix data (1) divided by the total number of ready-mix concrete production companies in Brazil (60), which is the number of respondant companies in the national survey carried out by ABCP in 2013. Thus, this dataset has a limited representativeness on a national scale.

## Extrapolations
Data from one ready-mix company in the Southern region of Brazil are used to represent the Brazilian fibre-reinforced concrete production, and are considered representative of the concrete mix design of steel fibre reinforced concrete, for industrial floors only. Some flows have been extrapolated from the dataset "concrete production, 25 MPa, RNA only/GLO" (accessed 10.10.2017).
Reinforcing steel is used as a proxy for steel fibre.

## Review by Bruno Peuportier 2017-11-29
The ethylene oxide flux is included in the organic coumpounds flux, therefore the dataset is ok
