# treatment of waste polypropylene, open dump, very wet infiltration class (1000mm)

Dataset: EcoSpold 2, unit process
Geography: GLO
Time period: 2006-01-01 to 2023-12-31
Technology level: current
Classification: ISIC rev.4 ecoinvent: 3821:Treatment and disposal of non-hazardous waste
Scenario: Business-as-Usual
System model: Allocation, cut-off by classification
Generated by: Mattia Clementi
Database: ecoinvent
isCopyrightProtected: true
accessRestrictedTo: 1

## General comment
This dataset represents the activity of waste disposal of 'waste polypropylene' in an open dump. Recommended use of this dataset: for PP, which goes to disposal as part of unmanaged communal waste mixture. Inventoried waste consists of fraction: 100% PP.
Waste composition (wet, in ppmw): gross heating value 35.16 MJ/kg; net heating value 32.6 MJ/kg; H2O 159000; O na; H 118640; C 711700; S 412.07; N 584.94; P na; B na; Cl 1271; Br 8.3396; F 12.509; I na; Ag na; As 1.4786; Ba 208.49; Cd 29.521; Co 1.4594; Cr 10.841; Cu 35.975; Hg 0.041698; Mn 26.131; Mo na; Ni 0.83396; Pb 19.65; Sb 8.7565; Se 1.6342; Sn 3.3169; V 1918.1; Zn 297.42; Be 0.38909; Sc na; Sr 68.87; Ti 778.19; Tl 0.31127; W na; Si na; Fe 1334.3; Ca 2251.7; Al 155.64; K na; Mg 83.396; Na 1140.4.
Share of carbon in initial waste that is biogenic 0%. Share of metals in waste not oxidised and bulk-recyclable (exclude very small or thin parts) Iron: 0%; Alu: 0%; Copper: 0%. Overall degradability of waste during 100 years: 1%. 0.001778 kg waste mass remains in the landfill even after the long term period.

## Included activities start
The activity starts with the waste being available at the location (gate) of the uncontrolled disposal. Collection and transportation of the waste to the uncontrolled disposal location is not included.

## Included activities end
The activity ends with the waste being disposed, in an uncontrolled manner and waste-specific emissions from open dump are released to air via gas and to water via leachate.

## Geography
This dataset represents an open dump location of 'infiltration class 5 very wet (2018)'. Landfill site with mean annual temperature (MAT) of 8 degC, mean annual precipitation (MAP) of 1900 mm/year, and net infiltration of 1000 mm/year.
Temperature at site can result in permafrost conditions, which slows down water flow by a factor of (alpha t) 0.999. Total climate adjustments with alpha pt of 0.999. The leachate percolating through the landfill has an average residence time of 1.75 years.
Reference for climatic parameters: Doka, G., 2018, Inventory parameters for regionalised waste disposal mixes

## Technology
This is an inventory for an open, uncontrolled waste dump for municipal solid waste. Ultimate average landfill height is 7 meters. Operation phase duration is 15 years. The total, waste-specific raw landfill gas mass produced in the landfill is 0.008054 kg. The total CH4 mass in the raw landfill gas is 0.006901 kg. Percentage of landfill gas directly emitted is 100w%. A Methane Correction Factor (MCF) for landfill air emissions of 0.7057 is employed. Leachate of the landfill is not treated, but emitted untreated. Based on average waste composition and chosen climate data the end of carbonate phase is estimated to be reached 862 years after waste deposition.

## Reference product
- waste polypropylene: -1 kg; By-product classification Waste; CPC 39270: Waste, parings and scrap of plastics; HS2017 391590: Plastics n.e.c. in heading no. 3915; waste, parings and scrap; CAS 9003-07-0
  main reference product of this activity
  production volume 1.84e9 kg
    Estimated based on the total amount of this waste being treated in the database. The value is then adjusted to reflect the current treatment in the given geography
  property price 0 EUR2005
    Waste products are assigned a price of zero as they are assumed to require further treatment.
  properties: aluminium content 0.000185062, antimony content 1.0412e-5, arsenic content 1.75809e-6, barium content 0.000247906, beryllium content 4.62656e-7, bromine content 9.91623e-6, cadmium content 3.51019e-5, calcium content 0.00267738, carbon allocation 0.711698 kg, carbon content 0.846252, carbon content, fossil 0.846252, carbon content, non-fossil 0, chlorine content 0.00151132, chromium content 1.28911e-5, cobalt content 1.73534e-6, copper content 4.27763e-5, dry mass 0.841 kg, fluorine content 1.48744e-5, heating value, gross 35.1553 MJ, heating value, net 32.5963 MJ, hydrogen content 0.141066, iron content 0.0015866, lead content 2.33656e-5, magnesium content 9.91623e-5, manganese content 3.10709e-5, mercury content 4.95812e-8, nickel content 9.91623e-7, nitrogen content 0.000695527, selenium content 1.94316e-6, sodium content 0.00135604, strontium content 8.18901e-5, sulfur content 0.000489981, thallium content 3.70125e-7, tin content 3.94396e-6, titanium content 0.000925312, vanadium content 0.00228073, water content 0.189061, water in wet mass 0.159 kg, wet mass 1 kg, zinc content 0.000353656

## Inputs from nature
- Organic carbon, placed in landfill [inventory indicator, waste]: 0.7117 kg; lognormal variance with pedigree 0.011567, pedigree (1,1,4,1,1)
  organic carbon placed in open dump (for ecoscarcity LCIA only);
- Waste mass, total, placed in landfill [inventory indicator, waste]: 1 kg; lognormal variance with pedigree 0.008, pedigree (1,1,4,1,1)
  waste mass placed in open dump (for ecoscarcity LCIA only);
- Occupation, dump site [natural resource, land]: 0.0035714 m2*year; lognormal variance with pedigree 0.32902, pedigree (1,1,4,1,1)
  for operation phase of open dump area;
- Transformation, from pasture, man made [natural resource, land]: 0.00014286 m2; lognormal variance with pedigree 0.32902, pedigree (1,1,4,1,1)
  for initial conversion of open dump;
- Transformation, to dump site [natural resource, land]: 0.00014286 m2; lognormal variance with pedigree 0.32902, pedigree (1,1,4,1,1)
  conversion to open dump area;

## Emissions to nature
- Aluminium III [air, non-urban air or from high stacks]: 1.9427e-11 kg; lognormal variance with pedigree 1.9298, pedigree (1,1,4,1,1)
  landfill gas emission from open dump;
- Antimony ion [air, non-urban air or from high stacks]: 2.3058e-12 kg; lognormal variance with pedigree 1.9298, pedigree (1,1,4,1,1)
  landfill gas emission from open dump;
- Arsenic ion [air, non-urban air or from high stacks]: 3.7185e-11 kg; lognormal variance with pedigree 1.9298, pedigree (1,1,4,1,1)
  landfill gas emission from open dump;
- Barium II [air, non-urban air or from high stacks]: 5.9624e-10 kg; lognormal variance with pedigree 1.9298, pedigree (1,1,4,1,1)
  landfill gas emission from open dump;
- Beryllium II [air, non-urban air or from high stacks]: 5.6485e-14 kg; lognormal variance with pedigree 1.9298, pedigree (1,1,4,1,1)
  landfill gas emission from open dump;
- Bromine [air, non-urban air or from high stacks]: 2.9406e-9 kg; lognormal variance with pedigree 1.9298, pedigree (1,1,4,1,1)
  landfill gas emission from open dump;
- Cadmium II [air, non-urban air or from high stacks]: 3.4589e-10 kg; lognormal variance with pedigree 1.9298, pedigree (1,1,4,1,1)
  landfill gas emission from open dump;
- Calcium II [air, non-urban air or from high stacks]: 7.321e-10 kg; lognormal variance with pedigree 1.9298, pedigree (1,1,4,1,1)
  landfill gas emission from open dump;
- Carbon dioxide, fossil [air, non-urban air or from high stacks]: 0.015314 kg; lognormal variance with pedigree 0.38328, pedigree (1,1,4,1,1)
  landfill gas emission from open dump;
- Chromium III [air, non-urban air or from high stacks]: 3.0858e-13 kg; lognormal variance with pedigree 1.9298, pedigree (1,1,4,1,1)
  landfill gas emission from open dump;
- Cobalt II [air, non-urban air or from high stacks]: 1.1713e-12 kg; lognormal variance with pedigree 1.9298, pedigree (1,1,4,1,1)
  landfill gas emission from open dump;
- Copper ion [air, non-urban air or from high stacks]: 5.0273e-13 kg; lognormal variance with pedigree 1.9298, pedigree (1,1,4,1,1)
  landfill gas emission from open dump;
- Hydrochloric acid [air, non-urban air or from high stacks]: 4.6081e-7 kg; lognormal variance with pedigree 1.4235, pedigree (1,1,4,1,1)
  landfill gas emission from open dump;
- Hydrogen fluoride [air, non-urban air or from high stacks]: 4.9804e-8 kg; lognormal variance with pedigree 1.7295, pedigree (1,1,4,1,1)
  landfill gas emission from open dump;
- Iron ion [air, non-urban air or from high stacks]: 4.5764e-11 kg; lognormal variance with pedigree 1.9298, pedigree (1,1,4,1,1)
  landfill gas emission from open dump;
- Lead II [air, non-urban air or from high stacks]: 3.8549e-13 kg; lognormal variance with pedigree 1.9298, pedigree (1,1,4,1,1)
  landfill gas emission from open dump;
- Magnesium [air, non-urban air or from high stacks]: 1.285e-10 kg; lognormal variance with pedigree 1.9298, pedigree (1,1,4,1,1)
  landfill gas emission from open dump;
- Manganese II [air, non-urban air or from high stacks]: 7.4729e-11 kg; lognormal variance with pedigree 1.9298, pedigree (1,1,4,1,1)
  landfill gas emission from open dump;
- Mercury II [air, non-urban air or from high stacks]: 1.1412e-11 kg; lognormal variance with pedigree 1.9298, pedigree (1,1,4,1,1)
  landfill gas emission from open dump;
- Methane, fossil [air, non-urban air or from high stacks]: 0.0036331 kg; lognormal variance with pedigree 0.42381, pedigree (1,1,4,1,1)
  landfill gas emission from open dump;
- Nickel II [air, non-urban air or from high stacks]: 1.2107e-13 kg; lognormal variance with pedigree 1.9298, pedigree (1,1,4,1,1)
  landfill gas emission from open dump;
- Nitrogen oxides [air, non-urban air or from high stacks]: 8.013e-9 kg; lognormal variance with pedigree 1.3717, pedigree (1,1,4,1,1)
  landfill gas emission from open dump;
- Selenium IV [air, non-urban air or from high stacks]: 4.3032e-13 kg; lognormal variance with pedigree 1.9298, pedigree (1,1,4,1,1)
  landfill gas emission from open dump;
- Sodium I [air, non-urban air or from high stacks]: 1.1785e-8 kg; lognormal variance with pedigree 1.904, pedigree (1,1,4,1,1)
  landfill gas emission from open dump;
- Strontium II [air, non-urban air or from high stacks]: 9.9979e-12 kg; lognormal variance with pedigree 1.9298, pedigree (1,1,4,1,1)
  landfill gas emission from open dump;
- Sulfur dioxide [air, non-urban air or from high stacks]: 5.3712e-7 kg; lognormal variance with pedigree 1.4906, pedigree (1,1,4,1,1)
  landfill gas emission from open dump;
- Thallium I [air, non-urban air or from high stacks]: 4.5188e-14 kg; lognormal variance with pedigree 1.9298, pedigree (1,1,4,1,1)
  landfill gas emission from open dump;
- Tin ion [air, non-urban air or from high stacks]: 4.8805e-14 kg; lognormal variance with pedigree 1.9298, pedigree (1,1,4,1,1)
  landfill gas emission from open dump;
- Titanium ion [air, non-urban air or from high stacks]: 9.7134e-11 kg; lognormal variance with pedigree 1.9298, pedigree (1,1,4,1,1)
  landfill gas emission from open dump;
- Vanadium V [air, non-urban air or from high stacks]: 5.0508e-10 kg; lognormal variance with pedigree 1.9298, pedigree (1,1,4,1,1)
  landfill gas emission from open dump;
- Zinc II [air, non-urban air or from high stacks]: 3.1274e-11 kg; lognormal variance with pedigree 1.9298, pedigree (1,1,4,1,1)
  landfill gas emission from open dump;
- Non-hazardous waste disposed [inventory indicator, waste]: 1 kg; lognormal variance with pedigree 0.008, pedigree (1,1,4,1,1)
  EN15804 waste mass in sanitary landfill;
- Heat, waste [soil, industrial]: 0.29376 MJ; lognormal variance with pedigree 0.22372, pedigree (1,1,4,1,1)
  from decomposed waste material in open dump;
- Aluminium III [water, ground-]: 7.7707e-8 kg; lognormal variance with pedigree 1.6546, pedigree (1,1,4,1,1)
  uncontrolled emissions in open dump in moist climate;
- Aluminium III [water, ground-, long-term]: 0.00015556 kg; lognormal variance with pedigree 0.91117, pedigree (1,1,4,1,1)
  emissions to groundwater in open dump;
- Ammonium [water, ground-]: 5.5668e-6 kg; lognormal variance with pedigree 1.00277, pedigree (1,1,4,1,1)
  uncontrolled emissions in open dump in moist climate;
- Ammonium [water, ground-, long-term]: 0.00023255 kg; lognormal variance with pedigree 0.73594, pedigree (1,1,4,1,1)
  emissions to groundwater in open dump;
- Antimony ion [water, ground-]: 9.2232e-9 kg; lognormal variance with pedigree 1.9298, pedigree (1,1,4,1,1)
  uncontrolled emissions in open dump in moist climate;
- Antimony ion [water, ground-, long-term]: 2.3136e-7 kg; lognormal variance with pedigree 1.9298, pedigree (1,1,4,1,1)
  emissions to groundwater in open dump;
- Arsenic ion [water, ground-]: 2.6525e-9 kg; lognormal variance with pedigree 1.9298, pedigree (1,1,4,1,1)
  uncontrolled emissions in open dump in moist climate;
- Arsenic ion [water, ground-, long-term]: 7.7218e-8 kg; lognormal variance with pedigree 1.9298, pedigree (1,1,4,1,1)
  emissions to groundwater in open dump;
- BOD5, Biological Oxygen Demand [water, ground-]: 5.361e-5 kg; lognormal variance with pedigree 0.82599, pedigree (1,1,4,1,1)
  uncontrolled emissions in open dump in moist climate;
- BOD5, Biological Oxygen Demand [water, ground-, long-term]: 0.18244 kg; lognormal variance with pedigree 0.0115796, pedigree (1,1,4,1,1)
  emissions to groundwater in open dump;
- Barium II [water, ground-]: 2.385e-6 kg; lognormal variance with pedigree 1.2209, pedigree (1,1,4,1,1)
  uncontrolled emissions in open dump in moist climate;
- Barium II [water, ground-, long-term]: 0.0002061 kg; lognormal variance with pedigree 0.87233, pedigree (1,1,4,1,1)
  emissions to groundwater in open dump;
- Beryllium II [water, ground-]: 2.2594e-10 kg; lognormal variance with pedigree 1.9298, pedigree (1,1,4,1,1)
  uncontrolled emissions in open dump in moist climate;
- Beryllium II [water, ground-, long-term]: 3.8887e-7 kg; lognormal variance with pedigree 1.6991, pedigree (1,1,4,1,1)
  emissions to groundwater in open dump;
- Bromine [water, ground-]: 2.0976e-7 kg; lognormal variance with pedigree 1.5585, pedigree (1,1,4,1,1)
  uncontrolled emissions in open dump in moist climate;
- Bromine [water, ground-, long-term]: 8.1269e-6 kg; lognormal variance with pedigree 1.3, pedigree (1,1,4,1,1)
  emissions to groundwater in open dump;
- COD, Chemical Oxygen Demand [water, ground-]: 0.00022646 kg; lognormal variance with pedigree 0.82599, pedigree (1,1,4,1,1)
  uncontrolled emissions in open dump in moist climate;
- COD, Chemical Oxygen Demand [water, ground-, long-term]: 0.77064 kg; lognormal variance with pedigree 0.0115796, pedigree (1,1,4,1,1)
  emissions to groundwater in open dump;
- Cadmium II [water, ground-]: 5.1883e-8 kg; lognormal variance with pedigree 1.7126, pedigree (1,1,4,1,1)
  uncontrolled emissions in open dump in moist climate;
- Cadmium II [water, ground-, long-term]: 2.9468e-5 kg; lognormal variance with pedigree 1.1324, pedigree (1,1,4,1,1)
  emissions to groundwater in open dump;
- Calcium II [water, ground-]: 2.9284e-6 kg; lognormal variance with pedigree 1.1795, pedigree (1,1,4,1,1)
  uncontrolled emissions in open dump in moist climate;
- Calcium II [water, ground-, long-term]: 0.0022488 kg; lognormal variance with pedigree 0.56068, pedigree (1,1,4,1,1)
  emissions to groundwater in open dump;
- Chloride [water, ground-]: 3.1969e-5 kg; lognormal variance with pedigree 0.89304, pedigree (1,1,4,1,1)
  uncontrolled emissions in open dump in moist climate;
- Chloride [water, ground-, long-term]: 0.0012386 kg; lognormal variance with pedigree 0.63447, pedigree (1,1,4,1,1)
  emissions to groundwater in open dump;
- Chromium VI [water, ground-]: 1.2343e-9 kg; lognormal variance with pedigree 1.9298, pedigree (1,1,4,1,1)
  uncontrolled emissions in open dump in moist climate;
- Chromium VI [water, ground-, long-term]: 1.2474e-8 kg; lognormal variance with pedigree 1.9298, pedigree (1,1,4,1,1)
  emissions to groundwater in open dump;
- Cobalt II [water, ground-]: 4.6853e-9 kg; lognormal variance with pedigree 1.9298, pedigree (1,1,4,1,1)
  uncontrolled emissions in open dump in moist climate;
- Cobalt II [water, ground-, long-term]: 1.4547e-6 kg; lognormal variance with pedigree 1.5283, pedigree (1,1,4,1,1)
  emissions to groundwater in open dump;
- Copper ion [water, ground-]: 1.7596e-9 kg; lognormal variance with pedigree 1.9298, pedigree (1,1,4,1,1)
  uncontrolled emissions in open dump in moist climate;
- Copper ion [water, ground-, long-term]: 3.5973e-5 kg; lognormal variance with pedigree 1.1061, pedigree (1,1,4,1,1)
  emissions to groundwater in open dump;
- DOC, Dissolved Organic Carbon [water, ground-]: 0.00020704 kg; lognormal variance with pedigree 0.82599, pedigree (1,1,4,1,1)
  uncontrolled emissions in open dump in moist climate;
- DOC, Dissolved Organic Carbon [water, ground-, long-term]: 0.70459 kg; lognormal variance with pedigree 0.0115796, pedigree (1,1,4,1,1)
  emissions to groundwater in open dump;
- Fluoride [water, ground-]: 9.179e-9 kg; lognormal variance with pedigree 1.9298, pedigree (1,1,4,1,1)
  uncontrolled emissions in open dump in moist climate;
- Fluoride [water, ground-, long-term]: 1.2453e-5 kg; lognormal variance with pedigree 1.2463, pedigree (1,1,4,1,1)
  emissions to groundwater in open dump;
- Heat, waste [water, ground-, long-term]: 34.804 MJ; lognormal variance with pedigree 0.058605, pedigree (1,1,4,1,1)
  from decomposed waste material in open dump;
- Hydrogen sulfide [water, ground-]: 1.1165e-7 kg; lognormal variance with pedigree 1.2673, pedigree (1,1,4,1,1)
  uncontrolled emissions in open dump in moist climate;
- Hydrogen sulfide [water, ground-, long-term]: 2.9885e-5 kg; lognormal variance with pedigree 0.78206, pedigree (1,1,4,1,1)
  emissions to groundwater in open dump;
- Iron ion [water, ground-]: 1.8306e-7 kg; lognormal variance with pedigree 1.5418, pedigree (1,1,4,1,1)
  uncontrolled emissions in open dump in moist climate;
- Iron ion [water, ground-, long-term]: 0.0013341 kg; lognormal variance with pedigree 0.62809, pedigree (1,1,4,1,1)
  emissions to groundwater in open dump;
- Lead II [water, ground-]: 1.1565e-9 kg; lognormal variance with pedigree 1.9298, pedigree (1,1,4,1,1)
  uncontrolled emissions in open dump in moist climate;
- Lead II [water, ground-, long-term]: 1.9649e-5 kg; lognormal variance with pedigree 1.1864, pedigree (1,1,4,1,1)
  emissions to groundwater in open dump;
- Magnesium [water, ground-]: 5.1401e-7 kg; lognormal variance with pedigree 1.417, pedigree (1,1,4,1,1)
  uncontrolled emissions in open dump in moist climate;
- Magnesium [water, ground-, long-term]: 8.2881e-5 kg; lognormal variance with pedigree 0.9942, pedigree (1,1,4,1,1)
  emissions to groundwater in open dump;
- Manganese II [water, ground-]: 2.9892e-7 kg; lognormal variance with pedigree 1.4972, pedigree (1,1,4,1,1)
  uncontrolled emissions in open dump in moist climate;
- Manganese II [water, ground-, long-term]: 2.5832e-5 kg; lognormal variance with pedigree 1.1486, pedigree (1,1,4,1,1)
  emissions to groundwater in open dump;
- Mercury II [water, ground-]: 2.8529e-11 kg; lognormal variance with pedigree 1.9298, pedigree (1,1,4,1,1)
  uncontrolled emissions in open dump in moist climate;
- Mercury II [water, ground-, long-term]: 4.1658e-8 kg; lognormal variance with pedigree 1.9298, pedigree (1,1,4,1,1)
  emissions to groundwater in open dump;
- Nickel II [water, ground-]: 4.8426e-10 kg; lognormal variance with pedigree 1.9298, pedigree (1,1,4,1,1)
  uncontrolled emissions in open dump in moist climate;
- Nickel II [water, ground-, long-term]: 8.3347e-7 kg; lognormal variance with pedigree 1.6009, pedigree (1,1,4,1,1)
  emissions to groundwater in open dump;
- Nitrate [water, ground-]: 5.8544e-7 kg; lognormal variance with pedigree 1.00277, pedigree (1,1,4,1,1)
  uncontrolled emissions in open dump in moist climate;
- Nitrate [water, ground-, long-term]: 2.4457e-5 kg; lognormal variance with pedigree 0.73594, pedigree (1,1,4,1,1)
  emissions to groundwater in open dump;
- Nitrite [water, ground-]: 3.0299e-7 kg; lognormal variance with pedigree 1.00277, pedigree (1,1,4,1,1)
  uncontrolled emissions in open dump in moist climate;
- Nitrite [water, ground-, long-term]: 1.2657e-5 kg; lognormal variance with pedigree 0.73594, pedigree (1,1,4,1,1)
  emissions to groundwater in open dump;
- Nitrogen, organic bound [water, ground-]: 9.0986e-6 kg; lognormal variance with pedigree 1.00277, pedigree (1,1,4,1,1)
  uncontrolled emissions in open dump in moist climate;
- Nitrogen, organic bound [water, ground-, long-term]: 0.0003801 kg; lognormal variance with pedigree 0.73594, pedigree (1,1,4,1,1)
  emissions to groundwater in open dump;
- Selenium IV [water, ground-]: 1.7213e-9 kg; lognormal variance with pedigree 1.9298, pedigree (1,1,4,1,1)
  uncontrolled emissions in open dump in moist climate;
- Selenium IV [water, ground-, long-term]: 1.3153e-7 kg; lognormal variance with pedigree 1.9298, pedigree (1,1,4,1,1)
  emissions to groundwater in open dump;
- Sodium I [water, ground-]: 4.7138e-5 kg; lognormal variance with pedigree 0.85397, pedigree (1,1,4,1,1)
  uncontrolled emissions in open dump in moist climate;
- Sodium I [water, ground-, long-term]: 0.0010933 kg; lognormal variance with pedigree 0.64865, pedigree (1,1,4,1,1)
  emissions to groundwater in open dump;
- Strontium II [water, ground-]: 3.9991e-8 kg; lognormal variance with pedigree 1.7433, pedigree (1,1,4,1,1)
  uncontrolled emissions in open dump in moist climate;
- Strontium II [water, ground-, long-term]: 6.883e-5 kg; lognormal variance with pedigree 1.0197, pedigree (1,1,4,1,1)
  emissions to groundwater in open dump;
- Sulfate [water, ground-]: 4.283e-6 kg; lognormal variance with pedigree 1.2673, pedigree (1,1,4,1,1)
  uncontrolled emissions in open dump in moist climate;
- Sulfate [water, ground-, long-term]: 0.0011464 kg; lognormal variance with pedigree 0.78206, pedigree (1,1,4,1,1)
  emissions to groundwater in open dump;
- TOC, Total Organic Carbon [water, ground-]: 0.00020704 kg; lognormal variance with pedigree 0.82599, pedigree (1,1,4,1,1)
  uncontrolled emissions in open dump in moist climate;
- TOC, Total Organic Carbon [water, ground-, long-term]: 0.70459 kg; lognormal variance with pedigree 0.0115796, pedigree (1,1,4,1,1)
  emissions to groundwater in open dump;
- Thallium I [water, ground-]: 1.8075e-10 kg; lognormal variance with pedigree 1.9298, pedigree (1,1,4,1,1)
  uncontrolled emissions in open dump in moist climate;
- Thallium I [water, ground-, long-term]: 3.1109e-7 kg; lognormal variance with pedigree 1.7276, pedigree (1,1,4,1,1)
  emissions to groundwater in open dump;
- Tin ion [water, ground-]: 1.9522e-10 kg; lognormal variance with pedigree 1.9298, pedigree (1,1,4,1,1)
  uncontrolled emissions in open dump in moist climate;
- Tin ion [water, ground-, long-term]: 3.3167e-6 kg; lognormal variance with pedigree 1.4212, pedigree (1,1,4,1,1)
  emissions to groundwater in open dump;
- Titanium ion [water, ground-]: 3.8853e-7 kg; lognormal variance with pedigree 1.4418, pedigree (1,1,4,1,1)
  uncontrolled emissions in open dump in moist climate;
- Titanium ion [water, ground-, long-term]: 0.0007778 kg; lognormal variance with pedigree 0.69839, pedigree (1,1,4,1,1)
  emissions to groundwater in open dump;
- Vanadium V [water, ground-]: 2.0203e-6 kg; lognormal variance with pedigree 1.2274, pedigree (1,1,4,1,1)
  uncontrolled emissions in open dump in moist climate;
- Vanadium V [water, ground-, long-term]: 0.00016019 kg; lognormal variance with pedigree 1.9298, pedigree (1,1,4,1,1)
  emissions to groundwater in open dump;
- Zinc II [water, ground-]: 1.4073e-7 kg; lognormal variance with pedigree 1.5757, pedigree (1,1,4,1,1)
  uncontrolled emissions in open dump in moist climate;
- Zinc II [water, ground-, long-term]: 0.00029728 kg; lognormal variance with pedigree 0.82519, pedigree (1,1,4,1,1)
  emissions to groundwater in open dump;
