# biogas purification to biomethane by amino washing

Dataset: EcoSpold 2, unit process
Geography: RoW
Time period: 2013-01-01 to 2023-12-31
Technology level: current
Classification: ISIC rev.4 ecoinvent: 3520:Manufacture of gas; distribution of gaseous fuels through mains
Tags: ConvertedDataset
Scenario: Business-as-Usual
System model: Allocation, cut-off by classification
Generated by: Thomas Kägi
Published in: Kaegi Thomas 2019
Database: ecoinvent
isCopyrightProtected: true
accessRestrictedTo: 1

## General comment
The data presented is derived from information available from the manufacturer of biogas upgrading plants. The upgraded gas leaves the process with a pressure of 5 bar. For the composition of the product gas we assume a share of more than 96 Vol. % of methane.
[This dataset is meant to replace the following datasets:]

## Included activities start
The activity starts with the biogas being available at the gates of the purification plant.

## Included activities end
The activity ends with the biomethane being available for transportation at the gates of the purification plant. Electricity consumption and emissions represent the raw gas compression, H2S removal, gas conditioning and methane enrichment of biogas. The production and disposal of activated carbon are neglected. Infrastructure expenditures are included employing generic data for facilities of a chemical plant as a first approximation.

## Geography
Plants using the described technology are in operation in Switzerland.

## Technology
Amino washing

## Parameters
- carbon dioxide density (ntp): 1.997 kg/m3; name CO2_density
  CO2 has a density of 1.997 kg/Nm3 in standard temperature and pressure (STP) conditions. STP is defined as 0oC (273.15 K, 32oF) and 1 atm (101.325 kN/m2, 101.325 kPa, 14.7 psia, 0 psig, 30 in Hg, 760 torr).
  Reference: Engineering ToolBox, (2003). Gases - Densities. [online] Available at: https://www.engineeringtoolbox.com/gas-density-d_158.html [Accessed 30 01 2020].
- carbon dioxide, volumetric concentration: 0.367 dimensionless; name CO2_volumetric_share
  Assumed volumetric concentration of CO2 in biogas.
- methane density (stp): 0.717 kg/m3; name CH4_density_STP
  CH4 has a density of 0.717 kg/Nm3 in standard temperature and pressure (STP) conditions. STP is defined as 0oC (273.15 K, 32oF) and 1 atm (101.325 kN/m2, 101.325 kPa, 14.7 psia, 0 psig, 30 in Hg, 760 torr).
  Reference: Engineering ToolBox, (2003). Gases - Densities. [online] Available at: https://www.engineeringtoolbox.com/gas-density-d_158.html [Accessed 30 01 2020].
- share of methane in biogas: 0.633 dimensionless; name CH4_volumetric_concentration
  Assumed volumetric concentration of CH4 in biogas.

## Reference product
- biomethane, high pressure: 1 m3; name RP_CH4; By-product classification allocatable product; CPC 17200: Coal gas, water gas, producer gas and similar gases, other than petroleum gases and other gaseous hydrocarbons; HS2017 271129: Petroleum gases and other gaseous hydrocarbons; in gaseous state, other than natural gas; CAS 74-82-8
  production volume 2.5172e9 m3
    Production volume amount was scaled from the respective Swiss value. GDP scaling was employed with Switzerland accounting for roughly 0.8% of the global GDP, yielding a global production volume of 2537500000 m3 of biomethane.
  property heating value, net 34.97 MJ
    Literature value, Source: United Nations Statistics Division (2018) International Recommendations for Energy Statistics (IRES). Available at: http://unstats.un.org/unsd/statcom/doc11/BG-IRES.pdf.
  property price 0.144 EUR2005
    Temporary price data. Calculated as 90% of purchasers price based on: Same prices per energy output as natural gas, based on the proportional heating value (55.5 MJ/kg for methane; 54.8 MJ/kg for natural gas)
  properties: carbon allocation 0.522265 kg, carbon content 0.73086, carbon content, fossil 0, carbon content, non-fossil 0.73086, dry mass 0.71459 kg, water content 0, water in wet mass 0 kg, wet mass 0.71459 kg

## Inputs from technosphere
- biogas: 0.0266 m3; name BG1
  Reported share in Hafner 2019
  properties: carbon content, non-fossil 0.44198, dry mass 1.15 kg, heating value, net 22.73 MJ, wet mass 1.15 kg
  note on carbon content, non-fossil: Total C content in kg/Nm3 (Tab 12.8, ecoinvent v2.2 report n17), referred to 1kg DM
  note on heating value, net: Value taken from the general comment of "heat and power co-generation, biogas, gas engine" dataset.
- biogas: 0.9546 m3; name BG3
  Reported share in Hafner 2019
- biogas: 0.58372 m3; name BG2; lognormal variance with pedigree 0.0112, pedigree (2,1,4,5,1)
  Reported share in Hafner 2019
- charcoal: 0.000697 kg; lognormal variance with pedigree 0.134, pedigree (3,4,4,5,1)
  Reported amount in Zah & Del Duce 2014
  properties: carbon content, non-fossil 0.8, dry mass 1 kg, heating value, net 28.4 MJ, wet mass 1 kg
  note on heating value, net: Indicative value. Reference: Fuels - Higher and Lower Calorific Values, available at: https://www.engineeringtoolbox.com/fuels-higher-calorific-values-d_169.html
- chemical factory, organics: 5.53e-11 unit; lognormal variance with pedigree 0.448, pedigree (4,5,5,5,5)
  Reported amount in Zah & Del Duce 2014
- chemical, organic: 2.64e-5 kg; lognormal variance with pedigree 0.134, pedigree (3,4,4,5,1)
  Reported amount in Zah & Del Duce 2014
  properties: carbon content, fossil 0.628, dry mass 1 kg, heating value, net 19.03 MJ, wet mass 1 kg
  note on carbon content, fossil: This dataset is an unweighted average of 20 organic substances (listed in Tab 88.1, ecoinvent v2.2 report 8, part II), being part of the top100 chemicals included in this database. The C-content has also been calculated as an unweighted average of the C content of the substances composing this dataset.
- compressed air, 800 kPa gauge: 0.00148 m3; lognormal variance with pedigree 0.134, pedigree (3,4,4,5,1)
  Reported amount in Zah & Del Duce 2014
- electricity, low voltage: 0.00440544, 0.000196652, 0.00309249, 0.0641886, 0.00633573, 3.94639e-5, 0.0145476, 0.0220992, 0.00109481 kWh (9 suppliers, which the file names only by identifier); sum of these 0.116 kWh; lognormal variance with pedigree 0.134, pedigree (3,4,4,5,1)
  Reported amount in Zah & Del Duce 2014
- heat, central or small-scale, natural gas: 0.000623228, 3.85138 MJ (2 suppliers, which the file names only by identifier); sum of these 3.852 MJ; lognormal variance with pedigree 0.134, pedigree (3,4,4,5,1)
  Reported amount in Zah & Del Duce 2014
  properties: heating value, net 1 MJ
- light fuel oil: 1.93923e-8, 2.03193e-6, 4.09262e-7, 9.99314e-8, 2.01685e-7, 1.44117e-8, 1.33836e-8 kg (7 suppliers, which the file names only by identifier); sum of these 2.79e-6 kg; lognormal variance with pedigree 0.134, pedigree (3,4,4,5,1)
  Reported amount in Zah & Del Duce 2014
  properties: carbon content, fossil 0.862, dry mass 1 kg, heating value, net 42.6 MJ, wet mass 1 kg
- monoethanolamine: 0.000123 kg; lognormal variance with pedigree 0.134, pedigree (3,4,4,5,1)
  Reported amount in Zah & Del Duce 2014
  properties: carbon content, fossil 0.393443, dry mass 1 kg, heating value, net 25.8 MJ, wet mass 1 kg
- silicone product: 0.000364 kg; lognormal variance with pedigree 0.134, pedigree (3,4,4,5,1)
  Reported amount in Zah & Del Duce 2014
  properties: carbon content, fossil 0.324324, dry mass 1 kg, heating value, net 9.83 MJ, wet mass 1 kg
- sodium chloride, powder: 9.29e-5 kg; lognormal variance with pedigree 0.134, pedigree (3,4,4,5,1)
  Reported amount in Zah & Del Duce 2014
  properties: dry mass 1 kg, wet mass 1 kg
- tap water: 9.24315e-8, 1.40904e-7, 2.6292e-7, 7.08287e-7, 8.52587e-8, 3.55304e-6, 4.06593e-5, 3.02979e-5 kg (8 suppliers, which the file names only by identifier); sum of these 7.58e-5 kg; lognormal variance with pedigree 0.134, pedigree (3,4,4,5,1)
  Reported amount in Zah & Del Duce 2014
  properties: carbon content, fossil 0.00178991, dry mass 0.000337476 kg, water content 2962.17, wet mass 1 kg
  note on carbon content, fossil: Bicarbonate content is 2.93 mol/m3. CO2 content is 0.1 mol/m3 (ecoinvent v2.2 report 8, Tab 93.1).

## Emissions to nature
- Carbon dioxide, non-fossil [air, non-urban air or from high stacks]: 1.02346 kg; lognormal variance with pedigree 0.22, pedigree (5,5,5,5,5)
  Emissions are calculated based on a) the composition of the biogas entering the process, b) the composition of biomethane being produced and the fugitive emissions of CH4 (on the basis of the biomethane produced). The composition of the biogas is the following: CH4: 63.3% v/v and CO2: 33.4% v/v, N: 3.2% v/v and H2S: 0.0005% v/v. The composition of the biomethane is the following: CH4: 99% v/v, CO2: 0.5% v/v, N: 0.3% v/v, H2S: 0.0001% v/v. Fugitive emissions for this type of upgrading technology have been measured to be 0.06% of CH4 in biogas. Nitrogen and hydrogen sulfide in the biogas, exit the process as emissions to air. Density of CO2 and CH4 considered to be: 1.977 kg/m3 and 0.708 kg/m3 respectively.
- Heat, waste [air, non-urban air or from high stacks]: 4.15 MJ; lognormal variance with pedigree 0.22, pedigree (5,5,5,5,5)
  Due to missing data assumed to be the same as in PSA technology reported in Stucki 2011
- Hydrogen sulfide [air, non-urban air or from high stacks]: 9.8e-6 kg; lognormal variance with pedigree 0.22, pedigree (5,5,5,5,5)
  (same comment as for Carbon dioxide, non-fossil)
- Methane, non-fossil [air, non-urban air or from high stacks]: 0.00042 kg; lognormal variance with pedigree 0.02, pedigree (1,1,4,5,1)
  (same comment as for Carbon dioxide, non-fossil)
- Nitrogen [air, unspecified]: 0.05877 kg
  (same comment as for Carbon dioxide, non-fossil)
- Sulfur dioxide [air, urban air close to ground]: 0.000552 kg; lognormal variance with pedigree 0.22, pedigree (5,5,5,5,5)
  Due to missing data assumed to be the same as in PSA technology reported in Stucki 2011
