# coke production

Dataset: EcoSpold 2, unit process
Geography: US
Time period: 1980-01-01 to 2023-12-31
Technology level: current
Classification: EcoSpold01Categories: hard coal/fuels
Classification: ISIC rev.4 ecoinvent: 1910:Manufacture of coke oven products
Scenario: Business-as-Usual
System model: Allocation, cut-off by classification
Generated by: Johannes Müller
Published in: Röder, A. 2007
Database: ecoinvent
isCopyrightProtected: true
accessRestrictedTo: 1

## General comment
The multioutput-process represents the supply of coke, producing the coproducts coal gas, coal tar, and benzene. Hypothesizing that coke production worldwide is mostly based on the byproduct process, this is described here. Emission data are maximum for US plants. Energy and material consumption as well as water emission and solid waste are taken from the DE module. The assumed uncertainty factors should somewhat frame the incomplete information about coke making outside Europe and USA. This module shall be considered only as a first approximation for the purpose to serve metal manufacturing processes within ecoinvent. In some countries coke making might exhibit worse environmental performance. Hence, when country-specific LCA studies will need to address coke making directly or indirectly, a specific assessment of local conditions should be pursued.

## Included activities end
The reference process has been assumed to be the byproduct coke production, used in almost all US coke plants in 1998. The coke making has been considered as a black box. The energy necessary for the process is assumed to be provided by part of the input coal and by some electricity. The module includes chemicals used for operation and the associated transport requirements. The transport of coal are considered to be negligible, because the plant is assumed to be mine-mouth. The module also includes the total emissions to air and water from the entire plant. Coke oven gas, tar, and benzene are byproducts of coking.

## Geography
The estimation of the energy input is made on the basis of data for all coke plants in West Germany in 1991. Emissions are maximum values reported by USEPA for byproduct coke production in the 1990s. This module should be regarded as a first approximation of average world conditions.

## Technology
Average in Germany and USA in 1980s and 1990s.

## Parameters
- fraction, cooling water, cooling pond system, to air: 0.032 dimensionless; name fraction_CW_CP_to_air; lognormal variance with pedigree 0.0413, pedigree (2,3,1,3,1)
  Calculated based on literature value (Scown, C.D., 2011, Water Footprint of U.S. Transportation Fuels and supplying information of the article) (Vionnet, S., Quantis Water Database - Technical Report, 2012).
- fraction, cooling water, once-through system, to air: 0.004 dimensionless; name fraction_CW_OT_to_air; lognormal variance with pedigree 0.0413, pedigree (2,3,1,3,1)
  (same comment as for fraction, cooling water, cooling pond system, to air)
- fraction, cooling water, recirculating system, to air: 0.771 dimensionless; name fraction_CW_R_to_air; lognormal variance with pedigree 0.0413, pedigree (2,3,1,3,1)
  (same comment as for fraction, cooling water, cooling pond system, to air)
- fraction, cooling water, to air: 0.3875 dimensionless; name fraction_CW_to_air; = (0.5*fraction_CW_OT_to_air)+(0.5*fraction_CW_R_to_air); lognormal variance with pedigree 0.092025, pedigree (4,4,3,2,4)
  Calculated value based on literature value (see comments of the other parametres present in this dataset) and expert opinion. In the case when no industry/literature data are available about the type of cooling or directly fraction, cooling water, to air specific for the process a default assumption is applied. It is assumed that the once-through cooling system is used in 50% of all cases and recirculating system is used in another 50% of all cases.
- fraction, water, decarbonised, to air: 0.3875 dimensionless; name fraction_WDC_to_air; = fraction_CW_to_air; lognormal variance with pedigree 0.092025, pedigree (4,4,3,2,4)
  Calculated value. See comments in the other parametres present in this dataset. Decarbonised water is considered to be always used as cooling water, thus cooling water fractions to air are applied to all carbonised water input flows to calculate the amount of water consumed in the processes.

## Reference product
- coke: 1 MJ; name RP_coke; = LHV_coke; By-product classification allocatable product; CPC 33100: Coke and semi-coke of coal, of lignite or of peat; retort carbon; HS2017 270400: Coke and semi-coke; of coal, lignite or peat, whether or not agglomerated; retort carbon
  Source for mass: http://www.worldcoal.org/resources/coal-statistics/coal-steel-statistics/ visited 2010-06-30; 28.6 MJ/kg
  EcoSpold01Location=GLO
  production volume 3.25486e11 MJ; name PV_coke; = 11380632563*LHV_coke
    Production value for 2021 taken from in https://www.eia.gov/international/data/world/coal-and-coke/coal-and-coke-production?pd=1&p=02&u=1&f=A&v=mapbubble&a=-&i=none&vo=value&t=C&g=none&l=249--238&s=315532800000&e=1609459200000&&ev=false
  property carbon content, fossil 0.869149
    81.7% C and 6% water in wet mass (ecoinvent v2.1 report 6_VI Table 7.1)
  property heating value, net 28.6 MJ; name LHV_coke
  property price 0.00791364 EUR2005
    Calculated as price based on: 2018 to 2022 prices calculated from Import/Export data (total trades (USD) divided by total weight (kg) in Germany and China) from UN Trade data statistics (http://data.un.org/Explorer.aspx, Accessed 13 September 2023). Data from UN trade are in mass unit. Calorific value (lower) of 28.6 MJ/kg has been used to convert to MJ.
  properties: allocation factor 0.864284, carbon allocation 0.0285664 kg, carbon content 0.869149, carbon content, non-fossil 0, dry mass 0.0328671 kg, true value 0.22633, water content 0.0638298, water in wet mass 0.0020979 kg, wet mass 0.034965 kg

## Inputs from technosphere
- electricity, medium voltage: 0.00147774 kWh; lognormal variance with pedigree 0.34, pedigree (1,1,5,1,1)
  own assumption
  EcoSpold01Location=UCTE
- hard coal: 0.0417032 kg; lognormal variance with pedigree 0.04, pedigree (1,1,5,1,1)
  standard for ressources
  EcoSpold01Location=UCTE
  properties: carbon content, fossil 0.845, dry mass 0.94 kg, heating value, net 27.91 MJ, water content 0.0638298, wet mass 1 kg
  note on carbon content, fossil: C content 75-94% (specified in Tab 1.1, report 6, part VI). A mean content of 0.845 kg C/ kg dry hard coal was considered
  note on heating value, net: Based on the Characterization factor of Hard coal in the CED method
- hard coal coke factory: 5.13735e-13 unit; lognormal variance with pedigree 0.08, pedigree (1,1,5,1,1)
  own assumption
  EcoSpold01Location=RER
- iron sulfate: 2.20604e-6 kg; lognormal variance with pedigree 0.34, pedigree (1,1,5,1,1)
  own assumption
  EcoSpold01Location=RER
  properties: dry mass 1 kg, wet mass 1 kg
- phosphoric acid, fertiliser grade, without water, in 70% solution state: 4.41208e-6 kg; lognormal variance with pedigree 0.34, pedigree (1,1,5,1,1)
  own assumption
  EcoSpold01Location=GLO
  properties: dry mass 1 kg, wet mass 1 kg
- sodium hydroxide, without water, in 50% solution state: 6.16482e-5 kg; lognormal variance with pedigree 0.34, pedigree (1,1,5,1,1)
  own assumption
  EcoSpold01Location=RER
  properties: dry mass 1 kg, heating value, net 3.03 MJ, wet mass 1 kg
- water, decarbonised: 0.0483515 kg; name water_decarbonised_input; lognormal variance with pedigree 0.34, pedigree (1,1,5,1,1)
  own assumption
  EcoSpold01Location=RER
  properties: wet mass 1 kg

## Emissions to nature
- Acetone [air, non-urban air or from high stacks]: 1.27829e-6 kg; lognormal variance with pedigree 0.34, pedigree (1,1,5,1,1)
  own assumption
- Acrolein [air, non-urban air or from high stacks]: 1.57747e-9 kg; lognormal variance with pedigree 0.34, pedigree (1,1,5,1,1)
  own assumption
- Ammonia [air, non-urban air or from high stacks]: 1.85247e-7 kg; lognormal variance with pedigree 1.37, pedigree (1,1,5,1,1)
  own assumption
- Antimony ion [air, non-urban air or from high stacks]: 2.1728e-11 kg; lognormal variance with pedigree 0.69, pedigree (1,1,5,1,1)
  own assumption
- Arsenic ion [air, non-urban air or from high stacks]: 5.95328e-10 kg; lognormal variance with pedigree 0.08, pedigree (1,1,5,1,1)
  own assumption
- Barium II [air, non-urban air or from high stacks]: 6.76921e-10 kg; lognormal variance with pedigree 0.69, pedigree (1,1,5,1,1)
  own assumption
- Benzene [air, non-urban air or from high stacks]: 3.26373e-5 kg; lognormal variance with pedigree 1.37, pedigree (1,1,5,1,1)
  own assumption
- Benzo(a)pyrene [air, non-urban air or from high stacks]: 2.36016e-7 kg; lognormal variance with pedigree 0.08, pedigree (1,1,5,1,1)
  own assumption
- Beryllium II [air, non-urban air or from high stacks]: 1.08489e-11 kg; lognormal variance with pedigree 0.69, pedigree (1,1,5,1,1)
  own assumption
- Cadmium II [air, non-urban air or from high stacks]: 8.97525e-12 kg; lognormal variance with pedigree 0.08, pedigree (1,1,5,1,1)
  own assumption
- Carbon dioxide, fossil [air, non-urban air or from high stacks]: 0.00483515 kg; lognormal variance with pedigree 0.05, pedigree (1,1,5,1,1)
  own assumption
- Carbon disulfide [air, non-urban air or from high stacks]: 2.82252e-8 kg; lognormal variance with pedigree 0.05, pedigree (1,1,5,1,1)
  own assumption
- Carbon monoxide, fossil [air, non-urban air or from high stacks]: 0.000513735 kg; lognormal variance with pedigree 0.34, pedigree (1,1,5,1,1)
  own assumption
- Chlorodifluoromethane [air, non-urban air or from high stacks]: 9.88184e-8 kg; lognormal variance with pedigree 0.34, pedigree (1,1,5,1,1)
  own assumption
- Chromium III [air, non-urban air or from high stacks]: 2.86785e-10 kg; lognormal variance with pedigree 0.69, pedigree (1,1,5,1,1)
  own assumption
- Cobalt II [air, non-urban air or from high stacks]: 8.21976e-11 kg; lognormal variance with pedigree 0.69, pedigree (1,1,5,1,1)
  own assumption
- Copper ion [air, non-urban air or from high stacks]: 3.56593e-10 kg; lognormal variance with pedigree 0.69, pedigree (1,1,5,1,1)
  own assumption
- Cyanide [air, non-urban air or from high stacks]: 9.91206e-8 kg; lognormal variance with pedigree 0.69, pedigree (1,1,5,1,1)
  own assumption
- Ethane [air, non-urban air or from high stacks]: 8.64284e-6 kg; lognormal variance with pedigree 0.69, pedigree (1,1,5,1,1)
  own assumption
- Ethanol [air, non-urban air or from high stacks]: 1.29038e-9 kg; lognormal variance with pedigree 0.69, pedigree (1,1,5,1,1)
  own assumption
- Lead II [air, non-urban air or from high stacks]: 9.15657e-10 kg; lognormal variance with pedigree 0.08, pedigree (1,1,5,1,1)
  own assumption
- Manganese II [air, non-urban air or from high stacks]: 4.98625e-10 kg; lognormal variance with pedigree 0.69, pedigree (1,1,5,1,1)
  own assumption
- Mercury II [air, non-urban air or from high stacks]: 1.08791e-11 kg; lognormal variance with pedigree 0.34, pedigree (1,1,5,1,1)
  own assumption
- Methane, fossil [air, non-urban air or from high stacks]: 7.94778e-5 kg; lognormal variance with pedigree 1.37, pedigree (1,1,5,1,1)
  own assumption
- Methanol [air, non-urban air or from high stacks]: 1.29038e-7 kg; lognormal variance with pedigree 0.69, pedigree (1,1,5,1,1)
  own assumption
- NMVOC, non-methane volatile organic compounds [air, non-urban air or from high stacks]: 0.000317307 kg; lognormal variance with pedigree 0.69, pedigree (1,1,5,1,1)
  own assumption
- Nickel II [air, non-urban air or from high stacks]: 6.46702e-10 kg; lognormal variance with pedigree 0.69, pedigree (1,1,5,1,1)
  own assumption
- Nitrogen oxides [air, non-urban air or from high stacks]: 2.55961e-5 kg; lognormal variance with pedigree 0.34, pedigree (1,1,5,1,1)
  own assumption
- PAH, polycyclic aromatic hydrocarbons [air, non-urban air or from high stacks]: 6.92031e-8 kg; lognormal variance with pedigree 0.69, pedigree (1,1,5,1,1)
  own assumption
- Particulate Matter, < 2.5 um [air, non-urban air or from high stacks]: 7.46427e-5 kg; lognormal variance with pedigree 0.34, pedigree (1,1,5,1,1)
  own assumption
- Particulate Matter, > 10 um [air, non-urban air or from high stacks]: 0.000125714 kg; lognormal variance with pedigree 0.34, pedigree (1,1,5,1,1)
  own assumption
- Particulate Matter, > 2.5 um and < 10um [air, non-urban air or from high stacks]: 3.41483e-5 kg; lognormal variance with pedigree 0.34, pedigree (1,1,5,1,1)
  own assumption
- Pentachlorophenol [air, non-urban air or from high stacks]: 1.03956e-7 kg; lognormal variance with pedigree 0.34, pedigree (1,1,5,1,1)
  own assumption
- Phosphorus [air, non-urban air or from high stacks]: 1.39011e-9 kg; lognormal variance with pedigree 0.69, pedigree (1,1,5,1,1)
  own assumption
- Propane [air, non-urban air or from high stacks]: 8.64284e-8 kg; lognormal variance with pedigree 0.69, pedigree (1,1,5,1,1)
  own assumption
- Selenium IV [air, non-urban air or from high stacks]: 1.98543e-10 kg; lognormal variance with pedigree 0.69, pedigree (1,1,5,1,1)
  own assumption
- Silver I [air, non-urban air or from high stacks]: 3.92856e-12 kg; lognormal variance with pedigree 0.69, pedigree (1,1,5,1,1)
  own assumption
- Styrene [air, non-urban air or from high stacks]: 1.32362e-9 kg; lognormal variance with pedigree 0.69, pedigree (1,1,5,1,1)
  own assumption
- Sulfur dioxide [air, non-urban air or from high stacks]: 4.89559e-5 kg; lognormal variance with pedigree 0.34, pedigree (1,1,5,1,1)
  own assumption
- Thallium I [air, non-urban air or from high stacks]: 4.59339e-11 kg; lognormal variance with pedigree 0.69, pedigree (1,1,5,1,1)
  own assumption
- Toluene [air, non-urban air or from high stacks]: 1.02445e-7 kg; lognormal variance with pedigree 0.69, pedigree (1,1,5,1,1)
  own assumption
- Water [air, unspecified]: 1.87362e-5 m3; name water_to_air_unspecified; = (water_decarbonised_input/1000*fraction_WDC_to_air); lognormal variance with pedigree 0.0807, pedigree (2,2,5,1,1)
  Calculated value based on literature values and expert opinion. See comments in the parametres' comment field.
  property fraction, origin: fresh water 1; name fraction_origin_fresh_water
  property fraction, origin: salt water 0; name fraction_origin_salt_water
  property fraction, origin: unspecified 0; name fraction_origin_unspecified
- Zinc II [air, non-urban air or from high stacks]: 1.81923e-9 kg; lognormal variance with pedigree 0.69, pedigree (1,1,5,1,1)
  own assumption
- Ammonium [water, surface water]: 5.49999e-7 kg; lognormal variance with pedigree 0.34, pedigree (1,1,5,1,1)
  own assumption
- Chloride [water, surface water]: 4.2912e-5 kg; lognormal variance with pedigree 0.34, pedigree (1,1,5,1,1)
  own assumption
- Hydrogen sulfide [water, surface water]: 8.82415e-8 kg; lognormal variance with pedigree 0.34, pedigree (1,1,5,1,1)
  own assumption
- PAH, polycyclic aromatic hydrocarbons [water, surface water]: 6.61812e-10 kg; lognormal variance with pedigree 0.34, pedigree (1,1,5,1,1)
  own assumption
- Sodium I [water, surface water]: 2.75906e-5 kg; lognormal variance with pedigree 0.34, pedigree (1,1,5,1,1)
  own assumption
- Solids, inorganic [water, surface water]: 2.42664e-5 kg; lognormal variance with pedigree 0.34, pedigree (1,1,5,1,1)
  own assumption
- Water [water, unspecified]: 2.96153e-5 m3; name water_to_water_unspecified; = (water_decarbonised_input/1000)*(1-fraction_WDC_to_air); lognormal variance with pedigree 0.0807, pedigree (2,2,5,1,1)
  (same comment as for Water)
  property carbon content, fossil 0; name C_content_fossil
  property carbon content, non-fossil 0; name C_content_non_fossil
  property dry mass 0 kg; name DM
  property fraction, origin: fresh water 1; name fraction_origin_fresh_water_Ww
  property fraction, origin: salt water 0; name fraction_origin_salt_water_Ww
  property fraction, origin: unspecified 0; name fraction_origin_unspecified_Ww
  property water in wet mass 1000 kg; name WWM
  property wet mass 1000 kg; name WM

## Sampling procedure
literature

## Extrapolations
see Geography/Text
