# cadmium telluride production, semiconductor-grade

Dataset: EcoSpold 2, unit process
Geography: US
Time period: 1985-01-01 to 2023-12-31
Technology level: current
Classification: ISIC rev.4 ecoinvent: 2011:Manufacture of basic chemicals
Synonyms: Cadmium telluride; EINECS 215-149-9; 1306-25-8; Cadmium telluride (CdTe); Cadmium monotelluride; CdTe cpd; Irtran 6
Scenario: Business-as-Usual
System model: Allocation, cut-off by classification
Generated by: Matthias Tuchschmid (obsolete)
Published in: Classen M. 2009
Database: ecoinvent
isCopyrightProtected: true
accessRestrictedTo: 1

## General comment
This dataset describes the production of high-grade cadmium telluride (99.999%) from cadmium and tellurium. Cadmium telluride (CdTe) is a basic component of thin film solar cells and is used as a several-micrometer thin coating. Another application is the use of CdTe for optical infrared devices (alloyed with mercury) or a solid-state x-ray and gamma ray detector (alloyed with zinc). This dataset is based on literature and assumptions.
References:
Classen M., Althaus H.-J., Blaser S., Tuchschmid M., Jungbluth N., Doka G., Faist Emmenegger M. and Scharnhorst W. (2009) Life Cycle Inventories of Metals. Final report ecoinvent data v2.1, No 10. EMPA Dübendorf, Swiss Centre for Life Cycle Inventories, Dübendorf, CH.

## Included activities start
The activity starts when the raw materials enter the process.

## Included activities end
This activity ends with the production of cadmium telluride. The consumption of raw materials and energy are taken into account. The emissions are estimated.

## Geography
Production in US.

## Technology
Production of cadmium telluride from cadmium and tellurium. Harman (1985) reports the preparation of CdTe for substrates: “Elements are sealed in evacuated, carbon-coated quartz tubes. The capsule is placed in a single furnace which is initially in a nearly horizontal position. A slight tilt in the furnace keeps the liquid and solid material at the small diameter end of the tube. The temperature of the furnace is raised to its final temperature of about 1110°C, at the conical tip end approximately 100°C lower. The temperature of the growth tube is held for about 16 to 20hrs, then the furnace is rotated about 90° to a vertical position. After the temperature is stabilized, the tube is lowered at a rate of about 1.2mm/hr until the solution has completely solidified.”
Reference(s):
Classen M., Althaus H.-J., Blaser S., Tuchschmid M., Jungbluth N., Doka G., Faist Emmenegger M. and Scharnhorst W. (2009) Life Cycle Inventories of Metals. Final report ecoinvent data v2.1, No 10. EMPA Dübendorf, Swiss Centre for Life Cycle Inventories, Dübendorf, CH.
Harman T. (1985) Process for making mercury cadmium telluride. Patent Number U.S. 4642142.

## Time period
Time of patents.

## Reference product
- cadmium telluride, semiconductor-grade: 1 kg; name RP; By-product classification allocatable product; CPC 34250: Salts of oxometallic or peroxometallic acids; colloidal precious metals and compounds thereof; inorganic and o[…]; HS2017 8107: Cadmium; articles thereof, including waste and scrap; CAS 1306-25-8
  Cadmium telluride (CdTe) is a basic component of thin film solar cells and is used as a several-micrometer thin coating. Another application is the use of CdTe for optical infrared devices (alloyed with mercury) or a solid-state x-ray and gamma ray detector (alloyed with zinc).
  References:
  Classen M., Althaus H.-J., Blaser S., Tuchschmid M., Jungbluth N., Doka G., Faist Emmenegger M. and Scharnhorst W. (2009) Life Cycle Inventories of Metals. Final report ecoinvent data v2.1, No 10. EMPA Dübendorf, Swiss Centre for Life Cycle Inventories, Dübendorf, CH.
  production volume 5955.8 kg; name RP_PV
    Calculated from GLO production volumes, attributing 59% of CdTe semiconductor grade production to the US, as for CdTe laminate (Tab 9.4, ecoinvent v2 report 6_XII)
  property price 20.413 EUR2005
    Calculated based on mollar masses of Cd and Te; price estimated based on Te and Cd contents of the product and using 5-year market average prices (2015-2019; USD/kg; USGS [2020]) and converted to EUR2005 (USD2019/EUR2005 exchange rate: 0.62; Official Data Foundation [2020] and Macrotrends [2020]).
    References:
    Official Data Foundation (2020). Inflation Calculator [Online]. Available from: https://www.officialdata.org/us/inflation/2005?endYear=2019&amount=1 [Accessed 28/07/2020]
    USGS (2020). Mineral Commodity Summaries 2020 [Online]. Available from: https://pubs.usgs.gov/periodicals/mcs2020/mcs2020.pdf [Accessed 28/07/2020]
    Macrotrends (2020). Euro Dollar Exchange Rate (EUR USD) - Historical Chart [Online]. Available from: https://www.macrotrends.net/2548/euro-dollar-exchange-rate-historical-chart [Accessed 28/07/2020]
  properties: carbon allocation 0 kg, carbon content 0, carbon content, fossil 0, carbon content, non-fossil 0, dry mass 1 kg, water content 0, water in wet mass 0 kg, wet mass 1 kg

## Inputs from technosphere
- cadmium, semiconductor-grade: 0.49298 kg; name cadmium; lognormal variance with pedigree 0.35, pedigree (5,5,5,5,5)
  Calculated based on formula.
  This product is assumed to be supplied exclusively by the production in the US, therefore a direct activity link to the activity "cadmium production, semiconductor-grade" in the US is used.
  Uncertainty: c
  properties: dry mass 1 kg, wet mass 1 kg
- chemical factory, organics: 4e-10 unit; lognormal variance with pedigree 0.3498, pedigree (2,3,5,4,3)
  Calculated based on literature data published by the industry. For this activity, no information was readily available concerning infrastructure and land-use. Therefore, the infrastructure is estimated based on data from two chemical factories, the BASF site of Ludwigshafen and the chemical factory in Gendorf (which are both located in Germany), which produce a wide range of chemical substances. Based on this data, the following assumptions are made: the built area amounts to about 4.2 ha, the plant has an average output of 50'000 t/a and a lifespan of fifty years. The estimated infrastructure amount is therefore 4.00 E-10 units per kg of produced chemical.
  References:
  Althaus H.-J., Chudacoff M., Hischier R., Jungbluth N., Osses M. and Primas A. (2007) Life Cycle Inventories of Chemicals. ecoinvent report No. 8, v2.0. EMPA Dübendorf, Swiss Centre for Life Cycle Inventories, Dübendorf, CH.
  Gendorf (2000) Umwelterklärung 2000, Werk Gendorf. Werk Gendorf, Burgkirchen.
- electricity, medium voltage: 12.436 kWh; lognormal variance with pedigree 0.1387, pedigree (5,3,5,3,3)
  Personal communication (Fthenakis)
  Uncertainty: p
- tellurium, semiconductor-grade: 0.55965 kg; lognormal variance with pedigree 0.35, pedigree (5,5,5,5,5)
  Calculated based on formula
  Uncertainty: c
  properties: dry mass 1 kg, wet mass 1 kg
- transport, freight train: 0.098596 metric ton*km; = cadmium * 200/1000
  The cadmium is assumed to be transported 200 km by rail. This is the standard rail transport distance for the US (see table 4.2, p. 635/926 in Classen et al., 2009).
  References:
  Classen M., Althaus H.-J., Blaser S., Tuchschmid M., Jungbluth N., Doka G., Faist Emmenegger M. and Scharnhorst W. (2009) Life Cycle Inventories of Metals. Final report ecoinvent data v2.1, No 10. EMPA Dübendorf, Swiss Centre for Life Cycle Inventories, Dübendorf, CH, Online-Version under: www.ecoinvent.ch
- transport, freight, lorry, unspecified: 0.049298 metric ton*km; = cadmium * 100/1000
  The cadmium is assumed to be transported 100 km by lorry. This is the standard road transport distance for the US (see table 4.2, p. 635/926 in Classen et al., 2009).
  References:
  Classen M., Althaus H.-J., Blaser S., Tuchschmid M., Jungbluth N., Doka G., Faist Emmenegger M. and Scharnhorst W. (2009) Life Cycle Inventories of Metals. Final report ecoinvent data v2.1, No 10. EMPA Dübendorf, Swiss Centre for Life Cycle Inventories, Dübendorf, CH, Online-Version under: www.ecoinvent.ch

## Emissions to nature
- Cadmium II [air, urban air close to ground]: 6e-6 kg; lognormal variance with pedigree 0.7461, pedigree (5,5,5,3,3)
  Estimation
  Uncertainty: e

## Sampling procedure
Literature and estimations.

## Extrapolations
Emissions of cadmium into the air are extrapolated from cadmium purification.

## Review by Emilia Moreno Ruiz 2017-08-09
This dataset was additionally reviewed in a separate review process by Eric Johnson of Atlantic Consulting as well as Emilia Moreno Ruiz and Gregor Wernet of ecoinvent.
