# heat production, air-water heat pump 10kW

Dataset: EcoSpold 2, unit process
Geography: RoW
Time period: 1998-01-01 to 2023-12-31
Technology level: current
Classification: EcoSpold01Categories: heat pumps/heating systems
Classification: ISIC rev.4 ecoinvent: 3530:Steam and air conditioning supply
Tags: ConvertedDataset
Scenario: Business-as-Usual
System model: Allocation, cut-off by classification
Share of production covered: 0 %
Generated by: Thomas Heck
Published in: Heck, T. 2007
Database: ecoinvent
isCopyrightProtected: true
accessRestrictedTo: 1

## General comment
Heat at heat pump without heat distribution. A life time of 20 years has been assumed for the heat pump.
[This dataset was already contained in the ecoinvent database version 2. It was not individually updated during the transfer to ecoinvent version 3. Life Cycle Impact Assessment results may still have changed, as they are affected by changes in the supply chain, i.e. in other datasets. This dataset was generated following the ecoinvent quality guidelines for version 2. It may have been subject to central changes described in the ecoinvent version 3 change report (http://www.ecoinvent.org/database/ecoinvent-version-3/reports-of-changes/), and the results of the central updates were reviewed extensively. The changes added e.g. consistent water flows and other information throughout the database. The documentation of this dataset can be found in the ecoinvent reports of version 2, which are still available via the ecoinvent website. The change report linked above covers all central changes that were made during the conversion process.]

## Included activities end
Includes infrastucture and electricity (electricity mix UCTE) for heat pump. Includes emissions of refrigerant (R134a) during operation. Heat at heat pump, i.e. heat distribution in the house is not included. Infrastructure extrapolated from brine-water heat pump using a correction factor.

## Geography
Conditions of operation extrapolated from Switzerland to RER. Operation with UCTE electricity mix.

## Technology
Based on average SPF2 (Seasonal Performance Factor, including auxiliary energy) of air-water heat pumps installed in year 1998 operating in Switzerland.

## Reference product
- heat, air-water heat pump 10kW: 1 MJ; By-product classification allocatable product; CPC 17300: Steam and hot water; HS2017 841861: Heat pumps; other than air conditioning machines of heading no. 8415
  EcoSpold01Location=RER
  production volume 2.67763 MJ
    This is a placeholder value that does not reflect real-world production volumes. This dataset does not currently require a real-world production volume to work in the database framework, and no actual data were collected yet. This has no negative effect on the results of the ecoinvent database.
  property price 0.0106 EUR2005
    Average European district heat price from Ecoheatcool and Euroheat 2005-2006, Ecoheat Work package 1: The European heat market. Final report. 10.6 EUR/GJ i s the price of district heat. http://www.solarthermalworld.org/files/Ecoheatcool%20WP1%20Web.pdf?download
  properties: carbon allocation 0 kg, carbon content 0

## Inputs from technosphere
- electricity, low voltage: 0.000201015, 0.0031611, 0.0656127, 0.00647629, 4.03395e-5, 0.0225895, 0.0011191 kWh (7 suppliers, which the file names only by identifier); sum of these 0.0992 kWh; lognormal variance with pedigree 0.052, pedigree (1,1,5,5,1)
  EcoSpold01Location=UCTE
  Seasonal Performance Factor measured in Switzerland 1998; uncertainty from range of Coefficient of Performance.
- heat pump, brine-water, 10kW: 1.11e-6 unit; lognormal variance with pedigree 0.082, pedigree (1,1,5,5,1)
  EcoSpold01Location=CH
  uncertainty of life time
- refrigerant R134a: 4e-6 kg; lognormal variance with pedigree 0.112, pedigree (1,1,5,5,1)
  EcoSpold01Location=RER
  uncertainty estimated from range of values in literature
  properties: carbon content, fossil 0.235294, dry mass 1 kg, heating value, net 9.51 MJ, wet mass 1 kg

## Emissions to nature
- 1,1,1,2-Tetrafluoroethane [air, urban air close to ground]: 4e-6 kg; lognormal variance with pedigree 0.112, pedigree (1,1,5,5,1)
  estimated from range of values in literature

## Sampling procedure
Literature

## Extrapolations
see Geography/Text This dataset has been copied from an original dataset covering the geography Europe without Switzerland. The uncertainty has been adjusted accordingly.

## Review by Gerald Rebitzer (obsolete) 2004-05-28
prepared
