# NPK (26-15-15) fertiliser production

Dataset: EcoSpold 2, unit process
Geography: RoW
Time period: 2011-01-01 to 2023-12-31
Technology level: current
Classification: ISIC rev.4 ecoinvent: 2012:Manufacture of fertilizers and nitrogen compounds
Scenario: Business-as-Usual
System model: Allocation, cut-off by classification
Generated by: Anna Kounina
Database: ecoinvent
isCopyrightProtected: true
accessRestrictedTo: 1

## General comment
This dataset is a weighted average from the respective regional datasets.
This dataset represents the production of 1 kg of NPK fertiliser with 26% N, 15% P2O5 and 15% K2O. NPK (26-15-15) is a compound fertiliser used to enrich the soil in nitrogen (N), phosphorous (P) and potassium (K), three of the main macronutrients needed to support plant growth.
In the NPK compound production process, potassium chloride, ammonium nitrate, di ammonium phosphate are mixed to form the NPK compound.
The main data sources for this dataset are Fertilizers Europe (2014, 2016). Additional data sources are listed as follows.
References:
Fertilizers Europe (2000): Best Available Techniques for Pollution Prevention and Control in the European Fertilizer Industry. Booklet No. 1 of 8: Production of Ammonia. Fertilizers Europe, Brussels.
Kongshaug G. (1998): Energy Consumption and Greenhouse Gas Emissions in Fertilizer Production. IFA 20th July 1998
Davies J., Haglund C. (1999): Life Cycle Inventory of Fertiliser Production. SIK-Report No 654 1999. Chalmers University of Technology, Sweden.
Fertilizers Europe (2000): Best Available Techniques for Pollution Prevention and Control in the European Fertilizer Industry. Booklet No. 7 of 8: Production of NPK Fertilizers by the Nitrophosphate Route. Fertilizers Europe, Brussels.
Fertilizers Europe (2016): Carbon Footprint Calculator for Fertilizer Production. Specification. Version 2.1
Fertilizers Europe (2016): Average Emissions Year 2014. Fertilizers Europe Environmental report (internal). Used for updated energy and GHG emission in Carbon Footprint Calculator
Fertilizers Europe (2014): Average Emissions Year 2011. Fertilizers Europe Environmental report (internal).
Althaus H.-J., Chudacoff M., Hischier R., Jungbluth N., Osses M. and Primas A. (2007) Life Cycle Inventories of Chemicals. ecoinvent report No. 8, v2.0. EMPA Dübendorf, Swiss Centre for Life Cycle Inventories, Dübendorf, CH.

## Included activities start
The activity includes all the raw and processed materials necessary to produce this product. Nitric acid, liquid ammonia, potassium chloride, ammonium nitrate,, heat (as natural gas), steam and electricity are included. Direct emissions include ammonia and particulate matter to air and phosphorous to water.

## Included activities end
The activity ends with the final product being ready for transportation at the production site.

## Geography
This dataset is a weighted average built from the following geographies: RER, RNA, CN.

## Technology
Average techlogy from the regional counterparts as given in the geography comment.

## Time period
Primary data were collected on fertiliser production for the year 2011. These data were based on annual average data for the year 2011.

## Reference product
- NPK (26-15-15) fertiliser: 1 kg; name RP; By-product classification allocatable product; CPC 34641: Fertilizers containing three nutrients: nitrogen, phosphorus and potassium; HS2017 310520: Fertilizers, mineral or chemical; containing the three fertilizing elements nitrogen, phosphorus and potassium
  production volume 6.59509e8 kg; name PVRP
    Estimated value in kg/y. Based on data from FAO, the global agricultural use of NPK fertilisers amounts to 19242189.42 t. It is assumed that 10% of this is NPK 26-15-15. The PV was scaled according to the nominal GDP in 2014 of the given region and the global nominal GDP in 2014 (retrieved from: https://unstats.un.org/unsd/snaama/Basic, accessed 20200512). The nominal GDP corresponds to GDP at current price-US Dollars (source: United Nations, http://data.un.org/Glossary.aspx?q=GDP+%28current+US%24%29, accessed 20200512).
  property carbon content, fossil 0
    Carbon content, fossil is calculated based on the chemical formula of the substance.
  property nitrogen content 0.26
    Nitrogen content (on a dry matter basis) of NPK (26-15-15) fertiliser is calculated from the molecular formula of the substance ().
  property phosphorus content 0.15
    Phosphorus content (on a dry matter basis) of NPK (26-15-15) fertiliser is calculated from the molecular formula of the substance ().
  property potassium content 0.15
    Potassium content (on a dry matter basis) of NPK (26-15-15) fertiliser is calculated from the molecular formula of the substance ().
  property price 0.467889 EUR2005
    Calculated based on inputs: The price of the product has been calculated as a sum of the values of the material and energy inputs for this product. This value is therefore a rough estimation. It may underestimate the real price since there are additional expenses when producing any product. These expences can include for example labour costs, treatment of waste materials and profit for the producer. Please consider carefully whether this level of data quality is acceptable for your application.
  properties: carbon allocation 0 kg, carbon content 0, carbon content, non-fossil 0, dry mass 1 kg, water content 0, water in wet mass 0 kg, wet mass 1 kg

## Inputs from technosphere
- ammonium nitrate: 0.72 kg; lognormal variance with pedigree 0.0466, pedigree (3,4,5,5,1)
  This flow is weighted averages using the exchanges in the corresponding regional data.
  properties: dry mass 1 kg, hydrogen content 0.0503678, nitrogen content 0.349979, oxygen content 0.599654, wet mass 1 kg
  note on hydrogen content: Hydrogen content (on a dry matter basis) of ammonium nitrate is calculated from the molecular formula of the substance (H4N2O3).
  note on nitrogen content: Nitrogen content (on a dry matter basis) of ammonium nitrate is calculated from the molecular formula of the substance (H4N2O3).
  note on oxygen content: Oxygen content (on a dry matter basis) of ammonium nitrate is calculated from the molecular formula of the substance (H4N2O3).
- dolomite: 0.103 kg; lognormal variance with pedigree 0.0466, pedigree (3,4,5,5,1)
  This flow is weighted averages using the exchanges in the corresponding regional data.
  properties: calcium content 0.217342, carbon content, fossil 0.130267, dry mass 1 kg, heating value, net 3.95 MJ, magnesium content 0.131805, oxygen content 0.520586, wet mass 1 kg
  note on calcium content: Calcium content (on a dry matter basis) of dolomite is calculated from the molecular formula of the substance (CaMgC2O6).
  note on carbon content, fossil: Carbon content, fossil is calculated based on the chemical formula of the substance.
  note on magnesium content: Magnesium content (on a dry matter basis) of dolomite is calculated from the molecular formula of the substance (CaMgC2O6).
  note on oxygen content: Oxygen content (on a dry matter basis) of dolomite is calculated from the molecular formula of the substance (CaMgC2O6).
- electricity, low voltage: 0.000594519, 0.00321691, 0.000125019, 4.86084e-5, 0.000808761, 4.87746e-5, 0.000166689, 6.66026e-5, 2.29518e-5, 5.88201e-5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 kWh (44 suppliers, which the file names only by identifier); sum of these 0.0277778 kWh; lognormal variance with pedigree 0.0466, pedigree (3,4,5,5,1)
  This flow is weighted averages using the exchanges in the corresponding regional data.
- monoammonium phosphate: 0.288 kg; lognormal variance with pedigree 0.0466, pedigree (3,4,5,5,1)
  This flow is weighted averages using the exchanges in the corresponding regional data.
  properties: dry mass 1 kg, nitrogen content 0.084, phosphorus content 0.226939, wet mass 1 kg
  note on nitrogen content: Nitrogen content (on a dry matter basis) of monoammonium phosphate is calculated from the molecular formula of the nutrient present in the substance.
  note on phosphorus content: Phosphorus content (on a dry matter basis) of monoammonium phosphate is calculated from the molecular formula of the nutrient present in the substance.
- potassium chloride: 0.25 kg; lognormal variance with pedigree 0.0466, pedigree (3,4,5,5,1)
  This flow is weighted averages using the exchanges in the corresponding regional data.
  properties: dry mass 1 kg, wet mass 1 kg
- steam, in chemical industry: 0.109091 kg; lognormal variance with pedigree 0.0466, pedigree (3,4,5,5,1)
  This flow is weighted averages using the exchanges in the corresponding regional data.
  properties: dry mass 1 kg, wet mass 1 kg
- tap water: 0.00885928, 0.0135052, 0.0252001, 0.0678871, 0.340548 kg (5 suppliers, which the file names only by identifier); sum of these 0.456 kg; = (BP+ Water_air)*1000; lognormal variance with pedigree 0.1466, pedigree (4,5,4,5,5)
  calculated to balance the water output
  properties: carbon content, fossil 0.00178991, dry mass 0.000337476 kg, water content 2962.17, wet mass 1 kg
  note on carbon content, fossil: Bicarbonate content is 2.93 mol/m3. CO2 content is 0.1 mol/m3 (ecoinvent v2.2 report 8, Tab 93.1).
- wastewater, average: -0.00036 m3; name BP; lognormal variance with pedigree 0.0086, pedigree (3,4,3,5,1)
  This flow is weighted averages using the exchanges in the corresponding regional data.
  production volume; = PVRP*BP/RP
    Calculated based on the production volume of the reference product.
  properties: carbon content, non-fossil 0.194039, dry mass 0.346837 kg, water content 2882.2, wet mass 1000 kg
  note on carbon content, non-fossil: 0.0673 kg TOC/m3 (Tab A.17, ecoinvent v2.2 report 13_I). TOC was considered as Total Carbon.

## Emissions to nature
- Ammonia [air, urban air close to ground]: 0.00032 kg; lognormal variance with pedigree 0.086, pedigree (3,4,5,5,1)
  This flow is weighted averages using the exchanges in the corresponding regional data.
- Fluorine [air, urban air close to ground]: 1.5e-6 kg; lognormal variance with pedigree 0.086, pedigree (3,4,5,5,1)
  This flow is weighted averages using the exchanges in the corresponding regional data.
- Particulate Matter, > 2.5 um and < 10um [air, urban air close to ground]: 0.00015 kg; lognormal variance with pedigree 0.166, pedigree (3,4,5,5,1)
  This flow is weighted averages using the exchanges in the corresponding regional data.
- Water [air, unspecified]: 9.6e-5 m3; name Water_air; lognormal variance with pedigree 0.086, pedigree (3,4,5,5,1)
  This flow is weighted averages using the exchanges in the corresponding regional data.
- Fluoride [water, ocean]: 0.000135 kg; lognormal variance with pedigree 0.696, pedigree (3,4,5,5,1)
  This flow is weighted averages using the exchanges in the corresponding regional data.
- Nitrogen [water, surface water]: 0.00023 kg; lognormal variance with pedigree 0.086, pedigree (3,4,5,5,1)
  This flow is weighted averages using the exchanges in the corresponding regional data.
- Phosphorus [water, surface water]: 1.65e-5 kg; lognormal variance with pedigree 0.086, pedigree (3,4,5,5,1)
  This flow is weighted averages using the exchanges in the corresponding regional data.

## Extrapolations
This dataset was built as a weighted average of regional datasets of the same activityName. Weights are based on production volumes.
RER: production volume = 5.42e+08 kg/year, weight = 0.4282
RNA: production volume = 4.7e+08 kg/year, weight = 0.3713
CN: production volume = 2.53e+08 kg/year, weight = 0.2004
