# explosive production, tovex

Dataset: EcoSpold 2, unit process
Geography: RoW
Time period: 1997-01-01 to 2023-12-31
Technology level: current
Classification: ISIC rev.4 ecoinvent: 2029:Manufacture of other chemical products n.e.c.
Classification: EcoSpold01Categories: chemicals/inorganics
Synonyms: blasting; agent
Tags: ConvertedDataset
Scenario: Business-as-Usual
System model: Allocation, cut-off by classification
Generated by: Daniel Kellenberger (obsolete)
Published in: Kellenberger D. 2007
Database: ecoinvent
isCopyrightProtected: true
accessRestrictedTo: 1

## General comment
As almost no data are available most information is assumed. Only the information on the raw material is handed over in written form. This module should not be used if its relative importance would be high in a certain environmental inventory.
[This dataset was already contained in the ecoinvent database version 2. It was not individually updated during the transfer to ecoinvent version 3. Life Cycle Impact Assessment results may still have changed, as they are affected by changes in the supply chain, i.e. in other datasets. This dataset was generated following the ecoinvent quality guidelines for version 2. It may have been subject to central changes described in the ecoinvent version 3 change report (http://www.ecoinvent.org/database/ecoinvent-version-3/reports-of-changes/), and the results of the central updates were reviewed extensively. The changes added e.g. consistent water flows and other information throughout the database. The documentation of this dataset can be found in the ecoinvent reports of version 2, which are still available via the ecoinvent website. The change report linked above covers all central changes that were made during the conversion process.]

## Included activities end
includes the whole manufacturing process to produce Tovex (raw material provision, mixing process, packing, internal processes (transport, etc.) and infrastructure.

## Geography
For some exchanges RER- and DE-modules have been used as proxy

## Technology
The basic materials are poured by gravity in a mixer. When filled with 1'500kg the mixing procedure starts and lasts about 15min. To keep it warm it's filled in a hot basin from where it is put in sausages by a cartridging machine and then packed in card board boxes. A conveyor belt transports the boxes and puts it on paletts for storing

## Parameters
- fraction, process water, to air: 0.205 dimensionless; name fraction_PW_to_air; lognormal variance with pedigree 0.092025, pedigree (4,4,3,2,4)
- fraction, tap water, to air: 0.205 dimensionless; name fraction_TW_to_air; lognormal variance with pedigree 0.092025, pedigree (4,4,3,2,4)

## Reference product
- explosive, tovex: 1 kg; By-product classification allocatable product; CPC 35450: Prepared explosives; safety fuses; detonating fuses; percussion or detonating caps; igniters; electric detonat[…]; HS2017 360200: Explosives, prepared; other than propellent powders
  EcoSpold01Location=CH
  production volume 3.96633 kg
    This is a placeholder value that does not reflect real-world production volumes. This dataset does not currently require a real-world production volume to work in the database framework, and no actual data were collected yet. This has no negative effect on the results of the ecoinvent database.
  property carbon content, fossil 0.0483756
    Composition in Tab 4.1, ecoinvent v2.2 report n 7-part XVIII. 23% of wet mass consists of CH6N2O3
  property carbon content, non-fossil 0
    (same comment as for explosive, tovex)
  property heating value, net 0 MJ
    Non combustible products are assumed to have an LHV equal to zero (0).
  properties: carbon allocation 0.0445056 kg, carbon content 0.0483756, dry mass 0.92 kg, price 0.964 EUR2005, water content 0.0869565, water in wet mass 0.08 kg, wet mass 1 kg

## Inputs from technosphere
- EUR-flat pallet: 0.0004 unit; lognormal variance with pedigree 0.148, pedigree (4,5,5,5,4)
  EcoSpold01Location=RER
  properties: carbon content, fossil 0.0311351, carbon content, non-fossil 0.58833, dry mass 18.3333 kg, heating value, net 335.11 MJ, water content 0.2, wet mass 22 kg
  note on carbon content, fossil: C content in components of the pallet (ecoinvent v2.2 report 7_part XVIII)
- aluminium, wrought alloy: 0.08 kg; lognormal variance with pedigree 0.108, pedigree (4,5,5,5,1)
  EcoSpold01Location=RER
  properties: dry mass 1 kg, wet mass 1 kg
- ammonium nitrate: 0.0807667, 0.27418, 0.105082 kg (3 suppliers, which the file names only by identifier); sum of these 0.460028 kg; lognormal variance with pedigree 0.108, pedigree (4,5,5,5,1)
  EcoSpold01Location=RER
  The exchange has been updated from 'ammonium nitrate, as N' into 'ammonium nitrate' and therefore its amount has been scaled (multiplied) from 0.161 kg by 2.8573 kg of 'ammonium nitrate' per kg of 'ammonium nitrate, as N'.
  properties: dry mass 1 kg, wet mass 1 kg
- calcium nitrate: 0.477057 kg; = 0.0566*(164+72)/28; lognormal variance with pedigree 0.108, pedigree (4,5,5,5,1)
  calculated from the original input measured as N (molar masses N2)
  property carbon content, fossil 0; name C_content_fossil
  property carbon content, non-fossil 0; name C_content_non_fossil
  property dry mass 1 kg; name DM
  property water content 0; name water_content
  property water in wet mass 0 kg; name WWM
  property wet mass 1 kg; name WM
- corrugated board box: 0.000621182, 2.31391e-5, 0.00135568 kg (3 suppliers, which the file names only by identifier); sum of these 0.002 kg; lognormal variance with pedigree 0.14, pedigree (5,5,5,5,1)
  EcoSpold01Location=RER
  properties: carbon content, fossil 0.000656085, carbon content, non-fossil 0.432275, dry mass 0.945 kg, heating value, net 12.86 MJ, water content 0.0582011, wet mass 1 kg
  note on carbon content, fossil: Fossil C content was calculated after fossil C contents of chemicals used in the production of board (Tab 10-15 & 10.16 ecoinvent v2.2 report 11_III, part 10)
  note on carbon content, non-fossil: Biogenic C content was calculated after biogenic C contents of chemicals used in the production of board (Tab 10.15 & 10.16, ecoinvent v2.2 report 11_III, part 10).
- diesel, burned in building machine: 0.0214 MJ; lognormal variance with pedigree 0.288, pedigree (4,5,5,5,5)
  EcoSpold01Location=GLO
  properties: heating value, net 1 MJ
- electricity, medium voltage: 0.00241067, 0.0480874, 0.0161572, 0.000738229, 0.000147756, 3.17265e-5, 0.0033578, 0.00496577, 0.0104034 kWh (9 suppliers, which the file names only by identifier); sum of these 0.0863 kWh; lognormal variance with pedigree 0.288, pedigree (4,5,5,5,5)
  EcoSpold01Location=CH
- explosives factory: 6.67e-9 unit; lognormal variance with pedigree 0.64, pedigree (5,5,5,5,5)
  EcoSpold01Location=CH
- flat glass, uncoated: 0.03 kg; lognormal variance with pedigree 0.108, pedigree (4,5,5,5,1)
  EcoSpold01Location=RER
  properties: dry mass 1 kg, wet mass 1 kg
- heat, central or small-scale, other than natural gas: 0.00198682, 0.144653 MJ (2 suppliers, which the file names only by identifier); sum of these 0.14664 MJ; lognormal variance with pedigree 0.148, pedigree (4,5,5,5,4)
  EcoSpold01Location=CH
  properties: heating value, net 1 MJ
- industrial machine, heavy, unspecified: 0.000167 kg; lognormal variance with pedigree 0.44, pedigree (5,5,5,5,1)
  EcoSpold01Location=RER
- inorganic nitrogen fertiliser, as N: 1.87565e-6, 5.15103e-5, 3.44335e-5, 0.000440133, 5.22101e-5, 3.40416e-5, 6.63474e-6, 0.00056065, 2.86946e-5, 0.000128244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 kg (63 suppliers, which the file names only by identifier); sum of these 0.0566 kg; lognormal variance with pedigree 0.108, pedigree (4,5,5,5,1)
  EcoSpold01Location=RER
  properties: dry mass 1 kg, wet mass 1 kg
- municipal solid waste: -1.02974e-5, -1.22277e-6, -7.76914e-6, -7.61022e-6, -0.00580979, -0.000195718, -8.55648e-7, -2.74648e-7, -6.20779e-7, -2.58432e-5 kg (10 suppliers, which the file names only by identifier); sum of these -0.00606 kg; lognormal variance with pedigree 0.1, pedigree (5,5,1,5,1)
  EcoSpold01Location=CH
  production volume
    Calculated from the production volume of explosive, tovex in proportion to the respective output amounts.
  properties: carbon content, fossil 0.171549, carbon content, non-fossil 0.261655, dry mass 0.771 kg, heating value, net 11.74 MJ, water content 0.297017, wet mass 1 kg
  note on carbon content, fossil: MSW composition in tab 4.1, ecoinvent v2.2 report 13_I. C content referred to 1 kg DM
  note on heating value, net: Value taken from the general comment of the treatment dataset.
- municipal waste collection service by 21 metric ton lorry: 0.0756 metric ton*km; lognormal variance with pedigree 0.25, pedigree (5,5,5,5,1)
  EcoSpold01Location=CH
- paper, woodcontaining, lightweight coated: 0.0222 kg; lognormal variance with pedigree 0.35, pedigree (5,5,5,5,5)
  EcoSpold01Location=RER
  properties: carbon content, fossil 0.032531, carbon content, non-fossil 0.247213, dry mass 0.945 kg, heating value, net 14.11 MJ, water content 0.0582011, wet mass 1 kg
  note on carbon content, fossil: Fossil C content was calculated after fossil C contents of chemicals used in the production of the paper (in Tab 8.39 ecoinvent v2.2 report 11_III, part 8).
  note on carbon content, non-fossil: Biogenic C content was calculated after biogenic C contents of chemicals used in the production of the paper (in Tab 8.39 ecoinvent v2.2 report 11_III, part 8). The cellulose content in 1 kg of paper (on a wet mas basis) was estimated as (1-chemical content), C content of cellulose was considered 0.44 kgC/kg dry mass (ecoinvent v2.2 report, n 15a, pg 40)
- potato starch: 0.009 kg; lognormal variance with pedigree 0.108, pedigree (4,5,5,5,1)
  EcoSpold01Location=DE
  properties: carbon content, non-fossil 0.46, dry mass 0.8 kg, heating value, net 10.66 MJ, water content 0.25, wet mass 1 kg
  note on carbon content, non-fossil: C-content of starch is considered 46% on dry mass basis (from "Evolutionary and Biochemical Aspects", A.D. Kay and T. Vrede (in Global Ecology, 2010, Elsevier B.V., S.E. Jørgensen Ed.)).
- tap water: 0.00687749, 0.0104841, 0.0195629, 0.052701, 0.00634379, 0.264369, 3.02531, 2.25436 kg (8 suppliers, which the file names only by identifier); sum of these 5.64 kg; lognormal variance with pedigree 0.35, pedigree (5,5,5,5,5)
  EcoSpold01Location=RER
  properties: carbon content, fossil 0.00178991, dry mass 0.000337476 kg, water content 2962.17, wet mass 1 kg
  note on carbon content, fossil: Bicarbonate content is 2.93 mol/m3. CO2 content is 0.1 mol/m3 (ecoinvent v2.2 report 8, Tab 93.1).
- waste paperboard, unsorted: -0.0015 kg; lognormal variance with pedigree 0.1, pedigree (5,5,1,5,1)
  EcoSpold01Location=CH
  production volume
    (same comment as for municipal solid waste)
  properties: carbon content, non-fossil 0.483259, dry mass 0.804 kg, heating value, net 15.92 MJ, price 0.03924 EUR2005, water content 0.243781, wet mass 1 kg
  note on carbon content, non-fossil: C content was calculated for 1 kg DM, using data in Tab A.3, ecoinvent v2.2 report 13_I.
- wastewater, average: -0.0044742, -0.00106987, -1.59298e-5 m3 (3 suppliers, which the file names only by identifier); sum of these -0.00556 m3; lognormal variance with pedigree 0.1, pedigree (5,5,1,5,1)
  EcoSpold01Location=CH
  production volume
    (same comment as for municipal solid waste)
  properties: carbon content, non-fossil 0.194039, dry mass 0.346837 kg, water content 2882.2, wet mass 1000 kg
  note on carbon content, non-fossil: 0.0673 kg TOC/m3 (Tab A.17, ecoinvent v2.2 report 13_I). TOC was considered as Total Carbon.

## Emissions to nature
- Water [air, unspecified]: 0.0011562 m3; name water_to_air_unspecified; lognormal variance with pedigree 0.0827, pedigree (2,2,5,5,1)
  Calculated value based on literature values and expert opinion. See comments in the parametres' comment field.
  property fraction, origin: fresh water 1; name fraction_origin_fresh_water
  property fraction, origin: salt water 0; name fraction_origin_salt_water
  property fraction, origin: unspecified 0; name fraction_origin_unspecified

## Sampling procedure
Share of basic material by personal communication. All other In- and Output modules are estimations

## Extrapolations
See geography This dataset has been copied from an original dataset covering the geography CH. The uncertainty has been adjusted accordingly.

## Review by Roberto Dones 2003-07-23
passed

## Review by Bo Weidema 2012-07-30
Calcium nitrate input re-calculated from per kg N to per kg calcium nitrate.
