# natural gas pressure reduction, from high to low pressure

Dataset: EcoSpold 2, unit process
Geography: RoE
Time period: 2010-01-01 to 2023-12-31
Technology level: current
Classification: ISIC rev.4 ecoinvent: 3520:Manufacture of gas; distribution of gaseous fuels through mains
Scenario: Business-as-Usual
System model: Allocation, cut-off by classification
Generated by: Carl Vadenbo
Database: ecoinvent
isCopyrightProtected: false
accessRestrictedTo: 1

## General comment
This activity represents the reduction of pressure, from high to low, for the distribution of natural gas [m3] to end-users.

## Included activities start
Only the input of natural gas at high pressure (from regional distribution) considered in this activity.

## Included activities end
Pressure reduction from high to low pressure, for supply to local distribution network. Energy requirements, losses and emissions, and infrastructure for the distribution at the different pressure levels are considered in the corresponding market activities.

## Geography
This geography represents the subset of European countries, excluding the following: Belgium, Switzerland, Germany, Spain, France, United Kingdom, italy, Netherlands

## Technology
Within this dataset, natural gas gas at high pressure(1-5 bar overpressure) is converted to low pressure (0.1 bar overpressure) for local distribution, e.g., for residential use.

## Reference product
- natural gas, low pressure: 1 m3; By-product classification allocatable product; CPC 69120: Gas distribution through mains (on own account); HS2017 271121: Petroleum gases and other gaseous hydrocarbons; in gaseous state, natural gas; CAS 8006-14-2
  production volume 0 m3
    Bussa et al. (2021) use the assumption from Faist-Emmenegger et al. (2015) that 23% of natural gas is consumed at high-pressure level, and the rest (77%) delivered at low pressure.
  property carbon content, fossil 0.741
    C content considered the same as in high pressure (consumption mix)
  property heating value, gross 40 MJ
    At standard conditions, and assuming amount equal to that of high pressure; based on Meili et al. (2022) section 5.5
  property heating value, net 36 MJ
    Literature value, Source: United Nations Statistics Division (2018) International Recommendations for Energy Statistics (IRES). Available at: http://unstats.un.org/unsd/statcom/doc11/BG-IRES.pdf.
  property price 0.16673 EUR2005
    Calculated value based on data from the United Nations Commodity Trade Statistics Database (http://data.un.org/Data.aspx?q=natural+gas&d=ComTrade&f=_l1Code%3a28%3bcmdCode%3a271111; accessed 12 October 2023). UN Comtrade category: 271121 - Natural gas in gaseous state. An average for 2019-2021 was used and adjusted for inflation to the year 2005. The average price of imports and exports into the four main markets (EU, US, JP, and CN) was determined. Density of natural gas of 0.735 kg/m³ for unit conversion was used.
  properties: carbon allocation 0.544635 kg, carbon content 0.741, carbon content, non-fossil 0, dry mass 0.735 kg, water content 0, water in wet mass 0 kg, wet mass 0.735 kg

## Inputs from technosphere
- natural gas, high pressure: 0.0957425, 0.200192, 0.0465234, 0.0548176, 0.0443339, 0.0101029, 0.0246163, 0.102737, 0.079373, 0.0804275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 m3 (13 suppliers, which the file names only by identifier); sum of these 1 m3
  No uncertainty considered since this activity is only intended to link natural gas at low pressure to the corresponding high pressure supply.
  properties: carbon content, fossil 0.741, dry mass 0.735 kg, heating value, gross 40 MJ, heating value, net 36 MJ, wet mass 0.735 kg
  note on carbon content, fossil: An average C content of 0.506 kg C/ m3 has been assumed (this average has been calculated using data in Tab 3.5, ecoinvent v2.2 report 6_V
  note on heating value, gross: At standard conditions; based on Meili et al. (2022) section 5.2
  note on heating value, net: Literature value, Source: United Nations Statistics Division (2018) International Recommendations for Energy Statistics (IRES). Available at: http://unstats.un.org/unsd/statcom/doc11/BG-IRES.pdf.

## Review by Emilia Moreno Ruiz 2015-09-17
broken formula fixed
