# transistor production, wired, small size, through-hole mounting

Dataset: EcoSpold 2, unit process
Geography: GLO
Time period: 1994-01-01 to 2023-12-31
Technology level: current
Classification: EcoSpold01Categories: electronics/component
Classification: ISIC rev.4 ecoinvent: 2610:Manufacture of electronic components and boards
Tags: ConvertedDataset
Scenario: Business-as-Usual
System model: Allocation, cut-off by classification
Generated by: Roland Hischier
Published in: Hischier R. 2007
Database: ecoinvent
isCopyrightProtected: true
accessRestrictedTo: 1

## General comment
This dataset represents the production of 1 kg of small size wired, transistors for through-hole mounting. It is based on the assumption that a wired, small-size transistor in electronic modules has an average weight of 0.818 g. The data represent a typical wired, small-size, transistor used in the information and communication technology. Material data are taken from datasheets of producers of such transistors and from the literature. Infrastructure and production efforts are based on own assumptions. The production efforts represent not a specifictransistor type and have thus, accordingly higher uncertainties.
[This dataset was already contained in the ecoinvent database version 2. It was not individually updated during the transfer to ecoinvent version 3. Life Cycle Impact Assessment results may still have changed, as they are affected by changes in the supply chain, i.e. in other datasets. This dataset was generated following the ecoinvent quality guidelines for version 2. It may have been subject to central changes described in the ecoinvent version 3 change report (http://www.ecoinvent.org/database/ecoinvent-version-3/reports-of-changes/), and the results of the central updates were reviewed extensively. The changes added e.g. consistent water flows and other information throughout the database. The documentation of this dataset can be found in the ecoinvent reports of version 2, which are still available via the ecoinvent website. The change report linked above covers all central changes that were made during the conversion process.]

## Included activities start
From reception of metals and plastics at the factory gate.

## Included activities end
This dataset includes raw material input and production efforts for the production of currently used small-sized wired transistors for through-hole mounting technology.

## Geography
Data represent a global valuable composition of small wired transistors.

## Technology
average production composed of: Si-crystal die bonding; wire bonding; encapsulation; plating; triming; forming and marking.

## Reference product
- transistor, wired, small size, through-hole mounting: 1 kg; By-product classification allocatable product; CPC 47150: Diodes, transistors and similar semi-conductor devices; photosensitive semi-conductor devices; light emitting […]; HS2017 854121: Electrical apparatus; transistors, (other than photosensitive), with a dissipation rate of less than 1W
  A transistor “is a semiconductor device, the most common type of which acts as a current amplifier. There do however exist less common types of transistor - FETs (field effect transistors) - which act as voltage controlled resistors.”
  Currently, there is a huge variety of different types of transistors on the market. Main characteristics are differences in the semiconductor material used, the structure, the polarity, the maximum power rating, the maximum operating frequence or the physical packaging.
  EcoSpold01Location=GLO
  production volume 1 kg
    Dummy value to be replaced by measured, estimated or calculated value
  property carbon content, fossil 0.080338
    Calculated as the addition of C contents in the product composition, and referred to 1 kg DM transistor.
  property price 106.218 EUR2005
    Calculated based on inputs: The price of the product has been calculated as a sum of the values of the material and energy inputs for this product. This value is therefore a rough estimation. It may underestimate the real price since there are additional expenses when producing any product. These expences can include for example labour costs, treatment of waste materials and profit for the producer. Please consider carefully whether this level of data quality is acceptable for your application.
  properties: carbon allocation 0.080338 kg, carbon content 0.080338, carbon content, non-fossil 0, dry mass 1 kg, water content 0, water in wet mass 0 kg, wet mass 1 kg

## Inputs from technosphere
- aluminium, wrought alloy: 0.00058 kg; source Philips Semiconductors 2002; lognormal variance with pedigree 0.042, pedigree (1,4,5,1,1)
  Calculated Value. The production of 1 kg of transistors lead to a waste amount of 4.9 kg unused raw materials. Hence, this dataset here has an input of 5.9 kg of raw materials per kg of transistor. The split to the different raw materials (metals, plastics, etc.) is based on the reported material specifications.
  Further references:
  ST Microelectronics (2004) Chemical Content of Semiconductor Packaging. PDF from <http://www.stmicroelectronics.com/stonline/company/environm/report03/envi03.pdf>.
  EcoSpold01Location=RER
  Uncertainty: average from literature & company information
  properties: dry mass 1 kg, wet mass 1 kg
- copper, cathode: 2.1628 kg; source Philips Semiconductors 2002; lognormal variance with pedigree 0.042, pedigree (1,4,5,1,1)
  EcoSpold01Location=RER
  Calculated Value. The production of 1 kg of transistors lead to a waste amount of 4.9 kg unused raw materials. Hence, this dataset here has an input of 5.9 kg of raw materials per kg of transistor. The split to the different raw materials (metals, plastics, etc.) is based on the reported material specifications.
  Further references:
  ST Microelectronics (2004) Chemical Content of Semiconductor Packaging. PDF from <http://www.stmicroelectronics.com/stonline/company/environm/report03/envi03.pdf>.
  Uncertainty: average from literature & company information
  properties: dry mass 1 kg, wet mass 1 kg
- epoxy resin insulator, SiO2: 2.7231 kg; source Philips Semiconductors 2002; lognormal variance with pedigree 0.042, pedigree (1,4,5,1,1)
  (same comment as for aluminium, wrought alloy)
  properties: carbon content, fossil 0.1693, dry mass 1 kg, heating value, net 5.13 MJ, wet mass 1 kg
  note on carbon content, fossil: Cast resin insulators are produced from epoxy resins, hardeners and a filling material. Aluminium oxide, dolomite and quartz powder are well-known filling materials.The filling material is assumed to be 60% of cast resin insulators (ecoinvent v2.2 report 8. Part 31)
- glass tube, borosilicate: 0.00406 kg; source Philips Semiconductors 2002; lognormal variance with pedigree 0.042, pedigree (1,4,5,1,1)
  Calculated Value. The production of 1 kg of transistors lead to a waste amount of 4.9 kg unused raw materials. Hence, this dataset here has an input of 5.9 kg of raw materials per kg of transistor. The split to the different raw materials (metals, plastics, etc.) is based on the reported material specifications.
  Further references:
  ST Microelectronics (2004) Chemical Content of Semiconductor Packaging. PDF from <http://www.stmicroelectronics.com/stonline/company/environm/report03/envi03.pdf>.
  EcoSpold01Location=DE
  Uncertainty: average from literature & company information
  properties: dry mass 1 kg, wet mass 1 kg
- lead: 0.25346 kg; source Philips Semiconductors 2002; lognormal variance with pedigree 0.042, pedigree (1,4,5,1,1)
  (same comment as for aluminium, wrought alloy)
  properties: dry mass 1 kg, wet mass 1 kg
- nickel, class 1: 0.0812 kg; source Philips Semiconductors 2002; lognormal variance with pedigree 0.042, pedigree (1,4,5,1,1)
  EcoSpold01Location=GLO
  Calculated Value. The production of 1 kg of transistors lead to a waste amount of 4.9 kg unused raw materials. Hence, this dataset here has an input of 5.9 kg of raw materials per kg of transistor. The split to the different raw materials (metals, plastics, etc.) is based on the reported material specifications.
  Further references:
  ST Microelectronics (2004) Chemical Content of Semiconductor Packaging. PDF from <http://www.stmicroelectronics.com/stonline/company/environm/report03/envi03.pdf>.
  Uncertainty: average from literature & company information
  properties: dry mass 1 kg, wet mass 1 kg
- pig iron: 0.0093909, 0.101389 kg (2 suppliers, which the file names only by identifier); sum of these 0.11078 kg; source Philips Semiconductors 2002; lognormal variance with pedigree 0.042, pedigree (1,4,5,1,1)
  Calculated Value. The production of 1 kg of transistors lead to a waste amount of 4.9 kg unused raw materials. Hence, this dataset here has an input of 5.9 kg of raw materials per kg of transistor. The split to the different raw materials (metals, plastics, etc.) is based on the reported material specifications.
  Further references:
  ST Microelectronics (2004) Chemical Content of Semiconductor Packaging. PDF from <http://www.stmicroelectronics.com/stonline/company/environm/report03/envi03.pdf>.
  EcoSpold01Location=GLO
  Uncertainty: average from literature & company information
  properties: carbon content, fossil 0.045, dry mass 1 kg, wet mass 1 kg
  note on carbon content, fossil: Pig iron is the iron produced in the blast furnace. It is an alloy of 94% Fe and more than 2% C (world average 4.5%). (ecoinvent v2.2 report 10_partII)
- silicon, electronics grade: 0.01856 kg; source Philips Semiconductors 2002; lognormal variance with pedigree 0.042, pedigree (1,4,5,1,1)
  EcoSpold01Location=DE
  Calculated Value. The production of 1 kg of transistors lead to a waste amount of 4.9 kg unused raw materials. Hence, this dataset here has an input of 5.9 kg of raw materials per kg of transistor. The split to the different raw materials (metals, plastics, etc.) is based on the reported material specifications.
  Further references:
  ST Microelectronics (2004) Chemical Content of Semiconductor Packaging. PDF from <http://www.stmicroelectronics.com/stonline/company/environm/report03/envi03.pdf>.
  Uncertainty: average from literature & company information
  properties: dry mass 1 kg, wet mass 1 kg
- tin: 0.43268 kg; source Philips Semiconductors 2002; lognormal variance with pedigree 0.042, pedigree (1,4,5,1,1)
  (same comment as for copper, cathode)
  properties: dry mass 1 kg, wet mass 1 kg
- transistor, auxilliaries and energy use: 1 kg; lognormal variance with pedigree 0.134, pedigree (3,4,5,1,4)
  Estimation - details see this other activity dataset
  EcoSpold01Location=GLO
  Uncertainty: rough estimation
- zinc: 0.01334 kg; source Philips Semiconductors 2002; lognormal variance with pedigree 0.042, pedigree (1,4,5,1,1)
  (same comment as for aluminium, wrought alloy)
  properties: dry mass 1 kg, wet mass 1 kg

## Sampling procedure
literature

## Review by Rolf Frischknecht 2007-11-08
passed.

## Review by Roland Hischier 2011-09-20
Transfer of documentation done.
