# treatment of waste yarn and waste textile, unsanitary landfill

Dataset: EcoSpold 2, unit process
Geography: IN
Time period: 2010-01-01 to 2023-12-31
Technology level: current
Classification: ISIC rev.4 ecoinvent: 3821:Treatment and disposal of non-hazardous waste
Scenario: Business-as-Usual
System model: Allocation, cut-off by classification
Generated by: Nikolia Stoikou
Database: ecoinvent
isCopyrightProtected: true
accessRestrictedTo: 1

## General comment
This dataset represents the activity of waste disposal of 'waste yarn and waste textile' in an unsanitary landfill. Recommended use of this dataset: for waste material going to unsanitary landfill, as part of unsorted, unmanaged, unscavenged municipal waste mixture. Inventoried waste consists of fraction: 100% waste yarn and waste textile. Waste composition (wet, in ppmw): gross heating value 16.92 MJ/kg; net heating value 15.72 MJ/kg; H2O 20000; O 461180; H 58257; C 417780; S na; N na; P na; B na; Cl na; Br na; F na; I na; Ag na; As na; Ba na; Cd 0.0046491; Co na; Cr na; Cu 149.09; Hg na; Mn 22.89; Mo na; Ni na; Pb na; Sb na; Se na; Sn na; V na; Zn 25.887; Be na; Sc na; Sr na; Ti na; Tl na; W na; Si na; Fe 133.72; Ca 0.13758; Al na; K na; Mg na; Na na. Share of carbon in initial waste waste that is biogenic 100%. Share of metals in waste not oxidised and bulk-recyclable (exclude very small or thin parts); Iron: 0%; Alu: 0%; Copper: 0%. Overall degradability of waste during 100 years: 12%. 0 kg waste mass remains in the landfill even after the long term period.

## Included activities start
The activity starts with the waste being available at the gate of the treatment facility. Collection and transportation of the waste to the treatment plant is not included.

## Included activities end
The activity ends with the waste being treated and waste-specific emissions from the landfill are released to the environment (air via landfill gas, water via landfill leachate, and subsequent into groundwater).

## Geography
This dataset represents a landfill site with mean annual temperature (MAT) of 24.7211538461538 degC, mean annual precipitation (MAP) of 1083 mm/year, and net infiltration of 510 mm/year. The leachate percolating through the landfill has an average residence time of 7.35 years.
Reference for climatic parameters:
World Bank, 2022. Average precipitation in depth (mm per year), World Bank Group Available at: https://data.worldbank.org/indicator/AG.LND.PRCP.MM?end=2019&start=2019
WMO, 2022. India Meteorological Department and World Meteorological Organization. Available: https://worldweather.wmo.int/en/country.html?countryCode=66

## Technology
This is an inventory for an unsanitary, sub-controlled landfill for municipal solid waste. Ultimate average landfill height is 15 meters. Operation phase duration is 25 years. The total raw landfill gas mass produced in the landfill from this waste is 0.114 kg. The total CH4 mass in the raw landfill gas is 0.05083 kg. Percentage of landfill gas directly emitted is 100w%. Leachate of the landfill is not treated, but emitted untreated. Based on average waste composition and climate data the end of carbonate phase is estimated to be reached 3321 years after waste deposition.

## Reference product
- waste yarn and waste textile: -1 kg; By-product classification Waste; CPC 39214: Cotton waste, except garnetted stock
  main reference product of this activity
  production volume 6.13e8 kg
    The production volume is calculated by summing all textile wastes and yarn wastes produced from the textile industry of cotton (yarn cotton from open end spinning and ring end spinning, knitting of cotton and also weaving of cotton) and the production of jute yarn (yarn production, jute).
  property price 0 EUR2005
    Waste products are assigned a price of zero as they are assumed to require further treatment.
  properties: cadmium content 4.95878e-9, calcium content 1.46744e-7, carbon allocation 0.436327 kg, carbon content 0.445609, carbon content, fossil 0, carbon content, non-fossil 0.445609, copper content 0.000159021, dry mass 0.97917 kg, heating value, gross 16.916 MJ, heating value, net 15.7185 MJ, hydrogen content 0.0621376, iron content 0.000142627, manganese content 2.44147e-5, oxygen content 0.4919, water content 0.0212731, water in wet mass 0.02083 kg, wet mass 1 kg, zinc content 2.76114e-5

## Inputs from technosphere
- diesel, burned in building machine: 0.044754 MJ; lognormal variance with pedigree 0.32122, pedigree (1,1,2,1,1)
  waste distribution and compaction in unsanitary landfill;
  properties: heating value, net 1 MJ
- excavation, skid-steer loader: 0.00030362 m3; lognormal variance with pedigree 0.32122, pedigree (1,1,2,1,1)
  daily cover of waste in unsanitary landfill;

## Inputs from nature
- Organic carbon, placed in landfill [inventory indicator, waste]: 0.41778 kg; lognormal variance with pedigree 0.021704, pedigree (1,1,2,1,1)
  organic carbon placed in unsanitary landfill (for ecoscarcity LCIA only);
- Waste mass, total, placed in landfill [inventory indicator, waste]: 0.95755 kg; lognormal variance with pedigree 0.0002, pedigree (1,1,2,1,1)
  waste mass placed in unsanitary landfill (for ecoscarcity LCIA only);
- Occupation, dump site [natural resource, land]: 0.0022343 m2*year; lognormal variance with pedigree 0.32122, pedigree (1,1,2,1,1)
  for operation phase of unsanitary landfill area;
- Transformation, from pasture, man made [natural resource, land]: 6.3837e-5 m2; lognormal variance with pedigree 0.32122, pedigree (1,1,2,1,1)
  for initial conversion of unsanitary landfill area;
- Transformation, to dump site [natural resource, land]: 6.3837e-5 m2; lognormal variance with pedigree 0.32122, pedigree (1,1,2,1,1)
  conversion to unsanitary landfill area;

## Emissions to nature
- Cadmium II [air, non-urban air or from high stacks]: 6.5444e-13 kg; lognormal variance with pedigree 1.922, pedigree (1,1,2,1,1)
  landfill gas emission from unsanitary landfill (after 0% capture and utilization);
- Calcium II [air, non-urban air or from high stacks]: 5.3742e-13 kg; lognormal variance with pedigree 1.922, pedigree (1,1,2,1,1)
  landfill gas emission from unsanitary landfill (after 0% capture and utilization);
- Carbon dioxide, non-fossil [air, non-urban air or from high stacks]: 0.078614 kg; lognormal variance with pedigree 0.13227, pedigree (1,1,2,1,1)
  landfill gas emission from unsanitary landfill (after 0% capture and utilization);
- Copper ion [air, non-urban air or from high stacks]: 2.5031e-11 kg; lognormal variance with pedigree 1.922, pedigree (1,1,2,1,1)
  landfill gas emission from unsanitary landfill (after 0% capture and utilization);
- Iron ion [air, non-urban air or from high stacks]: 5.51e-11 kg; lognormal variance with pedigree 1.922, pedigree (1,1,2,1,1)
  landfill gas emission from unsanitary landfill (after 0% capture and utilization);
- Manganese II [air, non-urban air or from high stacks]: 7.8647e-10 kg; lognormal variance with pedigree 1.922, pedigree (1,1,2,1,1)
  landfill gas emission from unsanitary landfill (after 0% capture and utilization);
- Methane, non-fossil [air, non-urban air or from high stacks]: 0.036311 kg; lognormal variance with pedigree 0.1728, pedigree (1,1,2,1,1)
  landfill gas emission from unsanitary landfill (after 0% capture and utilization);
- Zinc II [air, non-urban air or from high stacks]: 3.2702e-11 kg; lognormal variance with pedigree 1.922, pedigree (1,1,2,1,1)
  landfill gas emission from unsanitary landfill (after 0% capture and utilization);
- Non-hazardous waste disposed [inventory indicator, waste]: 0.9169 kg; lognormal variance with pedigree 0.0002, pedigree (1,1,2,1,1)
  EN15804 waste mass in unsanitary landfill;
- Heat, waste [soil, industrial]: 1.2173 MJ; lognormal variance with pedigree 0.16848, pedigree (1,1,2,1,1)
  from decomposed waste material in unsanitary landfill;
- BOD5, Biological Oxygen Demand [water, ground-]: 0.00037809 kg; lognormal variance with pedigree 0.51476, pedigree (1,1,2,1,1)
  uncontrolled emissions in unsanitary landfill in moist climate;
- BOD5, Biological Oxygen Demand [water, ground-, long-term]: 0.095194 kg; lognormal variance with pedigree 0.022742, pedigree (1,1,2,1,1)
  emissions to groundwater in unsanitary landfill;
- COD, Chemical Oxygen Demand [water, ground-]: 0.0015971 kg; lognormal variance with pedigree 0.51476, pedigree (1,1,2,1,1)
  uncontrolled emissions in unsanitary landfill in moist climate;
- COD, Chemical Oxygen Demand [water, ground-, long-term]: 0.40211 kg; lognormal variance with pedigree 0.022742, pedigree (1,1,2,1,1)
  emissions to groundwater in unsanitary landfill;
- Cadmium II [water, ground-]: 9.8166e-11 kg; lognormal variance with pedigree 1.922, pedigree (1,1,2,1,1)
  uncontrolled emissions in unsanitary landfill in moist climate;
- Cadmium II [water, ground-, long-term]: 4.5503e-9 kg; lognormal variance with pedigree 1.922, pedigree (1,1,2,1,1)
  emissions to groundwater in unsanitary landfill;
- Calcium II [water, ground-]: 2.1497e-9 kg; lognormal variance with pedigree 1.922, pedigree (1,1,2,1,1)
  uncontrolled emissions in unsanitary landfill in moist climate;
- Calcium II [water, ground-, long-term]: 1.3543e-7 kg; lognormal variance with pedigree 1.8238, pedigree (1,1,2,1,1)
  emissions to groundwater in unsanitary landfill;
- Copper ion [water, ground-]: 8.7608e-8 kg; lognormal variance with pedigree 1.6312, pedigree (1,1,2,1,1)
  uncontrolled emissions in unsanitary landfill in moist climate;
- Copper ion [water, ground-, long-term]: 0.000149 kg; lognormal variance with pedigree 0.90908, pedigree (1,1,2,1,1)
  emissions to groundwater in unsanitary landfill;
- DOC, Dissolved Organic Carbon [water, ground-]: 0.0014602 kg; lognormal variance with pedigree 0.51476, pedigree (1,1,2,1,1)
  uncontrolled emissions in unsanitary landfill in moist climate;
- DOC, Dissolved Organic Carbon [water, ground-, long-term]: 0.36765 kg; lognormal variance with pedigree 0.022742, pedigree (1,1,2,1,1)
  emissions to groundwater in unsanitary landfill;
- Heat, waste [water, ground-, long-term]: 14.886 MJ; lognormal variance with pedigree 0.061261, pedigree (1,1,2,1,1)
  from decomposed waste material in unsanitary landfill;
- Iron ion [water, ground-]: 2.204e-7 kg; lognormal variance with pedigree 1.512, pedigree (1,1,2,1,1)
  uncontrolled emissions in unsanitary landfill in moist climate;
- Iron ion [water, ground-, long-term]: 0.0001335 kg; lognormal variance with pedigree 0.92356, pedigree (1,1,2,1,1)
  emissions to groundwater in unsanitary landfill;
- Manganese II [water, ground-]: 3.1459e-6 kg; lognormal variance with pedigree 1.2517, pedigree (1,1,2,1,1)
  uncontrolled emissions in unsanitary landfill in moist climate;
- Manganese II [water, ground-, long-term]: 1.9743e-5 kg; lognormal variance with pedigree 1.1596, pedigree (1,1,2,1,1)
  emissions to groundwater in unsanitary landfill;
- TOC, Total Organic Carbon [water, ground-]: 0.0014602 kg; lognormal variance with pedigree 0.51476, pedigree (1,1,2,1,1)
  uncontrolled emissions in unsanitary landfill in moist climate;
- TOC, Total Organic Carbon [water, ground-, long-term]: 0.36765 kg; lognormal variance with pedigree 0.022742, pedigree (1,1,2,1,1)
  emissions to groundwater in unsanitary landfill;
- Zinc II [water, ground-]: 1.4716e-7 kg; lognormal variance with pedigree 1.5748, pedigree (1,1,2,1,1)
  uncontrolled emissions in unsanitary landfill in moist climate;
- Zinc II [water, ground-, long-term]: 2.574e-5 kg; lognormal variance with pedigree 1.142, pedigree (1,1,2,1,1)
  emissions to groundwater in unsanitary landfill;
