# steel production, electric, low-alloyed

Dataset: EcoSpold 2, unit process
Geography: RoW
Time period: 2010-01-01 to 2023-12-31
Technology level: current
Classification: ISIC rev.4 ecoinvent: 2410:Manufacture of basic iron and steel
Scenario: Business-as-Usual
System model: Allocation, cut-off by classification
Generated by: [System]
Database: ecoinvent
isCopyrightProtected: true
accessRestrictedTo: 1

## General comment
This activity represents the production of secondary low-alloyed steel in an electric arc furnace (EAF). The process comprises the following operations: 1) mixing and pretreatment (if required) of ferrous materials (including alloying additions), principally ferrous scrap; 2) furnace charging and scrap melting; 3) steel and scrap tapping; 4) secondary metallurgical treatment in a ladle furnace; and 5) casting (continuous and/or ingot).
The data are a weighted average of the regional datasets covering the following geographies: Europe without Switzerland and Austria, IN, CH, AT, CA-QC.
[This dataset is meant to replace the following datasets:
- steel production, electric, low-alloyed, GLO, 2013 - 2023]

## Included activities start
At the gate of the steelmaking plant with the arrival of the ferrous scrap.

## Included activities end
At the gate of the steelmaking plant with the cast steel ready for transport to manufacturers and fabricators.

## Geography
This dataset is a weighted average built from the following geographies: Europe without Switzerland and Austria, IN, CH, AT, CA-QC.

## Technology
Average technology mix of the technologies used in the regional datasets.

## Time period
The time period covers the time period of the regional datasets.

## Reference product
- steel, low-alloyed: 1 kg; name steel_amount; By-product classification allocatable product; CPC 41122: Alloy steel in ingots or other primary forms and semi-finished products of alloy steel; HS2017 7218: Stainless steel in ingots or other primary forms; semi-finished products of stainless steel
  production volume 2.16409e10 kg; name steel_PV
    Calculated based on the amount of crude steel produced globally through the EAF route in 2019 (worldsteel, 2020), excluding the amount of stainless steel.
    89% of the steel produced is unalloyed and 11% is alloyed (Gerbens-Leenes et al. 2018). Based on the amount of stainless (chromium) steel produced globally (ISSF 2021), 8.2% of the steel produced is low-alloyed and 2.8% is stainless. Therefore, out of the steel that is not stainless steel, 91.6% is unalloyed and 8.4% is low-alloyed.
    References:
    P.W. Gerbens-Leenes, A.Y. Hoekstra, R. Bosman (2018). The blue and grey water footprint of construction materials: Steel, cement and glass. Water Resources and Industry, Volume 19. https://doi.org/10.1016/j.wri.2017.11.002.
    worldsteel (2020). Steel Statistical Yearbook 2020 [online]. Available from: https://www.worldsteel.org/en/dam/jcr:5001dac8-0083-46f3-aadd-35aa357acbcc/Steel%2520Statistical%2520Yearbook%25202020%2520%2528concise%2520version%2529.pdf (accessed 20.07.2021).
    International Stainless Steel Forum (ISSF) (2021). Stainless Steel in Figures 2021 [online]. Available from: https://www.worldstainless.org/files/issf/non-image-files/PDF/ISSF_Stainless_Steel_in_Figures_2021_English_public_version.pdf (accessed 21.07.2021).
  property heating value, net 0 MJ
    Non combustible products are assumed to have an LHV equal to zero (0).
  properties: allocation factor 0.999738, carbon allocation 0.005 kg, carbon content 0.005, carbon content, fossil 0.005, carbon content, non-fossil 0, dry mass 1 kg, price 0.468 EUR2005, true value 0.468, water content 0, water in wet mass 0 kg, wet mass 1 kg

## Inputs from technosphere
- aluminium, cast alloy: 0.000108691 kg; lognormal variance with pedigree 0.0033, pedigree (2,2,1,5,1)
  Weighted average of amounts in regional datasets.
  properties: dry mass 1 kg, wet mass 1 kg
- aluminium, primary, ingot: 4.36378e-7 kg; lognormal variance with pedigree 0.0028, pedigree (1,1,2,5,1)
  Weighted average of amounts in regional datasets.
  properties: dry mass 1 kg, wet mass 1 kg
- aluminium, wrought alloy: 0.000108068 kg; lognormal variance with pedigree 0.0072, pedigree (3,4,1,5,2)
  Weighted average of amounts in regional datasets.
  properties: dry mass 1 kg, wet mass 1 kg
- anode, for metal electrolysis: 0.00234417 kg; lognormal variance with pedigree 0.0054, pedigree (2,4,2,5,1)
  Weighted average of amounts in regional datasets.
  properties: carbon content, fossil 0.865971, dry mass 1 kg, wet mass 1 kg
- argon, liquid: 0.000690895 kg; lognormal variance with pedigree 0.006, pedigree (2,4,2,5,2)
  Weighted average of amounts in regional datasets.
  properties: dry mass 1 kg, wet mass 1 kg
- calcium carbide, technical grade: 3.16949e-6 kg; lognormal variance with pedigree 0.0028, pedigree (1,1,2,5,1)
  Weighted average of amounts in regional datasets.
  properties: carbon content, fossil 0.375, dry mass 1 kg, heating value, net 11.36 MJ, wet mass 1 kg
- cast iron: 3.44512e-5 kg; lognormal variance with pedigree 0.0052, pedigree (2,4,1,5,1)
  Weighted average of amounts in regional datasets.
  properties: carbon content, fossil 0.04, dry mass 1 kg, wet mass 1 kg
  note on carbon content, fossil: Cast iron is made by remelting pig iron in small furnaces (e.g. cupola furnaces or electric arc furnaces) and poured into moulds to make castings. It usually contains 2% to 6% carbon (ecoinvent v2.2 report 10_partII). An average content of 4% was considered
- chemical, inorganic: 1.82263e-6 kg; lognormal variance with pedigree 0.0033, pedigree (2,2,1,5,1)
  Weighted average of amounts in regional datasets.
  properties: carbon content, fossil 0.003, dry mass 1 kg, wet mass 1 kg
  note on carbon content, fossil: This dataset is an unweighted average of 20 inorganic substances (listed in Tab 88.1, ecoinvent v2.2 report 8, part II), being part of the top100 chemicals included in this database. The C-content has also been calculated as an unweighted average of the C content of the substances composing this dataset.
- coke: 0.00107724, 0.00228599 MJ (2 suppliers, which the file names only by identifier); sum of these 0.00336323 MJ; lognormal variance with pedigree 0.0058, pedigree (3,3,1,5,2)
  Weighted average of amounts in regional datasets.
  properties: carbon content, fossil 0.869149, dry mass 0.0328671 kg, heating value, net 28.6 MJ, water content 0.0638298, wet mass 0.034965 kg
- diesel, burned in building machine: 1.63665e-5 MJ; lognormal variance with pedigree 0.002, pedigree (1,1,1,5,1)
  Weighted average of amounts in regional datasets.
  properties: heating value, net 1 MJ
- dolomite: 0.0120311 kg; lognormal variance with pedigree 0.0058, pedigree (3,3,1,5,2)
  Weighted average of amounts in regional datasets.
  properties: carbon content, fossil 0.130435, dry mass 1 kg, wet mass 1 kg
- electric arc furnace converter: 4.02495e-11 unit; lognormal variance with pedigree 0.51, pedigree (5,5,5,5,5)
  Weighted average of amounts in regional datasets.
- electric arc furnace dust: -0.0161539 kg; name EAF_dust_amount; lognormal variance with pedigree 0.0092, pedigree (3,4,3,5,2)
  Weighted average of amounts in regional datasets.
  production volume; = steel_PV*ABS(EAF_dust_amount/steel_amount)
    Calculated from production volume of reference product using the relative outputs.
  properties: calcium content 0.0523414, carbon content, fossil 0.0155074, chlorine content 0.010876, dry mass 0.999 kg, iron content 0.259301, magnesium content 0.013047, manganese content 0.019242, oxygen content 0.0832861, silicon content 0.0212644, tungsten content 0.00866892, wet mass 1 kg, zinc content 0.0646678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
  note on calcium content: The value of 'calcium content' is documented in Turner & Symeonidis, 2020. Reference: Turner David & Symeonidis Avraam, 2020, Life cycle inventories of the treatment of iron and steelmaking by-products, ecoinvent association, Zürich, Switzerland
  note on carbon content, fossil: The value of 'carbon content, fossil' is documented in Turner & Symeonidis, 2020. Reference: Turner David & Symeonidis Avraam, 2020, Life cycle inventories of the treatment of iron and steelmaking by-products, ecoinvent association, Zürich, Switzerland
  note on chlorine content: The value of 'chlorine content' is documented in Turner & Symeonidis, 2020. Reference: Turner David & Symeonidis Avraam, 2020, Life cycle inventories of the treatment of iron and steelmaking by-products, ecoinvent association, Zürich, Switzerland
  note on iron content: The value of 'iron content' is documented in Turner & Symeonidis, 2020. Reference: Turner David & Symeonidis Avraam, 2020, Life cycle inventories of the treatment of iron and steelmaking by-products, ecoinvent association, Zürich, Switzerland
  note on magnesium content: The value of 'magnesium content' is documented in Turner & Symeonidis, 2020. Reference: Turner David & Symeonidis Avraam, 2020, Life cycle inventories of the treatment of iron and steelmaking by-products, ecoinvent association, Zürich, Switzerland
  note on manganese content: The value of 'manganese content' is documented in Turner & Symeonidis, 2020. Reference: Turner David & Symeonidis Avraam, 2020, Life cycle inventories of the treatment of iron and steelmaking by-products, ecoinvent association, Zürich, Switzerland
  note on oxygen content: The value of 'oxygen content' is documented in Turner & Symeonidis, 2020. Reference: Turner David & Symeonidis Avraam, 2020, Life cycle inventories of the treatment of iron and steelmaking by-products, ecoinvent association, Zürich, Switzerland
  note on silicon content: The value of 'silicon content' is documented in Turner & Symeonidis, 2020. Reference: Turner David & Symeonidis Avraam, 2020, Life cycle inventories of the treatment of iron and steelmaking by-products, ecoinvent association, Zürich, Switzerland
  note on tungsten content: The value of 'tungsten content' is documented in Turner & Symeonidis, 2020. Reference: Turner David & Symeonidis Avraam, 2020, Life cycle inventories of the treatment of iron and steelmaking by-products, ecoinvent association, Zürich, Switzerland
  note on zinc content: The value of 'zinc content' is documented in Turner & Symeonidis, 2020. Reference: Turner David & Symeonidis Avraam, 2020, Life cycle inventories of the treatment of iron and steelmaking by-products, ecoinvent association, Zürich, Switzerland
- electric arc furnace secondary metallurgy slag: -0.0118513 kg; name EAF_metallurgy_slag_amount; lognormal variance with pedigree 0.0064, pedigree (2,3,3,5,2)
  Weighted average of amounts in regional datasets.
  production volume; = steel_PV*ABS(EAF_metallurgy_slag_amount/steel_amount)
    Calculated from production volume of reference product using the relative outputs.
  properties: aluminium content 0.0530427, calcium content 0.312637, dry mass 0.995 kg, fluorine content 0.0129487, iron content 0.0199153, magnesium content 0.0427775, manganese content 0.00556519, oxygen content 0.476841, silicon content 0.0601451, sulfur content 0.00614898, water content 0.00502513, wet mass 1 kg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
  note on aluminium content: The value of 'aluminium content' is documented in Turner & Symeonidis, 2020. Reference: Turner David & Symeonidis Avraam, 2020, Life cycle inventories of the treatment of iron and steelmaking by-products, ecoinvent association, Zürich, Switzerland
  note on fluorine content: The value of 'fluorine content' is documented in Turner & Symeonidis, 2020. Reference: Turner David & Symeonidis Avraam, 2020, Life cycle inventories of the treatment of iron and steelmaking by-products, ecoinvent association, Zürich, Switzerland
  note on sulfur content: The value of 'sulfur content' is documented in Turner & Symeonidis, 2020. Reference: Turner David & Symeonidis Avraam, 2020, Life cycle inventories of the treatment of iron and steelmaking by-products, ecoinvent association, Zürich, Switzerland
- electric arc furnace slag: -0.105263 kg; name EAF_slag_amount; lognormal variance with pedigree 0.0078, pedigree (2,4,3,5,2)
  Weighted average of amounts in regional datasets.
  production volume; = steel_PV*ABS(EAF_slag_amount/steel_amount)
    Calculated from production volume of reference product using the relative outputs.
  properties: aluminium content 0.0393524, calcium content 0.257715, chromium content 0.0174286, dry mass 0.995 kg, fluorine content 0.0201005, iron content 0.16826, magnesium content 0.050462, manganese content 0.0386403, oxygen content 0.265728, silicon content 0.0917304, water content 0.00502513, wet mass 1 kg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
  note on chromium content: The value of 'chromium content' is documented in Turner & Symeonidis, 2020. Reference: Turner David & Symeonidis Avraam, 2020, Life cycle inventories of the treatment of iron and steelmaking by-products, ecoinvent association, Zürich, Switzerland
- electric arc furnace slag, for recovery: -0.00399409 kg; name EAF_slag_for_recovery_amount; lognormal variance with pedigree 0.0034, pedigree (2,1,2,5,1)
  Weighted average of amounts in regional datasets.
  production volume; = steel_PV*ABS(EAF_slag_for_recovery_amount/steel_amount)
    Calculated from production volume of reference product using the relative outputs.
  properties: aluminium content 0.0432161, calcium content 0.244221, chromium content 0.0116583, dry mass 0.995 kg, fluorine content 0.0201005, iron content 0.098593, magnesium content 0.0431156, manganese content 0.0244221, oxygen content 0.400947, silicon content 0.0912563, water content 0.00502513, wet mass 1 kg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
- electricity, high voltage: 3.50822e-5, 0.00223685, 3.50642e-6, 2.3273e-5, 0.00043887, 8.15987e-6, 0.0045769, 0.000119365, 0.000125799, 5.19827e-5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 kWh (46 suppliers, which the file names only by identifier); sum of these 0.0105924 kWh; lognormal variance with pedigree 0.0028, pedigree (1,1,2,5,1)
  Weighted average of amounts in regional datasets.
- electricity, low voltage: 1.39306e-6, 7.53778e-6, 2.92943e-7, 1.13898e-7, 1.89507e-6, 1.14287e-7, 3.90581e-7, 1.56062e-7, 7.01722e-5, 5.37802e-8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 kWh (46 suppliers, which the file names only by identifier); sum of these 0.000163436 kWh; lognormal variance with pedigree 0.0052, pedigree (2,4,1,5,1)
  Weighted average of amounts in regional datasets.
- electricity, medium voltage: 0.000538877, 4.79286e-5, 0.00417886, 0.00547598, 0.00579909, 0.00295377, 0.000407961, 0.00258209, 0.000108997, 0.0174509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 kWh (46 suppliers, which the file names only by identifier); sum of these 0.487122 kWh; lognormal variance with pedigree 0.0532, pedigree (3,3,5,5,3)
  Weighted average of amounts in regional datasets.
- electrode, negative, Ni: 0.000367128 kg; lognormal variance with pedigree 0.0058, pedigree (3,3,1,5,2)
  Weighted average of amounts in regional datasets.
  properties: carbon content, fossil 0.00301397, dry mass 1 kg, wet mass 1 kg
- ethylene glycol: 2.22266e-8 kg; lognormal variance with pedigree 0.002, pedigree (1,1,1,5,1)
  Weighted average of amounts in regional datasets.
  properties: carbon content, fossil 0.387097, dry mass 1 kg, heating value, net 23.44 MJ, wet mass 1 kg
- ferrochromium, high-carbon, 68% Cr: 0.000644406 kg; lognormal variance with pedigree 0.0072, pedigree (3,4,1,5,2)
  Weighted average of amounts in regional datasets.
  properties: carbon content, fossil 0.07, dry mass 1 kg, heating value, net 2.12 MJ, wet mass 1 kg
- ferromanganese, high-coal, 74.5% Mn: 0.00763679 kg; lognormal variance with pedigree 0.0074, pedigree (3,4,2,5,2)
  Weighted average of amounts in regional datasets.
  properties: carbon content, fossil 0.075, dry mass 1 kg, heating value, net 2.27 MJ, wet mass 1 kg
- ferrosilicon: 0.00654687 kg; lognormal variance with pedigree 0.0074, pedigree (3,4,2,5,2)
  Weighted average of amounts in regional datasets.
  properties: carbon content, fossil 0.1, dry mass 1 kg, heating value, net 3.03 MJ, wet mass 1 kg
- fluorspar, 97% purity: 1.5411e-5 kg; lognormal variance with pedigree 0.0028, pedigree (1,1,2,5,1)
  Weighted average of amounts in regional datasets.
  properties: dry mass 1 kg, wet mass 1 kg
- hard coal: 0.000608622, 0.000144422, 0.00430736, 0.000621085, 0.00134225, 0.000264123 kg (6 suppliers, which the file names only by identifier); sum of these 0.00728786 kg; lognormal variance with pedigree 0.0064, pedigree (2,3,3,5,2)
  Weighted average of amounts in regional datasets.
  properties: carbon content, fossil 0.845, dry mass 0.94 kg, heating value, net 27.91 MJ, water content 0.0638298, wet mass 1 kg
  note on carbon content, fossil: C content 75-94% (specified in Tab 1.1, report 6, part VI). A mean content of 0.845 kg C/ kg dry hard coal was considered
  note on heating value, net: Based on the Characterization factor of Hard coal in the CED method
- heat, district or industrial, natural gas: 0.0115723 MJ; lognormal variance with pedigree 0.002, pedigree (1,1,1,5,1)
  Weighted average of amounts in regional datasets.
  properties: heating value, net 1 MJ
- heat, district or industrial, other than natural gas: 0.003263 MJ; lognormal variance with pedigree 0.0033, pedigree (2,2,1,5,1)
  Weighted average of amounts in regional datasets.
  property corresponding fuel use, propane, furnace >100kW 0 MJ; name fuel_use
  properties: heating value, net 1 MJ
  note on corresponding fuel use, propane, furnace >100kW: Lower heating value of the fuel input related to the heat/electricity output, taken directly from ecoinvent v3.0 dataset 'heat production, natural gas, at industrial furnace >100kW, GLO 2000'.
- heavy fuel oil: 1.68709e-6, 9.82415e-7, 0.000116752, 1.26029e-6, 6.47602e-6 kg (5 suppliers, which the file names only by identifier); sum of these 0.000127158 kg; lognormal variance with pedigree 0.0058, pedigree (3,3,1,5,2)
  Weighted average of amounts in regional datasets.
  properties: carbon content, fossil 0.849, dry mass 1 kg, heating value, net 41.2 MJ, wet mass 1 kg
- hydrochloric acid, without water, in 30% solution state: 1.23711e-5 kg; lognormal variance with pedigree 0.0033, pedigree (2,2,1,5,1)
  Weighted average of amounts in regional datasets.
  properties: dry mass 1 kg, heating value, net 3.32 MJ, wet mass 1 kg
- inert waste: -0.000696008 kg; name inert_waste_amount; lognormal variance with pedigree 0.0033, pedigree (2,2,1,5,1)
  Weighted average of amounts in regional datasets.
  production volume; = steel_PV*ABS(inert_waste_amount/steel_amount)
    Calculated from production volume of reference product using the relative outputs.
  properties: dry mass 1 kg, wet mass 1 kg
- inert waste, for final disposal: -0.00734125 kg; name inert_waste_for_final_disposal_amount; lognormal variance with pedigree 0.0078, pedigree (3,3,3,5,2)
  Weighted average of amounts in regional datasets.
  production volume; = steel_PV*ABS(inert_waste_for_final_disposal_amount/steel_amount)
    Calculated from production volume of reference product using the relative outputs.
  properties: dry mass 0.995 kg, water content 0.00502513, wet mass 1 kg
- iron scrap, sorted, pressed: 0.822252 kg; lognormal variance with pedigree 0.0074, pedigree (3,4,2,5,2)
  Weighted average of amounts in regional datasets.
  properties: dry mass 1 kg, wet mass 1 kg
- iron scrap, unsorted: 0.0255713 kg; name iron_scrap_amount
  Weighted average of amounts in regional datasets.
  production volume; = steel_PV*ABS(iron_scrap_amount/steel_amount)
    Calculated from production volume of reference product using the relative outputs.
  properties: dry mass 1 kg, price -0.000886051 EUR2005, wet mass 1 kg
- lime: 0.0132342 kg; lognormal variance with pedigree 0.0058, pedigree (3,3,1,5,2)
  Weighted average of amounts in regional datasets.
  properties: carbon content, fossil 0.120005, dry mass 1 kg, wet mass 1 kg
- liquefied petroleum gas: 1.38178e-6, 1.32699e-5, 4.16575e-6, 9.27197e-7, 0.000197254 kg (5 suppliers, which the file names only by identifier); sum of these 0.000216999 kg; lognormal variance with pedigree 0.0058, pedigree (3,3,1,5,2)
  Weighted average of amounts in regional datasets.
  properties: carbon content, fossil 0.821863, dry mass 1 kg, heating value, net 45.5 MJ, wet mass 1 kg
  note on heating value, net: Indicative value. Reference: Fuels - Higher and Lower Calorific Values, available at: https://www.engineeringtoolbox.com/fuels-higher-calorific-values-d_169.html
- lubricating oil: 0.0213309 kg; lognormal variance with pedigree 0.006, pedigree (3,3,2,5,2)
  Weighted average of amounts in regional datasets.
  properties: carbon content, fossil 0.75, dry mass 1 kg, heating value, net 40.2 MJ, wet mass 1 kg
  note on carbon content, fossil: Lubricating oil is produced from diesel. C-content/dry mass of fats and oils considered 75%, from: ecoinvent v2.2 report, n 15a, pg 40
  note on heating value, net: Literature value, Source: IPCC 2006, 2006 IPCC Guidelines for National Greenhouse Gas Inventories, Prepared by the National Greenhouse Gas Inventories Programme, Eggleston H.S., Buendia L., Miwa K., Ngara T. and Tanabe K. (eds). Published: IGES, Japan
- molybdenum trioxide: 9.45811e-6 kg; lognormal variance with pedigree 0.0052, pedigree (2,4,1,5,1)
  Weighted average of amounts in regional datasets.
  properties: bismuth content 8e-5, copper content 0.0006, iron content 0.0044, lead content 0.00015, molecular weight 143.9 g/mol, molybdenum content 0.62, oxygen content 0.29, sulfur content 0.0003
- natural gas, high pressure: 5.3794e-5, 9.07438e-5, 0.00019794, 6.62421e-5, 1.54805e-5, 9.21369e-5, 8.84124e-5, 0.000232483, 8.97537e-5, 0.000138824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 m3 (35 suppliers, which the file names only by identifier); sum of these 0.00655988 m3; lognormal variance with pedigree 0.004, pedigree (2,3,2,5,1)
  Weighted average of amounts in regional datasets.
  properties: carbon content, fossil 0.741, dry mass 0.735 kg, heating value, gross 40 MJ, heating value, net 36 MJ, wet mass 0.735 kg
  note on heating value, gross: At standard conditions; based on Meili et al. (2022) section 5.2
- nickel, class 1: 2.22266e-5 kg; lognormal variance with pedigree 0.0052, pedigree (2,4,1,5,1)
  Weighted average of amounts in regional datasets.
  properties: dry mass 1 kg, wet mass 1 kg
- nitrogen, liquid: 0.0120712 kg; lognormal variance with pedigree 0.0586, pedigree (3,3,5,5,3)
  Weighted average of amounts in regional datasets.
  properties: dry mass 1 kg, wet mass 1 kg
- oxygen, liquid: 0.0359034 kg; lognormal variance with pedigree 0.0074, pedigree (3,4,2,5,2)
  Weighted average of amounts in regional datasets.
  properties: dry mass 1 kg, wet mass 1 kg
- pig iron: 0.1432 kg; lognormal variance with pedigree 0.0058, pedigree (3,3,1,5,2)
  Weighted average of amounts in regional datasets.
  properties: carbon content, fossil 0.045, dry mass 1 kg, wet mass 1 kg
- propane, burned in building machine: 1.29106e-5 MJ; lognormal variance with pedigree 0.002, pedigree (1,1,1,5,1)
  Weighted average of amounts in regional datasets.
  properties: heating value, net 1 MJ
- quicklime, in pieces, loose: 0.0413549 kg; lognormal variance with pedigree 0.0054, pedigree (2,4,2,5,1)
  Weighted average of amounts in regional datasets.
  properties: dry mass 0.99 kg, water content 0.010101, wet mass 1 kg
- refractory, basic, packed: 0.0145136 kg; lognormal variance with pedigree 0.0074, pedigree (3,4,2,5,2)
  Weighted average of amounts in regional datasets.
  properties: dry mass 1 kg, wet mass 1 kg
- silica sand: 2.11069e-5 kg; lognormal variance with pedigree 0.0028, pedigree (1,1,2,5,1)
  Weighted average of amounts in regional datasets.
  properties: dry mass 0.99 kg, water content 0.010101, wet mass 1 kg
- spent solvent mixture: -2.22266e-8 kg; name spent_solvent_mixture_amount; lognormal variance with pedigree 0.0052, pedigree (2,4,1,5,1)
  Weighted average of amounts in regional datasets.
  production volume; = steel_PV*ABS(spent_solvent_mixture_amount/steel_amount)
    Calculated from production volume of reference product using the relative outputs.
  properties: carbon content, fossil 0.571257, dry mass 0.835 kg, heating value, net 21.7 MJ, water content 0.197605, wet mass 1 kg
  note on carbon content, fossil: Tab A.7, ecoinvent v2.2 report 13_I. C content has been calculated after data in the tables, and then referred to 1 kg DM
  note on heating value, net: Value taken from the general comment of the treatment dataset.
- sponge iron: 0.174986 kg; lognormal variance with pedigree 0.0058, pedigree (3,3,1,5,2)
  Weighted average of amounts in regional datasets.
  properties: carbon content, fossil 0.1, dry mass 1 kg, heating value, net 3.03 MJ, iron content 0.82, phosphorus content 0.05, sulfur content 0.03, wet mass 1 kg
- sulfur dioxide, liquid: 8.61273e-6 kg; lognormal variance with pedigree 0.0028, pedigree (1,1,2,5,1)
  Weighted average of amounts in regional datasets.
  properties: dry mass 1 kg, wet mass 1 kg
- sulfuric acid: 6.75775e-6 kg; lognormal variance with pedigree 0.0033, pedigree (2,2,1,5,1)
  Weighted average of amounts in regional datasets.
  properties: dry mass 1 kg, wet mass 1 kg
- wastewater, average: -0.028223 m3; name wastewater_amount; lognormal variance with pedigree 0.0454, pedigree (3,3,2,5,2)
  Weighted average of amounts in regional datasets.
  production volume; = steel_PV*ABS(wastewater_amount/steel_amount)
    Calculated from production volume of reference product using the relative outputs.
  properties: carbon content, non-fossil 0.194039, dry mass 0.346837 kg, water content 2882.2, wet mass 1000 kg
  note on carbon content, non-fossil: 0.0673 kg TOC/m3 (Tab A.17, ecoinvent v2.2 report 13_I). TOC was considered as Total Carbon.

## Inputs from nature
- Water, cooling, unspecified natural origin [natural resource, in water]: 0.00417675 m3; lognormal variance with pedigree 0.0166, pedigree (2,4,3,5,1)
  Weighted average of amounts in regional datasets.
- Water, unspecified natural origin [natural resource, in ground]: 0.0352786 m3; lognormal variance with pedigree 0.0058, pedigree (3,3,1,5,2)
  Weighted average of amounts in regional datasets.

## Emissions to nature
- Antimony ion [air, unspecified]: 4.20301e-10 kg; lognormal variance with pedigree 0.6528, pedigree (2,1,2,5,1)
  Weighted average of amounts in regional datasets.
- Argon [air, unspecified]: 1.55606e-5 kg; lognormal variance with pedigree 0.002, pedigree (1,1,1,5,1)
  Weighted average of amounts in regional datasets.
- Arsenic ion [air, unspecified]: 4.75423e-10 kg; lognormal variance with pedigree 0.6528, pedigree (2,1,2,5,1)
  Weighted average of amounts in regional datasets.
- Benzene [air, unspecified]: 8.48637e-7 kg; lognormal variance with pedigree 0.1268, pedigree (3,4,2,5,2)
  Weighted average of amounts in regional datasets.
- Cadmium II [air, unspecified]: 1.91118e-8 kg; lognormal variance with pedigree 0.6568, pedigree (3,4,2,5,2)
  Weighted average of amounts in regional datasets.
- Cadmium II [air, urban air close to ground]: 1.21518e-9 kg; lognormal variance with pedigree 0.6527, pedigree (2,2,1,5,1)
  Weighted average of amounts in regional datasets.
- Carbon dioxide, fossil [air, unspecified]: 0.0505053 kg; lognormal variance with pedigree 0.25, pedigree (5,5,5,5,5)
  Weighted average of amounts in regional datasets.
- Carbon dioxide, fossil [air, urban air close to ground]: 0.00566226 kg; lognormal variance with pedigree 0.6527, pedigree (2,2,1,5,1)
  Weighted average of amounts in regional datasets.
- Carbon monoxide, fossil [air, unspecified]: 0.000926546 kg; lognormal variance with pedigree 0.6568, pedigree (3,4,2,5,2)
  Weighted average of amounts in regional datasets.
- Carbon monoxide, fossil [air, urban air close to ground]: 4.1135e-5 kg; lognormal variance with pedigree 0.6527, pedigree (2,2,1,5,1)
  Weighted average of amounts in regional datasets.
- Chromium III [air, unspecified]: 4.7308e-7 kg; lognormal variance with pedigree 0.6568, pedigree (3,4,2,5,2)
  Weighted average of amounts in regional datasets.
- Chromium III [air, urban air close to ground]: 2.97044e-9 kg; lognormal variance with pedigree 0.6527, pedigree (2,2,1,5,1)
  Weighted average of amounts in regional datasets.
- Chromium VI [air, unspecified]: 2.48047e-10 kg; lognormal variance with pedigree 0.6528, pedigree (2,1,2,5,1)
  Weighted average of amounts in regional datasets.
- Cobalt II [air, unspecified]: 2.80201e-10 kg; lognormal variance with pedigree 0.6528, pedigree (2,1,2,5,1)
  Weighted average of amounts in regional datasets.
- Copper ion [air, unspecified]: 1.10953e-7 kg; lognormal variance with pedigree 0.6586, pedigree (3,4,3,5,2)
  Weighted average of amounts in regional datasets.
- Copper ion [air, urban air close to ground]: 4.18562e-9 kg; lognormal variance with pedigree 0.6527, pedigree (2,2,1,5,1)
  Weighted average of amounts in regional datasets.
- Dioxins, measured as 2,3,7,8-tetrachlorodibenzo-p-dioxin [air, unspecified]: 1.56301e-12 kg; lognormal variance with pedigree 0.3068, pedigree (3,4,2,5,2)
  Weighted average of amounts in regional datasets.
- Dioxins, measured as 2,3,7,8-tetrachlorodibenzo-p-dioxin [air, urban air close to ground]: 5.4008e-15 kg; lognormal variance with pedigree 0.0427, pedigree (2,2,1,5,1)
  Weighted average of amounts in regional datasets.
- Hexachlorobenzene [air, unspecified]: 6.42293e-9 kg; lognormal variance with pedigree 0.1254, pedigree (3,3,2,5,2)
  Weighted average of amounts in regional datasets.
- Hydrocarbons, aromatic [air, unspecified]: 6.88555e-5 kg; lognormal variance with pedigree 0.0472, pedigree (3,3,3,5,2)
  Weighted average of amounts in regional datasets.
- Hydrochloric acid [air, unspecified]: 4.71748e-6 kg; lognormal variance with pedigree 0.0472, pedigree (3,3,3,5,2)
  Weighted average of amounts in regional datasets.
- Hydrochloric acid [air, urban air close to ground]: 5.71134e-8 kg; lognormal variance with pedigree 0.0427, pedigree (2,2,1,5,1)
  Weighted average of amounts in regional datasets.
- Hydrogen fluoride [air, unspecified]: 6.6877e-7 kg; lognormal variance with pedigree 0.0472, pedigree (3,3,3,5,2)
  Weighted average of amounts in regional datasets.
- Lead II [air, unspecified]: 7.97328e-7 kg; lognormal variance with pedigree 0.6568, pedigree (3,4,2,5,2)
  Weighted average of amounts in regional datasets.
- Lead II [air, urban air close to ground]: 4.92823e-8 kg; lognormal variance with pedigree 0.6527, pedigree (2,2,1,5,1)
  Weighted average of amounts in regional datasets.
- Manganese II [air, unspecified]: 7.00502e-10 kg; lognormal variance with pedigree 0.6528, pedigree (2,1,2,5,1)
  Weighted average of amounts in regional datasets.
- Mercury II [air, unspecified]: 6.24269e-7 kg; lognormal variance with pedigree 0.6568, pedigree (3,4,2,5,2)
  Weighted average of amounts in regional datasets.
- Mercury II [air, urban air close to ground]: 7.96618e-9 kg; lognormal variance with pedigree 0.6527, pedigree (2,2,1,5,1)
  Weighted average of amounts in regional datasets.
- Methane, fossil [air, urban air close to ground]: 2.03852e-6 kg; lognormal variance with pedigree 0.0427, pedigree (2,2,1,5,1)
  Weighted average of amounts in regional datasets.
- NMVOC, non-methane volatile organic compounds [air, urban air close to ground]: 2.03853e-6 kg; lognormal variance with pedigree 0.0427, pedigree (2,2,1,5,1)
  Weighted average of amounts in regional datasets.
- Nickel II [air, unspecified]: 2.43483e-7 kg; lognormal variance with pedigree 0.6568, pedigree (3,4,2,5,2)
  Weighted average of amounts in regional datasets.
- Nickel II [air, urban air close to ground]: 2.7004e-10 kg; lognormal variance with pedigree 0.6527, pedigree (2,2,1,5,1)
  Weighted average of amounts in regional datasets.
- Nitrogen oxides [air, unspecified]: 0.000101937 kg; lognormal variance with pedigree 0.0468, pedigree (3,4,2,5,2)
  Weighted average of amounts in regional datasets.
- Nitrogen oxides [air, urban air close to ground]: 7.31565e-6 kg; lognormal variance with pedigree 0.0427, pedigree (2,2,1,5,1)
  Weighted average of amounts in regional datasets.
- PAH, polycyclic aromatic hydrocarbons [air, unspecified]: 6.79146e-8 kg; lognormal variance with pedigree 0.3072, pedigree (3,3,3,5,2)
  Weighted average of amounts in regional datasets.
- PAH, polycyclic aromatic hydrocarbons [air, urban air close to ground]: 1.14767e-8 kg; lognormal variance with pedigree 0.3027, pedigree (2,2,1,5,1)
  Weighted average of amounts in regional datasets.
- Particulate Matter, < 2.5 um [air, unspecified]: 5.62815e-5 kg; lognormal variance with pedigree 0.3068, pedigree (3,4,2,5,2)
  Weighted average of amounts in regional datasets.
- Particulate Matter, < 2.5 um [air, urban air close to ground]: 7.12244e-7 kg; lognormal variance with pedigree 0.3027, pedigree (2,2,1,5,1)
  Weighted average of amounts in regional datasets.
- Particulate Matter, > 10 um [air, unspecified]: 1.9494e-5 kg; lognormal variance with pedigree 0.0472, pedigree (3,3,3,5,2)
  Weighted average of amounts in regional datasets.
- Particulate Matter, > 10 um [air, urban air close to ground]: 2.5138e-7 kg; lognormal variance with pedigree 0.0427, pedigree (2,2,1,5,1)
  Weighted average of amounts in regional datasets.
- Particulate Matter, > 2.5 um and < 10um [air, unspecified]: 5.6355e-5 kg; lognormal variance with pedigree 0.1268, pedigree (3,4,2,5,2)
  Weighted average of amounts in regional datasets.
- Particulate Matter, > 2.5 um and < 10um [air, urban air close to ground]: 7.12244e-7 kg; lognormal variance with pedigree 0.1227, pedigree (2,2,1,5,1)
  Weighted average of amounts in regional datasets.
- Polychlorinated biphenyls [air, unspecified]: 6.49506e-9 kg; lognormal variance with pedigree 0.3054, pedigree (3,3,2,5,2)
  Weighted average of amounts in regional datasets.
- Polychlorinated biphenyls [air, urban air close to ground]: 7.4261e-11 kg; lognormal variance with pedigree 0.0427, pedigree (2,2,1,5,1)
  Weighted average of amounts in regional datasets.
- Selenium IV [air, unspecified]: 2.80201e-10 kg; lognormal variance with pedigree 0.6528, pedigree (2,1,2,5,1)
  Weighted average of amounts in regional datasets.
- Sulfur dioxide [air, unspecified]: 5.20581e-5 kg; lognormal variance with pedigree 0.0472, pedigree (3,3,3,5,2)
  Weighted average of amounts in regional datasets.
- Sulfur dioxide [air, urban air close to ground]: 1.90243e-7 kg; lognormal variance with pedigree 0.0033, pedigree (2,2,1,5,1)
  Weighted average of amounts in regional datasets.
- Tellurium [air, unspecified]: 5.62699e-10 kg; lognormal variance with pedigree 0.6528, pedigree (2,1,2,5,1)
  Weighted average of amounts in regional datasets.
- Tin ion [air, unspecified]: 7.00502e-10 kg; lognormal variance with pedigree 0.6528, pedigree (2,1,2,5,1)
  Weighted average of amounts in regional datasets.
- Titanium ion [air, unspecified]: 2.80201e-10 kg; lognormal variance with pedigree 0.0428, pedigree (2,1,2,5,1)
  Weighted average of amounts in regional datasets.
- Vanadium V [air, unspecified]: 7.00502e-10 kg; lognormal variance with pedigree 0.6528, pedigree (2,1,2,5,1)
  Weighted average of amounts in regional datasets.
- Water [air, unspecified]: 0.00887165 m3; lognormal variance with pedigree 0.0429, pedigree (2,2,2,5,1)
  Weighted average of amounts in regional datasets.
- Water [air, urban air close to ground]: 7.22231e-5 m3; lognormal variance with pedigree 0.21, pedigree (5,5,5,5,5)
  Weighted average of amounts in regional datasets.
- Zinc II [air, unspecified]: 7.84638e-6 kg; lognormal variance with pedigree 0.6568, pedigree (3,4,2,5,2)
  Weighted average of amounts in regional datasets.
- Zinc II [air, urban air close to ground]: 7.24922e-7 kg; lognormal variance with pedigree 0.6527, pedigree (2,2,1,5,1)
  Weighted average of amounts in regional datasets.
- Cadmium II [water, unspecified]: 1.62024e-11 kg; lognormal variance with pedigree 0.6527, pedigree (2,2,1,5,1)
  Weighted average of amounts in regional datasets.
- Chloride [water, unspecified]: 7.17664e-5 kg; lognormal variance with pedigree 0.0466, pedigree (3,4,1,5,2)
  Weighted average of amounts in regional datasets.
- Chromium VI [water, unspecified]: 7.55436e-8 kg; lognormal variance with pedigree 0.0466, pedigree (3,4,1,5,2)
  Weighted average of amounts in regional datasets.
- Copper ion [water, unspecified]: 7.96923e-9 kg; lognormal variance with pedigree 0.6527, pedigree (2,2,1,5,1)
  Weighted average of amounts in regional datasets.
- Lead II [water, unspecified]: 1.62024e-9 kg; lognormal variance with pedigree 0.6527, pedigree (2,2,1,5,1)
  Weighted average of amounts in regional datasets.
- Mercury II [water, unspecified]: 3.24048e-11 kg; lognormal variance with pedigree 0.6527, pedigree (2,2,1,5,1)
  Weighted average of amounts in regional datasets.
- Nickel II [water, unspecified]: 3.30869e-10 kg; lognormal variance with pedigree 0.6527, pedigree (2,2,1,5,1)
  Weighted average of amounts in regional datasets.
- Phosphorus [water, unspecified]: 1.97059e-11 kg; lognormal variance with pedigree 0.0426, pedigree (2,1,1,5,1)
  Weighted average of amounts in regional datasets.
- Sulfate [water, unspecified]: 5.12171e-8 kg; lognormal variance with pedigree 0.0426, pedigree (2,1,1,5,1)
  Weighted average of amounts in regional datasets.
- Water [water, unspecified]: 0.00147176 m3; lognormal variance with pedigree 0.0427, pedigree (2,2,1,5,1)
  Weighted average of amounts in regional datasets.
- Zinc II [water, unspecified]: 2.66075e-8 kg; lognormal variance with pedigree 0.6527, pedigree (2,2,1,5,1)
  Weighted average of amounts in regional datasets.

## Sampling procedure
The data is a weighted average of the regional datasets. Refer to the documentation of the regional datasets for more information regarding the underlying data. The Extrapolations field provides the list of geographies and their weight.

## Extrapolations
This dataset was built as a weighted average of regional datasets of the same activityName. Weights are based on production volumes.
Europe without Switzerland and Austria: production volume = 1.12e+10 kg/year, weight = 0.6161
IN: production volume = 4.96e+09 kg/year, weight = 0.2735
CH: production volume = 1.5e+09 kg/year, weight = 0.08266
AT: production volume = 4.17e+08 kg/year, weight = 0.02297
CA-QC: production volume = 8.58e+07 kg/year, weight = 0.00473
