# kaolin to generic market for refractory material, acid

Dataset: EcoSpold 2, unit process
Geography: GLO
Time period: 2019-01-01 to 2023-12-31
Technology level: current
Classification: ISIC rev.4 ecoinvent: 2391:Manufacture of refractory products
Scenario: Business-as-Usual
System model: Allocation, cut-off by classification
Generated by: Lucia Valsasina
Database: ecoinvent
isCopyrightProtected: true
accessRestrictedTo: 1

## General comment
This activity links kaolin to the generic market for refractory material, acid.
[This dataset is meant to replace the following datasets:]

## Included activities start
The activity starts with the input of kaolin.

## Included activities end
With the provision of a generic kg of refractory material, acid.

## Reference product
- refractory material, acid: 1 kg; By-product classification allocatable product; CPC 373: Refractory products and structural non-refractory clay products; HS2017 690320: Refractory ceramic goods; containing by weight more than 50% of alumina or of a mixture or compound of alum[...]
  production volume 1.32e9 kg; = 2.64E+10 *0.05
    The estimated Global production of kaolin is 2.64E+10 kg (data extracted from the dataset "kaolin production, GLO", accessed 11 Feb 2019). It is estimated that 16.7% of kaolin in the U.S. is used for "Foundry sand, mortar, cement and miscellaneous refractories" (Grahl, c. 2002. Raw & Manufactured Materials: 2002 Review & Forecast. Retrieved from: https://www.ceramicindustry.com/articles/84762-raw-manufactured-materials-2002-review-forecast, accessed 11 Feb 2019). It is here assumed that 5% of kaolin is used as a refractory material.
  property price 0.693 EUR2005
    UN import prices. From UN trade database. Category: 'Refractory bricks etc >50% alumina or silica'.
  properties: carbon allocation 0 kg, carbon content 0, carbon content, fossil 0, carbon content, non-fossil 0, dry mass 1 kg, water content 0, water in wet mass 0 kg, wet mass 1 kg

## Inputs from technosphere
- kaolin: 1 kg; lognormal variance with pedigree 0.2106, pedigree (5,5,5,5,5)
  This activity links kaolin to the generic market for refractory material, acid.
  properties: dry mass 1 kg, wet mass 1 kg
