# treatment of ash from paper production sludge, residual material landfill

Dataset: EcoSpold 2, unit process
Geography: CH
Time period: 2010-01-01 to 2023-12-31
Technology level: current
Classification: ISIC rev.4 ecoinvent: 3822:Treatment and disposal of hazardous waste
Scenario: Business-as-Usual
System model: Allocation, cut-off by classification
Generated by: Nikolia Stoikou
Database: ecoinvent
isCopyrightProtected: true
accessRestrictedTo: 1

## General comment
This dataset represents the activity of waste disposal of 'ash from paper production sludge' in a residual material landfill (RMLF). Recommended use of this dataset: The waste is the residual ash from the incineration of treatment sludge generated in the internal wastewater treatment of paper production. Inventoried waste consists of fraction: 100% composition of paper sludge ash; . Waste composition (wet, in ppmw): H2O na; O 30083; H na; C 9164.7; S 41259; N 6222.5; P 146230; B na; Cl 0.012408; Br na; F 9.6141; I na; Ag na; As 10.215; Ba na; Cd 1.5403; Co 32.145; Cr 98.271; Cu 560.17; Hg 1.0175; Mn 1069.5; Mo 22.403; Ni 60.085; Pb 267.55; Sb na; Se na; Sn 79.568; V na; Zn 865.8; Be na; Sc na; Sr na; Ti na; Tl na; W na; Si 199030; Fe 158420; Ca 221030; Al 50413; K 14897; Mg 29415; Na 90757. Share of carbon in initial waste input that is biogenic 0%.

## Included activities start
The activity starts with the waste being available at the gate of the treatment facility. Collection and transportation of the waste to the treatment plant is not included.

## Included activities end
The activity ends with the waste being treated and waste-specific emissions from the landfill are released to the water (short-term emissions to water from leachate and long-term emissions to ground water).

## Geography
This dataset represents a landfill site with mean annual temperature (MAT) of 9.5 degC, mean annual precipitation (MAP) of 1483.00559816076 mm/year, mean annual actual evaporation (EAT) of 528.63778611689 mm/year, and net infiltration of 954.4 mm/year. The leachate percolating through the residual material landfill has an average residence time of 3.67 years.
Reference for climatic parameters:
UN data, 2020. Precipitation, Environment Statistics Database, United Nations Statistics Division Available at: http://data.un.org/Data.aspx?q=precipitation&d=ENV&f=variableID%3a6;
World Bank, 2022. Surface area (sq.km), World Bank Group Available at: https://data.worldbank.org/indicator/AG.SRF.TOTL.K2;
undata, 2020. Actual evapotranspiration, United Nations Statistics Division Available at: http://data.un.org/Data.aspx?d=ENV&f=variableID%3a7
MeteoSwiss, 2023. Swiss federal authorities. Federal Office of Meteorology and Climatology MeteoSwiss Available at:https://www.meteoswiss.admin.ch/

## Technology
Residual material landfill for polluted, inorganic waste (VVEA Type C). With base seal and leachate collection system. Ultimate average landfill height is 10 meters. Operation phase duration is 30 years. Recultivation after closure. No additional solidification with cement requested. Based on average waste composition and climate data the end of carbonate phase in the residual material landfill is estimated to be reached after 60 000 years.

## Reference product
- ash from paper production sludge: -1 kg; By-product classification Waste; CPC 39230: Residual lyes from the manufacture of wood pulp, including lignin sulphonates, but excluding tall oil
  main reference product of this activity
  production volume 84185 kg
    Estimated based on the total amount of this waste being treated in the database and scaled to represent the geography of Switzerland based on the Swiss GDP
  property price 0 EUR2005
    Waste products are assigned a price of zero as they are assumed to require further treatment.
  properties: aluminium content 0.0504133, arsenic content 1.02148e-5, cadmium content 1.54033e-6, calcium content 0.221032, carbon allocation 0.00916471 kg, carbon content 0.00916471, carbon content, fossil 0, carbon content, non-fossil 0.00916471, chlorine content 1.24085e-8, chromium content 9.82709e-5, cobalt content 3.21451e-5, copper content 0.000560169, dry mass 1 kg, fluorine content 9.61409e-6, heating value, gross 0 MJ, heating value, net 0 MJ, iron content 0.158415, lead content 0.000267552, magnesium content 0.0294155, manganese content 0.00106947, mercury content 1.01747e-6, molybdenum content 2.24032e-5, nickel content 6.00849e-5, nitrogen content 0.00622248, oxygen content 0.030083, phosphorus content 0.146232, potassium content 0.0148969, silicon content 0.19903, sodium content 0.0907566, sulfur content 0.0412595, tin content 7.95676e-5, water content 0, water in wet mass 0 kg, wet mass 1 kg, zinc content 0.000865797

## Inputs from technosphere
- cast iron: 5.0555e-6 kg; lognormal variance with pedigree 0.31529, pedigree (1,1,2,1,1)
  for residual material landfill infrastructure
  properties: carbon content, fossil 0.04, dry mass 1 kg, wet mass 1 kg
- concrete, 25MPa: 4.6937e-7 m3; lognormal variance with pedigree 0.31529, pedigree (1,1,2,1,1)
  for residual material landfill infrastructure
  property cement content 206 kg; name cement
  property fly ash content 69 kg; name fly_ash
  property gravel content 1100 kg; name gravel
  property sand content 910 kg; name sand
  properties: dry mass 2285 kg, water content 0.0538293, wet mass 2408 kg
- diesel, burned in building machine: 0.028614 MJ; lognormal variance with pedigree 0.012675, pedigree (1,1,2,1,1)
  for residual material landfill infrastructure and operation
  properties: heating value, net 1 MJ
- electricity, low voltage: 8.5714e-6 kWh; lognormal variance with pedigree 0.012648, pedigree (1,1,2,1,1)
  for residual material landfill operation
- excavation, hydraulic digger: 0.00030086 m3; lognormal variance with pedigree 0.31529, pedigree (1,1,2,1,1)
  for residual material landfill infrastructure
- excavation, skid-steer loader: 0.00030086 m3; lognormal variance with pedigree 0.31529, pedigree (1,1,2,1,1)
  for residual material landfill infrastructure
- extrusion, plastic pipes: 8.1818e-5 kg; lognormal variance with pedigree 0.31529, pedigree (1,1,2,1,1)
  for residual material landfill infrastructure
- gravel, round: 0.1367 kg; lognormal variance with pedigree 0.31529, pedigree (1,1,2,1,1)
  for residual material landfill infrastructure
  properties: dry mass 1 kg, wet mass 1 kg
- heat, district or industrial, other than natural gas: 0.00092016 MJ; lognormal variance with pedigree 0.012648, pedigree (1,1,2,1,1)
  for residual material landfill operation
  property corresponding fuel use, propane, furnace >100kW 0 MJ; name fuel_use
  properties: heating value, net 1 MJ
  note on corresponding fuel use, propane, furnace >100kW: Lower heating value of the fuel input related to the heat/electricity output, taken directly from ecoinvent v3.0 dataset "heat production, natural gas, at industrial furnace >100kW, GLO 2000".
- pitch: 0.0012857 kg; lognormal variance with pedigree 0.31529, pedigree (1,1,2,1,1)
  for residual material landfill infrastructure
  property calculation property, kg 0 kg; name m_bitumen
  properties: carbon content, fossil 0.83, dry mass 1 kg, heating value, net 28 MJ, wet mass 1 kg
  note on calculation property, kg: Mass output. Defined here for use in the combined production calculations.
- polyethylene, high density, granulate: 0.00024899 kg; lognormal variance with pedigree 0.31529, pedigree (1,1,2,1,1)
  for residual material landfill infrastructure
  properties: carbon content, fossil 0.857143, dry mass 1 kg, heating value, net 42.47 MJ, wet mass 1 kg
- polypropylene, granulate: 8.1981e-7 kg; lognormal variance with pedigree 0.31529, pedigree (1,1,2,1,1)
  for residual material landfill infrastructure
  properties: carbon content, fossil 0.857143, dry mass 1 kg, heating value, net 32.78 MJ, wet mass 1 kg
  note on heating value, net: Value extracted from "treatment of waste polypropylene, open burning"
- polyvinylchloride, bulk polymerised: 8.1981e-7 kg; lognormal variance with pedigree 0.31529, pedigree (1,1,2,1,1)
  for residual material landfill infrastructure
  properties: carbon content, fossil 0.387097, dry mass 1 kg, heating value, net 21.5 MJ, wet mass 1 kg
- reinforcing steel: 2.9923e-5 kg; lognormal variance with pedigree 0.31529, pedigree (1,1,2,1,1)
  for residual material landfill infrastructure
  properties: carbon content, fossil 0.004, dry mass 1 kg, wet mass 1 kg
- sand: 0.00022955 kg; lognormal variance with pedigree 0.31529, pedigree (1,1,2,1,1)
  for residual material landfill infrastructure
  properties: dry mass 1 kg, wet mass 1 kg
- steel, chromium steel 18/8, hot rolled: 1.0384e-5 kg; lognormal variance with pedigree 0.31529, pedigree (1,1,2,1,1)
  for residual material landfill infrastructure
  properties: carbon content, fossil 0.0008, dry mass 1 kg, wet mass 1 kg
- synthetic rubber: 2.7327e-7 kg; lognormal variance with pedigree 0.31529, pedigree (1,1,2,1,1)
  for residual material landfill infrastructure
  properties: carbon content, fossil 0.871949, dry mass 1 kg, heating value, net 26.42 MJ, wet mass 1 kg
- tap water: 0.0063763 kg; lognormal variance with pedigree 0.31529, pedigree (1,1,2,1,1)
  for residual material landfill infrastructure
  properties: carbon content, fossil 0.00178991, dry mass 0.000337476 kg, water content 2962.17, wet mass 1 kg

## Inputs from nature
- Organic carbon, placed in landfill [inventory indicator, waste]: 0.0091647 kg; lognormal variance with pedigree 0.37807, pedigree (1,1,2,1,1)
  organic carbon placed in residual material landfill (for ecoscarcity LCIA only)
- Waste mass, total, placed in landfill [inventory indicator, waste]: 1 kg; lognormal variance with pedigree 0.0002, pedigree (1,1,2,1,1)
  waste mass placed in residual material landfill (for ecoscarcity LCIA only)
- Occupation, construction site [natural resource, land]: 0.00028571 m2*year; lognormal variance with pedigree 0.21182, pedigree (1,1,2,1,1)
  for residual material landfill construction
- Occupation, dump site [natural resource, land]: 0.0017143 m2*year; lognormal variance with pedigree 0.21182, pedigree (1,1,2,1,1)
  for residual material landfill area during operation
- Occupation, shrub land, sclerophyllous [natural resource, land]: 0.00028571 m2*year; lognormal variance with pedigree 0.21182, pedigree (1,1,2,1,1)
  for residual material landfill area initial aftercare recultivation
- Occupation, traffic area, road network [natural resource, land]: 0.0025714 m2*year; lognormal variance with pedigree 0.21182, pedigree (1,1,2,1,1)
  for access road of residual material landfill during construction, operation, and aftercare
- Transformation, from dump site [natural resource, land]: 5.7143e-5 m2; lognormal variance with pedigree 0.53191, pedigree (1,1,2,1,1)
  for residual material landfill area initial aftercare recultivation
- Transformation, from pasture, man made [natural resource, land]: 9.1429e-5 m2; lognormal variance with pedigree 0.53191, pedigree (1,1,2,1,1)
  for residual material landfill and access road
- Transformation, from shrub land, sclerophyllous [natural resource, land]: 5.7143e-5 m2; lognormal variance with pedigree 0.53191, pedigree (1,1,2,1,1)
  for residual material landfill area initial aftercare recultivation
- Transformation, from traffic area, road network [natural resource, land]: 3.4286e-5 m2; lognormal variance with pedigree 0.53191, pedigree (1,1,2,1,1)
  for recultivation of access road of residual material landfill after aftercare period
- Transformation, to dump site [natural resource, land]: 5.7143e-5 m2; lognormal variance with pedigree 0.53191, pedigree (1,1,2,1,1)
  for residual material landfill area
- Transformation, to forest, unspecified [natural resource, land]: 5.7143e-5 m2; lognormal variance with pedigree 0.53191, pedigree (1,1,2,1,1)
  for residual material landfill area aftercare recultivation
- Transformation, to pasture, man made [natural resource, land]: 3.4286e-5 m2; lognormal variance with pedigree 0.53191, pedigree (1,1,2,1,1)
  for recultivation of landfill and access road of residual material landfill after aftercare period
- Transformation, to shrub land, sclerophyllous [natural resource, land]: 5.7143e-5 m2; lognormal variance with pedigree 0.53191, pedigree (1,1,2,1,1)
  for residual material landfill area initial aftercare recultivation
- Transformation, to traffic area, road network [natural resource, land]: 3.4286e-5 m2; lognormal variance with pedigree 0.53191, pedigree (1,1,2,1,1)
  for access road of residual material landfill

## Emissions to nature
- Heat, waste [air, urban air close to ground]: 3.0857e-5 MJ; lognormal variance with pedigree 0.012648, pedigree (1,1,2,1,1)
  from electricity consumption in residual material landfill operation
- Hazardous waste disposed [inventory indicator, waste]: 1 kg; lognormal variance with pedigree 0.0002, pedigree (1,1,2,1,1)
  EN15804 waste mass in residual material landfill
- Aluminium III [water, ground-, long-term]: 0.033632 kg; lognormal variance with pedigree 0.22789, pedigree (1,1,2,1,1)
  emissions to groundwater in residual material landfill
- Aluminium III [water, surface water]: 5.6146e-5 kg; lognormal variance with pedigree 0.82587, pedigree (1,1,2,1,1)
  emissions to surface water in residual material landfill
- Arsenic ion [water, ground-, long-term]: 1.0086e-5 kg; lognormal variance with pedigree 1.2653, pedigree (1,1,2,1,1)
  emissions to groundwater in residual material landfill
- Arsenic ion [water, surface water]: 1.2015e-7 kg; lognormal variance with pedigree 1.6106, pedigree (1,1,2,1,1)
  emissions to surface water in residual material landfill
- BOD5, Biological Oxygen Demand [water, ground-, long-term]: 0.0045845 kg; lognormal variance with pedigree 0.37808, pedigree (1,1,2,1,1)
  emissions to groundwater in residual material landfill
- BOD5, Biological Oxygen Demand [water, surface water]: 4.3107e-5 kg; lognormal variance with pedigree 0.75101, pedigree (1,1,2,1,1)
  emissions to surface water in residual material landfill
- COD, Chemical Oxygen Demand [water, ground-, long-term]: 0.046673 kg; lognormal variance with pedigree 0.37808, pedigree (1,1,2,1,1)
  emissions to groundwater in residual material landfill
- COD, Chemical Oxygen Demand [water, surface water]: 0.00043886 kg; lognormal variance with pedigree 0.75101, pedigree (1,1,2,1,1)
  emissions to surface water in residual material landfill
- Cadmium II [water, ground-, long-term]: 4.6025e-8 kg; lognormal variance with pedigree 1.922, pedigree (1,1,2,1,1)
  emissions to groundwater in residual material landfill
- Cadmium II [water, surface water]: 7.6836e-11 kg; lognormal variance with pedigree 1.922, pedigree (1,1,2,1,1)
  emissions to surface water in residual material landfill
- Calcium II [water, ground-, long-term]: 0.070778 kg; lognormal variance with pedigree 0.38266, pedigree (1,1,2,1,1)
  emissions to groundwater in residual material landfill
- Calcium II [water, surface water]: 0.00011816 kg; lognormal variance with pedigree 0.793, pedigree (1,1,2,1,1)
  emissions to surface water in residual material landfill
- Chloride [water, ground-, long-term]: 1.1648e-8 kg; lognormal variance with pedigree 1.922, pedigree (1,1,2,1,1)
  emissions to groundwater in residual material landfill
- Chloride [water, surface water]: 7.6059e-10 kg; lognormal variance with pedigree 1.922, pedigree (1,1,2,1,1)
  emissions to surface water in residual material landfill
- Chromium VI [water, ground-, long-term]: 9.5554e-5 kg; lognormal variance with pedigree 0.96472, pedigree (1,1,2,1,1)
  emissions to groundwater in residual material landfill
- Chromium VI [water, surface water]: 6.2878e-7 kg; lognormal variance with pedigree 1.3828, pedigree (1,1,2,1,1)
  emissions to surface water in residual material landfill
- Cobalt II [water, ground-, long-term]: 1.4548e-5 kg; lognormal variance with pedigree 1.2704, pedigree (1,1,2,1,1)
  emissions to groundwater in residual material landfill
- Cobalt II [water, surface water]: 2.4287e-8 kg; lognormal variance with pedigree 1.8026, pedigree (1,1,2,1,1)
  emissions to surface water in residual material landfill
- Copper ion [water, ground-, long-term]: 5.5075e-5 kg; lognormal variance with pedigree 1.922, pedigree (1,1,2,1,1)
  emissions to groundwater in residual material landfill
- Copper ion [water, surface water]: 9.1946e-8 kg; lognormal variance with pedigree 1.6237, pedigree (1,1,2,1,1)
  emissions to surface water in residual material landfill
- DOC, Dissolved Organic Carbon [water, ground-, long-term]: 0.0090793 kg; lognormal variance with pedigree 0.37808, pedigree (1,1,2,1,1)
  emissions to groundwater in residual material landfill
- DOC, Dissolved Organic Carbon [water, surface water]: 8.5372e-5 kg; lognormal variance with pedigree 0.75101, pedigree (1,1,2,1,1)
  emissions to surface water in residual material landfill
- Fluoride [water, ground-, long-term]: 6.5564e-6 kg; lognormal variance with pedigree 1.3099, pedigree (1,1,2,1,1)
  emissions to groundwater in residual material landfill
- Fluoride [water, surface water]: 1.8435e-8 kg; lognormal variance with pedigree 1.8423, pedigree (1,1,2,1,1)
  emissions to surface water in residual material landfill
- Iron ion [water, ground-, long-term]: 0.0020268 kg; lognormal variance with pedigree 1.922, pedigree (1,1,2,1,1)
  emissions to groundwater in residual material landfill
- Iron ion [water, surface water]: 3.3837e-6 kg; lognormal variance with pedigree 1.2428, pedigree (1,1,2,1,1)
  emissions to surface water in residual material landfill
- Lead II [water, ground-, long-term]: 2.4255e-6 kg; lognormal variance with pedigree 1.922, pedigree (1,1,2,1,1)
  emissions to groundwater in residual material landfill
- Lead II [water, surface water]: 4.0493e-9 kg; lognormal variance with pedigree 1.922, pedigree (1,1,2,1,1)
  emissions to surface water in residual material landfill
- Magnesium [water, ground-, long-term]: 0.0087466 kg; lognormal variance with pedigree 0.61148, pedigree (1,1,2,1,1)
  emissions to groundwater in residual material landfill
- Magnesium [water, surface water]: 1.4602e-5 kg; lognormal variance with pedigree 0.98796, pedigree (1,1,2,1,1)
  emissions to surface water in residual material landfill
- Manganese II [water, ground-, long-term]: 4.1322e-5 kg; lognormal variance with pedigree 1.922, pedigree (1,1,2,1,1)
  emissions to groundwater in residual material landfill
- Manganese II [water, surface water]: 6.8985e-8 kg; lognormal variance with pedigree 1.6627, pedigree (1,1,2,1,1)
  emissions to surface water in residual material landfill
- Mercury II [water, ground-, long-term]: 1.6621e-7 kg; lognormal variance with pedigree 1.922, pedigree (1,1,2,1,1)
  emissions to groundwater in residual material landfill
- Mercury II [water, surface water]: 2.7748e-10 kg; lognormal variance with pedigree 1.922, pedigree (1,1,2,1,1)
  emissions to surface water in residual material landfill
- Molybdenum VI [water, ground-, long-term]: 1.5006e-5 kg; lognormal variance with pedigree 1.1661, pedigree (1,1,2,1,1)
  emissions to groundwater in residual material landfill
- Molybdenum VI [water, surface water]: 7.3972e-6 kg; lognormal variance with pedigree 1.1943, pedigree (1,1,2,1,1)
  emissions to surface water in residual material landfill
- Nickel II [water, ground-, long-term]: 3.2842e-5 kg; lognormal variance with pedigree 1.1212, pedigree (1,1,2,1,1)
  emissions to groundwater in residual material landfill
- Nickel II [water, surface water]: 5.4828e-8 kg; lognormal variance with pedigree 1.6948, pedigree (1,1,2,1,1)
  emissions to surface water in residual material landfill
- Nitrate [water, ground-, long-term]: 0.023884 kg; lognormal variance with pedigree 0.42635, pedigree (1,1,2,1,1)
  emissions to groundwater in residual material landfill
- Nitrate [water, surface water]: 0.0036724 kg; lognormal variance with pedigree 0.52098, pedigree (1,1,2,1,1)
  emissions to surface water in residual material landfill
- Phosphate [water, ground-, long-term]: 0.10366 kg; lognormal variance with pedigree 0.62507, pedigree (1,1,2,1,1)
  emissions to groundwater in residual material landfill
- Phosphate [water, surface water]: 0.00017306 kg; lognormal variance with pedigree 0.86647, pedigree (1,1,2,1,1)
  emissions to surface water in residual material landfill
- Potassium I [water, ground-, long-term]: 0.01068 kg; lognormal variance with pedigree 0.32444, pedigree (1,1,2,1,1)
  emissions to groundwater in residual material landfill
- Potassium I [water, surface water]: 0.0042164 kg; lognormal variance with pedigree 0.36247, pedigree (1,1,2,1,1)
  emissions to surface water in residual material landfill
- Silicon [water, ground-, long-term]: 0.19794 kg; lognormal variance with pedigree 0.065885, pedigree (1,1,2,1,1)
  emissions to groundwater in residual material landfill
- Silicon [water, surface water]: 0.001094 kg; lognormal variance with pedigree 0.50275, pedigree (1,1,2,1,1)
  emissions to surface water in residual material landfill
- Sodium I [water, ground-, long-term]: 0.054749 kg; lognormal variance with pedigree 0.1367, pedigree (1,1,2,1,1)
  emissions to groundwater in residual material landfill
- Sodium I [water, surface water]: 0.036007 kg; lognormal variance with pedigree 0.15394, pedigree (1,1,2,1,1)
  emissions to surface water in residual material landfill
- Sulfate [water, ground-, long-term]: 0.11213 kg; lognormal variance with pedigree 0.20829, pedigree (1,1,2,1,1)
  emissions to groundwater in residual material landfill
- Sulfate [water, surface water]: 0.011647 kg; lognormal variance with pedigree 0.33327, pedigree (1,1,2,1,1)
  emissions to surface water in residual material landfill
- TOC, Total Organic Carbon [water, ground-, long-term]: 0.0090793 kg; lognormal variance with pedigree 0.37808, pedigree (1,1,2,1,1)
  emissions to groundwater in residual material landfill
- TOC, Total Organic Carbon [water, surface water]: 8.5372e-5 kg; lognormal variance with pedigree 0.75101, pedigree (1,1,2,1,1)
  emissions to surface water in residual material landfill
- Tin ion [water, ground-, long-term]: 1.6943e-6 kg; lognormal variance with pedigree 1.922, pedigree (1,1,2,1,1)
  emissions to groundwater in residual material landfill
- Tin ion [water, surface water]: 2.8285e-9 kg; lognormal variance with pedigree 1.922, pedigree (1,1,2,1,1)
  emissions to surface water in residual material landfill
- Zinc II [water, ground-, long-term]: 1.6633e-5 kg; lognormal variance with pedigree 1.922, pedigree (1,1,2,1,1)
  emissions to groundwater in residual material landfill
- Zinc II [water, surface water]: 2.7767e-8 kg; lognormal variance with pedigree 1.7827, pedigree (1,1,2,1,1)
  emissions to surface water in residual material landfill
