# electricity production, compressed air energy storage

Dataset: EcoSpold 2, unit process
Geography: RoW
Time period: 1998-01-01 to 2023-12-31
Technology level: modern
Classification: ISIC rev.4 ecoinvent: 3510:Electric power generation, transmission and distribution
Classification: EcoSpold01Categories: natural gas/power plants
Scenario: Business-as-Usual
System model: Allocation, cut-off by classification
Generated by: Heidi Hottenroth
Published in: Bouman, Evert A. 2016
Database: ecoinvent
isCopyrightProtected: true
accessRestrictedTo: 1

## General comment
The datasets represents elecctricity production by compressed air energy storage. This energy storage system is based on using electricity to compress air and store it in underground caverns. The air is released when needed and passed through a turbine to generate electricity.The compressed air energy storage (CAES) system makes use of a gas turbine for heating up the outflow of air from the storage location. This is different to the adiabatic CAES (also available in the database) which stores the heat in a thermal storage.
The dataset refers mainly to Bouman, Evert A.; Øberg, Martha M.; Hertwich, Edgar G. (2016): Environmental impacts of balancing offshore wind power with compressed air energy storage (CAES). In: Energy 95, S. 91–98. DOI: 10.1016/j.energy.2015.11.041.
Bouman et al. do not provide detailed data on emissions of gas turbine. Therefore emissions are modelled according to the ecoinvent dataset of natural gas burned in a normal power plant (electricity production, natural gas, conventional power plant).
['text', 'In a combined cycle power plant, a gas turbine is followed by a steam turbine. The dataset refers to a combined cycle power plant of 400MWe class with a gas turbine 260MWe and a steam turbine 140MWe.']
['text', 'For electricity production with natural gas, four different datasets relying to different power plant types exist:']
['text', ' - conventional power plant with / without CHP']
['text', ' - combined cycle power plant with / without CHP']
['text', 'At the moment, these datasets differ in nothing but the efficiency. High voltage electricity (at the busbar) is the reference product, whereupon heat is a by-product in CHP plants. Out of all fossile fuels, natural gas holds worldwide the highest share of CHP plants besides peat. Furthermore, natural gas power plants are today often designed with combined cycles. The advantages of a combined cycle power plant are for example: ']
['text', ' - a higher efficiency (approximately between 50-60% compared to ca. 33% for a conventional power plant)']
['text', ' - high operating flexibility']
['text', ' - lower emissions due to higher efficiency']
['text', ' - lower cooling water need. ']
['text', 'The approximate share of combined cycle natural gas power plants in Germany amounts to ca. {{cc_share}}. {{chp}} combined heat power plants (calculations made with IEA/OECD statistics and own assumptions). ']
['text', 'The efficiency calculations are based on IEA/OECD statistics (fuel inputs, electricity produced) and some own calculation assumptions. . Reducing factors such as contaminations of important plant parts, cooling conditions or part load have been taken into account. Even if efficiencies vary with different surrounding temperatures, a medium efficiency is assumed for all countries. Temperature adjustments would be related to high uncertainties.']
['text', 'Water is used for wet cooling and as feed water in the steam circuit. In this dataset, 100% wet cooling and no once-through cooling is assumed. ']
['text', 'EMISSIONS:']
['text', 'Different sources served as basis for assumption of average emissions. Where possible, the most recent sources were taken into account, whereas older sources were taken in order to determine the remaining data gaps. The emissions have been fixed for the former UCTE region* and have been overtaken as such for all countries without value adaptation (adaptation of the uncertainty). See ecoinvent report 'Erdgas' given as main source for details (Tab. 11.15). In the following a short overview:']
['text', ' - Emissions of NOx, CO, CO2, SO2, particles, N2O and CH4 are mainly taken from CORINAIR 2001, EPA, and a variety of other data sources ']
['text', '-\tNOx emissions are a major challenge in natural gas power plants. With rising temperature, emissions also rise; band widths of NOx emissions in literature are correspondingly large. There are several methods to diminish these emissions.']
['text', '-\tCO is a result of uncomplete burning. For economic and technical reasons, plant combustion is optimized and CO emissions are low. ']
['text', '-\tCO2 and SO2 emissions are dependent on the composition of the used fuel. Due to the low sulfur content of the used natural gas, no desulfurization has to take place.']
['text', '-\tOrganic compound emissions are estimated on the basis of EPA 1998. ']
['text', '-\tParticles are assumed to be smaller than 2.5 micro-m']
['text', 'former UCTE: Union for the Coordination of the Transmission of Electricity, since 2009 replaced by ENTSO-E European Network of Transmission System Operators for Electricity.']
['text', 'Sources:']
['text', '-\tCORINAIR 2001. EMEP/CORINAIR 2001: Joint EMEP/CORINAIR Atmospheric Emission Inventory Guidebook, Third Edition. Copenhagen: European Environment Agency, 2001. http://reports.eea.eu.int/technical_report_2001_3/en.']
['text', '-\tEPA 1998. US Environmental Protection Agency (1998). Compilation of Air Pollutant Emission Factors, AP-42, Fifth Edition, Volume I: Chapter 1: External Combustion Sources, Natural Gas Combustion - Final Section - Supplement D , July 1998. CHIEF (Clearinghouse for Inventories and Emission Factors). Research Triangle Park, North Carolina. http://www.epa.gov/ttn/chief/ap42/.']
['text', '-\tRentz O., Karl U., Peter H. (2002). Ermittlung und Evaluierung von Emissionsfaktoren f\xfcr Feuerungsanlagen in Deutschland f\xfcr die Jahre 1995, 2000 und 2010. Deutsch- Franz\xf6sisches Institut f\xfcr Umweltforschung, Uni Karsruhe. Endbericht. Im Auftrag des Umweltbundesamtes. Forschungsbericht 299 43 142. Umweltbundesamt. Berlin.']

## Included activities start
From the constructed CAES plant ready to produce or store electricity. From reception of natural gas at power plant gate.

## Included activities end
This activity ends with 1kWh of high voltage electricity produced at the power plant and arrival at the busbar. The dataset includes electricity input, which is stored and natural gas input for turbine operation. Emissions of natural gas combustion are included.

## Geography
The scope of the underlying literature source is Europe. Uncertainty was adjusted accordingly.

## Technology
Power rating: 200 MW. Storage capacity: 19.2 MWh. Annual production: 1473 GWh

## Time period
refers to date of publicaton

## Parameters
- factor: input of MJ for the production of 1 kWh: 4.2 MJ/kWh; name factor_MJ_kWh; lognormal variance with pedigree 0.0532, pedigree (4,4,3,4,4)
  Literature value
- lifetime: 100 year

## Reference product
- electricity, high voltage: 1 kWh; name electricity; By-product classification allocatable product; CPC 17100: Electrical energy; HS2017 271600: Electrical energy
  production volume 3 kWh; name electricity_apv
    In the time frame of the dataset no plant was realized.
  property price 0.0977 EUR2005
    Temporary price data. Calculated as 90% of purchasers price based on: 94% of the average price (to account for a 6% loss in transformation and transmission) for electricity for industrial consumersin 2005 (excluded taxes). From IEA.
  properties: carbon allocation 0 kg, carbon content 0

## Inputs from technosphere
- compressed air energy storage plant, 200 MW electrical: 6.78887e-12 unit; = 1/(lifetime*1473000000); lognormal variance with pedigree 0.3186, pedigree (2,5,4,5,1)
  Calculated value. Annual production: 1473 GWh. System capacity factor: 84 %
- electricity, high voltage: 0.00136414, 0.148485, 0.0224999, 0.444117, 0.00682686, 0.0464098, 0.000296764 kWh (7 suppliers, which the file names only by identifier); sum of these 0.67 kWh; lognormal variance with pedigree 0.0192, pedigree (2,5,4,5,1)
  Literature value
- natural gas, high pressure: 0.00090085, 0.00151962, 0.00331476, 0.00110931, 0.000259241, 0.00154295, 0.00148058, 0.00389322, 0.00150304, 0.00232478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 m3 (37 suppliers, which the file names only by identifier); sum of these 0.116667 m3; = 4,2/ natural_gas_Net_Heat_Value; lognormal variance with pedigree 0.01, pedigree (1,1,4,5,1)
  Calculated value. 4.2 MJ of Energy required.
  properties: carbon content, fossil 0.602381, dry mass 0.84 kg, heating value, net 36 MJ, wet mass 0.84 kg
  note on carbon content, fossil: An average C content of 0.506 kg C/ m3 has been assumed (this average has been calculated using data in Tab 3.5, ecoinvent v2.2 report 6_V
  note on heating value, net: Literature value, Source: Christoph Meili;Niels Jungbluth;Maresa Bussa (2021) Life cycle inventories of crude oil and natural gas extraction. ESU-services Ltd. commissioned by BAFU & VSG, Schaffhausen, Switzerland, http://esu-services.ch/data/public-lci-reports/

## Emissions to nature
- Acenaphthene [air, non-urban air or from high stacks]: 3.3306e-12 kg; name acenaphthene; = factor_MJ_kWh*0.000000000000793; lognormal variance with pedigree 0.6826, pedigree (3,3,5,5,3)
  Literature value/calculated value. Value taken over from the dataset of natural gas burned in a normal power plant (electricity production, natural gas, conventional power plant).
  Emissions when producing 1kWh of electricity, based on the value for burning 1MJ of natural gas. Weighted average with electricity production data (Itten&Frischknecht 2012) and emission values of 11 countries
  (AT, BE, DE, ES, FR, GB, IT, JP, LU, NL, US) (Faist Emmenegger et al. 2007, JP and US in the appendix)
  Country emissions values estimate from range of values from different references. See Tab. 11.19, p. 138 in Faist Emmenegger et al. 2007.
  Source:
  Itten R. and Frischknecht R. (2012) Life Cycle Inventories of Electricity Mixes and Grid. ESU-services Ltd., Uster, Switzerland.
  Faist Emmenegger M., Heck T. and Jungbluth N. (2007) Erdgas. In: Sachbilanzen von Energiesystemen: Grundlagen für den ökologischen Vergleich von Energiesystemen und den Einbezug von Energiesystemen in Ökobilanzen für die Schweiz (ed. Dones R.). Swiss Centre for Life Cycle Inventories. Dübendorf, CH.
- Acetaldehyde [air, non-urban air or from high stacks]: 3.36e-9 kg; name acetaldehyde; = factor_MJ_kWh*0.0000000008; lognormal variance with pedigree 1.1086, pedigree (4,3,5,5,3)
  (same comment as for Acenaphthene)
- Acetic acid [air, non-urban air or from high stacks]: 5.082e-7 kg; name acetic_acid; = factor_MJ_kWh*0.000000121; lognormal variance with pedigree 1.1026, pedigree (3,3,5,5,3)
  (same comment as for Acenaphthene)
- Arsenic ion [air, non-urban air or from high stacks]: 1.7262e-10 kg; name arsenic; = factor_MJ_kWh*0.0000000000411; lognormal variance with pedigree 0.098, pedigree (3,5,5,5,4)
  Literature value/calculated value. Value taken over from the dataset of natural gas burned in a normal power plant (electricity production, natural gas, conventional power plant).
  Emissions when producing 1kWh of electricity, based on the value for burning 1MJ of natural gas. Weighted average with electricity production data (Itten&Frischknecht 2012) and emission values of 11 countries
  (AT, BE, DE, ES, FR, GB, IT, JP, LU, NL, US) (Faist Emmenegger et al. 2007, JP and US in the appendix. Only the US dataset contains heavy metals emissions - see Tab. 16.10)
  Source:
  Itten R. and Frischknecht R. (2012) Life Cycle Inventories of Electricity Mixes and Grid. ESU-services Ltd., Uster, Switzerland.
  Faist Emmenegger M., Heck T. and Jungbluth N. (2007) Erdgas. In: Sachbilanzen von Energiesystemen: Grundlagen für den ökologischen Vergleich von Energiesystemen und den Einbezug von Energiesystemen in Ökobilanzen für die Schweiz (ed. Dones R.). Swiss Centre for Life Cycle Inventories. Dübendorf, CH.
- Benzene [air, non-urban air or from high stacks]: 3.7884e-9 kg; name benzene; = factor_MJ_kWh*0.000000000902; lognormal variance with pedigree 0.6826, pedigree (3,3,5,5,3)
  (same comment as for Acenaphthene)
- Benzo(a)pyrene [air, non-urban air or from high stacks]: 2.2218e-12 kg; name benzo_a_pyrene; = factor_MJ_kWh*0.000000000000529; lognormal variance with pedigree 0.6826, pedigree (3,3,5,5,3)
  (same comment as for Acenaphthene)
- Beryllium II [air, non-urban air or from high stacks]: 1.0374e-11 kg; name beryllium; = factor_MJ_kWh*0.00000000000247; lognormal variance with pedigree 0.098, pedigree (3,5,5,5,4)
  Literature value/calculated value. Value taken over from the dataset of natural gas burned in a normal power plant(electricity production, natural gas, conventional power plant).
  Emissions when producing 1kWh of electricity, based on the value for burning 1MJ of natural gas. Weighted average with electricity production data (Itten&Frischknecht 2012) and emission values of 11 countries
  (AT, BE, DE, ES, FR, GB, IT, JP, LU, NL, US) (Faist Emmenegger et al. 2007, JP and US in the appendix. Only the US dataset contains heavy metals emissions - see Tab. 16.10)
  Source:
  Itten R. and Frischknecht R. (2012) Life Cycle Inventories of Electricity Mixes and Grid. ESU-services Ltd., Uster, Switzerland.
  Faist Emmenegger M., Heck T. and Jungbluth N. (2007) Erdgas. In: Sachbilanzen von Energiesystemen: Grundlagen für den ökologischen Vergleich von Energiesystemen und den Einbezug von Energiesystemen in Ökobilanzen für die Schweiz (ed. Dones R.). Swiss Centre for Life Cycle Inventories. Dübendorf, CH.
- Butane [air, non-urban air or from high stacks]: 3.8892e-6 kg; name butane; = factor_MJ_kWh*0.000000926; lognormal variance with pedigree 0.6826, pedigree (3,3,5,5,3)
  (same comment as for Acenaphthene)
- Cadmium II [air, non-urban air or from high stacks]: 9.492e-10 kg; name cadmium; = factor_MJ_kWh*0.000000000226; lognormal variance with pedigree 0.098, pedigree (3,5,5,5,4)
  (same comment as for Arsenic ion)
- Carbon dioxide, fossil [air, non-urban air or from high stacks]: 0.22428 kg; name carbon_dioxide_fossil; = factor_MJ_kWh*0.0534; lognormal variance with pedigree 0.0532, pedigree (3,3,5,5,3)
  Literature value/calculated value. Value taken over from the dataset of natural gas burned in a normal power plant(electricity production, natural gas, conventional power plant).
  Emissions when producing 1kWh of electricity, based on the value for burning 1MJ of natural gas. Weighted average with electricity production data (Itten&Frischknecht 2012) and emission values of 11 countries
  (AT, BE, DE, ES, FR, GB, IT, JP, LU, NL, US) (Faist Emmenegger et al. 2007)
  Country emissions values estimate from range of values from different references. See Tab. 11.15, p. 133f in Faist Emmenegger et al. 2007.
  Source:
  Itten R. and Frischknecht R. (2012) Life Cycle Inventories of Electricity Mixes and Grid. ESU-services Ltd., Uster, Switzerland.
  Faist Emmenegger M., Heck T. and Jungbluth N. (2007) Erdgas. In: Sachbilanzen von Energiesystemen: Grundlagen für den ökologischen Vergleich von Energiesystemen und den Einbezug von Energiesystemen in Ökobilanzen für die Schweiz (ed. Dones R.). Swiss Centre for Life Cycle Inventories. Dübendorf, CH.
- Carbon monoxide, fossil [air, non-urban air or from high stacks]: 9.24e-6 kg; name carbon_monoxide_fossil; = factor_MJ_kWh*0.0000022; lognormal variance with pedigree 0.3426, pedigree (3,3,5,5,3)
  Literature value/calculated value. Value taken over from the dataset of natural gas burned in a normal power plant (electricity production, natural gas, conventional power plant).
- Chromium III [air, non-urban air or from high stacks]: 1.2054e-9 kg; name chromium; = factor_MJ_kWh*0.000000000287; lognormal variance with pedigree 0.066, pedigree (3,5,5,5,3)
  (same comment as for Arsenic ion)
- Cobalt II [air, non-urban air or from high stacks]: 7.224e-11 kg; name cobalt; = factor_MJ_kWh*0.0000000000172; lognormal variance with pedigree 0.098, pedigree (3,5,5,5,4)
  (same comment as for Arsenic ion)
- Dinitrogen monoxide [air, non-urban air or from high stacks]: 4.1034e-6 kg; name dinitrogen_monoxide; = factor_MJ_kWh*0.000000977; lognormal variance with pedigree 0.3426, pedigree (3,3,5,5,3)
  Literature value/calculated value. Value taken over from the dataset of natural gas burned in a normal power plant (electricity production, natural gas, conventional power plant).
  Emissions when producing 1kWh of electricity, based on the value for burning 1MJ of natural gas. Weighted average with electricity production data (Itten&Frischknecht 2012) and emission values of 11 countries
  (AT, BE, DE, ES, FR, GB, IT, JP, LU, NL, US) (Faist Emmenegger et al. 2007)
  Country emissions values estimate from range of values from different references. See Tab. 11.15, p. 133f in Faist Emmenegger et al. 2007.
  Source:
  Itten R. and Frischknecht R. (2012) Life Cycle Inventories of Electricity Mixes and Grid. ESU-services Ltd., Uster, Switzerland.
  Faist Emmenegger M., Heck T. and Jungbluth N. (2007) Erdgas. In: Sachbilanzen von Energiesystemen: Grundlagen für den ökologischen Vergleich von Energiesystemen und den Einbezug von Energiesystemen in Ökobilanzen für die Schweiz (ed. Dones R.). Swiss Centre for Life Cycle Inventories. Dübendorf, CH.
- Dioxins, measured as 2,3,7,8-tetrachlorodibenzo-p-dioxin [air, non-urban air or from high stacks]: 1.218e-16 kg; name dioxins; = factor_MJ_kWh*2.9E-17; lognormal variance with pedigree 1.1086, pedigree (4,3,5,5,3)
  Literature value/calculated value. Value taken over from the dataset of natural gas burned in a normal power plant (electricity production, natural gas, conventional power plant).
  Emissions when producing 1kWh of electricity, based on the value for burning 1MJ of natural gas. Weighted average with electricity production data (Itten&Frischknecht 2012) and emission values of 11 countries
  (AT, BE, DE, ES, FR, GB, IT, JP, LU, NL, US) (Faist Emmenegger et al. 2007)
  Country emissions values estimate from range of values from different references. See Tab. 11.19, p. 138 in Faist Emmenegger et al. 2007.
  Source:
  Itten R. and Frischknecht R. (2012) Life Cycle Inventories of Electricity Mixes and Grid. ESU-services Ltd., Uster, Switzerland.
  Faist Emmenegger M., Heck T. and Jungbluth N. (2007) Erdgas. In: Sachbilanzen von Energiesystemen: Grundlagen für den ökologischen Vergleich von Energiesystemen und den Einbezug von Energiesystemen in Ökobilanzen für die Schweiz (ed. Dones R.). Swiss Centre for Life Cycle Inventories. Dübendorf, CH.
- Ethane [air, non-urban air or from high stacks]: 5.754e-6 kg; name ethane; = factor_MJ_kWh*0.00000137; lognormal variance with pedigree 0.6826, pedigree (3,3,5,5,3)
  (same comment as for Acenaphthene)
- Formaldehyde [air, non-urban air or from high stacks]: 1.3566e-7 kg; name formaldehyde; = factor_MJ_kWh*0.0000000323; lognormal variance with pedigree 0.6826, pedigree (3,3,5,5,3)
  (same comment as for Acenaphthene)
- Hexane [air, non-urban air or from high stacks]: 3.3306e-6 kg; name hexane; = factor_MJ_kWh*0.000000793; lognormal variance with pedigree 0.6826, pedigree (3,3,5,5,3)
  (same comment as for Acenaphthene)
- Lead II [air, non-urban air or from high stacks]: 4.326e-10 kg; name lead; = factor_MJ_kWh*0.000000000103; lognormal variance with pedigree 0.098, pedigree (3,5,5,5,4)
  (same comment as for Arsenic ion)
- Manganese II [air, non-urban air or from high stacks]: 3.2802e-10 kg; name manganese; = factor_MJ_kWh*0.0000000000781; lognormal variance with pedigree 0.098, pedigree (3,5,5,5,4)
  (same comment as for Arsenic ion)
- Mercury II [air, non-urban air or from high stacks]: 2.8896e-10 kg; name mercury; = factor_MJ_kWh*0.0000000000688; lognormal variance with pedigree 0.6826, pedigree (3,3,5,5,3)
  (same comment as for Arsenic ion)
- Methane, fossil [air, non-urban air or from high stacks]: 4.0782e-6 kg; name methane_fossil; = factor_MJ_kWh*0.000000971; lognormal variance with pedigree 0.6826, pedigree (3,3,5,5,3)
  (same comment as for Dinitrogen monoxide)
- Nickel II [air, non-urban air or from high stacks]: 1.8102e-9 kg; name nickel; = factor_MJ_kWh*0.000000000431; lognormal variance with pedigree 0.098, pedigree (3,5,5,5,4)
  (same comment as for Arsenic ion)
- Nitrogen oxides [air, non-urban air or from high stacks]: 0.0001071 kg; name nitrogen_oxides; = factor_MJ_kWh*0.0000255; lognormal variance with pedigree 0.3746, pedigree (3,3,5,5,4)
  (same comment as for Carbon monoxide, fossil)
- PAH, polycyclic aromatic hydrocarbons [air, non-urban air or from high stacks]: 3.36e-8 kg; name pah; = factor_MJ_kWh*0.000000008; lognormal variance with pedigree 1.1086, pedigree (4,3,5,5,3)
  (same comment as for Dioxins, measured as 2,3,7,8-tetrachlorodibenzo-p-dioxin)
- Particulate Matter, < 2.5 um [air, non-urban air or from high stacks]: 2.0622e-6 kg; name particulates_lt_2_5um; = factor_MJ_kWh*0.000000491; lognormal variance with pedigree 0.3746, pedigree (3,3,5,5,4)
  (same comment as for Dinitrogen monoxide)
- Pentane [air, non-urban air or from high stacks]: 4.83e-6 kg; name pentane; = factor_MJ_kWh*0.00000115; lognormal variance with pedigree 0.6826, pedigree (3,3,5,5,3)
  (same comment as for Acenaphthene)
- Propane [air, non-urban air or from high stacks]: 2.961e-6 kg; name propane; = factor_MJ_kWh*0.000000705; lognormal variance with pedigree 0.6826, pedigree (3,3,5,5,3)
  (same comment as for Acenaphthene)
- Propionic acid [air, non-urban air or from high stacks]: 6.72e-8 kg; name propionic_acid; = factor_MJ_kWh*0.000000016; lognormal variance with pedigree 1.1086, pedigree (4,3,5,5,3)
  (same comment as for Acenaphthene)
- Selenium IV [air, non-urban air or from high stacks]: 2.0622e-11 kg; name selenium; = factor_MJ_kWh*0.00000000000491; lognormal variance with pedigree 0.6826, pedigree (3,3,5,5,3)
  Literature value/calculated value. Value taken over from the dataset of natural gas burned in a normal power plant (electricity production, natural gas, conventional power plant).
  Emissions when producing 1kWh of electricity, based on the value for burning 1MJ of natural gas. Weighted average with electricity production data (Itten&Frischknecht 2012) and emission values of 11 countries
  (AT, BE, DE, ES, FR, GB, IT, JP, LU, NL, US) (Faist Emmenegger et al. 2007, JP and US in the appendix. Only the US dataset contains heavy metals emissions - see Tab. 16.10)
  Source:
  Itten R. and Frischknecht R. (2012) Life Cycle Inventories of Electricity Mixes and Grid. ESU-services Ltd., Uster, Switzerland.
- Sulfur dioxide [air, non-urban air or from high stacks]: 2.4024e-6 kg; name sulfur_dioxide; = factor_MJ_kWh*0.000000572; lognormal variance with pedigree 0.0536, pedigree (3,3,5,5,3)
  (same comment as for Dinitrogen monoxide)
- Toluene [air, non-urban air or from high stacks]: 6.3e-9 kg; name toluene; = factor_MJ_kWh*0.0000000015; lognormal variance with pedigree 0.6826, pedigree (3,3,5,5,3)
  (same comment as for Acenaphthene)

## Sampling procedure
Literature. Bouman et al. do not provide detailed data on emissions of gas turbine. Therefore emissions are modelled according to the ecoinvent dataset of natural gas burned in a normal power plant (electricity production, natural gas, conventional power plant, GLO 2015, allocation, cut-off).

## Extrapolations
The dataset is extrapolated from the respective regional dataset with uncertainty adjusted.
