# electricity production, hydro, run-of-river

Dataset: EcoSpold 2, unit process
Geography: AR
Time period: 1945-01-01 to 2023-12-31
Technology level: modern
Classification: EcoSpold01Categories: hydro power/power plants
Classification: ISIC rev.4 ecoinvent: 3510:Electric power generation, transmission and distribution
Tags: hydro power
Scenario: Business-as-Usual
System model: Allocation, cut-off by classification
Generated by: Bárbara Civit
Published in: Suppen, N. 2017
Database: ecoinvent
isCopyrightProtected: true
accessRestrictedTo: 1

## General comment
This dataset represents the production of 1 kWh of electricity in a run-of-river power plant unit in Argentina in 2014. Run-of-river power plants are hydro power plants without reservoirs. Depending on the net head of the power plant, high-pressure, medium-pressure and low-pressure systems can be distinguished. Low-pressure power plants including river power stations and canal power plants are very common; therefore these two types of run-of-river power stations are covered in the dataset. To some extent, high-pressure as well as medium-pressure run-of-river systems can be considered as reservoir power stations, e.g. as unit in plant groups that are dominated by storage power plants, but also include alpine run power stations.
LCI data are based on information about annual electricity production in Argentina in 2014 The calculation of this dataset is based on data of reservoir hydro power plant units. For this, a representative sample of various types of power plants in Switzerland and Austria is taken into account. Lifetime is assumed to be 80 years for the structural part (including cement, reinforcing steel, diesel, electricity, transportation and explosives) and 40 years for the rest of materials. The data refers to plant construction of a mix of types of dams built between 1945 and the beginning of the 1980s; therefore they might not be representative for more modern construction, for an individual type and for small-scale and smallest-scale plants.
Baumann J. (1949) Kraftwerk Rupperswil-Auenstein. Verlag Kraftwerk
Rupperswil-Auenstein AG, Rupperswil.
Nordostschweizerische Kraftwerke AG (NOK) (1956) Das Kraftwerk
Wildegg-Brugg. In: Schweizerische Bauzeitung, 74 (4), 47-52; 74 (5), 63-67; 74
(6), 83-88; 74 (7), 93-99; 74 (8), 111-116; 74 (10), 145-147; 74 (12), 167-172.
Aegerter A., Dr. Bosshardt O. (1954) Das Kraftwerk Birsfelden. In: Wasser- und
Energiewirtschaft, 46 (5-7), 165-176.
Brux G. (1983) Das Donaukraftwerk Greifenstein. In: Wasser, Energie, Luft, 75
(1-2), 11-13.
Radag A. (1979) 50 Jahre Rheinkraftwerk Albbruck-Dogern Aktiengesellschaft.
Waldshut/Rhein, 1929-1979.
Bundesamt für Energiewirtschaft (2001) Elektrizitatsstatistik 2000. Bern,
Schweiz.

## Included activities start
From (potential) energy in water, entering the power plant and use of power plant infrastructure.

## Included activities end
The activity ends with 1 kWh of high voltage electricity produced at the power plant and arrived at the busbar.

The datasets includes the use of lubricant oil and the mass of water assing through the turbines.

The dataset doesn´t include detailed specifications about land use due to methodical issues. This information is only included via transformation and occuption of land and calculated with an simplified approach.

## Geography
Data represent the average production of run-of hydro power plants in Argentina, based on information of a characteristic sample of Swiss run-of-river hydropower plants.

## Technology
Run-of-river power plants are hydro power plants without important reservoirs. Depending on the net head of the power plant, high-pressure, medium-pressure and low-pressure systems can be distinguished. Low-pressure power plants including river power stations and canal power plants are very common; therefore these two types of run-of-river power stations are covered in the dataset. To some extent, high-pressure as well as medium-pressure run-of-river systems can be considered as reservoir power stations, e.g. as unit in plant groups that are dominated by storage power plants, but also include alpine run power stations.
The technology used in the dataset has an overall efficiency of 82%, more modern technologies show an overall efficiency of about 88%. The overall efficiency (current: 0,82; modern: 0,88) is composed of the efficiency of the works water channel (current: 1,00; modern: 1,00), the turbine (current: 0,87; modern: 0,91), the generator (current: 0,96; modern: 0,98) and the transformer (current: 0,98; modern: 0,99). For the calculation of the works water channel of run-of-river plants an efficiency of 100% is assumed.
The efficiency losses in turbines depend on the turbine type (Kaplan, Francis, Pelton, etc.), the turbine output and on the ratio between turbined water amount and the rated water amount. In König, examples for curve progressions of the relationship between these variables are shown. For current power plants an efficiency of 87% is assumed, more modern turbines show an efficiency of about 91%.
The efficiency of generators depends on the output, the rotation speed of the generator and the cooling system. For today’s power plants an efficiency of approximately 96% is assumed, modern generators show an efficiency of about 98%. The efficiency of transformers amounts to 98%, respectively 99%.
References:
König F., von (1985) Bau von Wasserkraftanlagen. C.F. Müller, Karlsruhe.

## Parameters
- gross electricity production: 1.0271e9 kWh; name gross_electricity; lognormal variance with pedigree 0.0019, pedigree (2,2,1,1,2)
  Literature value/statistics, extrapolation. Gross production of grid-connected electricity in run-of-river plants in 2012. The IEA statistics only provide data for production of electricity with hydropower plants in general. The split into reservoir and run-of-river plants was made for all ecoinvent geographies based on Itten et al. 2014. The split of the total worldwide production was then made based on all these ecoinvent geographies.
  IEA. 2014. Electricity Information 2014. ISBN 978-92-64-21692-1. International Energy Agency (IEA), Paris Cedex (FR).
  Itten R., Frischknecht R., Stucki M. 2014. Life Cycle Inventories of Electricity Mixes and Grid. Version 1.3. treeze, Uster, Switzerland
  nan
- lifetime: 80 year; lognormal variance with pedigree 0.0014, pedigree (2,2,1,3,1)
  Estimation based on experiences.
  nan
- losses from gross electricity production: 0.01 dimensionless; name losses_gross_net; lognormal variance with pedigree 0.003225, pedigree (3,3,1,2,1)
  Literature value. Generic value taken from the IEA Electricity information 2014, part I, p. I.7: 'The difference between gross and net electricity production is generally observed to be about 7% for conventional thermal stations, 1% for hydro stations and 6% for nuclear.'
  IEA/OECD. 2014. Electricity Information 2014. International Energy Agency (IEA), Paris Cedex (FR).
  nan
  Uncertainty: Generic assumption

## Reference product
- electricity, high voltage: 1 kWh; By-product classification allocatable product; CPC 17100: Electrical energy; HS2017 271600: Electrical energy
  production volume 5.49772e8 kWh; name apv_electricity; = gross_electricity*(1-losses_gross_net)
    Statistics:
    CAMMESA provides statistics about net energy exchanges through the electric wholesale market. See comment in the Gross electricity production parameter for more information
    Source: CAMMESA "COMPAÑÍA ADMINISTRADORA DEL MERCADO MAYORISTA ELÉCTRICO SOCIEDAD ANÓNIMA"
    Supporting documentation available at: <http://portalweb.cammesa.com/Memnet1/default.aspx>
  property price 0.0977 EUR2005
    Temporary price data. Calculated as 90% of purchasers price based on: 94% of the average price (to account for a 6% loss in transformation and transmission) for electricity for industrial consumersin 2005 (excluded taxes). From IEA.
  properties: carbon allocation 0 kg, carbon content 0

## Inputs from technosphere
- hydropower plant, run-of-river: 8.07285e-13 unit; = 1/(lifetime*15484*1000000); lognormal variance with pedigree 0.082, pedigree (1,1,5,5,1)
  Estimation. Lifetime is assumed to be 80 years (p. 29ff); net production is assumed to be 165000 GWh/a (Tab. 1.1 p. 3).
- lubricating oil: 7.56e-6 kg; name lubricating_oil; = 0.000009*0.84; source Vögtlin H. J. 2002, p. p.36 in Bolliger et al.; lognormal variance with pedigree 0.25, pedigree (1,1,5,1,5)
  Estimation. A consumption of lubricating oil for turbines of 9 liters per GWh is estimated. With an oil density of 0.84 kg/l this amounts to 0.007 g/kWh. The lubricating oil is in a closed loop system (i.e. cannot get into the turbined water system) and is disposed annualy as waste oil in a hazardous waste treatment plant.
  properties: carbon content, fossil 0.75, dry mass 1 kg, heating value, net 40.2 MJ, wet mass 1 kg
  note on carbon content, fossil: Lubricating oil is produced from diesel. C-content/dry mass of fats and oils considered 75%, from: ecoinvent v2.2 report, n 15a, pg 40
  note on heating value, net: Literature value, Source: IPCC 2006, 2006 IPCC Guidelines for National Greenhouse Gas Inventories, Prepared by the National Greenhouse Gas Inventories Programme, Eggleston H.S., Buendia L., Miwa K., Ngara T. and Tanabe K. (eds). Published: IGES, Japan
- waste mineral oil: -7.56e-6 kg; name waste_oil; = lubricating_oil; lognormal variance with pedigree 0.094, pedigree (1,1,3,5,1)
  Estimation. The lubricating oil is in a closed loop system (i.e. cannot get into the turbined water system) and is disposed annualy as waste oil in a hazardous waste treatment plant. The information given is based on own assumptions.
  production volume; = apv_electricity* waste_oil
    Calculated from the production volume of electricity, high voltage, hydro, run-of-river in proportion to the respective output amounts.
  properties: carbon content, fossil 0.864444, dry mass 0.9 kg, heating value, net 34.7 MJ, water content 0.111111, wet mass 1 kg
  note on carbon content, fossil: Tab A.6, ecoinvent v2.2 report 13_I. C content has been calculated after data in the tables, and then referred to 1 kg DM
  note on heating value, net: Value taken from the general comment of the treatment dataset.

## Inputs from nature
- Energy, potential (in hydropower reservoir), converted [natural resource, in water]: 3.79 MJ
  Reflects range average to best performance.
- Occupation, river, artificial [natural resource, land]: 0.061089 m2*year; = (transformation_from_shrubland)*lifetime; lognormal variance with pedigree 0.082, pedigree (1,1,5,5,1)
  Calculation based on the life time and the transformation to river area
- Transformation, from shrub land, sclerophyllous [natural resource, land]: 0.000763613 m2; name transformation_from_shrubland; lognormal variance with pedigree 0.35, pedigree (5,5,5,5,5)
  Literature/calculation. The water surface of all run-o-riverf power plants have been summed up and related with the amount of electricity production.
  Source: Inventario de Presas y Centrales Hidroeléctricas de la República Argentina,- 1a ed. Subsecretaria de Recursos Hídricos de la Nación Buenos Aires : Ministerio de Planificación Federal, Inversión Pública y Servicios, 2010. ISBN 978-987-23585-8-7
- Transformation, to industrial area [natural resource, land]: 7.63613e-6 m2; name transformation_to_industrial; = (transformation_from_shrubland)*0.01; lognormal variance with pedigree 0.162, pedigree (1,1,5,5,1)
  Estimation.
  Land use for the weir and the power station is defined as 'transformation to industrial area' at which 1 % of the value is defined for the water course. Land use for access roads can be neglected because most of the power plants are built on developed land.
- Transformation, to river, artificial [natural resource, land]: 0.000755977 m2; = (transformation_from_shrubland)-transformation_to_industrial; lognormal variance with pedigree 0.162, pedigree (1,1,5,5,1)
  Literature/calculation
  This figure is calculated as the difference between the original transformed area and the estimation of the area occupied by the infrastructure of the power plant.
  The area after commissioning of the run-of-river plant is defined as 'transformation to river, artificial'. Land use for the weir and the power station is defined as 'transformation to industrial area' at which 1 % of the value is defined for the water course. Land use for access roads can be neglected because most of the power plants are built on developed land.
  It has to be pointed out that run-of-river power plants do not necessarily have a negative impact on the ecological situation (e.g. new construction of the power plant Ruppoldingen).
- Water, turbine use, unspecified natural origin [natural resource, in water]: 45 m3; name water_turbine_use_UNO_input; lognormal variance with pedigree 0.0426, pedigree (1,1,5,5,1)
  Literature/Estimation. This figure has been taken from the GLO 2008 dataset, which in turn reports the value obtained for the Swiss dataset.
  The following is the comment from the original dataset.
  Calculated value. With respect to the ecological importance the following has to be considered: the turbined amount of water is via physical laws related to the produced amount of electricity, i.e. the turbined amount of water does not provide independent, ecological relevant information. The specific turbined amount of water (in m3/kWh) represents a value that is inversely proportional to the average net head. However, the turbined amount of water is an ecological relevant measurement in terms of representing the water amount that is in parts detracted from the natural water cycle. With an average ned head of 10 metres the specific turbined water amount accounts for 45 m3/kWh. If this value is extrapolated to the production volumes of the run-of-river power plants in Switzerland, the overall turbined water amount would be 747x10^9 m3/a. Taking the total runoff of 53,5 10^9 m3/a of Switzerland into account the water is turbined 14 times before leaving the land.
  Standard values for resources are assumed.

## Emissions to nature
- Water [water, unspecified]: 45 m3; name water_to_water_unspecified; = water_turbine_use_UNO_input; lognormal variance with pedigree 0.130025, pedigree (4,4,5,2,4)
  Calculated value based on literature values and expert opinion. It has been estimated that there is no emission to air. All the turbine water which enters the activity is released back to water.
  property fraction, origin: fresh water 1; name fraction_origin_fresh_water
  property fraction, origin: salt water 0; name fraction_origin_salt_water
  property fraction, origin: unspecified 0; name fraction_origin_unspecified

## Sampling procedure
Sampling procedure based on literature. The information provided in this dataset correspond to 29 run-of power plant distributed in different regions of the country.

## Extrapolations
This dataset has been built based on the "electricity production, hydro, run-of-river"/ GLO 2008 dataset for run-of-river power plants (accessed: January 21st, 2018).The information about annual electricity production and the transformed area have been obtained for the different run-of-river hydro power plants. Other exchanges, such as the occupation area and the transformed to industrial area have been calculated using that information. The remaining exchanges such as methane non-fossil emissions, CO2 emissions and lubricating oil remain as in the original GLO 2008 dataset,
