# cabbage white production

Dataset: EcoSpold 2, unit process
Geography: RoW
Time period: 2010-01-01 to 2023-12-31
Technology level: current
Classification: ISIC rev.4 ecoinvent: 0113:Growing of vegetables and melons, roots and tubers
Scenario: Business-as-Usual
System model: Allocation, cut-off by classification
Generated by: Franziska Stössel
Published in: Stoessel, Franziska; 2012
Database: ecoinvent
isCopyrightProtected: false
accessRestrictedTo: 1

## General comment
This dataset represents white cabbage production according to the Integrated Production standard in CH.
Yield: 48 t / ha.
Duration of one cropping cycle: 5.25 months.
Field production.
The LCA study, from which this LCI has been derived, contains detailed descriptions of the system boundaries and the data sources used (Stoessel et al. 2012). The publication is published and freely available with comprehensive supporting information:
http://pubs.acs.org/doi/pdf/10.1021/es2030577
Franziska Stoessel, Ronnie Juraske, Stephan Pfister, Stefanie Hellweg. (2012) Life Cycle Inventory and Carbon and Water FoodPrint of Fruits and Vegetables: Application to a Swiss Retailer. Environmental Science & Technology 6(46) 3253-3262.
This activity was adapted to include the global average land use change (LUC) emissions according 2nd edition of the Quantis-modified tool developed by Blonk Consultants 'WFLDB-adapted-Blonk 2014 direct-land-use-change-assessment-tool_2015-05-18a.xlsx', tab. 'Country & land use unknown'. The size of the emission depends on (i) the relative crop expansion in all countries of the crop during the last 20 years and (ii) the corresponding, country specific land transformations. The current results are based on the average FAOSTAT data (harvested area) of 2009-2011 and 1989-1991. The weighted average is used which takes into account relative difference in crop expansion into primary forest, secondary forest, grassland, perennial and annual land.

## Included activities start
From seedling production.

## Included activities end
This activity ends with harvest and storage.
The dataset includes a storage period of 4.5 months and it's use of electricity.
And the greenhouse heating energy for the seedling production. The pesticide inputs are classified according to their chemical classes and the emmssions are assigned to the soil (100%). Mercury emissions are neglected due to a lack of data while other heavy metal emissions are included. The dataset doesn't include infrastructure for production and storage facilities. No transports for agricultural means of production from the regional storage to the farm are included.

## Technology
Integrated Production

## Parameters
- fraction, irrigation water to surface water: 0.2 dimensionless; name fraction_IW_to_surface_water; lognormal variance with pedigree 0.0886, pedigree (4,3,1,1,4)
  Literature value (Doll, 2011) cross referenced with expert opinion.
- fraction, irrigation water, to air: 0.586986 dimensionless; name fraction_IW_to_air; lognormal variance with pedigree 0.0409, pedigree (2,2,2,1,1)
  Literature value (Siebert, 2010) (Vionnet, S., Quantis Water Database - Technical Report, 2012).
- fraction, irrigation water, to ground water: 0.8 dimensionless; name fraction_IW_to_ground_water; lognormal variance with pedigree 0.0886, pedigree (4,3,1,1,4)
  Literature value (Doll, 2011) cross referenced with expert opinion.

## Reference product
- cabbage white: 1 kg; source Stoessel, Franziska; 2012; By-product classification allocatable product; CPC 01212: Cabbages; HS2017 070490: Vegetables, brassica; edible, n.e.c. in heading no. 0704, fresh or chilled
  production volume 2.85123e10 kg; = 57966986000*0.5
    in kg / year (2010) including red and white cabbages and other brassicas PV is 57966986000. 50% is assumed to be white cabbage production.
  property price 0.719 EUR2005
    Calculated from the trade statistics for the year 2005 published by the UN (COMTRADE database, accessed 20151105) as an average of 5 biggest importers of cabbage in the world; UK, DE, CA, USA and JP. Comtrade cathegory: 704: Cabbage, cauliflower, kohlrabi & kale, fresh, chilled.
  properties: carbon allocation 0.00457482 kg, carbon content 0.0476544, carbon content, fossil 0, carbon content, non-fossil 0.0476544, dry mass 0.096 kg, water content 9.41667, water in wet mass 0.904 kg, wet mass 1 kg

## Inputs from technosphere
- ammonium nitrate: 0.00266889, 0.00142267, 0.00482956, 0.00185097 kg (4 suppliers, which the file names only by identifier); sum of these 0.0107721 kg; source Stoessel, Franziska; 2012; lognormal variance with pedigree 0.0425, pedigree (2,3,5,3,2)
  The exchange has been updated from 'ammonium nitrate, as N' into 'ammonium nitrate' and therefore its amount has been scaled (multiplied) from 0.0038 kg by 2.8573 kg of 'ammonium nitrate' per kg of 'ammonium nitrate, as N'.
  properties: dry mass 1 kg, wet mass 1 kg
- electricity, low voltage: 0.00139176, 0.00753073, 0.000292668, 0.000113791, 0.0079432, 0.00189329, 0.00011418, 0.000390216, 0.000155915, 0.0701066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 kWh (50 suppliers, which the file names only by identifier); sum of these 0.203 kWh; source Stoessel, Franziska; 2012; lognormal variance with pedigree 0.0425, pedigree (2,3,5,3,2)
- fertilising, by broadcaster: 0.000994 ha; source Stoessel, Franziska; 2012; lognormal variance with pedigree 0.0425, pedigree (2,3,5,3,2)
  Fertilizing by broadcaster is used as a proxy for all the machinery work done in horticultural processes.
- heat, central or small-scale, other than natural gas: 0.0716 MJ; source Stoessel, Franziska; 2012; lognormal variance with pedigree 0.0425, pedigree (2,3,5,3,2)
  properties: heating value, net 1 MJ
- inorganic phosphorus fertiliser, as P2O5: 7.9461e-6, 1.76375e-5, 0.000152594, 4.92454e-6, 1.20938e-6, 1.71255e-6, 4.27256e-6, 5.61183e-7, 2.75043e-6, 6.55765e-8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 kg (29 suppliers, which the file names only by identifier); sum of these 0.00104 kg; source Stoessel, Franziska; 2012; lognormal variance with pedigree 0.0425, pedigree (2,3,5,3,2)
  properties: dry mass 1 kg, wet mass 1 kg
- irrigation: 1.93647e-6, 3.87263e-5, 0.00236318, 2.98351e-5, 7.99938e-5, 0.000109958, 0.00852483, 1.74522e-5, 4.48847e-7, 0.0010488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 m3 (16 suppliers, which the file names only by identifier); sum of these 0.0131 m3; source Stoessel, Franziska; 2012; lognormal variance with pedigree 0.0518, pedigree (2,4,5,4,3)
  Switzerland
  properties: dry mass 0.11 kg, water content 9089.91, wet mass 1000 kg
- organophosphorus-compound, unspecified: 5.215e-5 kg; = org1+org2; source Stoessel, Franziska; 2012; lognormal variance with pedigree 0.0453, pedigree (3,4,5,3,2)
  sum of compounds in this family
  properties: carbon content, fossil 0.260898, dry mass 1 kg, wet mass 1 kg
- packaging, for fertilisers: 0.01796 kg; lognormal variance with pedigree 0.0912, pedigree (4,3,5,5,4)
  Total amount of active substance/s of fertilisers needed for the production of 'cabbage white' is calculated to be circa 8.98E-03 kg. Fertiliser/s used in this dataset is/are: 'ammonium nitrate, as N', 'phosphate fertiliser, as P2O5', 'potassium sulfate, as K2O'. The total amount of active substance/s is doubled in order to account for the packaging of the dilluted product of fertiliser/s that is/are applied. Therefore, 1.80E-02 kg of packaging for fertilisers is justified with this exchange.
  properties: carbon content, fossil 0.825301, dry mass 1 kg, heating value, net 25.01 MJ, price 0.0642 EUR2005, wet mass 1 kg
  note on carbon content, fossil: Considering a chemical formula (C2H4)n for polyethylene, carbon content-fossil is calculated to be 0.856286 kg of Carbon per kg of dry mass.
- packaging, for pesticides: 0.000250178 kg; lognormal variance with pedigree 0.0912, pedigree (4,3,5,5,4)
  Total amount of active substance/s of pesticides needed for the production of cabbage white is calculated to be circa 1.25E-04 kg. Pesticide/s used in this dataset is/are: 'organophosphorus-compound, unspecified', 'pesticide, unspecified', 'pyrethroid-compound'. The total amount of active substance/s is doubled in order to account for the packaging of the dilluted product of pesticide/s that is/are applied. Therefore, 2.50E-04 kg of packaging for pesticides is justified with this exchange.
  properties: carbon content, fossil 0.85714, dry mass 1 kg, heating value, net 25.97 MJ, price 0.0642 EUR2005, wet mass 1 kg
- pesticide, unspecified: 7.22489e-5 kg; = unsp1+unsp2+unsp3+unsp4+unsp5; source Stoessel, Franziska; 2012; lognormal variance with pedigree 0.0425, pedigree (2,3,5,3,2)
  sum of compounds in this family
  properties: carbon content, fossil 0.486978, dry mass 1 kg, wet mass 1 kg
  note on carbon content, fossil: Mean of C content in all pesticides whose formula has been documented in Sutter 2010
- potassium sulfate: 0.0013423, 0.00637205 kg (2 suppliers, which the file names only by identifier); sum of these 0.00771435 kg; source Stoessel, Franziska; 2012; lognormal variance with pedigree 0.0425, pedigree (2,3,5,3,2)
  The exchange has been updated from 'potassium sulfate, as K2O' into 'potassium sulfate' and therefore its amount has been scaled (multiplied) from 0.0042 kg by 1.85 kg of 'potassium sulfate' per kg of 'potassium sulfate, as K2O'.
  properties: dry mass 1 kg, wet mass 1 kg
- pyrethroid-compound: 6.9e-7 kg; = pyre1; source Stoessel, Franziska; 2012; lognormal variance with pedigree 0.0453, pedigree (3,4,5,3,2)
  sum of compounds in this family
  property carbon content, fossil 0.623; name C_content_fossil
  property carbon content, non-fossil 0; name C_content_non_fossil
  property dry mass 1 kg; name DM
  property water content 0; name water_content
  property water in wet mass 0 kg; name WWM
  property wet mass 1 kg; name WM

## Inputs from nature
- Energy, gross calorific value, in biomass [natural resource, biotic]: 2.98006 MJ; lognormal variance with pedigree 0.0419, pedigree (2,3,5,3,1)
  Calculated value based on literature. The gross energy is calculated using following formula; gross energy (MJ) = crude protein (kg)*23.04 (MJ/kg)+crude fat (kg)*38.96 (MJ/kg)+crude fibre (kg)*17.95 (MJ/kg)+carbohydrates (kg)*17.17 (MJ/kg) (formula based on expert opinion, cross referenced; Diepenbrock, 2012, Energy Balance in Crop Production). The product composition of fruits and vegetables is extracted from the USDA National Nutrient Database for Standard Reference (http://ndb.nal.usda.gov/, accessed 20131114). Crude protein (g)= 12.8, crude fat (g)= 1, crude fibre (g)= 25, ash (g)= 6.4, water (g)= 921.8, carbohydrates (g)= 95.8. The gross energy per kg of DM is 25.29MJ. The calculated gross energy per kg of reference product is thus 2.98MJ.
- Occupation, annual crop, irrigated, intensive [natural resource, land]: 0.0911 m2*year; source Stoessel, Franziska; 2012; lognormal variance with pedigree 0.0439, pedigree (2,3,5,3,2)
- Peat [natural resource, biotic]: 0.025 kg; source Stoessel, Franziska; 2012; lognormal variance with pedigree 0.0425, pedigree (2,3,5,3,2)
- Transformation, from annual crop, irrigated, intensive [natural resource, land]: 0.208229 m2; source Stoessel, Franziska; 2012; lognormal variance with pedigree 0.0439, pedigree (2,3,5,3,2)
- Transformation, to annual crop, irrigated, intensive [natural resource, land]: 0.208229 m2; source Stoessel, Franziska; 2012; lognormal variance with pedigree 0.0439, pedigree (2,3,5,3,2)

## Emissions to nature
- Ammonia [air, non-urban air or from high stacks]: 9.15571e-5 kg; source Thomas Nemecek 2011; lognormal variance with pedigree 0.0527, pedigree (3,4,5,3,2)
- Carbon dioxide, from soil or biomass stock [air, non-urban air or from high stacks]: 0.0136206 kg; normal variance with pedigree 0.5, pedigree (3,3,5,5,2)
  Global average LUC emissions according 2nd edition of the Quantis-modified tool developed by Blonk Consultants 'WFLDB-adapted-Blonk 2014 direct-land-use-change-assessment-tool_2015-05-18a.xlsx', tab. 'Country & land use unknown'. The emission are based on the relative change in production areas in all countries for a given crop. The weighted average is used which takes into acount relative difference in crop expansion into primary forest, secondary forest, grassland, perennial and annual land.
  Uncertainty: Uncertainty estimated based on IPCC 2006
- Dinitrogen monoxide [air, non-urban air or from high stacks]: 7.37574e-5 kg; source Thomas Nemecek 2011; lognormal variance with pedigree 0.0747, pedigree (3,4,5,3,2)
- Nitrogen oxides [air, non-urban air or from high stacks]: 1.5489e-5 kg; source Thomas Nemecek 2011; lognormal variance with pedigree 0.0747, pedigree (3,4,5,3,2)
- Water [air, unspecified]: 0.00768952 m3; name water_to_air_unspecified; = water_irrigation_input*fraction_IW_to_air; lognormal variance with pedigree 0.0807, pedigree (2,2,5,1,1)
  Calculated value based on literature values and expert opinion. See comments in the parametres' comment field.
  property fraction, origin: fresh water 1; name fraction_origin_fresh_water
  property fraction, origin: salt water 0; name fraction_origin_salt_water
  property fraction, origin: unspecified 0; name fraction_origin_unspecified
- Cadmium II [soil, agricultural]: 4.54903e-8 kg; source Thomas Nemecek 2011; lognormal variance with pedigree 0.0847, pedigree (3,4,5,3,2)
- Chromium III [soil, agricultural]: 8.36793e-8 kg; source Thomas Nemecek 2011; lognormal variance with pedigree 0.0847, pedigree (3,4,5,3,2)
- Copper ion [soil, agricultural]: 3.06989e-5 kg; name unsp5; source Stoessel, Franziska; 2012; lognormal variance with pedigree 0.0777, pedigree (3,4,5,3,2)
  emission to agricultural soil from fertilizing, erosion, leaching etc. included (according to Nemecek 2011)
- Diazinon [soil, agricultural]: 1.04e-5 kg; name org2; source Stoessel, Franziska; 2012; lognormal variance with pedigree 0.0777, pedigree (3,4,5,3,2)
- Difenoconazole [soil, agricultural]: 5.15e-6 kg; name unsp3; source Stoessel, Franziska; 2012; lognormal variance with pedigree 0.0777, pedigree (3,4,5,3,2)
- Dimethoate [soil, agricultural]: 4.175e-5 kg; name org1; source Stoessel, Franziska; 2012; lognormal variance with pedigree 0.0777, pedigree (3,4,5,3,2)
- Furathiocarb [soil, agricultural]: 8.35e-6 kg; name unsp2; source Stoessel, Franziska; 2012; lognormal variance with pedigree 0.0777, pedigree (3,4,5,3,2)
- Lambda-cyhalothrin [soil, agricultural]: 6.9e-7 kg; name pyre1; source Stoessel, Franziska; 2012; lognormal variance with pedigree 0.0777, pedigree (3,4,5,3,2)
- Lead II [soil, agricultural]: 5.24419e-7 kg; source Thomas Nemecek 2011; lognormal variance with pedigree 0.0847, pedigree (3,4,5,3,2)
- Metaldehyde [soil, agricultural]: 1.46e-5 kg; name unsp4; source Stoessel, Franziska; 2012; lognormal variance with pedigree 0.0777, pedigree (3,4,5,3,2)
- Metazachlor [soil, agricultural]: 1.345e-5 kg; name unsp1; source Stoessel, Franziska; 2012; lognormal variance with pedigree 0.0777, pedigree (3,4,5,3,2)
- Nickel II [soil, agricultural]: 1.08818e-7 kg; source Thomas Nemecek 2011; lognormal variance with pedigree 0.0847, pedigree (3,4,5,3,2)
- Zinc II [soil, agricultural]: -6.10918e-7 kg; source Thomas Nemecek 2011
- Nitrate [water, ground-]: 0.00500871 kg; source Thomas Nemecek 2011; lognormal variance with pedigree 0.0847, pedigree (3,4,5,3,2)
- Phosphate [water, ground-]: 6.38e-7 kg; source Stoessel, Franziska; 2012; lognormal variance with pedigree 0.0847, pedigree (3,4,5,3,2)
- Phosphorus [water, surface water]: 2.23e-6 kg; source Stoessel, Franziska; 2012; lognormal variance with pedigree 0.0847, pedigree (3,4,5,3,2)
- Water [water, ground-]: 0.00432839 m3; name water_to_water_ground; = water_irrigation_input*(1-fraction_IW_to_air)*fraction_IW_to_ground_water; lognormal variance with pedigree 0.1286, pedigree (4,3,5,1,4)
  Calculated value. See the parameters and their comments to understand the calculation.
  property fraction, origin: fresh water 1; name fraction_origin_fresh_water_Wgw
  property fraction, origin: salt water 0; name fraction_origin_salt_water_Wgw
  property fraction, origin: unspecified 0; name fraction_origin_unspecified_Wgw
- Water [water, surface water]: 0.0010821 m3; name water_to_water_surface; = water_irrigation_input*(1-fraction_IW_to_air)*fraction_IW_to_surface_water; lognormal variance with pedigree 0.1286, pedigree (4,3,5,1,4)
  Calculated value. See the parameters and their comments to understand the calculation.
  property fraction, origin: fresh water 1; name fraction_origin_fresh_water_Wsw
  property fraction, origin: salt water 0; name fraction_origin_salt_water_Wsw

## Sampling procedure
The LCI is based on white cabbage production cost tables from Switzerland which is well representative for an Integrated Production in Switzerland. Most probably it is representative for productions in industrialized countries or farms which produces similarly.
Please refer to Stoessel et al. (2012) for more information: http://pubs.acs.org/doi/pdf/10.1021/es2030577
Franziska Stoessel, Ronnie Juraske, Stephan Pfister, Stefanie Hellweg. (2012) Life Cycle Inventory and Carbon and Water FoodPrint of Fruits and Vegetables: Application to a Swiss Retailer. Environmental Science & Technology 6(46) 3253-3262.

## Extrapolations
CH dataset extrapolated to global production.

## Review by Bo Weidema 2011-12-31
Production volume too large (all cabagge)

## Review by Emilia Moreno Ruiz 2015-10-27
PV adjusted
