# electricity production, wind, 6kW small-scale turbine, onshore

Dataset: EcoSpold 2, unit process
Geography: DE
Time period: 2013-01-01 to 2023-12-31
Technology level: modern
Classification: ISIC rev.4 ecoinvent: 3510:Electric power generation, transmission and distribution
Tags: wind power
Scenario: Business-as-Usual
System model: Allocation, cut-off by classification
Generated by: Johannes Müller
Published in: Knausenberger, Kai 2022
Database: ecoinvent
isCopyrightProtected: true
accessRestrictedTo: 1

## General comment
This dataset represents the production of low voltage electricity at onshore grid-connected small-scale wind turbine with a capacity of 6kW and average wind speeds in the years 2008-2017 . It includes infrastructure inputs. As the design of the turbine doesn't require regular maintenance and operation efforts, such are not included. Wind load hours have been adapted to local conditions (see parameters).
Compared to wind turbines in the MW-range, small-scale wind turbines usually reach lower capicity factors, which leads to higher specific environmental impacts.
Besides effects of scale, smaller wind turbines have a more simple design to match the requirements on robustness and production costs, while components of turbines in the MW-range have been constantly optimized to reach high capacity factors.
The energy yield (and capacity factor) set as default in this dataset represents a small-scale wind turbine at a virtual average location in Germany. For locations with higher average wind speeds, higher energy yields and capacity factors are achieved.

## Included activities start
From operation of the wind power plant to low voltage electricity at the plant. The inverter that transforms the produced electricity of the turbine for use in a 230V AC-grid is included in the background data.The network connection represents the transmission of electricity from the turbine to the point of grid connection over a distance of 100m.

## Included activities end
This activity ends with the production of 1kWh of low voltage electricity produced at the power plant and delivered to the grid.

This dataset doesn"t include
- raw materials extraction, decommissioning and waste treatment as these activities are already included in infrastructure datasets
- transformation of the electricity produced in order to deliver in to the grid as this is already included in the infrastructure datasets.

## Geography
The amount of produced electricity has been calculated with average wind-speeds occuring onshore in Germany.

## Technology
Technology of a specific 6 kW small-scale wind turbine modelled with a dataset for the construction of the turbine including moving and fixed parts and another dataset for network connection.
The scaling of the predefined parameter values are based on literature values/statistics. Gross electricity production has been calculated with average wind speed in 10m height in Germany for the years 2008-2017 extracted from globalwindatlas.info (source [1]) and a yield estimator (source [2]). Specific load curve for the 6kW turbine was used (provided by the turbine manufacturer). The calculated annual energy production of appr. 3500 kWh represents a mean wind speed of 4,2 m/s (Rayleigh distribution) at the turbine height of 18m.
As the annual power output is highly dependant on the local factors of the turbines site, parameter values can be adjusted individually by taking into account local wind conditions. Scaling of the distance parameter could also be done on the project-specific parameter (distance from turbine to grid connection point).
[1] Technical University of Denmark. Global Wind Atlas 3.0, o. J. URL: https://globalwindatlas.info/en/area/germany, last checked on 11.02.2023.
[2] Fraunhofer Institut für Windenergiesysteme IWES. Small Wind Turbine Yield Estimator V3.2010, 2010. URL: https://windmonitor.iee.fraunhofer.de/img/SWT_Yield_Estimator_De.xls, last checked on 11.02.2023.

## Time period
The wind turbine from the corresponding dataset (construction of the turbine) has been produced since 2013, the development of the inventory took place in 2022.

## Parameters
- Installed capacity: 0.006 MW; name capacity_installed; lognormal variance with pedigree 0.0012, pedigree (2,1,1,1,1)
  One installed small-scale wind turbine with a capacity of 6kW.
- Wind load hours: 581.625 hour; name wind_load_hours; = ( gross_electricity*(1- losses_gross_net))/(capacity_installed*1000); lognormal variance with pedigree 0.0506, pedigree (5,3,1,1,3)
  Calculated value.
- gross electricity production: 3525 kWh; name gross_electricity; lognormal variance with pedigree 0.0018, pedigree (2,1,1,1,2)
  Literature value/statistics. Gross electricity production calculated with average wind speed in 10m height in Germany for the years 2008-2017 extracted from globalwindatlas.info (source [1]) and a yield estimator (source [2]).
  [1] Technical University of Denmark. Global Wind Atlas 3.0, o. J. URL: https://globalwindatlas.info/en/area/germany, last checked on 11.02.2023.
  [2] Fraunhofer Institut für Windenergiesysteme IWES. Small Wind Turbine Yield Estimator V3.2010, 2010. URL: https://windmonitor.iee.fraunhofer.de/img/SWT_Yield_Estimator_De.xls, last checked on 11.02.2023.
- lifetime: 20 year; name lifetime_turbine
- losses from gross electricity production: 0.01 dimensionless; name losses_gross_net; lognormal variance with pedigree 0.0113, pedigree (3,3,1,3,3)
  Estimation. The factor for the loss of electricity from gross to net electricity production is an assumption based on experiences, statistics and expertise (1% losses for wind).
  nan

## Reference product
- electricity, low voltage: 1 kWh; By-product classification allocatable product; CPC 17100: Electrical energy; HS2017 271600: Electrical energy
  production volume 3489.75 kWh; = gross_electricity* (1-losses_gross_net)
    Yearly amount of produced electricity (AEY)
  property price 0.107 EUR2005
    Temporary price data. Calculated as 90% of purchasers price based on: IEA Key world energy statistics 2004 (www.iea.org/textbase/nppdf/free/2004/keyworld2004.pdf)
  properties: carbon allocation 0 kg, carbon content 0

## Inputs from technosphere
- wind turbine network connection, small-scale, 6kW, onshore: 1.43277e-5 unit; = 1/(lifetime_turbine*(capacity_installed*1000)*wind_load_hours); lognormal variance with pedigree 0.0601, pedigree (3,4,4,3,3)
  Calculated value
  properties: lifetime 20 year, weight 120 kg
- wind turbine, small-scale, 6kW, onshore: 1.43277e-5 unit; = 1/(lifetime_turbine*(capacity_installed*1000)*wind_load_hours); lognormal variance with pedigree 0.0601, pedigree (3,4,4,3,3)
  Calculated value
  properties: lifetime 20 year, weight 22959 kg

## Inputs from nature
- Energy, kinetic (in wind), converted [natural resource, in air]: 3.87097 MJ; = 3.6/0.93
  Literature value. The kinetic energy converted (harvested) by a wind power plant equals the rotation energy of the turbine blades delivered to the gearbox. The efficiency of the blades to convert kinetic wind energy to rotation energy is not taken into account.
  Frischknecht, R., Wyss, F., Büsser Knöpfel, S., Lützkendorf, T. and Balouktsi, M., 2015. Cumulative energy demand in LCA: the energy harvested approach. The International Journal of Life Cycle Assessment, 20, pp.957-969.

## Sampling procedure
Literature, calculations

## Extrapolations
Data is specific for the electricity production of a 6kW small-scale wind turbine.
