# treatment of glass cullet, lead containing, from used cathode ray tube, 0% water, inert material landfill

Dataset: EcoSpold 2, unit process
Geography: GLO
Time period: 1995-01-01 to 2023-12-31
Technology level: current
Classification: ISIC rev.4 ecoinvent: 3821:Treatment and disposal of non-hazardous waste
Scenario: Business-as-Usual
System model: Allocation, cut-off by classification
Generated by: Tereza Levova
Published in: Doka G. 2007
Database: ecoinvent
isCopyrightProtected: true
accessRestrictedTo: 1

## General comment
This dataset represents the activity of waste disposal of 'glass cullet, lead containing, from used cathode ray tube' in an inert material landfill.

## Included activities start
The activity starts with the waste being available at the gate of the treatment facility. Collection and transportation of the waste to the treatment plant is not included.

## Included activities end
The activity ends with the waste being treated and no direct emissions from inert material landfill (leachate) are inventoried, as they are considered negligible. The dataset contains only exchanges to process-specific burdens (energy, land use) and infrastructure.

## Geography
Modelling parameters affecting the treatment technology are not specific to this geography.

## Technology
Inert material landfill with leachate collection system and renaturation after closure. 50% of the sites is equipped with a base seal.

## Reference product
- glass cullet, lead containing, from used cathode ray tube: -1 kg; By-product classification Waste; CPC 37111: Glass in the mass, in balls (except microspheres), rods or tubes, unworked; waste and scrap of glass; HS2017 700100: Glass; cullet and other waste and scrap of glass, glass in the mass
  production volume 5.2677e10 kg
    Calculated based on literature value. Based on knowledge of the production volumes of cathode ray tube displays.
  property carbon content, fossil 0
    ecoinvent v2.2 report 18_V for recycling flows. For glass composition: ecoinvent v2.2 report 18_III-part5. Glass final composition was taken from Yamashita M. et al., Leaching behavior of CRT funnel glass, Journal of Hazardous Materials, 184 (2010) 58–64.
  property dry mass 1 kg; name DM
  property price 0 EUR2005
    Waste products are assigned a price of zero as they are assumed to require further treatment.
  property wet mass 1 kg; name WM
  properties: carbon allocation 0 kg, carbon content 0, carbon content, non-fossil 0, water content 0, water in wet mass 0 kg

## Inputs from technosphere
- inert material landfill: 1.48e-9 unit; lognormal variance with pedigree 0.042, pedigree (1,1,5,5,1)
  landfill infrastructure per kg waste, uncerteinty heeded in module.
- process-specific burdens, inert material landfill: 0.00841689, 0.991583 kg (2 suppliers, which the file names only by identifier); sum of these 1 kg; lognormal variance with pedigree 0.042, pedigree (1,1,5,5,1)
  process-specific burdens per kg waste, uncerteinty heeded in module.

## Extrapolations
This is a proxy dataset based on treatment of waste glass, final disposal to inert material landfill.

## Review by Bo Weidema 2012-05-04
Passed
