# aluminium oxide, non-metallurgical to generic market for refractory material, acid

Dataset: EcoSpold 2, unit process
Geography: IAI Area, EU27 & EFTA
Time period: 2019-01-01 to 2023-12-31
Technology level: current
Classification: ISIC rev.4 ecoinvent: 2391:Manufacture of refractory products
Scenario: Business-as-Usual
System model: Allocation, cut-off by classification
Generated by: Lucia Valsasina
Database: ecoinvent
isCopyrightProtected: true
accessRestrictedTo: 1

## General comment
This activity links aluminium oxide, non-metallurgical to the generic market for refractory material, acid.
[This dataset is meant to replace the following datasets:]

## Included activities start
The activity starts with the input of aluminium oxide, non-metallurgical.

## Included activities end
With the provision of a generic kg of refractory material, acid.

## Reference product
- refractory material, acid: 1 kg; By-product classification allocatable product; CPC 373: Refractory products and structural non-refractory clay products; HS2017 690320: Refractory ceramic goods; containing by weight more than 50% of alumina or of a mixture or compound of alum[...]
  production volume 4.037e8 kg; = 1345666667*0.3
    The EU27 & EFTA production of aluminium oxide, non-metallurgical is 1.3E+09 kg (European Aluminium). It is estimated that 30% of this material is used in the refractory industry (Flook, R. 2015. Bauxite & alumina 2015 -
    Non-metallurgical market review. Retrived from: https://www.metalbulletin.com/events/download.ashx/document/speaker/8449/a0ID000000X0j5LMAR/Presentation, accessed 11 Feb 2019).
  property price 0.693 EUR2005
    UN import prices. From UN trade database. Category: 'Refractory bricks etc >50% alumina or silica'.
  properties: carbon allocation 0 kg, carbon content 0, carbon content, fossil 0, carbon content, non-fossil 0, dry mass 1 kg, water content 0, water in wet mass 0 kg, wet mass 1 kg

## Inputs from technosphere
- aluminium oxide, non-metallurgical: 1 kg; lognormal variance with pedigree 0.2106, pedigree (5,5,5,5,5)
  This activity links aluminium oxide, non-metallurgical to the generic market for refractory material, acid.
  properties: dry mass 1 kg, wet mass 1 kg
