# cement tile production

Dataset: EcoSpold 2, unit process
Geography: RoW
Time period: 2004-01-01 to 2023-12-31
Technology level: current
Classification: EcoSpold01Categories: construction materials/others
Classification: ISIC rev.4 ecoinvent: 2395:Manufacture of articles of concrete, cement and plaster
Tags: ConvertedDataset
Scenario: Business-as-Usual
System model: Allocation, cut-off by classification
Generated by: Daniel Kellenberger (obsolete)
Published in: Kellenberger D. 2007
Database: ecoinvent
isCopyrightProtected: true
accessRestrictedTo: 1

## General comment
No losses and no waste water are taken into account.
[This dataset was already contained in the ecoinvent database version 2. It was not individually updated during the transfer to ecoinvent version 3. Life Cycle Impact Assessment results may still have changed, as they are affected by changes in the supply chain, i.e. in other datasets. This dataset was generated following the ecoinvent quality guidelines for version 2. It may have been subject to central changes described in the ecoinvent version 3 change report (http://www.ecoinvent.org/database/ecoinvent-version-3/reports-of-changes/), and the results of the central updates were reviewed extensively. The changes added e.g. consistent water flows and other information throughout the database. The documentation of this dataset can be found in the ecoinvent reports of version 2, which are still available via the ecoinvent website. The change report linked above covers all central changes that were made during the conversion process.]

## Included activities end
includes the raw material normal concrete which is poured into a mould, air-dryed and packed. Some transports and infrastructure are also included.

## Geography
For some exchanges CH-, RER-, and GLO-datasets are used as proxy

## Technology
typical technology for Swiss production

## Parameters
- fraction, process water, to air: 0.15 dimensionless; name fraction_PW_to_air; lognormal variance with pedigree 0.092025, pedigree (4,4,3,2,4)
  Literature value. In case when no industry/process specific data are available, default evaporation fraction value is used. This value is 15% and is based on literature (Statistics Canada, 2007 & Shaffer, K.H., 2008, Consumptive water use in the Great Lakes Basin, USGS & Shiklomanov, 2003, World Water Resources at the Beginning of the 21st Century) and has been approved by an expert.
- fraction, tap water, to air: 0.15 dimensionless; name fraction_TW_to_air; = fraction_PW_to_air; lognormal variance with pedigree 0.092025, pedigree (4,4,3,2,4)
  Calculated value. See comment in the other parametres present in this dataset. Tap water is considered to be always used as process water, thus process water fractions to air are applied to all tap water input flows to calculate the amount of water consumed in the processes.

## Reference product
- cement tile: 1 kg; name RP_amount_1; By-product classification allocatable product; CPC 37540: Tiles, flagstones, bricks and similar articles, of cement, concrete or artificial stone; HS2017 681019: Cement, concrete or artificial stone; tiles, flagstones and similar, (excluding building blocks and bricks)[...]
  EcoSpold01Location=CH
  production volume 3.96633 kg; name RP_PV_1
    This is a placeholder value that does not reflect real-world production volumes. This dataset does not currently require a real-world production volume to work in the database framework, and no actual data were collected yet. This has no negative effect on the results of the ecoinvent database.
  property carbon content, fossil 0
    Made from normal concrete. Tab 6.9, ecoinvent v2.2 report 7, part III
  property carbon content, non-fossil 0
    Made from normal concrete. Tab 6.9, ecoinvent v2.2 report 7, part III
  properties: carbon allocation 0 kg, carbon content 0, dry mass 1 kg, price 1.8 EUR2005, water content 0, water in wet mass 0 kg, wet mass 1 kg

## Inputs from technosphere
- cement, Portland: 0.217501, 0.00824212, 0.010996, 0.0120545, 0.000499101, 0.000455042, 0.000443498, 0.000565668, 0.000294483 kg (9 suppliers, which the file names only by identifier); sum of these 0.251051 kg; = (0.00042017*300)+0.125; lognormal variance with pedigree 0.692, pedigree (1,1,5,5,1)
  EcoSpold01Location=CH
  Calculated value. 0.00042017 m3 is the amount of concrete, normal needed for production of 1 kg of cement tile.
  properties: dry mass 1 kg, wet mass 1 kg
- clay pit infrastructure: 1.6667e-10 unit; lognormal variance with pedigree 0.692, pedigree (1,1,5,5,1)
  estimation
  EcoSpold01Location=CH
- concrete mixing factory: 1.92018e-10 unit; = 0.00042017*4.57E-07; lognormal variance with pedigree 0.3626, pedigree (2,1,5,5,1)
  Calculated value. 0.00042017 m3 is the amount of concrete, normal needed for production of 1 kg of cement tile.
- diesel, burned in building machine: 0.0311089 MJ; = 0.021571+(0.00042017*22.7); lognormal variance with pedigree 0.072, pedigree (3,5,5,5,1)
  Calculated value. 0.00042017 m3 is the amount of concrete, normal needed for production of 1 kg of cement tile.
  EcoSpold01Location=GLO
  properties: heating value, net 1 MJ
- electricity, medium voltage: 0.00010704, 0.0021352, 0.000717422, 3.27792e-5, 6.56073e-6, 1.40874e-6, 0.000149095, 0.000220493, 0.00046194 kWh (9 suppliers, which the file names only by identifier); sum of these 0.00383194 kWh; = 0.002+(0.00042017*4.36); lognormal variance with pedigree 0.692, pedigree (1,1,5,5,1)
  (same comment as for cement, Portland)
- gravel, round: 0.669121 kg; = (0.00042017*1890)-0.125; lognormal variance with pedigree 0.0601, pedigree (4,2,5,5,1)
  (same comment as for cement, Portland)
  properties: dry mass 1 kg, wet mass 1 kg
- heat, district or industrial, natural gas: 5.20176e-6, 0.000316552, 0.000116904 MJ (3 suppliers, which the file names only by identifier); sum of these 0.000438657 MJ; = 0.00042017*1.044; lognormal variance with pedigree 0.0526, pedigree (2,1,5,5,1)
  (same comment as for concrete mixing factory)
  properties: heating value, net 1 MJ
- heat, district or industrial, other than natural gas: 0.00637682, 2.95426e-6, 0.000162271 MJ (3 suppliers, which the file names only by identifier); sum of these 0.00654205 MJ; = 0.00042017*15.57; lognormal variance with pedigree 0.0526, pedigree (2,1,5,5,1)
  (same comment as for concrete mixing factory)
  properties: heating value, net 1 MJ
- lubricating oil: 5.00002e-6 kg; = 0.00042017*0.0119; lognormal variance with pedigree 0.0526, pedigree (2,1,5,5,1)
  (same comment as for concrete mixing factory)
  properties: carbon content, fossil 0.75, dry mass 1 kg, heating value, net 40.2 MJ, wet mass 1 kg
  note on carbon content, fossil: Lubricating oil is produced from diesel. C-content/dry mass of fats and oils considered 75%, from: ecoinvent v2.2 report, n 15a, pg 40
  note on heating value, net: Literature value, Source: IPCC 2006, 2006 IPCC Guidelines for National Greenhouse Gas Inventories, Prepared by the National Greenhouse Gas Inventories Programme, Eggleston H.S., Buendia L., Miwa K., Ngara T. and Tanabe K. (eds). Published: IGES, Japan
- municipal solid waste: -6.78986e-8, -8.06266e-9, -5.12278e-8, -5.018e-8, -3.83083e-5, -1.29052e-6, -5.64193e-9, -1.81096e-9, -4.09326e-9, -1.70404e-7 kg (10 suppliers, which the file names only by identifier); sum of these -3.99582e-5 kg; = 0.00042017*0.0951; lognormal variance with pedigree 0.0126, pedigree (2,1,1,5,1)
  (same comment as for concrete mixing factory)
  production volume; = RP_PV_1 * (BP_amount_1 / RP_amount_1)
    Calculated from production volume of reference product using the relative outputs.
  properties: carbon content, fossil 0.171549, carbon content, non-fossil 0.261655, dry mass 0.771 kg, heating value, net 11.74 MJ, water content 0.297017, wet mass 1 kg
  note on carbon content, fossil: MSW composition in tab 4.1, ecoinvent v2.2 report 13_I. C content referred to 1 kg DM
  note on heating value, net: Value taken from the general comment of the treatment dataset.
- packing, clay product: 1 kg; lognormal variance with pedigree 0.692, pedigree (1,1,5,5,1)
  estimation
  EcoSpold01Location=CH
- steel, low-alloyed, hot rolled: 1e-5 kg; = 0.00042017*0.0238; lognormal variance with pedigree 0.0526, pedigree (2,1,5,5,1)
  (same comment as for concrete mixing factory)
  properties: carbon content, fossil 0.005, dry mass 1 kg, wet mass 1 kg
  note on carbon content, fossil: Low alloyed steel composition given in Tab. 3.2 ecoinvent v2.2 report 10_partII. Steel assumed to have a C content of 0.5%
- synthetic rubber: 2.99581e-6 kg; = 0.00042017*0.00713; lognormal variance with pedigree 0.0526, pedigree (2,1,5,5,1)
  (same comment as for concrete mixing factory)
  properties: carbon content, fossil 0.871949, dry mass 1 kg, heating value, net 26.42 MJ, wet mass 1 kg
  note on carbon content, fossil: EPDM (Ethylene-propene-diene terpolymer) rubber is a terpolymer of ethylene, propene, and a diene with the residual unsaturated portion of the diene in the side chain (ecoinvent v2.2 report 7-part XX & Ullmann). Chemical formula (deduced from Evidences of Solvent-Induced Miscibility in Polychloroprene-co-Ethylene-Propene Diene Terpolymer Blends, Dubey et al., Journal of Applied Polymer Science, 2009, 111:1884–1891): C20H35
- tap water: 0.00012206, 0.00018607, 0.000347197, 0.000935322, 0.000112588, 0.00469194, 0.0536923, 0.0400097 kg (8 suppliers, which the file names only by identifier); sum of these 0.100097 kg; = 0.00042017*238.23; lognormal variance with pedigree 0.0546, pedigree (3,3,5,5,1)
  (same comment as for concrete mixing factory)
  properties: carbon content, fossil 0.00178991, dry mass 0.000337476 kg, water content 2962.17, wet mass 1 kg
  note on carbon content, fossil: Bicarbonate content is 2.93 mol/m3. CO2 content is 0.1 mol/m3 (ecoinvent v2.2 report 8, Tab 93.1).
- waste concrete: -0.000485302, -0.00661557 kg (2 suppliers, which the file names only by identifier); sum of these -0.00710087 kg; = 0.00042017*16.9; lognormal variance with pedigree 0.0126, pedigree (2,1,1,5,1)
  (same comment as for concrete mixing factory)
  production volume; = RP_PV_1 * (BP_amount_2 / RP_amount_1)
    Calculated from production volume of reference product using the relative outputs.
  properties: dry mass 0.5 kg, water content 1, wet mass 1 kg
- wastewater from concrete production: -6.00843e-6 m3; name wastewater_output; = 0.00042017*0.0143; lognormal variance with pedigree 0.0126, pedigree (2,1,1,5,1)
  (same comment as for concrete mixing factory)
  production volume; = RP_PV_1 * (wastewater_output / RP_amount_1)
    Calculated from production volume of reference product using the relative outputs.
  properties: carbon content, fossil 0.027074, dry mass 0.449139 kg, water content 2225.48, wet mass 1000 kg

## Emissions to nature
- Water [air, unspecified]: 1.50146e-5 m3; name water_to_air_unspecified; = (tap_water_input/1000*fraction_TW_to_air); lognormal variance with pedigree 0.0827, pedigree (2,2,5,5,1)
  Calculated value based on literature values and expert opinion. See comments in the parametres' comment field.
  property fraction, origin: fresh water 1; name fraction_origin_fresh_water
  property fraction, origin: salt water 0; name fraction_origin_salt_water
  property fraction, origin: unspecified 0; name fraction_origin_unspecified
- Water [water, unspecified]: 7.90741e-5 m3; name water_to_water_unspecified; = (tap_water_input/1000)*(1-fraction_TW_to_air)-wastewater_output; lognormal variance with pedigree 0.0827, pedigree (2,2,5,5,1)
  (same comment as for Water)
  property fraction, origin: fresh water 1; name fraction_origin_fresh_water_Ww
  property fraction, origin: salt water 0; name fraction_origin_salt_water_Ww
  property fraction, origin: unspecified 0; name fraction_origin_unspecified_Ww

## Sampling procedure
Literature

## Extrapolations
See geography This dataset has been copied from an original dataset covering the geography CH. The uncertainty has been adjusted accordingly.

## Review by Rolf Frischknecht 2007-09-13
passed
