# coal stove production, 5-15kW

Dataset: EcoSpold 2, unit process
Geography: RER
Time period: 1988-01-01 to 2023-12-31
Technology level: current
Classification: EcoSpold01Categories: hard coal/heating systems
Classification: ISIC rev.4 ecoinvent: 2815:Manufacture of ovens, furnaces and furnace burners
Tags: ConvertedDataset
Scenario: Business-as-Usual
System model: Allocation, cut-off by classification
Generated by: Christian Bauer
Published in: Röder, A. 2007
Database: ecoinvent
isCopyrightProtected: true
accessRestrictedTo: 1

## General comment
This dataset represents the individual components of a 5-15 kW coal stove.
[This dataset was already contained in the ecoinvent database version 2. It was not individually updated during the transfer to ecoinvent version 3. Life Cycle Impact Assessment results may still have changed, as they are affected by changes in the supply chain, i.e. in other datasets. This dataset was generated following the ecoinvent quality guidelines for version 2. It may have been subject to central changes described in the ecoinvent version 3 change report (http://www.ecoinvent.org/database/ecoinvent-version-3/reports-of-changes/), and the results of the central updates were reviewed extensively. The changes added e.g. consistent water flows and other information throughout the database. The documentation of this dataset can be found in the ecoinvent reports of version 2, which are still available via the ecoinvent website. The change report linked above covers all central changes that were made during the conversion process.]

## Included activities start
From unoccupied land forseen for the construction of a coal stove.

## Included activities end
This activity ends with a constructed coal stove, having a lifetime of 30 years which corresponds to 1'600 load hours per year (chimney 80 years). The dataset includes apart the materials necessary for the coal stove also the construction efforts, land use as well as the disposal of all materials.

## Technology
Average coal stove installed in the early 1990s.

## Reference product
- coal stove, 5-15kW: 1 unit; name RP_amount_1; By-product classification allocatable product; CPC 43410: Furnace burners for liquid fuel, for pulverized solid fuel or for gas; mechanical stokers, mechanical grates, […]; HS2017 7321: Stoves, ranges, grates, cookers (those with subsidiary boilers for central heating), barbecues, braziers, gas[...]
  EcoSpold01Location=RER
  production volume 1.32237 unit; name RP_PV_1
    This is a placeholder value that does not reflect real-world production volumes. This dataset does not currently require a real-world production volume to work in the database framework, and no actual data were collected yet. This has no negative effect on the results of the ecoinvent database. The placeholder value of this activity was scaled according to the nominal GDP of 2005 (source: United Nations, http://data.un.org/Glossary.aspx?q=GDP+%28current+US%24%29, accessed 20130726) to reflect an appropriate share of the global production volume, which is also a placeholder value.
  property price 272.942 EUR2005
    Calculated based on inputs: The price of the product has been calculated as a sum of the values of the material and energy inputs for this product. This value is therefore a rough estimation. It may underestimate the real price since there are additional expenses when producing any product. These expences can include for example labour costs, treatment of waste materials and profit for the producer. Please consider carefully whether this level of data quality is acceptable for your application.
  properties: carbon allocation 0 kg, carbon content 0

## Inputs from technosphere
- cast iron: 138 kg; source Fritsche U. 1989; lognormal variance with pedigree 0.25, pedigree (1,1,5,1,1)
  Estimation. Used material for the construction of the stove.
  Further references:
  Jensch W. (1988) Vergleich von Energiesystemen unterschiedlicher Zentralisierung. IfE-Schriftenreihe Heft 22, München.
  Plewnia M., Schmitz J., Huber W. (1983) Vergleich ausgewählter Heizungssysteme unter energetischen, ökonomischen und ökologischen Gesichtspunkten. Projekt Stand und Entwicklungstendenzen der Raumwärmeversorgung der Haushalte. Jül-Spez-234/Bd.3, Jülich.
  EcoSpold01Location=RER
  properties: carbon content, fossil 0.04, dry mass 1 kg, wet mass 1 kg
  note on carbon content, fossil: Cast iron is made by remelting pig iron in small furnaces (e.g. cupola furnaces or electric arc furnaces) and poured into moulds to make castings. It usually contains 2% to 6% carbon (ecoinvent v2.2 report 10_partII). An average content of 4% was considered
- concrete, normal strength: 0.0467889, 0.0257111 m3 (2 suppliers, which the file names only by identifier); sum of these 0.0725 m3; source Fritsche U. 1989; lognormal variance with pedigree 0.25, pedigree (1,1,5,1,1)
  Estimation. Used material for the construction of the stove. Additionally a chimney is necessary. Therefore a five-storied apartment with five stoves is assumed and 486 kg of concrete and 1.8 kg of mineral wool are needed. The chimney will be depreciated over 80 years.
  Further references:
  Jensch W. (1988) Vergleich von Energiesystemen unterschiedlicher Zentralisierung. IfE-Schriftenreihe Heft 22, München.
  Plewnia M., Schmitz J., Huber W. (1983) Vergleich ausgewählter Heizungssysteme unter energetischen, ökonomischen und ökologischen Gesichtspunkten. Projekt Stand und Entwicklungstendenzen der Raumwärmeversorgung der Haushalte. Jül-Spez-234/Bd.3, Jülich.
  EcoSpold01Location=CH
  properties: dry mass 2190 kg, water content 0.086758, wet mass 2380 kg
- diesel, burned in building machine: 864 MJ; source Jensch W. 1988; lognormal variance with pedigree 0.16, pedigree (1,1,5,1,1)
  Estimation. It is assumed that 50% of the energy needed to produce the basic materials is spent additionally for processing and construction (Jensch 1988), of which 10% are electric, 45% diesel for construction machines and 45% process heat from oil combustion (>100 kW).
  EcoSpold01Location=GLO
  properties: heating value, net 1 MJ
- electricity, medium voltage: 48 kWh; source Jensch W. 1988; lognormal variance with pedigree 0.16, pedigree (1,1,5,1,1)
  Estimation. It is assumed that 50% of the energy needed to produce the basic materials is spent additionally for processing and construction (Jensch 1988), of which 10% are electric, 45% diesel for construction machines and 45% process heat from oil combustion (>100 kW).
  EcoSpold01Location=UCTE
- heat, district or industrial, other than natural gas: 864 MJ; source Jensch W. 1988; lognormal variance with pedigree 0.16, pedigree (1,1,5,1,1)
  EcoSpold01Location=RER
  Estimation. It is assumed that 50% of the energy needed to produce the basic materials is spent additionally for processing and construction (Jensch 1988), of which 10% are electric, 45% diesel for construction machines and 45% process heat from oil combustion (>100 kW).
  properties: heating value, net 1 MJ
- reinforcing steel: 138 kg; source Fritsche U. 1989; lognormal variance with pedigree 0.25, pedigree (1,1,5,1,1)
  (same comment as for cast iron)
  properties: carbon content, fossil 0.004, dry mass 1 kg, wet mass 1 kg
- steel, low-alloyed, hot rolled: 17.3 kg; source Fritsche U. 1989; lognormal variance with pedigree 0.25, pedigree (1,1,5,1,1)
  EcoSpold01Location=RER
  Estimation. Used material for the construction of the stove.
  Further references:
  Jensch W. (1988) Vergleich von Energiesystemen unterschiedlicher Zentralisierung. IfE-Schriftenreihe Heft 22, München.
  Plewnia M., Schmitz J., Huber W. (1983) Vergleich ausgewählter Heizungssysteme unter energetischen, ökonomischen und ökologischen Gesichtspunkten. Projekt Stand und Entwicklungstendenzen der Raumwärmeversorgung der Haushalte. Jül-Spez-234/Bd.3, Jülich.
  properties: carbon content, fossil 0.005, dry mass 1 kg, wet mass 1 kg
  note on carbon content, fossil: Low alloyed steel composition given in Tab. 3.2 ecoinvent v2.2 report 10_partII. Steel assumed to have a C content of 0.5%
- stone wool: 0.69 kg; source Fritsche U. 1989; lognormal variance with pedigree 0.25, pedigree (1,1,5,1,1)
  EcoSpold01Location=CH
  Estimation. Used material for the construction of the stove. Additionally a chimney is necessary. Therefore a five-storied apartment with five stoves is assumed and 486 kg of concrete and 1.8 kg of mineral wool are needed. The chimney will be depreciated over 80 years.
  Further references:
  Jensch W. (1988) Vergleich von Energiesystemen unterschiedlicher Zentralisierung. IfE-Schriftenreihe Heft 22, München.
  Plewnia M., Schmitz J., Huber W. (1983) Vergleich ausgewählter Heizungssysteme unter energetischen, ökonomischen und ökologischen Gesichtspunkten. Projekt Stand und Entwicklungstendenzen der Raumwärmeversorgung der Haushalte. Jül-Spez-234/Bd.3, Jülich.
  properties: carbon content, fossil 0.015401, dry mass 1 kg, wet mass 1 kg
  note on carbon content, fossil: The chemical composition of the glass fibres used in the rock wool production is similar to the composition of naturally cooled volcano basalt and has a composition listed in Tab. 3.1 and 3.2 in ecoinvent v2.2 report 16, part XIV. Rock wool contains: a minimum of 96% mineral fibres,between 0.5 and 3.0 weight percent of phenolic resin depending on the specific product characteristics, and about 0.2 percent mineral oil (ecoinvent v2.2 report 16, part XIV). An average composition of 1.8% phenolic resin, 0.2% mineral oil, and 98% mineral fibres has been assumed and used to calculate C content of the rock wool
- waste concrete: -484.288, -1.71225 kg (2 suppliers, which the file names only by identifier); sum of these -486 kg
  Estimation. It is assumed that the amount of concrete used for the chimney is disposed in an inert material landfill.
  production volume; = RP_PV_1 * (BP_amount_1 / RP_amount_1)
    Calculated from production volume of reference product using the relative outputs.
  properties: dry mass 0.5 kg, water content 1, wet mass 1 kg
- waste mineral wool: -0.00778459, -0.682215 kg (2 suppliers, which the file names only by identifier); sum of these -0.69 kg; lognormal variance with pedigree 0.21, pedigree (1,1,1,1,1)
  EcoSpold01Location=CH
  Estimation. It is assumed that 100% of that material is disposed in an inert material landfill.
  production volume
    Calculated from the production volume of coal stove, 5-15 kW in proportion to the respective output amounts.
  properties: dry mass 1 kg, wet mass 1 kg

## Inputs from nature
- Occupation, industrial area [natural resource, land]: 346 m2*year; source Fritsche U. 1989; lognormal variance with pedigree 0.16, pedigree (1,1,5,1,1)
  Estimation. The largest area is needed for the storage of the coal. The area for the plant and the chimney is rather low. The theoretically different storage volumes due to different calorific values are not considered. The construction and demolition time is neglected. A rehabilitation period is omitted as it is expected that the area is reused as built-up area.
  Further references:
  Jensch W. (1988) Vergleich von Energiesystemen unterschiedlicher Zentralisierung. IfE-Schriftenreihe Heft 22, München.
- Transformation, from unspecified [natural resource, land]: 11.5 m2; source Fritsche U. 1989; lognormal variance with pedigree 0.16, pedigree (1,1,5,1,1)
  (same comment as for Occupation, industrial area)
- Transformation, to industrial area [natural resource, land]: 11.5 m2; source Fritsche U. 1989; lognormal variance with pedigree 0.16, pedigree (1,1,5,1,1)
  (same comment as for Occupation, industrial area)

## Sampling procedure
Based on literature data.

## Review by Hans-Jörg Althaus 2003-07-04
passed

## Review by Roland Hischier 2011-11-22
Transfer of documentation done.
