# inverter production, 500kW

Dataset: EcoSpold 2, unit process
Geography: RoW
Time period: 2004-01-01 to 2023-12-31
Technology level: current
Classification: ISIC rev.4 ecoinvent: 2790:Manufacture of other electrical equipment
Classification: EcoSpold01Categories: photovoltaic/production of components
Synonyms: inverse rectifier
Tags: ConvertedDataset
Scenario: Business-as-Usual
System model: Allocation, cut-off by classification
Generated by: Matthias Tuchschmid (obsolete)
Published in: Jungbluth, N. 2007
Database: ecoinvent
isCopyrightProtected: true
accessRestrictedTo: 1

## General comment
Production of an inverter (500kW) with an efficiency of 95.4% (total efficiency factor which includes MPP-Tracking) for photovoltaic plant. Total weight about 3000 kg.
[This dataset was already contained in the ecoinvent database version 2. It was not individually updated during the transfer to ecoinvent version 3. Life Cycle Impact Assessment results may still have changed, as they are affected by changes in the supply chain, i.e. in other datasets. This dataset was generated following the ecoinvent quality guidelines for version 2. It may have been subject to central changes described in the ecoinvent version 3 change report (http://www.ecoinvent.org/database/ecoinvent-version-3/reports-of-changes/), and the results of the central updates were reviewed extensively. The changes added e.g. consistent water flows and other information throughout the database. The documentation of this dataset can be found in the ecoinvent reports of version 2, which are still available via the ecoinvent website. The change report linked above covers all central changes that were made during the conversion process.]

## Included activities end
Materials, packaging and electricity use for the production of an inverse rectifier. Disposal of the product after use.

## Geography
Production in RER.

## Technology
Inverter for a photovoltaic grid-connected system with a capacity of 500kWp.

## Reference product
- inverter, 500kW: 1 unit; By-product classification allocatable product; CPC 46220: Parts of electricity distribution or control apparatus; HS2017 853720: Boards, panels, consoles, desks and other bases; for electric control or the distribution of electricity, ([...]
  EcoSpold01Location=RER
  production volume 2.67763 unit
    This is a placeholder value that does not reflect real-world production volumes. This dataset does not currently require a real-world production volume to work in the database framework, and no actual data were collected yet. This has no negative effect on the results of the ecoinvent database.
  property price 12060 EUR2005
    EU27 I/O database-68 Electronic machinery (4.02 EURO2003/kg dry soilds) in the 'EU & DK Input Output Database' Weight of the inverter is 3000kg.
  properties: carbon allocation 0 kg, carbon content 0

## Inputs from technosphere
- alkyd paint, white, without solvent, in 60% solution state: 22 kg; lognormal variance with pedigree 0.2706, pedigree (4,3,5,5,5)
  EcoSpold01Location=RER
  Literature (de Wild 2006), Calculation
  Uncertainty: Literature (de Wild 2006), Calculation
  properties: carbon content, fossil 0.140367, carbon content, non-fossil 0.199629, dry mass 1 kg, heating value, net 10.3 MJ, wet mass 1 kg
  note on carbon content, fossil: C content was calculated as an addition of C content in the raw materials.
- aluminium, cast alloy: 131 kg; lognormal variance with pedigree 0.0706, pedigree (4,3,5,5,1)
  EcoSpold01Location=RER
  Literature (de Wild 2006), recycled after use, Calculation
  Uncertainty: Literature (de Wild 2006), recycled after use, Calculation
  properties: dry mass 1 kg, wet mass 1 kg
- capacitor, electrolyte type, > 2cm height: 0.256 kg; lognormal variance with pedigree 0.0706, pedigree (4,3,5,5,1)
  EcoSpold01Location=GLO
  Literature (de Wild 2006), Calculation
  Uncertainty: Literature (de Wild 2006), Calculation
  properties: carbon content, fossil 0.16971, carbon content, non-fossil 0.0349727, dry mass 1 kg, wet mass 1 kg
  note on carbon content, fossil: Calculated as the addition of C contents in the product composition, and referred to 1 kg capacitors, and then to 1 kg DM
- capacitor, film type, for through-hole mounting: 0.341 kg; lognormal variance with pedigree 0.0706, pedigree (4,3,5,5,1)
  Literature (de Wild 2006), Calculation
  EcoSpold01Location=GLO
  Uncertainty: Literature (de Wild 2006), Calculation
  properties: carbon content, fossil 0.278876, dry mass 1 kg, wet mass 1 kg
- capacitor, tantalum-, for through-hole mounting: 0.023 kg; lognormal variance with pedigree 0.0706, pedigree (4,3,5,5,1)
  (same comment as for capacitor, film type, for through-hole mounting)
  properties: carbon content, fossil 0.181224, dry mass 1 kg, wet mass 1 kg
- copper, cathode: 335 kg; lognormal variance with pedigree 0.0706, pedigree (4,3,5,5,1)
  Literature (de Wild 2006), recycled after use, Calculation
  EcoSpold01Location=RER
  Uncertainty: Literature (de Wild 2006), recycled after use, Calculation
  properties: dry mass 1 kg, wet mass 1 kg
- corrugated board box: 4.22404, 0.157346, 9.21862 kg (3 suppliers, which the file names only by identifier); sum of these 13.6 kg; lognormal variance with pedigree 0.072, pedigree (4,4,5,5,1)
  EcoSpold01Location=RER
  Calculation, based on estimated dimension of inverse rectifier
  Uncertainty: Calculation, based on estimated dimension of inverse rectifier
  properties: carbon content, fossil 0.000656085, carbon content, non-fossil 0.432275, dry mass 0.945 kg, heating value, net 12.86 MJ, water content 0.0582011, wet mass 1 kg
  note on carbon content, fossil: Fossil C content was calculated after fossil C contents of chemicals used in the production of board (Tab 10-15 & 10.16 ecoinvent v2.2 report 11_III, part 10)
  note on carbon content, non-fossil: Biogenic C content was calculated after biogenic C contents of chemicals used in the production of board (Tab 10.15 & 10.16, ecoinvent v2.2 report 11_III, part 10).
- diode, glass-, for through-hole mounting: 0.047 kg; lognormal variance with pedigree 0.0706, pedigree (4,3,5,5,1)
  (same comment as for capacitor, film type, for through-hole mounting)
  properties: carbon content, fossil 0.0203273, dry mass 1 kg, wet mass 1 kg
  note on carbon content, fossil: Calculated as the addition of C contents in the product composition
- electric connector, wire clamp: 47.4 kg; lognormal variance with pedigree 0.0706, pedigree (4,3,5,5,1)
  (same comment as for capacitor, film type, for through-hole mounting)
  properties: carbon content, fossil 0.19653, dry mass 1 kg, wet mass 1 kg
- electricity, medium voltage: 152.133, 3034.72, 1019.66, 46.5884, 9.32461, 2.0022, 313.381 kWh (7 suppliers, which the file names only by identifier); sum of these 4577.8 kWh; lognormal variance with pedigree 0.0706, pedigree (4,3,5,5,1)
  Literature (Schwarz 1992)
  EcoSpold01Location=UCTE
  Uncertainty: Literature (Schwarz 1992)
- fleece, polyethylene: 0.3 kg; lognormal variance with pedigree 0.0706, pedigree (4,3,5,5,1)
  Literature (Schwarz 1992)
  EcoSpold01Location=RER
  Uncertainty: Literature (Schwarz 1992)
  properties: carbon content, fossil 0.857143, dry mass 1 kg, heating value, net 42.47 MJ, wet mass 1 kg
  note on carbon content, fossil: Polyethylene is formed out of a huge amount of ethylene monomers (C2H4) (ecoinvent v2.2 report 11_II). MW=28 g/mol
- glass fibre reinforced plastic, polyamide, injection moulded: 71 kg; lognormal variance with pedigree 0.0706, pedigree (4,3,5,5,1)
  Literature (de Wild 2006), Calculation
  EcoSpold01Location=RER
  Uncertainty: Literature (de Wild 2006), Calculation
  properties: carbon content, fossil 0.446018, dry mass 1 kg, wet mass 1 kg
  note on carbon content, fossil: Polyamide resin assimilate to Nylon 66 (ecoinvent v2.2 report 7_XIII). Nylon 66 is derived from hexamethylene diamine and adipic acid and has the following structure: -(HN-(CH2)6-NH-CO-(CH2)4-CO)n- (ecoinvent v2.2 report 11_II), C12H22N2O2. MW=226 g/mol. Here Nylon 66 is – mainly for improved stiffness and stability – modified with glass fibres. The glass fibre content in the product is assumed of 30%. (ecoinvent v2.2 report 11_II)
- glass fibre reinforced plastic, polyester resin, hand lay-up: 44 kg; lognormal variance with pedigree 0.0706, pedigree (4,3,5,5,1)
  (same comment as for alkyd paint, white, without solvent, in 60% solution state)
  properties: carbon content, fossil 0.246639, dry mass 1 kg, wet mass 1 kg
  note on carbon content, fossil: C content was calculated as an addition of C content in the product components (60% glass fibre, 40% polyester resin)
- inductor, ring core choke type: 0.351 kg; lognormal variance with pedigree 0.0706, pedigree (4,3,5,5,1)
  (same comment as for capacitor, film type, for through-hole mounting)
  properties: carbon content, fossil 0.445934, dry mass 1 kg, wet mass 1 kg
  note on carbon content, fossil: Calculated as the addition of C contents in the product composition, and referred to 1 kg DM inductor
- injection moulding: 71 kg; lognormal variance with pedigree 0.0706, pedigree (4,3,5,5,1)
  (same comment as for glass fibre reinforced plastic, polyamide, injection moulded)
- integrated circuit, logic type: 0.028 kg; lognormal variance with pedigree 0.0706, pedigree (4,3,5,5,1)
  (same comment as for capacitor, electrolyte type, > 2cm height)
  properties: carbon content, fossil 0.221701, dry mass 1 kg, wet mass 1 kg
- lubricating oil: 881 kg; lognormal variance with pedigree 0.2706, pedigree (4,3,5,5,5)
  (same comment as for glass fibre reinforced plastic, polyamide, injection moulded)
  properties: carbon content, fossil 0.75, dry mass 1 kg, heating value, net 40.2 MJ, wet mass 1 kg
  note on carbon content, fossil: Lubricating oil is produced from diesel. C-content/dry mass of fats and oils considered 75%, from: ecoinvent v2.2 report, n 15a, pg 40
  note on heating value, net: Literature value, Source: IPCC 2006, 2006 IPCC Guidelines for National Greenhouse Gas Inventories, Prepared by the National Greenhouse Gas Inventories Programme, Eggleston H.S., Buendia L., Miwa K., Ngara T. and Tanabe K. (eds). Published: IGES, Japan
- metal working factory: 1.3555e-6 unit; lognormal variance with pedigree 0.372, pedigree (4,4,5,5,1)
  EcoSpold01Location=RER
  Calculation, based on annual production of electronic component production plant
  Uncertainty: Calculation, based on annual production of electronic component production plant
- polyethylene, high density, granulate: 22 kg; lognormal variance with pedigree 0.0706, pedigree (4,3,5,5,1)
  (same comment as for alkyd paint, white, without solvent, in 60% solution state)
  properties: carbon content, fossil 0.857143, dry mass 1 kg, heating value, net 42.47 MJ, wet mass 1 kg
- polystyrene foam slab: 1.6 kg; lognormal variance with pedigree 0.0706, pedigree (4,3,5,5,1)
  Literature (Schwarz 1992)
  EcoSpold01Location=RER
  Uncertainty: Literature (Schwarz 1992)
  properties: carbon content, fossil 0.859091, dry mass 1 kg, heating value, net 38.67 MJ, wet mass 1 kg
  note on carbon content, fossil: XPS consists in 91% of polystyrene, 7% of blowing agent and the re-maining 2% are flame retardants (bromine compounds) and other additives (ecoinvent v2.2 report 7, part XIV, pg69). The chemical formula of polystyrene is (C8H8)n. Here, the blowing agent is CO2.
- printed wiring board, for through-hole mounting, Pb containing surface: 0.1123 m2; = 0.2246*0.5; lognormal variance with pedigree 0.0706, pedigree (4,3,5,5,1)
  Literature (de Wild 2006), Calculation
  This original value from production mix has been replaced by 2 flows. Each has 50% share in the production mix.
  Uncertainty: Literature (de Wild 2006), Calculation
  property carbon content, fossil 0.203154; name C_content_fossil
  property carbon content, non-fossil 0; name C_content_non_fossil
  property dry mass 3.08 kg; name DM
  property water content 0; name water_content
  property water in wet mass 0 kg; name WWM
  property wet mass 3.08 kg; name WM
- printed wiring board, for through-hole mounting, Pb free surface: 0.1123 m2; = 0.2246*0.5; lognormal variance with pedigree 0.0706, pedigree (4,3,5,5,1)
  (same comment as for printed wiring board, for through-hole mounting, Pb containing surface)
  properties: carbon content, fossil 0.210221, dry mass 3.08 kg, wet mass 3.08 kg
- resistor, metal film type, through-hole mounting: 0.005 kg; lognormal variance with pedigree 0.0706, pedigree (4,3,5,5,1)
  (same comment as for capacitor, film type, for through-hole mounting)
  properties: carbon content, fossil 0.029003, dry mass 1 kg, wet mass 1 kg
  note on carbon content, fossil: Calculated as the addition of C contents in the product composition, and referred to 1 kg DM resistor.
- section bar extrusion, aluminium: 131 kg; lognormal variance with pedigree 0.0706, pedigree (4,3,5,5,1)
  (same comment as for glass fibre reinforced plastic, polyamide, injection moulded)
- sheet rolling, steel: 1438 kg; lognormal variance with pedigree 0.0706, pedigree (4,3,5,5,1)
  (same comment as for glass fibre reinforced plastic, polyamide, injection moulded)
- steel, low-alloyed, hot rolled: 1438 kg; lognormal variance with pedigree 0.0706, pedigree (4,3,5,5,1)
  (same comment as for aluminium, cast alloy)
  properties: carbon content, fossil 0.005, dry mass 1 kg, wet mass 1 kg
  note on carbon content, fossil: Low alloyed steel composition given in Tab. 3.2 ecoinvent v2.2 report 10_partII. Steel assumed to have a C content of 0.5%
- transistor, wired, small size, through-hole mounting: 0.038 kg; lognormal variance with pedigree 0.0706, pedigree (4,3,5,5,1)
  (same comment as for capacitor, electrolyte type, > 2cm height)
  properties: carbon content, fossil 0.080338, dry mass 1 kg, wet mass 1 kg
  note on carbon content, fossil: Calculated as the addition of C contents in the product composition, and referred to 1 kg DM transistor.
- used printed wiring boards: -48.866 kg; lognormal variance with pedigree 0.0306, pedigree (4,3,1,5,1)
  Calculation, different geographical location
  EcoSpold01Location=GLO
  Uncertainty: Calculation, different geographical location
  production volume
    Calculated from the production volume of inverter, 500kW in proportion to the respective output amounts.
  properties: carbon content, fossil 0.193742, carbon content, non-fossil 0.000960142, dry mass 1 kg, wet mass 1 kg
  note on carbon content, fossil: Composition of printed wiring boards used to calculate C content
- waste mineral oil: -881 kg; lognormal variance with pedigree 0.0306, pedigree (4,3,1,5,1)
  EcoSpold01Location=CH
  Calculation, different geographical location
  Uncertainty: Calculation, different geographical location
  production volume
    (same comment as for used printed wiring boards)
  properties: carbon content, fossil 0.864444, dry mass 0.9 kg, heating value, net 34.7 MJ, water content 0.111111, wet mass 1 kg
  note on carbon content, fossil: Tab A.6, ecoinvent v2.2 report 13_I. C content has been calculated after data in the tables, and then referred to 1 kg DM
  note on heating value, net: Value taken from the general comment of the treatment dataset.
- waste paperboard, unsorted: -13.6 kg; lognormal variance with pedigree 0.0306, pedigree (4,3,1,5,1)
  (same comment as for waste mineral oil)
  production volume
    (same comment as for used printed wiring boards)
  properties: carbon content, non-fossil 0.483259, dry mass 0.804 kg, heating value, net 15.92 MJ, price 0.03924 EUR2005, water content 0.243781, wet mass 1 kg
  note on carbon content, non-fossil: C content was calculated for 1 kg DM, using data in Tab A.3, ecoinvent v2.2 report 13_I.
- waste plastic, industrial electronics: -230 kg; lognormal variance with pedigree 0.0306, pedigree (4,3,1,5,1)
  Calculation, different geographical location
  EcoSpold01Location=CH
  Uncertainty: Calculation, different geographical location
  production volume
    (same comment as for used printed wiring boards)
  properties: carbon content, fossil 0.81386, dry mass 0.847 kg, heating value, net 34.78 MJ, water content 0.180638, wet mass 1 kg
  note on carbon content, fossil: C content in 1 kg DM was calculated using data in Tab A.2, ecoinvent v2.2 report 13_I
- waste polyethylene: -0.000101605, -0.000259054, -0.000106999, -1.95918e-5, -1.59559, -4.32262e-5, -0.00387711 kg (7 suppliers, which the file names only by identifier); sum of these -1.6 kg; lognormal variance with pedigree 0.0306, pedigree (4,3,1,5,1)
  (same comment as for waste plastic, industrial electronics)
  production volume
    (same comment as for used printed wiring boards)
  properties: carbon content, fossil 0.825301, dry mass 0.996 kg, heating value, net 42.47 MJ, water content 0.00401606, wet mass 1 kg
  note on carbon content, fossil: C content in 1 kg DM was calculated using data in Tab A.1, ecoinvent v2.2 report 13_I
- waste polystyrene: -0.00340751, -3.79906e-5, -0.000227677, -9.40387e-5, -8.92985e-5, -1.72188e-5, -1.59613 kg (7 suppliers, which the file names only by identifier); sum of these -1.6 kg; lognormal variance with pedigree 0.0306, pedigree (4,3,1,5,1)
  (same comment as for waste mineral oil)
  production volume
    (same comment as for used printed wiring boards)
  properties: carbon content, fossil 0.922579, dry mass 0.998 kg, heating value, net 38.67 MJ, water content 0.00200401, wet mass 1 kg
- wire drawing, copper: 335 kg; lognormal variance with pedigree 0.0706, pedigree (4,3,5,5,1)
  (same comment as for alkyd paint, white, without solvent, in 60% solution state)

## Sampling procedure
Detailed analysis of materials for one product

## Extrapolations
none This dataset has been copied from an original dataset covering the geography RER. The uncertainty has been adjusted accordingly.

## Review by Christian Bauer 2009-02-15
passed
none
