# transport, passenger train, high-speed

Dataset: EcoSpold 2, unit process
Geography: RoW
Time period: 2000-01-01 to 2023-12-31
Technology level: current
Classification: ISIC rev.4 ecoinvent: 4911:Passenger rail transport, interurban
Classification: EcoSpold01Categories: transport systems/train
Scenario: Business-as-Usual
System model: Allocation, cut-off by classification
Generated by: Michael Spielmann (obsolete)
Published in: Spielmann M. 2007
Database: ecoinvent
isCopyrightProtected: true
accessRestrictedTo: 1

## General comment
Based on "transport, passenger train, high-speed, DE/FR/IT, 2000". Inventory refers to the entire transport life cycle. For rail infrastructure, expenditures and environmental interventions due to construction of roads have been allocated based on the train kilometric performance. Expenditures due to operation of the rail infrastructure, as well as land use have been allocated based on the yearly train kilometre performance, too.

## Included activities start
The dataset starts when the infrastructure input (train and railway tracks) starts to be used for passenger transport.

## Included activities end
The module calls the modules 'operation of vehicle'; 'production and maintenance of vehicles'; 'construction of railway tracks'.

## Geography
Extrapolated from "transport, passenger train, high-speed, DE/FR/IT, 2000". Data refers to operation of a high speed train in Germany, France and Italy.

## Technology
The transport by train refers to the conditions in Germany (ICE-train).

## Time period
Not specified

## Reference product
- transport, passenger train: 1 person*km; By-product classification allocatable product; CPC 641: Local transport and sightseeing transportation services of passengers
  EcoSpold01Location=FR
  production volume 9.08e10 person*km
    UIC statistical synopsis 2005 http://www.uic.org/IMG/xls/synth2005-2.xls
  property price 0.0208844 EUR2005
    Calculated based on inputs: The price of the product has been calculated as a sum of the values of the material and energy inputs for this product. This value is therefore a rough estimation. It may underestimate the real price since there are additional expenses when producing any product. These expences can include for example labour costs, treatment of waste materials and profit for the producer. Please consider carefully whether this level of data quality is acceptable for your application.
  properties: carbon allocation 0 kg, carbon content 0

## Inputs from technosphere
- electricity, high voltage: 0.000157993, 2.77556e-5, 0.000204024, 1.74849e-5, 0.000151964, 0.000149379, 0.000173267, 0.000233962, 0.00346226, 0.000116002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 kWh (45 suppliers, which the file names only by identifier); sum of these 0.084903 kWh; lognormal variance with pedigree 0.052, pedigree (1,1,5,5,1)
  Calculated. The GLO dataset represents weighted average (by production volumes) of three regional datasets; "transport, passenger train, high-speed, DE" with annual production volume of 2.09E+10 pkm, "transport, passenger train, high-speed, FR" with annual production volume of 4.27E+10 pkm, "transport, passenger train, high-speed, IT" with annual production volume of 8.6E+09 pkm.
- maintenance, train, passenger, high-speed: 3.24e-10 unit; lognormal variance with pedigree 0.042, pedigree (1,1,5,5,1)
  Calculated. The GLO dataset represents weighted average (by production volumes) of three regional datasets; "transport, passenger train, high-speed, DE" with annual production volume of 2.09E+10 pkm, "transport, passenger train, high-speed, FR" with annual production volume of 4.27E+10 pkm, "transport, passenger train, high-speed, IT" with annual production volume of 8.6E+09 pkm.
  EcoSpold01Location=DE
- railway track, for high-speed train: 0.00013 m*year; lognormal variance with pedigree 0.042, pedigree (1,1,5,5,1)
  (same comment as for maintenance, train, passenger, high-speed)
- train, passenger, high speed: 3.24e-10 unit; lognormal variance with pedigree 0.042, pedigree (1,1,5,5,1)
  EcoSpold01Location=DE
  Calculated. The GLO dataset represents weighted average (by production volumes) of three regional datasets; "transport, passenger train, high-speed, DE" with annual production volume of 2.09E+10 pkm, "transport, passenger train, high-speed, FR" with annual production volume of 4.27E+10 pkm, "transport, passenger train, high-speed, IT" with annual production volume of 8.6E+09 pkm.

## Emissions to nature
- Particulate Matter, > 10 um [air, unspecified]: 1.1554e-5 kg; lognormal variance with pedigree 0.252, pedigree (1,1,5,5,1)
  (same comment as for electricity, high voltage)
- Particulate Matter, > 2.5 um and < 10um [air, unspecified]: 1.0549e-5 kg; lognormal variance with pedigree 0.252, pedigree (1,1,5,5,1)
  (same comment as for electricity, high voltage)
- Sulfur hexafluoride [air, unspecified]: 3.7357e-9 kg; lognormal variance with pedigree 0.11, pedigree (3,5,5,5,3)
  Calculated. The GLO dataset represents weighted average (by production volumes) of three regional datasets; "transport, passenger train, high-speed, DE" with annual production volume of 2.09E+10 pkm, "transport, passenger train, high-speed, FR" with annual production volume of 4.27E+10 pkm, "transport, passenger train, high-speed, IT" with annual production volume of 8.6E+09 pkm.
  Uncertainty: literature
- Iron ion [soil, unspecified]: 2.8132e-5 kg; lognormal variance with pedigree 0.252, pedigree (1,1,5,5,1)
  (same comment as for electricity, high voltage)

## Sampling procedure
literature studies

## Extrapolations
see Technology and Geography This dataset has been copied from an original dataset covering the geography DE, FR, IT. The uncertainty has been adjusted accordingly.

## Review by Christian Bauer 2010-02-07
passed.
