# concrete production, 20MPa, with cement, Portland

Dataset: EcoSpold 2, unit process
Geography: North America without Quebec
Time period: 2006-01-01 to 2023-12-31
Technology level: current
Classification: ISIC rev.4 ecoinvent: 2395:Manufacture of articles of concrete, cement and plaster
Synonyms: ready mixed concrete; ready-mix concrete
Scenario: Business-as-Usual
System model: Allocation, cut-off by classification
Generated by: Geneviève Martineau
Published in: Marceau 2006
Database: ecoinvent
isCopyrightProtected: true
accessRestrictedTo: 1

## General comment
This dataset represents the production of North American 20 MPa ready-mix concrete. Density: 2"335 kg/m³. Ingredients (for 1 m³): Cement 204 kg, Water 160 kg, Gravel 1009 kg, Sand 925 kg, Fly ash 36.38 kg, Admixtures (air-entrainers and superplastisizers) 1,2kg. 20 MPa concrete is intended for residential use, such as footings for walls, columns, fireplaces, chimneys, foundations, walls, grade beams, piers, not exposed to freeze-thaw. (following the Canadian CSA specs - http://www.rmcao.org/sites/default/files/CSA%20Quickspec%202012.pdf) Generic concrete mixes (cement, SCM, aggregate, water) provided by the CPCA (Athena (2005):Cement and Structural Concrete: LCI Update 2005; Table 10.1). Admixtures included in the mixes, as provided by the CPCI (Athena and Morrison Hershfield (2012): Life Cycle Assessment of Precast Concrete Commercial Buildings Cradle-to-Grave; Table 5). The average water consumption (not including batch water) is 65 L/m³ of ready mixed concrete. The average amount of water disposed is 35 L/m³. Water not discarded is recycled back into the process or into other products, and therefore not accounted for in this dataset. Annual production volume of Ready-Mix concrete for North America estimated based on US production, and GDP ratio. Distribution by ready-mix strength class estimated as: - 20 MPa = 20% - 25 MPa = 40% - 30-32 MPa = 15% - 35 MPa = 24% - 50 MPa = 1% (coherent with distribution presented in http://www.ermco.eu/documents/ermco-documents/ermco_-statistics2008_091310.pdf (Table 3)
[This dataset is meant to replace the following datasets: - concrete production 20MPa, RNA only, GLO, 2006 - 2006]

## Included activities start
From reception of raw materials at the ready-mix plant gate.

## Included activities end
This activity ends before the delivery of concrete at the construction site. The dataset includes the whole manufacturing processes to produce ready-mixed concrete, internal processes (material handling and mixing) and infrastructure. The dataset does not include: - the transport of concrete in a mixing truck. The combustion of 5.74 litres of diesel should be used to take into account the average transportation of 1m³ of concrete.

## Geography
North American data. For some exchanges RER-modules have been used as proxy. Data quality indicators adjusted accordingly.

## Technology
Typical technology for average North American production. Data quality indicators adjusted accordingly.

## Parameters
- fraction: 0 dimensionless
- fraction of 20 MPa concrete to overall concrete production: 0.2 dimensionless; name fraction_20MPa_concrete; lognormal variance with pedigree 0.0014, pedigree (2,2,1,3,1)
  For Annual production volume purpose. Extrapolated value. In Quebec, Canada, 20MPa concrete represents 20% of the overall ready-mix concrete production. Source; Personal communication, ABQ (Association Béton Québec), October 2013.
- fraction of 25 MPa concrete to overall concrete production: 0 dimensionless
- fraction, process water, to air: 0.15 dimensionless; name fraction_PW_to_air; lognormal variance with pedigree 0.0226, pedigree (4,4,3,5,3)
  Rough estimation to represent water evaporation of process water. Source: 2007, Kellenberger D et al. (ecoinvent "Concrete production, normal" dataset)
- fraction_01: 0.8 dimensionless; name fraction_ethylene_oxide; lognormal variance with pedigree 0.0427, pedigree (3,1,1,3,4)
  Literature value. Superplastisizer assumed to be 80% ehtlyne oxide. 20 MPa mix admixtures. Source: Athena and morrison Hershfield (2012): Life Cycle Assessment of Precast Concrete Commerical Buildings Cradle-to-Grave
- fraction_02: 0.2 dimensionless; name fraction_acetic_acid; lognormal variance with pedigree 0.0427, pedigree (3,1,1,3,4)
  Literature value. Superplastisizer assumed to be 20% acetic acid. 20 MPa mix admixtures. Source: Athena and morrison Hershfield (2012): Life Cycle Assessment of Precast Concrete Commerical Buildings Cradle-to-Grave
- north america production volume in cubic meter: 1.36778e8 m3; name PV_ready_mix_RNA; = 270E09/2350/0.84; lognormal variance with pedigree 0.0033, pedigree (3,2,1,1,2)
  Based on U.S. Ready-Mix concrete production in 2008 (270 Mt, assuming an average density of 2350 kg/m³), Literature value from: Sakai, K and Noguchi, T. (2012) The Sustainable Use of Concrete. CRC Press, 188 pages. (p.27). To esimate the North American production volume, a GDP ratio was used. where US accounts for 84 % of North America (including Canada and Mexico). Based on GDP 2012 of United Nations US GDP 2012: 1,624 E07 $ Canada GDP 2012: 1,821 E06 $ GDP Mexico 2012 : 1,184 E06 $
- quebec production volume in cubic meter: 4.7e6 m3; name PV_ready_mix_Qc; lognormal variance with pedigree 0.0026, pedigree (3,1,1,1,1)
  Estimated value, from Association Béton Québec (2008). Source: http://www.betonabq.org/images/fichiers_documents/rapport%20annuel%202008.pdf
- superplastisizer: 0.109 kg; lognormal variance with pedigree 0.002925, pedigree (3,2,2,2,1)
  Source: Athena and morrison Hershfield (2012): Life Cycle Assessment of Precast Concrete Commerical Buildings Cradle-to-Grave

## Reference product
- hard coal ash: -1 kg; name flyash; By-product classification Waste; CPC 39320: Ash and residue (except from the manufacture of iron or steel), containing metals or metallic compounds, excep[…]; HS2017 262099: Slag, ash and residues; (not from the manufacture of iron or steel), containing mainly metals or their comp[...]
  The amount of hard coal ash was calculated according to the formula fly_ash*(1+Waste/Ref_WM). fly ash: fly ash content of reference product Waste: amount of waste concrete Ref_WM: wet mass of the reference product
  production volume 9.9514e8 kg; name PV_flyash; = abs(flyash)*PV_ref/ref
    Calculated from the production volume of reference product, in proportion to the respective output amounts.
  property price 0 EUR2005
    Waste products are assigned a price of zero as they are assumed to require further treatment.
  properties: carbon allocation 0 kg, carbon content 0, carbon content, fossil 0, carbon content, non-fossil 0, dry mass 1 kg, water content 0, water in wet mass 0 kg, wet mass 1 kg

## Sampling procedure
Data on process inputs and water use are from Confidential Life Cycle Inventory Survey of Ready-Mix Concrete Plant (Marceau, VanGeem, and Ranchero 2006a). This survey was distributed to a sample of member-plants of the National Ready Mixed Concrete Association. The sample was chosen so that the plants in the sample are representative of climates of the conterminous United States and plant size in terms of production in cubic yards of ready mixed concrete. The sample consists of 47 plants.

## Extrapolations
This activity represents a North American concrete production. Some flows have been kept as in the original (European) ecoinvent dataset (infrastructure, lubricant, rubber, and steel). The uncertainty has been adjusted accordingly.
