# glued laminated timber production, average glue mix

Dataset: EcoSpold 2, unit process
Geography: CA-QC
Time period: 2009-01-01 to 2023-12-31
Technology level: current
Classification: ISIC rev.4 ecoinvent: 1621:Manufacture of veneer sheets and wood-based panels
Classification: EcoSpold01Categories: wooden materials/processing
Synonyms: Glulam
Scenario: Business-as-Usual
System model: Allocation, cut-off by classification
Generated by: James Salazar
Database: ecoinvent
isCopyrightProtected: true
accessRestrictedTo: 1

## General comment
This dataset represents the production of one m3 of glued laminated timber. The input of wood is assumed to be kiln dried sawn softwood, more specifically spruce. A part of the dried softwood is already planed. The activity takes place at a glulam mill.
The dataset is based on Canadian average but is representative of Quebec's production.

## Included activities start
Activity starts at the entrance of the production site. it includes:
- the input materials and energy to the production processes received at the factory gate;
- the infrastructures (building, furnace for wood).

## Included activities end
Activity ends at the gate of the production site.
Outputs include:
- the material outputs (glued laminated timber and by-products);
- process emissions;
- combustion emissions from wood (internal use).

## Geography
Most data from 4 Canadian mills, including 2 from Québec. The Québec mills account for 55% of the production from the surveyed mills. Some data taken from the GLO dataset. The uncertainty has been adjusted accordingly.

## Time period
Data collected for the period 2009-2011. The uncertainty has been adjusted accordingly.

## Parameters
- density, wood chips, bulk, oven dry: 239 kg/m3; name densityWoodChipsBulkOD; lognormal variance with pedigree 0.0493, pedigree (1,5,5,3,2)
  Density of wood residues used as fuel.
  The volume refers to the bulked volume: dried matter content = 239 kg/m3 dried matter (u=0%) (ecoinvent v2.2 report 9, Table 13.1)
- fuel use: 1.11 MJ; name fuel_in; lognormal variance with pedigree 0.2106, pedigree (5,5,5,5,5)
  Fuel use of wood chips furnace.
  Default value
- heat use: 244.449 MJ; name totalHeatUse; = HVWoodChips* amountWoodChips/fuelUse+ NHVNaturalGas*36.3*1.79/fuelUse; lognormal variance with pedigree 0.001525, pedigree (1,2,2,2,2)
  Total heat use of the process from wood and natural gas. Gas combustion and wood combustion are considered exchangeable. Diesel and light fuel oil are considered not exchangeable with other energy sources, so heat produced from these sources is not included here.
  Total heat use= (qty of wood chips)*(HVWoodChips)+(qtyNaturalGas)*(HVNaturalGas)=206.28+64.98=271.26
  (qty of wood chips)=10.8 kg
  (HVWoodChips)=19.1 MJ/kg
  (qtyNaturalGas)=1.79 m3
  (HVNaturalGas)=36.3 MJ/m3
  Uncertainty: Variance from default values table. Data for process emissions collected from Canadian entreprises.
- wood chips heat value: 19.1 MJ/kg; name HVWoodChips; lognormal variance with pedigree 0.0006, pedigree (1,1,1,1,1)
  Net value
  Characteristics of the available dataset of wood chips (humidity = 140%) as fuel input has been adjusted to actual humidity of 50%, which is achieved after some weeks of drying. The apparent density of the chips is 430 kg/m3, the bulk density is 239 kg/m3, and the low heating value is 4044 MJ/m3
- wood residues as fuel: 10.8042 kg; name amountWoodChips; lognormal variance with pedigree 0.001825, pedigree (1,3,1,2,2)
  It includes wood used internally as hog fuel
  Uncertainty: Variance from default values table. Data collected from Canadian entreprises

## Reference product
- glued laminated timber, average glue mix: 1 m3; name amountRP; By-product classification allocatable product; CPC 3142: Other plywood, veneered panels and similar laminated wood, except of bamboo; HS2017 4412: Plywood, veneered panels and similar laminated wood
  production volume 9176.24 m3; name annualProductionVolume; = AVERAGE(3.08E04;4.00E04;3.39E04)*(AVERAGE(367561;433458;449963)/AVERAGE(1408383;1631979;1717500))
    Annual production volume calculated from:
    - Glulam production in Canada (2003-2005)
    3,08E+04 m3 (2003); 4,00E+04 m3 (2004); 3,39E+04m3 (2005) Source: UNECE\FAO (Forest products annual market review 2004-2005)
    -Ratio Quebec/Canada of total structural wood product manufacturing in Canada and Quebec:
    Canada: 1408383m3 (2004); 1631979m3 (2005); 1717500m3 (2006)
    Quebec:
    367561m3 (2004); 433458m3 (2005); 449963m3 (2006)
    Source: Parent (2010) Ressources et industries forestières. protrait statistique. Édition 2010
  property heating value, net 5537.41 MJ
    LHV is calculated based on the Carbon content of the product. More details can be found on the respective documentation.The property is based on a value of 12.47MJ/kg
  property price 298 EUR2005
    Temporary price data. Calculated as 90% of purchasers price based on: Price for plywood applied (from 2004 World Import/Export (USD/cubicmeter) from FaoStat http://faostat.fao.org/site/626/default.aspx#ancor, accessed 14th June 2010)
  property water in wet mass 39.6 kg; name WWMGlulam
  properties: allocation factor 0.989663, carbon allocation 185.96 kg, carbon content 0.459842, carbon content, fossil 0.01791, carbon content, non-fossil 0.441932, dry mass 404.4 kg, true value 298, water content 0.0979228, wet mass 444 kg

## Inputs from technosphere
- diesel, burned in building machine: 6.67132 MJ; = kgFuel_input*NHValueDiesel*42.8; lognormal variance with pedigree 0.008, pedigree (1,1,4,1,1)
  EcoSpold01Location=GLO
  Fuel (gasoline) consumed on site by operating machines
  Uncertainty: No uncertainty added - uncertainty based on propagation of the uncertainty of the underlying parameters
  property Corresponding fuel use 1.11 MJ; name fuelUse
  property density 0.75 kg/l; name densityGasoline
  property heating value, net 1 MJ; name NHValueDiesel
  property kgFuel_Input 0.1575 kg; name kgFuel_input; = .21* densityGasoline
  note on Corresponding fuel use: Lower heating value of the fuel input related to the heat/electricity output
- electricity, medium voltage: 134.192 kWh; lognormal variance with pedigree 0.015225, pedigree (1,3,4,2,2)
  This electricity includes process and furnace utilisation
  EcoSpold01Location=UCTE
  Uncertainty: Variance from default values table. Data for inputs collected from Canadian entreprises.
- furnace, wood chips, hardwood storage area, 300kW: 3.4024e-6 unit; = (1.81E-08/0.000238)*(amountWoodChips/densityWoodChipsBulkOD); lognormal variance with pedigree 0.56, pedigree (5,5,5,5,5)
  Taken from ecoinvent 2.2 dataset “Wood chips, from industry, softwood, burned in furnace 300kW/CH”.
  Fraction is calculated per m3 of wood chips using the original dataset:
  (infrastructure (in p))//0,000238m3/MJproduced)
  Emission per m3 is multiplied by the m3 of wood chips burned:
  (infrastructure (in p))/density (kg/m3)
  Uncertainty: “Wood chips, from industry, softwood, burned in furnace 300kW/CH”.
- heat, district or industrial, natural gas: 57.9327 MJ; = totalHeatUse-(amountWoodChips*HVWoodChips/fuel_in); lognormal variance with pedigree 0.008, pedigree (1,1,4,1,1)
  It includes natural gas input and combustion emissions. It also includes other inputs (e.g. electricity) that are already included in this dataset.
  Uncertainty: No uncertainty added - uncertainty based on propagation of the uncertainty of the underlying parameters
  property heating value, gross 40.3 MJ; name heatingValueGas
  property heating value, net 1 MJ; name NHVNaturalGas
- heat, district or industrial, other than natural gas: 14.6989 MJ; = kgFuelInputLFO* HVLFO*42.6/fuelUseLFO; lognormal variance with pedigree 0.008, pedigree (1,1,4,1,1)
  It includes light fuel oil input and combustion emissions. It also includes other inputs (e.g. electricity) that are already included in this dataset.
  Uncertainty: No uncertainty added - uncertainty based on propagation of the uncertainty of the underlying parameters
  property Corresponding fuel use 1.11 MJ; name fuelUseLFO
  property density 0.86 kg/l; name densityLFO
  property fuel input in physical units, kg 0.387 kg; name kgFuelinputLFO; = 0.45* densityLFO
  property heating value, net 1 MJ; name HVLFO
- lubricating oil: 0.114694 kg; = (0.0658478979171035+0.0658478979171035)*densityLubricatingOil; lognormal variance with pedigree 0.015225, pedigree (1,3,4,2,2)
  Hydraulic fluid + lubricants
  Uncertainty: Variance from default values table. Data for inputs collected from Canadian entreprises.
  property density 0.88 kg/l; name densityLubricatingOil
  properties: carbon content, fossil 0.75, dry mass 1 kg, heating value, net 40.2 MJ, wet mass 1 kg
  note on carbon content, fossil: Lubricating oil is produced from diesel. C-content/dry mass of fats and oils considered 75%, from: ecoinvent v2.2 report, n 15a, pg 40
  note on heating value, net: Literature value, Source: IPCC 2006, 2006 IPCC Guidelines for National Greenhouse Gas Inventories, Prepared by the National Greenhouse Gas Inventories Programme, Eggleston H.S., Buendia L., Miwa K., Ngara T. and Tanabe K. (eds). Published: IGES, Japan
- phenolic resin: 0.189311 kg; lognormal variance with pedigree 0.015225, pedigree (1,3,4,2,2)
  Phenol Resorcinol Formaldehyde Resin
  Uncertainty: Variance from default values table. Data for inputs collected from Canadian entreprises.
  properties: carbon content, fossil 0.772277, dry mass 1 kg, heating value, net 33.57 MJ, wet mass 1 kg
- polyurethane, rigid foam: 11.0549 kg; lognormal variance with pedigree 0.015225, pedigree (1,3,4,2,2)
  Polyurethane Resin
  Uncertainty: Variance from default values table. Data for inputs collected from Canadian entreprises.
  properties: carbon content, fossil 0.69089, dry mass 1 kg, heating value, net 30.67 MJ, wet mass 1 kg
- propane, burned in building machine: 3.39215 MJ; = 0.15*0.493*46.35; lognormal variance with pedigree 0.0092, pedigree (2,1,4,1,1)
  Proxy for propane combustion. 0.15 represents the fuel input in l. 0.493 represents the density of Propane (kg/l). 46.35 represents the lower heating value (MJ/kg)
  properties: heating value, net 1 MJ
- sawnwood, board, softwood, dried (u=20%), planed: 0.553414 m3; name softwoodPlaned; = 216.52/ DMSoftwoodPlaned; lognormal variance with pedigree 0.015225, pedigree (1,3,4,2,2)
  Planed Dry Lumber
  216.52 kg (oven dry)
  Volume calculated with the default ecoinvent dry mass (450 kg/m³) in order to keep the carbon balance in the database. The true dry mass is for this dataset is 419 kg/m³. The side-effect of this adaptation is the underestimation of land-use during wood extraction.
  Uncertainty: Variance from default values table. Data for inputs collected from Canadian entreprises.
  property dry mass 387.2 kg; name DMSoftwoodPlaned
  property water in wet mass 77.44 kg; name WWMSoftwoodPlaned; = 387.2* 0.2
  property wet mass 464.64 kg; name WMSoftwoodPlaned; = 387.2*(1+ 0.2)
  properties: carbon content, non-fossil 0.494, heating value, net 5605.65 MJ, water content 0.2
- sawnwood, board, softwood, raw, dried (u=20%): 0.673186 m3; name softwoodRaw; = 263.38/ DMSoftwood; lognormal variance with pedigree 0.015225, pedigree (1,3,4,2,2)
  Rough Dry Lumber
  263,38 kg (oven dry)
  Volume calculated with the default ecoinvent dry mass (450 kg/m³) in order to keep the carbon balance in the database. The true dry mass is for this dataset is 419 kg/m³. The side-effect of this adaptation is the underestimation of land-use during wood extraction.
  Uncertainty: Variance from default values table. Data for inputs collected from Canadian entreprises.
  property dry mass 387.2 kg; name DMSoftwood
  property water in wet mass 77.44 kg; name WWMSoftwood; = 387.2* 0.2
  property wet mass 464.64 kg; name WMSoftwood; = 387.2*(1+ 0.2)
  properties: carbon content, non-fossil 0.494, heating value, net 5860.46 MJ, water content 0.2
- waste polyurethane: -0.963932 kg; name amountWastePUR; lognormal variance with pedigree 0.0206, pedigree (1,5,3,5,3)
  EcoSpold01Location=CH
  No information available locally. Value taken from GLO dataset.
  Uncertainty: Variance from default value table.
  production volume; = annualProductionVolume * amountWastePUR / amountRP
    Calculated from the production volume of glued laminated timber, for indoor use in proportion to the respective output amounts.
  properties: carbon content, fossil 0.641283, dry mass 0.998 kg, heating value, net 30.67 MJ, water content 0.00200401, wet mass 1 kg
  note on carbon content, fossil: C content was calculated for 1 kg DM, using data in Tab A.2, ecoinvent v2.2 report 13_I.
  note on heating value, net: Value taken from the general comment of the treatment dataset.
- wood ash mixture, pure: -0.435452 kg; name amountWoodAsh; lognormal variance with pedigree 0.001825, pedigree (1,3,1,2,2)
  Ash from combustion from heat production is included here.
  Uncertainty: Variance from default values table. Data collected from Canadian entreprises
  production volume; = annualProductionVolume * amountWoodAsh / amountRP
    Calculated from production volume of reference product using the relative outputs.
  properties: carbon content, non-fossil 0.012, dry mass 1 kg, wet mass 1 kg
- wooden board factory, organic bonded boards: 3.29558e-8 unit; = 3.33E-08; lognormal variance with pedigree 0.448, pedigree (4,5,5,5,4)
  No information available locally. Value taken from GLO dataset.
  EcoSpold01Location=RER

## Inputs from nature
- Carbon dioxide, non-fossil, resource correction [natural resource, in air]: -97.8226 kg

## Emissions to nature
- Acetaldehyde [air, unspecified]: 1.14666e-5 kg; = (0.000000061/0.000238)*(amountWoodChips/densityWoodChipsBulkOD); lognormal variance with pedigree 0.488, pedigree (1,5,5,5,3)
  Emissions from energy production from wood on site.
  Energy production from wood and its emissions are modelled using ecoinvent 2.2 dataset "Wood chips, from industry, softwood, burned in furnace 300kW/CH".
  Emission is calculated per m3 of wood chips using the original dataset:
  ((emission/MJ)/(0,000238m3/MJproduced)
  Emission per m3 is multiplied by the m3 of wood chips burned:
  (amount (in kg))/density (kg/m3)
  Uncertainty: DQP values adapted from original dataset (“heat production, softwood chips from industry, at furnace 300kW”) . This uncertainty is multiplied by uncertainty of the wood chips amount.
- Ammonia [air, unspecified]: 0.000325202 kg; = (0.00000173/0.000238)*(amountWoodChips/densityWoodChipsBulkOD); lognormal variance with pedigree 0.488, pedigree (1,5,5,5,3)
  (same comment as for Acetaldehyde)
- Arsenic ion [air, unspecified]: 1.87978e-7 kg; = (0.000000001/0.000238)*(amountWoodChips/densityWoodChipsBulkOD); lognormal variance with pedigree 0.488, pedigree (1,5,5,5,3)
  (same comment as for Acetaldehyde)
- Benzene [air, unspecified]: 0.00017106 kg; = (0.00000091/0.000238)*(amountWoodChips/densityWoodChipsBulkOD); lognormal variance with pedigree 0.488, pedigree (1,5,5,5,3)
  (same comment as for Acetaldehyde)
- Benzo(a)pyrene [air, unspecified]: 9.39889e-8 kg; = (5.00E-10/0.000238)*(amountWoodChips/densityWoodChipsBulkOD); lognormal variance with pedigree 0.488, pedigree (1,5,5,5,3)
  (same comment as for Acetaldehyde)
- Bromine [air, unspecified]: 1.12787e-5 kg; = (0.00000006/0.000238)*(amountWoodChips/densityWoodChipsBulkOD); lognormal variance with pedigree 0.488, pedigree (1,5,5,5,3)
  (same comment as for Acetaldehyde)
- Cadmium II [air, unspecified]: 1.31584e-7 kg; = (7.00E-10/0.000238)*(amountWoodChips/densityWoodChipsBulkOD); lognormal variance with pedigree 0.488, pedigree (1,5,5,5,3)
  (same comment as for Acetaldehyde)
- Calcium II [air, unspecified]: 0.00109967 kg; = (0.00000585/0.000238)*(amountWoodChips/densityWoodChipsBulkOD); lognormal variance with pedigree 0.488, pedigree (1,5,5,5,3)
  (same comment as for Acetaldehyde)
- Carbon dioxide, non-fossil [air, unspecified]: 19.3617 kg; = (0.103/0.000238)*(amountWoodChips/densityWoodChipsBulkOD); lognormal variance with pedigree 0.058, pedigree (1,5,5,5,3)
  (same comment as for Acetaldehyde)
- Carbon monoxide, non-fossil [air, unspecified]: 0.00902293 kg; = (0.000048/0.000238)*(amountWoodChips/densityWoodChipsBulkOD); lognormal variance with pedigree 0.398, pedigree (1,5,5,5,3)
  (same comment as for Acetaldehyde)
- Chlorine [air, unspecified]: 3.3836e-5 kg; = (0.00000018/0.000238)*(amountWoodChips/densityWoodChipsBulkOD); lognormal variance with pedigree 0.488, pedigree (1,5,5,5,3)
  (same comment as for Acetaldehyde)
- Chromium III [air, unspecified]: 7.44392e-7 kg; = (3.96E-09/0.000238)*(amountWoodChips/densityWoodChipsBulkOD); lognormal variance with pedigree 0.488, pedigree (1,5,5,5,3)
  (same comment as for Acetaldehyde)
- Chromium VI [air, unspecified]: 7.51911e-9 kg; = (4.00E-11/0.000238)*(amountWoodChips/densityWoodChipsBulkOD); lognormal variance with pedigree 0.538, pedigree (1,5,5,5,3)
  (same comment as for Acetaldehyde)
- Copper ion [air, unspecified]: 4.13551e-6 kg; = (0.000000022/0.000238)*(amountWoodChips/densityWoodChipsBulkOD); lognormal variance with pedigree 0.44, pedigree (1,1,4,5,1)
  Emissions from energy production from wood on site.
  Energy production from wood and its emissions are modelled using ecoinvent 2.2 dataset "Wood chips, from industry, softwood, burned in furnace 300kW/CH".
  Emission is calculated per m3 of wood chips using the original dataset:
  ((emission/MJ)/(0,000238m3/MJproduced)
  Emission per m3 is multiplied by the m3 of wood chips burned:
  (amount (in kg))/density (kg/m3)
- Dinitrogen monoxide [air, unspecified]: 0.000469944 kg; = (0.0000025/0.000238)*(amountWoodChips/densityWoodChipsBulkOD); lognormal variance with pedigree 0.44, pedigree (1,1,4,5,1)
  (same comment as for Copper ion)
- Dioxins, measured as 2,3,7,8-tetrachlorodibenzo-p-dioxin [air, unspecified]: 5.82731e-12 kg; = (3.10E-14/0.000238)*(amountWoodChips/densityWoodChipsBulkOD); lognormal variance with pedigree 0.488, pedigree (1,5,5,5,3)
  (same comment as for Acetaldehyde)
- Ethyl benzene [air, unspecified]: 5.63933e-6 kg; = (0.00000003/0.000238)*(amountWoodChips/densityWoodChipsBulkOD); lognormal variance with pedigree 0.488, pedigree (1,5,5,5,3)
  (same comment as for Acetaldehyde)
- Fluorine [air, unspecified]: 9.39889e-6 kg; = (0.00000005/0.000238)*(amountWoodChips/densityWoodChipsBulkOD); lognormal variance with pedigree 0.488, pedigree (1,5,5,5,3)
  (same comment as for Acetaldehyde)
- Formaldehyde [air, unspecified]: 0.0119004 kg; = 0.012+(0.00000013/0.000238)*(amountWoodChips/densityWoodChipsBulkOD); lognormal variance with pedigree 0.608, pedigree (4,5,5,5,5)
  On-site process related VOCs and emissions from energy production from wood on site.
  On-site process emissions taken from GLO dataset
  Energy production from wood and its emissions are modelled using ecoinvent 2.2 dataset "Wood chips, from industry, softwood, burned in furnace 300kW/CH".
  Emission is calculated per m3 of wood chips using the original dataset:
  ((emission/MJ)/(0,000238m3/MJproduced)
  Emission per m3 is multiplied by the m3 of wood chips burned:
  (amount (in kg))/density (kg/m3)
  Uncertainty: DQP values:
  1)adapted from original dataset (“heat production, softwood chips from industry, at furnace 300kW”) . This uncertainty is multiplied by uncertainty of the wood chips amount.
  2) adapted from GLO dataset for process emissions
- Hexachlorobenzene [air, unspecified]: 1.35344e-12 kg; = (7.20E-15/0.000238)*(amountWoodChips/densityWoodChipsBulkOD); lognormal variance with pedigree 0.488, pedigree (1,5,5,5,3)
  (same comment as for Acetaldehyde)
- Hydrocarbons, aliphatic, alkanes, unspecified [air, unspecified]: 0.00017106 kg; = (0.00000091/0.000238)*(amountWoodChips/densityWoodChipsBulkOD); lognormal variance with pedigree 0.488, pedigree (1,5,5,5,3)
  (same comment as for Acetaldehyde)
- Hydrocarbons, aliphatic, unsaturated [air, unspecified]: 0.000582731 kg; = (0.0000031/0.000238)*(amountWoodChips/densityWoodChipsBulkOD); lognormal variance with pedigree 0.488, pedigree (1,5,5,5,3)
  (same comment as for Acetaldehyde)
- Lead II [air, unspecified]: 4.69944e-6 kg; = (0.000000025/0.000238)*(amountWoodChips/densityWoodChipsBulkOD); lognormal variance with pedigree 0.488, pedigree (1,5,5,5,3)
  (same comment as for Acetaldehyde)
- Magnesium [air, unspecified]: 6.7672e-5 kg; = (0.00000036/0.000238)*(amountWoodChips/densityWoodChipsBulkOD); lognormal variance with pedigree 0.488, pedigree (1,5,5,5,3)
  (same comment as for Acetaldehyde)
- Manganese II [air, unspecified]: 3.19562e-5 kg; = (0.00000017/0.000238)*(amountWoodChips/densityWoodChipsBulkOD); lognormal variance with pedigree 0.488, pedigree (1,5,5,5,3)
  (same comment as for Acetaldehyde)
- Mercury II [air, unspecified]: 5.63933e-8 kg; = (3.00E-10/0.000238)*(amountWoodChips/densityWoodChipsBulkOD); lognormal variance with pedigree 0.488, pedigree (1,5,5,5,3)
  (same comment as for Acetaldehyde)
- Methane, non-fossil [air, unspecified]: 7.51911e-5 kg; = (0.0000004/0.000238)*(amountWoodChips/densityWoodChipsBulkOD); lognormal variance with pedigree 0.488, pedigree (1,5,5,5,3)
  (same comment as for Acetaldehyde)
- NMVOC, non-methane volatile organic compounds [air, unspecified]: 0.000112787 kg; = (0.0000006/0.000238)*(amountWoodChips/densityWoodChipsBulkOD); lognormal variance with pedigree 0.218, pedigree (1,5,5,5,3)
  (same comment as for Acetaldehyde)
- Nickel II [air, unspecified]: 1.12787e-6 kg; = (0.000000006/0.000238)*(amountWoodChips/densityWoodChipsBulkOD); lognormal variance with pedigree 0.488, pedigree (1,5,5,5,3)
  (same comment as for Acetaldehyde)
- Nitrogen oxides [air, unspecified]: 0.0238732 kg; = (0.000127/0.000238)*(amountWoodChips/densityWoodChipsBulkOD); lognormal variance with pedigree 0.148, pedigree (1,5,5,5,3)
  (same comment as for Acetaldehyde)
- PAH, polycyclic aromatic hydrocarbons [air, unspecified]: 2.08655e-6 kg; = (1.11E-08/0.000238)*(amountWoodChips/densityWoodChipsBulkOD); lognormal variance with pedigree 0.488, pedigree (1,5,5,5,3)
  (same comment as for Acetaldehyde)
- Particulate Matter, < 2.5 um [air, unspecified]: 0.00864698 kg; = (0.000046/0.000238)*(amountWoodChips/densityWoodChipsBulkOD); lognormal variance with pedigree 0.178, pedigree (1,5,5,5,3)
  (same comment as for Acetaldehyde)
- Pentachlorophenol [air, unspecified]: 1.52262e-9 kg; = (8.10E-12/0.000238)*(amountWoodChips/densityWoodChipsBulkOD); lognormal variance with pedigree 0.488, pedigree (1,5,5,5,3)
  (same comment as for Acetaldehyde)
- Phosphorus [air, unspecified]: 5.63933e-5 kg; = (0.0000003/0.000238)*(amountWoodChips/densityWoodChipsBulkOD); lognormal variance with pedigree 0.488, pedigree (1,5,5,5,3)
  (same comment as for Acetaldehyde)
- Potassium I [air, unspecified]: 0.00439868 kg; = (0.0000234/0.000238)*(amountWoodChips/densityWoodChipsBulkOD); lognormal variance with pedigree 0.488, pedigree (1,5,5,5,3)
  (same comment as for Acetaldehyde)
- Sodium I [air, unspecified]: 0.000244371 kg; = (0.0000013/0.000238)*(amountWoodChips/densityWoodChipsBulkOD); lognormal variance with pedigree 0.488, pedigree (1,5,5,5,3)
  (same comment as for Acetaldehyde)
- Sulfur dioxide [air, unspecified]: 0.000469944 kg; = (0.0000025/0.000238)*(amountWoodChips/densityWoodChipsBulkOD); lognormal variance with pedigree 0.488, pedigree (1,5,5,5,3)
  (same comment as for Acetaldehyde)
- Toluene [air, unspecified]: 5.63933e-5 kg; = (0.0000003/0.000238)*(amountWoodChips/densityWoodChipsBulkOD); lognormal variance with pedigree 0.488, pedigree (1,5,5,5,3)
  (same comment as for Acetaldehyde)
- Water [air, unspecified]: 0.0506442 m3; = ((WWMSoftwoodPlaned* softwoodPlaned +WWMSoftwood* softwoodRaw)-( WWMGlulam* amountRP+ WWMResidualWood* amountWoodWasteSold))*1e-3; lognormal variance with pedigree 0.010725, pedigree (3,2,4,2,1)
  Evaporated water during wood combustion.
  Calculated from the mass balance
- Zinc II [air, unspecified]: 5.63933e-5 kg; = (0.0000003/0.000238)*(amountWoodChips/densityWoodChipsBulkOD); lognormal variance with pedigree 0.488, pedigree (1,5,5,5,3)
  (same comment as for Acetaldehyde)
- m-Xylene [air, unspecified]: 2.25573e-5 kg; = (0.00000012/0.000238)*(amountWoodChips/densityWoodChipsBulkOD); lognormal variance with pedigree 0.488, pedigree (1,5,5,5,3)
  (same comment as for Acetaldehyde)

## Sampling procedure
Collected data from canadian producers located in Alberta, British-Columbia and Quebec. 55% of the surveyed production is located in Quebec.

## Extrapolations
See Geography.
The data for heat production from waste wood (inputs and emissions) have been extrapolated from ecoinvent 2.2 dataset “Wood chips, from industry, softwood, burned in furnace 300kW/CH”. The uncertainty has been adjusted accordingly.
