# breadcrumbs production

Dataset: EcoSpold 2, unit process
Geography: RoW
Time period: 2011-01-01 to 2023-12-31
Technology level: current
Classification: ISIC rev.4 ecoinvent: 1061:Manufacture of grain mill products
Scenario: Business-as-Usual
System model: Allocation, cut-off by classification
Generated by: [System]
Published in: Vázquez-Rowe, I. 2013
Database: ecoinvent
isCopyrightProtected: true
accessRestrictedTo: 1

## General comment
This activity represents the production of breadcrumbs in an ingredient and food additive processing plant. The flour used for the breadcrumbs is obtained from conventional wheat production. The wheat is then grinded at a milling plant to produce wheat flour and thereafter it is transported by trucks to an ingredient and food additive processing plant, where the breadcrumbs are procuded. Breadcrumbs are made up of 90% wheat flour, and less than 5% content of corn dextrose, sunflower oil, salt, yeast and spices.

## Included activities start
Activities include the production of all raw materials to produce the breadcrumbs, the grinding of wheat at a milling plant and the production of the final product.

## Included activities end
The transport of breadcrumbs beyond the gate of the ingredient and food additive plants were not included in the modelling. The amount of plastic used in packagin, not included in the database, is 1.41 grams per kilogram of breadcrumbs production.

## Time period
Data were collected for year 2011.

## Reference product
- breadcrumbs: 1 kg; By-product classification allocatable product; CPC 39120: Bran and other residues from the working of cereals or legumes; vegetable materials and vegetable waste, veget[…]; HS2017 230230: Bran, sharps and other residues; of wheat, whether or not in the form of pellets, derived from the sifting,[...]
  Breadcrumbs produced at a grain mill factory.
  production volume 0.7108 kg; name ProdVol
    GDP value at a worldwide level.
  property price 0.465247 EUR2005
    Calculated based on inputs: The price of the product has been calculated as a sum of the values of the material and energy inputs for this product. This value is therefore a rough estimation. It may underestimate the real price since there are additional expenses when producing any product. These expences can include for example labour costs, treatment of waste materials and profit for the producer. Please consider carefully whether this level of data quality is acceptable for your application.
  properties: carbon allocation 0.430825 kg, carbon content 0.475, carbon content, fossil 0, carbon content, non-fossil 0.475, dry mass 0.907 kg, water content 0.102536, water in wet mass 0.093 kg, wet mass 1 kg

## Inputs from technosphere
All rows: source Vázquez-Rowe, I. 2013
- electricity, medium voltage: 0.00236038, 0.0470843, 0.0158202, 0.00072283, 0.000144674, 3.10647e-5, 0.00486218 kWh (7 suppliers, which the file names only by identifier); sum of these 0.0710256 kWh; lognormal variance with pedigree 0.0426, pedigree (1,1,5,5,1)
  Electricity used at the plant for breadcrumb processing.
  Uncertainty: Data collection was performed directly with the company that processed the final products. Data from upstream processes were described by plant technicians based on data exhanged with other companies providing materials.
- heat, central or small-scale, natural gas: 0.765513 MJ; lognormal variance with pedigree 0.0426, pedigree (1,1,5,5,1)
  Heat from natural gas used for energy at the plant.
  Uncertainty: Data collection was performed directly with the company that processed the final products. Data from upstream processes were described by plant technicians based on data exhanged with other companies providing materials.
  properties: heating value, net 1 MJ
- sodium chloride, powder: 0.015 kg; lognormal variance with pedigree 0.0438, pedigree (2,1,5,5,2)
  Amount of salt needed in the production of the breadcrumbs.
  Uncertainty: Data collection was performed directly with the company that processed the final products. Data from upstream processes were described by plant technicians based on data exhanged with other companies providing materials.
  properties: dry mass 1 kg, wet mass 1 kg
- sugar, from sugar beet: 0.02 kg; lognormal variance with pedigree 0.0666, pedigree (4,5,5,5,3)
  Amount of sugar needed to produce the breadcrumbs.
  Uncertainty: Data collection was performed directly with the company that processed the final products. Data from upstream processes were described by plant technicians based on data exhanged with other companies providing materials.
  properties: carbon content, non-fossil 0.44, dry mass 1 kg, wet mass 1 kg
- tap water: 0.000981046, 0.00149552, 0.00279057, 0.00751759, 0.000904916, 0.0377112, 0.431548 kg (7 suppliers, which the file names only by identifier); sum of these 0.482949 kg; lognormal variance with pedigree 0.0426, pedigree (1,1,5,5,1)
  Water used in the ingredient and additive food plant.
  Uncertainty: Data collection was performed directly with the company that processed the final products. Data from upstream processes were described by plant technicians based on data exhanged with other companies providing materials.
  properties: carbon content, fossil 0.00178991, dry mass 0.000337476 kg, water content 2962.17, wet mass 1 kg
  note on carbon content, fossil: Bicarbonate content is 2.93 mol/m3. CO2 content is 0.1 mol/m3 (ecoinvent v2.2 report 8, Tab 93.1).
- vegetable oil, refined: 0.03 kg; lognormal variance with pedigree 0.0426, pedigree (1,1,5,5,1)
  Amount of sunflower oil added to produce the breadcrumbs.
  Uncertainty: Data collection was performed directly with the company that processed the final products. Data from upstream processes were described by plant technicians based on data exhanged with other companies providing materials.
  properties: carbon content, non-fossil 0.768, dry mass 1 kg, heating value, net 38.4 MJ, wet mass 1 kg
  note on heating value, net: Values is approximated from HHV from "vegetable oil, crude". Source: Radovanovic,M.; Zivanovic,T.; Stojiljkovic,D.; Jovanovic,V.; Jerinic,N.; Knezevic,S. et.al. Utilization of sunflower husk as a fuel for industrial boilers - 20 years experience. Proc. 5th Eur. Conf. on Industrial Furnaces&Boilers 2000,vol.2,p.221-233. Available at: https://phyllis.nl/Biomass/View/2152
- wastewater from vegetable oil refinery: -8.29487e-5 m3; name wastewater; lognormal variance with pedigree 0.0028, pedigree (1,1,2,5,1)
  Wastewater generated at the plant.
  Uncertainty: Data collection was performed directly with the company that processed the final products. Data from upstream processes were described by plant technicians based on data exhanged with other companies providing materials.
  production volume
    Considering worlwide GDP on basis= 1
  properties: carbon content, non-fossil 0.993118, dry mass 0.871801 kg, water content 1146.05, wet mass 1000 kg
- wheat flour: 5.8622e-6, 0.899994 kg (2 suppliers, which the file names only by identifier); sum of these 0.9 kg; lognormal variance with pedigree 0.0438, pedigree (2,1,5,5,2)
  Wheat flour used as main raw material to produce the breadcrumbs.
  Uncertainty: Data collection was performed directly with the company that processed the final products. Data from upstream processes were described by plant technicians based on data exhanged with other companies providing materials.
  properties: carbon content, non-fossil 0.475, digestable energy content 15.12 MJ/kg, dry mass 0.87 kg, water content 0.149425, wet mass 1 kg
  note on carbon content, non-fossil: Biogenic carbon content of vegetation and vegetation processed products on a dry mass basis (47.5% DM) derived from FAOSTAT. Reference: http://www.fao.org/forestry/17111/en
  note on digestable energy content: Weighted average based on breakdown of different wheat products produced for human consumption in South Africa and properties of each product (i.e. cake flour, self-raising flour, white bread flour, brown bread flour, industrial flour, whole wheat meal, and semolina). Breakdown calculated from the production figures from the SAGIS monthly production tables, retrieved online and properties for US consumer products also retrieved online (USDA, 2017). Reference(s): SAGIS (2017) Wheaten Products Manufactured per Month since July 2015, South African Grain Information Service. Available at: www.sagis.org.za. (Accessed Sept 2017); USDA (2017) USDA National Nutrient Database, United States Department of Agriculture Agricultural Research Service, Available at: https://ndb.nal.usda.gov/ndb/search/list. (Accessed October 2017).

## Emissions to nature
- Water [air, unspecified]: 0.000384615 m3; source Vázquez-Rowe, I. 2013; lognormal variance with pedigree 0.0506, pedigree (4,1,5,5,1)
  Evaporated water in the production process of the breadcrumbs.
  Uncertainty: Data collection was performed directly with the company that processed the final products. Data from upstream processes were described by plant technicians based on data exhanged with other companies providing materials.

## Sampling procedure
Data collection was performed directly with the company that processed the final products. Data from upstream processes were described by plant technicians based on data exhanged with other companies providing materials.

## Extrapolations
This dataset mayy be used for breadcrumbs production in other geographical contexts, provided that the uncertainty linked to geography, reliability and technology are considered.
