# sand quarry operation, open pit mine

Dataset: EcoSpold 2, unit process
Geography: BR
Time period: 2016-01-01 to 2023-12-31
Technology level: current
Classification: EcoSpold01Categories: construction materials/additives
Classification: ISIC rev.4 ecoinvent: 0810:Quarrying of stone, sand and clay
Synonyms: sand; natural sand; aggregate; open pit sand
Scenario: Business-as-Usual
System model: Allocation, cut-off by classification
Share of production covered: 0.12 %
Generated by: Fernanda Belizario Silva
Published in: Silva, F. B. 2017
Database: ecoinvent
isCopyrightProtected: true
accessRestrictedTo: 1

## General comment
This dataset describes the quarrying and processing of sand, usually applied in construction materials, from alluvial deposits in open pits in Brazil, which represents 30% of Brazilian production of sand for construction (MME, 2009), being the other 70% extracted from river beds. The wet sand mining process involves hydraulic mining of slopes and dredging of the pulp (sand and water) accumulated in the bottom of the pit, which is transported to the cyclone by pipes (therefore conveyor belts are not used in this process). Processing is done with the use of a cyclone for separating water and sand and classifying the sand particles according to its size: fine sand (between 0,15mm and 1,2 mm), medium sand (between 0,3 mm and 2,4 mm) and coarse sand (between 2,4 mm and 4,75 mm) - size classification is a commercial convention, based on the superseded version of ABNT NBR 7211. Sand is not washed and is only air dried (5% of humidity at the end of the process). The dataset includes the quarrying and size classification processes (information regarding weight proportion of sand particles according to its size not available though), as well as equipment maintenance. Machinery is taken into account within the dataset "diesel, burned in building machine", as most machinery runs on diesel. Administration buildings and the quarry’s end of life are not taken into account. Data were collected in 01 quarry located in the state of São Paulo, Brazil, which produces predominantly medium sand, with current technology. The representativeness of the dataset on a national scale is low (<1%).
MME - Ministério de Minas e Energia, 2009. Relatório Técnico 31 - Perfil da areia para construção civil. Available at: <http://www.mme.gov.br/documents/1138775/1256650/P22_RT31_Perfil_de_areia_para_construxo_civil.pdf/9745127c-6fdc-4b9f-9eda-13fa0146d27d>. Accessed 29.08.2017.
ABNT - Associação Brasileira de Normas Técnicas. ABNT NBR 7211 - Agregados para concreto - Especificação (National Standard).

## Included activities start
From the extraction of sand from the alluvial deposit by excavation and hydraulic mining. Removal of the top soil layer (overburden) is not considered.

## Included activities end
Includes the suctioning (by a dredge) of sand pulp originated from the hydraulic mining process and its pumping to the cyclone where sand is classified, the classification process, until the storage of sand in piles and its loading in trucks for delivery (but not the delivery itself). The dataset also includes the land use, with distinction of mineral extraction site, lakes (used for storing the water for hydraulic mining), internal unpaved roads and vegetated areas, based on information of the status of a quarry in 2016. Machinery is considered within the dataset "diesel burned in building machine". Recultivation of closed mines is not taken into account due to lack of data. No dust included because excavation is a "wet" process and water spray is used for dust control in internal transportation activities.

## Geography
This dataset represents production of sand representative for Brazil. Data come from primary data collection in Brazil.

## Technology
Current technology for wet process of open pit sand mining in Brazil.

## Time period
The time period is set to the year 2016 as the data were collected in the year 2016

## Reference product
- sand: 1 kg; By-product classification allocatable product; CPC 15310: Natural sands; HS2017 250590: Sands; natural, (other than silica and quartz sands), whether or not coloured, (other than metal-bearing sa[...]
  Sand used as aggregate for construction, usually applied in concrete production, mortar production, pavement layers, among others. According to the Brazilian standard ABNT NBR 7211, fine aggregates (which include sand) have a particle size of less than 4,75 mm. Sand sorted by grain size (information regarding weight proportion of sand particles according to its size not available).
  production volume 7.981e10 kg; name sand_PV
    Estimated value. Annual sand production volume of 2014 in Brazil according to DNPM (2015). 30% of sand production in Brazil is from open pits (MME, 2009). To adjust production volume for the year of 2016, cement production data from the National Union of the Cement Industry in Brazil (SNIC) for 2014 and 2016 were used, assuming that there is a direct correlation between cement and sand production.
  property price 0.00651133 EUR2005
    Price, average unit value, dollars per metric ton in 2022 of construction sand and gravel of 11 USD/metric ton. Same price for the products "sand" and "gravel, round", since they are quarried together. The price is the annual average free-on-board
    plant prices, usually at the first point of sale or captive use, as reported by construction-sand-and-gravel-producing companies. This value does not include transportation from the plant or yard to the consumer. it does, however, include all costs of mining, processing, in-plant transportation, overhead, and profit. Value retrieved from USGS, Mineral Commodity Summaries 2023, accessed on 20230918: https://pubs.usgs.gov/periodicals/mcs2023/mcs2023-sand-gravel.pdf from https://www.usgs.gov/centers/national-minerals-information-center/construction-sand-and-gravel-statistics-and
    The price was converted to EUR based on the annual exchange rates published by the European Central Bank (https://sdw.ecb.europa.eu/quickview.do?SERIES_KEY=120.EXR.A.USD.EUR.SP00.A, last accessed on 2023-06-01) and adjusted for inflation relative to 2005 using the producer price index (PPI) of the euro area, published by eurostat (https://ec.europa.eu/eurostat/databrowser/view/STS_INPP_A__custom_6416181/default/table?lang=en, last accessed on 2023-06-01).
  property water in wet mass 0.05 kg; name water_sand
  properties: carbon allocation 0 kg, carbon content 0, carbon content, fossil 0, carbon content, non-fossil 0, dry mass 0.95 kg, water content 0.0526316, wet mass 1 kg

## Inputs from technosphere
- building, hall: 1.13e-7 m2; lognormal variance with pedigree 0.3046, pedigree (2,4,3,1,1)
  Measured value. Total building hall area 560m², service life assumed equal to "building hall" information (25 years).
  Uncertainty: S
- diesel, burned in building machine: 0.0747802 MJ; = 2.08*(10^-3)* density * net_cal_value*42.8; lognormal variance with pedigree 0.0146, pedigree (2,4,3,1,1)
  Calculated value. Diesel consumption informed by manufacturer for all equipment (in L), including dredges, pumps and loaders.
  Uncertainty: B
  property density 0.84 kg/l; name density
  property heating value, net 1 MJ; name net_cal_value
- electricity, medium voltage: 0.00013 kWh; lognormal variance with pedigree 0.0908, pedigree (2,4,3,1,1)
  Measured value. Electricity consumption informed by manufacturer, for cyclone.
  Uncertainty: B
- scrap steel: -1.801e-5 kg; name scrap_steel; = steel_input; lognormal variance with pedigree 0.0106, pedigree (4,4,1,1,1)
  Estimation. Same amount as the input.
  Uncertainty: S
  production volume; = sand_PV * scrap_steel
    Calculated value. Refers to production volume of reference product using the relative outputs.
  properties: dry mass 1 kg, wet mass 1 kg
- steel, low-alloyed, hot rolled: 1.801e-5 kg; name steel_input; lognormal variance with pedigree 0.0066, pedigree (3,4,3,1,1)
  Measured value. Consumption informed by manufacturer for maintenance of equipment (replacement of old parts).
  Uncertainty: S
  properties: carbon content, fossil 0.005, dry mass 1 kg, wet mass 1 kg
  note on carbon content, fossil: Low alloyed steel composition given in Tab. 3.2 ecoinvent v2.2 report 10_partII. Steel assumed to have a C content of 0.5%
- synthetic rubber: 3.44e-6 kg; name rubber_input; lognormal variance with pedigree 0.0066, pedigree (3,4,3,1,1)
  (same comment as for steel, low-alloyed, hot rolled)
  properties: carbon content, fossil 0.871949, dry mass 1 kg, heating value, net 26.42 MJ, wet mass 1 kg
  note on carbon content, fossil: EPDM (Ethylene-propene-diene terpolymer) rubber is a terpolymer of ethylene, propene, and a diene with the residual unsaturated portion of the diene in the side chain (ecoinvent v2.2 report 7-part XX & Ullmann). Chemical formula (deduced from Evidences of Solvent-Induced Miscibility in Polychloroprene-co-Ethylene-Propene Diene Terpolymer Blends, Dubey et al., Journal of Applied Polymer Science, 2009, 111:1884-1891): C20H35
- waste rubber, unspecified: -3.44e-6 kg; name waste_rubber; = rubber_input; lognormal variance with pedigree 0.0106, pedigree (4,4,1,1,1)
  Estimation. Same amount as the input.
  Uncertainty: S
  production volume; = sand_PV * waste_rubber
    (same comment as for scrap steel)
  properties: carbon content, fossil 0.853, dry mass 1 kg, heating value, net 27.19 MJ, wet mass 1 kg
  note on heating value, net: Value taken from the general comment of the treatment dataset.

## Inputs from nature
- Occupation, mineral extraction site [natural resource, land]: 0.00398397 m2*year; = area_mes * lifetime; lognormal variance with pedigree 0.2277, pedigree (2,4,3,1,1)
  Calculated value. Occupied area x estimated lifespan of the quarry.
  Uncertainty: B
- Occupation, unspecified, natural (non-use) [natural resource, land]: 0.00105903 m2*year; = area_veg * lifetime; lognormal variance with pedigree 0.2277, pedigree (2,4,3,1,1)
  Calculated value. Occupied area x estimated lifespan of the quarry.
  Uncertainty: B
- Sand, unspecified [natural resource, in ground]: 0.95 kg; lognormal variance with pedigree 0.0126, pedigree (4,4,3,1,1)
  Estimation. No losses considered in the process. For 1 kg of wet sand for construction with 5% of humidity, 0.95 kg of sand comes from the environment
  Uncertainty: S
- Transformation, from unspecified [natural resource, land]: 0.000123 m2; name area_from; lognormal variance with pedigree 0.2277, pedigree (2,4,3,1,1)
  Measured value. Total area of the quarry was informed by the production manager for 2016. The area was divided by the total production volume of the quarry until 2016. Total production volume was calculated based on 2016 yearly production multiplied by previous time (41 years).
  Uncertainty: B
- Transformation, to mineral extraction site [natural resource, land]: 9.717e-5 m2; name area_mes; = area_from * 0.79; lognormal variance with pedigree 0.2277, pedigree (2,4,3,1,1)
  Measured value. Area of mineral extraction of the quarry and internal unpaved roads was informed by the production manager, together with the total area of the quarry.
  Uncertainty: B
  property lifetime 41 year; name lifetime
- Transformation, to unspecified, natural (non-use) [natural resource, land]: 2.583e-5 m2; name area_veg; = area_from * 0.21; lognormal variance with pedigree 0.2277, pedigree (2,4,3,1,1)
  Measured value. Vegetated area of the quarry was informed by the production manager, together with the total area of the quarry.
  Uncertainty: B
- Water, unspecified natural origin [natural resource, in ground]: 0.00020158 m3; = 1,58e-6+(0,2/1000); lognormal variance with pedigree 0.0726, pedigree (4,4,3,1,1)
  Calculated value. Water consumption reported for dust control estimated by manufacturer based on an average number of daily trips of water trucks that spray water over the facility. Water content of sand immediately after classification: 20% (estimated by manufacturer).
  Uncertainty: B

## Emissions to nature
- Water [air, unspecified]: 0.00015158 m3; = 1,58E-6+((0,2- water_sand)/1000); source Vionnet, S. 2012; lognormal variance with pedigree 0.098, pedigree (4,5,3,1,4)
  Estimation. Evaporation rate of water used for dust control of 100%, based on the evaporation rate for limestone mine (dust control) of Vionnet et al. 2012. Additional evaporation of water contained in the sand pulp.
  Uncertainty: S

## Sampling procedure
Production control data gathered in 01 quarry located in the state of São Paulo (Brazil), thus with limited representativeness on a national scale.
Data was collected via questionnaire developed by the dataset authors and filled in by the quarry production and environmental manager. Data represent 01 year of quarry operation (2016).
Unit flows were calculated by dividing the amounts of inputs and outputs by the total sand production in mass, regardless of sand particle size. Water emission (evaporation) was modelled considering an evaporation rate of 100% water used for dust control (Vionnet et al. 2012), plus the water evaporated during natural drying based on expert opinion. Basic uncertainty was estimated based on the variations observed for gravel extraction in Brazil (not standard uncertainty values, except for specific flows) and additional uncertainty was estimated using Pedigree scores.
The amount of the exchanges were calculated considering the average of the sample. No conversion to the geometric mean of the lognormal distribution was done, for consistency reasons with other ecoinvent datasets.

## Extrapolations
Data from a specific state (São Paulo) and a small sample (one quarry) is extrapolated to represent the production in the whole country (Brazil). Basic uncertainty levels were extrapolated from the Brazilian gravel production process. The representativeness of the dataset on a national scale is low (<1%). Pedigree scores for completeness have been adjusted accordingly.
