# gypsum quarry operation

Dataset: EcoSpold 2, unit process
Geography: RoW
Time period: 1997-01-01 to 2023-12-31
Technology level: current
Classification: EcoSpold01Categories: construction materials/others
Classification: ISIC rev.4 ecoinvent: 0810:Quarrying of stone, sand and clay
Synonyms: Gipsstein; calcium sulphate dihydrate; Kalziumsulfat dihydrat; anhydrite
Tags: combined production
Scenario: Business-as-Usual
System model: Allocation, cut-off by classification
Generated by: Emilia Moreno Ruiz
Published in: Kellenberger D. 2007
Database: ecoinvent
isCopyrightProtected: true
accessRestrictedTo: 1

## General comment
The multi-output-process 'mining, gypsum' delivers the co-products 'gypsum, mineral, at mine' and 'anhydrite rock, at mine'. Allocation is done by weight. In some mines anhydrite is not exploited but left in the mine. Since the electricity consumption has a relevant share on the total energy consumption, the choice of the energy mix is important. For gypsum mined in countries with high fossil share in the electricity mix this module has to be adopted accordingly.
[This dataset was already contained in the ecoinvent database version 2. It was not individually updated during the transfer to ecoinvent version 3. Life Cycle Impact Assessment results may still have changed, as they are affected by changes in the supply chain, i.e. in other datasets. This dataset was generated following the ecoinvent quality guidelines for version 2. It may have been subject to central changes described in the ecoinvent version 3 change report (http://www.ecoinvent.org/database/ecoinvent-version-3/reports-of-changes/), and the results of the central updates were reviewed extensively. The changes added e.g. consistent water flows and other information throughout the database. The documentation of this dataset can be found in the ecoinvent reports of version 2, which are still available via the ecoinvent website. The change report linked above covers all central changes that were made during the conversion process.]

## Included activities end
mining and crushing of gypsum and anhydrite

## Geography
data for Switzerland

## Technology
open pit mining; composition of products: 65% gypsum, 34% anhydrite, 1% others.

## Parameters
- sum of reference products: 1 kg; name sum_RP
  It's the addition of the different reference product's amount

## Reference product
- gypsum, mineral: 1 kg; name gypsum; = gypsum_PV/(anhydrite_rock_PV+ gypsum_PV); By-product classification allocatable product; CPC 15200: Gypsum; anhydrite; limestone flux; limestone and other calcareous stone, of a kind used for the manufacture of[…]; HS2017 252010: Gypsum; anhydrite; CAS 13397-24-5
  The amount was calculated relative to the production volumes.
  EcoSpold01Location=CH
  production volume 7.71634e10 kg; name gypsum_PV; = 122000000000*0.65
    2005 production volume of gypsum+anhydrite was obtained from USGS (minerals.usgs.gov/minerals/pubs/commodity/gypsum/myb1-2006-gypsu.xls).
    It was considered that 34% was anhydrite and 65% gypsum (ecoinvent v2.2 report 7)
  property price 0.005 EUR2005
    Temporary price data. Calculated as 90% of purchasers price based on: 2004 prices for gypsum, crude, at mine in USGS (2007) Mineral commodity summaries 2007. <http://minerals.usgs.gov/minerals/pubs/mcs/2007/mcs2007.pdf> [Accessed 25 May 2010] and USGS (2009a) Mineral commodity summaries 2009. <http://minerals.usgs.gov/minerals/pubs/mcs/2009/mcs2009.pdf> [Accessed 25 May 2010]; The prices from USGS are assumed to be World/USA prices because they were collected from USA, major producer countries or global market (e.g. London, Metal Exchange).
  properties: EcoSpold01Allocation_physical_1 65.7, EcoSpold01Allocation_physical_10 65.7, EcoSpold01Allocation_physical_11 65.7, EcoSpold01Allocation_physical_12 65.7, EcoSpold01Allocation_physical_13 65.7, EcoSpold01Allocation_physical_14 65.7, EcoSpold01Allocation_physical_15 65.7, EcoSpold01Allocation_physical_16 100, EcoSpold01Allocation_physical_2 65.7, EcoSpold01Allocation_physical_3 65.7, EcoSpold01Allocation_physical_4 65.7, EcoSpold01Allocation_physical_5 65.7, EcoSpold01Allocation_physical_6 65.7, EcoSpold01Allocation_physical_7 65.7, EcoSpold01Allocation_physical_8 65.7, EcoSpold01Allocation_physical_9 65.7, carbon allocation 0 kg, carbon content 0, carbon content, fossil 0, carbon content, non-fossil 0, dry mass 1 kg, water content 0, water in wet mass 0 kg, wet mass 1 kg

## Inputs from technosphere
- blasting: 7.73e-5 kg; = (7.73E-05/sum_RP)*( anhydrite_rock+gypsum); lognormal variance with pedigree 0.07, pedigree (1,4,5,1,3)
  EcoSpold01Location=RER
- conveyor belt: 1.05e-8 m; = (1.05E-08/sum_RP)*( anhydrite_rock+gypsum); lognormal variance with pedigree 0.44, pedigree (5,4,5,1,3)
  EcoSpold01Location=RER
- diesel, burned in building machine: 0.018 MJ; = (0.018/sum_RP)*( anhydrite_rock+gypsum); lognormal variance with pedigree 0.19, pedigree (1,4,5,1,3)
  EcoSpold01Location=GLO
  properties: heating value, net 1 MJ
- electricity, medium voltage: 5.82353e-8, 6.63295e-6, 8.41362e-7, 7.48322e-8, 6.52455e-6, 2.89823e-8, 8.54979e-6, 1.85775e-7, 9.05427e-6, 4.6118e-6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 kWh (74 suppliers, which the file names only by identifier); sum of these 0.000916 kWh; = (0.000916/sum_RP)*( anhydrite_rock+gypsum); lognormal variance with pedigree 0.072, pedigree (3,4,5,1,3)
  EcoSpold01Location=CH
- industrial machine, heavy, unspecified: 4.63e-6 kg; = (4.63E-06/sum_RP)*( anhydrite_rock+gypsum); lognormal variance with pedigree 0.372, pedigree (3,4,5,1,3)
  EcoSpold01Location=RER
- limestone quarry infrastructure: 5.26e-11 unit; = (5.26E-11/sum_RP)*( anhydrite_rock+gypsum); lognormal variance with pedigree 0.372, pedigree (3,4,5,1,3)
  EcoSpold01Location=CH
- recultivation, limestone mine: 1.85e-5 m2; = (1.85E-05/sum_RP)*( anhydrite_rock+gypsum); lognormal variance with pedigree 0.19, pedigree (4,4,5,1,1)
  EcoSpold01Location=CH

## Inputs from nature
- Gypsum [natural resource, in ground]: 1 kg; = (1/sum_RP)*( anhydrite_rock+gypsum); lognormal variance with pedigree 0.04, pedigree (1,1,5,1,1)
  definition
- Occupation, mineral extraction site [natural resource, land]: 0.000185 m2*year; = (0.000185/sum_RP)*( anhydrite_rock+gypsum); lognormal variance with pedigree 0.11, pedigree (4,4,5,1,1)
- Transformation, from unspecified [natural resource, land]: 1.85e-5 m2; = (1.85E-05/sum_RP)*( anhydrite_rock+gypsum); lognormal variance with pedigree 0.19, pedigree (4,4,5,1,1)
- Transformation, to mineral extraction site [natural resource, land]: 1.85e-5 m2; = (1.85E-05/sum_RP)*( anhydrite_rock+gypsum); lognormal variance with pedigree 0.19, pedigree (4,4,5,1,1)

## Emissions to nature
- Particulate Matter, < 2.5 um [air, non-urban air or from high stacks]: 8e-5 kg; = (8E-05/sum_RP)*( anhydrite_rock+gypsum); lognormal variance with pedigree 0.4281, pedigree (1,5,5,3,4)
- Particulate Matter, > 10 um [air, non-urban air or from high stacks]: 0.00112 kg; = (0.00112/sum_RP)*( anhydrite_rock+gypsum); lognormal variance with pedigree 0.1681, pedigree (1,5,5,3,4)
- Particulate Matter, > 2.5 um and < 10um [air, non-urban air or from high stacks]: 0.0004 kg; = (0.0004/sum_RP)*( anhydrite_rock+gypsum); lognormal variance with pedigree 0.2481, pedigree (1,5,5,3,4)

## Sampling procedure
environmental report, literature

## Review by Bo Weidema 2012-05-31
Passed. Formulas have been added to enable automatic sub-division of this combined production dataset, following ecoinvent v3 procedures (thus avoiding allocation).
