# sweet corn production

Dataset: EcoSpold 2, unit process
Geography: US-MN
Time period: 2014-01-01 to 2023-12-31
Technology level: current
Classification: ISIC rev.4 ecoinvent: 0111:Growing of cereals (except rice), leguminous crops and oil seeds
Synonyms: Zea mays L., corn
Scenario: Business-as-Usual
System model: Allocation, cut-off by classification
Generated by: Juanita Barrera
Database: ecoinvent
isCopyrightProtected: true
accessRestrictedTo: 1

## General comment
This dataset represents the production of 1 kg of Sweet Corn (fresh matter) in the US state of Minnesota at farm, with an at harvest moisture content of 76.%. This dataset includes cultivation of the field prior to planting, field treatments, planting, applications of nutrients and pesticides, and harvest. Residues are not collected but remain on the field post-harvest and overwinter.
The average yield of Sweet Corn grown in Minnesota for the 2014-2021 seasons was 16,813 kg/ha (wet mass) (USDA NASS (2022a)). The dataset reflects the average Sweet Corn produced in Minnesota from 2014 to 2021, inclusive, as that period allows for at least one value from USDA statistics for most parameters and generally three or more. Seed establishment and weed control for sweet corn generally require tillage (EPA 2022; IPM 2003, IPM 1997), so this dataset reflects sweet corn production using conventional tillage practices (0% no till, 0% reduced till, 100% conventional tillage) (EPA 2022; IPM center 2003; IPM center 1997 data) and being grown in rotations with other vegetable crops. While genetically engineered sweet (fresh) corn seed is available, the share of sweet (fresh) corn grown from genetically engineered seed is not compiled; it is estimated that between 75 and 90% of North American sweet corn is conventional (USDA 2018b).
Area, productivity, use of mineral and organic fertilisers and pesticides, and irrigation inputs are based on farmer data reported to the U.S. Department of Agriculture where possible or budgets available for the state, unless otherwise noted. Field operations and equipment types and fuel use are based on materials provided to growers by the agricultural extension office(s), including farm budgets, and on survey information agricultural extension office(s) collect from growers, in conjunction with row spacing data from USDA. 57.6% of crop land has installed drainage (tile or ditch), based on state-level agricultural survey data from USDA. Irrigation is included based on share of crop irrigated (13.5% over the time period, USDA NASS (2018d)).
Total cropland land use, for all crops, in Minnesota increased by 1% between 1997 and 2017 (NRCS 2020); USDA NASS does not report cropped area for Sweet Corn prior to 2016.
Soil characteristics, including pH, are based on distribution of soil pH sampling results reported in the 2020 Soil Test Summary (Bruulsema and Jones 2021). The share of acidic soils is likely overestimated as more frequent testing is to be expected on soils having needed lime and thus low pH soils are likely to be more represented amongst the collected samples. No anti-erosion practices are assumed in the dataset; instead, the erosion soil loss reported in the U.S. Natural Resources Conservation Service's Natural Resource Inventory is used.
References:
USDA NASS (2022a) Area, Production, Yield by State - Sweet Corn - 2016-2022. US Department of Agriculture (USDA) National Agricultural Statistics Service. https://quickstats.nass.usda.gov (direct query: https://quickstats.nass.usda.gov/results/5E5B411A-F9EF-3B83-AAFF-995DD89820FC)
USDA NASS (2018b) Statistical Methodology Name of Survey: Agricultural Resource Management Survey (ARMS) Phase II: PeanutProduction Practices Report, CornProduction Practices Report, and Soybean Production Practices Cost Report. US Department of Agriculture (USDA). https://www.nass.usda.gov/Surveys/Guide_to_NASS_Surveys/Chemical_Use/2018_Peanuts_Soybeans_Corn/Statistical%20Methodology%202018.pdf
IPM center (1997) Crop Profile for Corn (Sweet) in Maryland. Southern Integrated Pest Management Center. https://ipmdata.ipmcenters.org/documents/cropprofiles/MDcorn-sweet.pdf
IPM center (2003) Crop Profile for Sweet Corn in the North Central United States. Southern Integrated Pest Management Center.Southern Integrated Pest Management Center. https://ipmdata.ipmcenters.org/documents/cropprofiles/us-ncr-sweetcorn.pdf
EPA (2022) Assessment of the Benefits of Atrazine and the Impacts of Potential Mitigation for Field Corn, Sweet Corn, Sorghum, and Sugarcane; PC Code (080803). (MEMORANDUM).US Environmental Protection Agency. https://downloads.regulations.gov/EPA-HQ-OPP-2013-0266-1624/content.pdf
USDA NASS (2018d) 2018 Irrigation and Water Management Survey (2017 Census of Agriculture).US Department of Agriculture (USDA). https://www.nass.usda.gov/Publications/AgCensus/2017/Online_Resources/Farm_and_Ranch_Irrigation_Survey/index.php
NRCS (2020) Land Cover/use of non-Federal rural land, by State and year, in the 2017 National Resources Inventory. USDA, Natural Resources Conservation Service. http://www.nrcs.usda.gov/Internet/NRCS_RCA/reports/nri_crop_nat.html, https://www.nrcs.usda.gov/wps/portal/nrcs/rca/national/technical/nra/rca/text/#NRI%20Cropland
Bruulsema and Jones 2021. Soil Test Summary 2020. Foundation for Agronomic Research and Plant Nutrition Canada present this 2020 summary of soil test levels in North America. Foundation for Agronomic Research, Plant Nutrition Canada. https://soiltest.tfi.org/about/about_soil_test_summaryaccessed August 30, 2021

## Included activities start
This activity starts with soil cultivation after the harvest of the previous crop.

## Included activities end
This dataset includes cultivation of the field prior to planting, field treatments, planting, applications of nutrients and pesticides, and harvest. It ends with harvested sweet corn at the farm gate, prior to storage.

## Geography
Production of Sweet Corn in Minnesota (US-MN).

## Technology
This dataset reflects current practice for Sweet Corn in Minnesota as of 2022.

## Time period
The valid period covers 2014-01-01 through 2021-12-31 based on primary data sources. The production volumes, areas and applications are covered by data throughout the time period (annual for production and area, alternate years for applications). Because the specific pesticides used show time-dependent trends, the most recent 2 years of data are used to avoid underweighting the most dominant pesticides currently used and to avoid skewing impacts based on compounds no longer in use. Field operations are based on enterprise crop budgets and other guidance and change little year to year. State specific guidance for Minnessota is not available. Field operations are assumed as Wisconsin.

## Reference product
- sweet corn: 1 kg; By-product classification allocatable product; CPC 01290: Vegetables, fresh, n.e.c.; HS2017 070999: Vegetables; edible, n.e.c. in chapter 07, fresh or chilled
  This dataset represents the production of 1 kg of Sweet Corn (fresh matter) in the US state of Minnesota at farm, with an at harvest moisture content of 76.%. This dataset includes cultivation of the field prior to planting, field treatments, planting, applications of nutrients and pesticides, and harvest. Residues are not collected but remain on the field post-harvest and overwinter.
  production volume 708508 kg; name pv_corn
    Average annual production of maize grain in Minnesota 2016-2021: 0.7 Mt/year (source SWEET CORN - PRODUCTION, MEASURED IN Metric Tonne (converted from CWT = 100lb) US Department of Agriculture (USDA NASS) 2021a (direct query https://quickstats.nass.usda.gov/results/331F88CC-004E-34D2-B825-F8F65DAC7879)
  property carbon content, non-fossil 0.475
    Biogene carbon content on a dry matter basis (47.5%) derived from FAOSTAT. Reference: http://www.fao.org/forestry/17111/en.
  property energy content 4.488 MJ
    {3,3,1,3,5} The gross energy content of Sweet Corn is 18.7MJ/kg on a dry matter basis, 87.2% dry matter as fed for North American Sweet Corn (Feedipedia - Maize 2017). At the harvest moisture content of 76.% (Neibauer, J. and Maynard, E. 2012), the energy content of Sweet Corn is 4.5MJ/kg product weight
    Source(s):
    Heuzé V., Tran G., Lebas F. (2017) Maize grain. Feedipedia, a programme by INRAE, CIRAD, AFZ and FAO. https://www.feedipedia.org/node/556 Last updated on September 7, 2017, 14:29. ; Neibauer, J. and Maynard, E. (2012) Sweetcorn Produce Quality and Safety. Purdue University. https://www.hort.purdue.edu/prod_quality/commodities/sweetcorn.html
  property price 0.0727254 EUR2005
    The price per kg of sweetcorn is considered for the years 2016-2021 for the state of Minnesota in the US. The values were retrieved in $/CWT [1] and converted into $/kg. References: [1] US Department of Agriculture (NASS), Quickstat, TabLe "SWEETCORN - PRICE RECEIVED, MEASURED IN $ / CWT", accessed on 25.08.2023, available at: https://quickstats.nass.usda.gov/
    The prices were converted to EUR based on the annual exchange rates published by the European Central Bank (https://sdw.ecb.europa.eu/quickview.do?SERIES_KEY=120.EXR.A.AUD.EUR.SP00.A, last accessed on 2023-06-01) and adjusted for inflation relative to 2005 using the producer price index (PPI) of the euro area, published by eurostat (https://ec.europa.eu/eurostat/databrowser/view/STS_INPP_A__custom_6416181/default/table?lang=en, last accessed on 2023-06-01).
  properties: carbon allocation 0.114 kg, carbon content 0.475, carbon content, fossil 0, dry mass 0.24 kg, water content 3.16667, water in wet mass 0.76 kg, wet mass 1 kg

## Inputs from technosphere
- NPK (15-15-15) fertiliser: 0.00307666 kg; lognormal variance with pedigree 0.0046, pedigree (1,4,3,1,1)
  3.08E-3 kg NPK (15-15-15) fertiliser/kg Sweet Corn
  Quantities of specific fertiliser are calculated based on US fertiliser market share and nutrient compositions from IFA data to meet total nutrient demand N-P-K-S: 120.89--26.65--30.6--1.06 kg/ha (USDA NASS data for 2018), over reported cropped area of specified crop (conventional tillage): quantity of N applied to treated acres times percent of planted sweetcorn acres (USDA NASS) times share of N supplied by compound in U.S. consumption mix (ecoinvent and IFA 2019) times mass compound per mass N in compound.
  Sources:
  USDA NASS (2022c) SWEETCORN - APPLICATIONS, MEASURED IN LB / ACRE / YEAR, AVG (fertilizer and pesticides, amount, number of applications) - 2000-2021. US Department of Agriculture (USDA) National Agricultural Statistics Service. https://quickstats.nass.usda.gov/#5E5B411A-F9EF-3B83-AAFF-995DD89820FC; Ecoinvent U.S. consumption mix for N fertilisers, from IFA data; IFA (2021) Nutrient content in percentage - IFA Fertilizer Converter. International Fertilizer Association. https://www.ifastat.org/converter/fertilizer-converter/accessed 2021-06-24
  properties: dry mass 1 kg, nitrogen content 0.15, phosphorus content 0.15, potassium content 0.15, wet mass 1 kg
  note on nitrogen content: Nitrogen content (on a dry matter basis) of NPK (15-15-15) fertiliser is calculated from the molecular formula of the substance ().
  note on phosphorus content: Phosphorus content (on a dry matter basis) of NPK (15-15-15) fertiliser is calculated from the molecular formula of the substance ().
  note on potassium content: Potassium content (on a dry matter basis) of NPK (15-15-15) fertiliser is calculated from the molecular formula of the substance ().
- [sulfonyl]urea-compound: 1.39807e-5 kg; normal variance with pedigree 1.7543e-13, pedigree (2,3,3,3,1)
  This exchange is an aggregate of proxies for applied pesticide(s) SAFLUFENACIL, Halosulfuron-methyl, Tembotrione, Hexythiazox, Novaluron (2.222E-2 kg/ha {1,2,2,1,1}; 1.113E-1 kg/ha {1,2,2,1,1}; 3.038E-2 kg/ha {1,2,2,1,1}; 3.69E-2 kg/ha {1,2,2,1,1}; 3.428E-2 kg/ha {1,2,2,1,1}, respectively).
  Data reported a quantity of total insecticides/herbicides/fungicides applied in sweet corn is sometimes available even when many of the substances in the category are reported with a “D”. If this total is available, the amount remaining after the sum of substance-specific values is accounted for is divided equally among the substances reported with a “D”. If the sum of available values exceeds or equals the total reported, any remaining “D” substances are treated as zero and omitted.
  From SWEETCORN - APPLICATIONS, MEASURED IN LB / ACRE / YEAR, AVG (fertilizer and pesticides, amount, number of applications) - 2000-2021, https://quickstats.nass.usda.gov/#5E5B411A-F9EF-3B83-AAFF-995DD89820FC
  properties: carbon content, fossil 0.540853, dry mass 1 kg, wet mass 1 kg
- [thio]carbamate-compound: 0.000164273 kg; normal variance with pedigree 2.02286e-9, pedigree (2,3,3,3,1)
  This exchange is an aggregate of proxies for applied pesticide(s) Flubendiamide, Indoxacarb, Methomyl, Carbaryl (2.611E-2 kg/ha {1,2,2,1,1}; 3.428E-2 kg/ha {1,2,2,1,1}; 2.64E+0 kg/ha {1,2,2,1,1}; 6.101E-2 kg/ha {1,2,2,1,1}, respectively).
  Data reported a quantity of total insecticides/herbicides/fungicides applied in sweet corn is sometimes available even when many of the substances in the category are reported with a “D”. If this total is available, the amount remaining after the sum of substance-specific values is accounted for is divided equally among the substances reported with a “D”. If the sum of available values exceeds or equals the total reported, any remaining “D” substances are treated as zero and omitted.
  From SWEETCORN - APPLICATIONS, MEASURED IN LB / ACRE / YEAR, AVG (fertilizer and pesticides, amount, number of applications) - 2000-2021, https://quickstats.nass.usda.gov/#5E5B411A-F9EF-3B83-AAFF-995DD89820FC
  properties: carbon content, fossil 0.626349, dry mass 1 kg, wet mass 1 kg
- acetamide-anillide-compound, unspecified: 6.61903e-6 kg; normal variance with pedigree 1.07969e-13, pedigree (2,3,3,3,1)
  Proxy for applied pesticide(s) Dimethenamid-P (1.113E-1 kg/ha {1,2,2,1,1}).
  Data reported a quantity of total insecticides/herbicides/fungicides applied in sweet corn is sometimes available even when many of the substances in the category are reported with a “D”. If this total is available, the amount remaining after the sum of substance-specific values is accounted for is divided equally among the substances reported with a “D”. If the sum of available values exceeds or equals the total reported, any remaining “D” substances are treated as zero and omitted.
  From SWEETCORN - APPLICATIONS, MEASURED IN LB / ACRE / YEAR, AVG (fertilizer and pesticides, amount, number of applications) - 2000-2021, https://quickstats.nass.usda.gov/#5E5B411A-F9EF-3B83-AAFF-995DD89820FC
  properties: carbon content, fossil 0.659175, dry mass 1 kg, wet mass 1 kg
- ammonia, anhydrous, liquid: 0.00216744 kg; lognormal variance with pedigree 0.0046, pedigree (1,4,3,1,1)
  2.17E-3 kg ammonia, anhydrous, liquid/kg Sweet Corn.
  Ecoinvent U.S. consumption mix for N fertilisers, from IFA data N-P-K-S: 120.89--26.6--30.6--1.06 kg/ha (USDA NASS data for 2018)over reported cropped area of specified crop (conventional tillage): quantity of N applied to treated acres times percent of planted sweetcorn acres (USDA NASS) times share of N supplied by compound in U.S. consumption mix (ecoinvent and IFA 2019) times mass compound per mass N in compound.
  Sources:
  USDA NASS (2022c) SWEETCORN - APPLICATIONS, MEASURED IN LB / ACRE / YEAR, AVG (fertilizer and pesticides, amount, number of applications) - 2000-2021. US Department of Agriculture (USDA) National Agricultural Statistics Service. https://quickstats.nass.usda.gov/#5E5B411A-F9EF-3B83-AAFF-995DD89820FC; Ecoinvent U.S. consumption mix for N fertilisers, from IFA data; IFA (2021) Nutrient content in percentage - IFA Fertilizer Converter. International Fertilizer Association. https://www.ifastat.org/converter/fertilizer-converter/accessed 2021-06-24
  properties: dry mass 1 kg, wet mass 1 kg
- ammonium nitrate: 0.000333012 kg; lognormal variance with pedigree 0.0046, pedigree (1,4,3,1,1)
  3.33E-4 kg ammonium nitrate/kg Sweet Corn.
  Ecoinvent U.S. consumption mix for N fertilisers, from IFA data N-P-K-S: 120.89--26.6--30.6--1.06 kg/ha (USDA NASS data for 2018)over reported cropped area of specified crop (conventional tillage): quantity of N applied to treated acres times percent of planted sweetcorn acres (USDA NASS) times share of N supplied by compound in U.S. consumption mix (ecoinvent and IFA 2019) times mass compound per mass N in compound.
  Sources:
  USDA NASS (2022c) SWEETCORN - APPLICATIONS, MEASURED IN LB / ACRE / YEAR, AVG (fertilizer and pesticides, amount, number of applications) - 2000-2021. US Department of Agriculture (USDA) National Agricultural Statistics Service. https://quickstats.nass.usda.gov/#5E5B411A-F9EF-3B83-AAFF-995DD89820FC; Ecoinvent U.S. consumption mix for N fertilisers, from IFA data; IFA (2021) Nutrient content in percentage - IFA Fertilizer Converter. International Fertilizer Association. https://www.ifastat.org/converter/fertilizer-converter/accessed 2021-06-24
  properties: dry mass 1 kg, wet mass 1 kg
- ammonium nitrate phosphate: 0.000301241 kg; lognormal variance with pedigree 0.0046, pedigree (1,4,3,1,1)
  3.01E-4 kg ammonium nitrate phosphate/kg Sweet Corn.
  Ecoinvent U.S. consumption mix for N fertilisers, from IFA data N-P-K-S: 120.89--26.6--30.6--1.06 kg/ha (USDA NASS data for 2018)over reported cropped area of specified crop (conventional tillage): quantity of N applied to treated acres times percent of planted sweetcorn acres (USDA NASS) times share of N supplied by compound in U.S. consumption mix (ecoinvent and IFA 2019) times mass compound per mass N in compound.
  Sources:
  USDA NASS (2022c) SWEETCORN - APPLICATIONS, MEASURED IN LB / ACRE / YEAR, AVG (fertilizer and pesticides, amount, number of applications) - 2000-2021. US Department of Agriculture (USDA) National Agricultural Statistics Service. https://quickstats.nass.usda.gov/#5E5B411A-F9EF-3B83-AAFF-995DD89820FC; Ecoinvent U.S. consumption mix for N fertilisers, from IFA data; IFA (2021) Nutrient content in percentage - IFA Fertilizer Converter. International Fertilizer Association. https://www.ifastat.org/converter/fertilizer-converter/accessed 2021-06-24
  properties: dry mass 1 kg, nitrogen content 0.22, phosphorus content 0.0960126, wet mass 1 kg
  note on nitrogen content: Nitrogen content (on a dry matter basis) of ammonium nitrate phosphate is calculated from the molecular formula of the nutrient present in the substance.
  note on phosphorus content: Phosphorus content (on a dry matter basis) of ammonium nitrate phosphate is calculated from the molecular formula of the nutrient present in the substance.
- ammonium sulfate: 0.00109082 kg; lognormal variance with pedigree 0.0046, pedigree (1,4,3,1,1)
  1.09E-3 kg Max/kg Sweet Corn.
  Ecoinvent U.S. consumption mix for N fertilisers, from IFA data N-P-K-S: 120.89--26.6--30.6--1.06 kg/ha (USDA NASS data for 2018)over reported cropped area of specified crop (conventional tillage): quantity of N applied to treated acres times percent of planted sweetcorn acres (USDA NASS) times share of N supplied by compound in U.S. consumption mix (ecoinvent and IFA 2019) times mass compound per mass N in compound.
  Sources:
  USDA NASS (2022c) SWEETCORN - APPLICATIONS, MEASURED IN LB / ACRE / YEAR, AVG (fertilizer and pesticides, amount, number of applications) - 2000-2021. US Department of Agriculture (USDA) National Agricultural Statistics Service. https://quickstats.nass.usda.gov/#5E5B411A-F9EF-3B83-AAFF-995DD89820FC; Ecoinvent U.S. consumption mix for N fertilisers, from IFA data; IFA (2021) Nutrient content in percentage - IFA Fertilizer Converter. International Fertilizer Association. https://www.ifastat.org/converter/fertilizer-converter/accessed 2021-06-24
  properties: dry mass 1 kg, wet mass 1 kg
- application of plant protection product, by field sprayer: 0.000237915 ha; lognormal variance with pedigree 0.0206, pedigree (4,4,3,1,3)
  4.00 ha/ha (2.38E-4 ha/kg Sweet Corn) application of plant protection product, by sprayer
  The dataset has an effective number of passes for application of pesticides of 2.37 ha: 1.03 applications of herbicides on 26.8% of cropped area, 2.15 applications of insecticides on 70.0% of cropped area, 1.10 applications of fungicides on 53.7% of cropped area (USDA NASS 2022d). Application by sprayer accounts for 100% (2.37 passes) WI NASS (2021) Wisconsin Custom Rate Guide 2020. USDA, NASS, Wisconsin Field Office. https://www.nass.usda.gov/Statistics_by_State/Wisconsin/Publications/WI-CRate20.pdf
  Field operations are as identified in crop- and rotation-specific enterprise crop budgets supplied by the regional agricultural extension office and matched to equipment type in the budget or crop guidance unless otherwise noted. (UWM Extension 2014, Hanna, Mark 2016, Schuler and Frank 1998, Lattz and Schnitkey 2021b). Operations are matched to equipment type and where multiple options are available, the share of each is determined from guidance and annual farmer survey data (Custom Rate Summaries) for contracted operations/equipment.
  Source(s):
  WI NASS (2021) Wisconsin Custom Rate Guide 2020. USDA, NASS, Wisconsin Field Office. https://www.nass.usda.gov/Statistics_by_State/Wisconsin/Publications/WI-CRate20.pdf; DeBruin J and Butzen S (2020) Nitrogen uptake by corn . Pioneer. https://www.pioneer.com/us/agronomy/nitrogen_uptake_corn.htmlaccessed 11-20-2021; NAAA (2020) Letter to the South Dakota Public Utilities Commission, July 30, 2020. National Agricultural Aviation Association. https://puc.sd.gov/commission/dockets/electric/2021/EL21-018/prefiledexhibits/MBExhH.pdf; NAAA (2019) NAAA Member Survey Report. National Agricultural Aviation Association. https://www.agaviation.org/; Wilde M (2010) "Dusting crops a boon, necessity for farmers," in the WFC Courier, August 16, 2010.https://iowadot.gov/aviation/news/pdfs/Dusting%20crops%20a%20boonnecessity%20for%20farmers.pdf; FAA (2019) Table 5.1 - 2019 GENERAL AVIATION AND PART 135 TOTAL FUEL CONSUMED AND AVERAGE FUEL CONSUMPTION RATE BY AIRCRAFT TYPE, Table 3.2 - 2019 GENERAL AVIATION AND PART 135 TOTAL HOURS FLOWN BY ACTUAL USE BY AIRCRAFT TYPE. Federal Aviation Administration. https://www.faa.gov/data_research/aviation_data_statistics/general_aviation/CY2019/; Fritz B (2018) “Best Practices for Aerial Application” in EPA webinar series "Pesticide Spray Drift Series—3 Parts". USDA. https://www.epa.gov/sites/default/files/2019-04/documents/best-practices-for-aerial-application-slides.pdf; Lattz and Schnitkey (2021a) Machinery Cost Estimates: Summary. Department of Agricultural and Consumer Economics, University of Illinois at Urbana-Champaign. https://farmdoc.illinois.edu/assets/management/machinery-costs/machinery-cost-estimates_summary.pdf; Lattz and Schnitkey (2021b) Machinery Cost Estimates: Field Operations. Department of Agricultural and Consumer Economics, University of Illinois at Urbana-Champaign. https://farmdoc.illinois.edu/assets/management/machinery-costs/field_operations.pdf; Lattz and Schnitkey (2021c) Machinery Cost Estimates: Harvesting. Department of Agricultural and Consumer Economics, University of Illinois at Urbana-Champaign. https://farmdoc.illinois.edu/assets/management/machinery-costs/harvest_operations_2021.pdf; Lattz and Schnitkey (2021d) Machinery Cost Estimates: Tractors. Department of Agricultural and Consumer Economics, University of Illinois at Urbana-Champaign. https://farmdoc.illinois.edu/assets/management/machinery-costs/tractor_costs_2021.pdf; Swanson, Schnitkey, Paulson, Zulauf, Coppess (2020a) "Cost Management: Tillage Operations." farmdoc daily (10):151. Department of Agricultural and Consumer Economics, University of Illinois at Urbana-Champaign. https://farmdocdaily.illinois.edu/wp-content/uploads/2020/08/fdd180820.pdf; Swanson, Schnitkey, Paulson, Zulauf, Coppess (2020b) "Cost Management: Harvest Operations." farmdoc daily (10):158. Department of Agricultural and Consumer Economics, University of Illinois at Urbana-Champaign. https://farmdocdaily.illinois.edu/wp-content/uploads/2020/09/fdd010920.pdf; Kanissery et al. (2022) CHAPTER 17. SWEET CORN PRODUCTION. University of Florida's Institute of Food and Agricultural Sciences. https://edis.ifas.ufl.edu/publication/cv135; Liu et al (2022b) CHAPTER 2. FERTILIZER MANAGEMENT FOR VEGETABLE PRODUCTION IN FLORIDA. University of Florida's Institute of Food and Agricultural Sciences. https://edis.ifas.ufl.edu/publication/cv296; IPM (2002) Crop Profile for Corn (Sweet) in Florida. Integrated Pest Management. https://ipmdata.ipmcenters.org/documents/cropprofiles/FLSweetcorn2002.pdf; () ; USDA NASS (2022c) SWEETCORN - APPLICATIONS, MEASURED IN LB / ACRE / YEAR, AVG (fertilizer and pesticides, amount, number of applications) - 2000-2021. US Department of Agriculture (USDA) National Agricultural Statistics Service. https://quickstats.nass.usda.gov/#5E5B411A-F9EF-3B83-AAFF-995DD89820FC; UWM Extension (2014) Pricing, Contracts & Budgets. Cooperative Extension Service, University of Wisconsin-Madison. https://farms.extension.wisc.edu/article-topic/pricing-and-contracts/, Hanna, Mark (2016) Estimating the Field Capacity of Farm Machines. Cooperative Extension Service, Iowa State University of Science and Technology. https://www.extension.iastate.edu/agdm/crops/pdf/a3-24.pdf, Schuler and Frank (1998) A3510 Estimating Agricultural Field Machinery Costs. University of Wisconsin-Extension. https://learningstore.uwex.edu/Assets/pdfs/A3510.pdf, Lattz and Schnitkey (2021b) Machinery Cost Estimates: Field Operations. Department of Agricultural and Consumer Economics, University of Illinois at Urbana-Champaign. https://farmdoc.illinois.edu/assets/management/machinery-costs/field_operations.pdf
- atrazine: 3.07477e-5 kg; normal variance with pedigree 2.01109e-10, pedigree (2,3,3,3,1)
  applied pesticide(s) Atrazine (5.17E-1 kg/ha {1,2,2,1,1}).
  Data reported a quantity of total insecticides/herbicides/fungicides applied in sweet corn is sometimes available even when many of the substances in the category are reported with a “D”. If this total is available, the amount remaining after the sum of substance-specific values is accounted for is divided equally among the substances reported with a “D”. If the sum of available values exceeds or equals the total reported, any remaining “D” substances are treated as zero and omitted.
  From SWEETCORN - APPLICATIONS, MEASURED IN LB / ACRE / YEAR, AVG (fertilizer and pesticides, amount, number of applications) - 2000-2021, https://quickstats.nass.usda.gov/#5E5B411A-F9EF-3B83-AAFF-995DD89820FC
  properties: carbon content, fossil 0.446512, dry mass 1 kg, wet mass 1 kg
- benzoic-compound: 3.77729e-6 kg; normal variance with pedigree 5.08932e-15, pedigree (2,3,3,3,1)
  This exchange is an aggregate of proxies for applied pesticide(s) 2,4-D dimethylamine salt, Methoxyfenozide (3.768E-2 kg/ha {1,2,2,1,1}; 2.582E-2 kg/ha {1,2,2,1,1}, respectively).
  Data reported a quantity of total insecticides/herbicides/fungicides applied in sweet corn is sometimes available even when many of the substances in the category are reported with a “D”. If this total is available, the amount remaining after the sum of substance-specific values is accounted for is divided equally among the substances reported with a “D”. If the sum of available values exceeds or equals the total reported, any remaining “D” substances are treated as zero and omitted.
  From SWEETCORN - APPLICATIONS, MEASURED IN LB / ACRE / YEAR, AVG (fertilizer and pesticides, amount, number of applications) - 2000-2021, https://quickstats.nass.usda.gov/#5E5B411A-F9EF-3B83-AAFF-995DD89820FC
  properties: carbon content, fossil 0.405853, dry mass 1 kg, wet mass 1 kg
- chlorothalonil: 7.09988e-6 kg; normal variance with pedigree 5.71724e-13, pedigree (2,3,3,3,1)
  applied pesticide(s) Chlorothalonil (1.194E-1 kg/ha {1,2,2,1,1}).
  Data reported a quantity of total insecticides/herbicides/fungicides applied in sweet corn is sometimes available even when many of the substances in the category are reported with a “D”. If this total is available, the amount remaining after the sum of substance-specific values is accounted for is divided equally among the substances reported with a “D”. If the sum of available values exceeds or equals the total reported, any remaining “D” substances are treated as zero and omitted.
  From SWEETCORN - APPLICATIONS, MEASURED IN LB / ACRE / YEAR, AVG (fertilizer and pesticides, amount, number of applications) - 2000-2021, https://quickstats.nass.usda.gov/#5E5B411A-F9EF-3B83-AAFF-995DD89820FC
  properties: carbon content, fossil 0.360902, dry mass 1 kg, wet mass 1 kg
- copper sulfate: 7.09988e-6 kg; normal variance with pedigree 5.71724e-13, pedigree (2,3,3,3,1)
  applied pesticide(s) proxy for Copper hydroxide (1.194E-1 kg/ha {1,2,2,1,1}).
  Data reported a quantity of total insecticides/herbicides/fungicides applied in sweet corn is sometimes available even when many of the substances in the category are reported with a “D”. If this total is available, the amount remaining after the sum of substance-specific values is accounted for is divided equally among the substances reported with a “D”. If the sum of available values exceeds or equals the total reported, any remaining “D” substances are treated as zero and omitted.
  From SWEETCORN - APPLICATIONS, MEASURED IN LB / ACRE / YEAR, AVG (fertilizer and pesticides, amount, number of applications) - 2000-2021, https://quickstats.nass.usda.gov/#5E5B411A-F9EF-3B83-AAFF-995DD89820FC
  properties: dry mass 1 kg, wet mass 1 kg
- cyclic N-compound: 2.24175e-6 kg; normal variance with pedigree 1.15967e-16, pedigree (2,3,3,3,1)
  This exchange is an aggregate of proxies for applied pesticide(s) Carfentrazone-Ethyl, Acetamiprid (1.925E-2 kg/ha {1,2,2,1,1}; 1.844E-2 kg/ha {1,2,2,1,1}, respectively).
  Data reported a quantity of total insecticides/herbicides/fungicides applied in sweet corn is sometimes available even when many of the substances in the category are reported with a “D”. If this total is available, the amount remaining after the sum of substance-specific values is accounted for is divided equally among the substances reported with a “D”. If the sum of available values exceeds or equals the total reported, any remaining “D” substances are treated as zero and omitted.
  From SWEETCORN - APPLICATIONS, MEASURED IN LB / ACRE / YEAR, AVG (fertilizer and pesticides, amount, number of applications) - 2000-2021, https://quickstats.nass.usda.gov/#5E5B411A-F9EF-3B83-AAFF-995DD89820FC
  properties: carbon content, fossil 0.641962, dry mass 1 kg, wet mass 1 kg
- diammonium phosphate: 0.000502068 kg; lognormal variance with pedigree 0.0046, pedigree (1,4,3,1,1)
  5.02E-4 kg diammonium phosphate/kg Sweet Corn.
  Ecoinvent U.S. consumption mix for N fertilisers, from IFA data N-P-K-S: 120.89--26.6--30.6--1.06 kg/ha (USDA NASS data for 2018)over reported cropped area of specified crop (conventional tillage): quantity of N applied to treated acres times percent of planted sweetcorn acres (USDA NASS) times share of N supplied by compound in U.S. consumption mix (ecoinvent and IFA 2019) times mass compound per mass N in compound.
  Sources:
  USDA NASS (2022c) SWEETCORN - APPLICATIONS, MEASURED IN LB / ACRE / YEAR, AVG (fertilizer and pesticides, amount, number of applications) - 2000-2021. US Department of Agriculture (USDA) National Agricultural Statistics Service. https://quickstats.nass.usda.gov/#5E5B411A-F9EF-3B83-AAFF-995DD89820FC; Ecoinvent U.S. consumption mix for N fertilisers, from IFA data; IFA (2021) Nutrient content in percentage - IFA Fertilizer Converter. International Fertilizer Association. https://www.ifastat.org/converter/fertilizer-converter/accessed 2021-06-24
  properties: dry mass 1 kg, nitrogen content 0.18, phosphorus content 0.200754, wet mass 1 kg
  note on nitrogen content: Nitrogen content (on a dry matter basis) of diammonium phosphate is calculated from the molecular formula of the nutrient present in the substance.
  note on phosphorus content: Phosphorus content (on a dry matter basis) of diammonium phosphate is calculated from the molecular formula of the nutrient present in the substance.
- diazole-compound: 1.05417e-5 kg; normal variance with pedigree 3.08729e-13, pedigree (2,3,3,3,1)
  Proxy for applied pesticide(s) Chlorantraniliprole (1.772E-1 kg/ha {1,2,2,1,1}).
  Data reported a quantity of total insecticides/herbicides/fungicides applied in sweet corn is sometimes available even when many of the substances in the category are reported with a “D”. If this total is available, the amount remaining after the sum of substance-specific values is accounted for is divided equally among the substances reported with a “D”. If the sum of available values exceeds or equals the total reported, any remaining “D” substances are treated as zero and omitted.
  From SWEETCORN - APPLICATIONS, MEASURED IN LB / ACRE / YEAR, AVG (fertilizer and pesticides, amount, number of applications) - 2000-2021, https://quickstats.nass.usda.gov/#5E5B411A-F9EF-3B83-AAFF-995DD89820FC
  properties: carbon content, fossil 0.541859, dry mass 1 kg, wet mass 1 kg
- dinitroaniline-compound: 2.97666e-5 kg; normal variance with pedigree 1.10403e-11, pedigree (2,3,3,3,1)
  This exchange is an aggregate of proxies for applied pesticide(s) Pendimethalin, Trifluralin (4.63E-1 kg/ha {1,2,2,1,1}; 3.75E-2 kg/ha {1,2,2,1,1}, respectively).
  Data reported a quantity of total insecticides/herbicides/fungicides applied in sweet corn is sometimes available even when many of the substances in the category are reported with a “D”. If this total is available, the amount remaining after the sum of substance-specific values is accounted for is divided equally among the substances reported with a “D”. If the sum of available values exceeds or equals the total reported, any remaining “D” substances are treated as zero and omitted.
  From SWEETCORN - APPLICATIONS, MEASURED IN LB / ACRE / YEAR, AVG (fertilizer and pesticides, amount, number of applications) - 2000-2021, https://quickstats.nass.usda.gov/#5E5B411A-F9EF-3B83-AAFF-995DD89820FC
  properties: carbon content, fossil 0.55516, dry mass 1 kg, wet mass 1 kg
- fertilising, by broadcaster: 0.000118957 ha; lognormal variance with pedigree 0.0206, pedigree (4,4,3,1,3)
  2.00 ha/ha (1.19E-4 ha/kg Sweet Corn) fertilising, by broadcaster
  Average application rates for mineral fertilisers (NPKS) on Sweet Corn in Minnesota are: 1.70 N applications on 97.0% of cropped area, 1.10 P applications on 69.0% of cropped area, 1.00 K applications on 59.0% of cropped area, and 1.10 S applications on 26.0% of cropped area (NPKS data from 2018). Applications of N are split between anhydrous ammonia and other N, because they are applied differently, with different equipment Other than anhydrous ammonia, most NPK(S) fertilisers are applied together via broadcast application.
  Anhydrous ammonia application (knifing/injection) is calculated as market share of N that is anhydrous ammonia * total N applications (=0.42). Other N application is then total USDA N applications less applications of anhydrous ammonia (=1.28). The market share of N that is anhydrous ammonia is calculated from fertiliser market group shares crossed with meeting NPKS nutrient demand (here, 24.78%). Thus, the dataset includes 0.41 anhydrous ammonia applications via injection (0.42 * 97.0% of crop area with applied N) and 1.24 other N applications via broadcast (1.28 * 97.0%). Since the number of passes for N application after removing the anhydrous ammonia share is greater than the maximum number of passes reported for the other nutrients, this dataset assumes that any other fertiliser applications are reflected under that pass and the total fertiliser broadcast fertiliser passes are thus 1.24.
  Field operations are as identified in crop- and rotation-specific enterprise crop budgets supplied by the regional agricultural extension office and matched to equipment type in the budget or crop guidance unless otherwise noted. (UWM Extension 2014, Hanna, Mark 2016, Schuler and Frank 1998, Lattz and Schnitkey 2021b). Operations are matched to equipment type and where multiple options are available, the share of each is determined from guidance and annual farmer survey data (Custom Rate Summaries) for contracted operations/equipment. Where an operation applies only to a portion of the harvested area, the number of passes has been scaled by the % of harvested area to which it applies (e.g., manure spreading or insecticide) as indicated by USDA statistics (applications) or USDA reports (manure use) or as otherwise indicated in enterprise crop budgets.
  Source(s):
  USDA NASS (2022d) Applications - fertilizers and pesticides - number, amount, - Sweet Corn- 2000-2021. US Department of Agriculture (USDA) National Agricultural Statistics Service. https://quickstats.nass.usda.gov (direct query: https://quickstats.nass.usda.gov/results/13FC0C89-E211-3D0B-A9C5-BCFC35728512); UWM Extension (2014) Pricing, Contracts & Budgets. Cooperative Extension Service, University of Wisconsin-Madison. https://farms.extension.wisc.edu/article-topic/pricing-and-contracts/, Hanna, Mark (2016) Estimating the Field Capacity of Farm Machines. Cooperative Extension Service, Iowa State University of Science and Technology. https://www.extension.iastate.edu/agdm/crops/pdf/a3-24.pdf, Schuler and Frank (1998) A3510 Estimating Agricultural Field Machinery Costs. University of Wisconsin-Extension. https://learningstore.uwex.edu/Assets/pdfs/A3510.pdf, Lattz and Schnitkey (2021b) Machinery Cost Estimates: Field Operations. Department of Agricultural and Consumer Economics, University of Illinois at Urbana-Champaign. https://farmdoc.illinois.edu/assets/management/machinery-costs/field_operations.pdf
- fertilising, by injection: 5.94787e-5 ha; lognormal variance with pedigree 0.0206, pedigree (4,4,3,1,3)
  1.00 ha/ha (5.95E-5 ha/kg Sweet Corn) fertilising, by injection
  Average application rates for mineral fertilisers (NPKS) on Sweet Corn in Minnesota are: 1.70 N applications on 97.0% of cropped area, 1.10 P applications on 69.0% of cropped area, 1.00 K applications on 59.0% of cropped area, and 1.10 S applications on 26.0% of cropped area (NPKS data from 2018). Applications of N are split between anhydrous ammonia and other N, because they are applied differently, with different equipment Other than anhydrous ammonia, most NPK(S) fertilisers are applied together via broadcast application.
  Anhydrous ammonia application (knifing/injection) is calculated as market share of N that is anhydrous ammonia * total N applications (=0.42). Other N application is then total USDA N applications less applications of anhydrous ammonia (=1.28). The market share of N that is anhydrous ammonia is calculated from fertiliser market group shares crossed with meeting NPKS nutrient demand (here, 24.78%). Thus, the dataset includes 0.41 anhydrous ammonia applications via injection (0.42 * 97.0% of crop area with applied N) and 1.24 other N applications via broadcast (1.28 * 97.0%). Since the number of passes for N application after removing the anhydrous ammonia share is greater than the maximum number of passes reported for the other nutrients, this dataset assumes that any other fertiliser applications are reflected under that pass and the total fertiliser broadcast fertiliser passes are thus 1.24.
  Field operations are as identified in crop- and rotation-specific enterprise crop budgets supplied by the regional agricultural extension office and matched to equipment type in the budget or crop guidance unless otherwise noted. (UWM Extension 2014, Hanna, Mark 2016, Schuler and Frank 1998, Lattz and Schnitkey 2021b). Operations are matched to equipment type and where multiple options are available, the share of each is determined from guidance and annual farmer survey data (Custom Rate Summaries) for contracted operations/equipment. Where an operation applies only to a portion of the harvested area, the number of passes has been scaled by the % of harvested area to which it applies (e.g., manure spreading or insecticide) as indicated by USDA statistics (applications) or USDA reports (manure use) or as otherwise indicated in enterprise crop budgets.
  Source(s):
  USDA NASS (2022d) Applications - fertilizers and pesticides - number, amount, - Sweet Corn- 2000-2021. US Department of Agriculture (USDA) National Agricultural Statistics Service. https://quickstats.nass.usda.gov (direct query: https://quickstats.nass.usda.gov/results/13FC0C89-E211-3D0B-A9C5-BCFC35728512); UWM Extension (2014) Pricing, Contracts & Budgets. Cooperative Extension Service, University of Wisconsin-Madison. https://farms.extension.wisc.edu/article-topic/pricing-and-contracts/, Hanna, Mark (2016) Estimating the Field Capacity of Farm Machines. Cooperative Extension Service, Iowa State University of Science and Technology. https://www.extension.iastate.edu/agdm/crops/pdf/a3-24.pdf, Schuler and Frank (1998) A3510 Estimating Agricultural Field Machinery Costs. University of Wisconsin-Extension. https://learningstore.uwex.edu/Assets/pdfs/A3510.pdf, Lattz and Schnitkey (2021b) Machinery Cost Estimates: Field Operations. Department of Agricultural and Consumer Economics, University of Illinois at Urbana-Champaign. https://farmdoc.illinois.edu/assets/management/machinery-costs/field_operations.pdf
- glyphosate: 1.98571e-5 kg; normal variance with pedigree 1.39928e-12, pedigree (2,3,3,3,1)
  applied pesticide(s) Glyphosate, isopropylamine salt, Glyphosate Potassium Salt, Glyphosate isopropylamine salt (1.113E-1 kg/ha {1,2,2,1,1}; 1.113E-1 kg/ha {1,2,2,1,1}; 1.113E-1 kg/ha {1,2,2,1,1}, respectively).
  Data reported a quantity of total insecticides/herbicides/fungicides applied in sweet corn is sometimes available even when many of the substances in the category are reported with a “D”. If this total is available, the amount remaining after the sum of substance-specific values is accounted for is divided equally among the substances reported with a “D”. If the sum of available values exceeds or equals the total reported, any remaining “D” substances are treated as zero and omitted.
  From SWEETCORN - APPLICATIONS, MEASURED IN LB / ACRE / YEAR, AVG (fertilizer and pesticides, amount, number of applications) - 2000-2021, https://quickstats.nass.usda.gov/#5E5B411A-F9EF-3B83-AAFF-995DD89820FC
  properties: carbon content, fossil 0.214286, dry mass 1 kg, wet mass 1 kg
- harvesting, use of harvesting cart: 5.94787e-5 kg; lognormal variance with pedigree 0.0206, pedigree (4,4,3,1,3)
  5.95E-5 ha/kg harvesting, use of harvesting cart (1. effective pass(es) per year).
  This dataset includes use of a harvesting cart in association with manual harvest for collection of filled crates during harvest.The 2014 enterprise crop budget (the most recent detailed budget available for WI) uses manual harvest and includes 30.5 hours manual labor for that harvest, persumably using harvest cart or truck. Other practices are based on annual guidance for commercial vegetable production (Colquhoun, J.B et al 2022). State specific guidance for Minessota is not available. Field operations are assumed as Wisconsin.Field operations are as identified in crop- and rotation-specific enterprise crop budgets supplied by the regional agricultural extension office and matched to equipment type in the budget or crop guidance unless otherwise noted. Operations are matched to equipment type and where multiple options are available, the share of each is determined from guidance and annual farmer survey data (Custom Rate Summaries) for contracted operations/equipment. Field cultivation and tillage operations are specific to the tillage regime used. Seed establishment and weed control for sweet corn generally require tillage (EPA 2022; IPM 2003, IPM 1997), so this dataset reflects sweet corn production using conventional tillage practices (0% reduced till, 100% conventional tillage, and 0% no till, ). Used for manual harvesting.
  Sources:
  UWM Extension 2014, Hanna, Mark 2016, Schuler and Frank 1998, Lattz and Schnitkey 2021b; UWM Extension (2014) Pricing, Contracts & Budgets. Cooperative Extension Service, University of Wisconsin-Madison. https://farms.extension.wisc.edu/article-topic/pricing-and-contracts/, Hanna, Mark (2016) Estimating the Field Capacity of Farm Machines. Cooperative Extension Service, Iowa State University of Science and Technology. https://www.extension.iastate.edu/agdm/crops/pdf/a3-24.pdf, Schuler and Frank (1998) A3510 Estimating Agricultural Field Machinery Costs. University of Wisconsin-Extension. https://learningstore.uwex.edu/Assets/pdfs/A3510.pdf, Lattz and Schnitkey (2021b) Machinery Cost Estimates: Field Operations. Department of Agricultural and Consumer Economics, University of Illinois at Urbana-Champaign. https://farmdoc.illinois.edu/assets/management/machinery-costs/field_operations.pdf; EPA (2022) Assessment of the Benefits of Atrazine and the Impacts of Potential Mitigation for Field Corn, Sweet Corn, Sorghum, and Sugarcane; PC Code (080803). (MEMORANDUM).US Environmental Protection Agency. https://downloads.regulations.gov/EPA-HQ-OPP-2013-0266-1624/content.pdf ; IPM center (2003) Crop Profile for Sweet Corn in the North Central United States. Southern Integrated Pest Management Center.Southern Integrated Pest Management Center. https://ipmdata.ipmcenters.org/documents/cropprofiles/us-ncr-sweetcorn.pdf ; IPM center (1997) Crop Profile for Corn (Sweet) in Maryland. Southern Integrated Pest Management Center. https://ipmdata.ipmcenters.org/documents/cropprofiles/MDcorn-sweet.pdf
- irrigation: 0.0146579 m3; lognormal variance with pedigree 0.0038, pedigree (1,3,3,1,2)
  246.4 m3/ha (1.47E-2 m3/kg Sweet Corn) irrigation. Water applied for irrigation (1,828 m3/irrigated ha, 2018, 2020, USDA NASS 2018), weighted by the share of acres irrigated (13.5%, average over 2010-2018 from USDA NASS (2021); percent of harvested irrigated acres not reported 2019-2021).
  Sources:
  USDA NASS (2018d) 2018 Irrigation and Water Management Survey (2017 Census of Agriculture).US Department of Agriculture (USDA). https://www.nass.usda.gov/Publications/AgCensus/2017/Online_Resources/Farm_and_Ranch_Irrigation_Survey/index.php
  properties: dry mass 0.11 kg, water content 9089.91, wet mass 1000 kg
- land use change, annual crop: 9.00359e-6 ha; lognormal variance with pedigree 0.082025, pedigree (1,1,3,2,1)
  Land use change is allocated to all crops and activities that grew in the last 20 years for the US, and only to them, according to their respective area increase. Crop production and natural land areas in all countries use data from 1989 to 2012 (FAOSTAT 2012), as well as for country climates and soil types (EU-JRC 2010c). Crops for which planted area decreased are not attributed LUC impacts or credits. Total cropland land use, for all crops, in Minnesota increased by 1% between 1997 and 2017 (NRCS 2020a); USDA NASS does not report cropped area for Sweet Corn prior to 2016.
  Land use change (LUC) combines land transformation areas calculated with the adapted 'Direct Land Use Change Assessment Tool' version 2014 developed by Blonk Consultants and the carbon losses from soil organic carbon (SOC) and vegetation (VEG) as calculated in ecoinvent v3. See 'WFLDB-Guidelines.pdf', available at https://ecoquery.ecoinvent.org/File/Reports. Calculated value from ecoinvent Crop LCI tool, 0.15137 divided by the yield in kg/ha.
- limestone and gypsum application, by spreader: 1.26736e-6 ha; lognormal variance with pedigree 0.1381, pedigree (4,2,3,1,3)
  0.021 ha/ha (1.27E-6 ha/kg Sweet Corn), calculated as the fraction of crop area treated with lime (14.9%, from state level estimated agricultural acres with pH <6.1, Bruulsema T and Jones J D 2021) / (7 years between applications, based on Bruulsema T and Jones J D 2021).
  Lime is applied to all soils with pH below 6 based on expert guidance (Sawyer JE 2020). Cropped area needing liming is determined from distribution of soil pH sampling results reported in the 2020 Soil Test Summary (Bruulsema and Jones 2021). The share of acidic soils is likely overestimated as more more frequent testing is to be expected on soils having needed lime and thus low pH soils are likely to be more represented amongst the collected samples. (Mallarino A P, Pagani A, Sawyer J E 2011; Fernández F G and Hoeft R G 2012; Bly A and Gelderman R 2019; Shaver T M 2014) Fernández F G and Hoeft R G (2012a) Managing Soil pH and Crop Nutrients. Chapter 8 in the Illinois Agronomy Handbook.Crop Science Extension & Outreach, University of Illinois . http://extension.cropsciences.illinois.edu/handbook/pdfs/chapter08.pdf
  Sources:
  Bruulsema T and Jones J D (2021) Soil Test Summary 2020. Foundation for Agronomic Research and Plant Nutrition Canada present this 2020 summary of soil test levels in North America. Foundation for Agronomic Research, Plant Nutrition Canada. https://soiltest.tfi.org/about/about_soil_test_summaryaccessed August 30, 2021; Kaiser and Ronen (2018) Lime needs in Minnesota (website). University of Minnesota Extension. https://extension.umn.edu/liming/lime-needs-minnesotaaccessed August 30, 2021; Mamo, M, Wortmann, CS, Shaipro, CA (2015) Lime Use for Soil Acidity Management. University of Nebraska–Lincoln Extension, Institute of Agriculture and Natural Resources. https://extensionpublications.unl.edu/assets/pdf/g1504.pdfaccessed August 30, 2021; Fernández F G and Hoeft R G (2012a) Managing Soil pH and Crop Nutrients. Chapter 8 in the Illinois Agronomy Handbook.Crop Science Extension & Outreach, University of Illinois . http://extension.cropsciences.illinois.edu/handbook/pdfs/chapter08.pdf; Shaver T M (2014) Nutrient Management for Agronomic Crops in Nebraska (rev Dec 2014). The University of Nebraska Institute of Agriculture and Natural Resources. https://extensionpublications.unl.edu/assets/pdf/ec155.pdfaccessed August 30, 2021; Bly A and Gelderman R (2019) Chapter: 25 Liming South Dakota Soils . SDSU Extension . https://extension.sdstate.edu/sites/default/files/2019-09/S-0003-25-Corn.pdf; Mallarino A P, Pagani A, Sawyer J E (2011) Corn and soybean response to soil pH level and liming. Paper presented at the 2011 Integrated Crop Management Conference. Iowa State University.Cooperative Extension Service, Iowa State University of Science and Technology. https://core.ac.uk/download/pdf/128983337.pdfaccessed November 17, 2021
- limestone, crushed, washed: 0.00626344 kg; lognormal variance with pedigree 0.1381, pedigree (4,2,3,1,3)
  Application of limestone to raise soil pH, 105.31 kg/ha (6.26E-3 kg/kg Sweet Corn), calculated as the (mass of lime applied to treated acres (2 t/treated ha)) * fraction of crop area treated with lime (14.9%, from soil pH data from Bruulsema T and Jones J D 2021) / (7 years between applications, based on Fernández F G and Hoeft R G 2012a).
  Lime is applied to all soils with pH below 6 based on expert guidance (Sawyer JE 2020). Cropped area needing liming is determined from distribution of soil pH sampling results reported in the 2020 Soil Test Summary (Bruulsema and Jones 2021). The share of acidic soils is likely overestimated as more more frequent testing is to be expected on soils having needed lime and thus low pH soils are likely to be more represented amongst the collected samples. (Mallarino A P, Pagani A, Sawyer J E 2011; Fernández F G and Hoeft R G 2012; Bly A and Gelderman R 2019; Shaver T M 2014) The increase in pH with lime application remains dominant through at least 4 years from application and guidance suggests 4 to 10 years beween applications (Fernández F G and Hoeft R G 2012).
  Sources:
  Bruulsema T and Jones J D (2021) Soil Test Summary 2020. Foundation for Agronomic Research and Plant Nutrition Canada present this 2020 summary of soil test levels in North America. Foundation for Agronomic Research, Plant Nutrition Canada. https://soiltest.tfi.org/about/about_soil_test_summaryaccessed August 30, 2021; Kaiser and Ronen (2018) Lime needs in Minnesota (website). University of Minnesota Extension. https://extension.umn.edu/liming/lime-needs-minnesotaaccessed August 30, 2021; Mamo, M, Wortmann, CS, Shaipro, CA (2015) Lime Use for Soil Acidity Management. University of Nebraska–Lincoln Extension, Institute of Agriculture and Natural Resources. https://extensionpublications.unl.edu/assets/pdf/g1504.pdfaccessed August 30, 2021; Fernández F G and Hoeft R G (2012a) Managing Soil pH and Crop Nutrients. Chapter 8 in the Illinois Agronomy Handbook.Crop Science Extension & Outreach, University of Illinois . http://extension.cropsciences.illinois.edu/handbook/pdfs/chapter08.pdf; Shaver T M (2014) Nutrient Management for Agronomic Crops in Nebraska (rev Dec 2014). The University of Nebraska Institute of Agriculture and Natural Resources. https://extensionpublications.unl.edu/assets/pdf/ec155.pdfaccessed August 30, 2021; Bly A and Gelderman R (2019) Chapter: 25 Liming South Dakota Soils . SDSU Extension . https://extension.sdstate.edu/sites/default/files/2019-09/S-0003-25-Corn.pdf; Mallarino A P, Pagani A, Sawyer J E (2011) Corn and soybean response to soil pH level and liming. Paper presented at the 2011 Integrated Crop Management Conference. Iowa State University.Cooperative Extension Service, Iowa State University of Science and Technology. https://core.ac.uk/download/pdf/128983337.pdfaccessed November 17, 2021
  properties: carbon content, fossil 0.117257, dry mass 0.998 kg, water content 0.00200401, wet mass 1 kg
  note on carbon content, fossil: Table 3.1, ecoinvent v2.2 report 7, part VII, pg 3. MW CaCO3=100, MW MgCO3=84. C content of limestone is 0.117257 kg/kg DM
- maize seed, for sowing: 0.000729679 kg; normal variance with pedigree 3.06575e-8, pedigree (3,3,2,3,2)
  Each planted hectare uses 12.27 kg seed (7.3E-4 kg/kg Sweet Corn). This value is calculated from a seeding rate of 76,603 seeds/ha (Licht M, Parvej M R, Baum M 2019, Licht M 2020) and an average seed count of 6,244 seeds/kg (averaged from commercial listings of F1 (SH2 and se-se) seeds, https://www.ufseeds.com/vegetables/corn/supersweet-sh2-corn, https://lacrosseseed.com/product-information/forage-tech-sheets/tech-sheets-alfalfa-5). While genetically engineered sweet (fresh) corn seed is available, the share of sweet (fresh) corn grown from genetically engineered seed is not compiled; it is estimated that between 75 and 90% of North American sweet corn is conventional (USDA 2018b). Seeding rates are based on state average guidance, not specifically for GE or conventional seed. Germination and stand losses are accounted for in the seeding rate.The uncertainty parameters are calculated from the uncertainty on the range of seed sizes (seed counts per kg), the yield variation, and the variability in seed-to-stand ratios. Sources:
  Lindsey AJ, Thomison PR, Nafziger ED (2018) Estimated Return-to-Seed of Variable vs. Uniform Corn Seeding Rates. Crop Ecophysiology and Agronomy, Ohio State University; Corn Cropping Systems Extension, Ohio State University; Crop Sciences, University of Illinois at Urbana-Champaign. https://ohioline.osu.edu/factsheet/agf-520, USDA NASS. (2020). Crops/Stocks Survey (or Agricultural Survey) for the years 2000-20 - Recent Trends in GE Adoption. US Department of Agriculture (USDA). https://www.ers.usda.gov/data-products/adoption-of-genetically-engineered-crops-in-the-us/documentation/ , Mekonnen et al (2018) Water, Energy, and Carbon Footprints of Bioethanol from the U.S. and Brazil. Environ. Sci. Technol. 52:14508–14518. Mesfin M. Mekonnen, Thiago L. Romanelli, Chittaranjan Ray, Arjen Y. Hoekstra, Adam J. Liska, and Christopher M.U. Neale. https://pubs.acs.org/doi/10.1021/acs.est.8b03359
  properties: carbon content, non-fossil 0.45263, dry mass 0.88 kg, water content 0.136364, wet mass 1 kg
  note on carbon content, non-fossil: biogene carbon content on a dry matter basis; Composition data obtained from Corn Grain Whole, in (http://beefmagazine.com/images/2009%20feed%20table.pdf). First, composition data were refered to 1 kg dry mass. Then, C-contents were calculated considering a C-content/dry mass of 44% in carbohydrates (including fibres), 53% in proteins and 75% in fats. All data from ecoinvent report, n 15a, pg 40, except C-content in protein, that comes from Determination of protein concentration by total organic carbon analysis, Rouwenhorst et al., 1991, J Biochem and Biophys Methods, 22:119-128.
- metolachlor: 1.8408e-5 kg; normal variance with pedigree 6.45876e-12, pedigree (2,3,3,3,1)
  applied pesticide(s) Metolachlor, (S) (3.095E-1 kg/ha {1,2,2,1,1}).
  Data reported a quantity of total insecticides/herbicides/fungicides applied in sweet corn is sometimes available even when many of the substances in the category are reported with a “D”. If this total is available, the amount remaining after the sum of substance-specific values is accounted for is divided equally among the substances reported with a “D”. If the sum of available values exceeds or equals the total reported, any remaining “D” substances are treated as zero and omitted.
  From SWEETCORN - APPLICATIONS, MEASURED IN LB / ACRE / YEAR, AVG (fertilizer and pesticides, amount, number of applications) - 2000-2021, https://quickstats.nass.usda.gov/#5E5B411A-F9EF-3B83-AAFF-995DD89820FC
  properties: carbon content, fossil 0.633803, dry mass 1 kg, wet mass 1 kg
- monoammonium phosphate: 0.00405588 kg; lognormal variance with pedigree 0.0046, pedigree (1,4,3,1,1)
  4.06E-3 kg monoammonium phosphate/kg Sweet Corn.
  Ecoinvent U.S. consumption mix for N fertilisers, from IFA data N-P-K-S: 120.89--26.6--30.6--1.06 kg/ha (USDA NASS data for 2018)over reported cropped area of specified crop (conventional tillage): quantity of N applied to treated acres times percent of planted sweetcorn acres (USDA NASS) times share of N supplied by compound in U.S. consumption mix (ecoinvent and IFA 2019) times mass compound per mass N in compound.
  Sources:
  USDA NASS (2022c) SWEETCORN - APPLICATIONS, MEASURED IN LB / ACRE / YEAR, AVG (fertilizer and pesticides, amount, number of applications) - 2000-2021. US Department of Agriculture (USDA) National Agricultural Statistics Service. https://quickstats.nass.usda.gov/#5E5B411A-F9EF-3B83-AAFF-995DD89820FC; Ecoinvent U.S. consumption mix for N fertilisers, from IFA data; IFA (2021) Nutrient content in percentage - IFA Fertilizer Converter. International Fertilizer Association. https://www.ifastat.org/converter/fertilizer-converter/accessed 2021-06-24
  properties: dry mass 1 kg, nitrogen content 0.084, phosphorus content 0.226939, wet mass 1 kg
  note on nitrogen content: Nitrogen content (on a dry matter basis) of monoammonium phosphate is calculated from the molecular formula of the nutrient present in the substance.
  note on phosphorus content: Phosphorus content (on a dry matter basis) of monoammonium phosphate is calculated from the molecular formula of the nutrient present in the substance.
- organophosphorus-compound, unspecified: 1.51447e-5 kg; normal variance with pedigree 2.4156e-13, pedigree (2,3,3,3,1)
  This exchange is an aggregate of proxies for applied pesticide(s) Cyfluthrin, Beta-cyfluthrin, Glufosinate ammonium, Malathion (3.428E-2 kg/ha {1,2,2,1,1}; 7.478E-2 kg/ha {1,2,2,1,1}; 1.113E-1 kg/ha {1,2,2,1,1}; 3.428E-2 kg/ha {1,2,2,1,1}, respectively).
  Data reported a quantity of total insecticides/herbicides/fungicides applied in sweet corn is sometimes available even when many of the substances in the category are reported with a “D”. If this total is available, the amount remaining after the sum of substance-specific values is accounted for is divided equally among the substances reported with a “D”. If the sum of available values exceeds or equals the total reported, any remaining “D” substances are treated as zero and omitted.
  From SWEETCORN - APPLICATIONS, MEASURED IN LB / ACRE / YEAR, AVG (fertilizer and pesticides, amount, number of applications) - 2000-2021, https://quickstats.nass.usda.gov/#5E5B411A-F9EF-3B83-AAFF-995DD89820FC
  properties: carbon content, fossil 0.260898, dry mass 1 kg, wet mass 1 kg
- packaging, for fertilisers: 0.0513527 kg; name packaging_f; lognormal variance with pedigree 0.1708, pedigree (4,3,2,5,4)
  The total amount of mineral and/or synthetic fertilisers needed for the production of Sweet Corn is calculated to be circa 145.841kg/ha. The total amount of applied mineral fertiliser is doubled to account for the packaging of the diluted product. Lime is not delivered packaged. Thus, 0.051 kg/ha of packaging for fertilisers is calculated with this exchange.
  properties: carbon content, fossil 0.825301, dry mass 1 kg, price 0.0642 EUR2005, wet mass 1 kg
  note on carbon content, fossil: Considering a chemical formula (C2H4)n for polyethylene, carbon content-fossil is calculated to be 0.856286 kg of Carbon per kg of dry mass.
- packaging, for pesticides: 0.000736439 kg; name packaging_p; lognormal variance with pedigree 0.0514, pedigree (4,3,2,5,4)
  Total amount of active substance/s of pesticides used for the production of sweet corn is calculated to be about 6.19 kg/ha (2018, 2020-USDA NASS data). The total amount of active substance/s is doubled in order to account for the packaging of the dilluted product of pesticides that are applied. Therefore, 12.38kg of packaging for pesticides per ha of Sweet Corn( 7.36E-4kg/kg) is calculated with this exchange.
  properties: carbon content, fossil 0.85714, dry mass 1 kg, price 0.0642 EUR2005, wet mass 1 kg
- pesticide, unspecified: 1.3579e-6 kg; normal variance with pedigree 7.64987e-16, pedigree (2,3,3,3,1)
  Proxy for applied pesticide(s) Abamectin (2.283E-2 kg/ha {1,2,2,1,1}).
  Data reported a quantity of total insecticides/herbicides/fungicides applied in sweet corn is sometimes available even when many of the substances in the category are reported with a “D”. If this total is available, the amount remaining after the sum of substance-specific values is accounted for is divided equally among the substances reported with a “D”. If the sum of available values exceeds or equals the total reported, any remaining “D” substances are treated as zero and omitted.
  From SWEETCORN - APPLICATIONS, MEASURED IN LB / ACRE / YEAR, AVG (fertilizer and pesticides, amount, number of applications) - 2000-2021, https://quickstats.nass.usda.gov/#5E5B411A-F9EF-3B83-AAFF-995DD89820FC
  properties: carbon content, fossil 0.486978, dry mass 1 kg, wet mass 1 kg
- phenoxy-compound: 6.94979e-6 kg; normal variance with pedigree 2.09956e-14, pedigree (2,3,3,3,1)
  This exchange is an aggregate of proxies for applied pesticide(s) Spinetoram, Spinosad, Spiromesifen, Propargite (2.154E-2 kg/ha {1,2,2,1,1}; 1.932E-2 kg/ha {1,2,2,1,1}; 4.171E-2 kg/ha {1,2,2,1,1}; 3.428E-2 kg/ha {1,2,2,1,1}, respectively).
  Data reported a quantity of total insecticides/herbicides/fungicides applied in sweet corn is sometimes available even when many of the substances in the category are reported with a “D”. If this total is available, the amount remaining after the sum of substance-specific values is accounted for is divided equally among the substances reported with a “D”. If the sum of available values exceeds or equals the total reported, any remaining “D” substances are treated as zero and omitted.
  From SWEETCORN - APPLICATIONS, MEASURED IN LB / ACRE / YEAR, AVG (fertilizer and pesticides, amount, number of applications) - 2000-2021, https://quickstats.nass.usda.gov/#5E5B411A-F9EF-3B83-AAFF-995DD89820FC
  properties: carbon content, fossil 0.532559, dry mass 1 kg, wet mass 1 kg
- planting, by row crop planter: 5.94787e-5 ha; lognormal variance with pedigree 0.0206, pedigree (4,4,3,1,3)
  5.95E-5 ha/kg planting (1. effective pass(es) per year).
  Field operations are as identified in crop- and rotation-specific enterprise crop budgets supplied by the regional agricultural extension office and matched to equipment type in the budget or crop guidance unless otherwise noted. Operations are matched to equipment type and where multiple options are available, the share of each is determined from guidance and annual farmer survey data (Custom Rate Summaries) for contracted operations/equipment. Field cultivation and tillage operations are specific to the tillage regime used. Seed establishment and weed control for sweet corn generally require tillage (EPA 2022; IPM 2003, IPM 1997), so this dataset reflects sweet corn production using conventional tillage practices (0% reduced till, 100% conventional tillage, and 0% no till, ). Used for planting on conventionally tilled fields.
  Sources:
  UWM Extension 2014, Hanna, Mark 2016, Schuler and Frank 1998, Lattz and Schnitkey 2021b; UWM Extension (2014) Pricing, Contracts & Budgets. Cooperative Extension Service, University of Wisconsin-Madison. https://farms.extension.wisc.edu/article-topic/pricing-and-contracts/, Hanna, Mark (2016) Estimating the Field Capacity of Farm Machines. Cooperative Extension Service, Iowa State University of Science and Technology. https://www.extension.iastate.edu/agdm/crops/pdf/a3-24.pdf, Schuler and Frank (1998) A3510 Estimating Agricultural Field Machinery Costs. University of Wisconsin-Extension. https://learningstore.uwex.edu/Assets/pdfs/A3510.pdf, Lattz and Schnitkey (2021b) Machinery Cost Estimates: Field Operations. Department of Agricultural and Consumer Economics, University of Illinois at Urbana-Champaign. https://farmdoc.illinois.edu/assets/management/machinery-costs/field_operations.pdf; EPA (2022) Assessment of the Benefits of Atrazine and the Impacts of Potential Mitigation for Field Corn, Sweet Corn, Sorghum, and Sugarcane; PC Code (080803). (MEMORANDUM).US Environmental Protection Agency. https://downloads.regulations.gov/EPA-HQ-OPP-2013-0266-1624/content.pdf ; IPM center (2003) Crop Profile for Sweet Corn in the North Central United States. Southern Integrated Pest Management Center.Southern Integrated Pest Management Center. https://ipmdata.ipmcenters.org/documents/cropprofiles/us-ncr-sweetcorn.pdf ; IPM center (1997) Crop Profile for Corn (Sweet) in Maryland. Southern Integrated Pest Management Center. https://ipmdata.ipmcenters.org/documents/cropprofiles/MDcorn-sweet.pdf
- potassium chloride: 0.00247375 kg; lognormal variance with pedigree 0.0046, pedigree (1,4,3,1,1)
  2.47E-3 kg potassium chloride/kg Sweet Corn
  Quantities of specific fertiliser are calculated based on US fertiliser market share and nutrient compositions from IFA data to meet total nutrient demand N-P-K-S: 120.89--26.65--30.6--1.06 kg/ha (USDA NASS data for 2018). Calculated from: average total N application (2018) reported cropped area of specified crop (includes all rotation patterns) and share of fertilisers in U.S. consumption mix (ecoinvent and IFA 2019) times each fertiliser's K2O to N ratio (IFA), subtracted from the application rate for the necessary nutrient, and multiplied by the mass of the compound over the mass of K2O in the compound. The remaining K2O and S demands are met from a mix of ammonium sulfate, potassium nitrate, potassium chloride, and potassium sulfate, the quantities of which are determined by satisfying the demand without adding any additional excess of any nutrient beyond that resulting from assuming the U.S. average mix of N fertilizers; any S demand remaining is met using elemental sulfur.
  Sources:
  USDA NASS (2022c) SWEETCORN - APPLICATIONS, MEASURED IN LB / ACRE / YEAR, AVG (fertilizer and pesticides, amount, number of applications) - 2000-2021. US Department of Agriculture (USDA) National Agricultural Statistics Service. https://quickstats.nass.usda.gov/#5E5B411A-F9EF-3B83-AAFF-995DD89820FC; Ecoinvent U.S. consumption mix for N fertilisers, from IFA data; IFA (2021) Nutrient content in percentage - IFA Fertilizer Converter. International Fertilizer Association. https://www.ifastat.org/converter/fertilizer-converter/accessed 2021-06-24
  properties: dry mass 1 kg, wet mass 1 kg
- potassium nitrate: 0.00101772 kg; lognormal variance with pedigree 0.0046, pedigree (1,4,3,1,1)
  1.02E-3 kg potassium nitrate/kg Sweet Corn.
  Ecoinvent U.S. consumption mix for N fertilisers, from IFA data N-P-K-S: 120.89--26.6--30.6--1.06 kg/ha (USDA NASS data for 2018)Calculated from: average total N application (2018) reported cropped area of specified crop (includes all rotation patterns) and share of fertilisers in U.S. consumption mix (ecoinvent and IFA 2019) times each fertiliser's K2O to N ratio (IFA), subtracted from the application rate for the necessary nutrient, and multiplied by the mass of the compound over the mass of K2O in the compound. The remaining K2O and S demands are met from a mix of ammonium sulfate, potassium nitrate, potassium chloride, and potassium sulfate, the quantities of which are determined by satisfying the demand without adding any additional excess of any nutrient beyond that resulting from assuming the U.S. average mix of N fertilizers; any S demand remaining is met using elemental sulfur.
  Sources:
  USDA NASS (2022c) SWEETCORN - APPLICATIONS, MEASURED IN LB / ACRE / YEAR, AVG (fertilizer and pesticides, amount, number of applications) - 2000-2021. US Department of Agriculture (USDA) National Agricultural Statistics Service. https://quickstats.nass.usda.gov/#5E5B411A-F9EF-3B83-AAFF-995DD89820FC; Ecoinvent U.S. consumption mix for N fertilisers, from IFA data; IFA (2021) Nutrient content in percentage - IFA Fertilizer Converter. International Fertilizer Association. https://www.ifastat.org/converter/fertilizer-converter/accessed 2021-06-24
  properties: dry mass 1 kg, wet mass 1 kg
- pyrethroid-compound: 3.0354e-5 kg; normal variance with pedigree 3.89805e-12, pedigree (2,3,3,3,1)
  This exchange is an aggregate of proxies for applied pesticide(s) Bifenthrin, Lambda-Cyhalothrin, Esfenvalerate, Zeta-Cypermethrin, Permethrin (3.163E-2 kg/ha {1,2,2,1,1}; 1.427E-1 kg/ha {1,2,2,1,1}; 1.927E-1 kg/ha {1,2,2,1,1}; 1.09E-1 kg/ha {1,2,2,1,1}; 3.428E-2 kg/ha {1,2,2,1,1}, respectively).
  Data reported a quantity of total insecticides/herbicides/fungicides applied in sweet corn is sometimes available even when many of the substances in the category are reported with a “D”. If this total is available, the amount remaining after the sum of substance-specific values is accounted for is divided equally among the substances reported with a “D”. If the sum of available values exceeds or equals the total reported, any remaining “D” substances are treated as zero and omitted.
  From SWEETCORN - APPLICATIONS, MEASURED IN LB / ACRE / YEAR, AVG (fertilizer and pesticides, amount, number of applications) - 2000-2021, https://quickstats.nass.usda.gov/#5E5B411A-F9EF-3B83-AAFF-995DD89820FC
  properties: carbon content, fossil 0.623, dry mass 1 kg, wet mass 1 kg
- tillage, disking: 5.94787e-5 ha; lognormal variance with pedigree 0.0206, pedigree (4,4,3,1,3)
  5.95E-5 ha/kg tillage, disking (1. effective pass(es) per year).
  Field operations are as identified in crop- and rotation-specific enterprise crop budgets supplied by the regional agricultural extension office and matched to equipment type in the budget or crop guidance unless otherwise noted. Operations are matched to equipment type and where multiple options are available, the share of each is determined from guidance and annual farmer survey data (Custom Rate Summaries) for contracted operations/equipment. Field cultivation and tillage operations are specific to the tillage regime used. Seed establishment and weed control for sweet corn generally require tillage (EPA 2022; IPM 2003, IPM 1997), so this dataset reflects sweet corn production using conventional tillage practices (0% reduced till, 100% conventional tillage, and 0% no till, ).
  Sources:
  UWM Extension 2014, Hanna, Mark 2016, Schuler and Frank 1998, Lattz and Schnitkey 2021b; UWM Extension (2014) Pricing, Contracts & Budgets. Cooperative Extension Service, University of Wisconsin-Madison. https://farms.extension.wisc.edu/article-topic/pricing-and-contracts/, Hanna, Mark (2016) Estimating the Field Capacity of Farm Machines. Cooperative Extension Service, Iowa State University of Science and Technology. https://www.extension.iastate.edu/agdm/crops/pdf/a3-24.pdf, Schuler and Frank (1998) A3510 Estimating Agricultural Field Machinery Costs. University of Wisconsin-Extension. https://learningstore.uwex.edu/Assets/pdfs/A3510.pdf, Lattz and Schnitkey (2021b) Machinery Cost Estimates: Field Operations. Department of Agricultural and Consumer Economics, University of Illinois at Urbana-Champaign. https://farmdoc.illinois.edu/assets/management/machinery-costs/field_operations.pdf; EPA (2022) Assessment of the Benefits of Atrazine and the Impacts of Potential Mitigation for Field Corn, Sweet Corn, Sorghum, and Sugarcane; PC Code (080803). (MEMORANDUM).US Environmental Protection Agency. https://downloads.regulations.gov/EPA-HQ-OPP-2013-0266-1624/content.pdf ; IPM center (2003) Crop Profile for Sweet Corn in the North Central United States. Southern Integrated Pest Management Center.Southern Integrated Pest Management Center. https://ipmdata.ipmcenters.org/documents/cropprofiles/us-ncr-sweetcorn.pdf ; IPM center (1997) Crop Profile for Corn (Sweet) in Maryland. Southern Integrated Pest Management Center. https://ipmdata.ipmcenters.org/documents/cropprofiles/MDcorn-sweet.pdf
- tillage, field cultivator: 0.000118957 ha; lognormal variance with pedigree 0.0206, pedigree (4,4,3,1,3)
  1.19E-4 ha/kg tillage, field cultivator (2. effective pass(es) per year).
  State specific guidance for Minessota is not available. Field operations are assumed as Wisconsin.
  Field operations are as identified in crop- and rotation-specific enterprise crop budgets supplied by the regional agricultural extension office and matched to equipment type in the budget or crop guidance unless otherwise noted. Operations are matched to equipment type and where multiple options are available, the share of each is determined from guidance and annual farmer survey data (Custom Rate Summaries) for contracted operations/equipment. Field cultivation and tillage operations are specific to the tillage regime used. Seed establishment and weed control for sweet corn generally require tillage (EPA 2022; IPM 2003, IPM 1997), so this dataset reflects sweet corn production using conventional tillage practices (0% reduced till, 100% conventional tillage, and 0% no till, ).
  Sources:
  UWM Extension 2014, Hanna, Mark 2016, Schuler and Frank 1998, Lattz and Schnitkey 2021b; UWM Extension (2014) Pricing, Contracts & Budgets. Cooperative Extension Service, University of Wisconsin-Madison. https://farms.extension.wisc.edu/article-topic/pricing-and-contracts/, Hanna, Mark (2016) Estimating the Field Capacity of Farm Machines. Cooperative Extension Service, Iowa State University of Science and Technology. https://www.extension.iastate.edu/agdm/crops/pdf/a3-24.pdf, Schuler and Frank (1998) A3510 Estimating Agricultural Field Machinery Costs. University of Wisconsin-Extension. https://learningstore.uwex.edu/Assets/pdfs/A3510.pdf, Lattz and Schnitkey (2021b) Machinery Cost Estimates: Field Operations. Department of Agricultural and Consumer Economics, University of Illinois at Urbana-Champaign. https://farmdoc.illinois.edu/assets/management/machinery-costs/field_operations.pdf; EPA (2022) Assessment of the Benefits of Atrazine and the Impacts of Potential Mitigation for Field Corn, Sweet Corn, Sorghum, and Sugarcane; PC Code (080803). (MEMORANDUM).US Environmental Protection Agency. https://downloads.regulations.gov/EPA-HQ-OPP-2013-0266-1624/content.pdf ; IPM center (2003) Crop Profile for Sweet Corn in the North Central United States. Southern Integrated Pest Management Center.Southern Integrated Pest Management Center. https://ipmdata.ipmcenters.org/documents/cropprofiles/us-ncr-sweetcorn.pdf ; IPM center (1997) Crop Profile for Corn (Sweet) in Maryland. Southern Integrated Pest Management Center. https://ipmdata.ipmcenters.org/documents/cropprofiles/MDcorn-sweet.pdf
- tillage, subsoiling, by subsoiler or v-ripper: 5.94787e-5 ha; lognormal variance with pedigree 0.0206, pedigree (4,4,3,1,3)
  5.95E-5 ha/kg tillage, subsoiling, by subsoiler or v-ripper (1. effective pass(es) per year).
  Field operations are as identified in crop- and rotation-specific enterprise crop budgets supplied by the regional agricultural extension office and matched to equipment type in the budget or crop guidance unless otherwise noted. Operations are matched to equipment type and where multiple options are available, the share of each is determined from guidance and annual farmer survey data (Custom Rate Summaries) for contracted operations/equipment. Field cultivation and tillage operations are specific to the tillage regime used. Seed establishment and weed control for sweet corn generally require tillage (EPA 2022; IPM 2003, IPM 1997), so this dataset reflects sweet corn production using conventional tillage practices (0% reduced till, 100% conventional tillage, and 0% no till, ).
  Sources:
  UWM Extension 2014, Hanna, Mark 2016, Schuler and Frank 1998, Lattz and Schnitkey 2021b; UWM Extension (2014) Pricing, Contracts & Budgets. Cooperative Extension Service, University of Wisconsin-Madison. https://farms.extension.wisc.edu/article-topic/pricing-and-contracts/, Hanna, Mark (2016) Estimating the Field Capacity of Farm Machines. Cooperative Extension Service, Iowa State University of Science and Technology. https://www.extension.iastate.edu/agdm/crops/pdf/a3-24.pdf, Schuler and Frank (1998) A3510 Estimating Agricultural Field Machinery Costs. University of Wisconsin-Extension. https://learningstore.uwex.edu/Assets/pdfs/A3510.pdf, Lattz and Schnitkey (2021b) Machinery Cost Estimates: Field Operations. Department of Agricultural and Consumer Economics, University of Illinois at Urbana-Champaign. https://farmdoc.illinois.edu/assets/management/machinery-costs/field_operations.pdf; EPA (2022) Assessment of the Benefits of Atrazine and the Impacts of Potential Mitigation for Field Corn, Sweet Corn, Sorghum, and Sugarcane; PC Code (080803). (MEMORANDUM).US Environmental Protection Agency. https://downloads.regulations.gov/EPA-HQ-OPP-2013-0266-1624/content.pdf ; IPM center (2003) Crop Profile for Sweet Corn in the North Central United States. Southern Integrated Pest Management Center.Southern Integrated Pest Management Center. https://ipmdata.ipmcenters.org/documents/cropprofiles/us-ncr-sweetcorn.pdf ; IPM center (1997) Crop Profile for Corn (Sweet) in Maryland. Southern Integrated Pest Management Center. https://ipmdata.ipmcenters.org/documents/cropprofiles/MDcorn-sweet.pdf
- urea: 0.00396717 kg; lognormal variance with pedigree 0.0046, pedigree (1,4,3,1,1)
  3.97E-3 kg urea/kg Sweet Corn.
  Ecoinvent U.S. consumption mix for N fertilisers, from IFA data N-P-K-S: 120.89--26.6--30.6--1.06 kg/ha (USDA NASS data for 2018)over reported cropped area of specified crop (conventional tillage): quantity of N applied to treated acres times percent of planted sweetcorn acres (USDA NASS) times share of N supplied by compound in U.S. consumption mix (ecoinvent and IFA 2019) times mass compound per mass N in compound.
  Sources:
  USDA NASS (2022c) SWEETCORN - APPLICATIONS, MEASURED IN LB / ACRE / YEAR, AVG (fertilizer and pesticides, amount, number of applications) - 2000-2021. US Department of Agriculture (USDA) National Agricultural Statistics Service. https://quickstats.nass.usda.gov/#5E5B411A-F9EF-3B83-AAFF-995DD89820FC; Ecoinvent U.S. consumption mix for N fertilisers, from IFA data; IFA (2021) Nutrient content in percentage - IFA Fertilizer Converter. International Fertilizer Association. https://www.ifastat.org/converter/fertilizer-converter/accessed 2021-06-24
  properties: carbon content, fossil 0.2, dry mass 1 kg, wet mass 1 kg
- urea ammonium nitrate mix: 0.0066906 kg; lognormal variance with pedigree 0.0046, pedigree (1,4,3,1,1)
  6.69E-3 kg urea ammonium nitrate mix/kg Sweet Corn.
  Ecoinvent U.S. consumption mix for N fertilisers, from IFA data N-P-K-S: 120.89--26.6--30.6--1.06 kg/ha (USDA NASS data for 2018)over reported cropped area of specified crop (conventional tillage): quantity of N applied to treated acres times percent of planted sweetcorn acres (USDA NASS) times share of N supplied by compound in U.S. consumption mix (ecoinvent and IFA 2019) times mass compound per mass N in compound.
  Sources:
  USDA NASS (2022c) SWEETCORN - APPLICATIONS, MEASURED IN LB / ACRE / YEAR, AVG (fertilizer and pesticides, amount, number of applications) - 2000-2021. US Department of Agriculture (USDA) National Agricultural Statistics Service. https://quickstats.nass.usda.gov/#5E5B411A-F9EF-3B83-AAFF-995DD89820FC; Ecoinvent U.S. consumption mix for N fertilisers, from IFA data; IFA (2021) Nutrient content in percentage - IFA Fertilizer Converter. International Fertilizer Association. https://www.ifastat.org/converter/fertilizer-converter/accessed 2021-06-24
  properties: carbon content, fossil 0.0879977, dry mass 0.75 kg, hydrogen content 0.095042, nitrogen content 0.401231, oxygen content 0.749063, water content 0.333333, wet mass 1 kg
  note on carbon content, fossil: Carbon content, fossil is calculated based on the chemical formula of the substance.
  note on hydrogen content: Hydrogen content (on a dry matter basis) of urea ammonium nitrate mix is calculated from the molecular formula of the substance (CH6N4O4).
  note on nitrogen content: Nitrogen content (on a dry matter basis) of urea ammonium nitrate mix is calculated from the molecular formula of the substance (CH6N4O4).
  note on oxygen content: Oxygen content (on a dry matter basis) of urea ammonium nitrate mix is calculated from the molecular formula of the substance (CH6N4O4).
- waste polyethylene: -0.0520892 kg; name waste_pe; = packaging_f+packaging_p; lognormal variance with pedigree 0.002625, pedigree (2,3,2,2,2)
  This waste is derived from the sum of packaging of pesticide and fertilizer.
  production volume; = waste_pe*pv_corn
    Calculated from production volume of reference product using the relative outputs.
  properties: carbon content, fossil 0.825301, dry mass 0.996 kg, heating value, net 42.47 MJ, water content 0.00401606, wet mass 1 kg
  note on carbon content, fossil: C content in 1 kg DM was calculated using data in Tab A.1, ecoinvent v2.2 report 13_I
  note on heating value, net: Value taken from the general comment of the treatment dataset.

## Inputs from nature
- Carbon dioxide, in air [natural resource, in air]: 1.49429 kg; lognormal variance with pedigree 0.0015, pedigree (2,2,2,1,1)
  Biogene carbon content of Sweet Corn on a dry matter basis 51.778% Carbon content of biomass fractions from Rouwenhorst et al. (1991) (carbohydrates and proteins) and Nemecek & Kägi (2007) (lipids, fibres ash). Carbohydrate, protein, lipid and fibre contents of from Feedipedia. Heuzé V., Tran G., Lebas F. (2017) Maize grain. Feedipedia, a programme by INRAE, CIRAD, AFZ and FAO. https://www.feedipedia.org/node/556 Last updated on September 7, 2017, 14:29.
- Energy, gross calorific value, in biomass [natural resource, biotic]: 4.488 MJ; lognormal variance with pedigree 0.1235, pedigree (3,3,2,3,5)
  The gross energy content of Sweet Corn is 18.7MJ/kg on a dry matter basis, 87.2% dry matter as fed for North American Sweet Corn (Feedipedia - Maize 2017). At the harvest moisture content of 76.% (Neibauer, J. and Maynard, E. 2012), the energy content of Sweet Corn is 4.5MJ/kg product weight
  Source(s):
  Heuzé V., Tran G., Lebas F. (2017) Maize grain. Feedipedia, a programme by INRAE, CIRAD, AFZ and FAO. https://www.feedipedia.org/node/556 Last updated on September 7, 2017, 14:29. ; Neibauer, J. and Maynard, E. (2012) Sweetcorn Produce Quality and Safety. Purdue University. https://www.hort.purdue.edu/prod_quality/commodities/sweetcorn.html
- Occupation, annual crop, irrigated [natural resource, land]: 0.0801906 m2*year; lognormal variance with pedigree 0.0029, pedigree (2,2,2,1,1)
  Land occupation per year (annual growing season). Land is under rotation with other annual crop production (~80% corn-soy, ~20% corn-corn, Socolar et al 2021). US NRCS data indicates that land is leaving agricultural production rather than being transitioned into it, thus the continuous flux to/from annual crop is effectively steady state. Annual production averaged 0.7 million tonnes from 2016-2021 on . million ha planted and . million ha harvested. Thus occupation is 0.428 ha/t or 4282.466 m2/t (0.4.282m2/kg). This overall land use is split into irrigated ( 86.64% ) and non-irrigated ( 13.4% ) based on agricultural census data ( USDA NASS ) 3.71E-1 m2 planted/kg harvested maize of irrigated land, and 5.72E-2 m2 planted/kg harvested maize of non-irrigated land
- Occupation, annual crop, non-irrigated [natural resource, land]: 0.514596 m2*year; lognormal variance with pedigree 0.0029, pedigree (2,2,2,1,1)
  (same comment as for Occupation, annual crop, irrigated)
- Transformation, from annual crop, irrigated [natural resource, land]: 0.0801906 m2; lognormal variance with pedigree 0.0089, pedigree (2,2,2,1,1)
  Transformation of land for planting. Land is under rotation with other annual crop production (~80% corn-soy, ~20% corn-corn, Socolar et al 2021). US NRCS data indicates that land is leaving agricultural production rather than being transitioned into it, thus the continuous flux to/from annual crop is effectively steady state. Annual production averaged 0.7 million tonnes from 2016-2021 on . million ha planted and . million ha harvested. Thus occupation is 0.428 ha/t or 4282.466 m2/t (0.4.282m2/kg). This overall land use is split into irrigated ( 86.64% ) and non-irrigated ( 13.4% ) based on agricultural census data ( USDA NASS ) 3.71E-1 m2 planted/kg harvested maize of irrigated land, and 5.72E-2 m2 planted/kg harvested maize of non-irrigated land
- Transformation, from annual crop, non-irrigated [natural resource, land]: 0.514596 m2; lognormal variance with pedigree 0.0089, pedigree (2,2,2,1,1)
  Transformation of land for planting. Land is under rotation with other annual crop production (~80% corn-soy, ~20% corn-corn, Socolar et al 2021). US NRCS data indicates that land is leaving agricultural production rather than being transitioned into it, thus the continuous flux to/from annual crop is effectively steady state. Annual production averaged 0.7 million tonnes from 2016-2021 on . million ha planted and .1 million ha harvested. Thus occupation is 0.595 ha/t or 5947.87 m2/t (0.5.948m2/kg). This overall land use is split into irrigated ( 13.48% ) and non-irrigated ( 86.5% ) based on agricultural census data ( USDA NASS ) 8.02E-2 m2 planted/kg harvested maize of irrigated land, and 5.15E-1 m2 planted/kg harvested maize of non-irrigated land
- Transformation, to annual crop, irrigated [natural resource, land]: 0.0801906 m2; lognormal variance with pedigree 0.0089, pedigree (2,2,2,1,1)
  (same comment as for Transformation, from annual crop, irrigated)
- Transformation, to annual crop, non-irrigated [natural resource, land]: 0.514596 m2; lognormal variance with pedigree 0.0089, pedigree (2,2,2,1,1)
  (same comment as for Transformation, from annual crop, irrigated)
## Emissions to nature
- Ammonia [air, non-urban air or from high stacks]: 0.00061342 kg; lognormal variance with pedigree 0.0172, pedigree (2,3,4,1,1)
  Ammonia volatilised from applied mineral and organic fertilisers, 10.3 kg NH3/ha (6.13E-4kg NH3/kg Sweet Corn) total, 10.3 kg NH3/ha (6.13E-4 kg NH3/kg Sweet Corn) from synthetic fertilisers, 0.0 kg NH3/ha (0.E+0 kg NH3/kg Sweet Corn) from manure. NH3 from volatilisation of mineral fertilisers is calculated using Tier 2 emission factors (temperate climate, specific fertiliser) from the European Environment Agency, EMEP/EEA 3Da1, Table3.2 (EEA 2019). NH3 from manure application is calculated with emission factors provided in EMEP/EEA 3.D.a.2.a (Animal manure applied to soils) (EEA 2019) for manure types used as (fraction TAN in total N)*(EF manure spreading per TAN) for each animal group and type. (kg NH3-N/kg N applied: ). The emissions from manure calculated here do not account for the change in N mineralization and phosphate runoff with incorporation type or time. Where impacts from manure application are expected to be significant, this should be considered as N volatilisation during and after application of manure ranges from as low as 1% N with direct injection to ~5% with immediate incorporation to 20-40% without incorporation (Sawyer J, Mallarino A P (2016) Using Manure Nutrients for Crop Production. Cooperative Extension Service, Iowa State University of Science and Technology. https://store.extension.iastate.edu/product/12874and Midwast Plan Services MWPS-18, 3ed).. NH3 from volatilisation of mineral fertilisers is calculated using Tier 2 emission factors (temperate climate, specific fertiliser) from the European Environment Agency, EMEP/EEA 3Da1, Table3.2 (EEA 2019). NH3 from manure application is calculated with emission factors provided in EMEP/EEA 3.D.a.2.a (Animal manure applied to soils) (EEA 2019) for manure types used as (fraction TAN in total N)*(EF manure spreading per TAN) for each animal group and type. (kg NH3-N/kg N applied: ). The emissions from manure calculated here do not account for the change in N mineralization and phosphate runoff with incorporation type or time. Where impacts from manure application are expected to be significant, this should be considered as N volatilisation during and after application of manure ranges from as low as 1% N with direct injection to ~5% with immediate incorporation to 20-40% without incorporation (Sawyer J, Mallarino A P (2016) Using Manure Nutrients for Crop Production. Cooperative Extension Service, Iowa State University of Science and Technology. https://store.extension.iastate.edu/product/12874and Midwast Plan Services MWPS-18, 3ed).
  Sources:
  EEA (2019a) EMEP/EEA air pollutant emission inventory guidebook Part B: sectoral guidance chapters 3. Agriculture 3 D Crop production and agricultural soils. European Environment Agency. https://www.eea.europa.eu/publications/emep-eea-guidebook-2019/part-b-sectoral-guidance-chapters/4-agriculture/3-d-crop-production-and/view
  EEA (2019b) EMEP/EEA air pollutant emission inventory guidebook Part B: sectoral guidance chapters 3. Agriculture 3 B Manure management. European Environment Agency. https://www.eea.europa.eu/publications/emep-eea-guidebook-2019/part-b-sectoral-guidance-chapters/4-agriculture/3-b-manure-management/view
- Carbon dioxide, fossil [air, non-urban air or from high stacks]: 0.00697204 kg; lognormal variance with pedigree 0.0092, pedigree (2,3,4,1,1)
  CO2 emissions from use of urea, fertilisers, and lime is 62.687 kg/ha (3.73E-3 kg/kg Sweet Corn): 31.53 kg/ha from lime and 31.16 kg/ha from urea and urea ammonium nitrate (lime: 1.88E-3 kg/kg Sweet Corn; urea: 1.85E-3 kg/kg Sweet Corn).
  Emissions are calculated following the IPCC NIR Guidelines, §11.3 and §11.4, using IPCC NIR equations 11.12 (lime) and 11.13 (urea) (mass of lime/urea * emissions factor for lime/urea) with Tier 1 emissions factors (IPCC 2006b). EF limestone = 0.12 kg CO2-C/kg limestone (0.06-0.12, uniform) and EF urea = 0.2 kg CO2-C/kg urea (0.1-0.2, uniform) applied to both urea and the approximately 35% of UAN that is urea. The result is converted from kg CO2-C to kg CO2 (multiplying by the molar mass of CO2/mass of C in CO2 = 44.01/12)
- Dinitrogen monoxide [air, non-urban air or from high stacks]: 4.97004e-5 kg; lognormal variance with pedigree 0.0392, pedigree (2,3,4,1,1)
  Direct and indirect N2O emissions from fertilizer and manure use and crop cultivation. direct emissions: 8.36E-1 kgN2O/ha (4.97E-5 kg N2O/kg Sweet Corn), 4.41E-2 kg N2O/ha from synthetic fertiliser N and 0.E+0 kg N2O/ha from manure N, 5.21E-1kg N2O/ha from crop residues
  Emissions from run-off and leaching of N after direct volatilisation of NH3 are calculated using the IPCC National Greenhouse Gas Inventory Guidance (IPCC 2006a, 2019Ra) using Tier 1 and Tier 2 parameters. Direct N2O emissions are calculated using Tier 2 parameters from Table equation 11.2 of the 2019Refinement to wi of the IPCC National Inventory Guidance, 2019 revision. including contributions from nutrient applications, with the Tier 2 emissions factors for wet climates (Table 11.1, IPCC 2019R) 0.016 kg N2O-N/kg fertiliser N applied (uniform range 0.013--0.019) and 0.006 kgN2O-N/kg manure N applied (uniform range 0.001--0.011)
  Sources:
  IPCC (2006a) 2006 IPCC Guidelines for National Greenhouse Gas Inventories - Chapter 11: N2O Emissions from Managed Soils, and CO2 Emissions from Lime and Urea Application in Volume 4: Agriculture, Forestry and Other Land Use. UN Intergovernmental Panel on Climate Change (IPCC). https://www.ipcc-nggip.iges.or.jp/public/2006gl/pdf/4_Volume4/V4_11_Ch11_N2O&CO2.pdf, https://www.ipcc-nggip.iges.or.jp/public/2006gl/
  IPCC (2019a) Chapter 11: N2O Emissions from Managed Soils, and CO2 Emissions from Lime and Urea Application in 2019 Refinement to the 2006 IPCC Guidelines for National Greenhouse Gas Inventories - Volume 4: Agriculture, Forestry and Other Land Use. UN Intergovernmental Panel on Climate Change (IPCC). https://www.ipcc-nggip.iges.or.jp/public/2019rf/pdf/4_Volume4/19R_V4_Ch11_Soils_N2O_CO2.pdf https://www.ipcc-nggip.iges.or.jp/public/2019rf/index.html, https://www.ipcc.ch/report/2019-refinement-to-the-2006-ipcc-guidelines-for-national-greenhouse-gas-inventories/
  IPCC (2006b) IPCC Guidelines for National Greenhouse Gas Inventories (Volumes 1, 2, and 4). UN Intergovernmental Panel on Climate Change (IPCC). https://www.ipcc-nggip.iges.or.jp/public/2006gl/index.html
  IPCC (2019b) 2019 Refinement to the 2006 IPCC Guidelines for National Greenhouse Gas Inventories (Volumes 1, 2, and 4). UN Intergovernmental Panel on Climate Change (IPCC). https://www.ipcc.ch/report/2019-refinement-to-the-2006-ipcc-guidelines-for-national-greenhouse-gas- inventories/ https://www.ipcc-nggip.iges.or.jp/public/2019rf/index.html.
  IPCC (2019c) Equation 11.1, Chapter 11: N2O Emissions from Managed Soils, and CO2 Emissions from Lime and Urea Application in 2019 Refinement to the 2006 IPCC Guidelines for National Greenhouse Gas Inventories - Volume 4: Agriculture, Forestry and Other Land Use. UN Intergovernmental Panel on Climate Change (IPCC). https://www.ipcc-nggip.iges.or.jp/public/2019rf/pdf/4_Volume4/19R_V4_Ch11_Soils_N2O_CO2.pdf https://www.ipcc-nggip.iges.or.jp/public/2019rf/index.html, https://www.ipcc.ch/report/2019-refinement-to-the-2006-ipcc-guidelines-for-national-greenhouse-gas-inventories/
  IPCC (2019d) Equation 11.2, Chapter 11: N2O Emissions from Managed Soils, and CO2 Emissions from Lime and Urea Application in 2019 Refinement to the 2006 IPCC Guidelines for National Greenhouse Gas Inventories - Volume 4: Agriculture, Forestry and Other Land Use. UN Intergovernmental Panel on Climate Change (IPCC). https://www.ipcc-nggip.iges.or.jp/public/2019rf/pdf/4_Volume4/19R_V4_Ch11_Soils_N2O_CO2.pdf https://www.ipcc-nggip.iges.or.jp/public/2019rf/index.html, https://www.ipcc.ch/report/2019-refinement-to-the-2006-ipcc-guidelines-for-national-greenhouse-gas-inventories/
  IPCC (2019e) Table 11.1(A), Chapter 11: N2O Emissions from Managed Soils, and CO2 Emissions from Lime and Urea Application in 2019 Refinement to the 2006 IPCC Guidelines for National Greenhouse Gas Inventories - Volume 4: Agriculture, Forestry and Other Land Use. UN Intergovernmental Panel on Climate Change (IPCC). https://www.ipcc-nggip.iges.or.jp/public/2019rf/pdf/4_Volume4/19R_V4_Ch11_Soils_N2O_CO2.pdf https://www.ipcc-nggip.iges.or.jp/public/2019rf/index.html, https://www.ipcc.ch/report/2019-refinement-to-the-2006-ipcc-guidelines-for-national-greenhouse-gas-inventories/
- Nitrogen oxides [air, non-urban air or from high stacks]: 0.000267428 kg; lognormal variance with pedigree 0.0392, pedigree (2,3,4,1,1)
  4.5 kg NO2/ha (2.67E-4kg NO2/kg Sweet Corn), 4.5E+0 kg NO2/ha from fertilisers; 0.E+0 kg NO2/ha from manure) NOx emissions from fertilizer and manure nitrification after N loss from NH3, as NO2. Calculated according to EEA/EMEP guidance, EF_NO_Managed Soils = 0.04 kg NO2/kg N fertiliser and manure N applied (range 0.005 to 0.104, 95% CL), from Table 3.1, Tier 1 EFs for source category 3.D, EMEP/EEA Guidebook 2019.
- Water [air, non-urban air or from high stacks]: 0.00967423 m3; lognormal variance with pedigree 0.0015, pedigree (2,2,2,1,1)
  Irrigation water released to air via evapotranspiration. Calculated by the ecoinvent agricultural LCI tool.
- 2,4-D dimethylamine salt [soil, agricultural]: 2.24139e-6 kg; normal variance with pedigree 5.6787e-15, pedigree (2,3,3,3,1)
  2,4-D amines emission to agricultural soil (3.768E-02 kg/ha). Pesticides are assumed to be ultimately 100% emitted to soil across all rotation patterns, based on assumption that all sweet corn acres are treated, and assuming that cultivation is conventional tillage as common practice for weed management (EPA 2022; IPM 2003, IPM 1997).Data reported a quantity of total insecticides/herbicides/fungicides applied in sweet corn is sometimes available even when many of the substances in the category are reported with a “D”. If this total is available, the amount remaining after the sum of substance-specific values is accounted for is divided equally among the substances reported with a “D”. If the sum of available values exceeds or equals the total reported, any remaining “D” substances are treated as zero and omitted.
  Sources: SWEETCORN - APPLICATIONS, MEASURED IN LB / ACRE / YEAR, AVG (fertilizer and pesticides, amount, number of applications) - 2000-2021,https://quickstats.nass.usda.gov/#5E5B411A-F9EF-3B83-AAFF-995DD89820FC,IPM center (1997) Crop Profile for Corn (Sweet) in Maryland. Southern Integrated Pest Management Center. https://ipmdata.ipmcenters.org/documents/cropprofiles/MDcorn-sweet.pdf,IPM center (2003) Crop Profile for Sweet Corn in the North Central United States. Southern Integrated Pest Management Center.Southern Integrated Pest Management Center. https://ipmdata.ipmcenters.org/documents/cropprofiles/us-ncr-sweetcorn.pdf ,EPA (2022) Assessment of the Benefits of Atrazine and the Impacts of Potential Mitigation for Field Corn, Sweet Corn, Sorghum, and Sugarcane; PC Code (080803). (MEMORANDUM).US Environmental Protection Agency. https://downloads.regulations.gov/EPA-HQ-OPP-2013-0266-1624/content.pdf
- Abamectin [soil, agricultural]: 1.3579e-6 kg; normal variance with pedigree 7.64987e-16, pedigree (2,3,3,3,1)
  Abamectin emission to agricultural soil (2.283E-02 kg/ha). Pesticides are assumed to be ultimately 100% emitted to soil across all rotation patterns, based on assumption that all sweet corn acres are treated, and assuming that cultivation is conventional tillage as common practice for weed management (EPA 2022; IPM 2003, IPM 1997).Data reported a quantity of total insecticides/herbicides/fungicides applied in sweet corn is sometimes available even when many of the substances in the category are reported with a “D”. If this total is available, the amount remaining after the sum of substance-specific values is accounted for is divided equally among the substances reported with a “D”. If the sum of available values exceeds or equals the total reported, any remaining “D” substances are treated as zero and omitted.
  Sources: SWEETCORN - APPLICATIONS, MEASURED IN LB / ACRE / YEAR, AVG (fertilizer and pesticides, amount, number of applications) - 2000-2021,https://quickstats.nass.usda.gov/#5E5B411A-F9EF-3B83-AAFF-995DD89820FC,IPM center (1997) Crop Profile for Corn (Sweet) in Maryland. Southern Integrated Pest Management Center. https://ipmdata.ipmcenters.org/documents/cropprofiles/MDcorn-sweet.pdf,IPM center (2003) Crop Profile for Sweet Corn in the North Central United States. Southern Integrated Pest Management Center.Southern Integrated Pest Management Center. https://ipmdata.ipmcenters.org/documents/cropprofiles/us-ncr-sweetcorn.pdf ,EPA (2022) Assessment of the Benefits of Atrazine and the Impacts of Potential Mitigation for Field Corn, Sweet Corn, Sorghum, and Sugarcane; PC Code (080803). (MEMORANDUM).US Environmental Protection Agency. https://downloads.regulations.gov/EPA-HQ-OPP-2013-0266-1624/content.pdf
- Acetamiprid [soil, agricultural]: 1.09706e-6 kg; normal variance with pedigree 3.25909e-16, pedigree (2,3,3,3,1)
  Acetamiprid emission to agricultural soil (1.844E-02 kg/ha). Pesticides are assumed to be ultimately 100% emitted to soil across all rotation patterns, based on assumption that all sweet corn acres are treated, and assuming that cultivation is conventional tillage as common practice for weed management (EPA 2022; IPM 2003, IPM 1997).Data reported a quantity of total insecticides/herbicides/fungicides applied in sweet corn is sometimes available even when many of the substances in the category are reported with a “D”. If this total is available, the amount remaining after the sum of substance-specific values is accounted for is divided equally among the substances reported with a “D”. If the sum of available values exceeds or equals the total reported, any remaining “D” substances are treated as zero and omitted.
  Sources: SWEETCORN - APPLICATIONS, MEASURED IN LB / ACRE / YEAR, AVG (fertilizer and pesticides, amount, number of applications) - 2000-2021,https://quickstats.nass.usda.gov/#5E5B411A-F9EF-3B83-AAFF-995DD89820FC,IPM center (1997) Crop Profile for Corn (Sweet) in Maryland. Southern Integrated Pest Management Center. https://ipmdata.ipmcenters.org/documents/cropprofiles/MDcorn-sweet.pdf,IPM center (2003) Crop Profile for Sweet Corn in the North Central United States. Southern Integrated Pest Management Center.Southern Integrated Pest Management Center. https://ipmdata.ipmcenters.org/documents/cropprofiles/us-ncr-sweetcorn.pdf ,EPA (2022) Assessment of the Benefits of Atrazine and the Impacts of Potential Mitigation for Field Corn, Sweet Corn, Sorghum, and Sugarcane; PC Code (080803). (MEMORANDUM).US Environmental Protection Agency. https://downloads.regulations.gov/EPA-HQ-OPP-2013-0266-1624/content.pdf
- Atrazine [soil, agricultural]: 3.07477e-5 kg; normal variance with pedigree 2.01109e-10, pedigree (2,3,3,3,1)
  Atrazine emission to agricultural soil (5.170E-01 kg/ha). Pesticides are assumed to be ultimately 100% emitted to soil across all rotation patterns, based on assumption that all sweet corn acres are treated, and assuming that cultivation is conventional tillage as common practice for weed management (EPA 2022; IPM 2003, IPM 1997).Data reported a quantity of total insecticides/herbicides/fungicides applied in sweet corn is sometimes available even when many of the substances in the category are reported with a “D”. If this total is available, the amount remaining after the sum of substance-specific values is accounted for is divided equally among the substances reported with a “D”. If the sum of available values exceeds or equals the total reported, any remaining “D” substances are treated as zero and omitted.
  Sources: SWEETCORN - APPLICATIONS, MEASURED IN LB / ACRE / YEAR, AVG (fertilizer and pesticides, amount, number of applications) - 2000-2021,https://quickstats.nass.usda.gov/#5E5B411A-F9EF-3B83-AAFF-995DD89820FC,IPM center (1997) Crop Profile for Corn (Sweet) in Maryland. Southern Integrated Pest Management Center. https://ipmdata.ipmcenters.org/documents/cropprofiles/MDcorn-sweet.pdf,IPM center (2003) Crop Profile for Sweet Corn in the North Central United States. Southern Integrated Pest Management Center.Southern Integrated Pest Management Center. https://ipmdata.ipmcenters.org/documents/cropprofiles/us-ncr-sweetcorn.pdf ,EPA (2022) Assessment of the Benefits of Atrazine and the Impacts of Potential Mitigation for Field Corn, Sweet Corn, Sorghum, and Sugarcane; PC Code (080803). (MEMORANDUM).US Environmental Protection Agency. https://downloads.regulations.gov/EPA-HQ-OPP-2013-0266-1624/content.pdf
- Beta-cyfluthrin [soil, agricultural]: 6.48668e-6 kg; normal variance with pedigree 9.95891e-14, pedigree (2,3,3,3,1)
  Beta-cyfluthrin emission to agricultural soil (1.091E-01 kg/ha). Pesticides are assumed to be ultimately 100% emitted to soil across all rotation patterns, based on assumption that all sweet corn acres are treated, and assuming that cultivation is conventional tillage as common practice for weed management (EPA 2022; IPM 2003, IPM 1997).Data reported a quantity of total insecticides/herbicides/fungicides applied in sweet corn is sometimes available even when many of the substances in the category are reported with a “D”. If this total is available, the amount remaining after the sum of substance-specific values is accounted for is divided equally among the substances reported with a “D”. If the sum of available values exceeds or equals the total reported, any remaining “D” substances are treated as zero and omitted.
  Sources: SWEETCORN - APPLICATIONS, MEASURED IN LB / ACRE / YEAR, AVG (fertilizer and pesticides, amount, number of applications) - 2000-2021,https://quickstats.nass.usda.gov/#5E5B411A-F9EF-3B83-AAFF-995DD89820FC,IPM center (1997) Crop Profile for Corn (Sweet) in Maryland. Southern Integrated Pest Management Center. https://ipmdata.ipmcenters.org/documents/cropprofiles/MDcorn-sweet.pdf,IPM center (2003) Crop Profile for Sweet Corn in the North Central United States. Southern Integrated Pest Management Center.Southern Integrated Pest Management Center. https://ipmdata.ipmcenters.org/documents/cropprofiles/us-ncr-sweetcorn.pdf ,EPA (2022) Assessment of the Benefits of Atrazine and the Impacts of Potential Mitigation for Field Corn, Sweet Corn, Sorghum, and Sugarcane; PC Code (080803). (MEMORANDUM).US Environmental Protection Agency. https://downloads.regulations.gov/EPA-HQ-OPP-2013-0266-1624/content.pdf
- Bifenthrin [soil, agricultural]: 1.88133e-6 kg; normal variance with pedigree 2.81868e-15, pedigree (2,3,3,3,1)
  Bifenthrin emission to agricultural soil (3.163E-02 kg/ha). Pesticides are assumed to be ultimately 100% emitted to soil across all rotation patterns, based on assumption that all sweet corn acres are treated, and assuming that cultivation is conventional tillage as common practice for weed management (EPA 2022; IPM 2003, IPM 1997).Data reported a quantity of total insecticides/herbicides/fungicides applied in sweet corn is sometimes available even when many of the substances in the category are reported with a “D”. If this total is available, the amount remaining after the sum of substance-specific values is accounted for is divided equally among the substances reported with a “D”. If the sum of available values exceeds or equals the total reported, any remaining “D” substances are treated as zero and omitted.
  Sources: SWEETCORN - APPLICATIONS, MEASURED IN LB / ACRE / YEAR, AVG (fertilizer and pesticides, amount, number of applications) - 2000-2021,https://quickstats.nass.usda.gov/#5E5B411A-F9EF-3B83-AAFF-995DD89820FC,IPM center (1997) Crop Profile for Corn (Sweet) in Maryland. Southern Integrated Pest Management Center. https://ipmdata.ipmcenters.org/documents/cropprofiles/MDcorn-sweet.pdf,IPM center (2003) Crop Profile for Sweet Corn in the North Central United States. Southern Integrated Pest Management Center.Southern Integrated Pest Management Center. https://ipmdata.ipmcenters.org/documents/cropprofiles/us-ncr-sweetcorn.pdf ,EPA (2022) Assessment of the Benefits of Atrazine and the Impacts of Potential Mitigation for Field Corn, Sweet Corn, Sorghum, and Sugarcane; PC Code (080803). (MEMORANDUM).US Environmental Protection Agency. https://downloads.regulations.gov/EPA-HQ-OPP-2013-0266-1624/content.pdf
- Cadmium II [soil, agricultural]: -4.71693e-9 kg; normal variance with pedigree 0.04, pedigree (2,3,3,1,1)
  Emissions of heavy metals to soil are estimated based on the SALCA-heavy metal model (Freiermuth 2006) following the procedure in the ecoinvent agricultural LCI tool (Faist Emmenegger, Délerce-Mauris and Porté 2018 Models Integrated in Ecoinvent LCI Calculation Tool for Crop Production). The balance of heavy metal emissions to soils includes the net change from erosion, leaching, crop removal and fertilizer, manure, lime, planting and deposition. The crop system carries a share of heavy metals emissions based on the ratio of cropping additions to total additions (additions to crop system divided by additions to crop system plus depostion from air and present in soils) Sources for heavy metals contents include: Heavy-metal contents of plant material, maize (mg/kg dry matter, from Freiermuth 2006). ; Leaching of heavy metals to surface water (Wolfensberger & Dinkel 1997), where drainage is installed ; Deposition of heavy metals to soils, mg per ha per year (Freiermuth 2006). ; Deposition of heavy metals to soils, mg per ha per year (Freiermuth 2006). ; Average heavy metal contents in crop soils, mg per kg soil, based on data for Switzerland (from Keller & Desaules, 2001). state and regional erosion rates are from US NRC National Resources Inventory, 2017. and Drainage on all cropland acres state-wide, including tile drainage (4.2%,) and ditch drainage (5.1%). USDA (2018a) 2017 Census of Agriculture, Volume 1, Chapter 2: State Level Data - Table 41. Land Use Practices: 2017 and 2012 (live table: https://www.nass.usda.gov/Quick_Stats/CDQT/chapter/2/table/41/state/US). US Department of Agriculture (USDA). https://www.nass.usda.gov/Publications/AgCensus/2017/Full_Report/Volume_1,_Chapter_2_US_State_Level/st99_2_0041_0041.pdf. Fertilizer, manure and pesticide application rates are based on USDA NASS data.
- Carbaryl [soil, agricultural]: 3.62906e-6 kg; normal variance with pedigree 3.90262e-14, pedigree (2,3,3,3,1)
  Carbaryl emission to agricultural soil (6.101E-02 kg/ha). Pesticides are assumed to be ultimately 100% emitted to soil across all rotation patterns, based on assumption that all sweet corn acres are treated, and assuming that cultivation is conventional tillage as common practice for weed management (EPA 2022; IPM 2003, IPM 1997).Data reported a quantity of total insecticides/herbicides/fungicides applied in sweet corn is sometimes available even when many of the substances in the category are reported with a “D”. If this total is available, the amount remaining after the sum of substance-specific values is accounted for is divided equally among the substances reported with a “D”. If the sum of available values exceeds or equals the total reported, any remaining “D” substances are treated as zero and omitted.
  Sources: SWEETCORN - APPLICATIONS, MEASURED IN LB / ACRE / YEAR, AVG (fertilizer and pesticides, amount, number of applications) - 2000-2021,https://quickstats.nass.usda.gov/#5E5B411A-F9EF-3B83-AAFF-995DD89820FC,IPM center (1997) Crop Profile for Corn (Sweet) in Maryland. Southern Integrated Pest Management Center. https://ipmdata.ipmcenters.org/documents/cropprofiles/MDcorn-sweet.pdf,IPM center (2003) Crop Profile for Sweet Corn in the North Central United States. Southern Integrated Pest Management Center.Southern Integrated Pest Management Center. https://ipmdata.ipmcenters.org/documents/cropprofiles/us-ncr-sweetcorn.pdf ,EPA (2022) Assessment of the Benefits of Atrazine and the Impacts of Potential Mitigation for Field Corn, Sweet Corn, Sorghum, and Sugarcane; PC Code (080803). (MEMORANDUM).US Environmental Protection Agency. https://downloads.regulations.gov/EPA-HQ-OPP-2013-0266-1624/content.pdf
- Chlorimuron-ethyl [soil, agricultural]: 1.14469e-6 kg; normal variance with pedigree 3.86312e-16, pedigree (2,3,3,3,1)
  Chlorimuron-ethyl emission to agricultural soil (1.925E-02 kg/ha). Pesticides are assumed to be ultimately 100% emitted to soil across all rotation patterns, based on assumption that all sweet corn acres are treated, and assuming that cultivation is conventional tillage as common practice for weed management (EPA 2022; IPM 2003, IPM 1997).Data reported a quantity of total insecticides/herbicides/fungicides applied in sweet corn is sometimes available even when many of the substances in the category are reported with a “D”. If this total is available, the amount remaining after the sum of substance-specific values is accounted for is divided equally among the substances reported with a “D”. If the sum of available values exceeds or equals the total reported, any remaining “D” substances are treated as zero and omitted.
  Sources: SWEETCORN - APPLICATIONS, MEASURED IN LB / ACRE / YEAR, AVG (fertilizer and pesticides, amount, number of applications) - 2000-2021,https://quickstats.nass.usda.gov/#5E5B411A-F9EF-3B83-AAFF-995DD89820FC,IPM center (1997) Crop Profile for Corn (Sweet) in Maryland. Southern Integrated Pest Management Center. https://ipmdata.ipmcenters.org/documents/cropprofiles/MDcorn-sweet.pdf,IPM center (2003) Crop Profile for Sweet Corn in the North Central United States. Southern Integrated Pest Management Center.Southern Integrated Pest Management Center. https://ipmdata.ipmcenters.org/documents/cropprofiles/us-ncr-sweetcorn.pdf ,EPA (2022) Assessment of the Benefits of Atrazine and the Impacts of Potential Mitigation for Field Corn, Sweet Corn, Sorghum, and Sugarcane; PC Code (080803). (MEMORANDUM).US Environmental Protection Agency. https://downloads.regulations.gov/EPA-HQ-OPP-2013-0266-1624/content.pdf
- Chlorothalonil [soil, agricultural]: 7.09988e-6 kg; normal variance with pedigree 0.033, pedigree (2,3,3,3,1)
  Chlorothalonil emission to agricultural soil (1.194E-01 kg/ha). Pesticides are assumed to be ultimately 100% emitted to soil across all rotation patterns, based on assumption that all sweet corn acres are treated, and assuming that cultivation is conventional tillage as common practice for weed management (EPA 2022; IPM 2003, IPM 1997).Data reported a quantity of total insecticides/herbicides/fungicides applied in sweet corn is sometimes available even when many of the substances in the category are reported with a “D”. If this total is available, the amount remaining after the sum of substance-specific values is accounted for is divided equally among the substances reported with a “D”. If the sum of available values exceeds or equals the total reported, any remaining “D” substances are treated as zero and omitted.
  Sources: SWEETCORN - APPLICATIONS, MEASURED IN LB / ACRE / YEAR, AVG (fertilizer and pesticides, amount, number of applications) - 2000-2021,https://quickstats.nass.usda.gov/#5E5B411A-F9EF-3B83-AAFF-995DD89820FC,IPM center (1997) Crop Profile for Corn (Sweet) in Maryland. Southern Integrated Pest Management Center. https://ipmdata.ipmcenters.org/documents/cropprofiles/MDcorn-sweet.pdf,IPM center (2003) Crop Profile for Sweet Corn in the North Central United States. Southern Integrated Pest Management Center.Southern Integrated Pest Management Center. https://ipmdata.ipmcenters.org/documents/cropprofiles/us-ncr-sweetcorn.pdf ,EPA (2022) Assessment of the Benefits of Atrazine and the Impacts of Potential Mitigation for Field Corn, Sweet Corn, Sorghum, and Sugarcane; PC Code (080803). (MEMORANDUM).US Environmental Protection Agency. https://downloads.regulations.gov/EPA-HQ-OPP-2013-0266-1624/content.pdf
- Chromium III [soil, agricultural]: -8.66416e-6 kg; normal variance with pedigree 0.04, pedigree (2,3,3,1,1)
  (same comment as for Cadmium II)
- Copper ion [soil, agricultural]: -3.22675e-6 kg; normal variance with pedigree 0.04, pedigree (2,3,3,1,1)
  (same comment as for Cadmium II)
- Cupric hydroxide [soil, agricultural]: 7.09988e-6 kg; normal variance with pedigree 5.71724e-13, pedigree (2,3,3,3,1)
  Cupric hydroxide emission to agricultural soil (1.194E-01 kg/ha). Pesticides are assumed to be ultimately 100% emitted to soil across all rotation patterns, based on assumption that all sweet corn acres are treated, and assuming that cultivation is conventional tillage as common practice for weed management (EPA 2022; IPM 2003, IPM 1997).Data reported a quantity of total insecticides/herbicides/fungicides applied in sweet corn is sometimes available even when many of the substances in the category are reported with a “D”. If this total is available, the amount remaining after the sum of substance-specific values is accounted for is divided equally among the substances reported with a “D”. If the sum of available values exceeds or equals the total reported, any remaining “D” substances are treated as zero and omitted.
  Sources: SWEETCORN - APPLICATIONS, MEASURED IN LB / ACRE / YEAR, AVG (fertilizer and pesticides, amount, number of applications) - 2000-2021,https://quickstats.nass.usda.gov/#5E5B411A-F9EF-3B83-AAFF-995DD89820FC,IPM center (1997) Crop Profile for Corn (Sweet) in Maryland. Southern Integrated Pest Management Center. https://ipmdata.ipmcenters.org/documents/cropprofiles/MDcorn-sweet.pdf,IPM center (2003) Crop Profile for Sweet Corn in the North Central United States. Southern Integrated Pest Management Center.Southern Integrated Pest Management Center. https://ipmdata.ipmcenters.org/documents/cropprofiles/us-ncr-sweetcorn.pdf ,EPA (2022) Assessment of the Benefits of Atrazine and the Impacts of Potential Mitigation for Field Corn, Sweet Corn, Sorghum, and Sugarcane; PC Code (080803). (MEMORANDUM).US Environmental Protection Agency. https://downloads.regulations.gov/EPA-HQ-OPP-2013-0266-1624/content.pdf
- Dimethenamid-P [soil, agricultural]: 6.61903e-6 kg; normal variance with pedigree 4.31878e-13, pedigree (2,3,3,3,1)
  Dimethenamid-P emission to agricultural soil (1.113E-01 kg/ha). Pesticides are assumed to be ultimately 100% emitted to soil across all rotation patterns, based on assumption that all sweet corn acres are treated, and assuming that cultivation is conventional tillage as common practice for weed management (EPA 2022; IPM 2003, IPM 1997).Data reported a quantity of total insecticides/herbicides/fungicides applied in sweet corn is sometimes available even when many of the substances in the category are reported with a “D”. If this total is available, the amount remaining after the sum of substance-specific values is accounted for is divided equally among the substances reported with a “D”. If the sum of available values exceeds or equals the total reported, any remaining “D” substances are treated as zero and omitted.
  Sources: SWEETCORN - APPLICATIONS, MEASURED IN LB / ACRE / YEAR, AVG (fertilizer and pesticides, amount, number of applications) - 2000-2021,https://quickstats.nass.usda.gov/#5E5B411A-F9EF-3B83-AAFF-995DD89820FC,IPM center (1997) Crop Profile for Corn (Sweet) in Maryland. Southern Integrated Pest Management Center. https://ipmdata.ipmcenters.org/documents/cropprofiles/MDcorn-sweet.pdf,IPM center (2003) Crop Profile for Sweet Corn in the North Central United States. Southern Integrated Pest Management Center.Southern Integrated Pest Management Center. https://ipmdata.ipmcenters.org/documents/cropprofiles/us-ncr-sweetcorn.pdf ,EPA (2022) Assessment of the Benefits of Atrazine and the Impacts of Potential Mitigation for Field Corn, Sweet Corn, Sorghum, and Sugarcane; PC Code (080803). (MEMORANDUM).US Environmental Protection Agency. https://downloads.regulations.gov/EPA-HQ-OPP-2013-0266-1624/content.pdf
- Esfenvalerate [soil, agricultural]: 1.14607e-5 kg; normal variance with pedigree 3.8817e-12, pedigree (2,3,3,3,1)
  Esfenvalerate emission to agricultural soil (1.927E-01 kg/ha). Pesticides are assumed to be ultimately 100% emitted to soil across all rotation patterns, based on assumption that all sweet corn acres are treated, and assuming that cultivation is conventional tillage as common practice for weed management (EPA 2022; IPM 2003, IPM 1997).Data reported a quantity of total insecticides/herbicides/fungicides applied in sweet corn is sometimes available even when many of the substances in the category are reported with a “D”. If this total is available, the amount remaining after the sum of substance-specific values is accounted for is divided equally among the substances reported with a “D”. If the sum of available values exceeds or equals the total reported, any remaining “D” substances are treated as zero and omitted.
  Sources: SWEETCORN - APPLICATIONS, MEASURED IN LB / ACRE / YEAR, AVG (fertilizer and pesticides, amount, number of applications) - 2000-2021,https://quickstats.nass.usda.gov/#5E5B411A-F9EF-3B83-AAFF-995DD89820FC,IPM center (1997) Crop Profile for Corn (Sweet) in Maryland. Southern Integrated Pest Management Center. https://ipmdata.ipmcenters.org/documents/cropprofiles/MDcorn-sweet.pdf,IPM center (2003) Crop Profile for Sweet Corn in the North Central United States. Southern Integrated Pest Management Center.Southern Integrated Pest Management Center. https://ipmdata.ipmcenters.org/documents/cropprofiles/us-ncr-sweetcorn.pdf ,EPA (2022) Assessment of the Benefits of Atrazine and the Impacts of Potential Mitigation for Field Corn, Sweet Corn, Sorghum, and Sugarcane; PC Code (080803). (MEMORANDUM).US Environmental Protection Agency. https://downloads.regulations.gov/EPA-HQ-OPP-2013-0266-1624/content.pdf
- Flubendiamide [soil, agricultural]: 1.55306e-6 kg; normal variance with pedigree 1.30897e-15, pedigree (2,3,3,3,1)
  Flubendiamide emission to agricultural soil (2.611E-02 kg/ha). Pesticides are assumed to be ultimately 100% emitted to soil across all rotation patterns, based on assumption that all sweet corn acres are treated, and assuming that cultivation is conventional tillage as common practice for weed management (EPA 2022; IPM 2003, IPM 1997).Data reported a quantity of total insecticides/herbicides/fungicides applied in sweet corn is sometimes available even when many of the substances in the category are reported with a “D”. If this total is available, the amount remaining after the sum of substance-specific values is accounted for is divided equally among the substances reported with a “D”. If the sum of available values exceeds or equals the total reported, any remaining “D” substances are treated as zero and omitted.
  Sources: SWEETCORN - APPLICATIONS, MEASURED IN LB / ACRE / YEAR, AVG (fertilizer and pesticides, amount, number of applications) - 2000-2021,https://quickstats.nass.usda.gov/#5E5B411A-F9EF-3B83-AAFF-995DD89820FC,IPM center (1997) Crop Profile for Corn (Sweet) in Maryland. Southern Integrated Pest Management Center. https://ipmdata.ipmcenters.org/documents/cropprofiles/MDcorn-sweet.pdf,IPM center (2003) Crop Profile for Sweet Corn in the North Central United States. Southern Integrated Pest Management Center.Southern Integrated Pest Management Center. https://ipmdata.ipmcenters.org/documents/cropprofiles/us-ncr-sweetcorn.pdf ,EPA (2022) Assessment of the Benefits of Atrazine and the Impacts of Potential Mitigation for Field Corn, Sweet Corn, Sorghum, and Sugarcane; PC Code (080803). (MEMORANDUM).US Environmental Protection Agency. https://downloads.regulations.gov/EPA-HQ-OPP-2013-0266-1624/content.pdf
- Fungicides, unspecified [soil, agricultural]: 1.05417e-5 kg; normal variance with pedigree 2.77856e-12, pedigree (2,3,3,3,1)
  Fungicide, unspecified emission to agricultural soil (1.772E-01 kg/ha). Pesticides are assumed to be ultimately 100% emitted to soil across all rotation patterns, based on assumption that all sweet corn acres are treated, and assuming that cultivation is conventional tillage as common practice for weed management (EPA 2022; IPM 2003, IPM 1997).Data reported a quantity of total insecticides/herbicides/fungicides applied in sweet corn is sometimes available even when many of the substances in the category are reported with a “D”. If this total is available, the amount remaining after the sum of substance-specific values is accounted for is divided equally among the substances reported with a “D”. If the sum of available values exceeds or equals the total reported, any remaining “D” substances are treated as zero and omitted.
  Sources: SWEETCORN - APPLICATIONS, MEASURED IN LB / ACRE / YEAR, AVG (fertilizer and pesticides, amount, number of applications) - 2000-2021,https://quickstats.nass.usda.gov/#5E5B411A-F9EF-3B83-AAFF-995DD89820FC,IPM center (1997) Crop Profile for Corn (Sweet) in Maryland. Southern Integrated Pest Management Center. https://ipmdata.ipmcenters.org/documents/cropprofiles/MDcorn-sweet.pdf,IPM center (2003) Crop Profile for Sweet Corn in the North Central United States. Southern Integrated Pest Management Center.Southern Integrated Pest Management Center. https://ipmdata.ipmcenters.org/documents/cropprofiles/us-ncr-sweetcorn.pdf ,EPA (2022) Assessment of the Benefits of Atrazine and the Impacts of Potential Mitigation for Field Corn, Sweet Corn, Sorghum, and Sugarcane; PC Code (080803). (MEMORANDUM).US Environmental Protection Agency. https://downloads.regulations.gov/EPA-HQ-OPP-2013-0266-1624/content.pdf
- Glufosinate [soil, agricultural]: 6.61903e-6 kg; normal variance with pedigree 4.31878e-13, pedigree (2,3,3,3,1)
  Glufosinate emission to agricultural soil (1.113E-01 kg/ha). Pesticides are assumed to be ultimately 100% emitted to soil across all rotation patterns, based on assumption that all sweet corn acres are treated, and assuming that cultivation is conventional tillage as common practice for weed management (EPA 2022; IPM 2003, IPM 1997).Data reported a quantity of total insecticides/herbicides/fungicides applied in sweet corn is sometimes available even when many of the substances in the category are reported with a “D”. If this total is available, the amount remaining after the sum of substance-specific values is accounted for is divided equally among the substances reported with a “D”. If the sum of available values exceeds or equals the total reported, any remaining “D” substances are treated as zero and omitted.
  Sources: SWEETCORN - APPLICATIONS, MEASURED IN LB / ACRE / YEAR, AVG (fertilizer and pesticides, amount, number of applications) - 2000-2021,https://quickstats.nass.usda.gov/#5E5B411A-F9EF-3B83-AAFF-995DD89820FC,IPM center (1997) Crop Profile for Corn (Sweet) in Maryland. Southern Integrated Pest Management Center. https://ipmdata.ipmcenters.org/documents/cropprofiles/MDcorn-sweet.pdf,IPM center (2003) Crop Profile for Sweet Corn in the North Central United States. Southern Integrated Pest Management Center.Southern Integrated Pest Management Center. https://ipmdata.ipmcenters.org/documents/cropprofiles/us-ncr-sweetcorn.pdf ,EPA (2022) Assessment of the Benefits of Atrazine and the Impacts of Potential Mitigation for Field Corn, Sweet Corn, Sorghum, and Sugarcane; PC Code (080803). (MEMORANDUM).US Environmental Protection Agency. https://downloads.regulations.gov/EPA-HQ-OPP-2013-0266-1624/content.pdf
- Glyphosate [soil, agricultural]: 1.98571e-5 kg; normal variance with pedigree 1.39928e-12, pedigree (2,3,3,3,1)
  Glyphosate emission to agricultural soil (3.339E-01 kg/ha). Pesticides are assumed to be ultimately 100% emitted to soil across all rotation patterns, based on assumption that all sweet corn acres are treated, and assuming that cultivation is conventional tillage as common practice for weed management (EPA 2022; IPM 2003, IPM 1997).Data reported a quantity of total insecticides/herbicides/fungicides applied in sweet corn is sometimes available even when many of the substances in the category are reported with a “D”. If this total is available, the amount remaining after the sum of substance-specific values is accounted for is divided equally among the substances reported with a “D”. If the sum of available values exceeds or equals the total reported, any remaining “D” substances are treated as zero and omitted.
  Sources: SWEETCORN - APPLICATIONS, MEASURED IN LB / ACRE / YEAR, AVG (fertilizer and pesticides, amount, number of applications) - 2000-2021,https://quickstats.nass.usda.gov/#5E5B411A-F9EF-3B83-AAFF-995DD89820FC,IPM center (1997) Crop Profile for Corn (Sweet) in Maryland. Southern Integrated Pest Management Center. https://ipmdata.ipmcenters.org/documents/cropprofiles/MDcorn-sweet.pdf,IPM center (2003) Crop Profile for Sweet Corn in the North Central United States. Southern Integrated Pest Management Center.Southern Integrated Pest Management Center. https://ipmdata.ipmcenters.org/documents/cropprofiles/us-ncr-sweetcorn.pdf ,EPA (2022) Assessment of the Benefits of Atrazine and the Impacts of Potential Mitigation for Field Corn, Sweet Corn, Sorghum, and Sugarcane; PC Code (080803). (MEMORANDUM).US Environmental Protection Agency. https://downloads.regulations.gov/EPA-HQ-OPP-2013-0266-1624/content.pdf
- Halosulfuron-methyl [soil, agricultural]: 6.61903e-6 kg; normal variance with pedigree 4.31878e-13, pedigree (2,3,3,3,1)
  Halosulfuron-methyl emission to agricultural soil (1.113E-01 kg/ha). Pesticides are assumed to be ultimately 100% emitted to soil across all rotation patterns, based on assumption that all sweet corn acres are treated, and assuming that cultivation is conventional tillage as common practice for weed management (EPA 2022; IPM 2003, IPM 1997).Data reported a quantity of total insecticides/herbicides/fungicides applied in sweet corn is sometimes available even when many of the substances in the category are reported with a “D”. If this total is available, the amount remaining after the sum of substance-specific values is accounted for is divided equally among the substances reported with a “D”. If the sum of available values exceeds or equals the total reported, any remaining “D” substances are treated as zero and omitted.
  Sources: SWEETCORN - APPLICATIONS, MEASURED IN LB / ACRE / YEAR, AVG (fertilizer and pesticides, amount, number of applications) - 2000-2021,https://quickstats.nass.usda.gov/#5E5B411A-F9EF-3B83-AAFF-995DD89820FC,IPM center (1997) Crop Profile for Corn (Sweet) in Maryland. Southern Integrated Pest Management Center. https://ipmdata.ipmcenters.org/documents/cropprofiles/MDcorn-sweet.pdf,IPM center (2003) Crop Profile for Sweet Corn in the North Central United States. Southern Integrated Pest Management Center.Southern Integrated Pest Management Center. https://ipmdata.ipmcenters.org/documents/cropprofiles/us-ncr-sweetcorn.pdf ,EPA (2022) Assessment of the Benefits of Atrazine and the Impacts of Potential Mitigation for Field Corn, Sweet Corn, Sorghum, and Sugarcane; PC Code (080803). (MEMORANDUM).US Environmental Protection Agency. https://downloads.regulations.gov/EPA-HQ-OPP-2013-0266-1624/content.pdf
- Hexythiazox [soil, agricultural]: 2.19467e-6 kg; normal variance with pedigree 5.21984e-15, pedigree (2,3,3,3,1)
  Hexythiazox emission to agricultural soil (3.690E-02 kg/ha). Pesticides are assumed to be ultimately 100% emitted to soil across all rotation patterns, based on assumption that all sweet corn acres are treated, and assuming that cultivation is conventional tillage as common practice for weed management (EPA 2022; IPM 2003, IPM 1997).Data reported a quantity of total insecticides/herbicides/fungicides applied in sweet corn is sometimes available even when many of the substances in the category are reported with a “D”. If this total is available, the amount remaining after the sum of substance-specific values is accounted for is divided equally among the substances reported with a “D”. If the sum of available values exceeds or equals the total reported, any remaining “D” substances are treated as zero and omitted.
  Sources: SWEETCORN - APPLICATIONS, MEASURED IN LB / ACRE / YEAR, AVG (fertilizer and pesticides, amount, number of applications) - 2000-2021,https://quickstats.nass.usda.gov/#5E5B411A-F9EF-3B83-AAFF-995DD89820FC,IPM center (1997) Crop Profile for Corn (Sweet) in Maryland. Southern Integrated Pest Management Center. https://ipmdata.ipmcenters.org/documents/cropprofiles/MDcorn-sweet.pdf,IPM center (2003) Crop Profile for Sweet Corn in the North Central United States. Southern Integrated Pest Management Center.Southern Integrated Pest Management Center. https://ipmdata.ipmcenters.org/documents/cropprofiles/us-ncr-sweetcorn.pdf ,EPA (2022) Assessment of the Benefits of Atrazine and the Impacts of Potential Mitigation for Field Corn, Sweet Corn, Sorghum, and Sugarcane; PC Code (080803). (MEMORANDUM).US Environmental Protection Agency. https://downloads.regulations.gov/EPA-HQ-OPP-2013-0266-1624/content.pdf
- Indoxacarb [soil, agricultural]: 2.03896e-6 kg; normal variance with pedigree 3.88878e-15, pedigree (2,3,3,3,1)
  Indoxacarb emission to agricultural soil (3.428E-02 kg/ha). Pesticides are assumed to be ultimately 100% emitted to soil across all rotation patterns, based on assumption that all sweet corn acres are treated, and assuming that cultivation is conventional tillage as common practice for weed management (EPA 2022; IPM 2003, IPM 1997).Data reported a quantity of total insecticides/herbicides/fungicides applied in sweet corn is sometimes available even when many of the substances in the category are reported with a “D”. If this total is available, the amount remaining after the sum of substance-specific values is accounted for is divided equally among the substances reported with a “D”. If the sum of available values exceeds or equals the total reported, any remaining “D” substances are treated as zero and omitted.
  Sources: SWEETCORN - APPLICATIONS, MEASURED IN LB / ACRE / YEAR, AVG (fertilizer and pesticides, amount, number of applications) - 2000-2021,https://quickstats.nass.usda.gov/#5E5B411A-F9EF-3B83-AAFF-995DD89820FC,IPM center (1997) Crop Profile for Corn (Sweet) in Maryland. Southern Integrated Pest Management Center. https://ipmdata.ipmcenters.org/documents/cropprofiles/MDcorn-sweet.pdf,IPM center (2003) Crop Profile for Sweet Corn in the North Central United States. Southern Integrated Pest Management Center.Southern Integrated Pest Management Center. https://ipmdata.ipmcenters.org/documents/cropprofiles/us-ncr-sweetcorn.pdf ,EPA (2022) Assessment of the Benefits of Atrazine and the Impacts of Potential Mitigation for Field Corn, Sweet Corn, Sorghum, and Sugarcane; PC Code (080803). (MEMORANDUM).US Environmental Protection Agency. https://downloads.regulations.gov/EPA-HQ-OPP-2013-0266-1624/content.pdf
- Lambda-cyhalothrin [soil, agricultural]: 8.487e-6 kg; normal variance with pedigree 1.16735e-12, pedigree (2,3,3,3,1)
  Lambda-Cyhalothrin emission to agricultural soil (1.427E-01 kg/ha). Pesticides are assumed to be ultimately 100% emitted to soil across all rotation patterns, based on assumption that all sweet corn acres are treated, and assuming that cultivation is conventional tillage as common practice for weed management (EPA 2022; IPM 2003, IPM 1997).Data reported a quantity of total insecticides/herbicides/fungicides applied in sweet corn is sometimes available even when many of the substances in the category are reported with a “D”. If this total is available, the amount remaining after the sum of substance-specific values is accounted for is divided equally among the substances reported with a “D”. If the sum of available values exceeds or equals the total reported, any remaining “D” substances are treated as zero and omitted.
  Sources: SWEETCORN - APPLICATIONS, MEASURED IN LB / ACRE / YEAR, AVG (fertilizer and pesticides, amount, number of applications) - 2000-2021,https://quickstats.nass.usda.gov/#5E5B411A-F9EF-3B83-AAFF-995DD89820FC,IPM center (1997) Crop Profile for Corn (Sweet) in Maryland. Southern Integrated Pest Management Center. https://ipmdata.ipmcenters.org/documents/cropprofiles/MDcorn-sweet.pdf,IPM center (2003) Crop Profile for Sweet Corn in the North Central United States. Southern Integrated Pest Management Center.Southern Integrated Pest Management Center. https://ipmdata.ipmcenters.org/documents/cropprofiles/us-ncr-sweetcorn.pdf ,EPA (2022) Assessment of the Benefits of Atrazine and the Impacts of Potential Mitigation for Field Corn, Sweet Corn, Sorghum, and Sugarcane; PC Code (080803). (MEMORANDUM).US Environmental Protection Agency. https://downloads.regulations.gov/EPA-HQ-OPP-2013-0266-1624/content.pdf
- Lead II [soil, agricultural]: -4.46478e-7 kg; normal variance with pedigree 0.04, pedigree (2,3,3,1,1)
  (same comment as for Cadmium II)
- Malathion [soil, agricultural]: 2.03896e-6 kg; normal variance with pedigree 3.88878e-15, pedigree (2,3,3,3,1)
  Malathion emission to agricultural soil (3.428E-02 kg/ha). Pesticides are assumed to be ultimately 100% emitted to soil across all rotation patterns, based on assumption that all sweet corn acres are treated, and assuming that cultivation is conventional tillage as common practice for weed management (EPA 2022; IPM 2003, IPM 1997).Data reported a quantity of total insecticides/herbicides/fungicides applied in sweet corn is sometimes available even when many of the substances in the category are reported with a “D”. If this total is available, the amount remaining after the sum of substance-specific values is accounted for is divided equally among the substances reported with a “D”. If the sum of available values exceeds or equals the total reported, any remaining “D” substances are treated as zero and omitted.
  Sources: SWEETCORN - APPLICATIONS, MEASURED IN LB / ACRE / YEAR, AVG (fertilizer and pesticides, amount, number of applications) - 2000-2021,https://quickstats.nass.usda.gov/#5E5B411A-F9EF-3B83-AAFF-995DD89820FC,IPM center (1997) Crop Profile for Corn (Sweet) in Maryland. Southern Integrated Pest Management Center. https://ipmdata.ipmcenters.org/documents/cropprofiles/MDcorn-sweet.pdf,IPM center (2003) Crop Profile for Sweet Corn in the North Central United States. Southern Integrated Pest Management Center.Southern Integrated Pest Management Center. https://ipmdata.ipmcenters.org/documents/cropprofiles/us-ncr-sweetcorn.pdf ,EPA (2022) Assessment of the Benefits of Atrazine and the Impacts of Potential Mitigation for Field Corn, Sweet Corn, Sorghum, and Sugarcane; PC Code (080803). (MEMORANDUM).US Environmental Protection Agency. https://downloads.regulations.gov/EPA-HQ-OPP-2013-0266-1624/content.pdf
- Methomyl [soil, agricultural]: 0.000157052 kg; normal variance with pedigree 1.36886e-7, pedigree (2,3,3,3,1)
  Methomyl emission to agricultural soil (2.640E+00 kg/ha). Pesticides are assumed to be ultimately 100% emitted to soil across all rotation patterns, based on assumption that all sweet corn acres are treated, and assuming that cultivation is conventional tillage as common practice for weed management (EPA 2022; IPM 2003, IPM 1997).Data reported a quantity of total insecticides/herbicides/fungicides applied in sweet corn is sometimes available even when many of the substances in the category are reported with a “D”. If this total is available, the amount remaining after the sum of substance-specific values is accounted for is divided equally among the substances reported with a “D”. If the sum of available values exceeds or equals the total reported, any remaining “D” substances are treated as zero and omitted.
  Sources: SWEETCORN - APPLICATIONS, MEASURED IN LB / ACRE / YEAR, AVG (fertilizer and pesticides, amount, number of applications) - 2000-2021,https://quickstats.nass.usda.gov/#5E5B411A-F9EF-3B83-AAFF-995DD89820FC,IPM center (1997) Crop Profile for Corn (Sweet) in Maryland. Southern Integrated Pest Management Center. https://ipmdata.ipmcenters.org/documents/cropprofiles/MDcorn-sweet.pdf,IPM center (2003) Crop Profile for Sweet Corn in the North Central United States. Southern Integrated Pest Management Center.Southern Integrated Pest Management Center. https://ipmdata.ipmcenters.org/documents/cropprofiles/us-ncr-sweetcorn.pdf ,EPA (2022) Assessment of the Benefits of Atrazine and the Impacts of Potential Mitigation for Field Corn, Sweet Corn, Sorghum, and Sugarcane; PC Code (080803). (MEMORANDUM).US Environmental Protection Agency. https://downloads.regulations.gov/EPA-HQ-OPP-2013-0266-1624/content.pdf
- Methoxyfenozide [soil, agricultural]: 1.5359e-6 kg; normal variance with pedigree 1.25209e-15, pedigree (2,3,3,3,1)
  Methoxyfenozide emission to agricultural soil (2.582E-02 kg/ha). Pesticides are assumed to be ultimately 100% emitted to soil across all rotation patterns, based on assumption that all sweet corn acres are treated, and assuming that cultivation is conventional tillage as common practice for weed management (EPA 2022; IPM 2003, IPM 1997).Data reported a quantity of total insecticides/herbicides/fungicides applied in sweet corn is sometimes available even when many of the substances in the category are reported with a “D”. If this total is available, the amount remaining after the sum of substance-specific values is accounted for is divided equally among the substances reported with a “D”. If the sum of available values exceeds or equals the total reported, any remaining “D” substances are treated as zero and omitted.
  Sources: SWEETCORN - APPLICATIONS, MEASURED IN LB / ACRE / YEAR, AVG (fertilizer and pesticides, amount, number of applications) - 2000-2021,https://quickstats.nass.usda.gov/#5E5B411A-F9EF-3B83-AAFF-995DD89820FC,IPM center (1997) Crop Profile for Corn (Sweet) in Maryland. Southern Integrated Pest Management Center. https://ipmdata.ipmcenters.org/documents/cropprofiles/MDcorn-sweet.pdf,IPM center (2003) Crop Profile for Sweet Corn in the North Central United States. Southern Integrated Pest Management Center.Southern Integrated Pest Management Center. https://ipmdata.ipmcenters.org/documents/cropprofiles/us-ncr-sweetcorn.pdf ,EPA (2022) Assessment of the Benefits of Atrazine and the Impacts of Potential Mitigation for Field Corn, Sweet Corn, Sorghum, and Sugarcane; PC Code (080803). (MEMORANDUM).US Environmental Protection Agency. https://downloads.regulations.gov/EPA-HQ-OPP-2013-0266-1624/content.pdf
- Nickel II [soil, agricultural]: -3.32525e-6 kg; normal variance with pedigree 0.04, pedigree (2,3,3,1,1)
  (same comment as for Cadmium II)
- Novaluron [soil, agricultural]: 2.03896e-6 kg; normal variance with pedigree 3.88878e-15, pedigree (2,3,3,3,1)
  Novaluron emission to agricultural soil (3.428E-02 kg/ha). Pesticides are assumed to be ultimately 100% emitted to soil across all rotation patterns, based on assumption that all sweet corn acres are treated, and assuming that cultivation is conventional tillage as common practice for weed management (EPA 2022; IPM 2003, IPM 1997).Data reported a quantity of total insecticides/herbicides/fungicides applied in sweet corn is sometimes available even when many of the substances in the category are reported with a “D”. If this total is available, the amount remaining after the sum of substance-specific values is accounted for is divided equally among the substances reported with a “D”. If the sum of available values exceeds or equals the total reported, any remaining “D” substances are treated as zero and omitted.
  Sources: SWEETCORN - APPLICATIONS, MEASURED IN LB / ACRE / YEAR, AVG (fertilizer and pesticides, amount, number of applications) - 2000-2021,https://quickstats.nass.usda.gov/#5E5B411A-F9EF-3B83-AAFF-995DD89820FC,IPM center (1997) Crop Profile for Corn (Sweet) in Maryland. Southern Integrated Pest Management Center. https://ipmdata.ipmcenters.org/documents/cropprofiles/MDcorn-sweet.pdf,IPM center (2003) Crop Profile for Sweet Corn in the North Central United States. Southern Integrated Pest Management Center.Southern Integrated Pest Management Center. https://ipmdata.ipmcenters.org/documents/cropprofiles/us-ncr-sweetcorn.pdf ,EPA (2022) Assessment of the Benefits of Atrazine and the Impacts of Potential Mitigation for Field Corn, Sweet Corn, Sorghum, and Sugarcane; PC Code (080803). (MEMORANDUM).US Environmental Protection Agency. https://downloads.regulations.gov/EPA-HQ-OPP-2013-0266-1624/content.pdf
- Pendimethalin [soil, agricultural]: 2.7536e-5 kg; normal variance with pedigree 1.29356e-10, pedigree (2,3,3,3,1)
  Pendimethalin emission to agricultural soil (4.630E-01 kg/ha). Pesticides are assumed to be ultimately 100% emitted to soil across all rotation patterns, based on assumption that all sweet corn acres are treated, and assuming that cultivation is conventional tillage as common practice for weed management (EPA 2022; IPM 2003, IPM 1997).Data reported a quantity of total insecticides/herbicides/fungicides applied in sweet corn is sometimes available even when many of the substances in the category are reported with a “D”. If this total is available, the amount remaining after the sum of substance-specific values is accounted for is divided equally among the substances reported with a “D”. If the sum of available values exceeds or equals the total reported, any remaining “D” substances are treated as zero and omitted.
  Sources: SWEETCORN - APPLICATIONS, MEASURED IN LB / ACRE / YEAR, AVG (fertilizer and pesticides, amount, number of applications) - 2000-2021,https://quickstats.nass.usda.gov/#5E5B411A-F9EF-3B83-AAFF-995DD89820FC,IPM center (1997) Crop Profile for Corn (Sweet) in Maryland. Southern Integrated Pest Management Center. https://ipmdata.ipmcenters.org/documents/cropprofiles/MDcorn-sweet.pdf,IPM center (2003) Crop Profile for Sweet Corn in the North Central United States. Southern Integrated Pest Management Center.Southern Integrated Pest Management Center. https://ipmdata.ipmcenters.org/documents/cropprofiles/us-ncr-sweetcorn.pdf ,EPA (2022) Assessment of the Benefits of Atrazine and the Impacts of Potential Mitigation for Field Corn, Sweet Corn, Sorghum, and Sugarcane; PC Code (080803). (MEMORANDUM).US Environmental Protection Agency. https://downloads.regulations.gov/EPA-HQ-OPP-2013-0266-1624/content.pdf
- Permethrin [soil, agricultural]: 2.03896e-6 kg; normal variance with pedigree 3.88878e-15, pedigree (2,3,3,3,1)
  Permethrin emission to agricultural soil (3.428E-02 kg/ha). Pesticides are assumed to be ultimately 100% emitted to soil across all rotation patterns, based on assumption that all sweet corn acres are treated, and assuming that cultivation is conventional tillage as common practice for weed management (EPA 2022; IPM 2003, IPM 1997).Data reported a quantity of total insecticides/herbicides/fungicides applied in sweet corn is sometimes available even when many of the substances in the category are reported with a “D”. If this total is available, the amount remaining after the sum of substance-specific values is accounted for is divided equally among the substances reported with a “D”. If the sum of available values exceeds or equals the total reported, any remaining “D” substances are treated as zero and omitted.
  Sources: SWEETCORN - APPLICATIONS, MEASURED IN LB / ACRE / YEAR, AVG (fertilizer and pesticides, amount, number of applications) - 2000-2021,https://quickstats.nass.usda.gov/#5E5B411A-F9EF-3B83-AAFF-995DD89820FC,IPM center (1997) Crop Profile for Corn (Sweet) in Maryland. Southern Integrated Pest Management Center. https://ipmdata.ipmcenters.org/documents/cropprofiles/MDcorn-sweet.pdf,IPM center (2003) Crop Profile for Sweet Corn in the North Central United States. Southern Integrated Pest Management Center.Southern Integrated Pest Management Center. https://ipmdata.ipmcenters.org/documents/cropprofiles/us-ncr-sweetcorn.pdf ,EPA (2022) Assessment of the Benefits of Atrazine and the Impacts of Potential Mitigation for Field Corn, Sweet Corn, Sorghum, and Sugarcane; PC Code (080803). (MEMORANDUM).US Environmental Protection Agency. https://downloads.regulations.gov/EPA-HQ-OPP-2013-0266-1624/content.pdf
- Propargite [soil, agricultural]: 2.03896e-6 kg; normal variance with pedigree 3.88878e-15, pedigree (2,3,3,3,1)
  Propargite emission to agricultural soil (3.428E-02 kg/ha). Pesticides are assumed to be ultimately 100% emitted to soil across all rotation patterns, based on assumption that all sweet corn acres are treated, and assuming that cultivation is conventional tillage as common practice for weed management (EPA 2022; IPM 2003, IPM 1997).Data reported a quantity of total insecticides/herbicides/fungicides applied in sweet corn is sometimes available even when many of the substances in the category are reported with a “D”. If this total is available, the amount remaining after the sum of substance-specific values is accounted for is divided equally among the substances reported with a “D”. If the sum of available values exceeds or equals the total reported, any remaining “D” substances are treated as zero and omitted.
  Sources: SWEETCORN - APPLICATIONS, MEASURED IN LB / ACRE / YEAR, AVG (fertilizer and pesticides, amount, number of applications) - 2000-2021,https://quickstats.nass.usda.gov/#5E5B411A-F9EF-3B83-AAFF-995DD89820FC,IPM center (1997) Crop Profile for Corn (Sweet) in Maryland. Southern Integrated Pest Management Center. https://ipmdata.ipmcenters.org/documents/cropprofiles/MDcorn-sweet.pdf,IPM center (2003) Crop Profile for Sweet Corn in the North Central United States. Southern Integrated Pest Management Center.Southern Integrated Pest Management Center. https://ipmdata.ipmcenters.org/documents/cropprofiles/us-ncr-sweetcorn.pdf ,EPA (2022) Assessment of the Benefits of Atrazine and the Impacts of Potential Mitigation for Field Corn, Sweet Corn, Sorghum, and Sugarcane; PC Code (080803). (MEMORANDUM).US Environmental Protection Agency. https://downloads.regulations.gov/EPA-HQ-OPP-2013-0266-1624/content.pdf
- S-Metolachlor [soil, agricultural]: 1.8408e-5 kg; normal variance with pedigree 2.5835e-11, pedigree (2,3,3,3,1)
  S-metolachlor emission to agricultural soil (3.095E-01 kg/ha). Pesticides are assumed to be ultimately 100% emitted to soil across all rotation patterns, based on assumption that all sweet corn acres are treated, and assuming that cultivation is conventional tillage as common practice for weed management (EPA 2022; IPM 2003, IPM 1997).Data reported a quantity of total insecticides/herbicides/fungicides applied in sweet corn is sometimes available even when many of the substances in the category are reported with a “D”. If this total is available, the amount remaining after the sum of substance-specific values is accounted for is divided equally among the substances reported with a “D”. If the sum of available values exceeds or equals the total reported, any remaining “D” substances are treated as zero and omitted.
  Sources: SWEETCORN - APPLICATIONS, MEASURED IN LB / ACRE / YEAR, AVG (fertilizer and pesticides, amount, number of applications) - 2000-2021,https://quickstats.nass.usda.gov/#5E5B411A-F9EF-3B83-AAFF-995DD89820FC,IPM center (1997) Crop Profile for Corn (Sweet) in Maryland. Southern Integrated Pest Management Center. https://ipmdata.ipmcenters.org/documents/cropprofiles/MDcorn-sweet.pdf,IPM center (2003) Crop Profile for Sweet Corn in the North Central United States. Southern Integrated Pest Management Center.Southern Integrated Pest Management Center. https://ipmdata.ipmcenters.org/documents/cropprofiles/us-ncr-sweetcorn.pdf ,EPA (2022) Assessment of the Benefits of Atrazine and the Impacts of Potential Mitigation for Field Corn, Sweet Corn, Sorghum, and Sugarcane; PC Code (080803). (MEMORANDUM).US Environmental Protection Agency. https://downloads.regulations.gov/EPA-HQ-OPP-2013-0266-1624/content.pdf
- Saflufenacil [soil, agricultural]: 1.32136e-6 kg; normal variance with pedigree 6.85909e-16, pedigree (2,3,3,3,1)
  Saflufenacil emission to agricultural soil (2.222E-02 kg/ha). Pesticides are assumed to be ultimately 100% emitted to soil across all rotation patterns, based on assumption that all sweet corn acres are treated, and assuming that cultivation is conventional tillage as common practice for weed management (EPA 2022; IPM 2003, IPM 1997).Data reported a quantity of total insecticides/herbicides/fungicides applied in sweet corn is sometimes available even when many of the substances in the category are reported with a “D”. If this total is available, the amount remaining after the sum of substance-specific values is accounted for is divided equally among the substances reported with a “D”. If the sum of available values exceeds or equals the total reported, any remaining “D” substances are treated as zero and omitted.
  Sources: SWEETCORN - APPLICATIONS, MEASURED IN LB / ACRE / YEAR, AVG (fertilizer and pesticides, amount, number of applications) - 2000-2021,https://quickstats.nass.usda.gov/#5E5B411A-F9EF-3B83-AAFF-995DD89820FC,IPM center (1997) Crop Profile for Corn (Sweet) in Maryland. Southern Integrated Pest Management Center. https://ipmdata.ipmcenters.org/documents/cropprofiles/MDcorn-sweet.pdf,IPM center (2003) Crop Profile for Sweet Corn in the North Central United States. Southern Integrated Pest Management Center.Southern Integrated Pest Management Center. https://ipmdata.ipmcenters.org/documents/cropprofiles/us-ncr-sweetcorn.pdf ,EPA (2022) Assessment of the Benefits of Atrazine and the Impacts of Potential Mitigation for Field Corn, Sweet Corn, Sorghum, and Sugarcane; PC Code (080803). (MEMORANDUM).US Environmental Protection Agency. https://downloads.regulations.gov/EPA-HQ-OPP-2013-0266-1624/content.pdf
- Spinetoram [soil, agricultural]: 1.28106e-6 kg; normal variance with pedigree 6.05974e-16, pedigree (2,3,3,3,1)
  Spinetoram emission to agricultural soil (2.154E-02 kg/ha). Pesticides are assumed to be ultimately 100% emitted to soil across all rotation patterns, based on assumption that all sweet corn acres are treated, and assuming that cultivation is conventional tillage as common practice for weed management (EPA 2022; IPM 2003, IPM 1997).Data reported a quantity of total insecticides/herbicides/fungicides applied in sweet corn is sometimes available even when many of the substances in the category are reported with a “D”. If this total is available, the amount remaining after the sum of substance-specific values is accounted for is divided equally among the substances reported with a “D”. If the sum of available values exceeds or equals the total reported, any remaining “D” substances are treated as zero and omitted.
  Sources: SWEETCORN - APPLICATIONS, MEASURED IN LB / ACRE / YEAR, AVG (fertilizer and pesticides, amount, number of applications) - 2000-2021,https://quickstats.nass.usda.gov/#5E5B411A-F9EF-3B83-AAFF-995DD89820FC,IPM center (1997) Crop Profile for Corn (Sweet) in Maryland. Southern Integrated Pest Management Center. https://ipmdata.ipmcenters.org/documents/cropprofiles/MDcorn-sweet.pdf,IPM center (2003) Crop Profile for Sweet Corn in the North Central United States. Southern Integrated Pest Management Center.Southern Integrated Pest Management Center. https://ipmdata.ipmcenters.org/documents/cropprofiles/us-ncr-sweetcorn.pdf ,EPA (2022) Assessment of the Benefits of Atrazine and the Impacts of Potential Mitigation for Field Corn, Sweet Corn, Sorghum, and Sugarcane; PC Code (080803). (MEMORANDUM).US Environmental Protection Agency. https://downloads.regulations.gov/EPA-HQ-OPP-2013-0266-1624/content.pdf
- Spinosad [soil, agricultural]: 1.14906e-6 kg; normal variance with pedigree 3.92235e-16, pedigree (2,3,3,3,1)
  Spinosad emission to agricultural soil (1.932E-02 kg/ha). Pesticides are assumed to be ultimately 100% emitted to soil across all rotation patterns, based on assumption that all sweet corn acres are treated, and assuming that cultivation is conventional tillage as common practice for weed management (EPA 2022; IPM 2003, IPM 1997).Data reported a quantity of total insecticides/herbicides/fungicides applied in sweet corn is sometimes available even when many of the substances in the category are reported with a “D”. If this total is available, the amount remaining after the sum of substance-specific values is accounted for is divided equally among the substances reported with a “D”. If the sum of available values exceeds or equals the total reported, any remaining “D” substances are treated as zero and omitted.
  Sources: SWEETCORN - APPLICATIONS, MEASURED IN LB / ACRE / YEAR, AVG (fertilizer and pesticides, amount, number of applications) - 2000-2021,https://quickstats.nass.usda.gov/#5E5B411A-F9EF-3B83-AAFF-995DD89820FC,IPM center (1997) Crop Profile for Corn (Sweet) in Maryland. Southern Integrated Pest Management Center. https://ipmdata.ipmcenters.org/documents/cropprofiles/MDcorn-sweet.pdf,IPM center (2003) Crop Profile for Sweet Corn in the North Central United States. Southern Integrated Pest Management Center.Southern Integrated Pest Management Center. https://ipmdata.ipmcenters.org/documents/cropprofiles/us-ncr-sweetcorn.pdf ,EPA (2022) Assessment of the Benefits of Atrazine and the Impacts of Potential Mitigation for Field Corn, Sweet Corn, Sorghum, and Sugarcane; PC Code (080803). (MEMORANDUM).US Environmental Protection Agency. https://downloads.regulations.gov/EPA-HQ-OPP-2013-0266-1624/content.pdf
- Spiromesifen [soil, agricultural]: 2.48072e-6 kg; normal variance with pedigree 8.52108e-15, pedigree (2,3,3,3,1)
  Spiromesifren emission to agricultural soil (4.171E-02 kg/ha). Pesticides are assumed to be ultimately 100% emitted to soil across all rotation patterns, based on assumption that all sweet corn acres are treated, and assuming that cultivation is conventional tillage as common practice for weed management (EPA 2022; IPM 2003, IPM 1997).Data reported a quantity of total insecticides/herbicides/fungicides applied in sweet corn is sometimes available even when many of the substances in the category are reported with a “D”. If this total is available, the amount remaining after the sum of substance-specific values is accounted for is divided equally among the substances reported with a “D”. If the sum of available values exceeds or equals the total reported, any remaining “D” substances are treated as zero and omitted.
  Sources: SWEETCORN - APPLICATIONS, MEASURED IN LB / ACRE / YEAR, AVG (fertilizer and pesticides, amount, number of applications) - 2000-2021,https://quickstats.nass.usda.gov/#5E5B411A-F9EF-3B83-AAFF-995DD89820FC,IPM center (1997) Crop Profile for Corn (Sweet) in Maryland. Southern Integrated Pest Management Center. https://ipmdata.ipmcenters.org/documents/cropprofiles/MDcorn-sweet.pdf,IPM center (2003) Crop Profile for Sweet Corn in the North Central United States. Southern Integrated Pest Management Center.Southern Integrated Pest Management Center. https://ipmdata.ipmcenters.org/documents/cropprofiles/us-ncr-sweetcorn.pdf ,EPA (2022) Assessment of the Benefits of Atrazine and the Impacts of Potential Mitigation for Field Corn, Sweet Corn, Sorghum, and Sugarcane; PC Code (080803). (MEMORANDUM).US Environmental Protection Agency. https://downloads.regulations.gov/EPA-HQ-OPP-2013-0266-1624/content.pdf
- Tembotrione [soil, agricultural]: 1.80669e-6 kg; normal variance with pedigree 2.39729e-15, pedigree (2,3,3,3,1)
  Tembotrione emission to agricultural soil (3.038E-02 kg/ha). Pesticides are assumed to be ultimately 100% emitted to soil across all rotation patterns, based on assumption that all sweet corn acres are treated, and assuming that cultivation is conventional tillage as common practice for weed management (EPA 2022; IPM 2003, IPM 1997).Data reported a quantity of total insecticides/herbicides/fungicides applied in sweet corn is sometimes available even when many of the substances in the category are reported with a “D”. If this total is available, the amount remaining after the sum of substance-specific values is accounted for is divided equally among the substances reported with a “D”. If the sum of available values exceeds or equals the total reported, any remaining “D” substances are treated as zero and omitted.
  Sources: SWEETCORN - APPLICATIONS, MEASURED IN LB / ACRE / YEAR, AVG (fertilizer and pesticides, amount, number of applications) - 2000-2021,https://quickstats.nass.usda.gov/#5E5B411A-F9EF-3B83-AAFF-995DD89820FC,IPM center (1997) Crop Profile for Corn (Sweet) in Maryland. Southern Integrated Pest Management Center. https://ipmdata.ipmcenters.org/documents/cropprofiles/MDcorn-sweet.pdf,IPM center (2003) Crop Profile for Sweet Corn in the North Central United States. Southern Integrated Pest Management Center.Southern Integrated Pest Management Center. https://ipmdata.ipmcenters.org/documents/cropprofiles/us-ncr-sweetcorn.pdf ,EPA (2022) Assessment of the Benefits of Atrazine and the Impacts of Potential Mitigation for Field Corn, Sweet Corn, Sorghum, and Sugarcane; PC Code (080803). (MEMORANDUM).US Environmental Protection Agency. https://downloads.regulations.gov/EPA-HQ-OPP-2013-0266-1624/content.pdf
- Trifluralin [soil, agricultural]: 2.23059e-6 kg; normal variance with pedigree 5.57011e-15, pedigree (2,3,3,3,1)
  Trifluralin emission to agricultural soil (3.750E-02 kg/ha). Pesticides are assumed to be ultimately 100% emitted to soil across all rotation patterns, based on assumption that all sweet corn acres are treated, and assuming that cultivation is conventional tillage as common practice for weed management (EPA 2022; IPM 2003, IPM 1997).Data reported a quantity of total insecticides/herbicides/fungicides applied in sweet corn is sometimes available even when many of the substances in the category are reported with a “D”. If this total is available, the amount remaining after the sum of substance-specific values is accounted for is divided equally among the substances reported with a “D”. If the sum of available values exceeds or equals the total reported, any remaining “D” substances are treated as zero and omitted.
  Sources: SWEETCORN - APPLICATIONS, MEASURED IN LB / ACRE / YEAR, AVG (fertilizer and pesticides, amount, number of applications) - 2000-2021,https://quickstats.nass.usda.gov/#5E5B411A-F9EF-3B83-AAFF-995DD89820FC,IPM center (1997) Crop Profile for Corn (Sweet) in Maryland. Southern Integrated Pest Management Center. https://ipmdata.ipmcenters.org/documents/cropprofiles/MDcorn-sweet.pdf,IPM center (2003) Crop Profile for Sweet Corn in the North Central United States. Southern Integrated Pest Management Center.Southern Integrated Pest Management Center. https://ipmdata.ipmcenters.org/documents/cropprofiles/us-ncr-sweetcorn.pdf ,EPA (2022) Assessment of the Benefits of Atrazine and the Impacts of Potential Mitigation for Field Corn, Sweet Corn, Sorghum, and Sugarcane; PC Code (080803). (MEMORANDUM).US Environmental Protection Agency. https://downloads.regulations.gov/EPA-HQ-OPP-2013-0266-1624/content.pdf
- Zeta-cypermethrin [soil, agricultural]: 6.486e-6 kg; normal variance with pedigree 3.9819e-13, pedigree (2,3,3,3,1)
  Zeta-Cypermethrin emission to agricultural soil (1.090E-01 kg/ha). Pesticides are assumed to be ultimately 100% emitted to soil across all rotation patterns, based on assumption that all sweet corn acres are treated, and assuming that cultivation is conventional tillage as common practice for weed management (EPA 2022; IPM 2003, IPM 1997).Data reported a quantity of total insecticides/herbicides/fungicides applied in sweet corn is sometimes available even when many of the substances in the category are reported with a “D”. If this total is available, the amount remaining after the sum of substance-specific values is accounted for is divided equally among the substances reported with a “D”. If the sum of available values exceeds or equals the total reported, any remaining “D” substances are treated as zero and omitted.
  Sources: SWEETCORN - APPLICATIONS, MEASURED IN LB / ACRE / YEAR, AVG (fertilizer and pesticides, amount, number of applications) - 2000-2021,https://quickstats.nass.usda.gov/#5E5B411A-F9EF-3B83-AAFF-995DD89820FC,IPM center (1997) Crop Profile for Corn (Sweet) in Maryland. Southern Integrated Pest Management Center. https://ipmdata.ipmcenters.org/documents/cropprofiles/MDcorn-sweet.pdf,IPM center (2003) Crop Profile for Sweet Corn in the North Central United States. Southern Integrated Pest Management Center.Southern Integrated Pest Management Center. https://ipmdata.ipmcenters.org/documents/cropprofiles/us-ncr-sweetcorn.pdf ,EPA (2022) Assessment of the Benefits of Atrazine and the Impacts of Potential Mitigation for Field Corn, Sweet Corn, Sorghum, and Sugarcane; PC Code (080803). (MEMORANDUM).US Environmental Protection Agency. https://downloads.regulations.gov/EPA-HQ-OPP-2013-0266-1624/content.pdf
- Zinc II [soil, agricultural]: -6.84209e-6 kg; normal variance with pedigree 0.04, pedigree (2,3,3,1,1)
  (same comment as for Cadmium II)
- Cadmium II [water, ground-]: 2.65212e-12 kg; lognormal variance with pedigree 0.0932, pedigree (2,3,3,1,1)
  Emissions of heavy metals to ground water arise from leaching. These emissions are estimated based on the SALCA-heavy metal model (Freiermuth 2006) following the procedure in the ecoinvent agricultural LCI tool (Faist Emmenegger, Délerce-Mauris and Porté 2018 Models Integrated in Ecoinvent LCI Calculation Tool for Crop Production). The crop system carries a share of heavy metals emissions based on the ratio of cropping additions to total additions (additions to crop system divided by additions to crop system plus depostion from air and present in soils)Sources for heavy metals leaching to groundwater include: Leaching of heavy metals to groundwater (Wolfensberger & Dinkel 1997), where no drainage is installed ; the share of leaching to groundwater is calcualted from Drainage on all cropland acres state-wide, including tile drainage (4.2%,) and ditch drainage (5.1%). USDA (2018a) 2017 Census of Agriculture, Volume 1, Chapter 2: State Level Data - Table 41. Land Use Practices: 2017 and 2012 (live table: https://www.nass.usda.gov/Quick_Stats/CDQT/chapter/2/table/41/state/US). US Department of Agriculture (USDA). https://www.nass.usda.gov/Publications/AgCensus/2017/Full_Report/Volume_1,_Chapter_2_US_State_Level/st99_2_0041_0041.pdf.
- Cadmium II [water, surface water]: 5.20859e-9 kg; lognormal variance with pedigree 0.0932, pedigree (2,3,3,1,1)
  Emissions of heavy metals to surface water arise from leaching (when drainage is present) and erosion. Emissions are estimated based on the SALCA-heavy metal model (Freiermuth 2006) following the procedure in the ecoinvent agricultural LCI tool (Faist Emmenegger, Délerce-Mauris and Porté 2018 Models Integrated in Ecoinvent LCI Calculation Tool for Crop Production). The crop system carries a share of heavy metals emissions based on the ratio of cropping additions to total additions (additions to crop system divided by additions to crop system plus depostion from air and present in soils) Sources for heavy metals contents include: Leaching of heavy metals to surface water (Wolfensberger & Dinkel 1997), where drainage is installed ; Average heavy metal contents in crop soils, mg per kg soil, based on data for Switzerland (from Keller & Desaules, 2001). erosion rates are from US NRC National Resources Inventory, 2017. and Drainage on all cropland acres state-wide, including tile drainage (4.2%,) and ditch drainage (5.1%). USDA (2018a) 2017 Census of Agriculture, Volume 1, Chapter 2: State Level Data - Table 41. Land Use Practices: 2017 and 2012 (live table: https://www.nass.usda.gov/Quick_Stats/CDQT/chapter/2/table/41/state/US). US Department of Agriculture (USDA). https://www.nass.usda.gov/Publications/AgCensus/2017/Full_Report/Volume_1,_Chapter_2_US_State_Level/st99_2_0041_0041.pdf. Fertilizer, manure and pesticide application rates are based on USDA NASS data.
- Chromium III [water, ground-]: 4.04712e-7 kg; lognormal variance with pedigree 0.0932, pedigree (2,3,3,1,1)
  (same comment as for Cadmium II)
- Chromium III [water, surface water]: 1.00446e-5 kg; lognormal variance with pedigree 0.0932, pedigree (2,3,3,1,1)
  (same comment as for Cadmium II)
- Copper ion [water, ground-]: 2.79576e-8 kg; lognormal variance with pedigree 0.0932, pedigree (2,3,3,1,1)
  (same comment as for Cadmium II)
- Copper ion [water, surface water]: 3.42247e-6 kg; lognormal variance with pedigree 0.0932, pedigree (2,3,3,1,1)
  (same comment as for Cadmium II)
- Lead II [water, ground-]: 4.30844e-11 kg; lognormal variance with pedigree 0.0932, pedigree (2,3,3,1,1)
  (same comment as for Cadmium II)
- Lead II [water, surface water]: 9.2628e-6 kg; lognormal variance with pedigree 0.0932, pedigree (2,3,3,1,1)
  (same comment as for Cadmium II)
- Mercury II [water, surface water]: 2.8644e-7 kg; lognormal variance with pedigree 0.0932, pedigree (2,3,3,1,1)
  (same comment as for Cadmium II)
- Nickel II [water, surface water]: 9.2256e-6 kg; lognormal variance with pedigree 0.0932, pedigree (2,3,3,1,1)
  (same comment as for Cadmium II)
- Nitrate [water, ground-]: 0.00331747 kg; lognormal variance with pedigree 0.0409, pedigree (2,2,2,1,1)
  The total nitrate leaching/runoff is 1.317E+2 kg NO3/ha (3.317E-3kg NO3/kg Sweet Corn), 4.273E+1 kg NO3/ha from fertilisers, 0.000E+0 kg NO3/ha , 9.460E+1 kg NO3/ha from soil mineralization, and -5.658E+0 kg NO3 N uptake.
  57.6% is emitted to surface water and 42.4% to ground water, since 57.6% of cropland in Minnesota has drainage (ISU Extension 2020c).
  Nitrate leaching is calculated with the SQCB-NO3 model (Faist Emmenegger et al. 2009) using general (state-level parameters for slope and clay content, local precipitation and irrigation data).
  Sources:
  Faist Emmenegger M, Reinhard J, Zah R (2009) Sustainability Quick Check for Biofuels - in- termediate background report. With contributions from T. Ziep, R. Weichbrodt, Prof. Dr. V. Wohlgemuth, FHTW Berlin and A. Roches, R. Freiermuth Knuchel, Dr. G. Gaillard, Agroscope Reckenholz-Tänikon. Dübendorf. https://www.researchgate.net/profile/Rainer-Zah/publication/230725635_SQCB_-_Sustainability_Quick_Check_for_Biofuels_Second_draft_18th_February_2009_-_Intermediate_Background_Report_With_contributions_from_T_Ziep_R_Weichbrodt_Prof_Dr_V_Wohlgemuth_FHTW_Berlin_and_A_Roche/links/56b458fb08ae1f8aa45392e6/SQCB-Sustainability-Quick-Check-for-Biofuels-Second-draft-18th-February-2009-Intermediate-Background-Report-With-contributions-from-T-Ziep-R-Weichbrodt-Prof-Dr-V-Wohlgemuth-FHTW-Berlin-and-A-R.pdf; DeBruin J and Butzen S (2020) Nitrogen uptake by corn . Pioneer. https://www.pioneer.com/us/agronomy/nitrogen_uptake_corn.htmlaccessed 11-20-2021; Fan, Y., Wang, Z., Liao, D. et al. Uptake and utilization of nitrogen, phosphorus and potassium as related to yield advantage in maize-soybean intercropping under different row configurations. Sci Rep 10, 9504 (2020). https://doi.org/10.1038/s41598-020-66459-y; Hollinger S E (1995) Midwestern Climate Center Soils Atlas and Database. Crop Science Extension & Outreach, University of Illinois . https://www.isws.illinois.edu/pubdoc/C/ISWSC-179.pdf; Bruulsema T and Jones J D (2021) Soil Test Summary 2020. Foundation for Agronomic Research and Plant Nutrition Canada present this 2020 summary of soil test levels in North America. Foundation for Agronomic Research, Plant Nutrition Canada. https://soiltest.tfi.org/about/about_soil_test_summaryaccessed August 30, 2021
  ISU Extension (2020c) Crop Production Costs Budget - Corn following Soybeans. Cooperative Extension Service, Iowa State University of Science and Technology. https://www.extension.iastate.edu/agdm/crops/xls/a1-20cfs_tbl2.xlsx
- Nitrate [water, surface water]: 0.00451442 kg; lognormal variance with pedigree 0.0409, pedigree (2,2,2,1,1)
  (same comment as for Nitrate)
- Phosphate [water, ground-]: 8.32702e-6 kg; lognormal variance with pedigree 0.0428, pedigree (2,4,2,1,1)
  Phosphate leaching to ground water 0.14 kg PO4/ha (8.327E-6 kg/kg Sweet Corn): 7.E-2 kg PO4/ha from manure and 7.E-2 kg PO4/ha from leaching from arable land. Phosphate leaching to ground water is calculated using the SALCA-P model (Prasuhn 2006) with an average leaching factor for arable lands and the amount of phosphate in any applied manure, as implemented in the ecoinvent agricultural LCI tool (see Ecoinvent_Too_Model_Description_20191015.pdf). Does not incorporate state or county data on soils, slope or conservation drainage infrastructure. Calculated with the ecoinvent agricultural LCI tool. If the slope is less than 3%, no phosphate loss through run-off occurs (Prasuhn 2006). If the slope is greater or equal to 3%, phosphate loss through run-off are computed like in (Prasuhn 2006) with the site-specific correction factors set to their default value (=1):
  Sources:
  Prasuhn, V (2006) Erfassung der PO4-Austräge für die Ökobilanzierung. SALCA-Phosphor. Zü-rich, CH, Agrocope FAL Reckenholz. Agrocope.
  Freiermuth (2006) SALCA-Schwermetall - Modell zur Berechnung der Schwermetall- flüsse in der Landwirtschaftlichen Ökobilanz. Agroscope FAL Zürich-Reckenholz . https://www.agroscope.admin.ch/dam/agroscope/de/dokumente/themen/umwelt-ressourcen/produktionssysteme/salca-schwermetall.pdf.download.pdf/SALCA-Schwermetall.pdf
  U.S. Department of Agriculture. 2017.
  2017 National Resources Inventory.
  Natural Resources Conservation Service, Washington, DC. 31 October 2020 *
  <http://www.nrcs.usda.gov/Internet/NRCS_RCA/reports/nri_crop_nat.html>
- Phosphate [water, surface water]: 1.16608e-5 kg; lognormal variance with pedigree 0.0428, pedigree (2,4,2,1,1)
  0.000E+0 kg PO4/ha from manure, 2.105E-2 kg PO4/ha from mineral fertilisers, and 1.750E-1 kg PO4/ha from leaching from arable land
- Phosphorus [water, surface water]: 6.12531e-7 kg; lognormal variance with pedigree 0.0502, pedigree (3,2,4,3,1)
  Phosphorus emissions to surface water are based on the SALCA-P model (Prasuhn 2006), but using state-specific data for agricultural land (not crop-specific). The erosion and soil test values encompass the state-wide reported cropped area of Sweet Corn in Washington for all tillage practices (OPTiS 2020) and across all rotation patterns (Socolar et al 2021).Soil Phosphorus losses are calculated from an annual soil loss from water erosion on agricultural soils in Washington of 11.59t/ha/year (NRCS 2020b)with a Phosphorus soil concentration of 30mg/kg soil, the median value from 13,821 soil test samples reported for Washington in the 2020 Soil Test Survey, (the average of the 2005, 2010, 2015, and 2020 median soil Phosphorus concentrations is 53.mg/kg soil) (Bruulsema T and Jones J D 2021).No enrichment factor has been applied, because the phosphorus soil concentration samples are specifically agricultural land in the study area and thus any enrichment as a result of synthetic and organic fertilisers is already caputred in the soil test.An active cultivation duration of 6.8 months (0.56 year), covering cultivation through harvest (from weekly progress reports,USDA NASS 2022b), is used to adjust the annual erosion to the crop share (see Faist-Emmenegger et al 2009).No adjustment has been made for the presence of drainage (installed on 9.4% of crop land, USDA 2018a) or any anti-erosion practices.Sources:
  NRCS (2020a) Soil losses from erosion (water and wind) on cultivated cropland, in the 2017 National Resources Inventory. USDA, Natural Resources Conservation Service. http://www.nrcs.usda.gov/Internet/NRCS_RCA/reports/nri_crop_nat.html; Bruulsema T and Jones J D (2021) Soil Test Summary 2020. Foundation for Agronomic Research and Plant Nutrition Canada present this 2020 summary of soil test levels in North America. Foundation for Agronomic Research, Plant Nutrition Canada. https://soiltest.tfi.org/about/about_soil_test_summaryaccessed August 30, 2021; USDA NASS (2022b) SWEET CORN - PROGRESS (planted, emerged, harvested) - 2016-2022. US Department of Agriculture (USDA) National Agricultural Statistics Service. https://quickstats.nass.usda.gov/#5E5B411A-F9EF-3B83-AAFF-995DD89820FC; USDA (2018a) 2017 Census of Agriculture, Volume 1, Chapter 2: State Level Data - Table 41. Land Use Practices: 2017 and 2012 (live table: https://www.nass.usda.gov/Quick_Stats/CDQT/chapter/2/table/41/state/US). US Department of Agriculture (USDA). https://www.nass.usda.gov/Publications/AgCensus/2017/Full_Report/Volume_1,_Chapter_2_US_State_Level/st99_2_0041_0041.pdf; Prasuhn, V (2006) Erfassung der PO4-Austräge für die Ökobilanzierung. SALCA-Phosphor. Zü-rich, CH, Agrocope FAL Reckenholz. Agrocope. ; Faist Emmenegger M, Reinhard J, Zah R (2009) Sustainability Quick Check for Biofuels - in- termediate background report. With contributions from T. Ziep, R. Weichbrodt, Prof. Dr. V. Wohlgemuth, FHTW Berlin and A. Roches, R. Freiermuth Knuchel, Dr. G. Gaillard, Agroscope Reckenholz-Tänikon. Dübendorf. https://www.researchgate.net/profile/Rainer-Zah/publication/230725635_SQCB_-_Sustainability_Quick_Check_for_Biofuels_Second_draft_18th_February_2009_-_Intermediate_Background_Report_With_contributions_from_T_Ziep_R_Weichbrodt_Prof_Dr_V_Wohlgemuth_FHTW_Berlin_and_A_Roche/links/56b458fb08ae1f8aa45392e6/SQCB-Sustainability-Quick-Check-for-Biofuels-Second-draft-18th-February-2009-Intermediate-Background-Report-With-contributions-from-T-Ziep-R-Weichbrodt-Prof-Dr-V-Wohlgemuth-FHTW-Berlin-and-A-R.pdf
- Water [water, ground-]: 0.00395764 m3; lognormal variance with pedigree 0.0015, pedigree (2,2,2,1,1)
  Irrigation water not taken up by crop. Calculated by the ecoinvent agricultural LCI tool.
- Water [water, surface water]: 0.00102605 m3; lognormal variance with pedigree 0.0015, pedigree (2,2,2,1,1)
  Irrigation water not taken up by crop. Calculated by the ecoinvent agricultural LCI tool.
- Zinc II [water, ground-]: 2.09504e-8 kg; lognormal variance with pedigree 0.0932, pedigree (2,3,3,1,1)
  (same comment as for Cadmium II)
- Zinc II [water, surface water]: 2.60774e-5 kg; lognormal variance with pedigree 0.0932, pedigree (2,3,3,1,1)
  (same comment as for Cadmium II)

## Sampling procedure
Data is obtained from state, county and national statistics, agricultural extension offices, and published literature. Data for production, yields, applications of NPKS fertilisers, applications of pesticides, row width, and irrigation (if any) was obtained from the US Dept of Agriculture's National Agricultural Statistics Service and in most cases provides high-quality data spanning the dataset time period. Field operations and energy use are from enterprise crop budgets provided by local agricultural extensions offices and their farmer survey data. Literature data is used where USDA and agricultural extension guidance and data are not available.

## Extrapolations
Mineral fertiliser applications are crop and location (state and sub-state levels) specific for nutrient applied, based on survey data compiled by the USDA National Agricultural Statistics Service. Specific fertilisers are extrapolated from mineral fertiliser applications to Specific fertilisers are extrapolated from mineral fertiliser applications to Sweet Corn in Minnesota and market consumption in the US (IFA 2020).
Field operations are as identified in crop- and rotation-specific enterprise crop budgets supplied by the regional agricultural extension office and matched to equipment type in the budget or crop guidance unless otherwise noted. Field cultivation and tillage operations are specific to the tillage regime used. Seed establishment and weed control for sweet corn generally require tillage (EPA 2022; IPM 2003, IPM 1997), so this dataset reflects sweet corn production using conventional tillage practices. State specific guidance for Minnessota is not available. Field operations are assumed as Wisconsin. Operations are matched to equipment type and where multiple options are available, the share of each is determined from guidance and annual farmer survey data (Custom Rate Summaries) for contracted operations/equipment. Machine sizes (power) are approximate but based on common, recent surveys and equipment analyses (Lazarus 2020).
Emissions are calculated with standard methods according to ecoinvent documentation (Nemecek and Schnetzer, 2011. '01 crop production-direct field emissions natural resources' v1.2, August 2011, available at ) and the World Food LCA Database guidelines and the ecoinvent agricultural LCI tool. Soil characteristics, including pH and clay content, are extrapolated from distribution of soil pH sampling results reported in the 2020 Soil Test Summary (Bruulsema and Jones 2021). The share of acidic soils is likely overestimated as more more frequent testing is to be expected on soils having needed lime and thus low pH soils are likely to be more represented amongst the collected samples. Drainage tile data from 2012 (reported to USDA for the 2012 agricultural census) is extrapolated as valid from that date through the rest of the time period of the dataset and the distribution of drainage is treated as homogenous for all field crops.
Some pesticide quantities are extrapolated. Pesticide data is sometimes withheld in the NASS database to avoid disclosing data for individual operations (denoted with "D" in the data returned for the query, indicating a non-zero but withheld value). Farmers select one or more compounds specific to their conditions, regulations, cost, and pests identified, so the full list of pesticides are not applied in any single case. Where disclosing data would allow for identification of individual operations, pesticide data is withheld in the NASS database (denoted with "D" in the data returned for the query, indicating a non-zero but withheld value). This is the case for the overwhelming majority of pesticides applied to sweet corn. Where a state-specific and substance-specific value was available in NASS, that value was used (if a value was available for both 2018 and 2020, the average of the two was used). Because farmers select one or more compounds specific to their conditions, local regulations, cost, and pests identified, the full list of pesticides are not applied in any single case and approximations are used to account for the remaining pesticides. A quantity of total insecticides/herbicides/fungicides applied is sometimes available even when many of the substances in the category are reported with a “D”. If this total is available, the amount remaining after the sum of substance-specific values is accounted for is divided equally among the substances reported with a “D”. If the sum of available values exceeds or equals the total reported, any remaining “D” substances are treated as zero and omitted. If the total used in that state is not reported, the average sweet corn country-level value for each is used for the substances reported (“D” substances). If no average US sweet corn value for the substance is available, then the value applied for US maize is used to approximate the substance to avoid undercounting since pesticide use in sweet corn cultivation is universal or nearly so. In the event that not even a value for US maize is available, the substance is omitted. If all available data across all three categories for a state are “D”, as is the case for Florida, Integrated Pest Management guidance and crop profile summaries were used to identify substances and set approximate application amounts.
Transports are modelled with standard distances.
