# mischmetal production, primary

Dataset: EcoSpold 2, unit process
Geography: GLO
Time period: 1968-01-01 to 2023-12-31
Technology level: current
Classification: ISIC rev.4 ecoinvent: 2420:Manufacture of basic precious and other non-ferrous metals
Classification: EcoSpold01Categories: electronics/module
Synonyms: cerium mischmetal; rare earth mischmetal; misch metal
Tags: ConvertedDataset
Scenario: Business-as-Usual
System model: Allocation, cut-off by classification
Generated by: Mischa Classen
Published in: Hischier R. 2007
Database: ecoinvent
isCopyrightProtected: true
accessRestrictedTo: 1

## General comment
Production of Mischmetal from bastnaesite by wet chemical attack and fused salt electrolysis. The product contains 53% Ce, 21% La, 17% Nd, 6% Pr, 0.2% Sm, the rest consistin of Eu, Gd and others. The overall quality of the data is poor. It however may be used as alloying constituent in HSLA steels, nodular iron and hydrogen storage in metal hydride batteries (LaNi5).This dataset is not to be used when mischmetal is a substantial part of the system modelled
[This dataset was already contained in the ecoinvent database version 2. It was not individually updated during the transfer to ecoinvent version 3. Life Cycle Impact Assessment results may still have changed, as they are affected by changes in the supply chain, i.e. in other datasets. This dataset was generated following the ecoinvent quality guidelines for version 2. It may have been subject to central changes described in the ecoinvent version 3 change report (http://www.ecoinvent.org/database/ecoinvent-version-3/reports-of-changes/), and the results of the central updates were reviewed extensively. The changes added e.g. consistent water flows and other information throughout the database. The documentation of this dataset can be found in the ecoinvent reports of version 2, which are still available via the ecoinvent website. The change report linked above covers all central changes that were made during the conversion process.]

## Included activities end
Includes the basic raw materials consumed and energy for precipitation reaction, filtration and drying. No direct emissions or infrastructure are included.

## Geography
This dataset production facilities scattered over the world. Most upstream processes such as electricity demand and chemicals consumption are approximated with datasets for European situation.

## Technology
Production from bastnaesite concentrate that is converted to its chloride and reduced with fused salt electrolysis. Electrolysis approximated with processes from aluminium industry.

## Reference product
- mischmetal: 1 kg; By-product classification allocatable product; CPC 34290: Compounds of rare earth metals, of yttrium or of scandium; HS2017 284690: Compounds, inorganic or organic (excluding cerium), of rare-earth metals, of yttrium, scandium or of mixtur[...]
  EcoSpold01Location=GLO
  production volume 3.6e6 kg
    Calculated based on literature and estimates. Approximatelly 4000 tonnes of mischmetal is produced in the world every year (Ullmann's Encyclopedia). It is estimated, that 90% of that is produced using this technology.
  property carbon content, fossil 0
    Production of Mischmetal from bastnaesite by wet chemical attack and fused salt electrolysis. The product contains 53% Ce, 21% La, 17% Nd, 6% Pr, 0.2% Sm, the rest consistin of Eu, Gd and others
  property carbon content, non-fossil 0
    (same comment as for mischmetal)
  property price 619.06 EUR2005
    Calculated based on inputs: The price of the product has been calculated as a sum of the values of the material and energy inputs for this product. This value is therefore a rough estimation. It may underestimate the real price since there are additional expenses when producing any product. These expences can include for example labour costs, treatment of waste materials and profit for the producer. Please consider carefully whether this level of data quality is acceptable for your application.
  properties: carbon allocation 0 kg, carbon content 0, dry mass 1 kg, water content 0, water in wet mass 0 kg, wet mass 1 kg

## Inputs from technosphere
- aluminium electrolysis facility: 2.31e-10 unit; lognormal variance with pedigree 0.5908, pedigree (2,2,5,3,5)
  EcoSpold01Location=RER
- anode, for metal electrolysis: 0.448 kg; lognormal variance with pedigree 0.1062, pedigree (4,2,5,3,3)
  EcoSpold01Location=RER
  properties: carbon content, fossil 0.865971, dry mass 1 kg, wet mass 1 kg
  note on carbon content, fossil: The main component of the anode is carbon, coming from bitumen and petroleum coke (ecoinvent v2.2 report 10). The C content in those components of the anode has been taken into account to calculate the anode final C content.
- cathode, for aluminium electrolysis: 0.0181 kg; lognormal variance with pedigree 0.1062, pedigree (4,2,5,3,3)
  EcoSpold01Location=RER
  properties: carbon content, fossil 0.163928, dry mass 1 kg, wet mass 1 kg
  note on carbon content, fossil: The main components of the cathode are steel and carbon (from bitumen) (ecoinvent v2.2 report 10). Actual C content of the components of the cathode were taking into account to calculate the cathode final C content
- chemical factory, organics: 4e-10 unit; lognormal variance with pedigree 0.3701, pedigree (3,1,5,3,3)
  EcoSpold01Location=RER
- electricity, high voltage: 14.6 kWh; lognormal variance with pedigree 0.1682, pedigree (4,2,5,3,4)
  EcoSpold01Location=UCTE
- heat, district or industrial, natural gas: 5.03899 MJ; lognormal variance with pedigree 0.2908, pedigree (2,2,5,3,5)
  EcoSpold01Location=RER
  properties: heating value, net 1 MJ
- hydrochloric acid, without water, in 30% solution state: 0.416195, 1.9014 kg (2 suppliers, which the file names only by identifier); sum of these 2.3176 kg; lognormal variance with pedigree 0.1302, pedigree (1,2,5,3,4)
  EcoSpold01Location=RER
  properties: dry mass 1 kg, heating value, net 3.32 MJ, wet mass 1 kg
- kaolin: 0.2 kg; lognormal variance with pedigree 0.1761, pedigree (5,5,5,3,3)
  EcoSpold01Location=RER
  properties: dry mass 1 kg, wet mass 1 kg
- non-sulfidic tailing, off-site: -3.2308 kg; lognormal variance with pedigree 0.1062, pedigree (4,2,4,3,4)
  EcoSpold01Location=GLO
  production volume
    Calculated from the production volume of mischmetal in proportion to the respective output amounts.
  properties: dry mass 0.7 kg, water content 0.428571, wet mass 1 kg
- rare earth oxide concentrate, 70% REO: 2.866 kg
  EcoSpold01Location=CN
  Variation based on observed variability in REO content
  properties: dry mass 1 kg, wet mass 1 kg
- slag from metallurgical grade silicon production: -0.198317, -0.00168338 kg (2 suppliers, which the file names only by identifier); sum of these -0.2 kg; lognormal variance with pedigree 0.1761, pedigree (5,5,5,3,3)
  EcoSpold01Location=CH
  production volume
    (same comment as for non-sulfidic tailing, off-site)
  properties: carbon content, fossil 0.0898657, dry mass 1 kg, heating value, net 2.72 MJ, wet mass 1 kg
- sodium chloride, powder: 1 kg; lognormal variance with pedigree 0.1761, pedigree (5,5,5,3,3)
  EcoSpold01Location=RER
  properties: dry mass 1 kg, wet mass 1 kg
- sodium hydroxide, without water, in 50% solution state: 0.12443, 1.27427 kg (2 suppliers, which the file names only by identifier); sum of these 1.3987 kg; lognormal variance with pedigree 0.1302, pedigree (1,2,5,3,4)
  EcoSpold01Location=RER
  properties: dry mass 1 kg, heating value, net 3.03 MJ, wet mass 1 kg

## Emissions to nature
- Carbon dioxide, fossil [air, unspecified]: 0.30772 kg; lognormal variance with pedigree 0.1382, pedigree (4,2,5,3,4)
- Hydrochloric acid [air, unspecified]: 0.000539 kg; lognormal variance with pedigree 0.4181, pedigree (5,5,5,3,5)

## Sampling procedure
Literature

## Extrapolations
see Geography and Technology

## Review by Roberto Dones 2007-08-22
Passed
