# treatment of waste glass, municipal incineration FAE

Dataset: EcoSpold 2, unit process
Geography: CH
Time period: 2006-01-01 to 2023-12-31
Technology level: current
Classification: ISIC rev.4 ecoinvent: 3821:Treatment and disposal of non-hazardous waste
Scenario: Business-as-Usual
System model: Allocation, cut-off by classification
Generated by: Nikolia Stoikou
Database: ecoinvent
isCopyrightProtected: true
accessRestrictedTo: 1

## General comment
The process represents the treatment of waste glass in a municipal solid waste incinerator (MSWI).This dataset represents the activity of waste disposal of 'waste glass' in a municipal solid waste incinerator (MSWI). Recommended use of this dataset: for disposal of bulk or small pieces of glass. Inventoried waste consists of fraction: 100% Glass; . Waste composition (wet, in ppmw): gross heating value 0.1423 MJ/kg; net heating value 0.04602 MJ/kg; H2O 20000; O 483070; H na; C na; S na; N na; P na; B na; Cl 195.89; Br na; F na; I na; Ag na; As na; Ba na; Cd na; Co na; Cr 303.63; Cu 7.8356; Hg na; Mn na; Mo na; Ni na; Pb 38.688; Sb na; Se na; Sn na; V na; Zn 3.9178; Be na; Sc na; Sr na; Ti na; Tl na; W na; Si 359090; Fe na; Ca 72818; Al na; K na; Mg na; Na 64472. Share of carbon in initial waste input that is biogenic 61.4%.Share of metals in waste not oxidised and bulk-recyclable (exclude very small or thin parts) Iron: 0%; Alu: 0%; Copper: 0%.Recovery of metal scrap from bottom ash to recycling: 0g iron scrap, 0g aluminium scrap, 0g copper scrap. Net energy production: 0.023 MJ/kg electric energy and 0.01MJ/kg thermal energy.

## Included activities start
The activity starts with the waste being available at the gate of the treatment facility. Collection and transportation of the waste to the treatment plant is not included.

## Included activities end
The activity ends with the waste being treated and waste-specific emissions from the incineration process and auxiliary material consumption for flue gas cleaning are released to the environment (air and water). Infrastructure and waste-specific energy demands for Municipal Solid Waste Incineration (MSWI) and net energy generation are included.

## Geography
Modelling parameters affecting the treatment technology are specific to this geography and to the technology mix encountered in Switzerland in 2012.

## Technology
The waste is treated in the incineration plant with flue gas cleaning. Incineration is the controlled combustion of a waste and it includes fly ash extraction (FAE) . Auxiliary material consumption for this step of air pollution control (APC) are included in the process. Air polution control includes electrostatic precipitator for fly ash (ESP), wet flue gas scrubber and 25% SNCR , 42.77% SCR-high dust , 32.68% SCR-low dust -DeNOx facilities and 0% without DeNOx (weighted according to mass of burnt waste). Efficiency of iron scrap separation from slag : 58%. Efficiency of aluminium scrap separation from slag : 31%. Efficiency of copper scrap separation from slag : 31%. The technology mix for this dataset includes a filter ash treatment (FLUWA) of a share of 46.22%. Gross electric efficiency technology mix 15.84% and Gross thermal efficiency technology mix 28.51%

## Reference product
- heat, for reuse in municipal waste incineration only: 1 MJ; By-product classification allocatable product; CPC 17300: Steam and hot water
  net useful heat generated from this waste and used in internal MSWI plant energy redistribution.
  production volume 2.97345e6 MJ
    calculated in proportion to incinerated waste input
  property exergy 0.1842 MJ
    This exergy property is based on the exergy content of the product.
  property price 0.0106 EUR2005
    Average European district heat price from Ecoheatcool and Euroheat 2005-2006, Ecoheat Work package 1: The European heat market. Final report. 10.6 EUR/GJ i s the price of district heat. http://www.solarthermalworld.org/files/Ecoheatcool%20WP1%20Web.pdf?download
  properties: carbon allocation 0 kg, carbon content 0, true value relation 0.1842
