# indium production

Dataset: EcoSpold 2, unit process
Geography: RoW
Time period: 2000-01-01 to 2023-12-31
Technology level: current
Classification: ISIC rev.4 ecoinvent: 2011:Manufacture of basic chemicals
Classification: EcoSpold01Categories: metals/extraction
Tags: ConvertedDataset
Scenario: Business-as-Usual
System model: Allocation, cut-off by classification
Generated by: Mischa Classen
Published in: Classen M. 2009
Database: ecoinvent
isCopyrightProtected: true
accessRestrictedTo: 1

## General comment
The module describes the primary production of indium metal (99.999%, 5N) on a European average. No secondary sources from post consumer scrap are consid-ered. Only the most important source of indium raw material, the hydrometallurgical zinc operations, is reflected with the dataset. This dataset is based on the respec-tive flow from multi-output module "smelting, primary zinc production". This dataset is not to be used when indium is a substantial part of the system modelled, viz. for comparisons of special solder pastes.
[This dataset was already contained in the ecoinvent database version 2. It was not individually updated during the transfer to ecoinvent version 3. Life Cycle Impact Assessment results may still have changed, as they are affected by changes in the supply chain, i.e. in other datasets. This dataset was generated following the ecoinvent quality guidelines for version 2. It may have been subject to central changes described in the ecoinvent version 3 change report (http://www.ecoinvent.org/database/ecoinvent-version-3/reports-of-changes/), and the results of the central updates were reviewed extensively. The changes added e.g. consistent water flows and other information throughout the database. The documentation of this dataset can be found in the ecoinvent reports of version 2, which are still available via the ecoinvent website. The change report linked above covers all central changes that were made during the conversion process.]

## Included activities start
The activity starts with the reception of the indium rich leachate at the facility gate.

## Included activities end
The module includes the production of indium from zinc extraction operations. Infrastructure and transports to Europe are considered. Most process specific emissions are missing.

## Geography
This module represents the production of primary indium on a European average. The inventory however is compiled with global average data, e.g. for zinc-production.

## Technology
Indium containing residues from hydrometallurgical zinc operations are leached. Subsequent solvent extraction and precipitation of sponge indium. Indium cathodes are cast and electrorefined, followed by vacuum refining to obtain 5N quality. Solvent-extraction and electrowinning has been extrapolated from copper refining.

## Reference product
- indium: 1 kg; name RP_amount_1; By-product classification allocatable product; CPC 34231: Chemical elements n.e.c.; inorganic acids except phosphoric, nitric and sulphonitric; inorganic oxygen compoun[…]; HS2017 811299: Gallium, germanium, hafnium, indium, niobium (columbium), rhenium and vanadium; articles thereof, other tha[...]; CAS 7440-74-6
  EcoSpold01Location=RER
  production volume 437500 kg; = 492.5E3
    The indium production in the World in 2005 has been estimated using the information on:
    http://minerals.usgs.gov/minerals/pubs/commodity/indium/myb1-2007-indiu.xls
  property price 855 EUR2005
    Literature value (USGS, http://minerals.usgs.gov/minerals/pubs/commodity/indium/mcs-2009-indiu.pdf, accessed 20160222). The price of indium in 2005 was 946 USD.
  properties: carbon allocation 0 kg, carbon content 0, carbon content, fossil 0, carbon content, non-fossil 0, dry mass 1 kg, water content 0, water in wet mass 0 kg, wet mass 1 kg

## Inputs from technosphere
- chemical factory, organics: 8e-10 unit; lognormal variance with pedigree 0.44, pedigree (5,1,5,5,3)
  EcoSpold01Location=RER
- chemical, organic: 0.0425 kg; lognormal variance with pedigree 0.0701, pedigree (4,2,5,5,1)
  EcoSpold01Location=GLO
  properties: carbon content, fossil 0.628, dry mass 1 kg, heating value, net 19.03 MJ, wet mass 1 kg
  note on carbon content, fossil: This dataset is an unweighted average of 20 organic substances (listed in Tab 88.1, ecoinvent v2.2 report 8, part II), being part of the top100 chemicals included in this database. The C-content has also been calculated as an unweighted average of the C content of the substances composing this dataset.
- electricity, medium voltage: 0.374434, 7.46912, 2.5096, 0.114665, 0.02295, 0.00492788, 0.771302 kWh (7 suppliers, which the file names only by identifier); sum of these 11.267 kWh; lognormal variance with pedigree 0.0781, pedigree (4,2,5,5,3)
  EcoSpold01Location=UCTE
- indium rich leaching residues, from zinc production: 10000 kg; = 1/ indium_rich_leaching_residues_concentrat* RP_amount_1; lognormal variance with pedigree 0.0721, pedigree (3,2,5,5,3)
  EcoSpold01Location=GLO
  Calculated value based on the knowledge of the amount of indium in the indium rich concentrate entering the activity. The original value of 10000kg was relaced by this new calculation.
  property concentration, indium 0.0001 kg/kg; name indium_rich_leaching_residues_concentrat
  properties: dry mass 1 kg, wet mass 1 kg
  note on concentration, indium: Calculated value transfered from "primary zinc production from concentrate" dataset.
- sulfuric acid: 0.0375 kg; lognormal variance with pedigree 0.0781, pedigree (4,2,5,5,3)
  EcoSpold01Location=RER
  properties: dry mass 1 kg, wet mass 1 kg

## Emissions to nature
- NMVOC, non-methane volatile organic compounds [air, urban air close to ground]: 0.091735 kg; lognormal variance with pedigree 0.1101, pedigree (4,2,5,5,1)
- Sulfuric acid [air, non-urban air or from high stacks]: 0.043382 kg; lognormal variance with pedigree 0.1101, pedigree (4,2,5,5,1)

## Sampling procedure
literature

## Extrapolations
see Geography and Technology This dataset has been copied from an original dataset covering the geography RER. The uncertainty has been adjusted accordingly.

## Review by Roberto Dones 2007-08-22
Passed
