# gravel production, crushed

Dataset: EcoSpold 2, unit process
Geography: CA-QC
Time period: 1997-01-01 to 2023-12-31
Technology level: current
Classification: ISIC rev.4 ecoinvent: 0810:Quarrying of stone, sand and clay
Classification: EcoSpold01Categories: construction materials/additives
Tags: recontextualization
Scenario: Business-as-Usual
System model: Allocation, cut-off by classification
Share of production covered: 100 %
Generated by: Pascal Lesage
Published in: Kellenberger D. 2004
Database: ecoinvent
isCopyrightProtected: true
accessRestrictedTo: 1

## General comment
From the total amount (100%) of mined gravel round, crushed and sand, about 15% is crushed gravel. Dust emission size shares (for particulates >PM10, 2.5<PM<10, and <PM2.5) are assumed equal to "mining limestone" process.
[This dataset was already contained in the ecoinvent database version 2. It was not individually updated during the transfer to ecoinvent version 3. Life Cycle Impact Assessment results may still have changed, as they are affected by changes in the supply chain, i.e. in other datasets. This dataset was generated following the ecoinvent quality guidelines for version 2. It may have been subject to central changes described in the ecoinvent version 3 change report (http://www.ecoinvent.org/database/ecoinvent-version-3/reports-of-changes/), and the results of the central updates were reviewed extensively. The changes added e.g. consistent water flows and other information throughout the database. The documentation of this dataset can be found in the ecoinvent reports of version 2, which are still available via the ecoinvent website. The change report linked above covers all central changes that were made during the conversion process.]
Child dataset exchanges identical to GLO dataset. Created to enable linking to regional markets (e.g. for electricity). Data quality indicators adjusted accordingly.

## Included activities end
includes the whole manufacturing process, internal processes (transport, etc.) and infrastructure. No administration is included. Dust emission (particulates >PM10, >PM2.5 <PM10 and <PM2.5) share according to "mining limestone" process. Recultivation is taken into account.

## Geography
For some exchanges RER-modules have been used as proxy
Child dataset exchanges identical to GLO dataset. Created to enable linking to regional markets (e.g. for electricity). Data quality indicators adjusted accordingly.

## Technology
typical technology for Swiss production

## Parameters
- fraction, process water, to air: 0.272727 dimensionless; lognormal variance with pedigree 0.092025, pedigree (4,4,3,2,4)
- fraction, tap water, to air: 0.272727 dimensionless; lognormal variance with pedigree 0.092025, pedigree (4,4,3,2,4)

## Reference product
- gravel, crushed: 1 kg; name ref; By-product classification allocatable product; CPC 15320: Pebbles, gravel, broken or crushed stone, macadam; granules, chippings and powder of stone; HS2017 251710: Pebbles, gravel, broken or crushed stone; of a kind commonly used for concrete aggregates, for road metalli[...]
  production volume 1.9198e10 kg; name ref_PV
    Based on government statistics (Quebec Natural Resources Ministry): http://www.mrn.gouv.qc.ca/mines/statistiques/substance/substance-sable-gravier.jsp)
  property price 0.00828715 EUR2005
    Price, average unit value, dollars per metric ton in 2022 of crushed stone (gravel, crushed) of 14 USD/metric ton. The price is the annual average free-on-board plant prices, usually at the first point of sale or captive use, as reported by crushed stone producing companies. Prices do not include transportation from the plant or yard to the consumer, although they do include all costs of mining, processing, in-plant transportation, overhead, and profit. Value retrieved from USGS, Mineral Commodity Summaries 2023, accessed on 20230918: https://pubs.usgs.gov/periodicals/mcs2023/mcs2023-stone-crushed.pdf from https://www.usgs.gov/centers/national-minerals-information-center/crushed-stone-statistics-and-information
    The price was converted to EUR based on the annual exchange rates published by the European Central Bank (https://sdw.ecb.europa.eu/quickview.do?SERIES_KEY=120.EXR.A.USD.EUR.SP00.A, last accessed on 2023-06-01) and adjusted for inflation relative to 2005 using the producer price index (PPI) of the euro area, published by eurostat (https://ec.europa.eu/eurostat/databrowser/view/STS_INPP_A__custom_6416181/default/table?lang=en, last accessed on 2023-06-01).
  properties: carbon allocation 0 kg, carbon content 0, carbon content, fossil 0, carbon content, non-fossil 0, dry mass 1 kg, water content 0, water in wet mass 0 kg, wet mass 1 kg

## Inputs from technosphere
- building, hall, steel construction: 2.85e-6 m2; lognormal variance with pedigree 0.372, pedigree (3,5,5,5,1)
- conveyor belt: 9.51e-8 m; lognormal variance with pedigree 0.424, pedigree (5,4,5,5,1)
- diesel, burned in building machine: 0.0143 MJ; lognormal variance with pedigree 0.0532, pedigree (2,3,5,5,1)
  properties: heating value, net 1 MJ
- electricity, medium voltage: 0.00906 kWh; lognormal variance with pedigree 0.0532, pedigree (2,3,5,5,1)
- gravel/sand quarry infrastructure: 4.75e-11 unit; lognormal variance with pedigree 0.3526, pedigree (1,3,5,5,1)
- heat, central or small-scale, other than natural gas: 0.00491 MJ; lognormal variance with pedigree 0.0532, pedigree (2,3,5,5,1)
  properties: heating value, net 1 MJ
- industrial machine, heavy, unspecified: 9.51e-5 kg; lognormal variance with pedigree 0.372, pedigree (3,5,5,5,1)
- lubricating oil: 2.5e-6 kg; lognormal variance with pedigree 0.0532, pedigree (2,3,5,5,1)
  properties: carbon content, fossil 0.75, dry mass 1 kg, heating value, net 40.2 MJ, wet mass 1 kg
  note on carbon content, fossil: Lubricating oil is produced from diesel. C-content/dry mass of fats and oils considered 75%, from: ecoinvent v2.2 report, n 15a, pg 40
  note on heating value, net: Literature value, Source: IPCC 2006, 2006 IPCC Guidelines for National Greenhouse Gas Inventories, Prepared by the National Greenhouse Gas Inventories Programme, Eggleston H.S., Buendia L., Miwa K., Ngara T. and Tanabe K. (eds). Published: IGES, Japan
- municipal solid waste: -2.12e-6 kg; name MSW; lognormal variance with pedigree 0.0032, pedigree (2,3,1,5,1)
  production volume; = ref_PV*MSW/ref
    Calculated based on the reference exchange production volume and the relative amounts of exchanges
  properties: carbon content, fossil 0.171549, carbon content, non-fossil 0.261655, dry mass 0.771 kg, heating value, net 11.74 MJ, water content 0.297017, wet mass 1 kg
  note on carbon content, fossil: MSW composition in tab 4.1, ecoinvent v2.2 report 13_I. C content referred to 1 kg DM
  note on heating value, net: Value taken from the general comment of the treatment dataset.
- recultivation, limestone mine: 1.27e-6 m2; lognormal variance with pedigree 0.1746, pedigree (3,3,5,5,1)
- scrap steel: -5.1e-5 kg; name BP_amount_1; = steel_input
  Estimation. Same amount as the input.
  production volume; = ref_PV * (BP_amount_1 / ref)
    Calculated from production volume of reference product using the relative outputs.
  properties: dry mass 1 kg, wet mass 1 kg
- steel, low-alloyed, hot rolled: 5.1e-5 kg; name steel_input; lognormal variance with pedigree 0.0532, pedigree (2,3,5,5,1)
  properties: carbon content, fossil 0.005, dry mass 1 kg, wet mass 1 kg
  note on carbon content, fossil: Low alloyed steel composition given in Tab. 3.2 ecoinvent v2.2 report 10_partII. Steel assumed to have a C content of 0.5%
- synthetic rubber: 4e-6 kg; name rubber_input; lognormal variance with pedigree 0.0532, pedigree (2,3,5,5,1)
  properties: carbon content, fossil 0.871949, dry mass 1 kg, heating value, net 26.42 MJ, wet mass 1 kg
  note on carbon content, fossil: EPDM (Ethylene-propene-diene terpolymer) rubber is a terpolymer of ethylene, propene, and a diene with the residual unsaturated portion of the diene in the side chain (ecoinvent v2.2 report 7-part XX & Ullmann). Chemical formula (deduced from Evidences of Solvent-Induced Miscibility in Polychloroprene-co-Ethylene-Propene Diene Terpolymer Blends, Dubey et al., Journal of Applied Polymer Science, 2009, 111:1884-1891): C20H35
- tap water: 0.0122 kg; source Künniger T. 2001; lognormal variance with pedigree 0.0532, pedigree (2,3,5,5,1)
  Literature value.
  properties: carbon content, fossil 0.00178991, dry mass 0.000337476 kg, water content 2962.17, wet mass 1 kg
  note on carbon content, fossil: Bicarbonate content is 2.93 mol/m3. CO2 content is 0.1 mol/m3 (ecoinvent v2.2 report 8, Tab 93.1).
- waste mineral oil: -2.5e-6 kg; name wasteMineralOil; lognormal variance with pedigree 0.0032, pedigree (2,3,1,5,1)
  production volume; = ref_PV*wasteMineralOil/ref
    (same comment as for municipal solid waste)
  properties: carbon content, fossil 0.864444, dry mass 0.9 kg, heating value, net 34.7 MJ, water content 0.111111, wet mass 1 kg
  note on carbon content, fossil: Tab A.6, ecoinvent v2.2 report 13_I. C content has been calculated after data in the tables, and then referred to 1 kg DM
- waste rubber, unspecified: -4e-6 kg; name BP_amount_2; = rubber_input
  Estimation. Same amount as the input.
  production volume; = ref_PV * (BP_amount_2 / ref)
    Calculated from production volume of reference product using the relative outputs.
  properties: carbon content, fossil 0.853, dry mass 1 kg, heating value, net 27.19 MJ, wet mass 1 kg

## Inputs from nature
- Gravel [natural resource, in ground]: 1.04 kg; lognormal variance with pedigree 0.0532, pedigree (2,3,5,5,1)
- Occupation, lake, artificial [natural resource, land]: 6.27e-5 m2*year; lognormal variance with pedigree 0.1732, pedigree (2,3,5,5,1)
- Occupation, mineral extraction site [natural resource, land]: 0.000288 m2*year; lognormal variance with pedigree 0.0932, pedigree (2,3,5,5,1)
- Transformation, from unspecified [natural resource, land]: 3.51e-5 m2; lognormal variance with pedigree 0.1732, pedigree (2,3,5,5,1)
- Transformation, to lake, artificial [natural resource, land]: 6.27e-6 m2; lognormal variance with pedigree 0.1732, pedigree (2,3,5,5,1)
- Transformation, to mineral extraction site [natural resource, land]: 2.88e-5 m2; lognormal variance with pedigree 0.1732, pedigree (2,3,5,5,1)
- Water, unspecified natural origin [natural resource, in water]: 0.00111195 m3; source Byers, W. 2003; lognormal variance with pedigree 0.0546, pedigree (3,3,5,5,1)
  Literature value. The water used in the process is considered.
  Calculated based on literature, (Vionnet, S., Quantis Water Database - Technical Report, 2012). Water use during wet screening, sand screw and gravity classifier. 10% of water added to be used for dust control. The process boundaries are set by the boundaries of gravel/send processing plant. The process ends when the finished, sorted gravel of defined particles" sizes leaves the plant. It is assumed that 10% of water added for dust control on the site.

## Emissions to nature
- Particulate Matter, < 2.5 um [air, non-urban air or from high stacks]: 4e-10 kg; lognormal variance with pedigree 0.4232, pedigree (2,3,5,5,4)
- Particulate Matter, > 10 um [air, non-urban air or from high stacks]: 5.6e-9 kg; lognormal variance with pedigree 0.1632, pedigree (2,3,5,5,4)
- Particulate Matter, > 2.5 um and < 10um [air, non-urban air or from high stacks]: 2e-9 kg; lognormal variance with pedigree 0.2432, pedigree (2,3,5,5,4)
- Water [air, unspecified]: 0.000306585 m3; lognormal variance with pedigree 0.0827, pedigree (2,2,5,5,1)
  Calculated value based on literature values and expert opinion. See comments in the parametres" comment field.
- Water [water, unspecified]: 0.00081756 m3; lognormal variance with pedigree 0.0827, pedigree (2,2,5,5,1)
  (same comment as for Water)
  property carbon content, fossil 0; name C_content_fossil
  property carbon content, non-fossil 0; name C_content_non_fossil
  property dry mass 0 kg; name DM
  property water in wet mass 1000 kg; name WWM
  property wet mass 1000 kg; name WM

## Sampling procedure
Measurement data of four Swiss plants

## Extrapolations
see Geography and Technology The original data is for geography CH, which was extrapolated to GLO. This child dataset exchanges identical to GLO dataset. Created to enable linking to regional markets (e.g. for electricity). Data quality indicators adjusted accordingly.
