# tin mine operation

Dataset: EcoSpold 2, unit process
Geography: RoW
Time period: 2010-01-01 to 2023-12-31
Technology level: current
Classification: ISIC rev.4 ecoinvent: 0729:Mining of other non-ferrous metal ores
Scenario: Business-as-Usual
System model: Allocation, cut-off by classification
Generated by: Katherine Matos
Database: ecoinvent
isCopyrightProtected: true
accessRestrictedTo: 1

## General comment
This dataset describes the production of tin concentrate. It includes the mining and beneficiation of the minerals.
This dataset is a copy of the dataset covering the geography of Peru (PE) and is assumed to be representative of the global situation. The data were collected from information reported in Environmental Studies of the San Rafael mine located in Peru. The water emissions were analyzed based on the Environmental monitoring reports of the mining company.
The system includes energy, reagents, water consumption, air and water emissions.

## Included activities start
The modeled system starts with the exploitation of the mineral ore in an underground mine.

## Included activities end
This dataset includes the mining and beneficiation of mineral (2.5% Sn). The system includes energy, reagents, water consumption, and air and water emissions. Industrial water is treated before it is discharged to the environment. Note that the water emissions are limited to what is reported onsite.

## Geography
Inputs and outputs for mining and beneficiation are from a Peruvian mining company located in Puno province.
The data are assumed to be representative of the global situation.

## Technology
The modeled mine is an underground mine. The concentration plant from which the data was collected has a capacity of 2,900 metric tons per day. Two concentration methods are used in the production process: gravimetric (84.21% concentrates) and direct flotation (15.79%) with an average water consumption of 23,78 m3 per dry metric ton of ore.

## Time period
The data was collected from the Environmental Impact Studies (2011-2014), monitoring reports (2015-2017) and other technical information (2010-2016). Therefore the time period is set to 2010-2017.

## Reference product
- tin concentrate: 1 kg; name Tin; source Peruvian Ministry of Energy and Mines  2016; By-product classification allocatable product; CPC 14290: Other non-ferrous metal ores and concentrates (other than uranium or thorium ores and concentrates); HS2017 260900: Tin ores and concentrates
  Calculated value based on tin anual production reported by the Ministry of Energy and Mines (2016),
  production volume 4.8359e8 kg; name tin_PV; = 312790*1000/Tin_Sn_content
    Estimated value, based on the total amount of tin mined reported in literature.
    312790 metric tons of tin were mined in 2017 worldwide (USGS 2019). An average grade of 61% Sn is assumed.
    Reference:
    USGS (2019) Tin. U.S. Geological Survey, Mineral Commodity Summaries, February 2019, https://minerals.usgs.gov/minerals/pubs/commodity/tin/mcs-2019-tin.pdf (last accessed on 2019-04-24).
  property price 6.161 EUR2005
    Temporary. This price is calculated based on the price of tin (10.1 EUR/kg) and the tin content (61%) of tin concentrate
  property tin content 0.61; name Tin_Sn_content
    tin content on a dry matter basis
  properties: carbon allocation 0 kg, carbon content 0, carbon content, fossil 0, carbon content, non-fossil 0, dry mass 1 kg, water content 0, water in wet mass 0 kg, wet mass 1 kg

## Inputs from technosphere
- 4-methyl-2-pentanone: 8.14439e-5 kg; source SRK Consulting 2017; lognormal variance with pedigree 0.0453, pedigree (3,2,5,5,2)
  Literature value based on the chemicals requirements reported on company´s Techical reports.
  properties: carbon content, fossil 0.72, dry mass 1 kg, heating value, net 36.32 MJ, wet mass 1 kg
- blasting: 0.0534192 kg; source INSIDEO 2017; lognormal variance with pedigree 0.0058, pedigree (2,3,3,5,1)
  Literature valure reported on the Anual tecnical Reports
- chemical, organic: 0.00758271 kg; source SRK Consulting 2017; lognormal variance with pedigree 0.0444, pedigree (2,3,5,5,2)
  (same comment as for 4-methyl-2-pentanone)
  properties: carbon content, fossil 0.628, dry mass 1 kg, heating value, net 19.03 MJ, wet mass 1 kg
  note on carbon content, fossil: This dataset is an unweighted average of 20 organic substances (listed in Tab 88.1, ecoinvent v2.2 report 8, part II), being part of the top100 chemicals included in this database. The C-content has also been calculated as an unweighted average of the C content of the substances composing this dataset.
- diesel, burned in building machine: 6.51 MJ; source Minsur S.A 2016; lognormal variance with pedigree 0.0058, pedigree (2,3,3,5,1)
  *Calculated value based on the diesel requirements reported on the Environmental Impact Study (2014) from a representative mining company. The calorific value used is 32 MJ/L of diesel.
  properties: heating value, net 1 MJ
- electricity, medium voltage: 0.00284138, 0.000126776, 0.0029542, 0.00149777, 0.00183405, 0.00106139, 0.117334, 2.34056, 0.000263209, 0.786421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 kWh (31 suppliers, which the file names only by identifier); sum of these 4.19262 kWh; source Minsur S.A 2016; lognormal variance with pedigree 0.0058, pedigree (2,3,3,5,1)
  *Literature valure reported on the Environmental Impact Study (2014) from a representative peruvian gold mining company.
- lime: 0.0454726, 0.0039274 kg (2 suppliers, which the file names only by identifier); sum of these 0.0494 kg; source SRK Consulting 2017; lognormal variance with pedigree 0.0458, pedigree (3,3,5,5,2)
  (same comment as for 4-methyl-2-pentanone)
  properties: carbon content, fossil 0.120005, dry mass 1 kg, wet mass 1 kg
- mine infrastructure, underground, non-ferrous metal: 1.0685e-9 unit; source SRK Consulting 2016; lognormal variance with pedigree 0.0439, pedigree (2,2,5,5,2)
  Own calculation based on the annual production and the mine lifespan (25 years).
- polypropylene, granulate: 0.00160079 kg; source SRK Consulting 2017; lognormal variance with pedigree 0.0444, pedigree (2,3,5,5,2)
  (same comment as for 4-methyl-2-pentanone)
  properties: carbon content, fossil 0.857143, dry mass 1 kg, heating value, net 32.78 MJ, wet mass 1 kg
  note on heating value, net: Value extracted from "treatment of waste polypropylene, open burning"
- sulfidic tailings, generic: -33.13 kg; name ByP_1; source Peruvian Ministry of Energy and Mines  2016; lognormal variance with pedigree 0.0054, pedigree (3,3,2,5,1)
  Calculated value based on the amount of mineral removed for the production of the reference product. Recuperation rate of 88.84% Sn.
  production volume; = byP_1/tin*tin_PV
    Calculated from production volume of reference product using the relative outputs.
  property gold content 0; name ByP_1_Au_content
  property silver content 0; name ByP_1_Ag_content
  property tin content 0.0058; name ByP_1_Sn_content
  properties: aluminium content 0.014738, calcium content 0.0089, dry mass 0.85 kg, fluorine content 0.0011041, iron content 0.015374, magnesium content 0.0022359, oxygen content 0.89157, potassium content 0.0025181, silicon content 0.053273, sodium content 0.0014472, water content 0.176471, wet mass 1 kg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
- sulfuric acid: 0.0375267, 0.00490836 kg (2 suppliers, which the file names only by identifier); sum of these 0.0424351 kg; source Peruvian Ministry of Energy and Mines  2016; lognormal variance with pedigree 0.0438, pedigree (2,3,5,5,1)
  (same comment as for 4-methyl-2-pentanone)
  properties: dry mass 1 kg, wet mass 1 kg
- wastewater, unpolluted: -0.000931624, -0.192648 m3 (2 suppliers, which the file names only by identifier); sum of these -0.19358 m3; source Minsur S.A. 2016; lognormal variance with pedigree 0.0038, pedigree (2,3,1,5,1)
  Water is physically treated before being discharged to the river.
  production volume; = ByP_2/tin*tin_PV
    Calculated from production volume of reference product using the relative outputs.
  properties: carbon content, fossil 0.00178991, carbon content, non-fossil 0.00178991, dry mass 0.337476 kg, water content 2962.17, wet mass 1000 kg
  note on carbon content, fossil: Assumed to be like in tap water. Bicarbonate content is 2.93 mol/m3. CO2 content is 0.1 mol/m3 (ecoinvent v2.2 report 8, Tab 93.1).

## Inputs from nature
- Gangue [natural resource, in ground]: 29.5 kg; source INSIDEO 2017; lognormal variance with pedigree 0.0458, pedigree (3,3,5,5,2)
  Calculated value based on the amount of gangue reported on the operation Certificate 2016
- Occupation, industrial area [natural resource, land]: 0.0323678 m2*year; lognormal variance with pedigree 0.0427, pedigree (2,2,3,1,1)
- Tin [natural resource, in ground]: 0.8021 kg; source Peruvian Ministry of Energy and Mines  2016; lognormal variance with pedigree 0.0512, pedigree (3,3,5,5,2)
  Calculated value based on the mineral ore grade (2.35% Sn and the anual Sn production reported by the Ministry of Energy and Mines (2016).
- Transformation, from unspecified [natural resource, land]: 0.00107893 m2; lognormal variance with pedigree 0.1241, pedigree (3,2,3,1,1)
- Transformation, to mineral extraction site [natural resource, land]: 0.00107893 m2; lognormal variance with pedigree 0.1241, pedigree (3,2,3,1,1)
- Water, unspecified natural origin [natural resource, in water]: 0.22915 m3; name Water_undefined; source INSIDEO 2017; lognormal variance with pedigree 0.0452, pedigree (3,3,5,5,1)
  Literature value based on the water balance presented on a Company Technical report.

## Emissions to nature
- Arsenic ion [air, non-urban air or from high stacks]: 6.22967e-6 kg; source Golder Associates Perú 2012; lognormal variance with pedigree 0.6626, pedigree (4,3,3,5,1)
  Calculated value based on the soil metal content registered on the Environmental Impact Study and the PM emissions results.
- Cadmium II [air, non-urban air or from high stacks]: 5.60206e-7 kg; source Golder Associates Perú 2012; lognormal variance with pedigree 0.0458, pedigree (3,3,5,5,2)
  (same comment as for Arsenic ion)
- Chromium III [air, non-urban air or from high stacks]: 2.59281e-6 kg; source Golder Associates Perú 2012; lognormal variance with pedigree 0.0458, pedigree (3,3,5,5,2)
  (same comment as for Arsenic ion)
- Cobalt II [air, non-urban air or from high stacks]: 3.27465e-6 kg; source Golder Associates Perú 2012; lognormal variance with pedigree 0.0458, pedigree (3,3,5,5,2)
  (same comment as for Arsenic ion)
- Copper ion [air, non-urban air or from high stacks]: 7.39787e-6 kg; source Golder Associates Perú 2012; lognormal variance with pedigree 0.6626, pedigree (4,3,3,5,1)
  (same comment as for Arsenic ion)
- Lead II [air, non-urban air or from high stacks]: 3.56738e-5 kg; source Golder Associates Perú 2012; lognormal variance with pedigree 0.0453, pedigree (3,2,5,5,2)
  (same comment as for Arsenic ion)
- Mercury II [air, non-urban air or from high stacks]: 3.99253e-7 kg; source Golder Associates Perú 2012; lognormal variance with pedigree 0.7006, pedigree (4,3,5,5,1)
  (same comment as for Arsenic ion)
- Nickel II [air, non-urban air or from high stacks]: 2.09934e-6 kg; source Golder Associates Perú 2012; lognormal variance with pedigree 0.0458, pedigree (3,3,5,5,2)
  (same comment as for Arsenic ion)
- Particulate Matter, < 2.5 um [air, non-urban air or from high stacks]: 0.042553 kg; source Golder Associates Perú 2012; lognormal variance with pedigree 0.3066, pedigree (3,3,3,5,1)
  Calculated value based on EPA equations for the following activities: Truckloading, material handling, nivelation and erosion.
  Process characteristics were extracted from the environmental impact study.
- Particulate Matter, > 2.5 um and < 10um [air, non-urban air or from high stacks]: 0.0628777 kg; source Golder Associates Perú 2012; lognormal variance with pedigree 0.1646, pedigree (3,3,5,5,1)
  (same comment as for Particulate Matter, < 2.5 um)
- Tin ion [air, non-urban air or from high stacks]: 3.13839e-6 kg; source Golder Associates Perú 2012; lognormal variance with pedigree 0.0453, pedigree (3,2,5,5,2)
  (same comment as for Arsenic ion)
- Water [air, non-urban air or from high stacks]: 0.0343725 m3; name Water_evap; = 15%*water_undefined; source INSIDEO 2017; lognormal variance with pedigree 0.0458, pedigree (3,3,5,5,2)
  Calculated value based on an evaporation rate of 15%.
- Zinc II [air, non-urban air or from high stacks]: 2.1629e-5 kg; source Golder Associates Perú 2012; lognormal variance with pedigree 0.0453, pedigree (3,2,5,5,2)
  (same comment as for Arsenic ion)
- Arsenic ion [water, surface water]: 1.72577e-6 kg; source Minsur S.A. 2016; lognormal variance with pedigree 0.6552, pedigree (2,3,3,5,1)
  Calculated value based on the monitoring report for water discharge (2015 and 2016) .
- Cadmium II [water, surface water]: 1.72577e-6 kg; source Minsur S.A. 2016; lognormal variance with pedigree 0.6552, pedigree (2,3,3,5,1)
  Calculated value based on the monitoring report for water discharge (2015 and 2016) .
- Chromium III [water, surface water]: 1.22173e-7 kg; source Minsur S.A. 2016; lognormal variance with pedigree 0.6552, pedigree (2,3,3,5,1)
  Calculated value based on the monitoring report for water discharge (2015 and 2016) .
- Copper ion [water, surface water]: 1.55056e-6 kg; source Minsur S.A. 2016; lognormal variance with pedigree 0.6552, pedigree (2,3,3,5,1)
  Calculated value based on the monitoring report for water discharge (2015 and 2016) .
- Iron ion [water, surface water]: 4.67497e-6 kg; source Minsur S.A. 2016; lognormal variance with pedigree 0.6552, pedigree (2,3,3,5,1)
  Calculated value based on the monitoring report for water discharge (2015 and 2016) .
- Lead II [water, surface water]: 6.03266e-7 kg; source Minsur S.A. 2016; lognormal variance with pedigree 0.6552, pedigree (2,3,3,5,1)
  Calculated value based on the monitoring report for water discharge (2015 and 2016) .
- Manganese II [water, surface water]: 1.93754e-5 kg; source Minsur S.A. 2016; lognormal variance with pedigree 0.6552, pedigree (2,3,3,5,1)
  Calculated value based on the monitoring report for water discharge (2015 and 2016) .
- Mercury II [water, surface water]: 7.01111e-6 kg; source Minsur S.A. 2016; lognormal variance with pedigree 0.6552, pedigree (2,3,3,5,1)
  Calculated value based on the monitoring report for water discharge (2015 and 2016) .
- Zinc II [water, surface water]: 5.13442e-6 kg; source Minsur S.A. 2016; lognormal variance with pedigree 0.6552, pedigree (2,3,3,5,1)
  Calculated value based on the monitoring report for water discharge (2015 and 2016) .

## Sampling procedure
The data were collected from the environmental studies of San Rafael mine located in Peru. San Rafael is an underground operation that represents 100% of the tin concentration production in Perú (Peruvian Ministry of Mine production statistics, 2016).

## Extrapolations
The data is from the dataset covering the geography of Peru (PE). The uncertainty has been adjusted accordingly.
