# glass tube production, borosilicate

Dataset: EcoSpold 2, unit process
Geography: RoW
Time period: 2000-01-01 to 2023-12-31
Technology level: current
Classification: ISIC rev.4 ecoinvent: 2310:Manufacture of glass and glass products
Classification: EcoSpold01Categories: glass/construction
Tags: ConvertedDataset
Scenario: Business-as-Usual
System model: Allocation, cut-off by classification
Generated by: Niels Jungbluth
Published in: Kellenberger D. 2007
Database: ecoinvent
isCopyrightProtected: true
accessRestrictedTo: 1

## General comment
Production of borosilicate glass tubes.
[This dataset was already contained in the ecoinvent database version 2. It was not individually updated during the transfer to ecoinvent version 3. Life Cycle Impact Assessment results may still have changed, as they are affected by changes in the supply chain, i.e. in other datasets. This dataset was generated following the ecoinvent quality guidelines for version 2. It may have been subject to central changes described in the ecoinvent version 3 change report (http://www.ecoinvent.org/database/ecoinvent-version-3/reports-of-changes/), and the results of the central updates were reviewed extensively. The changes added e.g. consistent water flows and other information throughout the database. The documentation of this dataset can be found in the ecoinvent reports of version 2, which are still available via the ecoinvent website. The change report linked above covers all central changes that were made during the conversion process.]

## Included activities end
Gate to gate inventory for the production of glass tubes.

## Geography
Production plant in DE. Some pre-products and waste treatment services estimated with European and Swiss data.

## Technology
Tube glass manufacturing. Plant data for joint production of borosilicate (20%) and lime-natron-glass (80%) tubes.

## Time period
Production data for one business year.

## Parameters
- fraction, process water, to air: 0.15 dimensionless; name fraction_PW_to_air; lognormal variance with pedigree 0.092025, pedigree (4,4,3,2,4)
  Literature value. In case when no industry/process specific data are available, default evaporation fraction value is used. This value is 15% and is based on literature (Statistics Canada, 2007 & Shaffer, K.H., 2008, Consumptive water use in the Great Lakes Basin, USGS & Shiklomanov, 2003, World Water Resources at the Beginning of the 21st Century) and has been approved by an expert.
- fraction, tap water, to air: 0.15 dimensionless; name fraction_TW_to_air; = fraction_PW_to_air; lognormal variance with pedigree 0.092025, pedigree (4,4,3,2,4)
  Calculated value. See comment in the other parametres present in this dataset. Tap water is considered to be always used as process water, thus process water fractions to air are applied to all tap water input flows to calculate the amount of water consumed in the processes.

## Reference product
- glass tube, borosilicate: 1 kg; By-product classification allocatable product; CPC 37195: Laboratory, hygienic or pharmaceutical glassware; ampoules of glass; HS2017 700232: Glass; unworked, tubes, of glass having a linear coefficient of expansion not exceeding 5 x 10 (to the minu[...]
  EcoSpold01Location=DE
  production volume 3.75794 kg
    This is a placeholder value that does not reflect real-world production volumes. This dataset does not currently require a real-world production volume to work in the database framework, and no actual data were collected yet. This has no negative effect on the results of the ecoinvent database.
  property price 3.16 EUR2005
    Assumed to be equal to 'flat glass, coated, at plant' and 'flat glass, uncoated, at plant'.
  properties: carbon allocation 0 kg, carbon content 0, carbon content, fossil 0, carbon content, non-fossil 0, dry mass 1 kg, water content 0, water in wet mass 0 kg, wet mass 1 kg

## Inputs from technosphere
- aluminium oxide, non-metallurgical: 0.05 kg; lognormal variance with pedigree 0.0541, pedigree (3,2,5,5,1)
  Estimation for 5% feldspar
  EcoSpold01Location=RER
  Uncertainty: Estimation for 5% feldspar
  properties: dry mass 1 kg, wet mass 1 kg
- boric oxide: 0.1 kg; lognormal variance with pedigree 0.0541, pedigree (3,2,5,5,1)
  Questionnaire, 10% boron trioxide.
  Uncertainty: Estimation for 10% boron trioxide
  properties: dry mass 1 kg, wet mass 1 kg
- electricity, medium voltage: 0.000431948, 0.000646581, 0.000204261, 0.00380208, 0.00223154, 0.0026457, 0.0321364, 7.66455e-5, 0.641049, 0.21539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 kWh (47 suppliers, which the file names only by identifier); sum of these 1.13 kWh; lognormal variance with pedigree 0.0527, pedigree (2,2,5,5,1)
  EcoSpold01Location=DE
  Questionnaire
  Uncertainty: Questionnaire
- glass tube factory: 1e-8 unit; lognormal variance with pedigree 0.3527, pedigree (2,2,5,5,1)
  Questionnaire
  EcoSpold01Location=DE
  Uncertainty: Questionnaire
- hazardous waste, for incineration: -0.00321953, -4.04706e-5 kg (2 suppliers, which the file names only by identifier); sum of these -0.00326 kg; lognormal variance with pedigree 0.0127, pedigree (2,2,1,5,1)
  EcoSpold01Location=CH
  Questionnaire, concentrated solvents
  Uncertainty: Questionnaire, concentrated solvents
  production volume
    Calculated from the production volume of glass tube, borosilicate in proportion to the respective output amounts.
  properties: carbon content, fossil 0.554667, dry mass 0.75 kg, heating value, net 17 MJ, water content 0.333333, wet mass 1 kg
  note on carbon content, fossil: Tab A.6, ecoinvent v2.2 report 13_I. C content has been calculated after data in the tables, and then referred to 1 kg DM
  note on heating value, net: Value taken from the general comment of the treatment dataset.
- heat, district or industrial, natural gas: 0.193459, 11.7729, 0.00363819 MJ (3 suppliers, which the file names only by identifier); sum of these 11.97 MJ; lognormal variance with pedigree 0.0527, pedigree (2,2,5,5,1)
  Questionnaire
  EcoSpold01Location=RER
  Uncertainty: Questionnaire
  properties: heating value, net 1 MJ
- heat, district or industrial, other than natural gas: 3.02879, 0.00140318, 0.00030841 MJ (3 suppliers, which the file names only by identifier); sum of these 3.0305 MJ; lognormal variance with pedigree 0.0527, pedigree (2,2,5,5,1)
  EcoSpold01Location=RER
  Questionnaire
  Uncertainty: Questionnaire
  properties: heating value, net 1 MJ
- municipal solid waste: -2.50902e-6, -1.5492e-7, -1.02009e-7, -4.14207e-6, -4.91853e-7, -2.74949e-7, -3.12509e-6, -1.21335e-6, -3.06117e-6, -7.87383e-7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 kg (44 suppliers, which the file names only by identifier); sum of these -0.00243 kg; lognormal variance with pedigree 0.0127, pedigree (2,2,1,5,1)
  Questionnaire, unspecific wastes
  EcoSpold01Location=CH
  Uncertainty: Questionnaire, unspecific wastes
  production volume
    (same comment as for hazardous waste, for incineration)
  properties: carbon content, fossil 0.171549, carbon content, non-fossil 0.261655, dry mass 0.771 kg, heating value, net 11.74 MJ, water content 0.297017, wet mass 1 kg
  note on carbon content, fossil: MSW composition in tab 4.1, ecoinvent v2.2 report 13_I. C content referred to 1 kg DM
- silica sand: 0.703 kg; lognormal variance with pedigree 0.0527, pedigree (2,2,5,5,1)
  Questionnaire
  EcoSpold01Location=DE
  Uncertainty: Questionnaire
  properties: dry mass 0.99 kg, water content 0.010101, wet mass 1 kg
- soda ash, light: 0.158 kg; lognormal variance with pedigree 0.0527, pedigree (2,2,5,5,1)
  EcoSpold01Location=RER
  Reduction for feldspar + boron plus production wastes
  Uncertainty: Reduction for feldspar + boron plus production wastes
  properties: carbon content, fossil 0.0517241, dry mass 1 kg, heating value, net 3.43 MJ, wet mass 1 kg
- tap water: 0.0011015, 0.00167914, 0.00313319, 0.00844059, 0.00101602, 0.0423413, 0.000755111, 0.484533 kg (8 suppliers, which the file names only by identifier); sum of these 0.543 kg; lognormal variance with pedigree 0.0527, pedigree (2,2,5,5,1)
  EcoSpold01Location=RER
  Questionnaire
  Calculated value. The amount of water in this flow on the input to the process as provided by the data provider for eiv2 was 0.326kg. This amount is adjusted, so the water balance is achieved.
  Uncertainty: Questionnaire
  properties: carbon content, fossil 0.00178991, dry mass 0.000337476 kg, water content 2962.17, wet mass 1 kg
  note on carbon content, fossil: Bicarbonate content is 2.93 mol/m3. CO2 content is 0.1 mol/m3 (ecoinvent v2.2 report 8, Tab 93.1).
- waste glass: -1.81778e-6, -8.66852e-8, -3.15235e-7, -1.42962e-8, -6.77924e-9, -8.98689e-9, -9.47775e-9, -1.44537e-8, -0.000954326, -1.10449e-8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 kg (42 suppliers, which the file names only by identifier); sum of these -0.000957 kg; lognormal variance with pedigree 0.0127, pedigree (2,2,1,5,1)
  Glass used as sealing material
  EcoSpold01Location=CH
  Uncertainty: Glass used as sealing material
  production volume
    (same comment as for hazardous waste, for incineration)
  properties: dry mass 1 kg, heating value, net 0.05 MJ, wet mass 1 kg
  note on heating value, net: Value extracted from "treatment of waste glass, open dump, very wet infiltration class (1000mm)"
- waste mineral wool, for final disposal: -2.99701e-6, -0.000725003 kg (2 suppliers, which the file names only by identifier); sum of these -0.000728 kg; lognormal variance with pedigree 0.0307, pedigree (2,2,1,5,3)
  Questionnaire, asbestos
  EcoSpold01Location=CH
  Uncertainty: Questionnaire, asbestos
  production volume
    (same comment as for hazardous waste, for incineration)
  properties: dry mass 1 kg, wet mass 1 kg
- waste wood, untreated: -1.81026e-7, -5.79086e-7, -3.24924e-7, -9.23904e-7, -2.55553e-7, -2.50389e-5, -6.51771e-7, -0.000485696, -1.45693e-6, -2.89849e-7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 kg (42 suppliers, which the file names only by identifier); sum of these -0.000739 kg; lognormal variance with pedigree 0.0127, pedigree (2,2,1,5,1)
  EcoSpold01Location=CH
  Questionnaire, wood wastes
  Uncertainty: Questionnaire, wood wastes
  production volume
    (same comment as for hazardous waste, for incineration)
  properties: carbon content, non-fossil 0.48632, dry mass 0.8 kg, heating value, net 13.99 MJ, water content 0.25, wet mass 1 kg
  note on carbon content, non-fossil: Tab A.4, ecoinvent v2.2 report 13_I. C content has been referred to 1 kg DM,
- wastewater from glass production: -2.61324e-6, -0.000540387 m3 (2 suppliers, which the file names only by identifier); sum of these -0.000543 m3; lognormal variance with pedigree 0.0127, pedigree (2,2,1,5,1)
  EcoSpold01Location=CH
  Questionnaire
  Uncertainty: Questionnaire
  production volume
    (same comment as for hazardous waste, for incineration)
  properties: carbon content, fossil 0.0455242, dry mass 1.09356 kg, water content 913.443, wet mass 1000 kg
  note on carbon content, fossil: COD= 0.115 kg/m3 (Tab A.18, ecoinvent v2.2 report 13_I). COD was converted to TOC, using conversion factors in Tab 4.10 (ecoinvent v2.2 report 13_IV). TOC was considered as Total Carbon.

## Emissions to nature
- Carbon dioxide, fossil [air, urban air close to ground]: 0.011 kg; lognormal variance with pedigree 0.0901, pedigree (4,2,5,5,1)
  Estimation for decomposition of carbonates
  Uncertainty: Estimation for decomposition of carbonates
- Nitrogen oxides [air, urban air close to ground]: 0.00652 kg; lognormal variance with pedigree 0.0827, pedigree (2,2,5,5,1)
  Questionnaire
  Uncertainty: Questionnaire
- Particulate Matter, < 2.5 um [air, urban air close to ground]: 0.00015 kg; lognormal variance with pedigree 0.3527, pedigree (2,2,5,5,1)
  Waste gas purification
  Uncertainty: Waste gas purification

## Sampling procedure
Questionnaire.

## Extrapolations
Input of raw materials is calculated with data for borosilicate glass. Other data are from a plant with a production mix of borosilicate (20%) and lime-natron-glass (80%). This dataset has been copied from an original dataset covering the geography DE. The uncertainty has been adjusted accordingly.

## Review by Daniel Kellenberger (obsolete) 2003-07-25
Passed.
