# zinc coating, pieces, adjustment per micro-m

Dataset: EcoSpold 2, unit process
Geography: RER
Time period: 1996-01-01 to 2023-12-31
Technology level: current
Classification: ISIC rev.4 ecoinvent: 2592:Treatment and coating of metals; machining
Classification: EcoSpold01Categories: metals/processing
Synonyms: hot dip coating; galvanising
Tags: ConvertedDataset
Scenario: Business-as-Usual
System model: Allocation, cut-off by classification
Generated by: Silvio Blaser
Published in: Classen M. 2009
Database: ecoinvent
isCopyrightProtected: true
accessRestrictedTo: 1

## General comment
This module is applicable if the coating layer is thicker than the one given for "zinc coating, pieces", or for "zinc coating, coils". Applying it for the latter, the module has to be multiplied by the factor 1.53 for correct use. The Dataset is not applicable for thinner coating layers. Data given per square meter of product surface corrected by one um.
[This dataset was already contained in the ecoinvent database version 2. It was not individually updated during the transfer to ecoinvent version 3. Life Cycle Impact Assessment results may still have changed, as they are affected by changes in the supply chain, i.e. in other datasets. This dataset was generated following the ecoinvent quality guidelines for version 2. It may have been subject to central changes described in the ecoinvent version 3 change report (http://www.ecoinvent.org/database/ecoinvent-version-3/reports-of-changes/), and the results of the central updates were reviewed extensively. The changes added e.g. consistent water flows and other information throughout the database. The documentation of this dataset can be found in the ecoinvent reports of version 2, which are still available via the ecoinvent website. The change report linked above covers all central changes that were made during the conversion process.]

## Included activities start
The activity starts with the pieces entering the process.

## Included activities end
Includes the process steps galvanising (melt zinc coating) and finishing. Does not include the fabricates being coated.

## Geography
Data-set is representative for European Union

## Technology
Average technique for EU.

## Time period
Reference from 1996 refers partly to data from 1993.

## Reference product
- zinc coat, pieces, adjustment per micro-m: 1 m2; By-product classification allocatable product; CPC 39365: Waste and scrap of zinc
  EcoSpold01Location=RER
  production volume 1.32237 m2
    This is a placeholder value that does not reflect real-world production volumes. This dataset does not currently require a real-world production volume to work in the database framework, and no actual data were collected yet. This has no negative effect on the results of the ecoinvent database. The placeholder value of this activity was scaled according to the nominal GDP of 2005 (source: United Nations, http://data.un.org/Glossary.aspx?q=GDP+%28current+US%24%29, accessed 20130726) to reflect an appropriate share of the global production volume, which is also a placeholder value.
  property price 0.016016 EUR2005
    Calculated based on inputs: The price of the product has been calculated as a sum of the values of the material and energy inputs for this product. This value is therefore a rough estimation. It may underestimate the real price since there are additional expenses when producing any product. These expences can include for example labour costs, treatment of waste materials and profit for the producer. Please consider carefully whether this level of data quality is acceptable for your application.
  properties: carbon allocation 0 kg, carbon content 0

## Inputs from technosphere
- zinc: 0.0154 kg; lognormal variance with pedigree 0.058, pedigree (1,5,5,1,1)
  EcoSpold01Location=RER
  properties: dry mass 1 kg, wet mass 1 kg

## Emissions to nature
- Arsenic ion [air, unspecified]: 4.86e-11 kg; lognormal variance with pedigree 0.098, pedigree (1,5,5,1,1)
- Cadmium II [air, unspecified]: 3.35e-10 kg; lognormal variance with pedigree 0.098, pedigree (1,5,5,1,1)
- Lead II [air, unspecified]: 8.72e-10 kg; lognormal variance with pedigree 0.098, pedigree (1,5,5,1,1)
- Zinc II [air, unspecified]: 1.72e-7 kg; lognormal variance with pedigree 0.098, pedigree (1,5,5,1,1)

## Sampling procedure
Literature

## Review by Roland Hischier 2009-01-28
Validated for v1.01
