# stockpiling of anode slime from electrorefining of copper, anode

Dataset: EcoSpold 2, unit process
Geography: RoW
Time period: 2005-01-01 to 2023-12-31
Technology level: current
Classification: EcoSpold01Categories: metals/extraction
Classification: ISIC rev.4 ecoinvent: 2420:Manufacture of basic precious and other non-ferrous metals
Scenario: Business-as-Usual
System model: Allocation, cut-off by classification
Generated by: Emilia Moreno Ruiz
Database: ecoinvent
isCopyrightProtected: true
accessRestrictedTo: 1

## General comment
Stockpiling is a way of assuring provision and control over supplies, and is systematically applied with some commodities by several countries.
This dataset describes the stockpiling of "anode slime, silver and tellurium containing, from refining of primary copper". Only the infrastructure for the storage tank is included by using as a proxy a storage tank for liquid organic chemicals. No losses are taken into account. The stockpiling is considered to happen in the geographical sourroundings of the mine producing the concentrate.
Sources:
-US Department of defense, 2013, Strategic and Critical Materials - Report on Stockpile Requirements.
-Reconfiguration of the National Defense Stockpile Report to Congress, April 2009.

## Included activities start
The activity starts with the arrival of anode slime to the storage tank.

## Included activities end
The activity ends with the provision of the service of stockpiling the anode slime.

## Technology
The storage does not consider infrastructre nor process losses.

## Reference product
- stockpiling of anode slime from electrorefining of copper, anode: 1 kg; By-product classification allocatable product; CPC 14210: Copper, ores and concentrates
  production volume 185.571 kg; = 25591*0.01
    It is assumed that 1% of the anode slime produced during electrorefining of primary copper is stockpiled.
  property price 4.06 EUR2005
    Temporary price data. Calculated as 90% of purchasers price based on: Source: ecoinvent v2 report 10-part III, pag 66
  properties: carbon allocation 0 kg, carbon content 0

## Inputs from technosphere
- liquid storage tank, chemicals, organics: 3.33333e-9 unit; = 1/(1*4000*1500*50); lognormal variance with pedigree 0.1726, pedigree (3,5,5,5,5)
  Density of anode slime is 1500 kg/m3 (http://minedewatering.com/wp-content/uploads/2012/05/Copper-process.pdf).
  It is assumed that the storage of anode slime takes place as a continuous process and everyday a quantity of anode slime is pumpled from the storage tank for further processing . Therefore the capacity utilisation rate is assumed to be 1. (http://www.kennecott.com/library/media/Refining%202009.pdf)
  It is roughly assumed that anode slime remains stored for 1 year.
  The lifetime of the liquid storage tank is given in ecoinvent as 50 years. The capacity of the tank is 4000 m3.

## Extrapolations
this stockpiling of anode slime is only considering infrastructure.
