# maize grain production, second crop

Dataset: EcoSpold 2, unit process
Geography: BR-GO
Time period: 2015-01-01 to 2023-12-31
Technology level: current
Classification: ISIC rev.4 ecoinvent: 0111:Growing of cereals (except rice), leguminous crops and oil seeds
Synonyms: winter maize production, winter maize cultivation, winter corn production
Tags: No
Scenario: Business-as-Usual
System model: Allocation, cut-off by classification
Generated by: Natalia Crespo Mendes
Published in: Folegatti Matsuura, M. 2017
Database: ecoinvent
isCopyrightProtected: true
accessRestrictedTo: 1

## General comment
The raw data collected in panels were organized in electronic spreadsheets and checked for completeness and consistency. Agricultural inputs were detailed as to their composition and physical characteristics. Agricultural operations were characterized in terms of machinery (tractor and implement), type of fuel and specific consumption. Precipitation is enought to supply water to the crop, no extra water needed. Emissions from the agricultural process were estimated using the BRCalc/ICVCalc tool, developed by Embrapa Environment, which includes specific climate and soil databases for the 137 Brazilian agricultural mesoregions, in addition to databases of parameters related to agricultural crops, fertilizers and pesticides.
The main emission models adopted by BRCalc/ICVCalc derive from the references: Nemecek et al. (2015), IPCC (2019), Nemecek & Kagi (2007). It was used the model BRLUC (Donke et al., 2020) to estimate the LUC emissions; and the PestLCI Consensus V1.0, parameterized for Brazil (Barizon et al., 2021), to estimate pesticide emissions.

## Included activities start
This activity starts after the harvest of the previous crop.

## Included activities end
The dataset includes the inputs of seeds, mineral fertilisers and pesticides. It is assumed that no organic fertiliser is applied. The dataset includes all machine operations and corresponding machine infrastructure and sheds for: limestone and gypsum application, application of plant protection product, planting with starter fertiliser, fertilising, combine harvesting and drying of grains. For other agricultural operations, the amount of fuel consumed and their emissions are estimated. The dataset also includes the transportation of products inside the farm: water, soil correctives and fertilisers from sheds to field and grain from field to truck. Furthermore, direct field emissions and land use change emissions are included, with important regionalizations added. The dataset doesn't include: seed treatment, cleaning and storage of harvested grains. The activity ends after harvest at the farm gate.

## Allocation
In Brazil, maize can be produced as a monoculture or in cropping systems. For the fraction of maize produced in cropping systems, land occupation, liming operation and limestone are allocated among the products of the system, adopting factors that consider the fraction of area and the occupation time.

## Geography
The inventory is modelled for Brazil, Goiás

## Technology
This dataset represents the production of 1 kg of maize in the state of Goiás, which is composed of the maize regions of Entorno de Brasília, Sudoeste de Goiás e Porangatu. In these regions, maize is produced in cropping systems, including other crops such as soybeans. When in a cropping system, land occupation, liming operation and limestone are allocated among the products of the system, adopting factors that consider the fraction of area and the occupation time. The average productivity is 6180 kg/ha, at 13% moisture.
Agricultural operation was modelled based on the total diesel consumed to perform the operation and the emissions to air related to diesel burning.

## Time period
Time period of the most of the data collected for this dataset.

## Reference product
- maize grain: 1 kg; By-product classification allocatable product; CPC 01122: Maize (corn), other; HS2017 100590: Cereals; maize (corn), other than seed
  This dataset represents the production of 1 kg of maize in the state of Goiás, which is composed of the maize regions of Entorno de Brasília, Sudoeste de Goiás e Porangatu. In these regions, maize is produced in cropping systems, including other crops such as soybeans. When in a cropping system, land occupation, liming operation and limestone are allocated among the products of the system, adopting factors that consider the fraction of area and the occupation time. The average productivity is 6180 kg/ha, at 13% moisture.
  production volume 1.0378e10 kg
    The covered datasets together represent 95,2% of national production (PV). Due to the high representativeness and the lack of information regarding the other regions not covered by the inventories, it was assumed that the available data represent 100% of the national production and a new percentage of contribution was attributed to each state.
  property price 0.12 EUR2005
    Literature value. Based on SAFEX price of R 2,025 per tonne (average yellow and white). Source: SAGIS, 2018. Retrieved from: http://www.sagis.org.za/safex_historic.html, accessed 28May2018.
  properties: carbon allocation 0.40383 kg, carbon content 0.46957, carbon content, fossil 0, carbon content, non-fossil 0.46957, dry mass 0.86 kg, water content 0.162791, water in wet mass 0.14 kg, wet mass 1 kg

## Inputs from technosphere
- 2,4-dichlorophenol: 6.8e-8 kg; lognormal variance with pedigree 1.0709, pedigree (2,2,2,1,1)
  The amount of pesticide or adjuvant was obtained from interviews with producers and experts. Concentration of the active ingredient was obtained in the Material Safety Data Sheet. The amount of dilution water was 200 L/ha per application.
  properties: carbon content, fossil 0.442116, dry mass 1 kg, heating value, net 16.37 MJ, wet mass 1 kg
- atrazine: 0.00042 kg; lognormal variance with pedigree 1.0709, pedigree (2,2,2,1,1)
  (same comment as for 2,4-dichlorophenol)
  properties: carbon content, fossil 0.446512, dry mass 1 kg, wet mass 1 kg
- diammonium phosphate: 4.1e-6 kg; lognormal variance with pedigree 1.0709, pedigree (2,2,2,1,1)
  The amount of fertiliser was obtained from interviews with producers and experts. The nutrient content in the input was obtained from technical literature and technical regulation documents. The selection of the fertiliser from the ecoinvent database and its ammount was based on the commercial product.
  properties: dry mass 1 kg, nitrogen content 0.18, phosphorus content 0.200754, wet mass 1 kg
  note on nitrogen content: Nitrogen content (on a dry matter basis) of diammonium phosphate is calculated from the molecular formula of the nutrient present in the substance.
  note on phosphorus content: Phosphorus content (on a dry matter basis) of diammonium phosphate is calculated from the molecular formula of the nutrient present in the substance.
- diesel, low-sulfur: 0.00447 kg; lognormal variance with pedigree 1.2403, pedigree (3,2,2,1,3)
  The amount of diesel fuel (B12 mix in Brazil) used in agricultural operations not found in ecoinvent
  properties: carbon content, fossil 0.865, dry mass 1 kg, heating value, net 42.8 MJ, wet mass 1 kg
- dolomite: 7.2e-6 kg; lognormal variance with pedigree 1.1123, pedigree (3,2,2,1,1)
  The amount of soil corrective was obtained from interviews with producers and experts.
  properties: carbon content, fossil 0.130435, dry mass 1 kg, wet mass 1 kg
- fatty acid methyl ester: 0.000631 kg; lognormal variance with pedigree 1.2403, pedigree (3,2,2,1,3)
  The amount of biodiesel fuel (B12 mix in Brazil) used in agricultural operations not found in ecoinvent plus the fatty acids used as pesticide adjuvant
  properties: carbon content, fossil 0.041, carbon content, non-fossil 0.732, dry mass 1 kg, heating value, net 37.2 MJ, wet mass 1 kg
  note on heating value, net: Based on literature, report 17, page 439. Jungbluth, N., Chudacoff, M., Dauriat, A., Dinkel, F., Doka, G., Faist Emmenegger, M., Gnansounou, E., Kljun, N., Schleiss, K., Spielmann, M., Stettler, C., Sutter, J. 2007: Life Cycle Inventories of Bioenergy. ecoinvent report No. 17, Swiss Centre for Life Cycle Inventories, Dübendorf, CH.
- glyphosate: 0.00024 kg; lognormal variance with pedigree 1.0709, pedigree (2,2,2,1,1)
  (same comment as for 2,4-dichlorophenol)
  properties: carbon content, fossil 0.214286, dry mass 1 kg, wet mass 1 kg
- gypsum, mineral: 0.0019 kg; lognormal variance with pedigree 1.1123, pedigree (3,2,2,1,1)
  The amount of soil corrective was obtained from interviews with producers and experts.
  properties: dry mass 1 kg, wet mass 1 kg
- land use change, annual crop: 8.03777e-5 ha; lognormal variance with pedigree 1.22882, pedigree (2,1,2,2,3)
  LUC modeling implemented in ecoinvent for Brazil is based on Donke et al. (2020). LUC amount was updated, based on yield and crop expansion rate from IBGE (2022). Reference years: average among 2017, 2018, 2019. Equation: (1/yield * % crop expansion). The yield is the average for the years 2017 to 2019. Expansion: difference of the average area of the years 2017 to 2019 (t1=t0+20) for the years 1998 to 2000 (t0), by the formula (1-(t0/t1)).
- lime: 0.045 kg; lognormal variance with pedigree 1.1123, pedigree (3,2,2,1,1)
  The amount of soil corrective was obtained from interviews with producers and experts.
  properties: carbon content, fossil 0.120005, dry mass 1 kg, wet mass 1 kg
- maize seed, for sowing: 0.00324 kg; lognormal variance with pedigree 1.0902, pedigree (1,1,2,1,1)
  The amount of seeds for sowing
  property carbon content, non-fossil 0.45263; name C_content_non_fossil
  property dry mass 0.88 kg; name DM
  property water content 0.136364; name water_content
  property water in wet mass 0.12 kg; name WWM
  property wet mass 1 kg; name WM
  note on carbon content, non-fossil: biogene carbon content on a dry matter basis; Composition data obtained from Corn Grain Whole, in (http://beefmagazine.com/images/2009%20feed%20table.pdf). First, composition data were refered to 1 kg dry mass. Then, C-contents were calculated considering a C-content/dry mass of 44% in carbohydrates (including fibres), 53% in proteins and 75% in fats. All data from ecoinvent report, n 15a, pg 40, except C-content in protein, that comes from Determination of protein concentration by total organic carbon analysis, Rouwenhorst et al., 1991, J Biochem and Biophys Methods, 22:119-128.
- metolachlor: 1.7e-5 kg; lognormal variance with pedigree 1.0709, pedigree (2,2,2,1,1)
  (same comment as for 2,4-dichlorophenol)
  properties: carbon content, fossil 0.633803, dry mass 1 kg, wet mass 1 kg
- monoammonium phosphate: 0.015 kg; lognormal variance with pedigree 1.0709, pedigree (2,2,2,1,1)
  (same comment as for diammonium phosphate)
  properties: dry mass 1 kg, nitrogen content 0.084, phosphorus content 0.226939, wet mass 1 kg
  note on nitrogen content: Nitrogen content (on a dry matter basis) of monoammonium phosphate is calculated from the molecular formula of the nutrient present in the substance.
  note on phosphorus content: Phosphorus content (on a dry matter basis) of monoammonium phosphate is calculated from the molecular formula of the nutrient present in the substance.
- packaging, for fertilisers: 0.059 kg; lognormal variance with pedigree 1.6408, pedigree (4,3,2,5,4)
  The HDPE packaging was considered for macronutrient fertilisers. Soil correctives were not considered in the packaging calculation since these are transported in bulk. The amount of packaging for pesticides was also estimated. It was considered twice the value of the active ingredient of fertilisers and pesticides applied in the field to account for the packaging of the diluted products. The production and disposal of the packaging were included in this exchange.
  properties: carbon content, fossil 0.825301, dry mass 1 kg, price 0.0642 EUR2005, wet mass 1 kg
  note on carbon content, fossil: Considering a chemical formula (C2H4)n for polyethylene, carbon content-fossil is calculated to be 0.856286 kg of Carbon per kg of dry mass.
- packaging, for pesticides: 0.0016 kg; lognormal variance with pedigree 1.6408, pedigree (4,3,2,5,4)
  (same comment as for packaging, for fertilisers)
  properties: carbon content, fossil 0.85714, dry mass 1 kg, price 0.0642 EUR2005, wet mass 1 kg
- pesticide, unspecified: 0.0001 kg; lognormal variance with pedigree 1.0709, pedigree (2,2,2,1,1)
  The commercial pesticides not found in the ecoinvent database were summed up and added as “pesticide, unspecified” in kg/kg: Azoxystrobin (5,3E-06), beta-cyfluthrin (1,1E-06), cyproconazole (2,1E-06), diquat dibromide (3,4E-09), epoxiconazole (9,2E-07), fluxapyroxade (7,7E-08), imidacloprid (2,1E-05), lufenuron (5,9E-07), mesotrione (4,2E-06), methomyl (7,6E-06), nicosulfuron (8,0E-06), pyraclostrobin (3,1E-06), Tebuconazole (1,8E-05), teflubenzuron (9,2E-07), Tembotrione (3,0E-06), thiodicarb (2,0E-05), Trifloxystrobin (8,8E-06).
  properties: carbon content, fossil 0.486978, dry mass 1 kg, wet mass 1 kg
- potassium chloride: 0.018 kg; lognormal variance with pedigree 1.0709, pedigree (2,2,2,1,1)
  (same comment as for diammonium phosphate)
  properties: dry mass 1 kg, wet mass 1 kg
- transport, tractor and trailer, agricultural: 0.0052 metric ton*km; lognormal variance with pedigree 1.1123, pedigree (3,2,2,1,1)
  Average transport of fertilisers, limestone and gypsum from shed to field.. Transport of sugarcane from field to warehouse and transport of tapwater for pesticide spray from source to mixing point. are also included. Calculation based on consultation to experts.
- triple superphosphate: 0.0011 kg; lognormal variance with pedigree 1.0709, pedigree (2,2,2,1,1)
  (same comment as for diammonium phosphate)
  properties: dry mass 1 kg, phosphorus content 0.200754, wet mass 1 kg
  note on phosphorus content: Phosphorus content (on a dry matter basis) of triple superphosphate is calculated from the molecular formula of the nutrient present in the substance.
- urea: 0.021 kg; lognormal variance with pedigree 1.0709, pedigree (2,2,2,1,1)
  (same comment as for diammonium phosphate)
  properties: carbon content, fossil 0.2, dry mass 1 kg, wet mass 1 kg

## Inputs from nature
- Carbon dioxide, in air [natural resource, in air]: 1.6317 kg; lognormal variance with pedigree 1.0709, pedigree (2,2,2,1,1)
  Carbon dioxide (CO2) absorption from air during photosynthesis was also included, according to Nemecek and Schnetzer (2012). It considers the carbon content of the reference product based on the ecoinvent database (Jungbluth et al., 2007).
- Occupation, annual crop, non-irrigated, intensive [natural resource, land]: 7.74e-6 m2*year; lognormal variance with pedigree 1.1222, pedigree (3,1,2,1,1)
  The land occupation was calculated based on crop yield
- Transformation, from annual crop, non-irrigated, intensive [natural resource, land]: 1.62 m2; lognormal variance with pedigree 1.0608, pedigree (2,1,2,1,1)
  The LUC input comprises the actual data related to land transformation. This land transformation flow is irrelevant to LUC and the amounts are equal in both the 'land transformation from' and 'land transformation to'.
- Transformation, to annual crop, non-irrigated, intensive [natural resource, land]: 1.62 m2; lognormal variance with pedigree 1.0608, pedigree (2,1,2,1,1)
  (same comment as for Transformation, from annual crop, non-irrigated, intensive)
- Water, unspecified natural origin [natural resource, in water]: 0.000126 m3; lognormal variance with pedigree 1.0608, pedigree (2,1,2,1,1)
  Water consumed for pesticide dilution. Estimated volume based on interviews with producers and experts

## Emissions to nature
- 2,4-D [air, non-urban air or from high stacks]: 6.81e-9 kg; lognormal variance with pedigree 1.1123, pedigree (3,2,2,1,1)
  Pesticide emissions are calculated using the PestLCI model, adapted to the Brazilian conditions (Embrapa, 2021; PestLCI, 2022).
- Ammonia [air, non-urban air or from high stacks]: 0.00243149 kg; lognormal variance with pedigree 1.11033, pedigree (3,2,2,2,3)
  Ammonia releases to air, according to the AGRAMMON model: 'Plant production' (Nemecek & Schnetzer, 2011)
- Atrazine [air, non-urban air or from high stacks]: 4.18e-5 kg; lognormal variance with pedigree 1.1123, pedigree (3,2,2,1,1)
  (same comment as for 2,4-D)
- Azoxystrobin [air, non-urban air or from high stacks]: 5.27e-7 kg; lognormal variance with pedigree 1.1123, pedigree (3,2,2,1,1)
  (same comment as for 2,4-D)
- Benzene [air, non-urban air or from high stacks]: 3.26e-8 kg; lognormal variance with pedigree 1.2403, pedigree (3,2,2,1,3)
  Emissions derived from fuel combustion (diesel 88%, and biodiesel 12%), using emission factors from Nemecek & Kagi (2007)
- Benzo(a)pyrene [air, non-urban air or from high stacks]: 1.34e-10 kg; lognormal variance with pedigree 1.2403, pedigree (3,2,2,1,3)
  (same comment as for Benzene)
- Beta-cyfluthrin [air, non-urban air or from high stacks]: 1.1e-7 kg; lognormal variance with pedigree 1.1123, pedigree (3,2,2,1,1)
  (same comment as for 2,4-D)
- Cadmium II [air, non-urban air or from high stacks]: 4.47e-11 kg; lognormal variance with pedigree 1.2403, pedigree (3,2,2,1,3)
  (same comment as for Benzene)
- Carbon dioxide, fossil [air, non-urban air or from high stacks]: 0.0492323 kg; lognormal variance with pedigree 1.11233, pedigree (3,2,2,2,1)
  Carbon dioxide releases from urea and limestone application, according to IPCC (2006) plus emissions derived from fuel combustion (diesel 88%, and biodiesel 12%), using emission factors from Nemecek & Kagi (2007)
- Carbon dioxide, non-fossil [air, non-urban air or from high stacks]: 0.00174 kg; lognormal variance with pedigree 1.1089, pedigree (4,3,2,3,1)
  (same comment as for Benzene)
- Carbon monoxide, fossil [air, non-urban air or from high stacks]: 2.39e-5 kg; lognormal variance with pedigree 1.2403, pedigree (3,2,2,1,3)
  (same comment as for Benzene)
- Chromium III [air, non-urban air or from high stacks]: 2.24e-10 kg; lognormal variance with pedigree 1.2403, pedigree (3,2,2,1,3)
  (same comment as for Benzene)
- Copper ion [air, non-urban air or from high stacks]: 7.6e-9 kg; lognormal variance with pedigree 1.2403, pedigree (3,2,2,1,3)
  (same comment as for Benzene)
- Cyproconazole [air, non-urban air or from high stacks]: 2.11e-7 kg; lognormal variance with pedigree 1.1123, pedigree (3,2,2,1,1)
  (same comment as for 2,4-D)
- Dinitrogen monoxide [air, non-urban air or from high stacks]: 0.000548264 kg; lognormal variance with pedigree 1.11033, pedigree (3,2,2,2,3)
  Direct and indirect N2O emissions according to IPCC (2019) plus emissions derived from fuel combustion (diesel 88%, and biodiesel 12%), using emission factors from Nemecek & Kagi (2007)
- Diquat dibromide [air, non-urban air or from high stacks]: 3.15e-10 kg; lognormal variance with pedigree 1.1123, pedigree (3,2,2,1,1)
  (same comment as for 2,4-D)
- Epoxiconazole [air, non-urban air or from high stacks]: 9.84e-8 kg; lognormal variance with pedigree 1.1123, pedigree (3,2,2,1,1)
  (same comment as for 2,4-D)
- Glyphosate [air, non-urban air or from high stacks]: 2.42e-5 kg; lognormal variance with pedigree 1.1123, pedigree (3,2,2,1,1)
  (same comment as for 2,4-D)
- Hydrocarbons, unspecified [air, non-urban air or from high stacks]: 1.34e-5 kg; lognormal variance with pedigree 1.2403, pedigree (3,2,2,1,3)
  (same comment as for Benzene)
- Imidacloprid [air, non-urban air or from high stacks]: 2.09e-6 kg; lognormal variance with pedigree 1.1123, pedigree (3,2,2,1,1)
  (same comment as for 2,4-D)
- Mesotrione [air, non-urban air or from high stacks]: 4.22e-7 kg; lognormal variance with pedigree 1.1123, pedigree (3,2,2,1,1)
  (same comment as for 2,4-D)
- Methane, fossil [air, non-urban air or from high stacks]: 5.77e-7 kg; lognormal variance with pedigree 1.2403, pedigree (3,2,2,1,3)
  (same comment as for Benzene)
- Methane, non-fossil [air, non-urban air or from high stacks]: 2.38e-7 kg; lognormal variance with pedigree 1.2403, pedigree (3,2,2,1,3)
  (same comment as for Benzene)
- Methomyl [air, non-urban air or from high stacks]: 7.63e-7 kg; lognormal variance with pedigree 1.1123, pedigree (3,2,2,1,1)
  (same comment as for 2,4-D)
- Metolachlor [air, non-urban air or from high stacks]: 1.68e-6 kg; lognormal variance with pedigree 1.1123, pedigree (3,2,2,1,1)
  (same comment as for 2,4-D)
- Nickel II [air, non-urban air or from high stacks]: 3.13e-10 kg; lognormal variance with pedigree 1.2403, pedigree (3,2,2,1,3)
  (same comment as for Benzene)
- Nicosulfuron [air, non-urban air or from high stacks]: 7.98e-7 kg; lognormal variance with pedigree 1.1123, pedigree (3,2,2,1,1)
  (same comment as for 2,4-D)
- Nitrogen oxides [air, non-urban air or from high stacks]: 0.0004182 kg; lognormal variance with pedigree 1.13033, pedigree (3,2,2,2,3)
  Emissions of NOx from applied mineral fertilisers, according to WFLDB (2019)
- PAH, polycyclic aromatic hydrocarbons [air, non-urban air or from high stacks]: 1.47e-8 kg; lognormal variance with pedigree 1.2403, pedigree (3,2,2,1,3)
  (same comment as for Benzene)
- Particulate Matter, < 2.5 um [air, non-urban air or from high stacks]: 2.5e-7 kg; lognormal variance with pedigree 1.2403, pedigree (3,2,2,1,3)
  (same comment as for Benzene)
- Pyraclostrobin [air, non-urban air or from high stacks]: 3.13e-7 kg; lognormal variance with pedigree 1.1123, pedigree (3,2,2,1,1)
  (same comment as for 2,4-D)
- Selenium IV [air, non-urban air or from high stacks]: 4.47e-11 kg; lognormal variance with pedigree 1.2403, pedigree (3,2,2,1,3)
  (same comment as for Benzene)
- Sulfur dioxide [air, non-urban air or from high stacks]: 4.52e-6 kg; lognormal variance with pedigree 1.2403, pedigree (3,2,2,1,3)
  (same comment as for Benzene)
- Tebuconazole [air, non-urban air or from high stacks]: 1.76e-6 kg; lognormal variance with pedigree 1.1123, pedigree (3,2,2,1,1)
  (same comment as for 2,4-D)
  property carbon content, fossil 0.624307; name C_content_fossil_Tebuconazole
- Teflubenzuron [air, non-urban air or from high stacks]: 9.22e-8 kg; lognormal variance with pedigree 1.1123, pedigree (3,2,2,1,1)
  (same comment as for 2,4-D)
- Thiodicarb [air, non-urban air or from high stacks]: 1.99e-6 kg; lognormal variance with pedigree 1.1123, pedigree (3,2,2,1,1)
  (same comment as for 2,4-D)
- Trifloxystrobin [air, non-urban air or from high stacks]: 8.78e-7 kg; lognormal variance with pedigree 1.1123, pedigree (3,2,2,1,1)
  (same comment as for 2,4-D)
- Water [air, unspecified]: 0.000126 m3; lognormal variance with pedigree 0.0034, pedigree (2,1,2,5,1)
- Zinc II [air, non-urban air or from high stacks]: 4.47e-9 kg; lognormal variance with pedigree 1.2403, pedigree (3,2,2,1,3)
  (same comment as for Benzene)
- 2,4-D [soil, agricultural]: 5.74e-8 kg; lognormal variance with pedigree 1.11233, pedigree (3,2,2,2,1)
  (same comment as for 2,4-D)
- 2,4-D [soil, forestry]: 5.12e-10 kg; lognormal variance with pedigree 1.11233, pedigree (3,2,2,2,1)
  (same comment as for 2,4-D)
- Arsenic ion [soil, agricultural]: 2.9349e-8 kg; normal variance with pedigree 1.21, pedigree (5,5,5,5,5)
  Heavy metals emissions to agricultural soil through erosion are estimated by using the SALCA-heavy metal model (Nemecek et al., 2015).
  Uncertainty: Emissions of heavy metals to soil estimated based on WFLDB adapted to Brazil
- Atrazine [soil, agricultural]: 0.000275 kg; lognormal variance with pedigree 1.11233, pedigree (3,2,2,2,1)
  (same comment as for 2,4-D)
- Atrazine [soil, forestry]: 1.32e-6 kg; lognormal variance with pedigree 1.11233, pedigree (3,2,2,2,1)
  (same comment as for 2,4-D)
- Azoxystrobin [soil, agricultural]: 4.56e-6 kg; lognormal variance with pedigree 1.11233, pedigree (3,2,2,2,1)
  (same comment as for 2,4-D)
- Azoxystrobin [soil, forestry]: 1.57e-8 kg; lognormal variance with pedigree 1.11233, pedigree (3,2,2,2,1)
  (same comment as for 2,4-D)
- Beta-cyfluthrin [soil, agricultural]: 7.07e-7 kg; lognormal variance with pedigree 1.11233, pedigree (3,2,2,2,1)
  (same comment as for 2,4-D)
- Beta-cyfluthrin [soil, forestry]: 3.27e-9 kg; lognormal variance with pedigree 1.11233, pedigree (3,2,2,2,1)
  (same comment as for 2,4-D)
- Cadmium II [soil, agricultural]: -2.24153e-8 kg; normal variance with pedigree 1.21, pedigree (5,5,5,5,5)
  (same comment as for Arsenic ion)
- Chromium III [soil, agricultural]: 2.5581e-7 kg; normal variance with pedigree 1.21, pedigree (5,5,5,5,5)
  (same comment as for Arsenic ion)
- Copper ion [soil, agricultural]: -1.68094e-6 kg; normal variance with pedigree 1.21, pedigree (5,5,5,5,5)
  (same comment as for Arsenic ion)
- Cyproconazole [soil, agricultural]: 9.5e-7 kg; lognormal variance with pedigree 1.11233, pedigree (3,2,2,2,1)
  (same comment as for 2,4-D)
- Cyproconazole [soil, forestry]: 6.29e-9 kg; lognormal variance with pedigree 1.11233, pedigree (3,2,2,2,1)
  (same comment as for 2,4-D)
- Diquat dibromide [soil, agricultural]: 2.82e-9 kg; lognormal variance with pedigree 1.11233, pedigree (3,2,2,2,1)
  (same comment as for 2,4-D)
- Diquat dibromide [soil, forestry]: 2.31e-11 kg; lognormal variance with pedigree 1.11233, pedigree (3,2,2,2,1)
  (same comment as for 2,4-D)
- Epoxiconazole [soil, agricultural]: 4.38e-7 kg; lognormal variance with pedigree 1.11233, pedigree (3,2,2,2,1)
  (same comment as for 2,4-D)
- Epoxiconazole [soil, forestry]: 5.76e-9 kg; lognormal variance with pedigree 1.11233, pedigree (3,2,2,2,1)
  (same comment as for 2,4-D)
- Fluxapyroxad [soil, agricultural]: 1.52e-8 kg; lognormal variance with pedigree 1.11233, pedigree (3,2,2,2,1)
  (same comment as for 2,4-D)
- Fluxapyroxad [soil, forestry]: 4.55e-10 kg; lognormal variance with pedigree 1.11233, pedigree (3,2,2,2,1)
  (same comment as for 2,4-D)
- Glyphosate [soil, agricultural]: 0.000205 kg; lognormal variance with pedigree 1.11233, pedigree (3,2,2,2,1)
  (same comment as for 2,4-D)
- Glyphosate [soil, forestry]: 7.18e-7 kg; lognormal variance with pedigree 1.11233, pedigree (3,2,2,2,1)
  (same comment as for 2,4-D)
- Imidacloprid [soil, agricultural]: 1.62e-5 kg; lognormal variance with pedigree 1.11233, pedigree (3,2,2,2,1)
  (same comment as for 2,4-D)
- Imidacloprid [soil, forestry]: 7.99e-8 kg; lognormal variance with pedigree 1.11233, pedigree (3,2,2,2,1)
  (same comment as for 2,4-D)
- Lead II [soil, agricultural]: -1.17921e-7 kg; normal variance with pedigree 1.21, pedigree (5,5,5,5,5)
  (same comment as for Arsenic ion)
- Lufenuron [soil, agricultural]: 2.66e-7 kg; lognormal variance with pedigree 1.11233, pedigree (3,2,2,2,1)
  (same comment as for 2,4-D)
- Lufenuron [soil, forestry]: 1.75e-9 kg; lognormal variance with pedigree 1.11233, pedigree (3,2,2,2,1)
  (same comment as for 2,4-D)
- Mesotrione [soil, agricultural]: 2.84e-6 kg; lognormal variance with pedigree 1.11233, pedigree (3,2,2,2,1)
  (same comment as for 2,4-D)
- Mesotrione [soil, forestry]: 1.26e-8 kg; lognormal variance with pedigree 1.11233, pedigree (3,2,2,2,1)
  (same comment as for 2,4-D)
- Methomyl [soil, agricultural]: 3.31e-6 kg; lognormal variance with pedigree 1.11233, pedigree (3,2,2,2,1)
  (same comment as for 2,4-D)
- Methomyl [soil, forestry]: 2.27e-8 kg; lognormal variance with pedigree 1.11233, pedigree (3,2,2,2,1)
  (same comment as for 2,4-D)
- Metolachlor [soil, agricultural]: 1.46e-5 kg; lognormal variance with pedigree 1.11233, pedigree (3,2,2,2,1)
  (same comment as for 2,4-D)
- Metolachlor [soil, forestry]: 5.06e-8 kg; lognormal variance with pedigree 1.11233, pedigree (3,2,2,2,1)
  (same comment as for 2,4-D)
- Nicosulfuron [soil, agricultural]: 6.17e-6 kg; lognormal variance with pedigree 1.11233, pedigree (3,2,2,2,1)
  (same comment as for 2,4-D)
- Nicosulfuron [soil, forestry]: 2.67e-8 kg; lognormal variance with pedigree 1.11233, pedigree (3,2,2,2,1)
  (same comment as for 2,4-D)
- Pesticides, unspecified [soil, agricultural]: 3.62e-7 kg; lognormal variance with pedigree 1.11233, pedigree (3,2,2,2,1)
  (same comment as for 2,4-D)
- Pyraclostrobin [soil, agricultural]: 1.05e-6 kg; lognormal variance with pedigree 1.11233, pedigree (3,2,2,2,1)
  (same comment as for 2,4-D)
- Pyraclostrobin [soil, forestry]: 1.84e-8 kg; lognormal variance with pedigree 1.11233, pedigree (3,2,2,2,1)
  (same comment as for 2,4-D)
- Tebuconazole [soil, agricultural]: 4.03e-6 kg; lognormal variance with pedigree 1.11233, pedigree (3,2,2,2,1)
  (same comment as for 2,4-D)
- Tebuconazole [soil, forestry]: 5.23e-8 kg; lognormal variance with pedigree 1.11233, pedigree (3,2,2,2,1)
  (same comment as for 2,4-D)
- Teflubenzuron [soil, agricultural]: 4.15e-7 kg; lognormal variance with pedigree 1.11233, pedigree (3,2,2,2,1)
  (same comment as for 2,4-D)
- Teflubenzuron [soil, forestry]: 5.41e-9 kg; lognormal variance with pedigree 1.11233, pedigree (3,2,2,2,1)
  (same comment as for 2,4-D)
- Tembotrione [soil, agricultural]: 1.99e-6 kg; lognormal variance with pedigree 1.11233, pedigree (3,2,2,2,1)
  (same comment as for 2,4-D)
- Tembotrione [soil, forestry]: 8.81e-9 kg; lognormal variance with pedigree 1.11233, pedigree (3,2,2,2,1)
  (same comment as for 2,4-D)
- Thiodicarb [soil, agricultural]: 1.71e-5 kg; lognormal variance with pedigree 1.11233, pedigree (3,2,2,2,1)
  (same comment as for 2,4-D)
- Thiodicarb [soil, forestry]: 5.94e-8 kg; lognormal variance with pedigree 1.11233, pedigree (3,2,2,2,1)
  (same comment as for 2,4-D)
- Trifloxystrobin [soil, agricultural]: 2.72e-6 kg; lognormal variance with pedigree 1.11233, pedigree (3,2,2,2,1)
  (same comment as for 2,4-D)
- Trifloxystrobin [soil, forestry]: 2.62e-8 kg; lognormal variance with pedigree 1.11233, pedigree (3,2,2,2,1)
  (same comment as for 2,4-D)
- 2,4-D [water, ground-]: 6.08e-10 kg; lognormal variance with pedigree 1.11233, pedigree (3,2,2,2,1)
  (same comment as for 2,4-D)
- 2,4-D [water, unspecified]: 1.4e-11 kg; lognormal variance with pedigree 1.11233, pedigree (3,2,2,2,1)
  (same comment as for 2,4-D)
- Arsenic ion [water, surface water]: 2.9352e-12 kg; lognormal variance with pedigree 1.11233, pedigree (3,2,2,2,1)
  Emissions of heavy metals to surface water are calculated according to Schmidt (2007)
- Atrazine [water, ground-]: 1.53e-6 kg; lognormal variance with pedigree 1.11233, pedigree (3,2,2,2,1)
  (same comment as for 2,4-D)
- Atrazine [water, unspecified]: 6.33e-8 kg; lognormal variance with pedigree 1.11233, pedigree (3,2,2,2,1)
  (same comment as for 2,4-D)
- Azoxystrobin [water, ground-]: 2.49e-9 kg; lognormal variance with pedigree 1.11233, pedigree (3,2,2,2,1)
  (same comment as for 2,4-D)
- Azoxystrobin [water, unspecified]: 8.24e-10 kg; lognormal variance with pedigree 1.11233, pedigree (3,2,2,2,1)
  (same comment as for 2,4-D)
- Beta-cyfluthrin [water, ground-]: 5.39e-12 kg; lognormal variance with pedigree 1.11233, pedigree (3,2,2,2,1)
  (same comment as for 2,4-D)
- Beta-cyfluthrin [water, unspecified]: 1.71e-10 kg; lognormal variance with pedigree 1.11233, pedigree (3,2,2,2,1)
  (same comment as for 2,4-D)
- Cadmium II [water, surface water]: 3.38504e-13 kg; lognormal variance with pedigree 1.11233, pedigree (3,2,2,2,1)
  Emissions of heavy metals to surface water are calculated according to Schmidt (2007)
- Chromium III [water, surface water]: 5.31063e-11 kg; lognormal variance with pedigree 1.11233, pedigree (3,2,2,2,1)
  Emissions of heavy metals to surface water are calculated according to Schmidt (2007)
- Copper ion [water, surface water]: 4.69107e-11 kg; lognormal variance with pedigree 1.11233, pedigree (3,2,2,2,1)
  Emissions of heavy metals to surface water are calculated according to Schmidt (2007)
- Cyproconazole [water, ground-]: 3.34e-9 kg; lognormal variance with pedigree 1.11233, pedigree (3,2,2,2,1)
  (same comment as for 2,4-D)
- Cyproconazole [water, unspecified]: 3.3e-10 kg; lognormal variance with pedigree 1.11233, pedigree (3,2,2,2,1)
  (same comment as for 2,4-D)
- Diquat dibromide [water, ground-]: 2.23e-16 kg; lognormal variance with pedigree 1.11233, pedigree (3,2,2,2,1)
  (same comment as for 2,4-D)
- Diquat dibromide [water, unspecified]: 6.31e-13 kg; lognormal variance with pedigree 1.11233, pedigree (3,2,2,2,1)
  (same comment as for 2,4-D)
- Epoxiconazole [water, ground-]: 3.5e-9 kg; lognormal variance with pedigree 1.11233, pedigree (3,2,2,2,1)
  (same comment as for 2,4-D)
- Epoxiconazole [water, unspecified]: 4.63e-11 kg; lognormal variance with pedigree 1.11233, pedigree (3,2,2,2,1)
  (same comment as for 2,4-D)
- Fluxapyroxad [water, ground-]: 2.31e-9 kg; lognormal variance with pedigree 1.11233, pedigree (3,2,2,2,1)
  (same comment as for 2,4-D)
- Fluxapyroxad [water, unspecified]: 3.64e-12 kg; lognormal variance with pedigree 1.11233, pedigree (3,2,2,2,1)
  (same comment as for 2,4-D)
- Glyphosate [water, ground-]: 9.93e-9 kg; lognormal variance with pedigree 1.11233, pedigree (3,2,2,2,1)
  (same comment as for 2,4-D)
- Glyphosate [water, unspecified]: 3.77e-8 kg; lognormal variance with pedigree 1.11233, pedigree (3,2,2,2,1)
  (same comment as for 2,4-D)
- Imidacloprid [water, ground-]: 6.34e-7 kg; lognormal variance with pedigree 1.11233, pedigree (3,2,2,2,1)
  (same comment as for 2,4-D)
- Imidacloprid [water, unspecified]: 2.71e-9 kg; lognormal variance with pedigree 1.11233, pedigree (3,2,2,2,1)
  (same comment as for 2,4-D)
- Lead II [water, surface water]: 1.40093e-11 kg; lognormal variance with pedigree 1.11233, pedigree (3,2,2,2,1)
  Emissions of heavy metals to surface water are calculated according to Schmidt (2007)
- Mesotrione [water, unspecified]: 6.59e-10 kg; lognormal variance with pedigree 1.11233, pedigree (3,2,2,2,1)
  (same comment as for 2,4-D)
- Methomyl [water, ground-]: 4.82e-8 kg; lognormal variance with pedigree 1.11233, pedigree (3,2,2,2,1)
  (same comment as for 2,4-D)
- Methomyl [water, unspecified]: 1.19e-9 kg; lognormal variance with pedigree 1.11233, pedigree (3,2,2,2,1)
  (same comment as for 2,4-D)
- Metolachlor [water, ground-]: 3.59e-8 kg; lognormal variance with pedigree 1.11233, pedigree (3,2,2,2,1)
  (same comment as for 2,4-D)
- Metolachlor [water, unspecified]: 2.65e-9 kg; lognormal variance with pedigree 1.11233, pedigree (3,2,2,2,1)
  (same comment as for 2,4-D)
- Nicosulfuron [water, ground-]: 2.26e-7 kg; lognormal variance with pedigree 1.11233, pedigree (3,2,2,2,1)
  (same comment as for 2,4-D)
- Nicosulfuron [water, unspecified]: 1.19e-9 kg; lognormal variance with pedigree 1.11233, pedigree (3,2,2,2,1)
  (same comment as for 2,4-D)
- Nitrate [water, ground-]: 0.0638079 kg; lognormal variance with pedigree 1.11233, pedigree (3,2,2,2,1)
  The SQCB-NO3 model was used according to Nemecek et al. (2015), considering only the quantity of water from precipitation (no irrigation was applied). Technical parameters are available in the BRCalc/ICVCalc tool (Folegatti-Matsuura et al., 2022).
- Pesticides, unspecified [water, unspecified]: 5.53e-10 kg; lognormal variance with pedigree 1.11233, pedigree (3,2,2,2,1)
  (same comment as for 2,4-D)
- Phosphorus [water, surface water]: 1.18e-5 kg; lognormal variance with pedigree 1.11233, pedigree (3,2,2,2,1)
  Only the phosphorus emission to surface water caused by soil erosion was calculated, according to Nemecek et al., 2015. Required technical parameters are available in the BRCalc/ICVCalc tool (Folegatti-Matsuura et al., 2022).
- Pyraclostrobin [water, ground-]: 1.85e-9 kg; lognormal variance with pedigree 1.11233, pedigree (3,2,2,2,1)
  (same comment as for 2,4-D)
- Pyraclostrobin [water, unspecified]: 1.47e-10 kg; lognormal variance with pedigree 1.11233, pedigree (3,2,2,2,1)
  (same comment as for 2,4-D)
- Tebuconazole [water, ground-]: 5.46e-9 kg; lognormal variance with pedigree 1.11233, pedigree (3,2,2,2,1)
  (same comment as for 2,4-D)
- Tebuconazole [water, unspecified]: 2.74e-9 kg; lognormal variance with pedigree 1.11233, pedigree (3,2,2,2,1)
  (same comment as for 2,4-D)
- Teflubenzuron [water, unspecified]: 4.33e-11 kg; lognormal variance with pedigree 1.11233, pedigree (3,2,2,2,1)
  (same comment as for 2,4-D)
- Thiodicarb [water, ground-]: 3.54e-8 kg; lognormal variance with pedigree 1.11233, pedigree (3,2,2,2,1)
  (same comment as for 2,4-D)
- Thiodicarb [water, unspecified]: 3.12e-9 kg; lognormal variance with pedigree 1.11233, pedigree (3,2,2,2,1)
  (same comment as for 2,4-D)
- Trifloxystrobin [water, ground-]: 7.48e-10 kg; lognormal variance with pedigree 1.11233, pedigree (3,2,2,2,1)
  (same comment as for 2,4-D)
- Trifloxystrobin [water, unspecified]: 1.37e-9 kg; lognormal variance with pedigree 1.11233, pedigree (3,2,2,2,1)
  (same comment as for 2,4-D)

## Sampling procedure
The main source of data for agricultural inputs and operations is the ProspecSoy Project, conducted by Embrapa Soja. Data are also provided by relevant experts. Emissions from the agricultural process are estimated using BRCalc/ICVCalc.

## Review by Simone Fazio 2022-07-29
all the review comments have been addressed, solved or better explained
agricultural operations with minor consumption (fertilizer distribution, pesticide application, etc) should be better defined in the future updates, for the sake of precision even if the overall impact don't change significantly
