# oat seed production, for sowing

Dataset: EcoSpold 2, unit process
Geography: CH
Time period: 1999-01-01 to 2023-12-31
Technology level: current
Classification: ISIC rev.4 ecoinvent: 0164:Seed processing for propagation
Tags: WFLDB
Scenario: Business-as-Usual
System model: Allocation, cut-off by classification
Generated by: Patrik Mouron
Published in: Nemecek T. 2015
Database: ecoinvent
isCopyrightProtected: true
accessRestrictedTo: 1

## General comment
This dataset represents the production of 1 kg of oat seed (fresh weight), with a maximum water content of 15%, at regional storehouse.
This process is identical to the ecoinvent process 'wheat seed production, Swiss integrated production, for sowing' which is used as a proxy for oat seed production at regional storehouse. This dataset refers to an average situation; for specific situations exchanges might differ substantially due to site specific parameters

## Included activities start
The activity starts after harvest.

## Included activities end
The seed is processed in the processing centre, treated (pre-cleaning, cleaning, eventually drying, chemical dressing (for integrated production) and bag filling), stored and afterwards transported to the regional storage centre. No data on wastewater production were available.

## Technology
Integrated production

## Time period
Time period referring to the data source: 1999-2002. Based on expert opinion data is considered to be valid at least up to 2012.

## Parameters
- LUC_crop_specific: 1 dimensionless
  This parameter allows to switch between a 'crop specific' and a 'country specific' approach when calculating the LUC of a crop. By default, the chosen approach is 'crop specific', so the value of the parameter is 1. If you want to apply a 'country specific' approach, turn the parameter to 0.

## Reference product
- oat seed, for sowing: 1 kg; By-product classification allocatable product; CPC 86112: Seed processing services; HS2017 100410: Cereals; oats, seeds
  Reference flow: Yield = 6425 kg/ha
  production volume 326898 kg
    Source: FAOSTAT. Average, 2009-2012. Calculation method: crop production volume [kg] / crop productivity [kg/ha] * seeding density [kg/ha] = kg
  property carbon content, non-fossil 0.424106
    calculation: C-content of components according to ecoinvent report No. 15a. Source of composition: Souci, S.W., Fachmann, W., Kraut, H. (Hg.: Bundesminsiterium fur Ernahrung, Landwirtschaft und Forsten, Bonn) 'Die Zusammensetzung der Lebensmittel - Nahrwerttabellen', medpharm Scientific Publishers Stuttgart, CRC Press; 2000.
  property price 0.0659668 EUR2005
    Calculated based on inputs: The price of the product has been calculated as a sum of the values of the material and energy inputs for this product. This value is therefore a rough estimation. It may underestimate the real price since there are additional expenses when producing any product. These expences can include for example labour costs, treatment of waste materials and profit for the producer. Please consider carefully whether this level of data quality is acceptable for your application.
  properties: carbon allocation 0.368788 kg, carbon content 0.424106, carbon content, fossil 0, dry mass 0.869565 kg, water content 0.15, water in wet mass 0.130435 kg, wet mass 1 kg

## Inputs from technosphere
- building, multi-storey: 2e-5 m3; lognormal variance with pedigree 1.40154, pedigree (5,3,4,2,1)
  Building used for seed cleaning
- diphenylether-compound: 0.0001 kg; lognormal variance with pedigree 0.0419412, pedigree (2,2,4,1,1)
  Corresponds to 0.6425kg/ha
  properties: carbon content, fossil 0.560061, dry mass 1 kg, wet mass 1 kg
- electricity, low voltage: 0.024 kWh; lognormal variance with pedigree 0.243241, pedigree (5,5,5,5,5)
  Related to the building used for seed cleaning
- oat seed, Swiss integrated production, at farm: 1 kg; lognormal variance with pedigree 0.017084, pedigree (1,1,4,1,1)
  Extrapolated from Ecoinvent v2.2 process 'Wheat seed IP, at regional storehouse/CH U'.
  properties: carbon content, non-fossil 0.424106, dry mass 0.869565 kg, water content 0.15, wet mass 1 kg
  note on carbon content, non-fossil: calculation: C-content of components according to ecoinvent report No. 15a. Source of composition: Souci, S.W., Fachmann, W., Kraut, H. (Hg.: Bundesminsiterium fur Ernahrung, Landwirtschaft und Forsten, Bonn) 'Die Zusammensetzung der Lebensmittel - Nahrwerttabellen', medpharm Scientific Publishers Stuttgart, CRC Press; 2000.
- packaging, for pesticides: 0.0002 kg; lognormal variance with pedigree 0.0592, pedigree (4,3,4,5,4)
  Total amount of active substance/s of pesticides needed for the production of oat seed, for sowing is calculated to be circa 1.00E-04 kg. Pesticide/s used in this dataset is/are: 'diphenylether-compound'. The total amount of active substance/s is doubled in order to account for the packaging of the dilluted product of pesticide/s that is/are applied. Therefore, 2.00E-04 kg of packaging for pesticides is justified with this exchange.
  properties: carbon content, fossil 0.85714, dry mass 1 kg, heating value, net 25.97 MJ, price 0.0642 EUR2005, wet mass 1 kg

## Inputs from nature
- Occupation, construction site [natural resource, land]: 8e-6 m2*year; lognormal variance with pedigree 0.394118, pedigree (5,3,4,2,1)
  Related to the building used for seed cleaning
- Occupation, industrial area [natural resource, land]: 0.0002 m2*year; lognormal variance with pedigree 0.394118, pedigree (5,3,4,2,1)
  Related to the building used for seed cleaning
- Transformation, from unspecified [natural resource, land]: 4e-6 m2; lognormal variance with pedigree 0.67029, pedigree (5,3,4,2,1)
  Related to the building used for seed cleaning
- Transformation, to industrial area [natural resource, land]: 4e-6 m2; lognormal variance with pedigree 0.67029, pedigree (5,3,4,2,1)
  Related to the building used for seed cleaning

## Sampling procedure
Data based on a literature, expert information and enquiry of seed processing plants.

## Extrapolations
Production of imported seed is approximated by seed produced in Switzerland. This dataset has been copied from an original dataset covering the geography CH. The uncertainty has been adjusted accordingly.
