# zirconium oxide production

Dataset: EcoSpold 2, unit process
Geography: RoW
Time period: 2000-01-01 to 2023-12-31
Technology level: current
Classification: ISIC rev.4 ecoinvent: 2011:Manufacture of basic chemicals
Classification: EcoSpold01Categories: chemicals/inorganics
Synonyms: zirconium dioxide; zirconia
Tags: ConvertedDataset
Scenario: Business-as-Usual
System model: Allocation, cut-off by classification
Generated by: Alex Primas
Published in: Althaus H.-J. 2004
Database: ecoinvent
isCopyrightProtected: true
accessRestrictedTo: 1

## General comment
In- and outputs of ZrSO4 and NaOH are calculated according to the stoechiometry. Process approximated with hydrothermal sodium silicate production and calcination of aluminium hydroxide to aluminium oxide. Weak data for energy consumption, wastes and emissions. Data partly based on a EMPA study, commissioned by the CEES.
[This dataset was already contained in the ecoinvent database version 2. It was not individually updated during the transfer to ecoinvent version 3. Life Cycle Impact Assessment results may still have changed, as they are affected by changes in the supply chain, i.e. in other datasets. This dataset was generated following the ecoinvent quality guidelines for version 2. It may have been subject to central changes described in the ecoinvent version 3 change report (http://www.ecoinvent.org/database/ecoinvent-version-3/reports-of-changes/), and the results of the central updates were reviewed extensively. The changes added e.g. consistent water flows and other information throughout the database. The documentation of this dataset can be found in the ecoinvent reports of version 2, which are still available via the ecoinvent website. The change report linked above covers all central changes that were made during the conversion process.]

## Included activities end
The process includes material and energy input, wastes and emissions for the production of zirconium oxide from zircon (ZrSiO4) using caustic fusion with sodium hydroxide. Transport and infrastructure are estimated.

## Geography
Production in Australia considered. Data bases on similar European production processes.

## Technology
Caustic fusion of zircon mineral (ZrSiO4) with sodium hydroxide to zirconium hydroxide. No allocation to sodium silicate by-product. Calcination of zirconium hydroxide to zirconium oxide.

## Parameters
- fraction, cooling water, cooling pond system, to air: 0.032 dimensionless; name fraction_CW_CP_to_air; lognormal variance with pedigree 0.0413, pedigree (2,3,1,3,1)
  Calculated based on literature value (Scown, C.D., 2011, Water Footprint of U.S. Transportation Fuels and supplying information of the article) (Vionnet, S., Quantis Water Database - Technical Report, 2012).
- fraction, cooling water, once-through system, to air: 0.004 dimensionless; name fraction_CW_OT_to_air; lognormal variance with pedigree 0.0413, pedigree (2,3,1,3,1)
  (same comment as for fraction, cooling water, cooling pond system, to air)
- fraction, cooling water, recirculating system, to air: 0.771 dimensionless; name fraction_CW_R_to_air; lognormal variance with pedigree 0.0413, pedigree (2,3,1,3,1)
  (same comment as for fraction, cooling water, cooling pond system, to air)
- fraction, cooling water, to air: 0.3875 dimensionless; name fraction_CW_to_air; = (0.5*fraction_CW_OT_to_air)+(0.5*fraction_CW_R_to_air); lognormal variance with pedigree 0.092025, pedigree (4,4,3,2,4)
  Calculated value based on literature value (see comments of the other parametres present in this dataset) and expert opinion. In the case when no industry/literature data are available about the type of cooling or directly fraction, cooling water, to air specific for the process a default assumption is applied. It is assumed that the once-through cooling system is used in 50% of all cases and recirculating system is used in another 50% of all cases.
- fraction, process water, to air: 0.205 dimensionless; name fraction_PW_to_air; lognormal variance with pedigree 0.092025, pedigree (4,4,3,2,4)

## Reference product
- zirconium oxide: 1 kg; By-product classification allocatable product; CPC 34220: Zinc oxide; zinc peroxide; chromium oxides and hydroxides; manganese oxides; iron oxides and hydroxides; earth[…]; HS2017 282560: Germanium oxides and zirconium dioxide; CAS 1314-23-4
  EcoSpold01Location=AU
  production volume 4.008e7 kg
    Production volumes (2005) were calculated from those of Zircon, assuming that 6% of total Zircon is consummed in Zirconium oxide production (Zirconia) (data in http://www.titaniumcorporation.com/s/Zircon.asp, accessed 2001.05.23)
  property price 4.68346 EUR2005
    Price calculated based on the annual average price of Zirconia reported in the USGS Minerals Yearbooks for Zirconium and Hafnium (2011 to 2019), for the years 2010 to 2019.
    The prices were converted to EUR based on the annual exchange rates published by the European Central Bank (https://sdw.ecb.europa.eu/quickview.do?SERIES_KEY=120.EXR.A.USD.EUR.SP00.A, last accessed on 2022-02-15) and adjusted for inflation relative to 2005 using the producer price index (PPI) of the euro area, published by eurostat (https://appsso.eurostat.ec.europa.eu/nui/show.do?dataset=sts_inpp_a&lang=en, last accessed on 2022-05-04).
    Reference:
    USGS (2022). Zirconium and Hafnium Statistics and Information, USGS Minerals Yearbook tables (2011 to 2019). https://www.usgs.gov/centers/national-minerals-information-center/zirconium-and-hafnium-statistics-and-information
  properties: carbon allocation 0 kg, carbon content 0, carbon content, fossil 0, carbon content, non-fossil 0, dry mass 1 kg, water content 0, water in wet mass 0 kg, wet mass 1 kg

## Inputs from technosphere
- average incineration residue: -2.0021e-9, -4.1598e-5 kg (2 suppliers, which the file names only by identifier); sum of these -4.16e-5 kg; lognormal variance with pedigree 0.11, pedigree (4,5,3,5,4)
  Data from hydrothermal sodium silicate production used
  EcoSpold01Location=CH
  Uncertainty: data from hydrothermal sodium silicate production used
  production volume
    Calculated from the production volume of zirconium oxide in proportion to the respective output amounts.
  properties: carbon content, fossil 0.0325466, carbon content, non-fossil 0.0511208, dry mass 1 kg, wet mass 1 kg
  note on carbon content, fossil: Tab A.1, ecoinvent v2.2 report 13_I. It is considered that 61.1% of the C has a biogenic origin
- chemical factory, organics: 8e-10 unit; lognormal variance with pedigree 0.588, pedigree (4,5,5,5,5)
  EcoSpold01Location=RER
  Estimation
  Uncertainty: estimation
- chemical, organic: 0.00146 kg; lognormal variance with pedigree 0.148, pedigree (4,5,5,5,4)
  Data from hydrothermal sodium silicate production used
  EcoSpold01Location=GLO
  Uncertainty: data from hydrothermal sodium silicate production used
  properties: carbon content, fossil 0.628, dry mass 1 kg, heating value, net 19.03 MJ, wet mass 1 kg
  note on carbon content, fossil: This dataset is an unweighted average of 20 organic substances (listed in Tab 88.1, ecoinvent v2.2 report 8, part II), being part of the top100 chemicals included in this database. The C-content has also been calculated as an unweighted average of the C content of the substances composing this dataset.
- electricity, medium voltage: 0.00116353, 0.0232099, 0.00779844, 0.0050241, 7.13157e-5, 1.53131e-5, 0.00162067, 0.00239678 kWh (8 suppliers, which the file names only by identifier); sum of these 0.0413 kWh; lognormal variance with pedigree 0.148, pedigree (4,5,5,5,4)
  Data from hydrothermal sodium silicate production used
  EcoSpold01Location=UCTE
  Uncertainty: data from hydrothermal sodium silicate production used
- heat, district or industrial, natural gas: 1.2 MJ; lognormal variance with pedigree 0.148, pedigree (4,5,5,5,4)
  Data from sodium silicate and aluminium hydroxide production
  EcoSpold01Location=RER
  Uncertainty: data from sodium silicate and aluminium hydroxide production
  properties: heating value, net 1 MJ
- heat, district or industrial, other than natural gas: 2.0541 MJ; lognormal variance with pedigree 0.148, pedigree (4,5,5,5,4)
  Data from hydrothermal sodium silicate production used
  EcoSpold01Location=RER
  Uncertainty: data from hydrothermal sodium silicate production used
  properties: heating value, net 1 MJ
- inert waste, for final disposal: -0.0179829, -0.000117074 kg (2 suppliers, which the file names only by identifier); sum of these -0.0181 kg; lognormal variance with pedigree 0.11, pedigree (4,5,3,5,4)
  (same comment as for average incineration residue)
  production volume
    (same comment as for average incineration residue)
  properties: dry mass 0.995 kg, water content 0.00502513, wet mass 1 kg
- residue from cooling tower: -1.20315e-7, -0.00249988 kg (2 suppliers, which the file names only by identifier); sum of these -0.0025 kg; lognormal variance with pedigree 0.11, pedigree (4,5,3,5,4)
  (same comment as for average incineration residue)
  production volume
    (same comment as for average incineration residue)
  properties: carbon content, fossil 0.0544233, dry mass 0.7 kg, water content 0.428571, wet mass 1 kg
- sodium hydroxide, without water, in 50% solution state: 0.128105, 1.3119 kg (2 suppliers, which the file names only by identifier); sum of these 1.44 kg; lognormal variance with pedigree 0.0512, pedigree (2,5,5,5,1)
  (same comment as for heat, district or industrial, other than natural gas)
  properties: dry mass 1 kg, heating value, net 3.03 MJ, wet mass 1 kg
- steam, in chemical industry: 0.255034, 0.0449657 kg (2 suppliers, which the file names only by identifier); sum of these 0.3 kg; lognormal variance with pedigree 0.148, pedigree (4,5,5,5,4)
  EcoSpold01Location=RER
  Data from hydrothermal sodium silicate production used
  Uncertainty: data from hydrothermal sodium silicate production used
  properties: wet mass 1 kg
- zircon: 1.57 kg; lognormal variance with pedigree 0.0512, pedigree (2,5,5,5,1)
  EcoSpold01Location=AU
  Inputcalculated from stoechiometry
  Uncertainty: inputcalculated from stoechiometry
  properties: dry mass 1 kg, wet mass 1 kg

## Inputs from nature
- Water, cooling, unspecified natural origin [natural resource, in water]: 2.08e-5 m3; name water_cooling_UNO_input; lognormal variance with pedigree 0.148, pedigree (4,5,5,5,4)
  Data from hydrothermal sodium silicate production used
  Uncertainty: data from hydrothermal sodium silicate production used
- Water, unspecified natural origin [natural resource, in water]: 0.0016 m3; name water_UNO_input; lognormal variance with pedigree 0.148, pedigree (4,5,5,5,4)
  (same comment as for Water, cooling, unspecified natural origin)

## Emissions to nature
- Water [air, unspecified]: 0.00033606 m3; name water_to_air_unspecified; lognormal variance with pedigree 0.0827, pedigree (2,2,5,5,1)
  Calculated value based on literature values and expert opinion. See comments in the parametres' comment field.
  property fraction, origin: fresh water 0; name fraction_origin_fresh_water
  property fraction, origin: salt water 0; name fraction_origin_salt_water
  property fraction, origin: unspecified 1; name fraction_origin_unspecified
- BOD5, Biological Oxygen Demand [water, surface water]: 2.62e-5 kg; lognormal variance with pedigree 0.188, pedigree (4,5,5,5,4)
  Calculated as 0.5*COD.
  Uncertainty: data from hydrothermal sodium silicate production used
- COD, Chemical Oxygen Demand [water, surface water]: 1.31e-5 kg; lognormal variance with pedigree 0.188, pedigree (4,5,5,5,4)
  (same comment as for Water, cooling, unspecified natural origin)
- Chloride [water, surface water]: 9.78e-5 kg; lognormal variance with pedigree 0.448, pedigree (4,5,5,5,4)
  (same comment as for Water, cooling, unspecified natural origin)
- DOC, Dissolved Organic Carbon [water, surface water]: 4.85185e-6 kg; lognormal variance with pedigree 0.188, pedigree (4,5,5,5,4)
  Calculated as equal to TOC.
  Uncertainty: data from hydrothermal sodium silicate production used
- Iron ion [water, surface water]: 8.32e-8 kg; lognormal variance with pedigree 0.788, pedigree (4,5,5,5,4)
  (same comment as for Water, cooling, unspecified natural origin)
- Nitrate [water, surface water]: 2.91e-7 kg; lognormal variance with pedigree 0.188, pedigree (4,5,5,5,4)
  (same comment as for Water, cooling, unspecified natural origin)
- Phosphate [water, surface water]: 2.08e-8 kg; lognormal variance with pedigree 0.188, pedigree (4,5,5,5,4)
  (same comment as for Water, cooling, unspecified natural origin)
- Silicon [water, surface water]: 0.00341 kg; lognormal variance with pedigree 0.788, pedigree (4,5,5,5,4)
  (same comment as for Water, cooling, unspecified natural origin)
- Suspended solids, unspecified [water, surface water]: 0.00127 kg; lognormal variance with pedigree 0.188, pedigree (4,5,5,5,4)
  (same comment as for Water, cooling, unspecified natural origin)
- TOC, Total Organic Carbon [water, surface water]: 4.85185e-6 kg; lognormal variance with pedigree 0.188, pedigree (4,5,5,5,4)
  Calculated by default as TOC (gC) = COD/2.7 (COD measured in g O2). Should more correctly be calculated from the carbon content of the specified emissions to water.
  Uncertainty: data from hydrothermal sodium silicate production used
- Water [water, unspecified]: 0.00128474 m3; name water_to_water_unspecified; lognormal variance with pedigree 0.0827, pedigree (2,2,5,5,1)
  (same comment as for Water)
  property carbon content, fossil 0; name C_content_fossil
  property carbon content, non-fossil 0; name C_content_non_fossil
  property dry mass 0 kg; name DM
  property fraction, origin: fresh water 0; name fraction_origin_fresh_water_Ww
  property fraction, origin: salt water 0; name fraction_origin_salt_water_Ww
  property fraction, origin: unspecified 1; name fraction_origin_unspecified_Ww
  property water in wet mass 1000 kg; name WWM
  property wet mass 1000 kg; name WM

## Sampling procedure
Based on literature

## Extrapolations
none This dataset has been copied from an original dataset covering the geography AU. The uncertainty has been adjusted accordingly.

## Review by Rolf Frischknecht 2007-08-13
passed
none
