# drying, natural gas

Dataset: EcoSpold 2, unit process
Geography: RoW
Time period: 2000-01-01 to 2023-12-31
Technology level: current
Classification: EcoSpold01Categories: natural gas/production
Classification: ISIC rev.4 ecoinvent: 3520:Manufacture of gas; distribution of gaseous fuels through mains
Tags: ConvertedDataset
Scenario: Business-as-Usual
System model: Allocation, cut-off by classification
Share of production covered: 100 %
Generated by: Mireille Faist Emmenegger (obsolete)
Published in: Faist Emmenegger, M. 2007
Database: ecoinvent
isCopyrightProtected: true
accessRestrictedTo: 1

## General comment
Data is based on the environmental report of the two gas processing plants of Norway Karsto and Kollsnes.
[This dataset was already contained in the ecoinvent database version 2. It was not individually updated during the transfer to ecoinvent version 3. Life Cycle Impact Assessment results may still have changed, as they are affected by changes in the supply chain, i.e. in other datasets. This dataset was generated following the ecoinvent quality guidelines for version 2. It may have been subject to central changes described in the ecoinvent version 3 change report (http://www.ecoinvent.org/database/ecoinvent-version-3/reports-of-changes/), and the results of the central updates were reviewed extensively. The changes added e.g. consistent water flows and other information throughout the database. The documentation of this dataset can be found in the ecoinvent reports of version 2, which are still available via the ecoinvent website. The change report linked above covers all central changes that were made during the conversion process.]

## Included activities end
Drying and processing of 1 m3 natural gas before being inducted in transport network.

## Geography
The figures are based on Norwegian data for the gas processing plants Karsto and Kollsnes. A

## Technology
Kårstø started operation in 1985 and Kollsnes in 1996. No further information on technology available.

## Time period
Data for 2000 is used. Emissions of CO2 and NMVOC were stable in the past 5 years. NOx increased slightly per tonne of product in the processing plant Karsto.

## Reference product
- drying, natural gas: 1 m3; By-product classification allocatable product; CPC 86211: Support services to oil and gas extraction
  EcoSpold01Location=NO
  production volume 3.97339 m3
    This is a placeholder value that does not reflect real-world production volumes. This dataset does not currently require a real-world production volume to work in the database framework, and no actual data were collected yet. This has no negative effect on the results of the ecoinvent database.
  property price 0.00459368 EUR2005
    Calculated based on inputs: The price of the product has been calculated as a sum of the values of the material and energy inputs for this product. This value is therefore a rough estimation. It may underestimate the real price since there are additional expenses when producing any product. These expences can include for example labour costs, treatment of waste materials and profit for the producer. Please consider carefully whether this level of data quality is acceptable for your application.
  properties: carbon allocation 0 kg, carbon content 0

## Inputs from technosphere
- average incineration residue: -1.04436e-12, -2.1699e-8 kg (2 suppliers, which the file names only by identifier); sum of these -2.17e-8 kg; lognormal variance with pedigree 0.0206, pedigree (2,1,1,5,3)
  EcoSpold01Location=CH
  Norwegian data
  Uncertainty: Norwegian data
  production volume
    Calculated from the production volume of drying, natural gas in proportion to the respective output amounts.
  properties: carbon content, fossil 0.0325466, carbon content, non-fossil 0.0511208, dry mass 1 kg, wet mass 1 kg
  note on carbon content, fossil: Tab A.1, ecoinvent v2.2 report 13_I. It is considered that 61.1% of the C has a biogenic origin
- chemical, inorganic: 2.65e-6 kg; lognormal variance with pedigree 0.06, pedigree (1,1,5,5,3)
  EcoSpold01Location=GLO
  Environmental report
  Uncertainty: environmental report
  properties: carbon content, fossil 0.003, dry mass 1 kg, wet mass 1 kg
  note on carbon content, fossil: This dataset is an unweighted average of 20 inorganic substances (listed in Tab 88.1, ecoinvent v2.2 report 8, part II), being part of the top100 chemicals included in this database. The C-content has also been calculated as an unweighted average of the C content of the substances composing this dataset.
- chemical, organic: 2.65e-6 kg; lognormal variance with pedigree 0.06, pedigree (1,1,5,5,3)
  Environmental report
  EcoSpold01Location=GLO
  Uncertainty: environmental report
  properties: carbon content, fossil 0.628, dry mass 1 kg, heating value, net 19.03 MJ, wet mass 1 kg
  note on carbon content, fossil: This dataset is an unweighted average of 20 organic substances (listed in Tab 88.1, ecoinvent v2.2 report 8, part II), being part of the top100 chemicals included in this database. The C-content has also been calculated as an unweighted average of the C content of the substances composing this dataset.
- diesel: 1.23373e-8, 5.11438e-6, 5.24377e-8, 3.65419e-17, 5.17938e-7, 3.62794e-8, 2.5663e-7 kg (7 suppliers, which the file names only by identifier); sum of these 5.99e-6 kg; lognormal variance with pedigree 0.06, pedigree (1,1,5,5,3)
  EcoSpold01Location=RER
  Environmental report, aggregation of different processes
  Uncertainty: environmental report, aggregation of different processes
  properties: carbon content, fossil 0.865, dry mass 1 kg, heating value, net 42.8 MJ, wet mass 1 kg
  note on carbon content, fossil: C-content of diesel is 86.5% (ecoinvent v2.2 report 6_IV, Tab 3.14)
- electricity, medium voltage: 7.70025e-6, 3.64132e-6, 0.00175027, 0.000572889, 0.0114278, 0.00383972, 0.000107638, 2.41619e-5, 1.59688e-5, 0.000175438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 kWh (23 suppliers, which the file names only by identifier); sum of these 0.0204 kWh; lognormal variance with pedigree 0.06, pedigree (1,1,5,5,3)
  EcoSpold01Location=NO
  Environmental report, standard module
  Uncertainty: environmental report, standard module
- ethylene glycol: 1.82e-6 kg; lognormal variance with pedigree 0.06, pedigree (1,1,5,5,3)
  EcoSpold01Location=RER
  Environmental report
  Uncertainty: environmental report
  properties: carbon content, fossil 0.387097, dry mass 1 kg, heating value, net 23.44 MJ, wet mass 1 kg
- municipal solid waste: -2.1914e-9, -1.35309e-10, -8.90953e-11, -3.61772e-9, -4.29589e-10, -2.40143e-10, -2.72948e-9, -1.05975e-9, -2.67365e-9, -6.87707e-10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 kg (44 suppliers, which the file names only by identifier); sum of these -2.13e-6 kg; lognormal variance with pedigree 0.0206, pedigree (2,1,1,5,3)
  Norwegian data
  EcoSpold01Location=CH
  Uncertainty: Norwegian data
  production volume
    (same comment as for average incineration residue)
  properties: carbon content, fossil 0.171549, carbon content, non-fossil 0.261655, dry mass 0.771 kg, heating value, net 11.74 MJ, water content 0.297017, wet mass 1 kg
  note on carbon content, fossil: MSW composition in tab 4.1, ecoinvent v2.2 report 13_I. C content referred to 1 kg DM
  note on heating value, net: Value taken from the general comment of the treatment dataset.
- natural gas processing plant: 3.94e-13 unit; lognormal variance with pedigree 0.06, pedigree (1,1,5,5,3)
  Environmental report, standard module
  EcoSpold01Location=GLO
  Uncertainty: environmental report, standard module
- natural gas, high pressure: 4.38239e-5, 7.39254e-5, 3.37258e-5, 0.000161254, 2.05785e-5, 5.39649e-5, 1.26114e-5, 7.50603e-5, 0.00014064, 7.20262e-5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 m3 (58 suppliers, which the file names only by identifier); sum of these 0.00746 m3; lognormal variance with pedigree 0.06, pedigree (1,1,5,5,3)
  EcoSpold01Location=NO
  Environmental report, aggregation of different processes
  Uncertainty: environmental report, aggregation of different processes
  properties: carbon content, fossil 0.602381, dry mass 0.84 kg, heating value, net 36 MJ, wet mass 0.84 kg
  note on carbon content, fossil: An average C content of 0.506 kg C/ m3 has been assumed (this average has been calculated using data in Tab 3.5, ecoinvent v2.2 report 6_V
  note on heating value, net: Literature value, Source: Christoph Meili;Niels Jungbluth;Maresa Bussa (2021) Life cycle inventories of crude oil and natural gas extraction. ESU-services Ltd. commissioned by BAFU & VSG, Schaffhausen, Switzerland, http://esu-services.ch/data/public-lci-reports/
- soda ash, light: 2.11e-6 kg; lognormal variance with pedigree 0.06, pedigree (1,1,5,5,3)
  EcoSpold01Location=RER
  Environmental report
  Uncertainty: environmental report
  properties: carbon content, fossil 0.0517241, dry mass 1 kg, heating value, net 3.43 MJ, wet mass 1 kg
- spent antifreezer liquid: -4.04e-6 kg; lognormal variance with pedigree 0.0206, pedigree (2,1,1,5,3)
  Norwegian data
  EcoSpold01Location=CH
  Uncertainty: Norwegian data
  production volume
    (same comment as for average incineration residue)
  properties: carbon content, fossil 0.431328, dry mass 0.482 kg, heating value, net 0.56 MJ, water content 1.07469, wet mass 1 kg
  note on carbon content, fossil: Tab A.7, ecoinvent v2.2 report 13_I. C content has been calculated after data in the tables, and then referred to 1 kg DM
- spent solvent mixture: -6.43153e-9, -7.02568e-7 kg (2 suppliers, which the file names only by identifier); sum of these -7.09e-7 kg; lognormal variance with pedigree 0.0206, pedigree (2,1,1,5,3)
  EcoSpold01Location=CH
  Norwegian data
  Uncertainty: Norwegian data
  production volume
    (same comment as for average incineration residue)
  properties: carbon content, fossil 0.571257, dry mass 0.835 kg, heating value, net 21.7 MJ, water content 0.197605, wet mass 1 kg
- waste emulsion paint: -4.15959e-8, -4.06219e-12 kg (2 suppliers, which the file names only by identifier); sum of these -4.16e-8 kg; lognormal variance with pedigree 0.0206, pedigree (2,1,1,5,3)
  Norwegian data
  EcoSpold01Location=CH
  Uncertainty: Norwegian data
  production volume
    (same comment as for average incineration residue)
  properties: carbon content, fossil 0.27, dry mass 1 kg, heating value, net 8.18 MJ, wet mass 1 kg
  note on carbon content, fossil: Tab A.4, ecoinvent v2.2 report 13_I. C content has been calculated after data in the tables, and then referred to 1 kg DM
- waste mineral oil: -4.10243e-8, -4.33898e-6 kg (2 suppliers, which the file names only by identifier); sum of these -4.38e-6 kg; lognormal variance with pedigree 0.0206, pedigree (2,1,1,5,3)
  EcoSpold01Location=CH
  Norwegian data
  Uncertainty: Norwegian data
  production volume
    (same comment as for average incineration residue)
  properties: carbon content, fossil 0.864444, dry mass 0.9 kg, heating value, net 34.7 MJ, water content 0.111111, wet mass 1 kg
  note on carbon content, fossil: Tab A.6, ecoinvent v2.2 report 13_I. C content has been calculated after data in the tables, and then referred to 1 kg DM
- waste textile, soiled: -8.57917e-8, -5.32083e-8 kg (2 suppliers, which the file names only by identifier); sum of these -1.39e-7 kg; lognormal variance with pedigree 0.0206, pedigree (2,1,1,5,3)
  EcoSpold01Location=CH
  Norwegian data
  Uncertainty: Norwegian data
  production volume
    (same comment as for average incineration residue)
  properties: carbon content, non-fossil 0.570519, dry mass 0.75 kg, heating value, net 14.45 MJ, water content 0.333333, wet mass 1 kg
  note on carbon content, non-fossil: C content of 1 kg DM was calculated after data in Tab A.4, ecoinvent v2.2 report 13_I,
- waste wood, untreated: -9.24414e-11, -2.95712e-10, -1.65923e-10, -4.71794e-10, -1.30499e-10, -1.27862e-8, -3.32829e-10, -2.48022e-7, -7.43984e-10, -1.48012e-10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 kg (42 suppliers, which the file names only by identifier); sum of these -3.85e-7 kg; lognormal variance with pedigree 0.0206, pedigree (2,1,1,5,3)
  EcoSpold01Location=CH
  Norwegian data
  Uncertainty: Norwegian data
  production volume
    (same comment as for average incineration residue)
  properties: carbon content, non-fossil 0.48632, dry mass 0.8 kg, heating value, net 13.99 MJ, water content 0.25, wet mass 1 kg
  note on carbon content, non-fossil: Tab A.4, ecoinvent v2.2 report 13_I. C content has been referred to 1 kg DM,

## Emissions to nature
- Carbon dioxide, fossil [air, non-urban air or from high stacks]: 0.0167 kg; lognormal variance with pedigree 0.06, pedigree (1,1,5,5,3)
  Environmental report, aggregation of different processes
  Uncertainty: environmental report, aggregation of different processes
- Methane, fossil [air, non-urban air or from high stacks]: 1.64e-5 kg; lognormal variance with pedigree 0.1, pedigree (1,1,5,5,3)
  (same comment as for Carbon dioxide, fossil)
- NMVOC, non-methane volatile organic compounds [air, non-urban air or from high stacks]: 6.72e-5 kg; lognormal variance with pedigree 0.18, pedigree (1,1,5,5,3)
  (same comment as for Carbon dioxide, fossil)
- Nitrogen oxides [air, non-urban air or from high stacks]: 1.54e-5 kg; lognormal variance with pedigree 0.1, pedigree (1,1,5,5,3)
  (same comment as for Carbon dioxide, fossil)
- Sulfur dioxide [air, non-urban air or from high stacks]: 4.73e-8 kg; lognormal variance with pedigree 0.06, pedigree (1,1,5,5,3)
  (same comment as for Carbon dioxide, fossil)
- AOX, Adsorbable Organic Halides [water, ocean]: 9.24e-14 kg; lognormal variance with pedigree 0.092, pedigree (3,5,5,5,1)
  Extrapolation for sum parameter
  Uncertainty: Extrapolation for sum parameter
- Ammonium [water, ocean]: 9.47e-10 kg; lognormal variance with pedigree 0.1, pedigree (1,1,5,5,3)
  (same comment as for Carbon dioxide, fossil)
- BOD5, Biological Oxygen Demand [water, ocean]: 2.72e-7 kg; lognormal variance with pedigree 0.092, pedigree (3,5,5,5,1)
  Extrapolation for sum parameter
  Uncertainty: Extrapolation for sum parameter
- COD, Chemical Oxygen Demand [water, ocean]: 2.72e-7 kg; lognormal variance with pedigree 0.092, pedigree (3,5,5,5,1)
  Extrapolation for sum parameter
  Uncertainty: Extrapolation for sum parameter
- DOC, Dissolved Organic Carbon [water, ocean]: 6.67e-7 kg; lognormal variance with pedigree 0.092, pedigree (3,5,5,5,1)
  Extrapolation for sum parameter
  Uncertainty: Extrapolation for sum parameter
- Methanol [water, ocean]: 4.02e-8 kg; lognormal variance with pedigree 0.36, pedigree (1,1,5,5,3)
  (same comment as for Carbon dioxide, fossil)
- Nitrogen [water, ocean]: 6.93e-12 kg; lognormal variance with pedigree 0.092, pedigree (3,5,5,5,1)
  Extrapolation for sum parameter
  Uncertainty: Extrapolation for sum parameter
- Oils, unspecified [water, ocean]: 8.97e-9 kg; lognormal variance with pedigree 0.36, pedigree (1,1,5,5,3)
  (same comment as for Carbon dioxide, fossil)
- Phenol [water, ocean]: 4.73e-10 kg; lognormal variance with pedigree 0.36, pedigree (1,1,5,5,3)
  (same comment as for Carbon dioxide, fossil)
- Sulfur [water, ocean]: 2.4e-11 kg; lognormal variance with pedigree 0.092, pedigree (3,5,5,5,1)
  Extrapolation for sum parameter
  Uncertainty: Extrapolation for sum parameter
- TOC, Total Organic Carbon [water, ocean]: 6.67e-7 kg; lognormal variance with pedigree 0.1, pedigree (1,1,5,5,3)
  (same comment as for Carbon dioxide, fossil)
- Triethylene glycol [water, ocean]: 1.21e-7 kg; lognormal variance with pedigree 0.36, pedigree (1,1,5,5,3)
  (same comment as for Carbon dioxide, fossil)

## Sampling procedure
Data is based on environmental report. No information about the sampling procedure.

## Extrapolations
The figures are based on the data for the Norwegian gas processing plants Karsto and Kollsnes. About 60% of the Norwegian gas is processed either at Kårstø or at Kollsnes. The rest is processed on the platforms. An average of both plants was taken. Kollsnes is the onshore processing plant for the offshore Troll gas field. Part of the processing (mainly water separation) of the Troll gas is performed on the Troll platform, where as the final processing is performed at Kollsnes. The Troll gas contains very little liquids (condensate and oil) compared to the other fields on the Norwegian Shelf. Kårstø is a complex facility. The main energy consumption for processing is for distillation, i.e. heating of the gas to distill off its various components. The emissions of flared gas and of use of fuel gas are included in the process. The Norwegian data can be extrapolated for European processing of gas This dataset has been copied from an original dataset covering the geography NO. The uncertainty has been adjusted accordingly.

## Review by Michael Spielmann (obsolete) 2003-09-22
Passed.
