# treatment of steel in car shredder residue, municipal incineration FAE

Dataset: EcoSpold 2, unit process
Geography: CH
Time period: 2006-01-01 to 2023-12-31
Technology level: current
Classification: ISIC rev.4 ecoinvent: 3821:Treatment and disposal of non-hazardous waste
Scenario: Business-as-Usual
System model: Allocation, cut-off by classification
Generated by: Nikolia Stoikou
Database: ecoinvent
isCopyrightProtected: true
accessRestrictedTo: 1

## General comment
The process represents the treatment of 'steel in car shredder residue' in a municipal solid waste incinerator (MSWI). Recommended use of this dataset: For disposal of rather fine or dusty steel, which goes to incineration as part of Automotive Shredder Residue (ASR). Due to fine grain size of the particles, 50% burnability is assumed, therefore not suited for less fine steel parts in waste. Pure, isolated steel fractions will not be disposed in incinerators, but rather go to recycling.Inventoried waste contains several fractions: 50% Fe in ASR burnable; 50% Fe in ASR inert; . Waste composition (wet, in ppmw): H2O na; O 121260; H na; C na; S 760; N na; P 800; B na; Cl 750; Br na; F na; I na; Ag na; As na; Ba na; Cd 3; Co na; Cr 1200; Cu 13570; Hg na; Mn 2400; Mo na; Ni 1050; Pb 380; Sb 210; Se na; Sn 670; V 250; Zn 202; Be na; Sc na; Sr na; Ti na; Tl na; W na; Si 30950; Fe 815330; Ca na; Al 10220; K na; Mg na; Na na. Share of carbon in initial waste input that is biogenic 61.4%.Share of metals in waste not oxidised and bulk-recyclable (exclude very small or thin parts) Iron: 50.77%; Alu: 0%; Copper: 0%.Recovery of metal scrap from bottom ash to recycling: 236.45g iron scrap, 0g aluminium scrap, 0g copper scrap. From this waste, the FLUWA process in the technology mix recovers 0.000189kg (DM) of a hydroxide sludge to be recycled in zinc furnaces. Net energy production: 0MJ/kg electric energy and 0MJ/kg thermal energy.

## Included activities start
The activity starts with the waste being available at the gate of the treatment facility. Collection and transportation of the waste to the treatment plant is not included.

## Included activities end
The activity ends with the waste being treated and waste-specific emissions from the incineration process and auxiliary material consumption for flue gas cleaning are released to the environment (air and water). Infrastructure and waste-specific energy demands for Municipal Solid Waste Incineration (MSWI) and net energy generation are included.

## Geography
Modelling parameters affecting the treatment technology are specific to this geography and to the technology mix encountered in Switzerland in 2012.

## Technology
The waste is treated in the incineration plant with flue gas cleaning. Incineration is the controlled combustion of a waste and it includes fly ash extraction (FAE). Auxiliary material consumption for this step of air pollution control (APC) are included in the process. Air polution control includes electrostatic precipitator for fly ash (ESP), wet flue gas scrubber and 25% SNCR , 42.77% SCR-high dust , 32.68% SCR-low dust -DeNOx facilities and 0% without DeNOx (weighted according to mass of burnt waste). Efficiency of iron scrap separation from slag : 58%. Efficiency of aluminium scrap separation from slag : 31%. Efficiency of copper scrap separation from slag : 31%. The technology mix for this dataset includes a filter ash treatment (FLUWA) of a share of 46.22%. Gross electric efficiency technology mix 15.84% and Gross thermal efficiency technology mix 28.51%

## Reference product
- steel in car shredder residue: -1 kg; By-product classification Waste; CPC 39310: Slag, dross, scalings and other waste from the manufacture of iron or steel; HS2017 261900: Slag, dross; (other than granulated slag), scalings and other waste from the manufacture of iron or steel
  main reference product of this activity (supply of disposal service).
  production volume 633590 kg
    based on corresponding global production volume of MSW fraction in conventional MSWI (wo fly ash extraction) and scaled down to annual Swiss incinerated MSW mass of 3.02 mio. tonnes.
  property price 0 EUR2005
    Waste products are assigned a price of zero as they are assumed to require further treatment.
  properties: aluminium content 0.01022, antimony content 0.00021, cadmium content 3e-6, carbon allocation 0 kg, carbon content 0, carbon content, fossil 0, carbon content, non-fossil 0, chlorine content 0.00075, chromium content 0.0012, copper content 0.01357, dry mass 1 kg, heating value, gross 0 MJ, heating value, net 0 MJ, iron content 0.81533, lead content 0.00038, manganese content 0.0024, nickel content 0.00105, oxygen content 0.121255, phosphorus content 0.0008, silicon content 0.03095, sulfur content 0.00076, tin content 0.00067, vanadium content 0.00025, water content 0, water in wet mass 0 kg, wet mass 1 kg, zinc content 0.000202

## Inputs from technosphere
- ammonia, anhydrous, liquid: 5.28259e-5 kg; lognormal variance with pedigree 0.3654, pedigree (1,1,4,1,1)
  Input to DeNOx stage (100% NH3).
  Uncertainty: uncertainty calculated from uncertainty in average DeNOx input, uncertainty in the share of thermal NOx, uncertainty of nitrogen content in average municipal waste and the uncertainty in nitrogen content in *this* waste.
  properties: dry mass 1 kg, wet mass 1 kg
- bottom ash, MSWI[F], steel in car shredder residue: -0.994224 kg; lognormal variance with pedigree 0.0072623, pedigree (1,1,1,1,1)
  waste-specific bottom ash from the incineration of this waste
  Uncertainty: uncertainty is calculated from uncertainties in waste composition and transfer coefficients in incinerator
  production volume
    calculated in proportion to incinerated waste input
  properties: aluminium content 0.0121902, chromium content 0.00131195, copper content 0.0164992, dry mass 0.802356 kg, iron content 0.717235, manganese content 0.00269438, nickel content 0.00129358, oxygen content 0.20698, phosphorus content 0.000953128, silicon content 0.0378208, water content 0.24633, wet mass 1 kg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
- chemical, inorganic: 2.55803e-5 kg; lognormal variance with pedigree 0.091199, pedigree (1,1,4,1,1)
  auxiliary inputs for the wastewater treatment stage of the incinerator plant. Proxy for Polyelectrolyte.
  Uncertainty: uncertainty calculated from uncertainty in average Polyelectrolyte input, of transfer coefficients in the incinerator, and the uncertainty of the waste composition of this waste
  properties: carbon content, fossil 0.003, dry mass 1 kg, wet mass 1 kg
- chromium trioxide, flakes: 6.75444e-8 kg; lognormal variance with pedigree 0.85166, pedigree (1,1,4,1,1)
  Input to DeNOx stage. Active component in SCR catalyst (vanadium pentoxide, V2O5), here approximated with the available chromium trioxide.
  Uncertainty: uncertainty calculated from uncertainty in average DeNOx input, uncertainty in the share of thermal NOx, uncertainty of nitrogen content in average municipal waste and the uncertainty in nitrogen content in *this* waste.
  properties: dry mass 1 kg, wet mass 1 kg
- electricity, for reuse in municipal waste incineration only: 0.0736278 kWh; lognormal variance with pedigree 0.00859512, pedigree (1,1,4,1,1)
  Net electricity required to incinerate this waste (subsidised from high-calorific waste fractions).
  Uncertainty: uncertainty is calculated from uncertainties in waste composition and uncertainties in energy efficiency and the uncertainty in internal energy demand
- heat, district or industrial, natural gas: 0.00987842 MJ; lognormal variance with pedigree 0.3654, pedigree (1,1,4,1,1)
  Input to DeNOx stage, to heat up flue gas in low-dust SCR.
  Uncertainty: uncertainty calculated from uncertainty in average DeNOx input, uncertainty in the share of thermal NOx, uncertainty of nitrogen content in average municipal waste and the uncertainty in nitrogen content in *this* waste.
  properties: heating value, net 1 MJ
- heat, for reuse in municipal waste incineration only: 0.0733456 MJ; lognormal variance with pedigree 0.00859512, pedigree (1,1,4,1,1)
  Net heat required to incinerate this waste (subsidised from high-calorific waste fractions).
  Uncertainty: uncertainty is calculated from uncertainties in waste composition and uncertainties in energy efficiency and the uncertainty in internal energy demand
- hydrochloric acid, without water, in 30% solution state: 0.000361466 kg; lognormal variance with pedigree 0.0163942, pedigree (1,1,4,1,1)
  auxiliary inputs for the wastewater treatment stage of the incinerator plant.
  Uncertainty: uncertainty calculated from uncertainty in average HCl input, of transfer coefficients in the incinerator, and the uncertainty of the waste composition of this waste
  properties: dry mass 1 kg, heating value, net 3.32 MJ, wet mass 1 kg
- hydrogen peroxide, without water, in 50% solution state: 0.000902882 kg; lognormal variance with pedigree 0.016693, pedigree (1,1,4,1,1)
  auxiliary oxidising agent for filter ash treatment (FLUWA).
  Uncertainty: uncertainty calculated from uncertainty in of transfer coefficients in the incinerator, and the uncertainty of the waste composition of this waste
  properties: dry mass 1 kg, heating value, net 7.13 MJ, wet mass 1 kg
- iron scrap, sorted, pressed: -0.236446 kg; lognormal variance with pedigree 0.011274, pedigree (1,1,1,1,1)
  iron scrap recovered from this waste.
  Uncertainty: uncertainty calculated from uncertainty in waste composition, uncertainty of share of recyclable metal, uncertainty of transfer coefficient to bottom ash, uncertainty of the efficiency of scrap removal in MSWI plant.
  production volume
    calculated in proportion to incinerated waste input
  properties: dry mass 1 kg, price 0.175 EUR2005, wet mass 1 kg
- iron(III) chloride, without water, in 40% solution state: 3.15269e-5 kg; lognormal variance with pedigree 0.22224, pedigree (1,1,4,1,1)
  auxiliary inputs for the wastewater treatment stage of the incinerator plant.
  Uncertainty: uncertainty calculated from uncertainty in average FeCl3 input, of transfer coefficients in the incinerator, and the uncertainty of the waste composition of this waste
  properties: dry mass 1 kg, wet mass 1 kg
- metalliferous hydroxide sludge: -0.000756876 kg; lognormal variance with pedigree 0.044799, pedigree (1,1,1,1,1)
  Metalliferous hydroxide sludge/zinc concentrate from filter ash leaching (FLUWA).
  Uncertainty: uncertainty is calculated from uncertainties in waste composition and transfer coefficients to filter ash in incinerator and the uncertainty of the transfer coefficients of the FLUWA process.
  production volume
    calculated in proportion to incinerated waste input
  properties: calcium content 0.1045, chlorine content 0.0477793, dry mass 0.25 kg, iron content 0.237716, lead content 0.0181272, oxygen content 0.377845, phosphorus content 0.0414929, sodium content 0.0163, sulfur content 0.123498, water content 3, wet mass 1 kg, zinc content 0.09414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
  note on calcium content: Calculated as a production volume weighted average of properties of all the metalliferous hydroxide sludge products produced in the database.
- municipal waste incineration facility: 2.5e-10 unit
  Infrastructure demands per kilogram incinerated waste.
- residues, MSWI[F], steel in car shredder residue: -0.0129972 kg; lognormal variance with pedigree 0.010594, pedigree (1,1,1,1,1)
  waste-specific incineration residues (fly ash + scrubber sludge) from the incineration of this waste
  Uncertainty: uncertainty is calculated from uncertainties in waste composition and transfer coefficients in incinerator
  production volume
    calculated in proportion to incinerated waste input
  properties: aluminium content 0.0381021, chlorine content 0.00500393, chromium content 0.0115375, copper content 0.0311169, dry mass 1 kg, iron content 0.513972, manganese content 0.0191646, oxygen content 0.288907, silicon content 0.0598457, sulfur content 0.00576938, tin content 0.00869314, wet mass 1 kg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
- sodium hydroxide, without water, in 50% solution state: 0.000427797 kg; lognormal variance with pedigree 0.080939, pedigree (1,1,4,1,1)
  auxiliary inputs for the flue gas treatment stage of the incinerator plant, and partially in the filter ash treatment (FLUWA).
  Uncertainty: uncertainty calculated from uncertainty in average NaOH input, of transfer coefficients in the incinerator, and the uncertainty of the waste composition of this waste
  properties: dry mass 1 kg, heating value, net 3.03 MJ, wet mass 1 kg
- titanium dioxide: 3.30967e-6 kg; lognormal variance with pedigree 0.85166, pedigree (1,1,4,1,1)
  Input to DeNOx stage (TiO2 catalyst carrier)
  Uncertainty: uncertainty calculated from uncertainty in average DeNOx input, uncertainty in the share of thermal NOx, uncertainty of nitrogen content in average municipal waste and the uncertainty in nitrogen content in *this* waste.
  properties: dry mass 1 kg, wet mass 1 kg
- triazine-compound: 2.12354e-7 kg; lognormal variance with pedigree 1.4354, pedigree (1,1,4,1,1)
  auxiliary inputs for the wastewater treatment stage of the incinerator plant. Proxy for (pure) Trisodium-trimercapto-s-triazine (CAS 17766-26-6), used as 15% diluted solution, aka TMT15.
  Uncertainty: uncertainty calculated from uncertainty in average TMT15 input, of transfer coefficients in the incinerator, and the uncertainty of the waste composition of this waste
  properties: carbon content, fossil 0.475616, dry mass 1 kg, wet mass 1 kg
- water, decarbonised: 0.303252 kg; lognormal variance with pedigree 0.22224, pedigree (1,1,4,1,1)
  Incinerator process water used in flue gas scrubber stage.
  Uncertainty: uncertainty calculated from uncertainty in average water input, and the uncertainty of the waste composition of this waste
  properties: wet mass 1 kg

## Inputs from nature
- Oxygen [natural resource, in air]: 0.328976 kg; lognormal variance with pedigree 0.099713, pedigree (1,1,4,1,1)
  oxygen from ambient air needed to combust and oxidise this waste. Net demand, i.e. without O2 leaving the plant in flue gas uncombusted.
  Uncertainty: uncertainty is calculated from uncertainties in waste composition and transfer coefficients to flue gas and solid residues in incinerator

## Emissions to nature
- Aluminium III [air, urban air close to ground]: 4.16626e-9 kg; lognormal variance with pedigree 0.454, pedigree (1,1,4,1,1)
  Emission to air from waste composition and incinerator transfer coefficients.
  Uncertainty: uncertainty is calculated from uncertainties in waste composition and transfer coefficients in incinerator
- Ammonia [air, urban air close to ground]: 6.21099e-8 kg; lognormal variance with pedigree 0.43582, pedigree (1,1,4,1,1)
  Nitrogen species emitted to air after DeNOx stage.
  Uncertainty: uncertainty calculated from uncertainty in average N-emissions and uncertainty in the share of thermal NOx and the uncertainty in nitrogen content in *this* waste.
- Antimony ion [air, urban air close to ground]: 8.4111e-11 kg; lognormal variance with pedigree 0.95041, pedigree (1,1,4,1,1)
  (same comment as for Aluminium III)
- Benzene [air, urban air close to ground]: 4.8325e-8 kg; lognormal variance with pedigree 0.27859, pedigree (1,1,4,1,1)
  Incomplete combustion product emitted to air.
  Uncertainty: uncertainty calculated from uncertainty in average operation emissions, and the uncertainty of the flue gas volume from this waste.
- Benzo(a)pyrene [air, urban air close to ground]: 1.07539e-12 kg; lognormal variance with pedigree 0.75927, pedigree (1,1,4,1,1)
  (same comment as for Benzene)
- Cadmium II [air, urban air close to ground]: 7.64563e-10 kg; lognormal variance with pedigree 1.4624, pedigree (1,1,4,1,1)
  (same comment as for Aluminium III)
- Carbon monoxide, fossil [air, urban air close to ground]: 3.17087e-5 kg; lognormal variance with pedigree 1.2673, pedigree (1,1,4,1,1)
  (same comment as for Benzene)
- Carbon monoxide, non-fossil [air, urban air close to ground]: 5.04382e-5 kg; lognormal variance with pedigree 1.2673, pedigree (1,1,4,1,1)
  (same comment as for Benzene)
- Chromium III [air, urban air close to ground]: 5.23926e-7 kg; lognormal variance with pedigree 0.66561, pedigree (1,1,4,1,1)
  (same comment as for Aluminium III)
- Copper ion [air, urban air close to ground]: 6.21442e-7 kg; lognormal variance with pedigree 0.37981, pedigree (1,1,4,1,1)
  (same comment as for Aluminium III)
- Dioxins, measured as 2,3,7,8-tetrachlorodibenzo-p-dioxin [air, urban air close to ground]: 9.66435e-14 kg; lognormal variance with pedigree 0.75927, pedigree (1,1,4,1,1)
  (same comment as for Benzene)
- Hexachlorobenzene [air, urban air close to ground]: 1.01045e-10 kg; lognormal variance with pedigree 0.27859, pedigree (1,1,4,1,1)
  (same comment as for Benzene)
- Hydrochloric acid [air, urban air close to ground]: 2.13996e-7 kg; lognormal variance with pedigree 0.73067, pedigree (1,1,4,1,1)
  (same comment as for Aluminium III)
- Iron ion [air, urban air close to ground]: 7.30601e-7 kg; lognormal variance with pedigree 0.080915, pedigree (1,1,4,1,1)
  (same comment as for Aluminium III)
- Lead II [air, urban air close to ground]: 1.56532e-8 kg; lognormal variance with pedigree 0.83293, pedigree (1,1,4,1,1)
  (same comment as for Aluminium III)
- Manganese II [air, urban air close to ground]: 2.29173e-7 kg; lognormal variance with pedigree 0.58683, pedigree (1,1,4,1,1)
  (same comment as for Aluminium III)
- Methane, fossil [air, urban air close to ground]: 2.79802e-7 kg; lognormal variance with pedigree 0.27859, pedigree (1,1,4,1,1)
  (same comment as for Benzene)
- Methane, non-fossil [air, urban air close to ground]: 4.45074e-7 kg; lognormal variance with pedigree 0.27859, pedigree (1,1,4,1,1)
  (same comment as for Benzene)
- NMVOC, non-methane volatile organic compounds [air, urban air close to ground]: 2.19926e-6 kg; lognormal variance with pedigree 0.27859, pedigree (1,1,4,1,1)
  (same comment as for Benzene)
- Nickel II [air, urban air close to ground]: 6.59517e-7 kg; lognormal variance with pedigree 0.68004, pedigree (1,1,4,1,1)
  (same comment as for Aluminium III)
- Nitrogen oxides [air, urban air close to ground]: 1.96681e-5 kg; lognormal variance with pedigree 0.43582, pedigree (1,1,4,1,1)
  sum of fuel-NOx and thermal-NOx emitted to air after DeNOx stage.
  Uncertainty: uncertainty calculated from uncertainty in average N-emissions and uncertainty in the share of thermal NOx and the uncertainty in nitrogen content in *this* waste.
- Particulate Matter, < 2.5 um [air, urban air close to ground]: 5.76962e-6 kg; lognormal variance with pedigree 0.75927, pedigree (1,1,4,1,1)
  (same comment as for Benzene)
- Particulate Matter, > 2.5 um and < 10um [air, urban air close to ground]: 2.8993e-8 kg; lognormal variance with pedigree 0.44893, pedigree (1,1,4,1,1)
  (same comment as for Benzene)
- Pentachlorobenzene [air, urban air close to ground]: 2.55317e-10 kg; lognormal variance with pedigree 0.27859, pedigree (1,1,4,1,1)
  (same comment as for Benzene)
- Pentachlorophenol [air, urban air close to ground]: 2.10449e-11 kg; lognormal variance with pedigree 0.27859, pedigree (1,1,4,1,1)
  (same comment as for Benzene)
- Phosphorus [air, urban air close to ground]: 4.06497e-7 kg; lognormal variance with pedigree 0.71624, pedigree (1,1,4,1,1)
  (same comment as for Aluminium III)
- Silicon [air, urban air close to ground]: 2.41026e-8 kg; lognormal variance with pedigree 0.32117, pedigree (1,1,4,1,1)
  (same comment as for Aluminium III)
- Sulfur dioxide [air, urban air close to ground]: 4.04111e-6 kg; lognormal variance with pedigree 0.71653, pedigree (1,1,4,1,1)
  (same comment as for Aluminium III)
- Tin ion [air, urban air close to ground]: 2.18824e-10 kg; lognormal variance with pedigree 0.79635, pedigree (1,1,4,1,1)
  (same comment as for Aluminium III)
- Toluene [air, urban air close to ground]: 9.66501e-8 kg; lognormal variance with pedigree 0.27859, pedigree (1,1,4,1,1)
  (same comment as for Benzene)
- Vanadium V [air, urban air close to ground]: 2.65111e-6 kg; lognormal variance with pedigree 0.85492, pedigree (1,1,4,1,1)
  (same comment as for Aluminium III)
- Water [air, urban air close to ground]: 7.63797e-5 m3; lognormal variance with pedigree 0.97353, pedigree (1,1,4,1,1)
  water vapour from waste humidity, hydrogen oxidation and part of the process water.
  Uncertainty: Uncertainty calculated from uncertainty in waste composition, process water input and the uncertainty of fraction to air.
- Zinc II [air, urban air close to ground]: 6.76968e-8 kg; lognormal variance with pedigree 0.9063, pedigree (1,1,4,1,1)
  (same comment as for Aluminium III)
- Non-hazardous waste disposed [inventory indicator, waste]: 1 kg
  Inventory indicator for waste mass disposed. To be used in EN15804 "other data" results.
- Aluminium III [water, surface water]: 2.59342e-8 kg; lognormal variance with pedigree 0.34841, pedigree (1,1,4,1,1)
  Emissions to water from waste composition and incinerator transfer coefficients.
  Uncertainty: uncertainty is calculated from uncertainties in waste composition and transfer coefficients in incinerator
- Antimony ion [water, surface water]: 1.13938e-6 kg; lognormal variance with pedigree 0.85282, pedigree (1,1,4,1,1)
  (same comment as for Aluminium III)
- Cadmium II [water, surface water]: 1.36917e-10 kg; lognormal variance with pedigree 1.0704, pedigree (1,1,4,1,1)
  (same comment as for Aluminium III)
- Chloride [water, surface water]: 0.000294836 kg; lognormal variance with pedigree 0.33476, pedigree (1,1,4,1,1)
  (same comment as for Aluminium III)
- Chromium III [water, surface water]: 7.7895e-8 kg; lognormal variance with pedigree 0.3951, pedigree (1,1,4,1,1)
  (same comment as for Aluminium III)
- Copper ion [water, surface water]: 3.39595e-7 kg; lognormal variance with pedigree 0.36904, pedigree (1,1,4,1,1)
  (same comment as for Aluminium III)
- Iron ion [water, surface water]: 4.37933e-6 kg; lognormal variance with pedigree 0.05151, pedigree (1,1,4,1,1)
  (same comment as for Aluminium III)
- Lead II [water, surface water]: 1.00418e-8 kg; lognormal variance with pedigree 0.66834, pedigree (1,1,4,1,1)
  (same comment as for Aluminium III)
- Manganese II [water, surface water]: 9.45373e-8 kg; lognormal variance with pedigree 0.44629, pedigree (1,1,4,1,1)
  (same comment as for Aluminium III)
- Nickel II [water, surface water]: 1.71124e-8 kg; lognormal variance with pedigree 0.48511, pedigree (1,1,4,1,1)
  (same comment as for Aluminium III)
- Phosphate [water, surface water]: 5.35525e-7 kg; lognormal variance with pedigree 0.40068, pedigree (1,1,4,1,1)
  (same comment as for Aluminium III)
- Silicon [water, surface water]: 8.3276e-7 kg; lognormal variance with pedigree 0.16629, pedigree (1,1,4,1,1)
  (same comment as for Aluminium III)
- Sulfate [water, surface water]: 6.01313e-5 kg; lognormal variance with pedigree 0.54707, pedigree (1,1,4,1,1)
  (same comment as for Aluminium III)
- Tin ion [water, surface water]: 2.95701e-7 kg; lognormal variance with pedigree 0.69051, pedigree (1,1,4,1,1)
  (same comment as for Aluminium III)
- Vanadium V [water, surface water]: 1.65808e-8 kg; lognormal variance with pedigree 0.49598, pedigree (1,1,4,1,1)
  (same comment as for Aluminium III)
- Water [water, surface water]: 3.98503e-5 m3; lognormal variance with pedigree 0.96237, pedigree (1,1,4,1,1)
  process water released to surface water.
  Uncertainty: uncertainty calculated from uncertainty in process water input and the uncertainty of fraction to surface water.
- Zinc II [water, surface water]: 4.05121e-9 kg; lognormal variance with pedigree 0.80325, pedigree (1,1,4,1,1)
  (same comment as for Aluminium III)
