# petrol production, 85% ethanol by volume from biomass

Dataset: EcoSpold 2, unit process
Geography: CH
Time period: 2004-01-01 to 2023-12-31
Technology level: current
Classification: ISIC rev.4 ecoinvent: 1920:Manufacture of refined petroleum products
Classification: EcoSpold01Categories: biomass/fuels
Synonyms: bio-ethanol; Anhydrol; Ethyl alcohol; ethanol 200 proof; Ethanol; Denatured alcohol; fermentation alcohol; grain alcohol; alcohol dehydrated; bioethanol; ethyl hydroxide; Alkohol; Ethanol absolute; cologne spirits (alcohol); cologne spirit; E85; ethyl hydrate; algrain
Tags: ConvertedDataset
Scenario: Business-as-Usual
System model: Allocation, cut-off by classification
Share of production covered: 0 %
Generated by: Edgard Gnansounou
Published in: Jungbluth N. 2007
Database: ecoinvent
isCopyrightProtected: true
accessRestrictedTo: 1

## General comment
Inventory refers to the distribution of 1 kg of E85 (15% vol. low-sulphur gasoline blended with 85% vol. anhydrous ethanol from biomass). Ethanol is partly produced in CH (according to the production mix), and partly imported from RER and BR. Distribution to the final consumer (service station) including all necessary transports. Fossil and biogenic carbon contents are respectively 12.4% and 44.7%.
[This dataset was already contained in the ecoinvent database version 2. It was not individually updated during the transfer to ecoinvent version 3. Life Cycle Impact Assessment results may still have changed, as they are affected by changes in the supply chain, i.e. in other datasets. This dataset was generated following the ecoinvent quality guidelines for version 2. It may have been subject to central changes described in the ecoinvent version 3 change report (http://www.ecoinvent.org/database/ecoinvent-version-3/reports-of-changes/), and the results of the central updates were reviewed extensively. The changes added e.g. consistent water flows and other information throughout the database. The documentation of this dataset can be found in the ecoinvent reports of version 2, which are still available via the ecoinvent website. The change report linked above covers all central changes that were made during the conversion process.]

## Included activities end
This process includes the distribution of E85 (15% vol. low-sulphur gasoline and 85% vol. anhydrous ethanol from biomass) to the end user at the filling station. Operation of storage tanks and petrol stations are taken into account. Emissions from evaporation and treatment of effluents are also included. Excluding emissions from car-washing at petrol stations. Mixing is supposed to be performed directly at the filling station (splash blending).

## Geography
The ethanol component is partly produced in Switzerland (25%) and partly imported from the EU (37.5%) and from Brazil (37.5%). The gasoline component corresponds to low-sulphur gasoline used in Switzerland.

## Technology
Distribution of fuels

## Reference product
- petrol, 85% ethanol by volume from biomass: 1 kg; By-product classification allocatable product; CPC 333: Petroleum oils and oils obtained from bituminous materials, other than crude; preparations n.e.c. containing by […]; HS2017 271020: Petroleum oils and oils from bituminous minerals, containing biodiesel, not crude, not waste oils; preparat[...]
  EcoSpold01Location=CH
  production volume 0 kg
    Ethanol for use as a fuel as a fuel was limited to 1-1.5 Ml/yr in CH, in 2005.
    This dataset mixes different fuel sources. However, some of the input products do not exist. Therefore, the production volume of this dataset has temporarily benn put to zero. 901000 litres ethanol consumed (Source: http://www.biofuels-platform.ch/en/infos/ch-bioethanol.php) ; 0.79 kg/l ; 0.85728 kg ethanol per kg petrol (Source: ecoinvent report 17).
  property heating value, net 29.1 MJ
    Based on literature, page 355, Report 17: Jungbluth, N., Chudacoff, M., Dauriat, A., Dinkel, F., Doka, G., Faist Emmenegger, M., Gnansounou, E., Kljun, N., Schleiss, K., Spielmann, M., Stettler, C., Sutter, J. 2007: Life Cycle Inventories of Bioenergy. ecoinvent report No. 17, Swiss Centre for Life Cycle Inventories, Dübendorf, CH.
  property price 0.71 EUR2005
    Average calculated from All Grades, Areas and Formulations in USA for 2005. Source: http://www.eia.gov/oil_gas/petroleum/data_publications/wrgp/mogas_history.html
  properties: carbon allocation 0.571 kg, carbon content 0.571, carbon content, fossil 0.124, carbon content, non-fossil 0.447, dry mass 1 kg, water content 0, water in wet mass 0 kg, wet mass 1 kg

## Inputs from technosphere
- ethanol, without water, in 99.7% solution state, from fermentation, vehicle grade: 0.85728 kg; = 0.21432+0.32148+0.32148; lognormal variance with pedigree 0.0501, pedigree (1,2,5,1,1)
  EcoSpold01Location=CH
  Calculations, according to the assumed ethanol mix
  Uncertainty: Calculations, according to the assumed ethanol mix
  properties: carbon content, non-fossil 0.521739, dry mass 1 kg, heating value, net 28.1 MJ, wet mass 1 kg
  note on heating value, net: Based on literature, page 275, Report 17: Jungbluth, N., Chudacoff, M., Dauriat, A., Dinkel, F., Doka, G., Faist Emmenegger, M., Gnansounou, E., Kljun, N., Schleiss, K., Spielmann, M., Stettler, C., Sutter, J. 2007: Life Cycle Inventories of Bioenergy. ecoinvent report No. 17, Swiss Centre for Life Cycle Inventories, Dübendorf, CH.
- petrol, low-sulfur: 0.14272 kg; lognormal variance with pedigree 0.0501, pedigree (1,2,5,1,1)
  EcoSpold01Location=CH
  Calculations, according to the incorporation rate of ethanol and the respective densities of ethanol (0.795 kg/l) and gasoline (0.75 kg/l)
  Uncertainty: Calculations, according to the incorporation rate of ethanol and the respective densities of ethanol (0.795 kg/l) and gasoline (0.75 kg/l)
  properties: carbon content, fossil 0.865, dry mass 1 kg, heating value, net 42.5 MJ, wet mass 1 kg
  note on heating value, net: Based on literature, page 611, Report 17: Jungbluth, N., Chudacoff, M., Dauriat, A., Dinkel, F., Doka, G., Faist Emmenegger, M., Gnansounou, E., Kljun, N., Schleiss, K., Spielmann, M., Stettler, C., Sutter, J. 2007: Life Cycle Inventories of Bioenergy. ecoinvent report No. 17, Swiss Centre for Life Cycle Inventories, Dübendorf, CH.

## Sampling procedure
Environmental reports and literature.

## Review by Niels Jungbluth 2006-07-12
Passed.
none
