# natural gas, high pressure, import from QA

Dataset: EcoSpold 2, unit process
Geography: AE
Time period: 2021-01-01 to 2023-12-31
Technology level: current
Classification: ISIC rev.4 ecoinvent: 3520:Manufacture of gas; distribution of gaseous fuels through mains
Scenario: Business-as-Usual
System model: Allocation, cut-off by classification
Generated by: Carl Vadenbo
Database: ecoinvent
isCopyrightProtected: true
accessRestrictedTo: 1

## General comment
This dataset represents the import of natural gas [m3] from Qatar to the United Arab Emirates. This import activity is only intended to connect the consumption mix of the supplying country to that of the receiving geography. Any losses, emissions, or energy, infrastructure and transport requirements are not considered in this activity. This import activity is establish as a proxy for the trade situation in 2021 as reported in bp Statistical Review of World Energy June 2022 (bp 2022; http://www.bp.com/statisticalreview)

## Included activities start
This activity starts with output of the market for natural gas, high pressure, in the supplying geography.

## Included activities end
This activity ends with the supply to the market for natural gas, high pressure, in the receiving geography. Neither losses, emissions, nor energy, infrastructure or transport requirements are considered in this proxy import activity.

## Geography
For gas import from Qatar to the United Arab Emirates.

## Reference product
- natural gas, high pressure: 1 m3; By-product classification allocatable product; CPC 12020: Natural gas, liquefied or in the gaseous state; HS2017 271121: Petroleum gases and other gaseous hydrocarbons; in gaseous state, natural gas; CAS 8006-14-2
  production volume 2.08748e10 m3
    According to bp (2022), the United Arab Emirates imported a total of 20.9 billion metric cubic meters of natural gas (of which 1.4 bcm as LNG) from Qatar in 2021. Sources: bp Statistical Review of World Energy June 2022; http://www.bp.com/statisticalreview
  property heating value, gross 40 MJ
    At standard conditions; based on Meili et al. (2022) section 5.2
  property heating value, net 36 MJ
    At standard conditions; based on Meili et al. (2022) section 5.2
  property price 0.16673 EUR2005
    Calculated value based on data from the United Nations Commodity Trade Statistics Database (http://data.un.org/Data.aspx?q=natural+gas&d=ComTrade&f=_l1Code%3a28%3bcmdCode%3a271121; accessed 12 October 2023). UN Comtrade category: 271121 - Natural gas in gaseous state. An average for 2019-2021 was used and adjusted for inflation to the year 2005. The average price of imports and exports into the four main markets (EU, US, JP, and CN) was determined. Density of natural gas of 0.735 kg/m³ for unit conversion was used.
  properties: amount in multioutput activity_m3 0 m3, carbon allocation 0.544635 kg, carbon content 0.741, carbon content, fossil 0.741, carbon content, non-fossil 0, dry mass 0.735 kg, water content 0, water in wet mass 0 kg, wet mass 0.735 kg

## Inputs from technosphere
- natural gas, high pressure: 1 m3
  Input of natural gas; no uncertainty considered for this flow
  properties: carbon content, fossil 0.741, dry mass 0.735 kg, heating value, gross 40 MJ, heating value, net 36 MJ, wet mass 0.735 kg
  note on heating value, gross: At standard conditions; based on Meili et al. (2022) section 5.2
