# potato grading

Dataset: EcoSpold 2, unit process
Geography: CA-QC
Time period: 2002-01-01 to 2023-12-31
Technology level: current
Classification: EcoSpold01Categories: agricultural means of production/work processes
Classification: ISIC rev.4 ecoinvent: 0163:Post-harvest crop activities
Tags: recontextualization
Scenario: Business-as-Usual
System model: Allocation, cut-off by classification
Generated by: Pascal Lesage
Published in: Nemecek, T. 2007
Database: ecoinvent
isCopyrightProtected: true
accessRestrictedTo: 1

## General comment
Refers to 1 kg of ungraded potatoes
[This dataset was already contained in the ecoinvent database version 2. It was not individually updated during the transfer to ecoinvent version 3. Life Cycle Impact Assessment results may still have changed, as they are affected by changes in the supply chain, i.e. in other datasets. This dataset was generated following the ecoinvent quality guidelines for version 2. It may have been subject to central changes described in the ecoinvent version 3 change report (http://www.ecoinvent.org/database/ecoinvent-version-3/reports-of-changes/), and the results of the central updates were reviewed extensively. The changes added e.g. consistent water flows and other information throughout the database. The documentation of this dataset can be found in the ecoinvent reports of version 2, which are still available via the ecoinvent website. The change report linked above covers all central changes that were made during the conversion process.]
Child dataset exchanges identical to GLO dataset. Created to enable linking to regional markets (e.g. for electricity). Data quality indicators adjusted accordingly.

## Included activities end
Demand on machinery, buildings (shed) and electricity for potato grading and weighting.

## Geography
Values refer to the situation in Switzerland.
Child dataset exchanges identical to GLO dataset. Created to enable linking to regional markets (e.g. for electricity). Data quality indicators adjusted accordingly.

## Technology
Uses a potato grader and a weigh.

## Time period
Date of the major data sources.

## Parameters
- Quebec gross domestic product 2011: 3.11e11 USD(2011); name quebecGDP2011; lognormal variance with pedigree 0.0006, pedigree (1,1,1,1,1)
  Quebec Gross domestic product for 2011, expressed in 2011 USD. Source: Institut de la statistique du Québec. Converted from CAD to USD using a yearly average exchange rate of 0.989 CAD/USD (Source: bank of Canada).
- world gross domestic product 2011: 7e13 USD(2011); name worldGDP2011; lognormal variance with pedigree 0.0006, pedigree (1,1,1,1,1)
  World Gross domestic product for 2011, expressed in 2011 USD. Source: World Bank.

## Reference product
- potato grading: 1 kg; By-product classification allocatable product; CPC 86111: Post-harvest crop services
  production volume 5.97e8 kg
    The production volume is a 3-year-average from 2019 to 2021 for Quebec. It is assumed that the amount of produced potatoes equals to amount of graded potatoes. Source: Statistics Canada. Table 32-10-0358-01 Area, production and farm value of potatoes. Available (accessed 6/10/2023): https://doi.org/10.25318/3210035801-eng
  property price 0.000457916 EUR2005
    Calculated based on inputs: The price of the product has been calculated as a sum of the values of the material and energy inputs for this product. This value is therefore a rough estimation. It may underestimate the real price since there are additional expenses when producing any product. These expences can include for example labour costs, treatment of waste materials and profit for the producer. Please consider carefully whether this level of data quality is acceptable for your application.
  properties: carbon allocation 0 kg, carbon content 0

## Inputs from technosphere
- agricultural machinery, unspecified: 0.000216 kg; lognormal variance with pedigree 0.0426, pedigree (1,3,5,5,1)
- electricity, low voltage: 0.00102 kWh; lognormal variance with pedigree 0.0426, pedigree (1,3,5,5,1)
- shed: 1.09e-6 m2; lognormal variance with pedigree 0.3426, pedigree (1,3,5,5,1)

## Sampling procedure
Data based on the yearly published catalog of machine costs in Switzerland (FAT) and on information from machinery experts of the FAT.

## Extrapolations
The original data is for geography CH, which was extrapolated to GLO. This child dataset exchanges identical to GLO dataset. Created to enable linking to regional markets (e.g. for electricity). Data quality indicators adjusted accordingly.
