# planting with starter fertiliser or amendment, by subsoiler/v-ripper planter

Dataset: EcoSpold 2, unit process
Geography: US
Time period: 2021-01-01 to 2023-12-31
Technology level: current
Classification: ISIC rev.4 ecoinvent: 0161:Support activities for crop production
Scenario: Business-as-Usual
System model: Allocation, cut-off by classification
Generated by: Juanita Barrera
Database: ecoinvent
isCopyrightProtected: true
accessRestrictedTo: 1

## General comment
This dataset models the service of planting by a subsoiler/v-ripper planter, with starter fertiliser or amendment. The functional unit (FU) is one ha seeded and the operation time is 0.23 h/FU.

## Included activities start
The activity starts from the agricultural field foreseen to be processed.

## Included activities end
The dataset includes the diesel fuel consumption and the amount of agricultural machinery and of the shed, which has to be attributed to the seeding. Also taken into consideration is the amount of emissions to the air from combustion and the emission to the soil from tyre abrasion during the work process. The dataset doesn't include the seed, dust other than from combustion and noise. This activity ends with sowing, transfer back to the shed and uncoupling of the implement from the tractor.

## Geography
The inventory is extrapolated from the geography of Brazil. Data quality indicators are adjusted accordingly.

## Technology
Fuel consumption and emissions per kg diesel have been extrapolated to the US, but others inputs were taken from the original values.

## Reference product
- planting with starter fertiliser or amendment, by subsoiler/v-ripper planter: 1 ha; By-product classification allocatable product; CPC 86119: Other support services to crop production
  production volume 2.45374e8 ha
    Area of permanent meadows and pasture in the US, year 2020, according to the FAOSTAT data.
  property price 30.8202 EUR2005
    The price is from the year 2020. Price information has been directly provided by the data provider based on the following reference: University of Minnesota, Machinery cost estimates, W.F. Lazarus, 2020. The prices were adjusted for inflation relative to 2005 using the producer price index (PPI) of the euro area, published by eurostat (https://ec.europa.eu/eurostat/databrowser/view/STS_INPP_A__custom_6416181/default/table?lang=en, last accessed on 2023-06-01).
  properties: carbon allocation 0 kg, carbon content 0

## Inputs from technosphere
- agricultural machinery, unspecified: 0.0173 kg; lognormal variance with pedigree 0.3042, pedigree (1,4,2,5,1)
  proxy from "sowing, BR"
- diesel: 7.73758 kg; lognormal variance with pedigree 0.0028, pedigree (1,4,2,1,1)
  subsoiling used as a proxy - UMN Farm Machinery Economic Cost Estimation Spreadsheet (MACHDATA.XLSM) Lazarus, 2021
  properties: carbon content, fossil 0.865, dry mass 1 kg, heating value, net 42.8 MJ, wet mass 1 kg
- shed: 0.00205 m2; lognormal variance with pedigree 0.3042, pedigree (1,4,2,5,1)
  proxy from "sowing, BR"
- tractor, 4-wheel, agricultural: 0.144 kg; lognormal variance with pedigree 0.3042, pedigree (1,4,2,5,1)
  proxy from "sowing, BR"

## Emissions to nature
- Ammonia [air, non-urban air or from high stacks]: 0.000154752 kg; lognormal variance with pedigree 0.058325, pedigree (1,2,2,2,3)
  adapted from "sowing, BR" to match the diesel consumption
- Benzene [air, non-urban air or from high stacks]: 5.64843e-5 kg; lognormal variance with pedigree 0.058325, pedigree (1,2,2,2,3)
  adapted from "sowing, BR" to match the diesel consumption
- Benzo(a)pyrene [air, non-urban air or from high stacks]: 2.32127e-7 kg; lognormal variance with pedigree 0.658325, pedigree (1,2,2,2,3)
  adapted from "sowing, BR" to match the diesel consumption
- Cadmium II [air, non-urban air or from high stacks]: 7.73758e-8 kg; lognormal variance with pedigree 0.658325, pedigree (1,2,2,2,3)
  adapted from "sowing, BR" to match the diesel consumption
- Carbon dioxide, fossil [air, non-urban air or from high stacks]: 24.1412 kg; lognormal variance with pedigree 0.018325, pedigree (1,2,2,2,3)
  adapted from "sowing, BR" to match the diesel consumption
- Carbon monoxide, fossil [air, non-urban air or from high stacks]: 0.019963 kg; lognormal variance with pedigree 0.652225, pedigree (1,4,2,2,1)
  adapted from "sowing, BR" to match the diesel consumption
- Chromium III [air, non-urban air or from high stacks]: 3.86879e-7 kg; lognormal variance with pedigree 0.658325, pedigree (1,2,2,2,3)
  adapted from "sowing, BR" to match the diesel consumption
- Copper ion [air, non-urban air or from high stacks]: 1.31539e-5 kg; lognormal variance with pedigree 0.658325, pedigree (1,2,2,2,3)
  adapted from "sowing, BR" to match the diesel consumption
- Dinitrogen monoxide [air, non-urban air or from high stacks]: 0.000928509 kg; lognormal variance with pedigree 0.058325, pedigree (1,2,2,2,3)
  adapted from "sowing, BR" to match the diesel consumption
- Methane, fossil [air, non-urban air or from high stacks]: 0.000998148 kg; lognormal variance with pedigree 0.058325, pedigree (1,2,2,2,3)
  adapted from "sowing, BR" to match the diesel consumption
- NMVOC, non-methane volatile organic compounds [air, non-urban air or from high stacks]: 0.0181059 kg; lognormal variance with pedigree 0.042225, pedigree (1,4,2,2,1)
  adapted from "sowing, BR" to match the diesel consumption
- Nickel II [air, non-urban air or from high stacks]: 5.41631e-7 kg; lognormal variance with pedigree 0.658325, pedigree (1,2,2,2,3)
  adapted from "sowing, BR" to match the diesel consumption
- Nitrogen oxides [air, non-urban air or from high stacks]: 0.237544 kg; lognormal variance with pedigree 0.042225, pedigree (1,4,2,2,1)
  adapted from "sowing, BR" to match the diesel consumption
- PAH, polycyclic aromatic hydrocarbons [air, non-urban air or from high stacks]: 2.54566e-5 kg; lognormal variance with pedigree 0.318325, pedigree (1,2,2,2,3)
  adapted from "sowing, BR" to match the diesel consumption
- Particulate Matter, < 2.5 um [air, non-urban air or from high stacks]: 0.207367 kg; lognormal variance with pedigree 0.318325, pedigree (1,2,2,2,3)
  adapted from "sowing, BR" to match the diesel consumption
- Selenium IV [air, non-urban air or from high stacks]: 7.73758e-8 kg; lognormal variance with pedigree 0.058325, pedigree (1,2,2,2,3)
  adapted from "sowing, BR" to match the diesel consumption
- Sulfur dioxide [air, non-urban air or from high stacks]: 0.00781495 kg; lognormal variance with pedigree 0.018325, pedigree (1,2,2,2,3)
  adapted from "sowing, BR" to match the diesel consumption
- Zinc II [air, non-urban air or from high stacks]: 7.73758e-6 kg; lognormal variance with pedigree 0.658325, pedigree (1,2,2,2,3)
  adapted from "sowing, BR" to match the diesel consumption
- Cadmium II [soil, agricultural]: 3.19e-6 kg; lognormal variance with pedigree 0.0442, pedigree (1,4,2,5,1)
  proxy from "sowing, BR"
- Lead II [soil, agricultural]: 1.38e-5 kg; lognormal variance with pedigree 0.0442, pedigree (1,4,2,5,1)
  proxy from "sowing, BR"
- Zinc II [soil, agricultural]: 8.51e-5 kg; lognormal variance with pedigree 0.0442, pedigree (1,4,2,5,1)
  proxy from "sowing, BR"

## Extrapolations
The dataset is modeled for agricultural production system in US. Data Quality indicators are adjusted accordingly.
