# clay brick production, extruded

Dataset: EcoSpold 2, unit process
Geography: EC
Time period: 2022-01-01 to 2023-12-31
Technology level: current
Classification: ISIC rev.4 ecoinvent: 2392:Manufacture of clay building materials
Synonyms: Ziegel; clay; ladrillo; Ton; arcilla
Scenario: Business-as-Usual
System model: Allocation, cut-off by classification
Share of production covered: 60 %
Generated by: K.Flasher;E.Barros;J.Aguirre;S.Martines
Database: ecoinvent
isCopyrightProtected: true
accessRestrictedTo: 1

## General comment
This dataset describes the production of semi-mechanized clay bricks in the area of San José de Balzay and Racar in Ecuador. The dataset represents the production of 1 kg of brick, with the following characteristics: average weight of 6.06 kg and average dimensions of (19.5 x 38 x 12.5) cm (width x length x height), with 6 cavities of (4.75 x 5.25) cm. Data was obtained from measurements and information provided in the two factories visited, therefore the datasets contains weighted average values. Some data was calculated using literature values.
The companies visits took place in March, May, and June 2022. This dataset was developed by Estefania Barros, Kristi Padrón, Jonnathan Aguirre and Juan Sebastian Martines, under the supervision of Prof. Dolores Sucozhañay and Prof. Paul Vanegas, from the Inclusive Circular Economy and Sustainable Development Research Group of the University of Cuenca (ECI) in the frame of the CEELA (Strengthening capacities for energy efficiency in buildings in Latin America) project with the support of the Swiss Agency for Development and Cooperation (SDC).
The dataset includes the whole manufacturing process of the clay brick. It does not include the packaging.

## Included activities start
The activity starts with the reception of raw materials at the clay brick production site.

## Included activities end
This dataset ends with the storage of the produced brick at the production site. This dataset includes the reception of raw materials, dosing, mixing, forming by extrusion and cutting, drying, firing, cooling and storage. The dataset does not include the packaging.

## Geography
Data was obtained by technical visits and data assessment in two factories of modern clay bricks located in San José de Balzay and Racar, Cuenca, Ecuador.

## Technology
Current production technology. This dataset corresponds to semi-automatized factories, which incorporates some machinery in their processes. However, one of the factories only uses diesel in the machinery, while the second factory uses diesel and electricity. The manufacturing process includes the reception of raw materials, dosing, mixing, forming by extrusion, drying, firing of wood, cooling and storage of bricks until they are sold directly to the clients or to intermediaries. The mix of raw material is deposited in a mill, then moved to an extruder formed by a mixer and a matrix.

## Time period
The time period is from 2022 (year of data collection) to 2023 (year of dataset compilation).

## Parameters
- Carbon dioxide: 1.63 kg; name EF_CO2
  Emission factor in kg emission / kg wood fuel. Reference: Jaya Sucozhañay, J. L., & Gomezcoello Vásquez, J. L. (2012). Análisis comparativo de la contaminación atmosférica producida por la combustión en ladrilleras artesanales utilizando tres tipos de combustibles (Bachelor's thesis).
- Carbon monoxide: 0.0197 kg; name EF_CO
  (same comment as for Carbon dioxide)
- Nitrogen oxides: 0.00118 kg; name EF_NOx
  (same comment as for Carbon dioxide)
- PM10: 0.0157 kg; name EF_PM10
  (same comment as for Carbon dioxide)
- Sulfur dioxide: 0.00018 kg; name EF_SO2
  (same comment as for Carbon dioxide)
- Volatile organic compounds: 0.021 kg; name EF_VOC
  (same comment as for Carbon dioxide)

## Reference product
- clay brick: 1 kg; name clay_brick; By-product classification allocatable product; CPC 37310: Bricks, blocks, tiles and other ceramic goods of siliceous earths; HS2017 6901: Bricks, blocks, tiles and other ceramic goods of siliceous fossil meals (e.g. kieselguhr, tripolite or diatom[...]
  The dataset represents 1 kg of a hollow clay brick, with measured average dimensions (19.5 x 38 x 12.5) cm (width x length x height), with 6 cavities of (4.75 x 5.25) cm, and measured average mass of 6.06 kg.
  production volume 1.2672e9 kg; name clay_brick_PV; = 2000000000*(1-0.89)*5.76
    Calculated value. The clay brick mass multiplied by the number of bricks produced per year. Based on a study conducted by Swisscontact in Cuenca in 2016. In which they identified that 2E09 clay bricks are produced per year and that 89% of brick factories are considered artisanal (which produce clay brick moulded) and the rest semi-mechanized. The weight of the brick is 5.76 kg. References: Venegas, O. (2018). Evaluación de la energía contenida, emisiones de CO2 y material particulado en la fabricación del ladrillo semi-mecanizado tochano en cuenca, a través del análisis de ciclo de vida (ACV). [Master degree in Constructions, University of Cuenca]. https://dspace.ucuenca.edu.ec/bitstream/123456789/29319/1/MscArqAndr%C3%A9sVenegas.pdf
  property carbon content, fossil 0
    Made mainly from clay, sand and other aditives. All C contained in raw materials is emitted as CO2 ecoinvent v2.2 report 7, part IV
  property carbon content, non-fossil 0
    (same comment as for clay brick)
  property price 0.0271357 EUR2005
    Data provided by the owner of the factory. Price given as 0.0425 USD/kg clay brick, moulded and 0.068 USD/kg for clay brick, extruded. Both prices are for 2022. Weighted average of the prices based on the production volumes of both types of clay bricks was performed. The prices were converted to EUR based on the annual exchange rates published by the European Central Bank (https://sdw.ecb.europa.eu/quickview.do?SERIES_KEY=120.EXR.A.USD.EUR.SP00.A, last accessed on 2023-06-01) and adjusted for inflation relative to 2005 using the producer price index (PPI) of the euro area, published by eurostat (https://ec.europa.eu/eurostat/databrowser/view/STS_INPP_A__custom_6416181/default/table?lang=en, last accessed on 2023-06-01).
  properties: carbon allocation 0 kg, carbon content 0, dry mass 1 kg, water content 0, water in wet mass 0 kg, wet mass 1 kg

## Inputs from technosphere
- clay: 1.04646 kg; name clay_input; lognormal variance with pedigree 0.0026, pedigree (1,4,1,1,1)
  Calculated value. This value represents the amount of various types of clay used for the production of 1 kg of clay brick, according to measurements and the information provided by the owners of the factories. The types of clay used are "tierra amarilla", "tierra fina" and "tierra roja".
  property water in wet mass 0.035 kg; name WWM_clay
  properties: dry mass 0.965 kg, water content 0.0362694, wet mass 1 kg
- damaged clay material: -0.00983661 kg; name damaged_bricks; = (52*6.06)/32035.42; lognormal variance with pedigree 0.0026, pedigree (1,4,1,1,1)
  Calculated value. Multiplying the number of damaged bricks by the brick mass (6.06 kg). This value is divided by the kg of bricks produced per firing process, to obtain the kg of damaged bricks per kg of clay brick. About 52 bricks are damaged in the oven, for each firing process, as informed by the owner of one of the factories is considered. These bricks are used to fill holes in the ground. Therefore, the disposal is modelled as open dumping.
  production volume; = damaged_bricks/clay_brick*clay_brick_PV
    Calculated from the production volume of the reference product in proportion to the respective output amounts.
  properties: aluminium content 0.0743989, calcium content 0.00610902, carbon content, fossil 0.00190327, dry mass 1 kg, iron content 0.0388284, magnesium content 0.00801262, oxygen content 0.501572, potassium content 0.0127433, silicon content 0.352923, sodium content 0.00351, wet mass 1 kg
- diesel, burned in building machine: 0.106504 MJ; = 0.00297*35.86; lognormal variance with pedigree 0.0026, pedigree (1,4,1,1,1)
  Calculated value. Multiplying the volume of diesel per kg of brick (0.00297 L/kg) by the heating value of diesel (35.86 MJ/L). Diesel is used in the machinery and internal transport.
  properties: heating value, net 1 MJ
- electricity, medium voltage: 0.00258799 kWh; = (40/0.1)/154560; lognormal variance with pedigree 0.0026, pedigree (1,4,1,1,1)
  Calculated value. Monthly energy cost of the factory (40 USD/month) divided by the energy price (0.1 USD/kWh). This value is divided by the kg of bricks produced per month (154560 kg of bricks/month), to obtain the kWh of electricity per kg of clay brick. This value corresponds to the electricity used in the mill, a fan used for the firing process, and 4 lightbulbs used in the firing section of one of the factories.
- lubricating oil: 1.188e-5 kg; name lubricating_oil_input; = 1.35E-08*880; lognormal variance with pedigree 0.0026, pedigree (1,4,1,1,1)
  Calculated value. Volume of lubricating oil per kg of brick by the density of lubricating oil. Lubricating oil is used for the extruder machine. Maintenance is usually done every 3 months.
  properties: carbon content, fossil 0.75, dry mass 1 kg, heating value, net 40.2 MJ, wet mass 1 kg
  note on carbon content, fossil: Lubricating oil is produced from diesel. C-content/dry mass of fats and oils considered 75%, from: ecoinvent v2.2 report, n 15a, pg 40
  note on heating value, net: Literature value, Source: IPCC 2006, 2006 IPCC Guidelines for National Greenhouse Gas Inventories, Prepared by the National Greenhouse Gas Inventories Programme, Eggleston H.S., Buendia L., Miwa K., Ngara T. and Tanabe K. (eds). Published: IGES, Japan
- waste mineral oil: -1.188e-5 kg; name w_lubricating_oil; = lubricating_oil_input; lognormal variance with pedigree 0.0046, pedigree (3,4,1,1,1)
  It's assumed that the lubricating oil must be disposed of after use (the lubricating oil is used to lube the machinery and does not become part of the product). Therefore, same amount as lubricating oil input is used to model the waste.
  production volume; = w_lubricating_oil/clay_brick*clay_brick_PV
    (same comment as for damaged clay material)
  properties: carbon content, fossil 0.864444, dry mass 0.9 kg, heating value, net 34.7 MJ, water content 0.111111, wet mass 1 kg
  note on carbon content, fossil: Tab A.6, ecoinvent v2.2 report 13_I. C content has been calculated after data in the tables, and then referred to 1 kg DM
  note on heating value, net: Value taken from the general comment of the treatment dataset.
- water, harvested from rainwater: 0.423717 kg; name rainwater; = 0.000423717*1000; lognormal variance with pedigree 0.0026, pedigree (1,4,1,1,1)
  Calculated value. Water content used for the production process based on measurements and the information provided by the owners of the factories. Water used for the production of clay bricks is water obtained from the rain.
  properties: carbon content, fossil 0.0017899, dry mass 0.00034 kg, water content 2940.18, wet mass 1 kg
- wood ash mixture, pure: -0.0772792 kg; name wood_ash; = wood_fuel*WM_wood + O - (CO2 + CO + SO2 + NOx + VOC + PM10 + (wood_fuel*WWM_wood)); lognormal variance with pedigree 0.0046, pedigree (3,4,1,1,1)
  Calculated value. Calculated as the difference between the amount of inputs (wood fuel and oxygen) and outputs (CO2, CO, SO2, NOx, VOC, PM10 and water) from the firing process. Wood ash is produced from the combustion of wood during the firing process.
  production volume; = wood_ash/clay_brick*clay_brick_PV
    (same comment as for damaged clay material)
  properties: carbon content, non-fossil 0.012, dry mass 1 kg, wet mass 1 kg
- wood chips, wet, measured as dry mass: 0.15184 kg; name wood_fuel; = 0.000208*730; lognormal variance with pedigree 0.0026, pedigree (1,4,1,1,1)
  Calculated value. The value represents the amount of eucalyptus wood used in the firing process for the production of 1 kg of clay brick as informed by the owners of the factories. Multiplying the volume of wood per kg of bricks (0.000208 m3/kg of clay brick) by wood density (730 kg wood/m3).
  property water in wet mass 1.1 kg; name WWM_wood
  property wet mass 2.1 kg; name WM_wood
  properties: carbon content, non-fossil 0.494, dry mass 1 kg, heating value, net 10.84 MJ, water content 1.1
  note on heating value, net: Value based on the dataset 'softwood forestry, mixed species, sustainable forest management'

## Inputs from nature
- Occupation, bare area (non-use) [natural resource, land]: 0.00178386 m2*year; = 0.25*10^4/(1401451.885); lognormal variance with pedigree 0.0406, pedigree (1,3,1,1,1)
  Estimated for infrastructure. Land occupation calculated as the land occupied by the production facility (0.25 ha) divided by the average annual production volume at the two visited facilities (1'401'451.885 kg clay brick extruded/year).
- Oxygen [natural resource, in air]: 0.181709 kg; name O; = (32/44)*CO2+(16/28)*CO; lognormal variance with pedigree 0.0046, pedigree (3,4,1,1,1)
  Calculated value. Calculated from the total oxygen content of CO2 and CO.

## Emissions to nature
- Carbon dioxide, non-fossil [air, unspecified]: 0.247499 kg; name CO2; = wood_fuel*EF_CO2; lognormal variance with pedigree 0.0032, pedigree (2,4,1,1,1)
  Calculated value. Multiplying the kg of fuel (wood) per kg of clay brick by the emission factor of the pollutant (kg/kg). Based on literature calculations and information provided by the owners of the factories. Carbon dioxide emission is produced from the combustion of the firing process. Reference: Alvear, P., & Palomeque, R. (2017). Análisis del inventario del ciclo de vida del ladrillo utilizado en la ciudad de Cuenca: aspectos energéticos, medio ambientales, sociales, económicos y culturales. University of Cuenca, Cuenca, Ecuador (Bachelor's thesis).
- Carbon monoxide, non-fossil [air, unspecified]: 0.00299125 kg; name CO; = wood_fuel*EF_CO; lognormal variance with pedigree 0.6526, pedigree (2,4,1,1,1)
  Calculated value. Multiplying the kg of fuel (wood) per kg of clay brick by the emission factor of the pollutant (kg/kg). Based on literature calculations and information provided by the owners of the factories. Carbon monoxide emission is produced from combustion of wood during the firing process. Reference: Jaya Sucozhañay, J. L., & Gomezcoello Vásquez, J. L. (2012). Análisis comparativo de la contaminación atmosférica producida por la combustión en ladrilleras artesanales utilizando tres tipos de combustibles (Bachelor's thesis).
- NMVOC, non-methane volatile organic compounds [air, unspecified]: 0.00318864 kg; name VOC; = wood_fuel*EF_VOC; lognormal variance with pedigree 0.0426, pedigree (2,4,1,1,1)
  Calculated value. Multiplying the kg of fuel (wood) per kg of clay brick by the emission factor of the pollutant (kg/kg). Based on literature calculations and information provided by the owners of the factories. VOC emission is produced from combustion of wood during the firing process. Reference: Jaya Sucozhañay, J. L., & Gomezcoello Vásquez, J. L. (2012). Análisis comparativo de la contaminación atmosférica producida por la combustión en ladrilleras artesanales utilizando tres tipos de combustibles (Bachelor's thesis).
- Nitrogen oxides [air, unspecified]: 0.000179171 kg; name NOx; = wood_fuel*EF_NOx; lognormal variance with pedigree 0.0426, pedigree (2,4,1,1,1)
  Calculated value. Multiplying the kg of fuel (wood) per kg of clay brick by the emission factor of the pollutant (kg/kg). Based on literature calculations and information provided by the owners of the factories. Nitrogen oxides emission is produced from combustion of wood during the firing process. Reference: Jaya Sucozhañay, J. L., & Gomezcoello Vásquez, J. L. (2012). Análisis comparativo de la contaminación atmosférica producida por la combustión en ladrilleras artesanales utilizando tres tipos de combustibles (Bachelor's thesis).
- Particulate Matter, > 2.5 um and < 10um [air, unspecified]: 0.00238389 kg; name PM10; = wood_fuel*EF_PM10; lognormal variance with pedigree 0.1226, pedigree (2,4,1,1,1)
  Calculated value. Multiplying the kg of fuel (wood) per kg of clay brick by the emission factor of the pollutant (kg/kg). Based on literature calculations and information provided by the owners of the factories. Particulate matter emission is produced from combustion of wood during the firing process. PM10 emission is produced from combustion of wood during the firing process. Particulate matter is < 10 um. Reference: Jaya Sucozhañay, J. L., & Gomezcoello Vásquez, J. L. (2012). Análisis comparativo de la contaminación atmosférica producida por la combustión en ladrilleras artesanales utilizando tres tipos de combustibles (Bachelor's thesis).
- Sulfur dioxide [air, unspecified]: 2.73312e-5 kg; name SO2; = wood_fuel*EF_SO2; lognormal variance with pedigree 0.0032, pedigree (2,4,1,1,1)
  Calculated value. Multiplying the kg of fuel (wood) per kg of clay brick by the emission factor of the pollutant (kg/kg). Based on literature calculations and information provided by the owners of the factories. Sulfur dioxide emission is produced from combustion of wood during the firing process. Reference: Jaya Sucozhañay, J. L., & Gomezcoello Vásquez, J. L. (2012). Análisis comparativo de la contaminación atmosférica producida por la combustión en ladrilleras artesanales utilizando tres tipos de combustibles (Bachelor's thesis).
- Water [air, unspecified]: 0.000423921 m3; name water_to_air; = (wood_fuel*WWM_wood/1000) + ((5664.91-4209.61)/5664.91)/1000; lognormal variance with pedigree 0.042, pedigree (1,4,1,1,1)
  Calculated value. Evaporated water is produced during two processes: 1) Combustion process, where water in wet mass amount in the wood chips gets evaporated (calculated as wood_fuel*water_in_wet_mass/1000); and 2) Drying process of the bricks (weight of a just made brick and a fired brick are considered).
- Water [water, unspecified]: 0.000203446 m3; = (rainwater + clay_input*WWM_clay)/1000 - ((5664.91-4209.61)/5664.91)/1000; lognormal variance with pedigree 0.044, pedigree (3,4,1,1,1)
  Calculated value. The wastewater was modelled as the water difference between the amount of rainwater used in the process together with the water contained in the clay, and the water evaporated from the brick after the firing process. The water is captured in a hole in the ground, where the mixing takes place. Therefore, the excess water is infiltrated by the soil and follows a natural process, where it eventually reaches groundwater or a water body.

## Sampling procedure
Data gathered from two clay brick production plants through a process assessment in a technical visit. Azuay is the province where the factories from which data was obtained are located. This province represents 12% of the National Clay Brick Production in Ecuador, but the production process is very similar across Ecuador. Therefore, it is estimated that the dataset has a representativeness of 60%. Land occupation exchange is used as an estimate of infrastructure. Machinery use is accounted for through their fuel / electricity consumption.

## Extrapolations
Data are calculated as a weighted average between the data collected at the two clay brick production factories. One, where diesel is used and other where diesel and electricity is used. See exchange comments for further details.
