# gold production

Dataset: EcoSpold 2, unit process
Geography: AU
Time period: 2001-01-01 to 2023-12-31
Technology level: current
Classification: ISIC rev.4 ecoinvent: 0729:Mining of other non-ferrous metal ores
Tags: ConvertedDataset
Scenario: Business-as-Usual
System model: Allocation, cut-off by classification
Generated by: Matthias Tuchschmid (obsolete)
Published in: Classen M. 2009
Database: ecoinvent
isCopyrightProtected: true
accessRestrictedTo: 1

## General comment
This dataset describes the production of 1 kg of gold. Data was taken from the 2005 Environmental report of Newmont for the Kalgoorlie, Jundee, Tanami and Pajingo Mines - all of which produce only gold-. Data for reference flows, by products and most exchanges was calculated by piling up the corresponding inputs and outputs of each mine, and then scaling them to the production of 1 kg of gold. Tanami and Pajingo are underground mines; Kalgoorlie is open pit; and Jundee is both open pit and underground.
[This dataset was already contained in the ecoinvent database version 2. It was not individually updated during the transfer to ecoinvent version 3. Life Cycle Impact Assessment results may still have changed, as they are affected by changes in the supply chain, i.e. in other datasets. This dataset was generated following the ecoinvent quality guidelines for version 2. It may have been subject to central changes described in the ecoinvent version 3 change report (http://www.ecoinvent.org/database/ecoinvent-version-3/reports-of-changes/), and the results of the central updates were reviewed extensively. The changes added e.g. consistent water flows and other information throughout the database. The documentation of this dataset can be found in the ecoinvent reports of version 2, which are still available via the ecoinvent website. The change report linked above covers all central changes that were made during the conversion process.]

## Included activities start
From the transport of raw materials to the mine.

## Included activities end
This activity ends with the Wohlwill electrolysis of gold.

This data set includes the mining and beneficiation of the metals, the smelting, the energy, materials and land consumption, and the air and water emissions.

This dataset does not include the emissions from the refining step.

## Geography
the electricity mix has been estimated

## Technology
OPEN PIT MINING:
The ore is mined in four steps: drilling, blasting, loading and hauling. In the case of a surface mine, a pattern of holes is drilled in the pit and filled with explosives. The explosives are detonated in order to break up the ground so large shovels or front-end loaders can load it into haul trucks.
UNDERGROUND MINING:
Some ore bodies are more economically mined underground. In this case, a tunnel called an adit or a shaft is dug into the earth. Sort tunnels leading from the adit or shaft, called stopes, are dug to access the ore. The surface containing the ore, called a face, is drilled and loaded with explosives. Following blasting, the broken ore is loaded onto electric trucks and taken to the surface. Once mining is completed in a particular stope, it is backfilled with a cement compound.
ORE AND WASTE HAULAGE:
The haul trucks transport the ore to various areas for processing. The grade and type of ore determine the processing method used. Higher-grade ores are taken to a mill. Lower grade ores are taken to leach pads. Some ores may be stockpiled for later processing.
LEACHING:
The ore is crushed or placed directly on lined leach pads where a dilute cyanide solution is applied to the surface of the heap. The solution percolates down through the ore, where it leaches the gold and flows to a central collection location. The solution is recovered in this closed system. The pregnant leach solution is fed to electrowinning cells and undergoes the same steps as described below from Electro-winning.
ORE PROCESSING:
Milling: The ore is fed into a series of grinding mills where steel balls grind the ore to a fine slurry or powder.
Oxidization and leaching: Some types of ore require further processing before gold is recovered. In this case, the slurry is pressure-oxidized in an autoclave before going to the leaching tanks or a dry powder is fed through a roaster in which it is oxidized using heat before being sent to the leaching tanks as a slurry. The slurry is thickened and runs through a series of leaching tanks. The gold in the slurry adheres to carbon in the tanks.
Stripping: The carbon is then moved into a stripping vessel where the gold is removed from the carbon by pumping a hot caustic solution through the carbon. The carbon is later recycled.
Electro-winning: The gold-bearing solution is pumped through electro-winning cells or through a zinc precipitation circuit where the gold is recovered from the solution.
Smelting: The gold is then melted in a furnace at about 1’064°C and poured into moulds, creating doré bars. Doré bars are unrefined gold bullion bars containing between 60% and 95% gold.
REFINING:
Wohlwill electrolysis. It is assumed that the gold doré-bars from both mines undergo the treatment of Wohlwill electrolysis. This process uses an electrolyte containing 2.5 mol/l of HCl and 2 mol/l of HAuCl4 acid. Electrolysis is carried out with agitation at 65 – 75 °C. The raw gold is intro-duced as cast anode plates. The cathodes, on which the pure gold is deposited, were for many years made of fine gold of 0.25 mm thickness. These have now largely been replaced by sheet titanium or tantalum cathodes, from which the thick layer of fine gold can be peeled off. In a typical electrolysis cell, gold anodes weighing 12 kg and having dimensions 280×230×12 mm (0.138 m2 surface) are used. Opposite to them are conductively connected cathode plates, arranged by two or three on a support rail. One cell normally contains five or six cathode units and four or five anodes. The maximum cell voltage [V] is 1.5 V and the maximum anodic current density [A] 1500 A/m2. The South African Rand refinery gives a specific gold production rate of 0.2 kg per hour Wohlwill electrolysis. Assuming a current efficiency of 95% the energy consumption is [V] x [A] / 0.2 [kg/h] = 1.63 kWh per kg gold refined. No emissions are assumed because of the purity and the high value of the material processed. The resulting sludge contains the PGM present in the electric scrap and is sold for further processing.
WATER EMISSIONS:
Water effluents are discharged into rivers.
REFERENCES:
Newmont (2004) How gold is mined. Newmont. Retrieved from http://www.newmont.com/en/gold/howmined/index.asp
Renner H., Schlamp G., Hollmann D., Lüschow H. M., Rothaut J., Knödler A., Hecht C., Schlott M., Drieselmann R., Peter C. and Schiele R. (2002) Gold, Gold Alloys, and Gold Compounds. In: Ullmann's Encyclopedia of Industrial Chemistry. Online version, posting date: September 15, 2000 Edition. Wiley-Interscience, Online-Version under: http://dx.doi.org/10.1002/14356007.a12_
499.
Auerswald D. A. and Radcliffe P. H. (2005) Process technology development at Rand Refinery. In: Minerals Engineering, 18(8), pp. 748-753, Online-Version under: http://dx.doi.org/10.1016/j.mineng.2005.03.011.

## Time period
Period of public environmental report

## Parameters
- fraction, process water, to air: 0.15 dimensionless; name fraction_PW_to_air; lognormal variance with pedigree 0.092025, pedigree (4,4,3,2,4)
  Literature value. In case when no industry/process specific data are available, default evaporation fraction value is used. This value is 15% and is based on literature (Statistics Canada, 2007 & Shaffer, K.H., 2008, Consumptive water use in the Great Lakes Basin, USGS & Shiklomanov, 2003, World Water Resources at the Beginning of the 21st Century) and has been approved by an expert.

## Reference product
- gold: 1 kg; name RP_amount; By-product classification allocatable product; CPC 41320: Gold (including gold plated with platinum), unwrought or in semi-manufactured forms, or in powder form; HS2017 710812: Metals; gold, non-monetary, unwrought (but not powder); CAS 7440-57-5
  Gold is considered a precious metal because of its rarity and corrosion resistance. Gold is often mined together with silver in polymetallic mines. Apart from copper, Gold is the only metallic element with a color different from a grey tone. It is a soft yellow metal with a moderately high melting point (1064°C) and a high electrical and thermal conductivity exceeded only among the elements by silver and copper. It is the most malleable and ductile of the metals. One ounce of gold can be beaten in to foil some 300 square feet in area.
  Uses: Gold is used mainly for jewellery, electronics and other industrial and decorative appliances. In electric/electronic devices, it is mostly used as connector or as solder paste (Goosey & Kellner, 2002). The latter one is typically a gold alloy incorporating Si (98%Au, 2%Si), Ge (87.5%Au, 12.5%Ge), In (82%Au, 18%In) or Sn (80%Au, 20%Sn).
  production volume 290000 kg; name RP_PV
    Source: USGS Minerals Yearbook 2016. Available from: https://www.usgs.gov/centers/nmic/gold-statistics-and-information (downloaded 02 July 2019), Table 8.
  property price 25128.4 EUR2005
    Price calculated as 5-year market average (2015-2019; USD/kg; USGS [2020]) and converted to EUR2005 (USD2019/EUR2005 exchange rate: 0.62; Official Data Foundation [2020] and Macrotrends [2020]).
    References:
    Official Data Foundation (2020). Inflation Calculator [Online]. Available from: https://www.officialdata.org/us/inflation/2005?endYear=2019&amount=1 [Accessed 28/07/2020]
    USGS (2020). Mineral Commodity Summaries 2020 [Online]. Available from: https://pubs.usgs.gov/periodicals/mcs2020/mcs2020.pdf [Accessed 28/07/2020]
    Macrotrends (2020). Euro Dollar Exchange Rate (EUR USD) - Historical Chart [Online]. Available from: https://www.macrotrends.net/2548/euro-dollar-exchange-rate-historical-chart [Accessed 28/07/2020]
  properties: carbon allocation 0 kg, carbon content 0, carbon content, fossil 0, carbon content, non-fossil 0, dry mass 1 kg, water content 0, water in wet mass 0 kg, wet mass 1 kg

## Inputs from technosphere
- blasting: 383.59 kg; source Newmont 2005; lognormal variance with pedigree 0.0426, pedigree (1,3,5,5,1)
  Calculated value.
  Estimation: This is partly ANFO explosives.
  Uncertainty: E
- charcoal: 16.968 kg; source Newmont 2005; lognormal variance with pedigree 0.042625, pedigree (3,3,5,2,1)
  Calculated value: Data was obtained from Stewart, 1999, scaled by milled ore.
  Further references:
  Stewart M. (1999) Environmental Life Cycle Considerations for Design-Related Decision Making in Minerals Processing. PhD Thesis. University of Cape Town, Cape Town.
  Uncertainty: C
  properties: carbon content, non-fossil 0.8, dry mass 1 kg, heating value, net 28.4 MJ, wet mass 1 kg
  note on heating value, net: Indicative value. Reference: Fuels - Higher and Lower Calorific Values, available at: https://www.engineeringtoolbox.com/fuels-higher-calorific-values-d_169.html
- diesel, burned in building machine: 71768 MJ; source Newmont 2005; lognormal variance with pedigree 0.044025, pedigree (3,4,5,2,1)
  Calculated value.
  Uncertainty: E
  properties: heating value, net 1 MJ
- diesel, burned in diesel-electric generating set, 10MW: 1215.8 MJ; source Newmont 2005; lognormal variance with pedigree 0.044025, pedigree (3,4,5,2,1)
  Calculated value.
  Uncertainty: E
  properties: heating value, net 1 MJ
- electricity, medium voltage: 6124.1 kWh; source Newmont 2005; lognormal variance with pedigree 0.064, pedigree (3,4,5,5,3)
  Calculated value: Total electricity consumption was obtained by adding electricity consumption of the mining and refining steps (see source).
  Uncertainty: E
- heat, district or industrial, natural gas: 7709.06 MJ; source Newmont 2005; lognormal variance with pedigree 0.044025, pedigree (3,4,5,2,1)
  Calculated value.
  Uncertainty: E
  properties: heating value, net 1 MJ
- heat, district or industrial, other than natural gas: 1181.89 MJ; source Newmont 2005; lognormal variance with pedigree 0.044025, pedigree (3,4,5,2,1)
  Calculated value.
  Uncertainty: E
  property corresponding fuel use, propane, furnace >100kW 0 MJ; name fuel_use
  properties: heating value, net 1 MJ
  note on corresponding fuel use, propane, furnace >100kW: Lower heating value of the fuel input related to the heat/electricity output, taken directly from ecoinvent v3.0 dataset 'heat production, natural gas, at industrial furnace >100kW, GLO 2000'.
- hydrochloric acid, without water, in 30% solution state: 23.224 kg; source Newmont 2005; lognormal variance with pedigree 0.0427, pedigree (3,3,5,3,1)
  Calculated value.
  Estimation: Acid consumption is 50% sulfuric acid, and 50% hydrochloric acid.
  Uncertainty: E
  properties: dry mass 1 kg, heating value, net 3.32 MJ, wet mass 1 kg
- lime, packed: 1354.7 kg; source Newmont 2005; lognormal variance with pedigree 0.0446, pedigree (3,3,5,5,1)
  Calculated value.
  Uncertainty: E
  properties: carbon content, fossil 0.117492, dry mass 0.998 kg, water content 0.00200401, wet mass 1 kg
  note on carbon content, fossil: Table 3.1, ecoinvent v2.2 report 7, part VII, pg 3. MW CaCO3=100, MW MgCO3=84
- mine infrastructure, gold: 3.4843e-7 unit; lognormal variance with pedigree 0.3586, pedigree (1,3,5,1,3)
  Estimation from dataset author.;activityLink introduced to establish a direct link to the corresponding regional supply of this product
  Uncertainty: A
- precious metal refinery: 1.6461e-7 unit; lognormal variance with pedigree 0.3586, pedigree (1,3,5,1,3)
  Estimation from dataset author.
  Proxy: Refinery infrastructure is approximated with 'precious metal refinery'.
  Uncertainty: A
- sodium cyanide: 93.759 kg; source Newmont 2005; lognormal variance with pedigree 0.0427, pedigree (3,3,5,3,1)
  Calculated value.
  Proxy: Cyanide is approximated with 'sodium cyanide'.
  Uncertainty: E
  properties: carbon content, fossil 0.244898, dry mass 1 kg, heating value, net 7.43 MJ, wet mass 1 kg
- sodium hydroxide, without water, in 50% solution state: 114.39 kg; source Newmont 2005; lognormal variance with pedigree 0.0427, pedigree (3,3,5,3,1)
  Calculated value.
  Proxy: Caustic is approximated with 'sodium hydroxide, without water, in 50% solution state'.
  Uncertainty: E
  properties: dry mass 1 kg, heating value, net 3.03 MJ, wet mass 1 kg
- sulfidic tailings, from gold mine operation: -2.0639e6 kg; name sulfidic_tailings_amount; source Classen M. 2009; lognormal variance with pedigree 0.002625, pedigree (3,3,1,2,1)
  Estimation: Amount was estimated from data for Papua New Guinea mining.
  Proxy: Disposal is approximated with 'sulfidic tailing, off-site'.
  Uncertainty: E
  production volume; = ABS(sulfidic_tailings_amount/RP_amount)*RP_PV
    Calculated from the production volume of gold in proportion to the respective output amounts.
  properties: aluminium content 0.017079, calcium content 0.0037589, carbon content, fossil 0.0087785, dry mass 0.7 kg, iron content 0.014628, magnesium content 0.0020127, oxygen content 0.88758, potassium content 0.0031243, silicon content 0.056714, sodium content 0.0014916, water content 0.428571, wet mass 1 kg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
- sulfuric acid: 23.224 kg; source Newmont 2005; lognormal variance with pedigree 0.0427, pedigree (3,3,5,3,1)
  (same comment as for hydrochloric acid, without water, in 30% solution state)
  properties: dry mass 1 kg, wet mass 1 kg
- zinc: 2.8946 kg; source Newmont 2005; lognormal variance with pedigree 0.0427, pedigree (3,3,5,3,1)
  (same comment as for charcoal)
  properties: dry mass 1 kg, wet mass 1 kg

## Inputs from nature
- Gold [natural resource, in ground]: 1.087 kg; source Newmont 2005; lognormal variance with pedigree 0.0426, pedigree (3,3,5,1,1)
  0.49 ppm Au in ore; Calculated value: The recovery rate (proportion of valuable material physically recovered in the processing of ore) is taken into account in order to define the resource extraction.
  Uncertainty: E
- Water, river [natural resource, in water]: 109.31 m3; name water_river_input; source Newmont 2005; lognormal variance with pedigree 0.0426, pedigree (3,3,5,1,1)
  Calculated value.
  Uncertainty: E
- Water, well, in ground [natural resource, in water]: 81.248 m3; name water_well_in_ground_input; source Newmont 2005; lognormal variance with pedigree 0.0426, pedigree (3,3,5,1,1)
  Calculated value.
  Uncertainty: E

## Emissions to nature
- Antimony ion [air, non-urban air or from high stacks]: 0.0022311 kg; source Newmont 2005; lognormal variance with pedigree 0.694, pedigree (3,4,5,1,1)
  Calculated value.
  Estimation: Data for Pajingo Mine was estimated with data for Kalgoorlie.
  Uncertainty: E
- Arsenic ion [air, non-urban air or from high stacks]: 0.10241 kg; source Newmont 2005; lognormal variance with pedigree 0.6926, pedigree (3,3,5,1,1)
  Calculated value.
  Uncertainty: E
- Beryllium II [air, non-urban air or from high stacks]: 0.0060051 kg; source Newmont 2005; lognormal variance with pedigree 0.6946, pedigree (3,3,5,5,1)
  (same comment as for Antimony ion)
- Cadmium II [air, non-urban air or from high stacks]: 0.00031815 kg; source Newmont 2005; lognormal variance with pedigree 0.6946, pedigree (3,3,5,5,1)
  (same comment as for Antimony ion)
- Carbon dioxide, fossil [air, non-urban air or from high stacks]: 61.374 kg; source Newmont 2005; lognormal variance with pedigree 0.0426, pedigree (3,3,5,1,1)
  Calculated value: CO2 emissions from explosives are calculated with the factor of 0.16 kg CO2 per kg explosive.
  Uncertainty: E
- Chromium III [air, non-urban air or from high stacks]: 0.051996 kg; source Newmont 2005; lognormal variance with pedigree 0.6946, pedigree (3,3,5,5,1)
  Calculated value.
  Uncertainty: E
- Cobalt II [air, non-urban air or from high stacks]: 0.0090085 kg; source Newmont 2005; lognormal variance with pedigree 0.6946, pedigree (3,3,5,5,1)
  Calculated value.
  Uncertainty: E
- Lead II [air, non-urban air or from high stacks]: 0.0025287 kg; source Newmont 2005; lognormal variance with pedigree 0.6926, pedigree (3,3,5,1,1)
  Calculated value.
  Uncertainty: E
- Manganese II [air, non-urban air or from high stacks]: 0.28163 kg; source Newmont 2005; lognormal variance with pedigree 0.6946, pedigree (3,3,5,5,1)
  Calculated value.
  Uncertainty: E
- Mercury II [air, non-urban air or from high stacks]: 0.14493 kg; source Newmont 2005; lognormal variance with pedigree 0.6926, pedigree (3,3,5,1,1)
  Calculated value.
  Uncertainty: E
- Selenium IV [air, non-urban air or from high stacks]: 0.16548 kg; lognormal variance with pedigree 0.6946, pedigree (3,3,5,5,1)
  Calculated value.
  Estimation: Data for Pajingo and Jundee Mines was estimated with data for Kalgoorlie.
  Uncertainty: E
- Water [air, unspecified]: 28.5837 m3; name water_to_air_unspecified; = (water_river_input*fraction_PW_to_air)+(water_well_in_ground_input*fraction_PW_to_air); lognormal variance with pedigree 0.0807, pedigree (2,2,5,1,1)
  Calculated value based on literature values and expert opinion. See comments in the parametres' comment field.
  property fraction, origin: fresh water 1; name fraction_origin_fresh_water
  property fraction, origin: salt water 0; name fraction_origin_salt_water
  property fraction, origin: unspecified 0; name fraction_origin_unspecified
- Arsenic ion [water, surface water]: 0.057558 kg; source Newmont 2005; lognormal variance with pedigree 0.712, pedigree (3,4,5,1,3)
  Calculated value: Amount was obtained from data for Granny Smith Mine, scaled by milled ore.
  Further references:
  Placer Dome Inc. (2003a) Annual report 2002. Placer Dome Inc., Vancouver.
  Uncertainty: E
- Cadmium II [water, surface water]: 0.025918 kg; source Newmont 2005; lognormal variance with pedigree 0.362, pedigree (3,4,5,1,3)
  Calculated value: Amount was obtained from data for Henty Mine, scaled by milled ore.
  Further references:
  Placer Dome Inc. (2003a) Annual report 2002. Placer Dome Inc., Vancouver.
  Uncertainty: E
- Copper ion [water, surface water]: 0.47037 kg; source Newmont 2005; lognormal variance with pedigree 0.362, pedigree (3,4,5,1,3)
  (same comment as for Cadmium II)
- Cyanide [water, surface water]: 0.76795 kg; source Newmont 2005; lognormal variance with pedigree 0.362, pedigree (3,4,5,1,3)
  (same comment as for Cadmium II)
- Lead II [water, surface water]: 1.5839 kg; source Newmont 2005; lognormal variance with pedigree 0.712, pedigree (3,4,5,1,3)
  (same comment as for Cadmium II)
- Mercury II [water, surface water]: 0.028798 kg; source Newmont 2005; lognormal variance with pedigree 0.712, pedigree (3,4,5,1,3)
  (same comment as for Cadmium II)
- Nickel II [water, surface water]: 0.25918 kg; source Newmont 2005; lognormal variance with pedigree 0.712, pedigree (3,4,5,1,3)
  (same comment as for Cadmium II)
- Water [water, unspecified]: 161.974 m3; name water_to_water_unspecified; = water_river_input*(1-fraction_PW_to_air)+water_well_in_ground_input*(1-fraction_PW_to_air); lognormal variance with pedigree 0.0807, pedigree (2,2,5,1,1)
  (same comment as for Water)
  property carbon content, fossil 0; name C_content_fossil
  property carbon content, non-fossil 0; name C_content_non_fossil
  property dry mass 0 kg; name DM
  property fraction, origin: fresh water 1; name fraction_origin_fresh_water_Ww
  property fraction, origin: salt water 0; name fraction_origin_salt_water_Ww
  property fraction, origin: unspecified 0; name fraction_origin_unspecified_Ww
  property water in wet mass 1000 kg; name WWM
  property wet mass 1000 kg; name WM
- Zinc II [water, surface water]: 2.8798 kg; source Newmont 2005; lognormal variance with pedigree 0.7106, pedigree (3,3,5,1,3)
  (same comment as for Cadmium II)

## Sampling procedure
environmental report

## Extrapolations
Material requirements for gold concentration are estimated with older data from an Australian thesis, several values are scaled from one mine
