# flyash brick production

Dataset: EcoSpold 2, unit process
Geography: RoW
Time period: 2014-04-01 to 2023-12-31
Technology level: current
Classification: EcoSpold01Categories: construction materials/bricks
Classification: ISIC rev.4 ecoinvent: 2395:Manufacture of articles of concrete, cement and plaster
Tags: combined production
Scenario: Business-as-Usual
System model: Allocation, cut-off by classification
Generated by: Parag Mundada
Published in: Kiran Ananth P. V. 2017
Database: ecoinvent
isCopyrightProtected: true
accessRestrictedTo: 1

## General comment
Thi dataset is extrapolated from the IN corresponding dataset. Pulverized fuel ash-lime bricks are obtained from materials consisting of pulverized fuel ash in major quantity, lime and an accelerator acting as a catalyst. Pulverized fuel ash-lime bricks are generally manufactured by intergrading blending various raw materials are then moulded into bricks and subjected to curing cycles at different temperatures and pressures. These bricks are suitable for use in masonry construction just like common burnt clay bricks.

## Included activities start
Activities start with reception of raw material at manufacturing units.

## Included activities end
Activity includes the whole manufacturing process to produce flyash bricks (raw material provision, raw material mixing, pressing, curing, drying and dispatch), transports to plant, and infrastructure. No material/energy requirement for administration are included.

## Geography
Data represents for southern part of India,

## Technology
Fly ash, Lime, Gypsum and Sand are manually feed into a pan mixer where water is added to the required proportion for homogeneous mixing. The proportion of raw material may vary depending upon quality of raw materials. After mixing, the mixture are allowed to belt conveyor through feed in to automatic brick making machine were the bricks are pressed automatically. Then the bricks are placed on wooden pallets and kept as it is for two days thereafter transported to open area where they are water cured for 10 -15 days. The bricks are sorted and tested before dispatch.

## Time period
Data available for these period.

## Reference product
- flyash brick: 1 kg; name brick; By-product classification allocatable product; CPC 3731: Bricks, blocks, tiles and other ceramic goods of siliceous earths; HS2017 690100: Bricks, blocks, tiles and other ceramic goods of siliceous fossil meals (e.g. kieselguhr, tripolite or diat[...]
  production volume 2.90718e10 kg; = (12.0216E+9/2)/0.7778/0.21
    Estimated value. According to Basu et al. (2009) India is the main producer of fly ash followed by China and USA, but India uses only 38% of the fly ash produced. Based on the countries reported and the percentage utilization, it is estimated that India is responsible for 21% of global fly ash produced and reutilised. The global production volume is scaled based on this value and the calculated production volume for India. Utilization of flyash for manufacturing bricks and tiles in India is 12.0216 million tonnes. It is assumed that 50% is utilized for manufacturing of the flyash bricks. Amount of flyash required for manufacturing bricks is 0.777. Ref- <http://cea.nic.in/reports/others/thermal/tcd/flyash_final_1415.pdf>
    Source: Basu et al. 2009 “Potential fly-ash utilization in agriculture: A global review” Progress in Natural Science. Volume 19, Issue 10, 10 October 2009, Pages 1173-1186
  property price 0.083 EUR2005
    Price assumed to be equal to the price of cla and light clay brick.
  properties: carbon allocation 0 kg, carbon content 0, carbon content, fossil 0, carbon content, non-fossil 0, dry mass 1 kg, water content 0, water in wet mass 0 kg, wet mass 1 kg

## Inputs from technosphere
- brick production facility: 1.99133e-10 unit; = 1.99132776757222E-10*brick; lognormal variance with pedigree 0.1766, pedigree (4,3,5,5,5)
  Data referred from ecoinvent dataset of shale brick production, GLO. (accessed 20170823)
  properties: capacity [kg] 6.6957e7 kg, lifetime 75 year, lifetime capacity [kg] 5.02178e9 kg
  note on capacity [kg]: Measured value based on sales of brick for the dataset brick shale production, Québec (source: questionnaire). Represent the real capacity of the facility.
  note on lifetime: Estimation of infrastructure lifetime based on personnal communication with the brick producer (dataset brick shale production, Québec).
- chemical, inorganic: 7.654e-5 kg; = 0.00007654*brick; lognormal variance with pedigree 0.0132, pedigree (2,5,3,5,1)
  Data referred from ecoinvent dataset of shale brick production, GLO. (accessed 20170823)
  properties: carbon content, fossil 0.003, dry mass 1 kg, wet mass 1 kg
  note on carbon content, fossil: This dataset is an unweighted average of 20 inorganic substances (listed in Tab 88.1, ecoinvent v2.2 report 8, part II), being part of the top100 chemicals included in this database. The C-content has also been calculated as an unweighted average of the C content of the substances composing this dataset.
- chemical, organic: 0.0005689 kg; = 0.0005689*brick; lognormal variance with pedigree 0.0132, pedigree (2,5,3,5,1)
  Data referred from ecoinvent dataset of shale brick production, GLO. (accessed 20170823)
  properties: carbon content, fossil 0.628, dry mass 1 kg, heating value, net 19.03 MJ, wet mass 1 kg
  note on carbon content, fossil: This dataset is an unweighted average of 20 organic substances (listed in Tab 88.1, ecoinvent v2.2 report 8, part II), being part of the top100 chemicals included in this database. The C-content has also been calculated as an unweighted average of the C content of the substances composing this dataset.
- conveyor belt: 0.000483 m; = 0.000483*brick; lognormal variance with pedigree 0.098, pedigree (4,4,5,5,4)
  Expert judgement.
- electricity, medium voltage: 1.03329e-5, 9.19026e-7, 8.01291e-5, 0.000105001, 0.000111197, 5.66382e-5, 7.8226e-6, 4.95113e-5, 2.09e-6, 0.000334619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 kWh (47 suppliers, which the file names only by identifier); sum of these 0.011346 kWh; = 0.011346*brick; lognormal variance with pedigree 0.062, pedigree (4,4,5,5,1)
  CII Green Pro Assesment project report on production of flyash bricks.
  EcoSpold01Location=CH
- gypsum, mineral: 0.0496626, 0.000104521, 0.000232873 kg (3 suppliers, which the file names only by identifier); sum of these 0.05 kg; = 0.05*brick; lognormal variance with pedigree 0.058, pedigree (4,4,5,5,1)
  CII Green Pro Assesment project report on production of flyash bricks.
  properties: dry mass 1 kg, wet mass 1 kg
- lime, packed: 0.0330592, 0.000841689, 0.0660991 kg (3 suppliers, which the file names only by identifier); sum of these 0.1 kg; = 0.1*brick; lognormal variance with pedigree 0.062, pedigree (4,4,5,5,1)
  (same comment as for electricity, medium voltage)
  properties: carbon content, fossil 0.117492, dry mass 0.998 kg, water content 0.00200401, wet mass 1 kg
  note on carbon content, fossil: Table 3.1, ecoinvent v2.2 report 7, part VII, pg 3. MW CaCO3=100, MW MgCO3=84
- sand: 0.00226971, 2.71757e-5, 0.147703 kg (3 suppliers, which the file names only by identifier); sum of these 0.15 kg; = 0.15*brick+ash*0; lognormal variance with pedigree 0.062, pedigree (4,4,5,5,1)
  EcoSpold01Location=CH
  CII Green Pro Assesment project report on production of flyash bricks.
  properties: dry mass 1 kg, wet mass 1 kg
- solvent, organic: 1.1472e-5 kg; = 0.000011472*brick; lognormal variance with pedigree 0.0526, pedigree (5,5,3,5,1)
  Data referred from ecoinvent dataset of shale brick production, GLO. (accessed 20170823)
  properties: carbon content, fossil 0.63072, dry mass 1 kg, heating value, net 19.11 MJ, wet mass 1 kg
- tap water: 0.000639131, 0.000974301, 0.001818, 0.00489755, 0.000589533, 0.281144, 0.209937 kg (7 suppliers, which the file names only by identifier); sum of these 0.5 kg; = 0.5*brick; source Cordes R. 1996; lognormal variance with pedigree 0.102, pedigree (4,4,5,5,4)
  Expert judgement.
  EcoSpold01Location=RER
  properties: carbon content, fossil 0.00178991, dry mass 0.000337476 kg, water content 2962.17, wet mass 1 kg
  note on carbon content, fossil: Bicarbonate content is 2.93 mol/m3. CO2 content is 0.1 mol/m3 (ecoinvent v2.2 report 8, Tab 93.1).

## Emissions to nature
- Water [air, unspecified]: 0.0005 m3; name water_to_air_unspecified; = 0.0005*brick; lognormal variance with pedigree 0.0447, pedigree (2,2,3,5,1)
  Calculated value based on literature values and expert opinion. See comments in the parametres' comment field. Exchange calculated as: ABS(tap_water_input)/1000

## Sampling procedure
Literature

## Extrapolations
Extrapolated from the IN geography. Data represents laterite mining operation in Madhya Pradesh. Data represents for certain part of India. The uncertainty has been adjusted accordingly.
