# treatment of waste glass, municipal incineration

Dataset: EcoSpold 2, unit process
Geography: GLO
Time period: 2006-01-01 to 2023-12-31
Technology level: current
Classification: ISIC rev.4 ecoinvent: 3821:Treatment and disposal of non-hazardous waste
Scenario: Business-as-Usual
System model: Allocation, cut-off by classification
Generated by: Mattia Clementi
Database: ecoinvent
isCopyrightProtected: true
accessRestrictedTo: 1

## General comment
The process represents the treatment of 'waste glass' in a municipal solid waste incinerator (MSWI). Recommended use of this dataset: for disposal of glass which goes to incineration as part of a larger item or in small amounts only, as part of communal waste mixture eg. packaging glass. Larger separated amounts of glass fractions will not be disposed in incinerators, but rather go to recycling or landfill. Inventoried waste consists of fraction: 100% Glass; .Waste composition (wet, in ppmw): gross heating value 0.1423 MJ/kg; net heating value 0.04602 MJ/kg; H2O 20000; O 483070; H na; C na; S na; N na; P na; B na; Cl 195.89; Br na; F na; I na; Ag na; As na; Ba na; Cd na; Co na; Cr 303.63; Cu 7.8356; Hg na; Mn na; Mo na; Ni na; Pb 38.688; Sb na; Se na; Sn na; V na; Zn 3.9178; Be na; Sc na; Sr na; Ti na; Tl na; W na; Si 359090; Fe na; Ca 72818; Al na; K na; Mg na; Na 64472.Share of carbon in initial waste input that is biogenic 61.4%.Share of metals in waste not oxidised and bulk-recyclable (exclude very small or thin parts) Iron: 0%; Alu: 0%; Copper: 0%. Recovery of metal scrap from bottom ash to recycling: 0g iron scrap, 0g aluminium scrap, 0g copper scrap. Net energy production: 0.023MJ/kg electric energy and 0.01MJ/kg thermal energy.

## Included activities start
The activity starts with the waste being available at the gate of the treatment facility. Collection and transportation of the waste to the treatment plant is not included.

## Included activities end
The activity ends with the waste being treated and waste-specific emissions from the incineration process and auxiliary material consumption for flue gas cleaning are released to the environment (air and water). Infrastructure and waste-specific energy demands for Municipal Solid Waste Incineration (MSWI) and net energy generation are included.

## Geography
Modelling parameters affecting the treatment technology are not specific to this geography.

## Technology
The waste is treated in the incineration plant with flue gas cleaning. Incineration is the controlled combustion of a waste. Auxiliary material consumption for this step of air pollution control (APC) are included in the process. Air polution control includes electrostatic precipitator for fly ash (ESP), wet flue gas scrubber and 25% SNCR , 42.77% SCR-high dust , 32.68% SCR-low dust -DeNOx facilities and 0% without DeNOx (weighted according to mass of burnt waste). Efficiency of iron scrap separation from slag : 58%. Efficiency of aluminium scrap separation from slag : 31%. Efficiency of copper scrap separation from slag : 31%. Gross electric efficiency technology mix 15.84% and Gross thermal efficiency technology mix 28.51%

## Reference product
- waste glass: -1 kg; By-product classification Waste; CPC 37111: Glass in the mass, in balls (except microspheres), rods or tubes, unworked; waste and scrap of glass; HS2017 700100: Glass; cullet and other waste and scrap of glass, glass in the mass
  main reference product of this activity
  production volume 1.5e10 kg
    based on qualified estimate on MSW in WTE globally and share of glass in MSW in top WTE countries (UNSD 2011)
  property price 0 EUR2005
    Waste products are assigned a price of zero as they are assumed to require further treatment.
  properties: calcium content 0.0743039, carbon allocation 0 kg, carbon content 0, carbon content, fossil 0, carbon content, non-fossil 0, chlorine content 0.000199888, chromium content 0.000309826, copper content 7.99551e-6, dry mass 0.98 kg, heating value, gross 0.145159 MJ, heating value, net 0.0469633 MJ, lead content 3.94778e-5, oxygen content 0.492929, silicon content 0.366418, sodium content 0.0657874, water content 0.0204082, water in wet mass 0.02 kg, wet mass 1 kg, zinc content 3.99776e-6

## Inputs from technosphere
- bottom ash, MSWI, waste glass: -1.15628 kg; lognormal variance with pedigree 0.0099798, pedigree (1,1,1,1,1)
  waste-specific bottom ash from the incineration of this waste
  Uncertainty: uncertainty is calculated from uncertainties in waste composition and transfer coefficients in incinerator
  production volume
    calculated in proportion to incinerated waste input
  properties: calcium content 0.0760269, chlorine content 0.000204523, chromium content 0.000317011, copper content 8.18092e-6, dry mass 0.828338 kg, lead content 4.03933e-5, oxygen content 0.481171, silicon content 0.374915, sodium content 0.0673129, water content 0.207237, wet mass 1 kg, zinc content 4.09046e-6
- electricity, for reuse in municipal waste incineration only: 1.46828e-6, 0.000212671, 4.13437e-5, 0.0002044, 0.00021151, 0.000530822, 9.04151e-6, 3.32295e-6, 0.000159579, 0.00011213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 kWh (26 suppliers, which the file names only by identifier); sum of these 0.0177567 kWh; lognormal variance with pedigree 0.0091612, pedigree (1,1,4,1,1)
  Net electricity required to incinerate this waste (subsidised from high-calorific waste fractions).
  Uncertainty: uncertainty is calculated from uncertainties in waste composition and uncertainties in energy efficiency and the uncertainty in internal energy demand
- municipal waste incineration facility: 2.5e-10 unit
  Infrastructure demands per kilogram incinerated waste.

## Emissions to nature
- Benzene [air, urban air close to ground]: 5.03254e-8 kg; lognormal variance with pedigree 0.0491, pedigree (1,1,4,1,1)
  Incomplete combustion product emitted to air.
  Uncertainty: uncertainty calculated from uncertainty in average operation emissions, and the uncertainty of the flue gas volume from this waste.
- Benzo(a)pyrene [air, urban air close to ground]: 1.1199e-12 kg; lognormal variance with pedigree 0.30974, pedigree (1,1,4,1,1)
  (same comment as for Benzene)
- Carbon monoxide, fossil [air, urban air close to ground]: 3.30213e-5 kg; lognormal variance with pedigree 0.65557, pedigree (1,1,4,1,1)
  (same comment as for Benzene)
- Carbon monoxide, non-fossil [air, urban air close to ground]: 5.25261e-5 kg; lognormal variance with pedigree 0.65557, pedigree (1,1,4,1,1)
  (same comment as for Benzene)
- Dioxins, measured as 2,3,7,8-tetrachlorodibenzo-p-dioxin [air, urban air close to ground]: 1.00644e-13 kg; lognormal variance with pedigree 0.30974, pedigree (1,1,4,1,1)
  (same comment as for Benzene)
- Heat, waste [air, urban air close to ground]: 0.115474 MJ; lognormal variance with pedigree 0.00839214, pedigree (1,1,4,1,1)
  Waste heat generated from heating value of this waste plus any electricity required to process it.
  Uncertainty: uncertainty is calculated from uncertainties in waste composition and uncertainties in energy efficiency and the uncertainty in internal energy demand
- Hexachlorobenzene [air, urban air close to ground]: 1.05228e-10 kg; lognormal variance with pedigree 0.0491, pedigree (1,1,4,1,1)
  (same comment as for Benzene)
- Methane, fossil [air, urban air close to ground]: 2.91384e-7 kg; lognormal variance with pedigree 0.0491, pedigree (1,1,4,1,1)
  (same comment as for Benzene)
- Methane, non-fossil [air, urban air close to ground]: 4.63497e-7 kg; lognormal variance with pedigree 0.0491, pedigree (1,1,4,1,1)
  (same comment as for Benzene)
- NMVOC, non-methane volatile organic compounds [air, urban air close to ground]: 2.2903e-6 kg; lognormal variance with pedigree 0.0491, pedigree (1,1,4,1,1)
  (same comment as for Benzene)
- Particulate Matter, < 2.5 um [air, urban air close to ground]: 6.00845e-6 kg; lognormal variance with pedigree 0.30974, pedigree (1,1,4,1,1)
  (same comment as for Benzene)
- Particulate Matter, > 2.5 um and < 10um [air, urban air close to ground]: 3.01932e-8 kg; lognormal variance with pedigree 0.12811, pedigree (1,1,4,1,1)
  (same comment as for Benzene)
- Pentachlorobenzene [air, urban air close to ground]: 2.65886e-10 kg; lognormal variance with pedigree 0.0491, pedigree (1,1,4,1,1)
  (same comment as for Benzene)
- Pentachlorophenol [air, urban air close to ground]: 2.1916e-11 kg; lognormal variance with pedigree 0.0491, pedigree (1,1,4,1,1)
  (same comment as for Benzene)
- Toluene [air, urban air close to ground]: 1.00651e-7 kg; lognormal variance with pedigree 0.0491, pedigree (1,1,4,1,1)
  (same comment as for Benzene)
- Non-hazardous waste disposed [inventory indicator, waste]: 1 kg
  Inventory indicator for waste mass disposed. To be used in EN15804 "other data" results.
- Heat, waste [water, surface water]: 0.0267818 MJ; lognormal variance with pedigree 0.00839214, pedigree (1,1,4,1,1)
  (same comment as for Heat, waste)
