# iron sinter production

Dataset: EcoSpold 2, unit process
Geography: IN
Time period: 2007-01-01 to 2023-12-31
Technology level: current
Classification: EcoSpold01Categories: metals/extraction
Classification: ISIC rev.4 ecoinvent: 2410:Manufacture of basic iron and steel
Scenario: Business-as-Usual
System model: Allocation, cut-off by classification
Share of production covered: 20 %
Generated by: Harshita Soni
Published in: Soni H. 2017
Database: ecoinvent
isCopyrightProtected: true
accessRestrictedTo: 1

## General comment
The bottom hearth layer of sinter machine varies in thickness from 30 to 75 millimetres (1.2 to 3.0 in) and consists of a 12 to 20 mm sinter fraction. The top covering layer consists of mixed materials with total height of 350 to 660 millimetres (14 to 26 in). The mixed materials are applied with drum feeders and roll feeders, which distributes the nodules in certain depth throughout the sintering machine. The material called charge enters the ignition furnace into rows of multi-slit burners.
The ignition zone has eleven burners and soaking/annealing zone has 12 burners. Air is sucked from the bottom of the mixed material to throughout the sintering machine. Gradually, fire travels through the mixed material until it reaches the hearth layer. This kind of burning is known as burn through point (BTP). The hearth layer consists of sinter in smaller size prevents hot sinter from sticking with pellets.
Once burning is complete, the mix converts into sinter. Sinter breaker then breaks this into smaller sizes. By means of forced air, it is then cooled down in a cooler. The output of sinter cooler is maintained at low temperatures and transported by a conveyor belt.
If there exists any fire in the belt, it is extinguished using spraying water. The material is then sent to a jaw-crusher which reduces the size of sinter to ~ 50 mm. This mixture passes through two screens. Sinter fines which are smaller than 5 mm are stored in bins and reused for sinter production and fines which are between 5 - 20 mm are used as hearth layer in sinter machine. The remaining sinter fines are sent to the blast furnace.
The temperature in the two zones is 1,150 to 1,250 °C (2,100 and 2,280 °F) in the ignition zone and 900 to 1000 °C in the soaking zone. This is to prevent sudden quenching of the sintered layer.

## Included activities start
Sintering is the step after iron ore mining, iron ore beneficiation and iron pelletization.

From the data received the following inputs are used for sinter production:
1. BF return
2. BOF Sludge
3. Dolomite
4. DRI Fines
5. Iron Ore Fines
6. LD Slag
7. Limestone
8. Micropellets
9. Millscale
10. Pellet Fines

BF return, DRI fines, Iron ore fines, Micropellets, Pellet Fines, Millscale,BOF Sludge and LD Slag are inserted as Iron Ore Beneficiated - 0.88 kg/kg of sinter.

Limestone and Dolomite are inserted under the same name, 0.0876kg and 0.0805 kg respectively.

## Included activities end
The activitiy ends after blending, mixing and sinter is produced.

The by-product of this process is sinter fines which is used as input in steel production - 0.19 kg of sinter fines per kg of sinter produced.

## Geography
Inputs relate to data received from integrated steel plants in India

## Technology
The sintering technology was developed for the treatment of the waste fines of iron ore,
coke, limestone, dolomite and metallurgical wastes. Sinter is used in BF to avoid use of raw flux in furnace, lower thermal load, increase the productivity and reduce coke rate. The best advantage of sinter is that it is self fluxed.
More information can be found in MECON report on sinter - http://www.meconlimited.co.in/writereaddata/MIST_2016/sesn/tech_2/6.pdf
Image Source: http://ispatguru.com/understanding-sinter-and-sinter-plant-operations/

## Time period
The data was collected in 2017 for the year 2014-15.

## Parameters
- fraction, process water, to air: 0.2 dimensionless; name fraction_PW_to_air; lognormal variance with pedigree 0.092025, pedigree (4,4,3,2,4)
  Literature value (Statistics Canada, 2007 & Shaffer, K.H., 2008, Consumptive water use in the Great Lakes Basin, USGS) (Vionnet, S., Quantis Water Database - Technical Report, 2012).

## Reference product
- iron sinter: 1 kg; name RP_amount; By-product classification allocatable product; CPC 41116: Ferrous products obtained by direct reduction of iron ore and other spongy ferrous products, in lumps, pellets[…]; HS2017 720310: Ferrous products; obtained by direct reduction of iron ore, in lumps, pellets or similar forms
  EcoSpold01Location=GLO
  Most of the integrated steel plants (ISP) in the country have their own sintering plants. Sinter is used as an input for pig iron production,
  In sintering process iron ore fines, other ironbearing wastes and coke dust are blended and combusted. The heat fuses the fines into course lumps that can be charged to a blast furnace.
  production volume 6.82235e10 kg; name RP_PV
    Calculated from the PV for pig iron, considering the fact that 0.92 kg of iron sinter is used per kg of pig iron.
  property carbon content, fossil 0
    Sinter consists of a calcium ferrite matrix, with siliceous and aluminous constituents dissolved and primary hematite embedded in it. It contains 4 – 6 % (w/w) FeO, which is linked to silica and aluminium oxide in the matrix (ecoinvent v2.2 report 10_partII)
  property carbon content, non-fossil 0
    (same comment as for iron sinter)
  property price 0.0590934 EUR2005
    Calculated based on inputs: The price of the product has been calculated as a sum of the values of the material and energy inputs for this product. This value is therefore a rough estimation. It may underestimate the real price since there are additional expenses when producing any product. These expences can include for example labour costs, treatment of waste materials and profit for the producer. Please consider carefully whether this level of data quality is acceptable for your application.
  properties: carbon allocation 0 kg, carbon content 0, dry mass 1 kg, water content 0, water in wet mass 0 kg, wet mass 1 kg

## Inputs from technosphere
- aluminium oxide factory: 2.5e-11 unit; lognormal variance with pedigree 0.8, pedigree (5,5,5,5,5)
  Based on data from ecoinvent dataset for sinter production, GLO accessed through ecoeditor on 20170815
  EcoSpold01Location=RER
  Uncertainty: rough estimation
- coke: 1.102 MJ; lognormal variance with pedigree 0.043825, pedigree (3,3,5,2,2)
  EcoSpold01Location=RER
  Based on data received from integrated steel plants in India
  properties: carbon content, fossil 0.869149, dry mass 0.0328671 kg, heating value, net 28.6 MJ, water content 0.0638298, wet mass 0.034965 kg
  note on carbon content, fossil: 81.7% C and 6% water in wet mass (ecoinvent v2.1 report 6_VI Table 7.1)
- compressed air, 800 kPa gauge: 0.001847 m3; lognormal variance with pedigree 0.0058, pedigree (3,3,3,1,2)
  Based on data received from integrated steel plants in India
- diesel, burned in building machine: 6.642e-5 MJ; lognormal variance with pedigree 0.0058, pedigree (3,3,3,1,2)
  Based on data received from integrated steel plants in India
  properties: heating value, net 1 MJ
- dolomite: 0.0805 kg; lognormal variance with pedigree 0.049225, pedigree (3,3,5,2,2)
  Based on data received from integrated steel plants in India
  properties: carbon content, fossil 0.130435, dry mass 1 kg, heating value, net 3.95 MJ, wet mass 1 kg
- electricity, medium voltage: 0.03726 kWh; lognormal variance with pedigree 0.043825, pedigree (3,3,5,2,2)
  Based on data received from integrated steel plants in India
  EcoSpold01Location=UCTE
- hard coal: 0.010004 kg; lognormal variance with pedigree 0.0058, pedigree (3,3,3,1,2)
  Based on data received from integrated steel plants in India
  properties: carbon content, fossil 0.845, dry mass 0.94 kg, heating value, net 27.91 MJ, water content 0.0638298, wet mass 1 kg
  note on carbon content, fossil: C content 75-94% (specified in Tab 1.1, report 6, part VI). A mean content of 0.845 kg C/ kg dry hard coal was considered
  note on heating value, net: Based on the Characterization factor of Hard coal in the CED method
- heat, district or industrial, other than natural gas: 0.042222 MJ; lognormal variance with pedigree 0.043825, pedigree (3,3,5,2,2)
  Based on data received from integrated steel plants in India.
  Corex gas and Coke Oven Gas used in sinter production have been added and inserted as heat, district or industrial, other than natural gas.
  properties: corresponding fuel use, propane, furnace >100kW 1.05263 MJ, heating value, net 1 MJ
  note on corresponding fuel use, propane, furnace >100kW: Lower heating value of the fuel input related to the heat/electricity output, taken directly from ecoinvent v3.0 dataset "heat production, natural gas, at industrial furnace >100kW, GLO 2000".
- iron ore concentrate: 0.88 kg; lognormal variance with pedigree 0.043225, pedigree (3,3,5,2,2)
  EcoSpold01Location=GLO
  Based on data received from integrated steel plants in India.
  Input raw materials consist of BF return, DRI fines, Iron ore fines, Micropellets, mill scale, pellet fines. The sum of these inputs has been inserted as iron ore.
  properties: dry mass 1 kg, wet mass 1 kg
- limestone, unprocessed: 0.0876 kg; lognormal variance with pedigree 0.0022, pedigree (1,2,3,3,1)
  Based on data received from integrated steel plants in India
  EcoSpold01Location=CH
  properties: carbon content, fossil 0.117257, dry mass 0.998 kg, water content 0.00200401, wet mass 1 kg
  note on carbon content, fossil: Table 3.1, ecoinvent v2.2 report 7, part VII, pg 3. MW CaCO3=100, MW MgCO3=84. C content of limestone is 0.117257 kg/kg DM
- wastewater, average: -0.006 m3; name wastewater; = water_UNO_input*(1 - fraction_PW_to_air); lognormal variance with pedigree 0.0432, pedigree (3,3,1,1,2)
  Based on data received from integrated steel plants in India
  production volume; = (wastewater * RP_PV)/RP_amount
    Calculated from production volume of reference product using the relative outputs.
  properties: carbon content, non-fossil 0.194039, dry mass 0.346837 kg, water content 2882.2, wet mass 1000 kg
  note on carbon content, non-fossil: 0.0673 kg TOC/m3 (Tab A.17, ecoinvent v2.2 report 13_I). TOC was considered as Total Carbon.

## Inputs from nature
- Water, unspecified natural origin [natural resource, in water]: 0.0075 m3; name water_UNO_input; lognormal variance with pedigree 0.053225, pedigree (3,3,5,2,2)
  Based on data received from integrated steel plants in India

## Emissions to nature
- Cadmium II [air, unspecified]: 1.9259e-8 kg; lognormal variance with pedigree 0.6913, pedigree (2,3,5,3,1)
  Based on data from ecoinvent dataset for sinter production, GLO accessed through ecoeditor on 20170815
- Carbon dioxide, fossil [air, unspecified]: 0.152 kg; lognormal variance with pedigree 0.0058, pedigree (3,3,3,1,2)
  Based on fuels used in the producion of sinter and associated emissions
- Carbon monoxide, fossil [air, unspecified]: 0.025679 kg; lognormal variance with pedigree 0.6913, pedigree (2,3,5,3,1)
  (same comment as for Cadmium II)
- Chromium III [air, unspecified]: 2.522e-8 kg; lognormal variance with pedigree 0.6913, pedigree (2,3,5,3,1)
  (same comment as for Cadmium II)
- Copper ion [air, unspecified]: 7.6577e-8 kg; lognormal variance with pedigree 0.6913, pedigree (2,3,5,3,1)
  (same comment as for Cadmium II)
- Dioxins, measured as 2,3,7,8-tetrachlorodibenzo-p-dioxin [air, unspecified]: 7e-12 kg; lognormal variance with pedigree 0.3407, pedigree (1,3,5,3,1)
  (same comment as for Cadmium II)
- Hydrocarbons, aliphatic, alkanes, unspecified [air, unspecified]: 0.00013756 kg; lognormal variance with pedigree 0.0813, pedigree (2,3,5,3,1)
  (same comment as for Cadmium II)
- Hydrochloric acid [air, unspecified]: 3.7601e-5 kg; lognormal variance with pedigree 0.0813, pedigree (2,3,5,3,1)
  (same comment as for Cadmium II)
- Hydrogen fluoride [air, unspecified]: 2.2469e-6 kg; lognormal variance with pedigree 0.0813, pedigree (2,3,5,3,1)
  (same comment as for Cadmium II)
- Lead II [air, unspecified]: 3.2282e-6 kg; lognormal variance with pedigree 0.6913, pedigree (2,3,5,3,1)
  (same comment as for Cadmium II)
- Manganese II [air, unspecified]: 1.9259e-7 kg; lognormal variance with pedigree 0.6913, pedigree (2,3,5,3,1)
  (same comment as for Cadmium II)
- Mercury II [air, unspecified]: 7.566e-8 kg; lognormal variance with pedigree 0.6913, pedigree (2,3,5,3,1)
  (same comment as for Cadmium II)
- Nickel II [air, unspecified]: 1.9259e-8 kg; lognormal variance with pedigree 0.6913, pedigree (2,3,5,3,1)
  (same comment as for Cadmium II)
- Nitrogen oxides [air, unspecified]: 0.00052733 kg; lognormal variance with pedigree 0.0813, pedigree (2,3,5,3,1)
  (same comment as for Cadmium II)
- PAH, polycyclic aromatic hydrocarbons [air, unspecified]: 4.723e-7 kg; lognormal variance with pedigree 0.3413, pedigree (2,3,5,3,1)
  (same comment as for Cadmium II)
- Particulate Matter, < 2.5 um [air, unspecified]: 0.00020635 kg; lognormal variance with pedigree 0.3413, pedigree (2,3,5,3,1)
  (same comment as for Cadmium II)
- Polychlorinated biphenyls [air, unspecified]: 6.4197e-9 kg; lognormal variance with pedigree 0.3413, pedigree (2,3,5,3,1)
  (same comment as for Cadmium II)
- Sulfur dioxide [air, unspecified]: 0.001261 kg; lognormal variance with pedigree 0.0413, pedigree (2,3,5,3,1)
  (same comment as for Cadmium II)
- Titanium ion [air, unspecified]: 1.6049e-8 kg; lognormal variance with pedigree 0.6913, pedigree (2,3,5,3,1)
  (same comment as for Cadmium II)
- Vanadium V [air, unspecified]: 1.1464e-8 kg; lognormal variance with pedigree 0.6913, pedigree (2,3,5,3,1)
  (same comment as for Cadmium II)
- Water [air, unspecified]: 0.0015 m3; name water_to_air_unspecified; = (water_UNO_input*fraction_PW_to_air); lognormal variance with pedigree 0.0427, pedigree (2,2,3,1,1)
  (same comment as for Cadmium II)
  property fraction, origin: fresh water 0; name fraction_origin_fresh_water
  property fraction, origin: salt water 0; name fraction_origin_salt_water
  property fraction, origin: unspecified 1; name fraction_origin_unspecified
- Zinc II [air, unspecified]: 8.263e-7 kg; lognormal variance with pedigree 0.6913, pedigree (2,3,5,3,1)
  (same comment as for Cadmium II)

## Sampling procedure
Main in- and outputs based on data received from integrated steel plants in India:2,04,36,067 tonnes

## Extrapolations
The dataset represents information obtained from integrated steel manufacturing plants in India. Except for emissions to air where data has been taken from "sinter production, GLO" accessed on 20170815.

## Review by Louis Brimacombe 2017-11-27
Notably the particulate emissions to air have all been allocated to PM2.5 category, which presumably indicates that the Sinter plant is/are equipped with a bag filter. Whereas with an electrostatic precipitator there will be a wider range of particulate emissions (PM 2.5 and PM10 and maybe >PM10 ). I have accepted the dataset since the PM2.5 category is the highest impact category for health effects.
