# debarking, hardwood, azobe

Dataset: EcoSpold 2, unit process
Geography: CM
Time period: 2000-01-01 to 2023-12-31
Technology level: current
Classification: ISIC rev.4 ecoinvent: 0220:Logging
Synonyms: Ekki; Bongassi; Lophira alata
Tags: Swiss brush-up completed
Scenario: Business-as-Usual
System model: Allocation, cut-off by classification
Generated by: Frank Werner
Published in: Althaus H.J. 2007
Database: ecoinvent
isCopyrightProtected: true
accessRestrictedTo: 1

## General comment
This dataset represents debarking of one m3 of azobe wood from Central Africa. The Azobe trees are produced by (close to) sustainable forest management in Central Africa.
No data on debarking of azobe wood is available; thus, average European data for debarking pine in the forest is used, taking into account the modern equipment of the logging company. Emissions from biomass burning are according to literature values.
As inventory data availability on tropical forestry processes and tropical wood is very limited, the inventory should be considered case-specific. Any specific environmental impact from land use change following timber harvesting needs to be considered on a case-specific basis.

## Included activities start
From debarking process of harvested azobe trees, at plantation site.

## Included activities end
This activity ends with the debarked Azobe log at forest road. The dataset includes debarking and natural decomposition of the bark

## Geography
data for debarking in Africa is not available - instead, European processes are used, taking into account of the modern equipment used for harvesting.

## Technology
The dataset reflects a high technological standard for debarking. The transportation processes are average for transportation to Europe; transport distance however can vary. The high technological standard and legal operations of this dataset cannot be assumed to be representative for azobe harvesting. Site-specific data for debarking is not available but takes place before shipping the logs to Europe, thus European data for debarking pine used. The resulting bark is left to rot.

## Reference product
- sawlog and veneer log, azobe, debarked, measured as solid wood: 1 m3; By-product classification allocatable product; CPC 03120: Logs of non-coniferous wood
  Reference product. The reference product being imported is azobe legs that are harvested from (close to) sustainable forest management in Central Africa. Data based on given reference.
  production volume 21527.5 m3; = 63503*0.339
    Calculated. The value is calculated from the amount of azobe exported from cameroon (link: http://www.fao.org/docrep/x2161e/x2161e05.htm) multiplied by 0.339 which is the share of sustainable forest (link: http://wwf.panda.org/who_we_are/wwf_offices/cameroon/?144321/Sustainable-forest-management-in-Southeast-Cameroon).
  property heating value, net 14232 MJ
    LHV is calculated based on the Carbon content of the product. More details can be found on the respective documentation.The property is based on a value of 10.95MJ/kg
  property price 174.94 EUR2005
    Reference: FAOSTAT (accessed 20140112). The price is calculated by using data on total world import quantity (m3) and import value (1000 USD), year 2005. 15174881 m3 of Ind Rwd Wir (NC) Tropica was imported in the world in 2005. The import value was 3209966000 USD. The calculated price is thus (3209966000/15174881*0.8)=174.936586454945 Euro.
  properties: carbon allocation 494 kg, carbon content 0.494, carbon content, fossil 0, carbon content, non-fossil 0.494, dry mass 1000 kg, water content 0.3, water in wet mass 300 kg, wet mass 1300 kg

## Inputs from technosphere
- diesel, burned in building machine: 2.84 MJ; source Werner F. 2002; lognormal variance with pedigree 0.235, pedigree (5,5,5,5,5)
  Proxy. Refers to debarking before maritime transportations; estimated based on direct use of European data (according to given Source).
  properties: UVEK_link_1 732, UVEK_relative_amount_1 1, heating value, net 1 MJ
  note on UVEK_link_1: to be used only in special submissions in coordination with ecoinvent and the Swiss FOEN
- lubricating oil: 0.0252 kg; source Werner F. 2002; lognormal variance with pedigree 0.235, pedigree (5,5,5,5,5)
  (same comment as for diesel, burned in building machine)
  properties: UVEK_link_1 2866, UVEK_relative_amount_1 1, carbon content, fossil 0.75, dry mass 1 kg, heating value, net 40.2 MJ, wet mass 1 kg
  note on carbon content, fossil: Lubricating oil is produced from diesel. C-content/dry mass of fats and oils considered 75%, from: ecoinvent v2.2 report, n 15a, pg 40
  note on heating value, net: Literature value, Source: IPCC 2006, 2006 IPCC Guidelines for National Greenhouse Gas Inventories, Prepared by the National Greenhouse Gas Inventories Programme, Eggleston H.S., Buendia L., Miwa K., Ngara T. and Tanabe K. (eds). Published: IGES, Japan
- sawlog and veneer log, azobe, measured as solid wood under bark: 1 m3; source ICL/SHR Timber Research 2002; lognormal variance with pedigree 0.235, pedigree (5,5,5,5,5)
  Literature Value.
  properties: UVEK_link_1 3844, UVEK_link_8 4417, UVEK_link_9 4558, UVEK_relative_amount_1 1, UVEK_relative_amount_9 0.6, carbon content, non-fossil 0.494, dry mass 1000 kg, heating value, net 14232 MJ, water content 0.3, wet mass 1300 kg
  note on UVEK_link_8: This link has been introduced to model transport specifically for the SAM model; to be used only in special submissions in coordination with ecoinvent and the Swiss FOEN.
  note on UVEK_relative_amount_9: No scaling needed as transport is modelled in market dataset that has been part of the brush-up
  note on carbon content, non-fossil: C content of dry mass is 0.494 kgC/kg dry wood (ecoinvent v2.2 report 21).

## Emissions to nature
- Carbon dioxide, non-fossil [air, unspecified]: 162.72 kg; source ICL/SHR Timber Research 2002; lognormal variance with pedigree 0.235, pedigree (5,5,5,5,5)
  Literature Value.

## Sampling procedure
literature

## Extrapolations
see Geography
