# polycarbonate production

Dataset: EcoSpold 2, unit process
Geography: RER
Time period: 2016-01-01 to 2024-12-31
Technology level: current
Classification: ISIC rev.4 ecoinvent: 2013:Manufacture of plastics and synthetic rubber in primary forms
Classification: EcoSpold01Categories: plastics/polymers
Scenario: Business-as-Usual
System model: Allocation, cut-off by classification
Generated by: Nikolia Stoikou
Database: ecoinvent
isCopyrightProtected: true
accessRestrictedTo: 1

## General comment
The dataset represents the production of polycarbonate (PC), a polymer composed of identical units of bisphenol A. PC is a strong, ductile, thermally stable, transparent, flame-resistant thermoplastic polymer. Thanks to these characteristics it is widely used in buildings, electrical appliances, and electronics, automotive, packaging, medical devices, etc. Polycarbonate can be worked with traditional extrusion and injection moulding (PlasticsEurope 2019).
Reference:
PlasticsEurope, 2019.Polycarbonate (PC), Eco-profiles and Environmental Product Declaration of the European Plastics Manufacturers Available at: https://www.plasticseurope.org/en/resources/eco-profiles

## Included activities start
The activity starts when Bisphenol reaches the production plant. The process includes input materials, energy consumption, water consumption, production infrastructure, end-of-life as well as air and water emissions.

## Included activities end
The activity ends with polycarbonate ready to be supplied in the market.

## Geography
3 European production sites

## Technology
Polycarbonate is produced via a interfacial polycondesation. Bisphenol A is treated with sodium hydroxide, the resulting diphenoxide reacts with phosgene. The assumed reaction efficiency is of 98%.
Material inputs for the reaction are calculated stoichiometrically. Energy requirements are sourced from Mooij and Muller, 2021. Water use is based on PlasticsEurope, 2019.
Reference:
Mooij and Muller, 2021. Decarbonisation options for the Dutch polycarbonate industry, PBL Netherlands Environmental Assessment Agency, TNO Available at: https://www.pbl.nl/sites/default/files/downloads/pbl-2021-decarbonisation-options-for-the-dutch-polycarbonate-industry-4580.pdf
PlasticsEurope, 2019.Polycarbonate (PC), Eco-profiles and Environmental Product Declaration of the European Plastics Manufacturers Available at: https://www.plasticseurope.org/en/resources/eco-profiles

## Parameters
- fraction, cooling water, cooling pond system, to air: 0.032 dimensionless; name fraction_CW_CP_to_air; lognormal variance with pedigree 0.0413, pedigree (2,3,1,3,1)
  Calculated based on literature value (Scown, C.D., 2011, Water Footprint of U.S. Transportation Fuels and supplying information of the article) (Vionnet, S., Quantis Water Database - Technical Report, 2012).
- fraction, cooling water, once-through system, to air: 0.004 dimensionless; name fraction_CW_OT_to_air; lognormal variance with pedigree 0.0413, pedigree (2,3,1,3,1)
  (same comment as for fraction, cooling water, cooling pond system, to air)
- fraction, cooling water, recirculating system, to air: 0.771 dimensionless; name fraction_CW_R_to_air; lognormal variance with pedigree 0.0413, pedigree (2,3,1,3,1)
  (same comment as for fraction, cooling water, cooling pond system, to air)
- fraction, cooling water, to air: 0.3875 dimensionless; name fraction_CW_to_air; = (0.5*fraction_CW_OT_to_air)+(0.5*fraction_CW_R_to_air); lognormal variance with pedigree 0.092025, pedigree (4,4,3,2,4)
  Calculated value based on literature value (see comments of the other parametres present in this dataset) and expert opinion. In the case when no industry/literature data are available about the type of cooling or directly fraction, cooling water, to air specific for the process a default assumption is applied. It is assumed that the once-through cooling system is used in 50% of all cases and recirculating system is used in another 50% of all cases.
- fraction, process water, to air: 0.205 dimensionless; name fraction_PW_to_air; lognormal variance with pedigree 0.092025, pedigree (4,4,3,2,4)
  Literature value (Statistics Canada, 2007 & Shaffer, K.H., 2008, Consumptive water use in the Great Lakes Basin, USGS) (Vionnet, S., Quantis Water Database - Technical Report, 2012).

## Reference product
- polycarbonate: 1 kg; name RP; By-product classification allocatable product; CPC 34740: Polyacetals, other polyethers and epoxide resins, in primary forms; polycarbonates, alkyd resins, polyallyl es[…]; HS2017 390740: Polycarbonates; in primary forms; CAS 25037-45-0
  EcoSpold01Location=RER
  production volume 7.7e8 kg; name RP_PV
    Value from PlasticsEurope, 2021. Plastics - the Facts 2021, An analysis of European plastics production demand and waste data, plastics Europe, 2021 Available at: https://plasticseurope.org/wp-content/uploads/2021/12/Plastics-the-Facts-2021-web-final.pdf
  property carbon content, fossil 0.755906
    Polycarbonate means here 2,2-bis(4-hydroxyphenyl)propane polycarbonate – also called bisphenol A polycarbonate ( -(O-C6H4-C(CH3)2-C6H4-O-CO)n- (ecoinvent v2.2 report 11_II), C16H14O3, MW=254 g/mol.
  property heating value, net 29.57 MJ
    LHV is calculated based on the elemental composition of the substance. Based on the name of the substance, the chemical formula of the substance is assumed to be: C16H14O3
  properties: carbon allocation 0.755906 kg, carbon content 0.755906, carbon content, non-fossil 0, dry mass 1 kg, price 1.29 EUR2005, water content 0, water in wet mass 0 kg, wet mass 1 kg

## Inputs from technosphere
- bisphenol A, powder: 0.916 kg; lognormal variance with pedigree 0.009825, pedigree (2,5,1,2,2)
  stoichiometric calculations with 98% yield - no internal recycling of BPA
  properties: carbon content, fossil 0.789474, dry mass 1 kg, heating value, net 32.41 MJ, wet mass 1 kg
- chemical factory, organics: 4e-10 unit; lognormal variance with pedigree 0.478, pedigree (4,5,5,5,5)
  Gendorf, 2020, Umwelterkärung, www.gendorf.de
- electricity, medium voltage: 0.101389 kWh; lognormal variance with pedigree 0.0024, pedigree (2,3,1,1,2)
  Mooij and Muller, 2021. Decarbonisation options for the Dutch polycarbonate industry, PBL Netherlands Environmental Assessment Agency, TNO Available at: https://www.pbl.nl/sites/default/files/downloads/pbl-2021-decarbonisation-options-for-the-dutch-polycarbonate-industry-4580.pdf
- heat, from steam, in chemical industry: 6.05 MJ; lognormal variance with pedigree 0.0024, pedigree (2,3,1,1,2)
  (same comment as for electricity, medium voltage)
  properties: heating value, net 1 MJ
- phosgene, liquid: 0.39691 kg; lognormal variance with pedigree 0.009825, pedigree (2,5,1,2,2)
  stoichiometric calculations with 98% yield
  properties: carbon content, fossil 0.122449, dry mass 1 kg, heating value, net 3.68 MJ, wet mass 1 kg
- sodium hydroxide, without water, in 50% solution state: 0.320985 kg; lognormal variance with pedigree 0.009825, pedigree (2,5,1,2,2)
  stoichiometric calculations with 98% yield
  properties: dry mass 1 kg, heating value, net 3.03 MJ, wet mass 1 kg
- waste plastic, mixture: -0.02041 kg; name waste_plastic; lognormal variance with pedigree 0.1361, pedigree (3,5,1,3,5)
  calculated to balance out the mass input and output.
  EcoSpold01Location=CH
  production volume; = RP_PV*waste_plastic/abs(RP)
    Calculated in relation to the reference product production volume.
  properties: carbon content, fossil 0.747344, dry mass 0.847 kg, heating value, net 30.79 MJ, water content 0.180638, wet mass 1 kg
  note on carbon content, fossil: C content in 1 kg DM was calculated using data in Tab A.2, ecoinvent v2.2 report 13_I
  note on heating value, net: Value taken from the general comment of the treatment dataset.
- wastewater, average: -0.000126744, -0.00504326 m3 (2 suppliers, which the file names only by identifier); sum of these -0.00517 m3; lognormal variance with pedigree 0.1307, pedigree (3,5,1,3,5)
  calculated to balance out the water input and output.
  production volume; = RP_PV*wastewater/abs(RP)
    Calculated in relation to the reference product production volume.
  properties: carbon content, non-fossil 0.194039, dry mass 0.346837 kg, water content 2882.2, wet mass 1000 kg
  note on carbon content, non-fossil: 0.0673 kg TOC/m3 (Tab A.17, ecoinvent v2.2 report 13_I). TOC was considered as Total Carbon.
- water, deionised: 4.77282, 0.017181 kg (2 suppliers, which the file names only by identifier); sum of these 4.79 kg; lognormal variance with pedigree 0.0007, pedigree (1,2,1,1,1)
  PlasticsEurope, 2019.Polycarbonate (PC), Eco-profiles and Environmental Product Declaration of the European Plastics Manufacturers Available at: https://www.plasticseurope.org/en/resources/eco-profiles
  properties: wet mass 1 kg

## Inputs from nature
- Water, unspecified natural origin [natural resource, in water]: 0.04241 m3; lognormal variance with pedigree 0.0401, pedigree (1,2,1,1,1)
  (same comment as for water, deionised)

## Emissions to nature
- Water [air, unspecified]: 0.00183 m3; lognormal variance with pedigree 0.0401, pedigree (1,2,1,1,1)
  (same comment as for water, deionised)
  property fraction, origin: fresh water 0.0230372; name fraction_origin_fresh_water
  property fraction, origin: salt water 0.00121958; name fraction_origin_salt_water
  property fraction, origin: unspecified 0.975743; name fraction_origin_unspecified
- Chloride [water, unspecified]: 0.284495 kg; lognormal variance with pedigree 0.25, pedigree (5,5,5,5,5)
  from the HCl nautralization
- Sodium I [water, unspecified]: 0.184498 kg; lognormal variance with pedigree 0.25, pedigree (5,5,5,5,5)
  from the HCl nautralization
- Water [water, surface water]: 0.04028 m3; lognormal variance with pedigree 0.0401, pedigree (1,2,1,1,1)
  (same comment as for water, deionised)
