# abrasive blasting, alumina, carbon steel substrate

Dataset: EcoSpold 2, unit process
Geography: GLO
Time period: 2022-01-01 to 2023-12-31
Technology level: modern
Classification: ISIC rev.4 ecoinvent: 2592:Treatment and coating of metals; machining
Scenario: Business-as-Usual
System model: Allocation, cut-off by classification
Generated by: Edwin Rua
Database: ecoinvent
isCopyrightProtected: true
accessRestrictedTo: 1

## General comment
This activity provides the service of 1 square metre of abrasive blasting. The abrasive blasting is a process which uses compressed air to carry an abrasive agent towards the surface of the workpiece. This dataset uses alumina powder as abrasive agent. When the abrasive agent hits the surface, the dirt, the rust, and particles of the base metal gets removed. This process is modelled for a machine with a working volume of 591x815x560 [mm]. The machine is operated manually. This dataset represent a GLO average because it is a well-established technique in the industry
The dataset includes the amount of substrate lost due to the abrasive action of the operation. The amount is expressed via the exchange of "steel, low-alloyed". The dataset doesn't include the workpiece, and doesn't include the construction and maintenance of the abrasive blasting machine.
Considering the specificity of the activity, this activity should be used only for the preparation of the workpieces for thermal spray coating.

## Included activities start
The activity is a service and it starts with the workpiece placed in the abrasive blasting machine.The activity referes to the amount of time the workpiece is treated, without considering any impact realated to the other production steps of the workpiece.The carbon steel substrate is not included in the activity exchanges.

## Included activities end
The activity is a service and it ends with the workpiece at the exit of the abrasive blasting machine.

## Geography
The data are based on estimations and do not have a specific geographical origin. They are assumed to be representative of this geography.

## Technology
The machine is manually operated, and it provides a working volume of 591x815x560 [mm]. The abrasive considered for this activity is alumina powder. Considering the specificity of the activity, this activity should be used only for the preparation of the workpieces for thermal spray coating.
The machine uses compressed air with a gauge pressure of 550 kPa. This dataset is considered to be valid for a carbon steel substrate.
The alumina is considered to be reused. The calculation is based on the condition of the pilot plant: 100g of alumina reused for 100 50x20mm specimens.

## Time period
Data were taken from a pilot-scale plant.The data collection was performed in 2022.

## Reference product
- abrasive blasting, alumina, carbon steel substrate: 1 m2; name RP; By-product classification allocatable product; CPC 44216: Machine-tools for deburring, sharpening, grinding, honing, lapping, polishing or otherwise finishing metal, si[…]
  The exchange referes to 1 hour of abrasive blasting.
  production volume 4 m2; name pv_rp
    This is a placeholder value that does not reflect real-world production volumes. This dataset does not currently require a real-world production volume to work in the database framework, and no actual data were collected yet. This has no negative effect on the results of the ecoinvent database.
  property price 13.49 EUR2005
    Price calculated based on direct measure in 2022 of the consumption of the University of Barcelona plant and on costs of the inputs. Price shall be reconsidered depending on application, e.g. different region, full scale application, etc.
    The price was converted to EUR based on the annual exchange rates published by the European Central Bank (https://sdw.ecb.europa.eu/quickview.do?SERIES_KEY=120.EXR.A.USD.EUR.SP00.A, last accessed on 2022-02-15) and adjusted for inflation relative to 2005 using the producer price index (PPI) of the euro area, published by eurostat (https://appsso.eurostat.ec.europa.eu/nui/show.do?dataset=sts_inpp_a&lang=en, last accessed on 2022-05-04).
  properties: carbon allocation 0 kg, carbon content 0

## Inputs from technosphere
- aluminium oxide, non-metallurgical: 0.855213, 0.144787 kg (2 suppliers, which the file names only by identifier); sum of these 1 kg; lognormal variance with pedigree 0.008225, pedigree (1,4,2,2,1)
  Proxy used to model alumina powder for abrasive blasting. The amount of alumina is calculated considering its reuse. The amount is calculated from 100g of alumina reused for 100 specimens of 50x20mm dimension.
  Uncertainty: Variance value taken from Tab 10.3 of "Overview and methodology. Data quality guideline for the ecoinvent database version 3" Ecoinvent Report 1(v3), Weidema B P, Bauer C, Hischier R, Mutel C, Nemecek T, Reinhard J, Vadenbo C O, Wernet G. (2013).
  properties: dry mass 1 kg, wet mass 1 kg
- compressed air, 600 kPa gauge: 81.7388, 33.2612 m3 (2 suppliers, which the file names only by identifier); sum of these 115 m3; lognormal variance with pedigree 0.002825, pedigree (1,4,2,2,1)
  Gauge pressure taken from datassheet of the machine
  Uncertainty: Variance value taken from Tab 10.3 of "Overview and methodology. Data quality guideline for the ecoinvent database version 3" Ecoinvent Report 1(v3), Weidema B P, Bauer C, Hischier R, Mutel C, Nemecek T, Reinhard J, Vadenbo C O, Wernet G. (2013).
- electricity, medium voltage: 14.667 kWh; lognormal variance with pedigree 0.002825, pedigree (1,4,2,2,1)
  The electricity is considered to be medium voltage for the use in industry.
  Uncertainty: Variance value taken from Tab 10.3 of "Overview and methodology. Data quality guideline for the ecoinvent database version 3" Ecoinvent Report 1(v3), Weidema B P, Bauer C, Hischier R, Mutel C, Nemecek T, Reinhard J, Vadenbo C O, Wernet G. (2013).
- inert waste: -0.786789, -0.223211 kg (2 suppliers, which the file names only by identifier); sum of these -1.01 kg; = alumina+ steel_removed; lognormal variance with pedigree 0.002625, pedigree (1,4,1,2,1)
  The exchange includes the amount of alumina used and the amount of steel lost from the substrate
  Uncertainty: Variance value taken from Tab 10.3 of "Overview and methodology. Data quality guideline for the ecoinvent database version 3" Ecoinvent Report 1(v3), Weidema B P, Bauer C, Hischier R, Mutel C, Nemecek T, Reinhard J, Vadenbo C O, Wernet G. (2013).
  production volume; name pv_iw; = iw*pv_rp/abs(RP)
    Production volume calculated based on the production volume of the reference product.
  properties: dry mass 1 kg, wet mass 1 kg
- steel, low-alloyed: 0.01 kg; name steel_removed; lognormal variance with pedigree 0.002825, pedigree (1,4,2,2,1)
  The exchange refers to the amount of steel lost during the abrasive blasting.
  Uncertainty: Variance value taken from Tab 10.3 of "Overview and methodology. Data quality guideline for the ecoinvent database version 3" Ecoinvent Report 1(v3), Weidema B P, Bauer C, Hischier R, Mutel C, Nemecek T, Reinhard J, Vadenbo C O, Wernet G. (2013).
  properties: carbon content, fossil 0.005, dry mass 1 kg, wet mass 1 kg

## Sampling procedure
The sampling of the data was performed on a speciment with dimension 50x20 [mm]. The time span of the blasting during the data collection was of 25 seconds. The results were scaled for the development of the dataset.

## Extrapolations
The values in the dataset were linearly extrapolated from the measurements performed on site.
