# land already in use, perennial cropland to annual crop

Dataset: EcoSpold 2, unit process
Geography: BR-CE
Time period: 2014-01-01 to 2023-12-31
Technology level: current
Classification: ISIC rev.4 ecoinvent: 0161:Support activities for crop production
Tags: BRLUC
Scenario: Business-as-Usual
System model: Allocation, cut-off by classification
Generated by: Ana Donke
Database: ecoinvent
isCopyrightProtected: true
accessRestrictedTo: 1

## General comment
This dataset represents the interventions associated with the clear-cutting of primary forest for the provision of arable land tenure, annual crop. NPP (net primary productivity of a given land, in kg C / m2 and year) and VEG (above-ground biomass, below-ground biomass and dead organic matter) values are parameterized.
VEG values and production volumes are derived from the Appendix S1 and S2 of Novaes et al. 2017. The most updated data is available in www.cnpma.embrapa.br/forms/BRLUC.php. In this reference, VEG values of primary forests and grassland were estimated based in Brazil, 2016 and croplands, pasture man made and forest intensive VEG values based in European Commission, 2010 and weighted according to climate categories occurrence per state. NPP values are reported by Haberl et al. (2007) and the average value for Latin America is adopted. The types of exchanges and their emission factors are the same from land transformations datasets 'clear-cutting, primary forest to arable land, annual crop, BR, 2010 - 2015' and 'land already in use, annual cropland to annual crop, BR, 2010 - 2015' available in Ecoinvent database (Rossi, 2017a,b), which in turn were retrieved from Andrea & Merlet (2001).
Bibliography is listed below:
- Andrea, M.O., Merlet, P. (2001). Emission of trace gases and aerosols from biomass burning. Global Biogeochemical Cycles. V 15, N4, p.955-966.
- Brazil (2016). Third National Communication of Brazil to the United Nations Framework Convention on Climate Change âEURO“ Volume III. Ministry of Science, Technology and Innovation, Brasília.
- European Commission (2010) Comission decision of 10 June 2010 on guidelines for the calculation of land carbon stocks for the purpose of Annex V to Directive 2009/28/EC. European Union, Brussels.
- Haberl H, Erb KH, Krausmann F, Gaube V, Bondeau A, Plutzar C, Gingrich S, Lucht W, Fischer-Kowalski M. 2007. Quantifying and mapping the human appropriation of net primary production in earth's terrestrial ecosystems. PNAS. v104 n31: 12942-12947.
- Jungbluth, N. et al. (2007) Life Cycle Inventories of Bioenergy. ecoinvent report No. 17. Dubendorf, CH: Swiss Centre for Life Cycle Inventories.
- Krausmann, F., Erb, K. H., Gingrich, S., Lauk, C., & Haberl, H. (2008). Global patterns of socioeconomic biomass flows in the year 2000: A comprehensive assessment of supply, consumption and constraints. Ecological Economics, 65(3), 471-487.
- Novaes RML, Pazianotto RA, Brandao M, Alves BJR, May A, Folegatti-Matsuura MIS. 2017. Estimating 20-year landuse change and derived CO2 emissions associated with crops, pasture and forestry in Brazil and each of its 27 states. Glob Change Biol. 23:3716âEURO“3728 .doi.org/10.1111/gcb.13708
- Rossi V, 2017a, clear-cutting, primary forest to arable land, annual crop, BR, Undefined, ecoinvent database version 3.3. Accessed in September, 2017
- Rossi V, 2017b, land already in use, annual cropland to annual crop, annual crop, BR, Undefined, ecoinvent database version 3.3. Accessed in September, 2017
[This dataset is meant to replace the following datasets:
- land already in use, perennial cropland to annual crop, BR, 2010 - 2015]

## Included activities start
Starts with the land already in use.

## Included activities end
The dataset includes the carbon stored in Above-Ground Biomass (AGB) and Below-Ground Biomass (BGB) pools. It includes the fluxes from these carbon pools in terms of CO2.
The loss/gain of Soil Organic Carbon (SOC) usually associated with a land tranformation is accounted for in the downstream activity using the arable land tenure, given that it depends on the subsequent land use practice.
This activity ends with the provision of arable land tenure, measured in unit kg carbon Potential Net Primary Production (NPP).

## Parameters
- Above and below ground biomass: 1.57426 dimensionless; name VEG; lognormal variance with pedigree 0.0106, pedigree (3,1,1,1,3)
  This is the difference between biomass carbon stocks of previous and final land use vegetation (t0 - t1). This is derived from Novaes et al. 2017.
- LUC_crop_specific: 1 dimensionless
  This parameter allows to switch between a 'crop specific' and a 'country specific' approach when calculating the LUC of a crop. By default, the chosen approach is 'crop specific', so the value of the parameter is 1. If you want to apply a 'country specific' approach, turn the parameter to 0.
- NPP0, net primary productivity: 0.811 dimensionless; name NPP; lognormal variance with pedigree 0.022825, pedigree (2,5,2,2,3)
  This is net primary production and it is the average value for Latin America as reported by Haberl et al. (2007) .

## Reference product
- land tenure, arable land, measured as carbon net primary productivity, annual crop: 1 kg; By-product classification allocatable product; CPC 91131: Public administrative services related to agriculture, forestry, fishing and hunting
  Yield = 1.0 kg/haLand that is made available for the cultivation of annual crops, expressed in kg carbon net pripary productivity
  production volume 2.37499e6 kg
    Production volume is expressed in NPP as an indirect measure of area. Its value is derived from the proportion this land transformation activity contributes to the mix of land transformations that compose Land Tenure Market of the reference product (e.g. annual crops). Those proportions are derived from Novaes et al. 2017, Appendix S2, tab 'Search results', box 4c and represent over which land uses the reference product expanded in what proportion. In this box the proportional value is converted in the PV amount and the maximum and minimum values as the extremities of a triangular distribution in the uncertainty field. Each geography has a different mix. Most updated data is available in www.cnpma.embrapa.br/forms/BRLUC.php. Those proportions are multiplied by the total PV value of the reference product, which by Ecoinvent default is: Current area of reference product (ha)*NPP value (=8110 Kg C /ha)*6.23%*20-1years. The 6.23% value comes from the proportion Brazilian Total Biomass Appropriation (TBA) in relation to the total sum of TBA of the World, according to Krausmann et al., 2008, Supplementar Table 5.\nThe production volumes and market shares of land tenure and LUC have a high level of uncertainty, which can have large impacts in overall LCIA results (Novaes et al. 2017). However, the uncertainty associated with these data could not easily be reflected in the datasets. Uncertainty assessments should take this limitation into consideration.
  properties: carbon allocation 0 kg, carbon content 0, carbon content, non-fossil 0, dry mass 0 kg, price 0 EUR2005, water content 0, water in wet mass 0 kg, wet mass 0 kg

## Inputs from technosphere
- diesel, burned in building machine: 0.519534 MJ; = 72.96*VEG/NPP/0.47/580
  Calculated Value: 72.96 (MJ/m3) * VEG / NPP / 0.47 (ratio C to biomass) / 580 (kg/m3).
  properties: heating value, net 1 MJ
- power sawing, without catalytic converter: 0.00169475 hour; = 0.238*VEG/NPP*1/0.47/580
  Calculated Value: 0.238 (hours/m3) * VEG / NPP * 1 (fraction of VEG not burned: 100% power sawing) / 0.47 (ratio C to biomass) / 580 (kg/m3)

## Inputs from nature
- Carbon, organic, in soil or biomass stock [natural resource, in ground]: 1.94113 kg; = VEG/NPP
  Calculated value: above and below ground biomass, in kg C per reference flow. In the case of carbon emission (positive VEG value) the flux is from the soil and biomass; in cases of carbon sequestration (negative VEG value), the flux is from the air.
- Energy, gross calorific value, in biomass [natural resource, biotic]: 77.6453 MJ; = VEG/NPP*40
  Calculated Value: considering 15 MJ/kg (17% moisture wet basis) and 45% C in dry wood, 40 MJ/kg C in wood. 15 MJ is taken to reflect UHV rather than LHV.
- Transformation, from permanent crop [natural resource, land]: 1.23305 m2; = 1/NPP
  Calculated value: m2 required per unit land tenure, arable land.
- Transformation, to arable land, unspecified use [natural resource, land]: 1.23305 m2; = 1/NPP
  Calculated value: m2 required per unit land tenure, arable land.

## Emissions to nature
- Carbon dioxide, from soil or biomass stock [air, non-urban air or from high stacks]: 7.11749 kg; = VEG/NPP*44/12
  Calculated Value: Total ecosystem carbon stocks are used to estimate CO2 emissions to the atmosphere (IPCC 2006).; IPCC, Guidelines for National Greenhouse Gas Inventories - Agriculture, Forestry and Other Land Use 2006. Volume 4.

## Sampling procedure
There was no sampling.

## Extrapolations
From the data of Novaes et al., 2017, the only extrapolation is the convertion of land transformation scenarios into production volumes and its uncertainty values. More details about this can be found in the PV_comment.

Exchanges emission factors are the same from land transformations datasets 'clear-cutting, primary forest to arable land, annual crop, BR, 2010 - 2015' (Rossi, 2017a) and 'land already in use, annual cropland to annual crop, BR, 2010 - 2015' (Rossi, 2017b), thus extrapolated from a national level to state level.
