# uranium production, centrifuge, enriched 4.0%

Dataset: EcoSpold 2, unit process
Geography: RoW
Time period: 1993-01-01 to 2023-12-31
Technology level: current
Classification: EcoSpold01Categories: nuclear power/production
Classification: ISIC rev.4 ecoinvent: 2011:Manufacture of basic chemicals
Tags: ConvertedDataset
Scenario: Business-as-Usual
System model: Allocation, cut-off by classification
Generated by: [System]
Published in: Dones, R. 2007
Database: ecoinvent
isCopyrightProtected: true
accessRestrictedTo: 1

## General comment
This module uses a mix of data, some specific for the URENCO facilities taken from environmental reports, some from literature. Due to lack of information on Russian plants, all requirements and emissions are arbitrarily assumed the double of the URENCO module. Only (but still approximate) information available for TENEX facility is the electricity consumption by machines of two recent generations. A mix of generations has been assumed here, assuming conservatively a high value for auxiliary electricity (i.e., not directly used for spinning the centrifuges). The Russian electricity mix is used, which has been has been approximated using existing ecoinvent v2.0 electricity datasets for Europe. The factor for the infrastructure requirement is calculated with annual throughput of 1500 t SWU for 30 years operation (the Russian facilities are larger but this should not affect much the figures normalized by the total production).
[This dataset was already contained in the ecoinvent database version 2. It was not individually updated during the transfer to ecoinvent version 3. Life Cycle Impact Assessment results may still have changed, as they are affected by changes in the supply chain, i.e. in other datasets. This dataset was generated following the ecoinvent quality guidelines for version 2. It may have been subject to central changes described in the ecoinvent version 3 change report (http://www.ecoinvent.org/database/ecoinvent-version-3/reports-of-changes/), and the results of the central updates were reviewed extensively. The changes added e.g. consistent water flows and other information throughout the database. The documentation of this dataset can be found in the ecoinvent reports of version 2, which are still available via the ecoinvent website. The change report linked above covers all central changes that were made during the conversion process.]
[This dataset is meant to replace the following datasets:]

## Included activities end
The module is an extrapolation of the corresponding one for URENCO. The module includes: input of UF6; electricity, diesel, and natural gas used for operation; also taken into account is the material for replacement of centrifuge; water use, lubricant oil, and wastewater treatment; concrete assumed to be used for conditioning of contaminated scrap from decommissioning; transport requirements of operation materials, industrial wastes, and contaminated waste from decommissioning (25% of the reinforced concrete and the great part of metals according to the reference). Radioactive and non-radioactive emissions to air and to water from the operation are also included. The infrastructure requirements are accounted for, though construction and operation data partially refer to different plants rather than to one single unit.

## Geography
US and Western European data. Russian data for electricity uses.

## Technology
The technology used for uranium enrichment with centrifuge process in Russia is a mix of three generations of machines.

## Parameters
- fraction, cooling water, cooling pond system, to air: 0.032 dimensionless; name fraction_CW_CP_to_air; lognormal variance with pedigree 0.0413, pedigree (2,3,1,3,1)
  Calculated based on literature value (Scown, C.D., 2011, Water Footprint of U.S. Transportation Fuels and supplying information of the article) (Vionnet, S., Quantis Water Database - Technical Report, 2012).
- fraction, cooling water, once-through system, to air: 0.004 dimensionless; name fraction_CW_OT_to_air; lognormal variance with pedigree 0.0413, pedigree (2,3,1,3,1)
  (same comment as for fraction, cooling water, cooling pond system, to air)
- fraction, cooling water, recirculating system, to air: 0.771 dimensionless; name fraction_CW_R_to_air; lognormal variance with pedigree 0.0413, pedigree (2,3,1,3,1)
  (same comment as for fraction, cooling water, cooling pond system, to air)
- fraction, cooling water, to air: 0.3875 dimensionless; name fraction_CW_to_air; = (0.5*fraction_CW_OT_to_air)+(0.5*fraction_CW_R_to_air); lognormal variance with pedigree 0.092025, pedigree (4,4,3,2,4)
  Calculated value based on literature value (see comments of the other parametres present in this dataset) and expert opinion. In the case when no industry/literature data are available about the type of cooling or directly fraction, cooling water, to air specific for the process a default assumption is applied. It is assumed that the once-through cooling system is used in 50% of all cases and recirculating system is used in another 50% of all cases.
- fraction, water, decarbonised, to air: 0.3875 dimensionless; name fraction_WDC_to_air; lognormal variance with pedigree 0.092025, pedigree (4,4,3,2,4)
  Calculated value. See comments in the other parametres present in this dataset. Decarbonised water is considered to be always used as cooling water, thus cooling water fractions to air are applied to all carbonised water input flows to calculate the amount of water consumed in the processes.

## Reference product
- uranium, enriched 4.0%, per separative work unit: 1 unit; By-product classification allocatable product; CPC 33620: Uranium enriched in U235 and its compounds; plutonium and its compounds; alloys, dispersions, ceramic products[…]; HS2017 284420: Uranium; enriched in U235, plutonium, their compounds, alloys dispersions (including cermets), ceramic prod[...]
  EcoSpold01Location=RU
  production volume 2.98e6 unit; name PV_RP
    Production volume approximated with the installed uranium entichment capacity of 53600000 SWU/year. No data for capacity utilization was available. The capacity utilization is likely to vary between geographies and overestimate the production volume. 5 uranium enrichment activities are available in GLO. The total installed capacity is split equally over these activities.
  property price 295.224 EUR2005
    Calculated based on inputs: The price of the product has been calculated as a sum of the values of the material and energy inputs for this product. This value is therefore a rough estimation. It may underestimate the real price since there are additional expenses when producing any product. These expences can include for example labour costs, treatment of waste materials and profit for the producer. Please consider carefully whether this level of data quality is acceptable for your application.
  properties: carbon allocation 0 kg, carbon content 0, carbon content, fossil 0, carbon content, non-fossil 0, dry mass 1 kg, water content 0, water in wet mass 0 kg, wet mass 1 kg

## Inputs from technosphere
- acetylene: 3.95105e-5 kg; lognormal variance with pedigree 0.162, pedigree (1,1,5,5,1)
  own estimation, lack of data
  EcoSpold01Location=CH
  properties: carbon content, fossil 0.923077, dry mass 1 kg, heating value, net 51.2 MJ, wet mass 1 kg
  note on carbon content, fossil: C2H2. ecoinvent v2.2 report n 8. Produced from partial oxidation of natural gas
  note on heating value, net: Based on literature, page 25 (Value may refer to HHV), Althaus H.-J., Chudacoff M., Hischier R., Jungbluth N., Osses M. and Primas A. (2007) Life Cycle Inventories of Chemicals. Final report ecoinvent data v2.0 No. 8. EMPA, Swiss Centre for Life Cycle Inventories, Dübendorf, CH, Online-Version under: www.ecoinvent.org.
- aluminium, wrought alloy: 0.079021 kg; lognormal variance with pedigree 0.162, pedigree (1,1,5,5,1)
  EcoSpold01Location=RER
  own estimation, lack of data
  properties: dry mass 1 kg, wet mass 1 kg
- argon, liquid: 0.00284476 kg; lognormal variance with pedigree 0.162, pedigree (1,1,5,5,1)
  EcoSpold01Location=RER
  own estimation, lack of data
  properties: dry mass 1 kg, wet mass 1 kg
- brass: 0.00283053, 1.42238e-5 kg (2 suppliers, which the file names only by identifier); sum of these 0.00284476 kg; lognormal variance with pedigree 0.162, pedigree (1,1,5,5,1)
  EcoSpold01Location=CH
  own estimation, lack of data
  properties: dry mass 1 kg, wet mass 1 kg
- chemical, inorganic: 0.049151 kg; lognormal variance with pedigree 0.162, pedigree (1,1,5,5,1)
  own estimation, lack of data
  EcoSpold01Location=GLO
  properties: carbon content, fossil 0.003, dry mass 1 kg, wet mass 1 kg
  note on carbon content, fossil: This dataset is an unweighted average of 20 inorganic substances (listed in Tab 88.1, ecoinvent v2.2 report 8, part II), being part of the top100 chemicals included in this database. The C-content has also been calculated as an unweighted average of the C content of the substances composing this dataset.
- chemical, organic: 0.00129594 kg; lognormal variance with pedigree 0.162, pedigree (1,1,5,5,1)
  own estimation, lack of data
  EcoSpold01Location=GLO
  properties: carbon content, fossil 0.628, dry mass 1 kg, heating value, net 19.03 MJ, wet mass 1 kg
  note on carbon content, fossil: This dataset is an unweighted average of 20 organic substances (listed in Tab 88.1, ecoinvent v2.2 report 8, part II), being part of the top100 chemicals included in this database. The C-content has also been calculated as an unweighted average of the C content of the substances composing this dataset.
- concrete, normal strength: 4.57397e-5, 1.00442e-5, 1.58758e-5, 6.53321e-6, 8.72394e-6, 0.000193695, 8.1315e-5, 9.63949e-5 m3 (8 suppliers, which the file names only by identifier); sum of these 0.000458322 m3; lognormal variance with pedigree 0.162, pedigree (1,1,5,5,1)
  EcoSpold01Location=CH
  own estimation, lack of data
  properties: dry mass 2190 kg, water content 0.086758, wet mass 2380 kg
- diesel, burned in diesel-electric generating set, 10MW: 0.537063 MJ; lognormal variance with pedigree 0.042, pedigree (1,1,5,5,1)
  EcoSpold01Location=GLO
  environmental report
  properties: heating value, net 1 MJ
- electricity, high voltage: 0.100925, 0.01773, 0.130329, 0.0111692, 0.0970735, 0.0954225, 0.110681, 0.149453, 0.074101, 10.5663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 kWh (44 suppliers, which the file names only by identifier); sum of these 52.8493 kWh; = 42.692+10.1573426573427; lognormal variance with pedigree 0.162, pedigree (1,1,5,5,1)
  own estimation after one source
  EcoSpold01Location=PL
- electricity, high voltage: 12.479 kWh; lognormal variance with pedigree 0.162, pedigree (1,1,5,5,1)
  own estimation after one source. Electricity from non-alpine reservoir hydropower plants. As a simplifying assumption, only non-alpine reservoir plants are considered in this dataset. Alpine and tropical reservoir plants are neglected.
- electricity, medium voltage: 0.0067772, 0.0101448, 0.00320483, 0.0350125, 0.0415107, 0.504215, 0.00120256, 10.058, 3.37944, 0.00560505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 kWh (44 suppliers, which the file names only by identifier); sum of these 16.7832 kWh; lognormal variance with pedigree 0.052, pedigree (1,1,5,5,1)
  range of data
  EcoSpold01Location=UCTE
- heat, district or industrial, natural gas: 0.349424, 21.2641, 0.00657127 MJ (3 suppliers, which the file names only by identifier); sum of these 21.6201 MJ; lognormal variance with pedigree 0.162, pedigree (1,1,5,5,1)
  own estimation, lack of data
  EcoSpold01Location=RER
  properties: heating value, net 1 MJ
- hydrochloric acid, without water, in 30% solution state: 0.000316084 kg; lognormal variance with pedigree 0.162, pedigree (1,1,5,5,1)
  own estimation, lack of data
  EcoSpold01Location=RER
  properties: dry mass 1 kg, heating value, net 3.32 MJ, wet mass 1 kg
- hydrogen peroxide, without water, in 50% solution state: 0.0010979 kg; lognormal variance with pedigree 0.162, pedigree (1,1,5,5,1)
  own estimation, lack of data
  EcoSpold01Location=RER
  properties: dry mass 1 kg, heating value, net 7.13 MJ, wet mass 1 kg
- hydrogen, gaseous, medium pressure, merchant: 1.73846e-5 kg; lognormal variance with pedigree 0.162, pedigree (1,1,5,5,1)
  own estimation, lack of data
  EcoSpold01Location=RER
  properties: dry mass 1 kg, heating value, net 120.21 MJ, wet mass 1 kg
- low level radioactive waste: -0.00063 m3; name a_BP2; lognormal variance with pedigree 0.122, pedigree (1,1,1,5,1)
  EcoSpold01Location=CH
  own estimation, lack of data
  production volume; = PV_RP*a_BP2
    Calculated from the production volume of uranium, enriched 4.0%, per separative work unit in proportion to the respective output amounts.
  properties: dry mass 2500 kg, wet mass 2500 kg
- lubricating oil: 0.0145399 kg; lognormal variance with pedigree 0.162, pedigree (1,1,5,5,1)
  EcoSpold01Location=RER
  own estimation, lack of data
  properties: carbon content, fossil 0.75, dry mass 1 kg, heating value, net 40.2 MJ, wet mass 1 kg
  note on carbon content, fossil: Lubricating oil is produced from diesel. C-content/dry mass of fats and oils considered 75%, from: ecoinvent v2.2 report, n 15a, pg 40
  note on heating value, net: Literature value, Source: IPCC 2006, 2006 IPCC Guidelines for National Greenhouse Gas Inventories, Prepared by the National Greenhouse Gas Inventories Programme, Eggleston H.S., Buendia L., Miwa K., Ngara T. and Tanabe K. (eds). Published: IGES, Japan
- methanol: 0.00046198, 4.37545e-5 kg (2 suppliers, which the file names only by identifier); sum of these 0.000505734 kg; lognormal variance with pedigree 0.162, pedigree (1,1,5,5,1)
  EcoSpold01Location=CH
  own estimation, lack of data
  properties: carbon content, fossil 0.375, dry mass 1 kg, heating value, net 20 MJ, wet mass 1 kg
  note on heating value, net: Based on literature, page 533, Report 17: Jungbluth, N., Chudacoff, M., Dauriat, A., Dinkel, F., Doka, G., Faist Emmenegger, M., Gnansounou, E., Kljun, N., Schleiss, K., Spielmann, M., Stettler, C., Sutter, J. 2007: Life Cycle Inventories of Bioenergy. ecoinvent report No. 17, Swiss Centre for Life Cycle Inventories, Dübendorf, CH.
- municipal solid waste: -0.000385883, -2.38265e-5, -1.56888e-5, -0.000637044, -7.56462e-5, -4.22868e-5, -0.000186611, -0.000470803, -0.000121098, -0.000297566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 kg (41 suppliers, which the file names only by identifier); sum of these -0.371399 kg; lognormal variance with pedigree 0.122, pedigree (1,1,1,5,1)
  own estimation, lack of data
  EcoSpold01Location=CH
  production volume; = PV_RP*a_BP4
    (same comment as for low level radioactive waste)
  properties: carbon content, fossil 0.171549, carbon content, non-fossil 0.261655, dry mass 0.771 kg, heating value, net 11.74 MJ, water content 0.297017, wet mass 1 kg
  note on carbon content, fossil: MSW composition in tab 4.1, ecoinvent v2.2 report 13_I. C content referred to 1 kg DM
  note on heating value, net: Value taken from the general comment of the treatment dataset.
- nitric acid, without water, in 50% solution state: 7.50017e-5, 0.000277133, 0.000846132, 0.000456703, 0.000132787, 0.000111028, 0.000111441, 0.000360403 kg (8 suppliers, which the file names only by identifier); sum of these 0.00237063 kg; lognormal variance with pedigree 0.162, pedigree (1,1,5,5,1)
  own estimation, lack of data
  EcoSpold01Location=RER
  properties: dry mass 1 kg, wet mass 1 kg
- nitrogen, liquid: 0.000616364 kg; lognormal variance with pedigree 0.162, pedigree (1,1,5,5,1)
  own estimation, lack of data
  EcoSpold01Location=RER
  properties: dry mass 1 kg, wet mass 1 kg
- oxygen, liquid: 5.68951e-5 kg; lognormal variance with pedigree 0.162, pedigree (1,1,5,5,1)
  EcoSpold01Location=RER
  own estimation, lack of data
  properties: dry mass 1 kg, wet mass 1 kg
- phosphoric acid, fertiliser grade, without water, in 70% solution state: 0.00018965 kg; lognormal variance with pedigree 0.162, pedigree (1,1,5,5,1)
  own estimation, lack of data
  EcoSpold01Location=GLO
  properties: dry mass 1 kg, wet mass 1 kg
- polyvinylchloride, bulk polymerised: 0.00135175 kg; lognormal variance with pedigree 0.162, pedigree (1,1,5,5,1)
  EcoSpold01Location=RER
  own estimation, lack of data
  properties: carbon content, fossil 0.387097, dry mass 1 kg, heating value, net 21.5 MJ, wet mass 1 kg
  note on carbon content, fossil: Monomer is vynyl chloride, C2H3Cl (ecoinvent v2.2 report 11_II). MW=62 g/mol
- soap: 0.00141399 kg; lognormal variance with pedigree 0.162, pedigree (1,1,5,5,1)
  EcoSpold01Location=RER
  own estimation, lack of data
  properties: carbon content, non-fossil 0.692237, dry mass 0.87 kg, heating value, net 17.93 MJ, water content 0.149425, wet mass 1 kg
  note on carbon content, non-fossil: Soap (CnH2n+1 COO Na) is produced by a combined saponification and neutralisation process performed on a blend of oleochemical feedstocks comprised of short chain (C12-14, derived from coconut or palm kernel oil) and long chain (C16-18, from tallow or palm oil) esters.The ratio of short to long fatty acid chains is 20:80 (ecoinvent v2.2 report 12). Short fatty acid has been estimated as C12.5H(2*12.5+1); MW R=176 g/mol. Long fatty acid has been estimated as C16H(2*16+1); MW R=225 g/mol. MW of COONa=67 g/mol
- sodium hydroxide, without water, in 50% solution state: 0.00442517 kg; lognormal variance with pedigree 0.162, pedigree (1,1,5,5,1)
  own estimation, lack of data
  EcoSpold01Location=RER
  properties: dry mass 1 kg, heating value, net 3.03 MJ, wet mass 1 kg
- spent anion exchange resin from potable water production: -0.0013642, -0.0903001 kg (2 suppliers, which the file names only by identifier); sum of these -0.0916643 kg; lognormal variance with pedigree 0.122, pedigree (1,1,1,5,1)
  EcoSpold01Location=CH
  environmental report
  production volume; = PV_RP*a_BP1
    (same comment as for low level radioactive waste)
  properties: carbon content, fossil 0.654, dry mass 0.5 kg, heating value, net 6.08 MJ, water content 1, wet mass 1 kg
  note on carbon content, fossil: Tab A.12, ecoinvent v2.2 report 13_I, c content is referred to 1 kg DM
- steel, low-alloyed, hot rolled: 0.237063 kg; lognormal variance with pedigree 0.162, pedigree (1,1,5,5,1)
  EcoSpold01Location=RER
  own estimation, lack of data
  properties: carbon content, fossil 0.005, dry mass 1 kg, wet mass 1 kg
  note on carbon content, fossil: Low alloyed steel composition given in Tab. 3.2 ecoinvent v2.2 report 10_partII. Steel assumed to have a C content of 0.5%
- uranium enrichment centrifuge facility: 2.22e-8 unit; lognormal variance with pedigree 0.162, pedigree (1,1,5,5,1)
  EcoSpold01Location=RU
  own estimation, lack of data
- uranium hexafluoride: 0.0407928, 1.40921 kg (2 suppliers, which the file names only by identifier); sum of these 1.45 kg; lognormal variance with pedigree 0.042, pedigree (1,1,5,5,1)
  EcoSpold01Location=US
  calculated
  properties: dry mass 1 kg, wet mass 1 kg
- waste mineral oil: -3.55263e-5, -0.00375748 kg (2 suppliers, which the file names only by identifier); sum of these -0.00379301 kg; lognormal variance with pedigree 0.122, pedigree (1,1,1,5,1)
  own estimation, lack of data
  EcoSpold01Location=CH
  production volume; = PV_RP*a_BP3
    (same comment as for low level radioactive waste)
  properties: carbon content, fossil 0.864444, dry mass 0.9 kg, heating value, net 34.7 MJ, water content 0.111111, wet mass 1 kg
  note on carbon content, fossil: Tab A.6, ecoinvent v2.2 report 13_I. C content has been calculated after data in the tables, and then referred to 1 kg DM
- water, decarbonised: 0.000190921, 0.156795, 2.29105, 0.117329, 1.9448, 0.199314, 1.2313, 0.305289, 0.0149878, 0.0606152 kg (10 suppliers, which the file names only by identifier); sum of these 6.32168 kg; lognormal variance with pedigree 0.162, pedigree (1,1,5,5,1)
  own estimation, lack of data
  EcoSpold01Location=RER
  properties: wet mass 1 kg

## Emissions to nature
- 1,1,1,2-Tetrafluoroethane [air, non-urban air or from high stacks]: 0.000410909 kg; lognormal variance with pedigree 0.162, pedigree (1,1,5,5,1)
  own estimation, lack of data
- Ethanol [air, non-urban air or from high stacks]: 0.00205455 kg; lognormal variance with pedigree 0.162, pedigree (1,1,5,5,1)
  own estimation, lack of data
- Hydrogen fluoride [air, non-urban air or from high stacks]: 5.84755e-8 kg; lognormal variance with pedigree 0.162, pedigree (1,1,5,5,1)
  own estimation, lack of data
- Thorium-234 [air, non-urban air or from high stacks]: 0.000458322 kBq; lognormal variance with pedigree 0.162, pedigree (1,1,5,5,1)
  own estimation, lack of data
- Uranium alpha [air, non-urban air or from high stacks]: 9.16643e-5 kBq; lognormal variance with pedigree 0.162, pedigree (1,1,5,5,1)
  own estimation, lack of data
- Water [air, unspecified]: 0.00244965 m3; name water_to_air_unspecified; lognormal variance with pedigree 0.0827, pedigree (2,2,5,5,1)
  Calculated value based on literature values and expert opinion. See comments in the parametres' comment field.
  property fraction, origin: fresh water 1; name fraction_origin_fresh_water
  property fraction, origin: salt water 0; name fraction_origin_salt_water
  property fraction, origin: unspecified 0; name fraction_origin_unspecified
- Aluminium III [water, surface water]: 0.00173846 kg; lognormal variance with pedigree 0.162, pedigree (1,1,5,5,1)
  own estimation, lack of data
- Chromium III [water, surface water]: 6.00559e-6 kg; lognormal variance with pedigree 0.162, pedigree (1,1,5,5,1)
  own estimation, lack of data
- Copper ion [water, surface water]: 2.05455e-6 kg; lognormal variance with pedigree 0.162, pedigree (1,1,5,5,1)
  own estimation, lack of data
- Fluoride [water, surface water]: 0.000173846 kg; lognormal variance with pedigree 0.162, pedigree (1,1,5,5,1)
  own estimation, lack of data
- Hydrocarbons, unspecified [water, surface water]: 9.64056e-5 kg; lognormal variance with pedigree 0.162, pedigree (1,1,5,5,1)
  own estimation, lack of data
- Nitrate [water, surface water]: 0.00395105 kg; lognormal variance with pedigree 0.162, pedigree (1,1,5,5,1)
  own estimation, lack of data
- Phosphate [water, surface water]: 0.000537343 kg; lognormal variance with pedigree 0.162, pedigree (1,1,5,5,1)
  own estimation, lack of data
- Thorium-234 [water, surface water]: 0.0048993 kBq; lognormal variance with pedigree 0.162, pedigree (1,1,5,5,1)
  own estimation, lack of data
- Uranium alpha [water, surface water]: 1.29594e-5 kBq; lognormal variance with pedigree 0.162, pedigree (1,1,5,5,1)
  own estimation, lack of data
- Water [water, unspecified]: 0.00387203 m3; name water_to_water_unspecified; lognormal variance with pedigree 0.0827, pedigree (2,2,5,5,1)
  (same comment as for Water)
  property carbon content, fossil 0; name C_content_fossil
  property carbon content, non-fossil 0; name C_content_non_fossil
  property dry mass 0 kg; name DM
  property fraction, origin: fresh water 1; name fraction_origin_fresh_water_Ww
  property fraction, origin: salt water 0; name fraction_origin_salt_water_Ww
  property fraction, origin: unspecified 0; name fraction_origin_unspecified_Ww
  property water in wet mass 1000 kg; name WWM
  property wet mass 1000 kg; name WM
- Zinc II [water, surface water]: 6.00559e-5 kg; lognormal variance with pedigree 0.162, pedigree (1,1,5,5,1)
  own estimation, lack of data

## Sampling procedure
Literature

## Extrapolations
none This dataset has been copied from an original dataset covering the geography RU. The uncertainty has been adjusted accordingly.

## Review by Thomas Nemecek 2007-08-24
Passed.
