# gypsum quarry operation

Dataset: EcoSpold 2, unit process
Geography: IN
Time period: 2014-04-01 to 2023-12-31
Technology level: current
Classification: ISIC rev.4 ecoinvent: 0810:Quarrying of stone, sand and clay
Classification: EcoSpold01Categories: construction materials/others
Tags: combined production
Scenario: Business-as-Usual
System model: Allocation, cut-off by classification
Generated by: P V Kiran Ananth
Published in: Wolkem consultancy services 2015
Database: ecoinvent
isCopyrightProtected: true
accessRestrictedTo: 1

## General comment
This dataset is built on the gypsum quarry operation /GLO dataset in which some exchanges have been edited to make ith specific to India situation. Gypsum is hydrated calcium sulphate used widely in industries like Cement, Fertilizer and Plaster of Paris. The production of gypsum in 2014-15 year is 2.48 million tonnes. More than 99% of gypsum are consumed by cement industry. Anhydrite i.e. calcium sulfate mineral is found associated with gypsum commonly as massive of fibrous minerals with proportion of 65.7% Gypsum, 34.3% Anhydrite..

## Included activities start
Exploration, Mining, Blasting & Drilling

## Included activities end
The activity end with the unprocessed gypsum mineral and anhydrite at quarry gate.

## Geography
This dataset is built on the gypsum quarry operation /GLO dataset in which some exchanges have been edited to make it specific to Rajasthan (India situation). As more than 80% resource of mineral gypsum occured in state of Rajasthan

## Technology
Gypsum deposits are usually found at shallow depths and are scattered over large areas. The deposits are mined out by opencast method and usually by manual mining except in few semi mechanised mines in Rajasthan.

## Time period
Data collected and analysied for year 2014-15. and has been assumed that there is no significant change in technology.

## Parameters
- sum of reference products: 1 kg; name sum_RP
  It's the addition of the different reference product's amount

## Reference product
- gypsum, mineral: 1 kg; name gypsum; = gypsum_PV/(anhydrite_rock_PV+ gypsum_PV); By-product classification allocatable product; CPC 15200: Gypsum; anhydrite; limestone flux; limestone and other calcareous stone, of a kind used for the manufacture of[…]; HS2017 252010: Gypsum; anhydrite; CAS 13397-24-5
  EcoSpold01Location=CH
  The amount was calculated relative to the production volumes.
  production volume 1.612e9 kg; name gypsum_PV; = 2.48*10^9*0.65
    The production of gypsum in 2014-15 is 2.48 million tonnes (Indian Minerals Yearbook 2015 Part-III : Mineral Reviews 54th Edition)
    It was considered that 34% was anhydrite and 65% gypsum (ecoinvent v2.2 report 7)
  property price 0.005 EUR2005
    Temporary price data. Calculated as 90% of purchasers price based on: 2004 prices for gypsum, crude, at mine in USGS (2007) Mineral commodity summaries 2007. <http://minerals.usgs.gov/minerals/pubs/mcs/2007/mcs2007.pdf> [Accessed 25 May 2010] and USGS (2009a) Mineral commodity summaries 2009. <http://minerals.usgs.gov/minerals/pubs/mcs/2009/mcs2009.pdf> [Accessed 25 May 2010]; The prices from USGS are assumed to be World/USA prices because they were collected from USA, major producer countries or global market (e.g. London, Metal Exchange).
  properties: carbon allocation 0 kg, carbon content 0, carbon content, fossil 0, carbon content, non-fossil 0, dry mass 1 kg, water content 0, water in wet mass 0 kg, wet mass 1 kg

## Inputs from technosphere
- blasting: 0.000208 kg; = (2.08E-04/sum_RP)*( anhydrite_rock+gypsum); lognormal variance with pedigree 0.144, pedigree (5,4,5,5,4)
  EcoSpold01Location=RER
  Data taken from limestone quesrry operation in India. Considering mining operation of Gypsum & Limestone are similar in nature.
- conveyor belt: 1.05e-8 m; = (1.05E-08/sum_RP)*( anhydrite_rock+gypsum); lognormal variance with pedigree 0.442, pedigree (5,4,5,5,3)
  EcoSpold01Location=RER
  Data from gypsum quarry operation GLO
- diesel, burned in building machine: 0.018 MJ; = (0.018/sum_RP)*( anhydrite_rock+gypsum); lognormal variance with pedigree 0.192, pedigree (4,4,5,5,1)
  EcoSpold01Location=GLO
  Data from gypsum quarry operation GLO
  properties: heating value, net 1 MJ
- electricity, medium voltage: 0.000916 kWh; = (0.000916/sum_RP)*( anhydrite_rock+gypsum); lognormal variance with pedigree 0.074, pedigree (3,4,5,5,3)
  Data from gypsum quarry operation GLO
  EcoSpold01Location=CH
- industrial machine, heavy, unspecified: 4.63e-6 kg; = (4.63E-06/sum_RP)*( anhydrite_rock+gypsum); lognormal variance with pedigree 0.374, pedigree (3,4,5,5,3)
  EcoSpold01Location=RER
  Data from gypsum quarry operation GLO
- irrigation: 4.6666e-7 m3; = (4.6666E-7/sum_RP)*( anhydrite_rock+gypsum); lognormal variance with pedigree 0.0506, pedigree (4,4,5,1,1)
  Water use for plantation purpose.
  properties: dry mass 0.11 kg, water content 9089.91, wet mass 1000 kg
- limestone quarry infrastructure: 5.26e-11 unit; = (5.26E-11/sum_RP)*( anhydrite_rock+gypsum); lognormal variance with pedigree 0.374, pedigree (3,4,5,5,3)
  EcoSpold01Location=CH
  Data from gypsum quarry operation GLO
- recultivation, limestone mine: 0.00246 m2; = (0.00246/sum_RP)*( anhydrite_rock+gypsum); lognormal variance with pedigree 0.19, pedigree (4,4,5,1,1)
  EcoSpold01Location=CH
  Data taken from Environmental Impact Assesment Report of Gypsum mining in state of Rajasthan.

## Inputs from nature
- Gypsum [natural resource, in ground]: 1 kg; = (1/sum_RP)*( anhydrite_rock+gypsum); lognormal variance with pedigree 0.04, pedigree (1,1,5,1,1)
  Data represents extraction of Gypsum from ground
- Occupation, mineral extraction site [natural resource, land]: 0.1122 m2*year; = (0.1122/sum_RP)*( anhydrite_rock+gypsum); lognormal variance with pedigree 0.11, pedigree (4,4,5,1,1)
  Data taken from Environmental Impact Assesment Report of Gypsum mining in state of Rajasthan.Life of Mine 30 years with annual production of 3 million tonnes. Mining lease area more than 1100 hectares.
- Transformation, from unspecified [natural resource, land]: 0.00227773 m2; = (0.002277733/sum_RP)*( anhydrite_rock+gypsum); lognormal variance with pedigree 0.19, pedigree (4,4,5,1,1)
  Data taken from Environmental Impact Assesment Report of Gypsum mining in state of Rajasthan.
- Transformation, to mineral extraction site [natural resource, land]: 0.00227773 m2; = (0.002277733/sum_RP)*( anhydrite_rock+gypsum); lognormal variance with pedigree 0.19, pedigree (4,4,5,1,1)
  (same comment as for Transformation, from unspecified)
- Water, unspecified natural origin [natural resource, in water]: 1.68e-6 m3; = (0.00000168/sum_RP)*( anhydrite_rock+gypsum); lognormal variance with pedigree 0.0506, pedigree (4,4,5,1,1)
  Water consumption for Dust Supression, Drinking & Maintainance of machine

## Emissions to nature
- Particulate Matter, < 2.5 um [air, non-urban air or from high stacks]: 8e-5 kg; = (8E-05/sum_RP)*( anhydrite_rock+gypsum); lognormal variance with pedigree 0.43, pedigree (1,5,5,5,4)
  Data from gypsum quarry operation GLO
- Particulate Matter, > 10 um [air, non-urban air or from high stacks]: 0.00112 kg; = (0.00112/sum_RP)*( anhydrite_rock+gypsum); lognormal variance with pedigree 0.17, pedigree (1,5,5,5,4)
  Data from gypsum quarry operation GLO
- Particulate Matter, > 2.5 um and < 10um [air, non-urban air or from high stacks]: 0.0004 kg; = (0.0004/sum_RP)*( anhydrite_rock+gypsum); lognormal variance with pedigree 0.25, pedigree (1,5,5,5,4)
  Data from gypsum quarry operation GLO
- Water [air, unspecified]: 2.14666e-6 m3; = (2.14666E-06/sum_RP)*( anhydrite_rock+gypsum); lognormal variance with pedigree 0.0506, pedigree (4,4,5,1,1)
  Water in the form vapor from - Dust supression and irrigation process. This value is represent for water input and irrigation.

## Sampling procedure
Environment statement report for gypsum mining in the state of Rajasthan and literature has referred.

## Extrapolations
This dataset is built on the gypsum quarry operation /GLO dataset in which some exchanges have been edited to make it specific to Indian situation. The uncertainty has been adjusted accordingly.
