# mowing, by rotary or sickle mower

Dataset: EcoSpold 2, unit process
Geography: US
Time period: 2021-01-01 to 2023-12-31
Technology level: current
Classification: ISIC rev.4 ecoinvent: 0161:Support activities for crop production
Scenario: Business-as-Usual
System model: Allocation, cut-off by classification
Generated by: Juanita Barrera
Database: ecoinvent
isCopyrightProtected: true
accessRestrictedTo: 1

## General comment
This dataset models the service of mowing, by a rotary mower or a sickle mower. The working width is 3m. The functional unit (FU) is one ha mowed area and the operation time is 0.9 h/FU.

## Included activities start
The activity starts from the agricultural field foreseen to be processed.

## Included activities end
This activity ends with mowing. The dataset includes the diesel fuel consumption and the amount of agricultural machinery and of the shed, which has to be attributed to the mowing. Also taken into consideration is the amount of emissions to the air from combustion and the emission to the soil from tyre abrasion during the work process. The following activities were considered part of the work process: preliminary work at the farm, like attaching the adequate machine to the tractor; transfer to field (with an assumed distance of 1 km); field work (for a parcel of land of 1 ha surface); transfer to farm and concluding work, like uncoupling the machine. The overlapping during the field work is considered. The dataset doesn't include the amount of mowed good, dust other than from combustion and noise.

## Geography
The inventory is extrapolated from the geography of Switzerland. Data quality indicators are adjusted accordingly.

## Technology
Fuel consumption and emissions per kg diesel have been extrapolated to the US, but others inputs were taken from the original values.

## Reference product
- mowing, by rotary or sickle mower: 1 ha; By-product classification allocatable product; CPC 86119: Other support services to crop production
  production volume 2.45374e8 ha
    FAOSTAT data year 2011: Permanent meadows and pastures area, 1 cut per year assumed (considering grazing), 80% of it done by rotary mower assumed (own estimation)
  property price 22.2136 EUR2005
    The price is from the year 2020. Price information has been directly provided by the data provider based on the following reference: University of Minnesota, Machinery cost estimates, W.F. Lazarus, 2020. The prices were adjusted for inflation relative to 2005 using the producer price index (PPI) of the euro area, published by eurostat (https://ec.europa.eu/eurostat/databrowser/view/STS_INPP_A__custom_6416181/default/table?lang=en, last accessed on 2023-06-01).
  properties: carbon allocation 0 kg, carbon content 0

## Inputs from technosphere
- agricultural machinery, unspecified: 1.07 kg; lognormal variance with pedigree 0.3042, pedigree (1,4,2,5,1)
  proxy from "mowing, by rotary mower, CH"
- diesel: 6.17364 kg; lognormal variance with pedigree 0.0028, pedigree (1,4,2,1,1)
  Helsel, 2007 Fuel Requirements and Energy Savings Tips for Field Operations, The State University of New Jersey Available at: https://njaes.rutgers.edu/pubs/publication.php?pid=FS1068
  properties: carbon content, fossil 0.865, dry mass 1 kg, heating value, net 42.8 MJ, wet mass 1 kg
- shed: 0.0029 m2; lognormal variance with pedigree 0.3042, pedigree (1,4,2,5,1)
  proxy from "mowing, by rotary mower, CH"
- tractor, 4-wheel, agricultural: 0.412 kg; lognormal variance with pedigree 0.3042, pedigree (1,4,2,5,1)
  proxy from "mowing, by rotary mower, CH"

## Emissions to nature
- Ammonia [air, non-urban air or from high stacks]: 0.000123473 kg; lognormal variance with pedigree 0.058325, pedigree (1,2,2,2,3)
  adapted from "mowing, by rotary mower, CH" to match the diesel consumption
- Benzene [air, non-urban air or from high stacks]: 4.51206e-5 kg; lognormal variance with pedigree 0.058325, pedigree (1,2,2,2,3)
  adapted from "mowing, by rotary mower, CH" to match the diesel consumption
- Benzo(a)pyrene [air, non-urban air or from high stacks]: 1.84779e-7 kg; lognormal variance with pedigree 0.658325, pedigree (1,2,2,2,3)
  adapted from "mowing, by rotary mower, CH" to match the diesel consumption
- Cadmium II [air, non-urban air or from high stacks]: 6.17364e-8 kg; lognormal variance with pedigree 0.658325, pedigree (1,2,2,2,3)
  adapted from "mowing, by rotary mower, CH" to match the diesel consumption
- Carbon dioxide, fossil [air, non-urban air or from high stacks]: 19.1941 kg; lognormal variance with pedigree 0.018325, pedigree (1,2,2,2,3)
  adapted from "mowing, by rotary mower, CH" to match the diesel consumption
- Carbon monoxide, fossil [air, non-urban air or from high stacks]: 0.024494 kg; lognormal variance with pedigree 0.652225, pedigree (1,4,2,2,1)
  adapted from "mowing, by rotary mower, CH" to match the diesel consumption
- Chromium III [air, non-urban air or from high stacks]: 3.07966e-7 kg; lognormal variance with pedigree 0.658325, pedigree (1,2,2,2,3)
  adapted from "mowing, by rotary mower, CH" to match the diesel consumption
- Copper ion [air, non-urban air or from high stacks]: 1.04995e-5 kg; lognormal variance with pedigree 0.658325, pedigree (1,2,2,2,3)
  adapted from "mowing, by rotary mower, CH" to match the diesel consumption
- Dinitrogen monoxide [air, non-urban air or from high stacks]: 0.00074055 kg; lognormal variance with pedigree 0.058325, pedigree (1,2,2,2,3)
  adapted from "mowing, by rotary mower, CH" to match the diesel consumption
- Methane, fossil [air, non-urban air or from high stacks]: 0.000796414 kg; lognormal variance with pedigree 0.058325, pedigree (1,2,2,2,3)
  adapted from "mowing, by rotary mower, CH" to match the diesel consumption
- NMVOC, non-methane volatile organic compounds [air, non-urban air or from high stacks]: 0.0146105 kg; lognormal variance with pedigree 0.042225, pedigree (1,4,2,2,1)
  adapted from "mowing, by rotary mower, CH" to match the diesel consumption
- Nickel II [air, non-urban air or from high stacks]: 4.32585e-7 kg; lognormal variance with pedigree 0.658325, pedigree (1,2,2,2,3)
  adapted from "mowing, by rotary mower, CH" to match the diesel consumption
- Nitrogen oxides [air, non-urban air or from high stacks]: 0.239211 kg; lognormal variance with pedigree 0.042225, pedigree (1,4,2,2,1)
  adapted from "mowing, by rotary mower, CH" to match the diesel consumption
- PAH, polycyclic aromatic hydrocarbons [air, non-urban air or from high stacks]: 2.03401e-5 kg; lognormal variance with pedigree 0.318325, pedigree (1,2,2,2,3)
  adapted from "mowing, by rotary mower, CH" to match the diesel consumption
- Particulate Matter, < 2.5 um [air, non-urban air or from high stacks]: 0.0295074 kg; lognormal variance with pedigree 0.318325, pedigree (1,2,2,2,3)
  adapted from "mowing, by rotary mower, CH" to match the diesel consumption
- Selenium IV [air, non-urban air or from high stacks]: 6.17364e-8 kg; lognormal variance with pedigree 0.058325, pedigree (1,2,2,2,3)
  adapted from "mowing, by rotary mower, CH" to match the diesel consumption
- Sulfur dioxide [air, non-urban air or from high stacks]: 0.00621661 kg; lognormal variance with pedigree 0.018325, pedigree (1,2,2,2,3)
  adapted from "mowing, by rotary mower, CH" to match the diesel consumption
- Zinc II [air, non-urban air or from high stacks]: 6.17364e-6 kg; lognormal variance with pedigree 0.658325, pedigree (1,2,2,2,3)
  adapted from "mowing, by rotary mower, CH" to match the diesel consumption
- Cadmium II [soil, agricultural]: 2.41e-7 kg; lognormal variance with pedigree 0.0442, pedigree (1,4,2,5,1)
  proxy from "mowing, by rotary mower, CH"
- Lead II [soil, agricultural]: 1.08e-6 kg; lognormal variance with pedigree 0.0442, pedigree (1,4,2,5,1)
  proxy from "mowing, by rotary mower, CH"
- Zinc II [soil, agricultural]: 0.000629 kg; lognormal variance with pedigree 0.0422, pedigree (1,4,2,1,1)
  proxy from "mowing, by rotary mower, CH"

## Extrapolations
The dataset is modeled for agricultural production system in US. Data Quality indicators are adjusted accordingly.
