# brazing solder production, cadmium free

Dataset: EcoSpold 2, unit process
Geography: RoW
Time period: 2000-01-01 to 2023-12-31
Technology level: current
Classification: EcoSpold01Categories: metals/extraction
Classification: ISIC rev.4 ecoinvent: 2029:Manufacture of other chemical products n.e.c.
Tags: ConvertedDataset
Scenario: Business-as-Usual
System model: Allocation, cut-off by classification
Generated by: Hans-Jörg Althaus
Published in: Althaus H.-J. 2000
Database: ecoinvent
isCopyrightProtected: true
accessRestrictedTo: 1

## General comment
Stands for solder with 60% Cu and 40% Zn. All data are calculated based on assumptions and theoretical models. Their overall quality is poor.
[This dataset was already contained in the ecoinvent database version 2. It was not individually updated during the transfer to ecoinvent version 3. Life Cycle Impact Assessment results may still have changed, as they are affected by changes in the supply chain, i.e. in other datasets. This dataset was generated following the ecoinvent quality guidelines for version 2. It may have been subject to central changes described in the ecoinvent version 3 change report (http://www.ecoinvent.org/database/ecoinvent-version-3/reports-of-changes/), and the results of the central updates were reviewed extensively. The changes added e.g. consistent water flows and other information throughout the database. The documentation of this dataset can be found in the ecoinvent reports of version 2, which are still available via the ecoinvent website. The change report linked above covers all central changes that were made during the conversion process.]

## Included activities start
The activity starts with the reception of the raw materials at the plant gate.

## Included activities end
The activity ends with the produced brazing solder, including copper and tin melting and the casting of solder.

## Geography
Production data relate to the European average. Transports of inputs relate to the consumption in Europe

## Technology
Assumed energy mix for melting. Abatement of air emissions assumed

## Reference product
- brazing solder, cadmium free: 1 kg; By-product classification allocatable product; CPC 42950: Wire, rods, tubes, plates, electrodes and similar products, of base metal or of metal carbides, coated or core[…]; HS2017 831190: Wires, rods, tubes, plates, electrodes of base metal or metal carbides; of a kind used for soldering, brazi[...]
  EcoSpold01Location=RER
  production volume 2.67763 kg
    This is a placeholder value that does not reflect real-world production volumes. This dataset does not currently require a real-world production volume to work in the database framework, and no actual data were collected yet. This has no negative effect on the results of the ecoinvent database.
  property carbon content, fossil 0
    The main elements used in solders are copper, tin, zinc, silver, lead, cadmium and sometimes nickel, manganese or cobalt (ecoinvent v2.2 report 10-part III)
  property carbon content, non-fossil 0
    (same comment as for brazing solder, cadmium free)
  property price 33.79 EUR2005
    Calculated value based on data from United Nations Commodity Trade Statistics Database (comtrade.un.org). UN comtrade category: 851519 Electric brazing, soldering machines and apparatus ne. Year 2005. Using exchange rate of 1EURO = 1.209 USD. Average of price of import into 5 main markets (EU, US, JP, IN and CN).
  properties: carbon allocation 0 kg, carbon content 0, dry mass 1 kg, water content 0, water in wet mass 0 kg, wet mass 1 kg

## Inputs from technosphere
- aluminium casting facility: 4.9e-11 unit; lognormal variance with pedigree 0.458, pedigree (4,5,5,5,4)
  EcoSpold01Location=RER
- copper, cathode: 0.606 kg; lognormal variance with pedigree 0.148, pedigree (4,5,5,5,4)
  EcoSpold01Location=RER
  properties: dry mass 1 kg, wet mass 1 kg
- electricity, medium voltage: 0.000644716, 0.0128606, 0.00432114, 0.000197434, 3.95163e-5, 8.48503e-6, 0.00132806 kWh (7 suppliers, which the file names only by identifier); sum of these 0.0194 kWh; lognormal variance with pedigree 0.148, pedigree (4,5,5,5,4)
  EcoSpold01Location=UCTE
- heat, district or industrial, natural gas: 0.00564225, 0.343358 MJ (2 suppliers, which the file names only by identifier); sum of these 0.349 MJ; lognormal variance with pedigree 0.148, pedigree (4,5,5,5,4)
  EcoSpold01Location=RER
  properties: heating value, net 1 MJ
- heat, district or industrial, other than natural gas: 0.278871, 0.000129196 MJ (2 suppliers, which the file names only by identifier); sum of these 0.279 MJ; lognormal variance with pedigree 0.148, pedigree (4,5,5,5,4)
  EcoSpold01Location=RER
  properties: heating value, net 1 MJ
- zinc: 0.404 kg; lognormal variance with pedigree 0.148, pedigree (4,5,5,5,4)
  EcoSpold01Location=RER
  properties: dry mass 1 kg, wet mass 1 kg

## Emissions to nature
- Zinc II [air, unspecified]: 0.000404 kg; lognormal variance with pedigree 0.198, pedigree (4,5,5,5,4)

## Sampling procedure
based on literature and internet

## Extrapolations
none This dataset has been copied from an original dataset covering the geography RER. The uncertainty has been adjusted accordingly.

## Review by Roland Hischier 2003-06-12
Passed.
