# diazine-compound production

Dataset: EcoSpold 2, unit process
Geography: RER
Time period: 2000-01-01 to 2023-12-31
Technology level: current
Classification: EcoSpold01Categories: agricultural means of production/pesticides
Classification: ISIC rev.4 ecoinvent: 2021:Manufacture of pesticides and other agrochemical products
Tags: ConvertedDataset
Scenario: Business-as-Usual
System model: Allocation, cut-off by classification
Share of production covered: 100 %
Generated by: Jürgen Sutter
Published in: Sutter, J. 2007
Database: ecoinvent
isCopyrightProtected: true
accessRestrictedTo: 1

## General comment
This dataset represents the production of diazine-compounds (1 kg of active ingredient). Raw materials are modelled with a stoichiometric calculation. Energy consumption is modelled with data from a similar process. The emissions are estimated. Infrastructure is included with a default value.
[This dataset was already contained in the ecoinvent database version 2. It was not individually updated during the transfer to ecoinvent version 3. Life Cycle Impact Assessment results may still have changed, as they are affected by changes in the supply chain, i.e. in other datasets. This dataset was generated following the ecoinvent quality guidelines for version 2. It may have been subject to central changes described in the ecoinvent version 3 change report (http://www.ecoinvent.org/database/ecoinvent-version-3/reports-of-changes/), and the results of the central updates were reviewed extensively. The changes added e.g. consistent water flows and other information throughout the database. The documentation of this dataset can be found in the ecoinvent reports of version 2, which are still available via the ecoinvent website. The change report linked above covers all central changes that were made during the conversion process.]

## Included activities start
From reception of precursors (acetic anhydride, acetylene, alumminium, ammonia, ammonium chloride, aniline, calcium, carbon dioxide, chlorine, dichloromethane, dimethylamine, dimethyl sulfate, ethanol, ethylacetate, formaldehyde, hydrochloric acid, hydrogen, hydrogen cyanide, hydrogen fluoride, hydrogen sulfide, iodine, methanol, natural gas, nitrogen, oxygen, phosgene, phosphorus, propylene, sodium chloride, sodium hydroxide, sulfur, sulfur dioxide, sulfuric acid, sulfur trioxide, water decarbonised, and "water, salt, sole") at the factory gate.

## Included activities end
This activity ends with diazine-compounds at the factory gate. The dataset includes the input materials, energy uses, infrastructure and emissions. The dataset doesn't include emulsives, additives etc.

## Geography
The inventory is modelled for Europe.

## Technology
Diazine-compounds are pesticides with a heterocyclic aromatic ring containing two nitrogen atoms. They are produced by reacting guanidine with an ester.
The dataset diazine-compounds was calculated from the arithmetic mean of all inputs and outputs of the production of amidosulfuron, chloridazon, nicosulfuron, and pirimicarb.
Amidosulfuron is produced in five steps from methane:
CH4 + SO3 → CH4SO3
CH4SO3 + SOCl2 → CH3ClO2S + SO2 + HCl
CH3ClO2S + CH5N → C2H7NSO2 + HCl
C2H7NSO2 + CClNO3S → C3H6N2S2O5 + HCl
C3H6N2O5S2 + C6H9N3O2 → C9H15N5O7S2
Precursors that are used for the amidosulfuron production are amino-4,6-dimethoxy pyrimidine (C6H9N3O2), chlorosulfonyl isocyanate sulfonamide (CClNO3S), dimethyl malonate (C5H8O4), and thionyl chloride (SOCl2).
Chloridazon is produced in four steps from acetylene:
C2H2 + 2 CH2O → C4H6O2
C4H6O2 + 4 Cl2 + H2O → C4H2Cl2O3 + 6 HCl
C4H2Cl2O3 + C6H8N2 → C10H6Cl2N2O + 2 H2O
C10H6Cl2N2O + NH3 → C10H8ClN3O + HCl
Precursors that are used for the chloridazon production are phenyl hydrazine (C6H8N2) and sodium nitrite (NaNO2).
Nicosulfuron is produced in eleven steps from propene:
C3H6 + O2 → C3H4O + H2O
2 C3H4O + NH3 → C6H7N + 2 H2O
C6H7N + 4 Cl2 → C6H3Cl4N + 4 HCl
C6H3Cl4N + 2 H2O → C6H4ClNO2 + 3 HCl
C6H4ClNO2 + H2S → C6H5NO2S + HCl
C6H5NO2S + CH4O → C7H7NO2S + H2O
C7H7NO2S + 2 H2O + 3 Cl2 → C7H6ClNO4S + 5 HCl
C7H6ClNO4S + C4H11N → C11H16N2O4S + HCl
C11H16N2O4S + C4H12NAl → C12H19N3O3S + C3H9OAl
C12H19N3O3S + C2HF3O2 → C8H11N3O3S + C6H9F3O2
C8H11N3O3S + C7H7N3O3 → C15H18N6O6S
Precursors that are used for the nicosulfuron production are tert-butyl amine (C4H11N), (N,N-dimethyl amino)-dimethyl aluminium (C4H12NAl), dimethyl malonate (C5H8O4), 2-isocyanato-4,6-dimethoxy pyrimidine (C7H7N3O3), sodium (Na), and trifluoroacetic acid (C2HF3O2).
Pirimicarb (C11H18N4O2; CAS No.: 23103-98-2) is produced in six steps from ethyl acetate:
2 C4H8O2 → C6H10O3 + C2H6O
C6H10O3 + H2O → C4H6O3 + C2H6O
C4H6O3 + CH3I → C5H8O3 + HI
C5H8O3 + C2H6O → C7H12O3 + H2O
C7H12O3 + C6H20N6SO4 → C8H14N3O + C2H6O + H2O + H2SO4
C8H14N3O + C3H6ClNO → C11H18N4O2 + HCl
Precursors that are used for the pirimicarb production are dimethylcarbamoyl chloride (C3H6ClNO), N,N-dimethyl guanidine sulfate (C6H20N6SO4), and methyl iodide (CH3I).
Precursors:
Amino-4,6-dimethoxy pyrimidine (C6H9N3O2) is produced in five steps from calcium carbide:
CaC2 + N2 → CaCN2 + C
CaCN2 + CO2 + H2O → CH2N2 + CaCO3
CH2N2 → C2H4N4
C2H4N4 + 2 NH4Cl → CH5N3 + 2 HCl
CH5N3 + C5H8O4 → C6H9N3O2 + 2 H2O
Chlorosulfonyl isocyanate sulfonamide (CClNO3S) is produced in three steps from hydrogen chloride and sulfur trioxide :
HCl + SO3 → ClSO2OH
HSO3Cl + NH3 → H2SNO2Cl + H2O
H2SNO2Cl + COCl2 → CClNO3S + 2 HCl
Dimethyl carbamoyl chloride (C3H6ClNO) is produced from phosgene and dimethyl amine:
C2H7N + CCl2O → C3H6ClNO + HCl
Dimethyl malonate (C5H8O4) is produced in four steps from acetic acid:
C2H4O2 + Cl2 → C2H3ClO2 + HCl
C2H3ClO2 + HCN → C3H3NO2 + HCl
C3H3NO2 + NaOH → NaC3H2NO2 + H2O
NaC3H2NO2 + 2 CH4O + HCl → C5H8O4 + NH3 + NaCl
Hydrazine (C2H3N3) is produced in two steps from sodium hypochlorite :
NaOCl + NH3 → NH2Cl + NaOH
NH2Cl + NaOH + NH3 → N2H4 + NaCl + H2O
2-Isocyanato-4,6-dimethoxy pyrimidine (C7H7N3O3) is produced in two steps from calcium carbide :
CaC2 + N2 → CaCN2 + C
CaCN2 + CO2 + H2O → CH2N2 + CaCO3
CH2N2 → C2H4N4
C2H4N4 + 2 NH4Cl → CH5N3 + 2 HCl
CH5N3 + C5H8O4 → C6H9N3O2 + 2 H2O
C6H9N3O2 + COCl2 → C7H7N3O3 + 2 HCl
Methyl iodide (CH3I) is produced from methanol and iodine:
10 CH4O + 5 I2 + 2 P → 10 CH3I + 2 H3PO4 + 2 H2O
(N,N-Dimethyl amino)-dimethyl aluminium (C4H12NAl) is produced in three steps from methylchloride (Unger 1996: 187-190, 1052-1062):
3 CH3Cl + 2 Al → C3H9Al2Cl3
C3H9Al2Cl3 + 3 CH3Cl + 6 Na → C6H18Al2 + 6 NaCl
C6H18Al2 + 2 C2H7N → 2 C4H12NAl + 2 CH4
N,N-Dimethyl guanidine sulfate (C6H20N6SO4) is produced in four steps from calcium carbide :
CaC2 + N2 + O2 → CaCN2 + CO2
CaCN2 + CO2 + H2O → CH2N2 + CaCO3
C2H7N + CH2N2 → C3H9N3
C3H9N3 + H2SO4 → C6H20N6SO4
Sodium (Na) is produced by electrolysis of sodium chloride:
2 NaCl → 2 Na + Cl2
Sodium nitrite (NaNO2) is produced in three steps from ammonia :
4 NH3 + 5 O2 → 4 NO + 6 H2O
2 NO + O2 → 2 NO2
NO2+ NO + 2 NaOH → 2 NaNO2 + H2O
tert-Butyl amine (C4H11N) is produced in two steps from 2-methylpropene :
C4H8 + H2O + HCN + H2SO4 → C5H11NO + H2SO4
C5H11NO + H2O + H2SO4 + 3 NaOH → C4H11N + NaCHO2 + Na2SO4 + 3 H2O
Thionyl chloride (SOCl2) is produced in two steps from sulphur:
S + Cl2 → SCl2
SCl2 + SO2 + Cl2 → 2 SOCl2
Trifluoroacetic acid (C2HF3O2) is produced in two steps from acetic acid:
C2H4O2 + 3 Cl2 → C2HCl3O2 + 3 HCl
C2HCl3O2 + 3 HF → C2HF3O2 + 3 HCl

## Time period
Time of publications

## Parameters
- fraction, cooling water, cooling pond system, to air: 0.032 dimensionless; name fraction_CW_CP_to_air; lognormal variance with pedigree 0.0413, pedigree (2,3,1,3,1)
  Calculated based on literature value (Scown, C.D., 2011, Water Footprint of U.S. Transportation Fuels and supplying information of the article) (Vionnet, S., Quantis Water Database - Technical Report, 2012).
- fraction, cooling water, once-through system, to air: 0.004 dimensionless; name fraction_CW_OT_to_air; lognormal variance with pedigree 0.0413, pedigree (2,3,1,3,1)
  (same comment as for fraction, cooling water, cooling pond system, to air)
- fraction, cooling water, recirculating system, to air: 0.771 dimensionless; name fraction_CW_R_to_air; lognormal variance with pedigree 0.0413, pedigree (2,3,1,3,1)
  (same comment as for fraction, cooling water, cooling pond system, to air)
- fraction, cooling water, to air: 0.3875 dimensionless; name fraction_CW_to_air; = (0.5*fraction_CW_OT_to_air)+(0.5*fraction_CW_R_to_air); lognormal variance with pedigree 0.092025, pedigree (4,4,3,2,4)
  Calculated value based on literature value (see comments of the other parametres present in this dataset) and expert opinion. In the case when no industry/literature data are available about the type of cooling or directly fraction, cooling water, to air specific for the process a default assumption is applied. It is assumed that the once-through cooling system is used in 50% of all cases and recirculating system is used in another 50% of all cases.
- fraction, process water, to air: 0.205 dimensionless; name fraction_PW_to_air; lognormal variance with pedigree 0.092025, pedigree (4,4,3,2,4)
  Literature value (Statistics Canada, 2007 & Shaffer, K.H., 2008, Consumptive water use in the Great Lakes Basin, USGS) (Vionnet, S., Quantis Water Database - Technical Report, 2012).
- fraction, water, decarbonised, to air: 0.3875 dimensionless; name fraction_WDC_to_air; = fraction_CW_to_air; lognormal variance with pedigree 0.092025, pedigree (4,4,3,2,4)
  Calculated value. See comments in the other parametres present in this dataset. Decarbonised water is considered to be always used as cooling water, thus cooling water fractions to air are applied to all carbonised water input flows to calculate the amount of water consumed in the processes.

## Reference product
- diazine-compound: 1 kg; By-product classification allocatable product; CPC 3466: Insecticides, fungicides, herbicides and disinfectants; HS2017 3808: Insecticides, rodenticides, fungicides, herbicides, anti-sprouting products, plant growth regulators, disinfe[...]
  Diazines can act as herbicides (Amidosulfuron and Chloridazon) and as insecticides (Pirimcarb). Amidosulfuron is an inhibitor of acetolactase; Chloridazon is an inhibitor of photosynthesis at photosystem II site A.
  EcoSpold01Location=RER
  production volume 263922 kg
    Unknown
    The addition of the consumption volumes in the US in 2002 (from USGS, 2002 Pesticide use Maps) of the diazine-compounds pyrazon (chloridazon), fenarimol, nicosulfuron has been used to estimate the production volumes of this type of pesticide in the Europe. For that, it has been extrapolated to a Global production mix using the ha of Arable land and Permanent crops of US versus the ha of Arable land and Permanent crops in the Europe in 2002 (299/179 million ha; FAOSTAT).
  property carbon content, fossil 0.456998
    C content was calculated as an unweighted average of the C contents in amidosulfuron, chloridazon, nicosulfuron, pirimcarb. Those pesticides are classified as diazines in Tab 2.25 in Sutter 2010
  property price 4.17354 EUR2005
    Calculated based on inputs: The price of the product has been calculated as a sum of the values of the material and energy inputs for this product. This value is therefore a rough estimation. It may underestimate the real price since there are additional expenses when producing any product. These expences can include for example labour costs, treatment of waste materials and profit for the producer. Please consider carefully whether this level of data quality is acceptable for your application.
  properties: carbon allocation 0.456998 kg, carbon content 0.456998, carbon content, non-fossil 0, dry mass 1 kg, water content 0, water in wet mass 0 kg, wet mass 1 kg

## Inputs from technosphere
- acetic anhydride: 0.17389 kg; source Unger T A 1996; lognormal variance with pedigree 0.076, pedigree (4,5,5,1,1)
  Stoichiometric calculation, assuming an efficiency of 95% per reaction step.
  EcoSpold01Location=RER
  Uncertainty: Stoechiometric calculation
  properties: carbon content, fossil 0.470588, dry mass 1 kg, heating value, net 21.38 MJ, wet mass 1 kg
- acetylene: 0.03611 kg; source Unger T A 1996; lognormal variance with pedigree 0.076, pedigree (4,5,5,1,1)
  EcoSpold01Location=CH
  Stoichiometric calculation, assuming an efficiency of 95% per reaction step.
  Uncertainty: Stoechiometric calculation
  properties: carbon content, fossil 0.923077, dry mass 1 kg, heating value, net 51.2 MJ, wet mass 1 kg
  note on carbon content, fossil: C2H2. ecoinvent v2.2 report n 8. Produced from partial oxidation of natural gas
  note on heating value, net: Based on literature, page 25 (Value may refer to HHV), Althaus H.-J., Chudacoff M., Hischier R., Jungbluth N., Osses M. and Primas A. (2007) Life Cycle Inventories of Chemicals. Final report ecoinvent data v2.0 No. 8. EMPA, Swiss Centre for Life Cycle Inventories, Dübendorf, CH, Online-Version under: www.ecoinvent.org.
- aluminium, cast alloy: 0.00716672 kg; source Unger T A 1996; lognormal variance with pedigree 0.076, pedigree (4,5,5,1,1)
  EcoSpold01Location=RER
  Stoichiometric calculation, assuming an efficiency of 95% per reaction step.
  Uncertainty: Stoechiometric calculation
  properties: dry mass 1 kg, wet mass 1 kg
- aluminium, wrought alloy: 0.0152293 kg; source Unger T A 1996; lognormal variance with pedigree 0.076, pedigree (4,5,5,1,1)
  (same comment as for aluminium, cast alloy)
  properties: dry mass 1 kg, wet mass 1 kg
- ammonia, anhydrous, liquid: 0.077315 kg; source Unger T A 1996; lognormal variance with pedigree 0.076, pedigree (4,5,5,1,1)
  EcoSpold01Location=RER
  Stoichiometric calculation, assuming an efficiency of 95% per reaction step.
  Further references:
  Arntz et al. 2007. Dietrich Arntz, Achim Fischer, Mathias Höpp, Sylvia Jacobi, Jörg Sauer, Takashi Ohara, Takahisa Sato, Noboru Shimizu, Helmut Schwind: Acrolein and Methacrolein. In: Ullmann's Encyclopedia of Industrial Chemistry, Seventh Edition, 2009 Electronic Release (ed. Fiedler E., Grossmann G., Kersebohm D., Weiss G. and Witte C.). 7 th Electronic Release Edition. Wiley InterScience, New York, Article Online Posting Date: April 15, 2007. Online-Version under: DOI: 10.1002/14356007.a01_149.pub2
  Eller et al. 2000. Karsten Eller, Erhard Henkes, Roland Rossbacher, Hartmut Höke: Amines, Aliphatic. In: Ullmann's Encyclopedia of Industrial Chemistry, Seventh Edition, 2009 Electronic Release (ed. Fiedler E., Grossmann G., Kersebohm D., Weiss G. and Witte C.). 7 th Electronic Release Edition. Wiley InterScience, New York, Article Online Posting Date: June 15, 2000. Online-Version under: DOI: 10.1002/14356007.a02_001
  Güthner et al. 2006. Thomas Güthner and Bernd Mertschenk: Cyanamides. In: Ullmann's Encyclopedia of Industrial Chemistry, Seventh Edition, 2009 Electronic Release (ed. Fiedler E., Grossmann G., Kersebohm D., Weiss G. and Witte C.). 7 th Electronic Release Edition. Wiley InterScience, New York, Article Online Posting Date: July 15, 2006. Online-Version under: DOI: 10.1002/14356007.a08_139.pub2
  Kim et al. 2003. Kim S., Overcash M.: Energy in chemical manufacturing processes: gate-to-gate information for life cycle assessment. In: Journal of Chemical Technology & Biotechnology vol. 78, no. 9: 995-1005(11). 2003
  Laue et al. 2000. Wolfgang Laue, Michael Thiemann, Erich Scheibler, Karl Wilhelm Wiegand: Nitrates and Nitrites. In: Ullmann's Encyclopedia of Industrial Chemistry, Seventh Edition, 2009 Electronic Release (ed. Fiedler E., Grossmann G., Kersebohm D., Weiss G. and Witte C.). 7 th Electronic Release Edition. Wiley InterScience, New York, Article Online Posting Date: June 15, 2000. Online-Version under: DOI: 10.1002/14356007.a17_265
  Shimizu et al. 2000. Shinkichi Shimizu, Nanao Watanabe, Toshiaki Kataoka, Takayuki Shoji, Nobuyuki Abe, Sinji Morishita, Hisao Ichimura: Pyridine and Pyridine Derivatives. In: Ullmann's Encyclopedia of Industrial Chemistry, Seventh Edition, 2009 Electronic Release (ed. Fiedler E., Grossmann G., Kersebohm D., Weiss G. and Witte C.). 7 th Electronic Release Edition. Wiley InterScience, New York, Article Online Posting Date: June 15, 2000. Online-Version under: DOI: 10.1002/14356007.a22_399
  Thiemann et al. 2000. Michael Thiemann, Erich Scheibler, Karl Wilhelm Wiegand: Nitric Acid, Nitrous Acid, and Nitrogen Oxides. In: Ullmann's Encyclopedia of Industrial Chemistry, Seventh Edition, 2009 Electronic Release (ed. Fiedler E., Grossmann G., Kersebohm D., Weiss G. and Witte C.). 7 th Electronic Release Edition. Wiley InterScience, New York, Article Online Posting Date: June 15, 2000. Online-Version under: DOI: 10.1002/14356007.a17_293
  Uncertainty: Stoechiometric calculation
  properties: dry mass 1 kg, wet mass 1 kg
- ammonium chloride: 0.16312 kg; source Unger T A 1996; lognormal variance with pedigree 0.076, pedigree (4,5,5,1,1)
  Stoichiometric calculation, assuming an efficiency of 95% per reaction step.
  Further references:
  Güthner et al. 2006. Thomas Güthner and Bernd Mertschenk: Cyanamides. In: Ullmann's Encyclopedia of Industrial Chemistry, Seventh Edition, 2009 Electronic Release (ed. Fiedler E., Grossmann G., Kersebohm D., Weiss G. and Witte C.). 7 th Electronic Release Edition. Wiley InterScience, New York, Article Online Posting Date: July 15, 2006. Online-Version under: DOI: 10.1002/14356007.a08_139.pub2
  Güthner et al. 2006. Thomas Güthner, Bernd Mertschenk, Bernd Schulz: Guanidine and Derivatives. In: Ullmann's Encyclopedia of Industrial Chemistry, Seventh Edition, 2009 Electronic Release (ed. Fiedler E., Grossmann G., Kersebohm D., Weiss G. and Witte C.). 7 th Electronic Release Edition. Wiley InterScience, New York, Article Online Posting Date: July 15, 2006. Online-Version under: DOI: 10.1002/14356007.a12_545.pub2
  EcoSpold01Location=GLO
  Uncertainty: Stoechiometric calculation
  properties: dry mass 1 kg, wet mass 1 kg
- aniline: 0.12916 kg; source Unger T A 1996; lognormal variance with pedigree 0.076, pedigree (4,5,5,1,1)
  (same comment as for aluminium, cast alloy)
  properties: carbon content, fossil 0.774194, dry mass 1 kg, heating value, net 32.56 MJ, wet mass 1 kg
- calcium carbide, technical grade: 0.18968 kg; source Unger T A 1996; lognormal variance with pedigree 0.076, pedigree (4,5,5,1,1)
  Stoichiometric calculation, assuming an efficiency of 95% per reaction step.
  Further references:
  Güthner et al. 2006. Thomas Güthner and Bernd Mertschenk: Cyanamides. In: Ullmann's Encyclopedia of Industrial Chemistry, Seventh Edition, 2009 Electronic Release (ed. Fiedler E., Grossmann G., Kersebohm D., Weiss G. and Witte C.). 7 th Electronic Release Edition. Wiley InterScience, New York, Article Online Posting Date: July 15, 2006. Online-Version under: DOI: 10.1002/14356007.a08_139.pub2
  Güthner et al. 2006. Thomas Güthner, Bernd Mertschenk, Bernd Schulz: Guanidine and Derivatives. In: Ullmann's Encyclopedia of Industrial Chemistry, Seventh Edition, 2009 Electronic Release (ed. Fiedler E., Grossmann G., Kersebohm D., Weiss G. and Witte C.). 7 th Electronic Release Edition. Wiley InterScience, New York, Article Online Posting Date: July 15, 2006. Online-Version under: DOI: 10.1002/14356007.a12_545.pub2
  EcoSpold01Location=RER
  Uncertainty: Stoechiometric calculation
  properties: carbon content, fossil 0.375, dry mass 1 kg, heating value, net 11.36 MJ, wet mass 1 kg
- carbon dioxide, liquid: 0.12388 kg; source Unger T A 1996; lognormal variance with pedigree 0.076, pedigree (4,5,5,1,1)
  EcoSpold01Location=RER
  Stoichiometric calculation, assuming an efficiency of 95% per reaction step.
  Further references:
  Güthner et al. 2006. Thomas Güthner and Bernd Mertschenk: Cyanamides. In: Ullmann's Encyclopedia of Industrial Chemistry, Seventh Edition, 2009 Electronic Release (ed. Fiedler E., Grossmann G., Kersebohm D., Weiss G. and Witte C.). 7 th Electronic Release Edition. Wiley InterScience, New York, Article Online Posting Date: July 15, 2006. Online-Version under: DOI: 10.1002/14356007.a08_139.pub2
  Güthner et al. 2006. Thomas Güthner, Bernd Mertschenk, Bernd Schulz: Guanidine and Derivatives. In: Ullmann's Encyclopedia of Industrial Chemistry, Seventh Edition, 2009 Electronic Release (ed. Fiedler E., Grossmann G., Kersebohm D., Weiss G. and Witte C.). 7 th Electronic Release Edition. Wiley InterScience, New York, Article Online Posting Date: July 15, 2006. Online-Version under: DOI: 10.1002/14356007.a12_545.pub2
  Uncertainty: Stoechiometric calculation
  properties: carbon content, fossil 0.272727, dry mass 1 kg, heating value, net 8.27 MJ, wet mass 1 kg
- chemical factory, organics: 3.1387e-9 unit; lognormal variance with pedigree 0.448, pedigree (4,5,5,5,5)
  EcoSpold01Location=RER
  Estimation, based on a production capacity of 50,000 t per year and a plant life time of 50 years, therefore an amount of 4X10-10 units per kg of produced chemical is aded to the unit process of the respective chemical. The amount is accounted for each production step. This might be an overestimation in some multistep syntheses.
  Uncertainty: Estimation
- chlorine, liquid: 1.2906 kg; source Unger T A 1996; lognormal variance with pedigree 0.076, pedigree (4,5,5,1,1)
  Stoichiometric calculation, assuming an efficiency of 95% per reaction step.
  Further references:
  Arntz et al. 2007. Dietrich Arntz, Achim Fischer, Mathias Höpp, Sylvia Jacobi, Jörg Sauer, Takashi Ohara, Takahisa Sato, Noboru Shimizu, Helmut Schwind: Acrolein and Methacrolein. In: Ullmann's Encyclopedia of Industrial Chemistry, Seventh Edition, 2009 Electronic Release (ed. Fiedler E., Grossmann G., Kersebohm D., Weiss G. and Witte C.). 7 th Electronic Release Edition. Wiley InterScience, New York, Article Online Posting Date: April 15, 2007. Online-Version under: DOI: 10.1002/14356007.a01_149.pub2
  Kim et al. 2003. Kim S., Overcash M.: Energy in chemical manufacturing processes: gate-to-gate information for life cycle assessment. In: Journal of Chemical Technology & Biotechnology vol. 78, no. 9: 995-1005(11). 2003
  Shimizu et al. 2000 Shinkichi Shimizu, Nanao Watanabe, Toshiaki Kataoka, Takayuki Shoji, Nobuyuki Abe, Sinji Morishita, Hisao Ichimura: Pyridine and Pyridine Derivatives. In: Ullmann's Encyclopedia of Industrial Chemistry, Seventh Edition, 2009 Electronic Release (ed. Fiedler E., Grossmann G., Kersebohm D., Weiss G. and Witte C.). 7 th Electronic Release Edition. Wiley InterScience, New York, Article Online Posting Date: June 15, 2000. Online-Version under: DOI: 10.1002/14356007.a22_399
  Strittmatter et al. 2007. Harald Strittmatter, Stefan Hildbrand, Peter Pollak: Malonic Acid and Derivatives. In: Ullmann's Encyclopedia of Industrial Chemistry, Seventh Edition, 2009 Electronic Release (ed. Fiedler E., Grossmann G., Kersebohm D., Weiss G. and Witte C.). 7 th Electronic Release Edition. Wiley InterScience, New York, Article Online Posting Date: April 15, 2007. Online-Version under: DOI: 10.1002/1435 6007.a16_063.pub2
  EcoSpold01Location=RER
  Uncertainty: Stoechiometric calculation
  properties: dry mass 1 kg, wet mass 1 kg
- dichloromethane: 0.12131 kg; source Unger T A 1996; lognormal variance with pedigree 0.076, pedigree (4,5,5,1,1)
  (same comment as for acetic anhydride)
  properties: carbon content, fossil 0.142857, dry mass 1 kg, heating value, net 7.14 MJ, wet mass 1 kg
- dimethyl sulfate: 0.13279 kg; source Unger T A 1996; lognormal variance with pedigree 0.076, pedigree (4,5,5,1,1)
  Stoichiometric calculation, assuming an efficiency of 95% per reaction step.$
  EcoSpold01Location=RER
  Uncertainty: Stoechiometric calculation
  properties: carbon content, fossil 0.190476, dry mass 1 kg, heating value, net 11.54 MJ, wet mass 1 kg
- dimethylamine: 0.024497 kg; source Unger T A 1996; lognormal variance with pedigree 0.076, pedigree (4,5,5,1,1)
  EcoSpold01Location=RER
  Stoichiometric calculation, assuming an efficiency of 95% per reaction step.
  Güthner et al. 2006. Thomas Güthner and Bernd Mertschenk: Cyanamides. In: Ullmann's Encyclopedia of Industrial Chemistry, Seventh Edition, 2009 Electronic Release (ed. Fiedler E., Grossmann G., Kersebohm D., Weiss G. and Witte C.). 7 th Electronic Release Edition. Wiley InterScience, New York, Article Online Posting Date: July 15, 2006. Online-Version under: DOI: 10.1002/14356007.a08_139.pub2
  Güthner et al. 2006. Thomas Güthner, Bernd Mertschenk, Bernd Schulz: Guanidine and Derivatives. In: Ullmann's Encyclopedia of Industrial Chemistry, Seventh Edition, 2009 Electronic Release (ed. Fiedler E., Grossmann G., Kersebohm D., Weiss G. and Witte C.). 7 th Electronic Release Edition. Wiley InterScience, New York, Article Online Posting Date: July 15, 2006. Online-Version under: DOI: 10.1002/14356007.a12_545.pub2
  Uncertainty: Stoechiometric calculation
  properties: carbon content, fossil 0.533333, dry mass 1 kg, heating value, net 13.47 MJ, wet mass 1 kg
- electricity, medium voltage: 2.72172 kWh; source Gendorf 2000; lognormal variance with pedigree 0.076, pedigree (4,5,5,1,1)
  Estimation, assuming a default value, originated from calculation of avarage consumption of electricity and heat per kg of product (3.2 MJ kg-1), and a resulting amount of electricity of 0,333 kW for every reaction step per kg reaction product, considering that the demand is made up of a mix that inlcudes 38% electricity. Additionally, reaction steps are approximated with energy consumption data, assuming that inventory flows can be estimated using process data for basic operation steps, available for specific organic chemicals.
  Further references:
  Kim S., Overcash M.: Energy in chemical manufacturing processes: gate-to-gate information for life cycle assessment. In: Journal of Chemical Technology & Biotechnology vol. 78, no. 9: 995-1005(11). 2003
  EcoSpold01Location=UCTE
  Uncertainty: Estimation
- ethanol, without water, in 99.7% solution state, from ethylene: 0.056357 kg; source Unger T A 1996; lognormal variance with pedigree 0.076, pedigree (4,5,5,1,1)
  (same comment as for acetic anhydride)
  properties: carbon content, fossil 0.521739, dry mass 1 kg, heating value, net 28.1 MJ, wet mass 1 kg
  note on heating value, net: Based on literature, page 275, Report 17: Jungbluth, N., Chudacoff, M., Dauriat, A., Dinkel, F., Doka, G., Faist Emmenegger, M., Gnansounou, E., Kljun, N., Schleiss, K., Spielmann, M., Stettler, C., Sutter, J. 2007: Life Cycle Inventories of Bioenergy. ecoinvent report No. 17, Swiss Centre for Life Cycle Inventories, Dübendorf, CH.
- ethyl acetate: 0.18577 kg; source Unger T A 1996; lognormal variance with pedigree 0.076, pedigree (4,5,5,1,1)
  (same comment as for acetic anhydride)
  properties: carbon content, fossil 0.545455, dry mass 1 kg, heating value, net 31.32 MJ, wet mass 1 kg
- formaldehyde: 0.083331 kg; source Unger T A 1996; lognormal variance with pedigree 0.076, pedigree (4,5,5,1,1)
  (same comment as for acetic anhydride)
  properties: carbon content, fossil 0.4, dry mass 1 kg, heating value, net 20.19 MJ, wet mass 1 kg
- heat, district or industrial, natural gas: 16.2458 MJ; source Gendorf 2000; lognormal variance with pedigree 0.076, pedigree (4,5,5,1,1)
  Estimation, assuming a default value, originated from calculation of avarage consumption of electricity and heat per kg of product (3.2 MJ kg-1), and a resulting amount of heat of 2 MJ for every reaction step per kg reaction product, considering that the demand is made up of a mix that includes 50% natural gas. Additionally, reaction steps are approximated with energy consumption data, assuming that inventory flows can be estimated using process data for basic operation steps, available for specific organic chemicals.
  Further references:
  Kim S., Overcash M.: Energy in chemical manufacturing processes: gate-to-gate information for life cycle assessment. In: Journal of Chemical Technology & Biotechnology vol. 78, no. 9: 995-1005(11). 2003
  Uncertainty: Estimation
  properties: heating value, net 1 MJ
- heat, district or industrial, other than natural gas: 9.0677 MJ; source Gendorf 2000; lognormal variance with pedigree 0.076, pedigree (4,5,5,1,1)
  Estimation, assuming a default value, originated from calculation of avarage consumption of electricity and heat per kg of product (3.2 MJ kg-1), and a resulting amount of heat of 2 MJ for every reaction step per kg reaction product, considering that the demand is made up of a mix that inlcudes 12% steam from external energy sources. Additionally, reaction steps are approximated with energy consumption data, assuming that inventory flows can be estimated using process data for basic operation steps, available for specific organic chemicals.
  Further references:
  Kim S., Overcash M.: Energy in chemical manufacturing processes: gate-to-gate information for life cycle assessment. In: Journal of Chemical Technology & Biotechnology vol. 78, no. 9: 995-1005(11). 2003
  Uncertainty: Estimation
  properties: heating value, net 1 MJ
- hydrochloric acid, without water, in 30% solution state: 0.19518 kg; source Unger T A 1996; lognormal variance with pedigree 0.076, pedigree (4,5,5,1,1)
  Stoichiometric calculation, assuming an efficiency of 100%.
  Further references:
  Güthner et al. 2006. Thomas Güthner and Bernd Mertschenk: Cyanamides. In: Ullmann's Encyclopedia of Industrial Chemistry, Seventh Edition, 2009 Electronic Release (ed. Fiedler E., Grossmann G., Kersebohm D., Weiss G. and Witte C.). 7 th Electronic Release Edition. Wiley InterScience, New York, Article Online Posting Date: July 15, 2006. Online-Version under: DOI: 10.1002/14356007.a08_139.pub2
  Strittmatter et al. 2007. Harald Strittmatter, Stefan Hildbrand, Peter Pollak: Malonic Acid and Derivatives. In: Ullmann's Encyclopedia of Industrial Chemistry, Seventh Edition, 2009 Electronic Release (ed. Fiedler E., Grossmann G., Kersebohm D., Weiss G. and Witte C.). 7 th Electronic Release Edition. Wiley InterScience, New York, Article Online Posting Date: April 15, 2007. Online-Version under: DOI: 10.1002/1435 6007.a16_063.pub2
  EcoSpold01Location=RER
  Uncertainty: Stoechiometric calculation
  properties: dry mass 1 kg, heating value, net 3.32 MJ, wet mass 1 kg
- hydrogen cyanide: 0.094812 kg; source Unger T A 1996; lognormal variance with pedigree 0.076, pedigree (4,5,5,1,1)
  Stoichiometric calculation, assuming an efficiency of 95% per reaction step.
  Further references:
  Eller et al. 2000. Karsten Eller, Erhard Henkes, Roland Rossbacher, Hartmut Höke: Amines, Aliphatic. In: Ullmann's Encyclopedia of Industrial Chemistry, Seventh Edition, 2009 Electronic Release (ed. Fiedler E., Grossmann G., Kersebohm D., Weiss G. and Witte C.). 7 th Electronic Release Edition. Wiley InterScience, New York, Article Online Posting Date: June 15, 2000. Online-Version under: DOI: 10.1002/14356007.a02_001
  Strittmatter et al. 2007. Harald Strittmatter, Stefan Hildbrand, Peter Pollak: Malonic Acid and Derivatives. In: Ullmann's Encyclopedia of Industrial Chemistry, Seventh Edition, 2009 Electronic Release (ed. Fiedler E., Grossmann G., Kersebohm D., Weiss G. and Witte C.). 7 th Electronic Release Edition. Wiley InterScience, New York, Article Online Posting Date: April 15, 2007. Online-Version under: DOI: 10.1002/1435 6007.a16_063.pub2
  EcoSpold01Location=RER
  Uncertainty: Stoechiometric calculation
  properties: carbon content, fossil 0.444444, dry mass 1 kg, heating value, net 17.95 MJ, wet mass 1 kg
- hydrogen fluoride: 0.042671 kg; source Unger T A 1996; lognormal variance with pedigree 0.076, pedigree (4,5,5,1,1)
  Stoichiometric calculation, assuming an efficiency of 95% per reaction step.
  EcoSpold01Location=GLO
  Uncertainty: Stoechiometric calculation
  properties: dry mass 1 kg, heating value, net 6.06 MJ, wet mass 1 kg
- hydrogen sulfide: 0.029687 kg; source Unger T A 1996; lognormal variance with pedigree 0.076, pedigree (4,5,5,1,1)
  EcoSpold01Location=RER
  Stoichiometric calculation, assuming an efficiency of 95% per reaction step.
  Further references:
  Arntz et al. 2007. Dietrich Arntz, Achim Fischer, Mathias Höpp, Sylvia Jacobi, Jörg Sauer, Takashi Ohara, Takahisa Sato, Noboru Shimizu, Helmut Schwind: Acrolein and Methacrolein. In: Ullmann's Encyclopedia of Industrial Chemistry, Seventh Edition, 2009 Electronic Release (ed. Fiedler E., Grossmann G., Kersebohm D., Weiss G. and Witte C.). 7 th Electronic Release Edition. Wiley InterScience, New York, Article Online Posting Date: April 15, 2007. Online-Version under: DOI: 10.1002/14356007.a01_149.pub2
  Shimizu et al. 2000. Shinkichi Shimizu, Nanao Watanabe, Toshiaki Kataoka, Takayuki Shoji, Nobuyuki Abe, Sinji Morishita, Hisao Ichimura: Pyridine and Pyridine Derivatives. In: Ullmann's Encyclopedia of Industrial Chemistry, Seventh Edition, 2009 Electronic Release (ed. Fiedler E., Grossmann G., Kersebohm D., Weiss G. and Witte C.). 7 th Electronic Release Edition. Wiley InterScience, New York, Article Online Posting Date: June 15, 2000. Online-Version under: DOI: 10.1002/14356007.a22_399
  Uncertainty: Stoechiometric calculation
  properties: dry mass 1 kg, heating value, net 7.11 MJ, wet mass 1 kg
- hydrogen, gaseous, medium pressure, merchant: 0.0052776 kg; source Unger T A 1996; lognormal variance with pedigree 0.076, pedigree (4,5,5,1,1)
  (same comment as for acetic anhydride)
  properties: dry mass 1 kg, heating value, net 120.21 MJ, wet mass 1 kg
- inert waste, for final disposal: -0.011682 kg; lognormal variance with pedigree 0.036, pedigree (4,5,1,1,1)
  Stoichiometric calculation
  EcoSpold01Location=CH
  Uncertainty: Stoechiometric calculation
  production volume
    Calculated from the production volume of diazine-compound in proportion to the respective output amounts.
  properties: dry mass 0.995 kg, water content 0.00502513, wet mass 1 kg
- methanol: 0.12056 kg; source Unger T A 1996; lognormal variance with pedigree 0.076, pedigree (4,5,5,1,1)
  Stoichiometric calculation, assuming an efficiency of 95% per reaction step.
  Further references:
  Arntz et al. 2007. Dietrich Arntz, Achim Fischer, Mathias Höpp, Sylvia Jacobi, Jörg Sauer, Takashi Ohara, Takahisa Sato, Noboru Shimizu, Helmut Schwind: Acrolein and Methacrolein. In: Ullmann's Encyclopedia of Industrial Chemistry, Seventh Edition, 2009 Electronic Release (ed. Fiedler E., Grossmann G., Kersebohm D., Weiss G. and Witte C.). 7 th Electronic Release Edition. Wiley InterScience, New York, Article Online Posting Date: April 15, 2007. Online-Version under: DOI: 10.1002/14356007.a01_149.pub2
  Lyday 2000. Phyllis A. Lyday: Iodine and Iodine Compounds. In: Ullmann's Encyclopedia of Industrial Chemistry, Seventh Edition, 2009 Electronic Release (ed. Fiedler E., Grossmann G., Kersebohm D., Weiss G. and Witte C.). 7 th Electronic Release Edition. Wiley InterScience, New York, Article Online Posting Date: June 15, 2000. Online-Version under: DOI: 10.1002/14356007.a14_381
  Shimizu et al. 2000. Shinkichi Shimizu, Nanao Watanabe, Toshiaki Kataoka, Takayuki Shoji, Nobuyuki Abe, Sinji Morishita, Hisao Ichimura: Pyridine and Pyridine Derivatives. In: Ullmann's Encyclopedia of Industrial Chemistry, Seventh Edition, 2009 Electronic Release (ed. Fiedler E., Grossmann G., Kersebohm D., Weiss G. and Witte C.). 7 th Electronic Release Edition. Wiley InterScience, New York, Article Online Posting Date: June 15, 2000. Online-Version under: DOI: 10.1002/14356007.a22_399
  Strittmatter et al. 2007. Harald Strittmatter, Stefan Hildbrand, Peter Pollak: Malonic Acid and Derivatives. In: Ullmann's Encyclopedia of Industrial Chemistry, Seventh Edition, 2009 Electronic Release (ed. Fiedler E., Grossmann G., Kersebohm D., Weiss G. and Witte C.). 7 th Electronic Release Edition. Wiley InterScience, New York, Article Online Posting Date: April 15, 2007. Online-Version under: DOI: 10.1002/1435 6007.a16_063.pub2
  EcoSpold01Location=GLO
  Uncertainty: Stoechiometric calculation
  properties: carbon content, fossil 0.375, dry mass 1 kg, heating value, net 20 MJ, wet mass 1 kg
  note on heating value, net: Based on literature, page 533, Report 17: Jungbluth, N., Chudacoff, M., Dauriat, A., Dinkel, F., Doka, G., Faist Emmenegger, M., Gnansounou, E., Kljun, N., Schleiss, K., Spielmann, M., Stettler, C., Sutter, J. 2007: Life Cycle Inventories of Bioenergy. ecoinvent report No. 17, Swiss Centre for Life Cycle Inventories, Dübendorf, CH.
- natural gas, high pressure: 0.000119138, 0.0170868 m3 (2 suppliers, which the file names only by identifier); sum of these 0.0172059 m3; source Unger T A 1996; lognormal variance with pedigree 0.076, pedigree (4,5,5,1,1)
  (same comment as for acetylene)
  properties: carbon content, fossil 0.602381, dry mass 0.84 kg, heating value, net 36 MJ, wet mass 0.84 kg
  note on carbon content, fossil: An average C content of 0.506 kg C/ m3 has been assumed (this average has been calculated using data in Tab 3.5, ecoinvent v2.2 report 6_V
  note on heating value, net: Literature value, Source: Christoph Meili;Niels Jungbluth;Maresa Bussa (2021) Life cycle inventories of crude oil and natural gas extraction. ESU-services Ltd. commissioned by BAFU & VSG, Schaffhausen, Switzerland, http://esu-services.ch/data/public-lci-reports/
- nitrogen, liquid: 0.082983 kg; source Unger T A 1996; lognormal variance with pedigree 0.076, pedigree (4,5,5,1,1)
  (same comment as for carbon dioxide, liquid)
  properties: dry mass 1 kg, wet mass 1 kg
- oxygen, liquid: 0.17716 kg; source Unger T A 1996; lognormal variance with pedigree 0.076, pedigree (4,5,5,1,1)
  Stoichiometric calculation, assuming an efficiency of 100% per reaction step.
  Further references:
  Arntz et al. 2007. Dietrich Arntz, Achim Fischer, Mathias Höpp, Sylvia Jacobi, Jörg Sauer, Takashi Ohara, Takahisa Sato, Noboru Shimizu, Helmut Schwind: Acrolein and Methacrolein. In: Ullmann's Encyclopedia of Industrial Chemistry, Seventh Edition, 2009 Electronic Release (ed. Fiedler E., Grossmann G., Kersebohm D., Weiss G. and Witte C.). 7 th Electronic Release Edition. Wiley InterScience, New York, Article Online Posting Date: April 15, 2007. Online-Version under: DOI: 10.1002/14356007.a01_149.pub2
  Eller et al. 2000. Karsten Eller, Erhard Henkes, Roland Rossbacher, Hartmut Höke: Amines, Aliphatic. In: Ullmann's Encyclopedia of Industrial Chemistry, Seventh Edition, 2009 Electronic Release (ed. Fiedler E., Grossmann G., Kersebohm D., Weiss G. and Witte C.). 7 th Electronic Release Edition. Wiley InterScience, New York, Article Online Posting Date: June 15, 2000. Online-Version under: DOI: 10.1002/14356007.a02_001
  Güthner et al. 2006. Thomas Güthner and Bernd Mertschenk: Cyanamides. In: Ullmann's Encyclopedia of Industrial Chemistry, Seventh Edition, 2009 Electronic Release (ed. Fiedler E., Grossmann G., Kersebohm D., Weiss G. and Witte C.). 7 th Electronic Release Edition. Wiley InterScience, New York, Article Online Posting Date: July 15, 2006. Online-Version under: DOI: 10.1002/14356007.a08_139.pub2
  Güthner et al. 2006. Thomas Güthner, Bernd Mertschenk, Bernd Schulz: Guanidine and Derivatives. In: Ullmann's Encyclopedia of Industrial Chemistry, Seventh Edition, 2009 Electronic Release (ed. Fiedler E., Grossmann G., Kersebohm D., Weiss G. and Witte C.). 7 th Electronic Release Edition. Wiley InterScience, New York, Article Online Posting Date: July 15, 2006. Online-Version under: DOI: 10.1002/14356007.a12_545.pub2
  Kim et al. 2003. Kim S., Overcash M.: Energy in chemical manufacturing processes: gate-to-gate information for life cycle assessment. In: Journal of Chemical Technology & Biotechnology vol. 78, no. 9: 995-1005(11). 2003
  Laue et al. 2000. Wolfgang Laue, Michael Thiemann, Erich Scheibler, Karl Wilhelm Wiegand: Nitrates and Nitrites. In: Ullmann's Encyclopedia of Industrial Chemistry, Seventh Edition, 2009 Electronic Release (ed. Fiedler E., Grossmann G., Kersebohm D., Weiss G. and Witte C.). 7 th Electronic Release Edition. Wiley InterScience, New York, Article Online Posting Date: June 15, 2000. Online-Version under: DOI: 10.1002/14356007.a17_265
  Shimizu et al. 2000 Shinkichi Shimizu, Nanao Watanabe, Toshiaki Kataoka, Takayuki Shoji, Nobuyuki Abe, Sinji Morishita, Hisao Ichimura: Pyridine and Pyridine Derivatives. In: Ullmann's Encyclopedia of Industrial Chemistry, Seventh Edition, 2009 Electronic Release (ed. Fiedler E., Grossmann G., Kersebohm D., Weiss G. and Witte C.). 7 th Electronic Release Edition. Wiley InterScience, New York, Article Online Posting Date: June 15, 2000. Online-Version under: DOI: 10.1002/14356007.a22_399
  Thiemann et al. 2000. Michael Thiemann, Erich Scheibler, Karl Wilhelm Wiegand: Nitric Acid, Nitrous Acid, and Nitrogen Oxides. In: Ullmann's Encyclopedia of Industrial Chemistry, Seventh Edition, 2009 Electronic Release (ed. Fiedler E., Grossmann G., Kersebohm D., Weiss G. and Witte C.). 7 th Electronic Release Edition. Wiley InterScience, New York, Article Online Posting Date: June 15, 2000. Online-Version under: DOI: 10.1002/14356007.a17_293
  EcoSpold01Location=RER
  Uncertainty: Stoechiometric calculation
  properties: dry mass 1 kg, wet mass 1 kg
- phosgene, liquid: 0.25771 kg; source Unger T A 1996; lognormal variance with pedigree 0.076, pedigree (4,5,5,1,1)
  Stoichiometric calculation, assuming an efficiency of 95% per reaction step.
  Assumed to be removed with an efficiency of 100% in the wastewater treatment.
  Further references:
  Güthner et al. 2006. Thomas Güthner and Bernd Mertschenk: Cyanamides. In: Ullmann's Encyclopedia of Industrial Chemistry, Seventh Edition, 2009 Electronic Release (ed. Fiedler E., Grossmann G., Kersebohm D., Weiss G. and Witte C.). 7 th Electronic Release Edition. Wiley InterScience, New York, Article Online Posting Date: July 15, 2006. Online-Version under: DOI: 10.1002/14356007.a08_139.pub2
  Güthner et al. 2006. Thomas Güthner, Bernd Mertschenk, Bernd Schulz: Guanidine and Derivatives. In: Ullmann's Encyclopedia of Industrial Chemistry, Seventh Edition, 2009 Electronic Release (ed. Fiedler E., Grossmann G., Kersebohm D., Weiss G. and Witte C.). 7 th Electronic Release Edition. Wiley InterScience, New York, Article Online Posting Date: July 15, 2006. Online-Version under: DOI: 10.1002/14356007.a12_545.pub2
  EcoSpold01Location=RER
  Uncertainty: Stoechiometric calculation
  properties: carbon content, fossil 0.122449, dry mass 1 kg, heating value, net 3.68 MJ, wet mass 1 kg
- phosphorus, white, liquid: 0.0084166 kg; source Unger T A 1996; lognormal variance with pedigree 0.076, pedigree (4,5,5,1,1)
  EcoSpold01Location=RER
  Stoichiometric calculation, assuming an efficiency of 95% per reaction step.
  Further references:
  Lyday 2000. Phyllis A. Lyday: Iodine and Iodine Compounds. In: Ullmann's Encyclopedia of Industrial Chemistry, Seventh Edition, 2009 Electronic Release (ed. Fiedler E., Grossmann G., Kersebohm D., Weiss G. and Witte C.). 7 th Electronic Release Edition. Wiley InterScience, New York, Article Online Posting Date: June 15, 2000. Online-Version under: DOI: 10.1002/14356007.a14_381
  Uncertainty: Stoechiometric calculation
  properties: dry mass 1 kg, wet mass 1 kg
- propylene: 0.090048 kg; source Unger T A 1996; lognormal variance with pedigree 0.076, pedigree (4,5,5,1,1)
  (same comment as for aluminium, cast alloy)
  properties: carbon content, fossil 0.857143, dry mass 1 kg, heating value, net 43.22 MJ, wet mass 1 kg
- sodium chloride, powder: 0.00049161 kg; source Klemm A. 2009; lognormal variance with pedigree 0.076, pedigree (4,5,5,1,1)
  (same comment as for acetic anhydride)
  properties: dry mass 1 kg, wet mass 1 kg
- sodium hydroxide, without water, in 50% solution state: 1.8718 kg; source Unger T A 1996; lognormal variance with pedigree 0.076, pedigree (4,5,5,1,1)
  EcoSpold01Location=RER
  Stoichiometric calculation, assuming an efficiency of 100%.
  Further references:
  Eller et al. 2000. Karsten Eller, Erhard Henkes, Roland Rossbacher, Hartmut Höke: Amines, Aliphatic. In: Ullmann's Encyclopedia of Industrial Chemistry, Seventh Edition, 2009 Electronic Release (ed. Fiedler E., Grossmann G., Kersebohm D., Weiss G. and Witte C.). 7 th Electronic Release Edition. Wiley InterScience, New York, Article Online Posting Date: June 15, 2000. Online-Version under: DOI: 10.1002/14356007.a02_001
  Kim et al. 2003. Kim S., Overcash M.: Energy in chemical manufacturing processes: gate-to-gate information for life cycle assessment. In: Journal of Chemical Technology & Biotechnology vol. 78, no. 9: 995-1005(11). 2003
  Laue et al. 2000. Wolfgang Laue, Michael Thiemann, Erich Scheibler, Karl Wilhelm Wiegand: Nitrates and Nitrites. In: Ullmann's Encyclopedia of Industrial Chemistry, Seventh Edition, 2009 Electronic Release (ed. Fiedler E., Grossmann G., Kersebohm D., Weiss G. and Witte C.). 7 th Electronic Release Edition. Wiley InterScience, New York, Article Online Posting Date: June 15, 2000. Online-Version under: DOI: 10.1002/14356007.a17_265
  Strittmatter et al. 2007. Harald Strittmatter, Stefan Hildbrand, Peter Pollak: Malonic Acid and Derivatives. In: Ullmann's Encyclopedia of Industrial Chemistry, Seventh Edition, 2009 Electronic Release (ed. Fiedler E., Grossmann G., Kersebohm D., Weiss G. and Witte C.). 7 th Electronic Release Edition. Wiley InterScience, New York, Article Online Posting Date: April 15, 2007. Online-Version under: DOI: 10.1002/1435 6007.a16_063.pub2
  Thiemann et al. 2000. Michael Thiemann, Erich Scheibler, Karl Wilhelm Wiegand: Nitric Acid, Nitrous Acid, and Nitrogen Oxides. In: Ullmann's Encyclopedia of Industrial Chemistry, Seventh Edition, 2009 Electronic Release (ed. Fiedler E., Grossmann G., Kersebohm D., Weiss G. and Witte C.). 7 th Electronic Release Edition. Wiley InterScience, New York, Article Online Posting Date: June 15, 2000. Online-Version under: DOI: 10.1002/14356007.a17_293
  Uncertainty: Stoechiometric calculation
  properties: dry mass 1 kg, heating value, net 3.03 MJ, wet mass 1 kg
- sulfur: 0.014009 kg; source Kim S. 2003; lognormal variance with pedigree 0.076, pedigree (4,5,5,1,1)
  (same comment as for acetic anhydride)
  properties: dry mass 1 kg, wet mass 1 kg
- sulfur dioxide, liquid: 0.028019 kg; source Kim S. 2003; lognormal variance with pedigree 0.076, pedigree (4,5,5,1,1)
  (same comment as for acetic anhydride)
  properties: dry mass 1 kg, wet mass 1 kg
- sulfur trioxide: 0.17104 kg; source Unger T A 1996; lognormal variance with pedigree 0.076, pedigree (4,5,5,1,1)
  EcoSpold01Location=RER
  Stoichiometric calculation, assuming an efficiency of 95% per reaction step.
  Further references:
  Güthner et al. 2006. Thomas Güthner and Bernd Mertschenk: Cyanamides. In: Ullmann's Encyclopedia of Industrial Chemistry, Seventh Edition, 2009 Electronic Release (ed. Fiedler E., Grossmann G., Kersebohm D., Weiss G. and Witte C.). 7 th Electronic Release Edition. Wiley InterScience, New York, Article Online Posting Date: July 15, 2006. Online-Version under: DOI: 10.1002/14356007.a08_139.pub2
  Uncertainty: Stoechiometric calculation
  properties: dry mass 1 kg, wet mass 1 kg
- sulfuric acid: 0.24879 kg; source Unger T A 1996; lognormal variance with pedigree 0.076, pedigree (4,5,5,1,1)
  EcoSpold01Location=RER
  Stoichiometric calculation, assuming an efficiency of 95% per reaction step.
  Eller et al. 2000. Karsten Eller, Erhard Henkes, Roland Rossbacher, Hartmut Höke: Amines, Aliphatic. In: Ullmann's Encyclopedia of Industrial Chemistry, Seventh Edition, 2009 Electronic Release (ed. Fiedler E., Grossmann G., Kersebohm D., Weiss G. and Witte C.). 7 th Electronic Release Edition. Wiley InterScience, New York, Article Online Posting Date: June 15, 2000. Online-Version under: DOI: 10.1002/14356007.a02_001
  Güthner et al. 2006. Thomas Güthner and Bernd Mertschenk: Cyanamides. In: Ullmann's Encyclopedia of Industrial Chemistry, Seventh Edition, 2009 Electronic Release (ed. Fiedler E., Grossmann G., Kersebohm D., Weiss G. and Witte C.). 7 th Electronic Release Edition. Wiley InterScience, New York, Article Online Posting Date: July 15, 2006. Online-Version under: DOI: 10.1002/14356007.a08_139.pub2
  Güthner et al. 2006. Thomas Güthner, Bernd Mertschenk, Bernd Schulz: Guanidine and Derivatives. In: Ullmann's Encyclopedia of Industrial Chemistry, Seventh Edition, 2009 Electronic Release (ed. Fiedler E., Grossmann G., Kersebohm D., Weiss G. and Witte C.). 7 th Electronic Release Edition. Wiley InterScience, New York, Article Online Posting Date: July 15, 2006. Online-Version under: DOI: 10.1002/14356007.a12_545.pub2
  Uncertainty: Stoechiometric calculation
  properties: dry mass 1 kg, wet mass 1 kg
- water, decarbonised: 5.9116e-5, 0.0617148, 0.00340702, 0.0931005, 0.0187686 kg (5 suppliers, which the file names only by identifier); sum of these 0.17705 kg; source Unger T A 1996; lognormal variance with pedigree 0.076, pedigree (4,5,5,1,1)
  EcoSpold01Location=RER
  Stoichiometric calculation, assuming an efficiency of 100%.
  Further references:
  Arntz et al. 2007. Dietrich Arntz, Achim Fischer, Mathias Höpp, Sylvia Jacobi, Jörg Sauer, Takashi Ohara, Takahisa Sato, Noboru Shimizu, Helmut Schwind: Acrolein and Methacrolein. In: Ullmann's Encyclopedia of Industrial Chemistry, Seventh Edition, 2009 Electronic Release (ed. Fiedler E., Grossmann G., Kersebohm D., Weiss G. and Witte C.). 7 th Electronic Release Edition. Wiley InterScience, New York, Article Online Posting Date: April 15, 2007. Online-Version under: DOI: 10.1002/14356007.a01_149.pub2
  Eller et al. 2000. Karsten Eller, Erhard Henkes, Roland Rossbacher, Hartmut Höke: Amines, Aliphatic. In: Ullmann's Encyclopedia of Industrial Chemistry, Seventh Edition, 2009 Electronic Release (ed. Fiedler E., Grossmann G., Kersebohm D., Weiss G. and Witte C.). 7 th Electronic Release Edition. Wiley InterScience, New York, Article Online Posting Date: June 15, 2000. Online-Version under: DOI: 10.1002/14356007.a02_001
  Güthner et al. 2006. Thomas Güthner and Bernd Mertschenk: Cyanamides. In: Ullmann's Encyclopedia of Industrial Chemistry, Seventh Edition, 2009 Electronic Release (ed. Fiedler E., Grossmann G., Kersebohm D., Weiss G. and Witte C.). 7 th Electronic Release Edition. Wiley InterScience, New York, Article Online Posting Date: July 15, 2006. Online-Version under: DOI: 10.1002/14356007.a08_139.pub2
  Güthner et al. 2006. Thomas Güthner, Bernd Mertschenk, Bernd Schulz: Guanidine and Derivatives. In: Ullmann's Encyclopedia of Industrial Chemistry, Seventh Edition, 2009 Electronic Release (ed. Fiedler E., Grossmann G., Kersebohm D., Weiss G. and Witte C.). 7 th Electronic Release Edition. Wiley InterScience, New York, Article Online Posting Date: July 15, 2006. Online-Version under: DOI: 10.1002/14356007.a12_545.pub2
  Shimizu et al. 2000. Shinkichi Shimizu, Nanao Watanabe, Toshiaki Kataoka, Takayuki Shoji, Nobuyuki Abe, Sinji Morishita, Hisao Ichimura: Pyridine and Pyridine Derivatives. In: Ullmann's Encyclopedia of Industrial Chemistry, Seventh Edition, 2009 Electronic Release (ed. Fiedler E., Grossmann G., Kersebohm D., Weiss G. and Witte C.). 7 th Electronic Release Edition. Wiley InterScience, New York, Article Online Posting Date: June 15, 2000. Online-Version under: DOI: 10.1002/14356007.a22_399
  Stoichiometric calculation, assuming an efficiency of 100%.
  Further references:
  Arntz et al. 2007. Dietrich Arntz, Achim Fischer, Mathias Höpp, Sylvia Jacobi, Jörg Sauer, Takashi Ohara, Takahisa Sato, Noboru Shimizu, Helmut Schwind: Acrolein and Methacrolein. In: Ullmann's Encyclopedia of Industrial Chemistry, Seventh Edition, 2009 Electronic Release (ed. Fiedler E., Grossmann G., Kersebohm D., Weiss G. and Witte C.). 7 th Electronic Release Edition. Wiley InterScience, New York, Article Online Posting Date: April 15, 2007. Online-Version under: DOI: 10.1002/14356007.a01_149.pub2
  Eller et al. 2000. Karsten Eller, Erhard Henkes, Roland Rossbacher, Hartmut Höke: Amines, Aliphatic. In: Ullmann's Encyclopedia of Industrial Chemistry, Seventh Edition, 2009 Electronic Release (ed. Fiedler E., Grossmann G., Kersebohm D., Weiss G. and Witte C.). 7 th Electronic Release Edition. Wiley InterScience, New York, Article Online Posting Date: June 15, 2000. Online-Version under: DOI: 10.1002/14356007.a02_001
  Güthner et al. 2006. Thomas Güthner and Bernd Mertschenk: Cyanamides. In: Ullmann's Encyclopedia of Industrial Chemistry, Seventh Edition, 2009 Electronic Release (ed. Fiedler E., Grossmann G., Kersebohm D., Weiss G. and Witte C.). 7 th Electronic Release Edition. Wiley InterScience, New York, Article Online Posting Date: July 15, 2006. Online-Version under: DOI: 10.1002/14356007.a08_139.pub2
  Güthner et al. 2006. Thomas Güthner, Bernd Mertschenk, Bernd Schulz: Guanidine and Derivatives. In: Ullmann's Encyclopedia of Industrial Chemistry, Seventh Edition, 2009 Electronic Release (ed. Fiedler E., Grossmann G., Kersebohm D., Weiss G. and Witte C.). 7 th
  Uncertainty: Stoechiometric calculation
  properties: wet mass 1 kg

## Inputs from nature
- Iodine [natural resource, in water]: 0.1724 kg; name iodine_input; source Unger T A 1996; lognormal variance with pedigree 0.076, pedigree (4,5,5,1,1)
  0.03% I; Stoichiometric calculation, assuming an efficiency of 95% per reaction step.
  Further references:
  Lyday 2000. Phyllis A. Lyday: Iodine and Iodine Compounds. In: Ullmann's Encyclopedia of Industrial Chemistry, Seventh Edition, 2009 Electronic Release (ed. Fiedler E., Grossmann G., Kersebohm D., Weiss G. and Witte C.). 7 th Electronic Release Edition. Wiley InterScience, New York, Article Online Posting Date: June 15, 2000. Online-Version under: DOI: 10.1002/14356007.a14_381
  Uncertainty: Stoechiometric calculation
- Water, cooling, unspecified natural origin [natural resource, in water]: 0.18832 m3; name water_cooling_UNO_input; source Gendorf 2000; lognormal variance with pedigree 0.076, pedigree (4,5,5,1,1)
  Estimation (24 kg cooling water per kg produced chemical per step).
  Uncertainty: Estimation
- Water, salt, sole [natural resource, in water]: 0.574667 m3; name water_salt_sole_input; = (iodine_input/0.0003)/1000; lognormal variance with pedigree 0.076, pedigree (4,5,5,1,1)
  There is an intermediate containing iodine in this process and this input is used as an input in the iodine production.
  The concentration of bromine in water, salt, sole is 0.23% = 0.0023kg/kg. Cross-referenced: 0.25% (Ullmann's encyclopedia), 0.4% (USGS). The concentration of iodine in water, salt, sole is 0.03% = 0.0003kg/kg. Cross-referenced: 0.015% - 0.12% (Ullmann's encyclopedia).
  There is an intermediate containing iodine in this process and this input is used as an input in the iodine production.
  The concentration of bromine in water, salt, sole is 0.23% = 0.0023kg/kg. Cross-referenced: 0.25% (Ullmann's encyclopedia), 0.4% (USGS). The concentration of iodine in water, salt, sole is 0.03% = 0.0003kg/kg. Cross-referenced: 0.015% - 0.12% (Ullmann's encyclopedia).
  Uncertainty: Stoechiometric calculation

## Emissions to nature
- Acetic acid [air, urban air close to ground]: 0.00034779 kg; lognormal variance with pedigree 0.188, pedigree (4,5,5,5,5)
  Estimation, based on the assumption that 0.2% of volatile input materials is emitted to air occurring from the purge vent, the destillation vent and fugitive emission sources.
  Uncertainty: Estimation
- Acetylene [air, urban air close to ground]: 0.00024555 kg; lognormal variance with pedigree 0.188, pedigree (4,5,5,5,5)
  (same comment as for Acetic acid)
- Ammonia [air, urban air close to ground]: 0.0001642 kg; lognormal variance with pedigree 0.218, pedigree (4,5,5,5,5)
  (same comment as for Acetic acid)
- Aniline [air, urban air close to ground]: 0.00025832 kg; lognormal variance with pedigree 0.188, pedigree (4,5,5,5,5)
  (same comment as for Acetic acid)
- Carbon dioxide, fossil [air, urban air close to ground]: 0.64113 kg; lognormal variance with pedigree 0.1786, pedigree (4,5,5,5,5)
  Estimation, based on the assumption that 0.2% of volatile input materials is emitted to air occurring from the purge vent, the destillation vent and fugitive emission sources. Remaining gases like CH4 or CO are oxidated to CO2. The carbon contained in the removed carbon compounds from wastewater treatment was accounted as CO2 emissions to air (assuming a removal efficiency of 90%).
  Uncertainty: Estimation
- Chlorine [air, urban air close to ground]: 0.0016179 kg; lognormal variance with pedigree 0.188, pedigree (4,5,5,5,5)
  (same comment as for Acetic acid)
- Chloroacetic acid [air, urban air close to ground]: 0.00035827 kg; lognormal variance with pedigree 0.188, pedigree (4,5,5,5,5)
  (same comment as for Acetic acid)
- Chlorosulfonic acid [air, urban air close to ground]: 0.00019298 kg; lognormal variance with pedigree 0.188, pedigree (4,5,5,5,5)
  (same comment as for Acetic acid)
- Cyanoacetic acid [air, urban air close to ground]: 0.00015804 kg; lognormal variance with pedigree 0.188, pedigree (4,5,5,5,5)
  (same comment as for Acetic acid)
- Dichloromethane [air, urban air close to ground]: 0.00024263 kg; lognormal variance with pedigree 0.188, pedigree (4,5,5,5,5)
  (same comment as for Acetic acid)
- Dimethyl malonate [air, urban air close to ground]: 0.00019818 kg; lognormal variance with pedigree 0.188, pedigree (4,5,5,5,5)
  (same comment as for Acetic acid)
- Ethanol [air, urban air close to ground]: 0.00011271 kg; lognormal variance with pedigree 0.188, pedigree (4,5,5,5,5)
  (same comment as for Acetic acid)
- Ethyl acetate [air, urban air close to ground]: 0.00037153 kg; lognormal variance with pedigree 0.188, pedigree (4,5,5,5,5)
  (same comment as for Acetic acid)
- Formaldehyde [air, urban air close to ground]: 0.00016666 kg; lognormal variance with pedigree 0.188, pedigree (4,5,5,5,5)
  (same comment as for Acetic acid)
- Hydrochloric acid [air, urban air close to ground]: 6.3042e-5 kg; lognormal variance with pedigree 0.188, pedigree (4,5,5,5,5)
  (same comment as for Acetic acid)
- Hydrogen [air, urban air close to ground]: 1.0555e-5 kg; lognormal variance with pedigree 0.188, pedigree (4,5,5,5,5)
  (same comment as for Acetic acid)
- Hydrogen sulfide [air, urban air close to ground]: 5.9374e-5 kg; lognormal variance with pedigree 0.188, pedigree (4,5,5,5,5)
  (same comment as for Acetic acid)
- Methane, fossil [air, urban air close to ground]: 0.0012559 kg; lognormal variance with pedigree 0.188, pedigree (4,5,5,5,5)
  (same comment as for Acetic acid)
- Methanesulfonic acid [air, urban air close to ground]: 0.00015971 kg; lognormal variance with pedigree 0.188, pedigree (4,5,5,5,5)
  (same comment as for Acetic acid)
- Methanol [air, urban air close to ground]: 0.00024112 kg; lognormal variance with pedigree 0.188, pedigree (4,5,5,5,5)
  (same comment as for Acetic acid)
- Methylamine [air, urban air close to ground]: 4.8993e-5 kg; lognormal variance with pedigree 0.188, pedigree (4,5,5,5,5)
  (same comment as for Acetic acid)
- Nitrogen oxides [air, urban air close to ground]: 0.00015586 kg; lognormal variance with pedigree 0.188, pedigree (4,5,5,5,5)
  (same comment as for Acetic acid)
- Propylene [air, urban air close to ground]: 0.0001801 kg; lognormal variance with pedigree 0.188, pedigree (4,5,5,5,5)
  (same comment as for Acetic acid)
- Sulfur dioxide [air, urban air close to ground]: 0.052092 kg; lognormal variance with pedigree 0.1786, pedigree (4,5,5,5,5)
  (same comment as for Acetic acid)
- Sulfur trioxide [air, urban air close to ground]: 0.00028019 kg; lognormal variance with pedigree 0.188, pedigree (4,5,5,5,5)
  (same comment as for Acetic acid)
- Water [air, unspecified]: 0.190849 m3; name water_to_air_unspecified; = (water_decarbonised_input/1000*fraction_WDC_to_air)+(water_cooling_UNO_input*fraction_CW_to_air)+(water_salt_sole_input*fraction_PW_to_air); lognormal variance with pedigree 0.0807, pedigree (2,2,5,1,1)
  Calculated value based on literature values and expert opinion. See comments in the parametres' comment field.
  property fraction, origin: fresh water 0.000359482; name fraction_origin_fresh_water
  property fraction, origin: salt water 0.617276; name fraction_origin_salt_water
  property fraction, origin: unspecified 0.382365; name fraction_origin_unspecified
- t-Butyl amine [air, urban air close to ground]: 0.0001093 kg; lognormal variance with pedigree 0.188, pedigree (4,5,5,5,5)
  (same comment as for Acetic acid)
- Acetic acid [water, surface water]: 0.0016534 kg; lognormal variance with pedigree 0.448, pedigree (4,5,5,5,5)
  Estimation, assuming that the remaining amount of unreacted input materials leave the production process with the wastewater, wich is further treated in an internal wastewater plant.
  Uncertainty: Estimation
- Ammonium [water, surface water]: 0.0095317 kg; lognormal variance with pedigree 0.188, pedigree (4,5,5,5,5)
  Estimation, assuming that the remaining amount of unreacted input materials leave the production process with the wastewater, wich is further treated in an internal wastewater plant. For the nitrogen containing compounds within the wastewater a removal efficiency of 50% was assumed. The nitrogen emitted to air (N2) is neglected.
  Uncertainty: Estimation
- Aniline [water, surface water]: 0.00061998 kg; lognormal variance with pedigree 0.448, pedigree (4,5,5,5,5)
  (same comment as for Ammonium)
- Calcium II [water, surface water]: 0.11127 kg; lognormal variance with pedigree 0.448, pedigree (4,5,5,5,5)
  (same comment as for Acetic acid)
- Carbonate [water, surface water]: 0.16691 kg; lognormal variance with pedigree 0.448, pedigree (4,5,5,5,5)
  (same comment as for Acetic acid)
- Chloride [water, surface water]: 1.2806 kg; lognormal variance with pedigree 0.448, pedigree (4,5,5,5,5)
  (same comment as for Acetic acid)
- Chloroacetic acid [water, surface water]: 0.0004183 kg; lognormal variance with pedigree 0.448, pedigree (4,5,5,5,5)
  (same comment as for Acetic acid)
- Dichloromethane [water, surface water]: 0.00058231 kg; lognormal variance with pedigree 0.448, pedigree (4,5,5,5,5)
  (same comment as for Acetic acid)
- Dimethylamine [water, surface water]: 0.00050283 kg; lognormal variance with pedigree 0.448, pedigree (4,5,5,5,5)
  (same comment as for Ammonium)
- Ethanol [water, surface water]: 0.00028179 kg; lognormal variance with pedigree 0.448, pedigree (4,5,5,5,5)
  (same comment as for Acetic acid)
- Ethyl acetate [water, surface water]: 0.00089167 kg; lognormal variance with pedigree 0.448, pedigree (4,5,5,5,5)
  (same comment as for Acetic acid)
- Fluoride [water, surface water]: 0.0020269 kg; lognormal variance with pedigree 0.188, pedigree (4,5,5,5,5)
  (same comment as for Acetic acid)
- Formaldehyde [water, surface water]: 0.00039999 kg; lognormal variance with pedigree 0.448, pedigree (4,5,5,5,5)
  (same comment as for Acetic acid)
- Formate [water, surface water]: 0.033688 kg; lognormal variance with pedigree 0.448, pedigree (4,5,5,5,5)
  (same comment as for Acetic acid)
- Iodide [water, surface water]: 0.016809 kg; lognormal variance with pedigree 0.798, pedigree (4,5,5,5,5)
  (same comment as for Acetic acid)
- Methanol [water, surface water]: 0.00080865 kg; lognormal variance with pedigree 0.448, pedigree (4,5,5,5,5)
  (same comment as for Acetic acid)
- Methylamine [water, surface water]: 0.00011758 kg; lognormal variance with pedigree 0.448, pedigree (4,5,5,5,5)
  (same comment as for Ammonium)
- Nitrate [water, surface water]: 0.0043054 kg; lognormal variance with pedigree 0.188, pedigree (4,5,5,5,5)
  (same comment as for Ammonium)
- Phosphate [water, surface water]: 0.025793 kg; lognormal variance with pedigree 0.188, pedigree (4,5,5,5,5)
  (same comment as for Acetic acid)
- Propylene [water, surface water]: 0.00043223 kg; lognormal variance with pedigree 0.448, pedigree (4,5,5,5,5)
  (same comment as for Acetic acid)
- Sodium I [water, surface water]: 1.0225 kg; lognormal variance with pedigree 0.798, pedigree (4,5,5,5,5)
  (same comment as for Acetic acid)
- Sulfate [water, surface water]: 0.25641 kg; lognormal variance with pedigree 0.188, pedigree (4,5,5,5,5)
  (same comment as for Acetic acid)
- Sulfur [water, surface water]: 0.00070046 kg; lognormal variance with pedigree 0.188, pedigree (4,5,5,5,5)
  (same comment as for Acetic acid)
- Water [water, unspecified]: 0.572314 m3; name water_to_water_unspecified; = (water_decarbonised_input/1000)*(1-fraction_WDC_to_air)+water_cooling_UNO_input*(1-fraction_CW_to_air)+water_salt_sole_input*(1-fraction_PW_to_air); lognormal variance with pedigree 0.0807, pedigree (2,2,5,1,1)
  (same comment as for Water)
  property carbon content, fossil 0; name C_content_fossil
  property carbon content, non-fossil 0; name C_content_non_fossil
  property dry mass 0 kg; name DM
  property fraction, origin: fresh water 0.000189482; name fraction_origin_fresh_water_Ww
  property fraction, origin: salt water 0.798267; name fraction_origin_salt_water_Ww
  property fraction, origin: unspecified 0.201543; name fraction_origin_unspecified_Ww
  property water in wet mass 1000 kg; name WWM
  property wet mass 1000 kg; name WM
- t-Butyl amine [water, surface water]: 0.00026232 kg; lognormal variance with pedigree 0.448, pedigree (4,5,5,5,5)
  (same comment as for Ammonium)

## Sampling procedure
Literature data

## Review by Thomas Nemecek 2010-03-11
Passed.
none

## Review by Roland Hischier 2011-11-14
Transfer of documentation done.
