# cement production, Portland

Dataset: EcoSpold 2, unit process
Geography: CA-QC
Time period: 2005-01-01 to 2023-12-31
Technology level: current
Classification: ISIC rev.4 ecoinvent: 2394:Manufacture of cement, lime and plaster
Synonyms: General purpose cement; Type 10 cement (Canada); Type I cement
Scenario: Business-as-Usual
System model: Allocation, cut-off by classification
Share of production covered: 100 %
Generated by: Geneviève Martineau
Published in: Athena Institute, 2005
Database: ecoinvent
isCopyrightProtected: true
accessRestrictedTo: 1

## General comment
The dataset describes the production of Portland cement (CEM I) in Quebec. It was assumed that 85% of total cement production in Quebec was of this type. Contempra (or Portland-Limestone cement) defined in another dataset is assumed to correspond to 15% of the market. GLO dataset was adapted to Quebec production using the 'US & Canadian Labor-Energy Input Survey 2007' from Portland Cement Association (2008). More specifically, calculations are based on two important technical parameters for the Canadian Cement Plants: 1. An equivalent finished cement ton is composed of 92% clinker production and 8% finished cement production; 2. Capacity Utilization rate (%)- 93.3%. Reference: US & Canadian Energy Input Survey [pg 34, note 2 and pg 36]. A direct link was created for clinker input, since it is always produced on the same site as cement. Therefore, no transport was included.

## Included activities start
From cradle, including all upstream activities.

## Included activities end
This activity ends with the cement produced in the cement mill. The dataset does not include packaging and administration.

## Geography
GLO dataset was adapted to Quebec production using the Athena Institute'Cement and Structural concrete : LCI update 2005' and the 'US & Canadian Labor-Energy Input Survey 2007' from Portland Cement Association (2008).

## Time period
Quebec data corresponding to 2007 inventory.

## Parameters
- Portland fraction: 0.85 dimensionless; name Portland_fraction; lognormal variance with pedigree 0.0406, pedigree (5,1,1,1,1)
  Fraction of the annual production capacity of Quebec cement plants that is used to produce regular Portland cement. Canadian cement association reports all Portland cements (with or without alternative constituents) alltogether. The fraction of regular Portland cement is therefore a rough estimation. It is assumed that the balance is Portland-Limestone cement (Contempra)
- clinker fraction: 0.92 dimensionless; name clinker_fraction; lognormal variance with pedigree 0.0012, pedigree (2,1,1,1,1)
  Average clinker fraction in Portland cement. Estimated value for Canadian Cement Plants, provided by Athena Institute. For regular Portland cement, clinker fraction is 0,92.
- quebec production volume: 4.203e9 kg; name PV_cement_Quebec; lognormal variance with pedigree 0.0012, pedigree (2,1,1,1,1)
  Production volume is based on annual production capacity of the 3 cement mills in Quebec (4'203'000 ton), scaled by the assumed share of this cement in the Canadian cement production. Source: USGS (2022). 2017-2018 Minerals Yearbook - Canada [advance release]. Available at: https://pubs.usgs.gov/myb/vol3/2017-18/myb3-2017-18-canada.pdf The use of production capacity may be overestimate the production volume of Quebec cement plants.

## Reference product
- cement, Portland: 1 kg; name cement; source Boesch, M.E. 2010; By-product classification allocatable product; CPC 37440: Portland cement, aluminous cement, slag cement and similar hydraulic cements, except in the form of clinkers; HS2017 252329: Cement; portland, other than white, whether or not artificially coloured; CAS 65997-15-1
  Literature Value
  production volume 3.57255e9 kg; name PV_ref; = PV_cement_Quebec*Portland_fraction
    Production volume is based on annual production capacity of the 3 cement mills in Quebec (4'203'000 ton), scaled by the assumed share of this cement in the Canadian cement production. Source: USGS (2022). 2017-2018 Minerals Yearbook - Canada [advance release]. Available at: https://pubs.usgs.gov/myb/vol3/2017-18/myb3-2017-18-canada.pdf
    Canadian cement association reports all Portland cements (with or without alternative constituents) altogether. The fraction of regular Portland cement (85%) is therefore a rough estimation.
  property price 0.0541 EUR2005
    2005 import and export prices (total trades (USD) divided by total weight (kg) in China, India, USA, Japan, Russia and Europe, major producers and consumers (http://www.cementchina.net/freport/showfre.asp?id=749) from UN Commodity Trade Statistics Database (http://data.un.org/Explorer.aspxDatabase [Accessed 2 July 2010]). Commodity: Portland cement, other than white cement
  properties: carbon allocation 0 kg, carbon content 0, carbon content, fossil 0, carbon content, non-fossil 0, dry mass 1 kg, water content 0, water in wet mass 0 kg, wet mass 1 kg

## Inputs from technosphere
- cement factory: 5.36e-11 unit; source Kellenberger D. 2007; lognormal variance with pedigree 0.3266, pedigree (2,5,4,5,3)
  Ancillary product for grinding. Extrapolated value, based on 'cement production, Portland GLO' dataset.
  Uncertainty: V
- clinker: 0.92 kg; = clinker_fraction; source Portland Cement Association 2008, p. 34 and 36; lognormal variance with pedigree 0.0002, pedigree (1,1,2,1,1)
  Cement constituant. Estimated value for Canadian Cement Plants, provided by Athena Institute. For regular Portland cement, clinker fraction is 0,92.
  Uncertainty: C
  properties: dry mass 1 kg, wet mass 1 kg
- electricity, medium voltage: 0.0542 kWh; source Portland Cement Association 2008; lognormal variance with pedigree 0.001525, pedigree (2,2,2,2,1)
  Grinding energy. Literature value.
  Uncertainty: V
- ethylene glycol: 0.00019 kg; source Kellenberger D. 2007; lognormal variance with pedigree 0.0286, pedigree (3,5,4,5,3)
  (same comment as for cement factory)
  properties: carbon content, fossil 0.387097, dry mass 1 kg, heating value, net 23.44 MJ, wet mass 1 kg
- gypsum, mineral: 0.05 kg; source Athena Institute, 2005, p. Table 3.1; lognormal variance with pedigree 0.001525, pedigree (2,2,2,2,1)
  Cement constituant. Literature value. Gypsum quantity adjusted for a total of 92% clinker and 8% finished cement product.Precision by Athena Institute.
  Uncertainty: V
  properties: dry mass 1 kg, wet mass 1 kg
- limestone, crushed, for mill: 0.03 kg; name limestone; source Athena Institute, 2005, p. Table 3.1; lognormal variance with pedigree 0.001525, pedigree (2,2,2,2,1)
  Cement constituant. Literature value. Major part of limestone in Athena 2005 LCI is used in clinker production. Precision by Athena Institute.
  Uncertainty: V
  properties: carbon content, fossil 0.117492, dry mass 0.998 kg, water content 0.00200401, wet mass 1 kg
- scrap steel: -0.00011 kg; name scrap_steel
  production volume; = scrap_steel* PV_ref/ABS( cement)
    Calculated from production volume of reference product using the relative outputs.
  properties: dry mass 1 kg, wet mass 1 kg
- steel, low-alloyed: 0.00011 kg; name steel; source Kellenberger D. 2007; lognormal variance with pedigree 0.0272, pedigree (2,5,4,5,3)
  Ancillary product for grinding (wearing parts). Extrapolated value, based on 'cement production, Portland GLO' dataset.
  Uncertainty: V
  property carbon content, fossil 0.005; name C_content_fossil
  property carbon content, non-fossil 0; name C_content_non_fossil
  property dry mass 1 kg; name DM
  property water content 0; name water_content
  property water in wet mass 0 kg; name WWM
  property wet mass 1 kg; name WM

## Emissions to nature
- Heat, waste [air, unspecified]: 0.135 MJ; source Boesch, M.E. 2010; lognormal variance with pedigree 0.068, pedigree (3,5,4,5,3)
  Extrapolated value, based on 'cement production, Portland GLO' dataset. Ancillary product for grinding.
  Uncertainty: V

## Sampling procedure
Inventory data covering the three (3) Quebec cement plants

## Extrapolations
Parameters for the Canadian Cement Plants were used to represent Quebec's plants.Some exchanges were also extrapolated from the ecoinvent 'cement production, alternative constituents, 6-20%, GLO' dataset, originally based on Swiss data.
