# tilapia feed production, commercial

Dataset: EcoSpold 2, unit process
Geography: RoW
Time period: 2012-01-01 to 2023-12-31
Technology level: current
Classification: ISIC rev.4 ecoinvent: 1080:Manufacture of prepared animal feeds
Scenario: Business-as-Usual
System model: Allocation, cut-off by classification
Generated by: Angel Avadí
Published in: Avadí, A. 2018
Database: ecoinvent
isCopyrightProtected: true
accessRestrictedTo: 1

## General comment
This activity represents the industrial production of tilapia feed. Aquafeed for tilapia was modelled as an independent activity, as the use phase of a feed mill. As feed mills are simple mills with a few refinements (such as high-powered extruders and oil coating machines for producing floating pellets), a generic oil mill from ecoinvent was included as the infrastructure required for aquafeed production. Average aquafeed datasets were constructed for tilapia (~30% protein), by averaging several commercial feeds for the growing phase of each species production cycle.

## Included activities start
This activity includes as inputs all agricultural, animal husbandry and fisheries-derived inputs, as well as the required energy expenditures (electricity, industrial heat). Direct emissions to the aquatic environment were also estimated by means of a calculation model.

## Included activities end
Use of aquafeed was excluded from system boundaries. End of life actvities in the mill were also excluded from the boundaries.

## Geography
Tilapia feed formulation common in Latin America and other countries where fishmeal and fish oil are available under competitive conditions vis-a-vis other animal protein sources

## Technology
Common feed formulation for cichlids

## Reference product
- tilapia feed, 24-28% protein: 1 kg; source Noel, W 2003; By-product classification allocatable product; CPC 2331: Preparations used in animal feeding; HS2017 230990: Dog or cat food; (not put up for retail sale), used in animal feeding
  production volume 4.3923e9 kg; = 3141234000*1.4
    3 141 234 t of tilapia per year produced in the world (2012-2014), multiplied by the average FCR (1.4)
  property price 1.62383 EUR2005
    Calculated value based on data from United Nations Commodity Trade Statistics Database (comtrade.un.org). UN comtrade category: 230990 Dog or cat food; (not put up for retail sale), used in animal feeding. Year 2016. Using exchange rate of 1EURO = 1.209 USD. Average of price of import into 4 main markets (EU, US, JPN and IN).
  properties: carbon allocation 0 kg, carbon content 0

## Inputs from technosphere
- electricity, medium voltage: 1.7131e-5, 7.64344e-7, 1.78112e-5, 9.03023e-6, 1.10577e-5, 6.39925e-6, 0.000707422, 0.0141115, 1.58692e-6, 0.00474142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 kWh (31 suppliers, which the file names only by identifier); sum of these 0.0252778 kWh; lognormal variance with pedigree 0.0606, pedigree (4,4,5,5,3)
  Electricity use
- fish oil, from anchovy: 0.01 kg; lognormal variance with pedigree 0.0432, pedigree (1,3,5,5,1)
  Fish oil from the coproduction of fishmeal and fish oil. The ratio between the two co-products cannot be modified.
- fishmeal, 65-67% protein: 0.11 kg; source Camposano, E. 2011; lognormal variance with pedigree 0.0432, pedigree (1,3,5,5,1)
  Fishmeal from the coproduction of fishmeal and fish oil. The ratio between the two co-products cannot be modified.
- heat, district or industrial, other than natural gas: 0.591 MJ; lognormal variance with pedigree 0.0606, pedigree (4,4,5,5,3)
  Proxy for heat from diesel and heavy fuel oil burned in industrial boiler
  properties: corresponding fuel use, propane, furnace >100kW 1.05263 MJ, heating value, net 1 MJ
  note on corresponding fuel use, propane, furnace >100kW: Lower heating value of the fuel input related to the heat/electricity output, taken directly from ecoinvent v3.0 dataset "heat production, natural gas, at industrial furnace >100kW, GLO 2000".
- maize grain, feed: 0.197659, 0.0023411 kg (2 suppliers, which the file names only by identifier); sum of these 0.2 kg; lognormal variance with pedigree 0.0444, pedigree (2,3,5,5,2)
  Proxy for maize and maize gluten meal
  properties: carbon content, non-fossil 0.46957, dry mass 0.86 kg, water content 0.162791, wet mass 1 kg
- oil mill: 8.63334e-10 unit; lognormal variance with pedigree 0.0532, pedigree (3,3,5,5,3)
  Proxy for aquafeed plant with processing capacity of 1782 t/y (oil mill: 63 t/day, 50 y)
  properties: lifetime capacity [kg] 1.1e9 kg
- protein feed, 100% crude: 0.005 kg; lognormal variance with pedigree 0.0532, pedigree (3,3,5,5,3)
  Proxy for aminoacids by-products
  properties: carbon content, non-fossil 0.53, dry mass 1 kg, wet mass 1 kg
- quicklime, milled, loose: 0.0416519, 0.000348091 kg (2 suppliers, which the file names only by identifier); sum of these 0.042 kg; lognormal variance with pedigree 0.0606, pedigree (4,4,5,5,3)
  Proxy for calcium carbonate and monocalcium phosphate
  properties: dry mass 0.99 kg, water content 0.010101, wet mass 1 kg
- rice, non-basmati: 0.35 kg; lognormal variance with pedigree 0.0444, pedigree (2,3,5,5,2)
  Proxy for rice and rice bran
  properties: carbon content, non-fossil 0.46412, dry mass 0.87 kg, water content 0.149425, wet mass 1 kg
- sodium chloride, powder: 0.003 kg; lognormal variance with pedigree 0.0532, pedigree (3,3,5,5,3)
  Proxy for vitamin+mineral mix
  properties: dry mass 1 kg, wet mass 1 kg
- soybean meal: 0.0543381, 0.225662 kg (2 suppliers, which the file names only by identifier); sum of these 0.28 kg; lognormal variance with pedigree 0.0444, pedigree (2,3,5,5,2)
  Soybean meal
  properties: carbon content, non-fossil 0.475627, dry mass 0.89 kg, water content 0.123596, wet mass 1 kg

## Extrapolations
Commercial tilapia feeds used in Peru and Brazil were asumed to represent all tilapia feeds used in South American tilapia-producing countries
