# paper production, woodfree, uncoated, at integrated mill

Dataset: EcoSpold 2, unit process
Geography: RoW
Time period: 2000-01-01 to 2023-12-31
Technology level: current
Classification: EcoSpold01Categories: paper & cardboard/graphic paper
Classification: ISIC rev.4 ecoinvent: 1701:Manufacture of pulp, paper and paperboard
Synonyms: uncoated fine paper
Scenario: Business-as-Usual
System model: Allocation, cut-off by classification
Generated by: Roland Hischier
Published in: Hischier R. 2007
Database: ecoinvent
isCopyrightProtected: true
accessRestrictedTo: 1

## General comment
This dataset is a copy of corresponding RER dataset. Woodfree, uncoated paper (also called uncoated fine paper) is one of the most important categories of graphical paper. It contains most of the office papers (e.g. business forms, copier, computer, stationery and book paper). Woodfree paper is defined as containing at least 90% of the fibres in form of chemical pulp. Uncoated paper is defined as not being coated with a coating material like kaolin or calcium carbonate. This dataset represents the production at integrated mills with their own pulp production next to the paper machine.
The main sources for the dataset are several environmental reports from European paper mills (Neusiedler (2001), Kymi (1999), Kymi (2001), Nordland Papier (2001)) an the Finnish EcoData database from KCL (KCL (2002)).
Further sources are the German inventory study about graphical paper (Tiedemann et al. (2000)) and the European IPPC documentation for the paper and pulp industry (European Commission (2000)).
References
KCL (2002) KCL EcoData - life cycle inventory database. The Finnish Pulp and Paper Research Institute (KCL), Espoo (Finnland)
Kymi (1999) Environmental Report 1999. UPM-Kymmene Kymi Paper Oy, Kuusankoski (Finland) as pdf-File under: http://www.paper.upm-kymmene.com
Kymi (2001) Kymi Paper Oy Environmental Protection in 2000. UPM-Kymmene Kymi Paper Oy, Kuusankoski (Finland) as pdf-File under: http://www.paper.upm-kymmene.com
Neusiedler (2001) Umwelterklärung der Neusiedler AG - Standort Ulmerfeld-Hausmening. Neusiedler AG, Ulmerfeld-Hausmening (Austria) as pdf-File under: http://www.neusiedler.at/2001/de/pdf/umwelterklaerung_the_2001.pdf
Nordland Papier (2001) Umwelterklärung 2001. UPM-Kymmene Nordland Papier AG, Dörpen (Germany) as pdf-File under: http://www.paper.upm-kymmene.com
Further References
European Commission (2000) Integrated Pollution Prevention and Control (IPPC) - Reference Document on Best Available Techniques in the Pulp and Paper Industry. Institute for Prospective Technological Studies, Sevilla
Tiedemann A., Böttcher Tiedemann C., Buschardt A., Georgi B., Giersberg G., Goosmann G., Gregor H.-D., Mehlhorn B., Modi A., Neitzel H., Oels H.-J., Schmitz S. and Suhr M. (2000) Ökobilanzen für graphische Papiere. Texte 22/00. Umweltbundesamt, Berlin

## Included activities start
This activity starts with the reception of the raw materials, such as pulpwood.

## Included activities end
This module includes the European production of uncoated woodfree paper in an integrated paper mill - including wood handling, chemical pulping and bleaching, paper production, energy production on-site, recovery cycles of chemicals and internal waste water treatment.
Some exchanges were adapted to take into account the contribution of the Québec region.

## Geography
Data from a finnish database and from several European fine paper producers used as European average data. Some exchanges were modified to take into account the contribution of the Quebec region.

## Technology
Average of present used technology

## Time period
Data represent the average technology in the late 1990ies and early 2000s. The production volume is valid for 2018.

## Parameters
- fraction, cooling water, cooling pond system, to air: 0.032 dimensionless; name fraction_CW_CP_to_air; lognormal variance with pedigree 0.0413, pedigree (2,3,1,3,1)
  Calculated based on literature value (Scown, C.D., 2011, Water Footprint of U.S. Transportation Fuels and supplying information of the article) (Vionnet, S., Quantis Water Database - Technical Report, 2012).
- fraction, cooling water, once-through system, to air: 0.004 dimensionless; name fraction_CW_OT_to_air; lognormal variance with pedigree 0.0413, pedigree (2,3,1,3,1)
  (same comment as for fraction, cooling water, cooling pond system, to air)
- fraction, cooling water, recirculating system, to air: 0.771 dimensionless; name fraction_CW_R_to_air; lognormal variance with pedigree 0.0413, pedigree (2,3,1,3,1)
  (same comment as for fraction, cooling water, cooling pond system, to air)
- fraction, cooling water, to air: 0.3875 dimensionless; name fraction_CW_to_air; = (0.5*fraction_CW_OT_to_air)+(0.5*fraction_CW_R_to_air); lognormal variance with pedigree 0.092025, pedigree (4,4,3,2,4)
  Calculated value based on literature value (see comments of the other parametres present in this dataset) and expert opinion. In the case when no industry/literature data are available about the type of cooling or directly fraction, cooling water, to air specific for the process a default assumption is applied. It is assumed that the once-through cooling system is used in 50% of all cases and recirculating system is used in another 50% of all cases.
- fraction, process water, to air: 0.15 dimensionless; name fraction_PW_to_air; lognormal variance with pedigree 0.092025, pedigree (4,4,3,2,4)

## Reference product
- paper, woodfree, uncoated: 1 kg; name RP_amount_1; By-product classification allocatable product; CPC 32113: Mechanical wood pulp; semi-chemical wood pulp; pulps of fibrous cellulosic material other than wood; HS2017 480255: Uncoated paper and paperboard (not 4801 or 4803); printing, writing or graphic, 10% or less by weight of me[...]
  EcoSpold01Location=RER
  production volume 1.68049e10 kg; name paperProdVol; = 30861214000*0.8
    Kg/year, valid for 2018,
    retrieved from FAOSTAT, Forestry Production and Trade Statistics, filtered for Regions “World”, Elements “production”, Items “Printing and writing papers, uncoated, wood free”, Years “2018”, at http://www.fao.org/faostat/en/#data/FO <http://www.fao.org/faostat/en/>, last accessed April 2020. According to expert judgement 80 % of graphical paper is produced at integrated mills.
  property Quebec production volume 6.18473e8 kg; name paper_QcProdVol
  property carbon content, fossil 0.0163033
    Fossil C content was calculated after fossil C contents of chemicals used in the production of the paper (in Tab 8.54 & 8.55 ecoinvent v2.2 report 11_III, part 8).
  property carbon content, non-fossil 0.437
    Biogenic C content was calculated after biogenic C contents of chemicals used in the production of the paper (in Tab 8.54 & 8.55 ecoinvent v2.2 report 11_III, part 8). The cellulose content in 1 kg of paper (on a wet mas basis) was estimated as (1-chemical content), C content of cellulose was considered 0.44 kgC/kg dry mass (ecoinvent v2.2 report, n 15a, pg 40)
  property price 0.756 EUR2005
    Export prices for the World+ according to: http://faostat.fao.org/site/626/DesktopDefault.aspx?PageID=626#ancor downloaded 6 May 2009; calculated as export value divided by export volume.
  properties: carbon allocation 0.428372 kg, carbon content 0.453303, dry mass 0.945 kg, heating value, net 14.11 MJ, water content 0.0582011, water in wet mass 0.055 kg, wet mass 1 kg

## Inputs from technosphere
- alkylketene dimer sizing agent, for paper production: 0.002 kg; lognormal variance with pedigree 0.0546, pedigree (2,4,5,5,1)
  EcoSpold01Location=RER
  Average data from finnish database
  Uncertainty: average data from finnish database
  properties: carbon content, non-fossil 0.538229, dry mass 1 kg, heating value, net 16.31 MJ, wet mass 1 kg
  note on carbon content, non-fossil: Biogenic C content was calculated after biogenic C contents of chemicals used in the production of the paper (in Tab 8.54 & 8.55 ecoinvent v2.2 report 11_III, part 8). The cellulose content in 1 kg of paper (on a wet mas basis) was estimated as (1-chemical content), C content of cellulose was considered 0.44 kgC/kg dry mass (ecoinvent v2.2 report, n 15a, pg 40) Chemical formula of alkyl ketene dimer was considered as C38H72O20, and the molecular weight 848g/mol. It is produced from Fatty acids, from vegetarian oil
- ash from paper production sludge: -0.00254 kg; name BP_amount_9; lognormal variance with pedigree 0.0026, pedigree (1,3,1,5,1)
  Average from finnish database and several companies
  EcoSpold01Location=CH
  Uncertainty: average from finnish database and several companies
  production volume; = paperProdVol * (BP_amount_9 / RP_amount_1)
    Calculated from the production volume of paper, woodfree, uncoated in proportion to the respective output amounts.
  properties: carbon content, non-fossil 0.0092, dry mass 1 kg, wet mass 1 kg
  note on carbon content, non-fossil: Biogenic C content was calculated after biogenic C contents of chemicals used in the production of the paper (in Tab 8.54 & 8.55 ecoinvent v2.2 report 11_III, part 8). The cellulose content in 1 kg of paper (on a wet mas basis) was estimated as (1-chemical content), C content of cellulose was considered 0.44 kgC/kg dry mass (ecoinvent v2.2 report, n 15a, pg 40) Tab 6.21, ecoinvent v2.2 report 11_III
- carbon dioxide, liquid: 0.00114 kg; lognormal variance with pedigree 0.0546, pedigree (2,4,5,5,1)
  Average data from finnish database
  EcoSpold01Location=RER
  Uncertainty: average data from finnish database
  properties: carbon content, fossil 0.272727, dry mass 1 kg, heating value, net 8.27 MJ, wet mass 1 kg
  note on carbon content, fossil: Fossil C content was calculated after fossil C contents of chemicals used in the production of the paper (in Tab 8.54 & 8.55 ecoinvent v2.2 report 11_III, part 8). CO2.
- chemical, organic: 0.0025 kg; lognormal variance with pedigree 0.0546, pedigree (2,4,5,5,1)
  EcoSpold01Location=GLO
  Average data from finnish database
  Uncertainty: average data from finnish database
  properties: carbon content, fossil 0.628, dry mass 1 kg, heating value, net 19.03 MJ, wet mass 1 kg
  note on carbon content, fossil: Fossil C content was calculated after fossil C contents of chemicals used in the production of the paper (in Tab 8.54 & 8.55 ecoinvent v2.2 report 11_III, part 8). This dataset is an unweighted average of 20 organic substances (listed in Tab 88.1, ecoinvent v2.2 report 8, part II), being part of the top100 chemicals included in this database. The C-content has also been calculated as an unweighted average of the C content of the substances composing this dataset.
- electricity, medium voltage: 0.0134258, 0.267815, 0.00670439, 0.00411144, 0.000822901, 0.000176695, 0.027656, 0.079488 kWh (8 suppliers, which the file names only by identifier); sum of these 0.4002 kWh; lognormal variance with pedigree 0.0426, pedigree (1,3,5,5,1)
  Average from finnish database and several companies
  EcoSpold01Location=NORDEL
  Uncertainty: average from finnish database and several companies
- hard coal: 0.000514797, 0.000122158, 0.00364334, 0.000855634, 0.000525338, 0.00113533, 0.000223406 kg (7 suppliers, which the file names only by identifier); sum of these 0.00702 kg; lognormal variance with pedigree 0.0426, pedigree (1,3,5,5,1)
  Average from finnish database and several companies
  EcoSpold01Location=WEU
  Uncertainty: average from finnish database and several companies
  properties: carbon content, fossil 0.845, dry mass 0.94 kg, heating value, net 27.91 MJ, water content 0.0638298, wet mass 1 kg
  note on carbon content, fossil: Fossil C content was calculated after fossil C contents of chemicals used in the production of the paper (in Tab 8.54 & 8.55 ecoinvent v2.2 report 11_III, part 8). C content 75-94% (specified in Tab 1.1, report 6, part VI). A mean content of 0.845 kg C/ kg dry hard coal was considered
  note on heating value, net: Based on the Characterization factor of Hard coal in the CED method
- hazardous waste, for incineration: -2.75127e-8 kg; name BP_amount_1; = wasteHazardous_amountQcKg * paper_QcProdVol / paperProdVol
  This flow is considered as a regional specificity of Quebec. The flow is scaled using the production volumes (Quebec and GLO) to avoid its accounting of this specificity in the other regions.
  production volume; = paperProdVol * (BP_amount_1 / RP_amount_1)
    Calculated from production volume of reference product using the relative outputs.
  property amount from Québec dataset in kg 1.09829e-6 kg; name wasteHazardous_amountQcKg
  properties: carbon content, fossil 0.554667, dry mass 0.75 kg, heating value, net 17 MJ, water content 0.333333, wet mass 1 kg
  note on carbon content, fossil: Tab A.6, ecoinvent v2.2 report 13_I. C content has been calculated after data in the tables, and then referred to 1 kg DM
  note on heating value, net: Value taken from the general comment of the treatment dataset.
- hazardous waste, for underground deposit: -0.00018 kg; name BP_amount_8; lognormal variance with pedigree 0.0026, pedigree (1,3,1,5,1)
  EcoSpold01Location=DE
  Average from finnish database and several companies
  Uncertainty: average from finnish database and several companies
  production volume; = paperProdVol * (BP_amount_8 / RP_amount_1)
    (same comment as for ash from paper production sludge)
  properties: carbon content, fossil 0.554667, dry mass 1 kg, wet mass 1 kg
  note on carbon content, fossil: Fossil C content was calculated after fossil C contents of chemicals used in the production of the paper (in Tab 8.54 & 8.55 ecoinvent v2.2 report 11_III, part 8). Tab A.6, ecoinvent v2.2 report 13_I, average hazardous waste composition was used, and referred to 0% water mass. No waste-specific emission are currently inventoried for underground deposits. Accordingly, no waste composition must be specified. For generic, average waste to underground deposit deposition in a 200 liter steel drum without cement solidification is assumed (ecoinvent v2.2 report 13_I).
- heavy fuel oil: 0.000360009, 0.000209638, 0.00106576, 0.0249137, 0.000268935, 0.00138192 kg (6 suppliers, which the file names only by identifier); sum of these 0.0282 kg; lognormal variance with pedigree 0.0426, pedigree (1,3,5,5,1)
  Average from finnish database and several companies
  EcoSpold01Location=RER
  Uncertainty: average from finnish database and several companies
  properties: carbon content, fossil 0.849, dry mass 1 kg, heating value, net 41.2 MJ, wet mass 1 kg
  note on carbon content, fossil: Fossil C content was calculated after fossil C contents of chemicals used in the production of the paper (in Tab 8.54 & 8.55 ecoinvent v2.2 report 11_III, part 8). C-content is 84.9% (ecoinvent v2.2 report 6_IV, Tab 3.18)
- hydrogen peroxide, without water, in 50% solution state: 0.00423 kg; lognormal variance with pedigree 0.0546, pedigree (2,4,5,5,1)
  (same comment as for carbon dioxide, liquid)
  properties: dry mass 1 kg, heating value, net 7.13 MJ, wet mass 1 kg
- kaolin: 0.119 kg; lognormal variance with pedigree 0.0426, pedigree (1,3,5,5,1)
  EcoSpold01Location=RER
  Average from several european fine paper producers
  Uncertainty: average from several european fine paper producers
  properties: dry mass 1 kg, wet mass 1 kg
- lignite briquettes: 0.0789 MJ; lognormal variance with pedigree 0.0426, pedigree (1,3,5,5,1)
  Average from finnish database and several companies
  EcoSpold01Location=DE
  Uncertainty: average from finnish database and several companies
  properties: carbon content, fossil 0.65679, dry mass 0.0415385 kg, heating value, net 19.5 MJ, water content 0.234568, wet mass 0.0512821 kg
  note on carbon content, fossil: Fossil C content was calculated after fossil C contents of chemicals used in the production of the paper (in Tab 8.54 & 8.55 ecoinvent v2.2 report 11_III, part 8). 53.2% C and 19% water in wet mass (ecoinvent v2.1 report 6_VI Table 7.1)
  note on heating value, net: Based on literature, page 52, Report 5: Dones, R., Bauer, C., Bolliger, R., Burger, B., faist Emmenegger, M., Frischknecht, R., Heck, T., Jungbluth, N., Röder, A., Tuchschmid, M. (2007) Life Cycle Inventories of Energy Systems: Resulst for current Systems in Switzerland and other UCTE Countries. ecoinvent report No. 5. Paul Scherrer Institut Villigen, Swiss Centre for Life Cycle Inventories, Dübendorf, CH
- lime: 0.119 kg; lognormal variance with pedigree 0.0426, pedigree (1,3,5,5,1)
  EcoSpold01Location=CH
  Average from several european fine paper producers
  Uncertainty: average from several european fine paper producers
  properties: carbon content, fossil 0.120005, dry mass 1 kg, wet mass 1 kg
  note on carbon content, fossil: Fossil C content was calculated after fossil C contents of chemicals used in the production of the paper (in Tab 8.54 & 8.55 ecoinvent v2.2 report 11_III, part 8). CaCO3 (MW=100)
- magnesium sulfate: 0.00245 kg; lognormal variance with pedigree 0.0546, pedigree (2,4,5,5,1)
  (same comment as for alkylketene dimer sizing agent, for paper production)
  properties: dry mass 1 kg, wet mass 1 kg
- methanol: 0.000400253, 0.000776229, 7.35173e-5 kg (3 suppliers, which the file names only by identifier); sum of these 0.00125 kg; lognormal variance with pedigree 0.0546, pedigree (2,4,5,5,1)
  Average data from finnish database
  EcoSpold01Location=GLO
  Uncertainty: average data from finnish database
  properties: carbon content, fossil 0.375, dry mass 1 kg, heating value, net 20 MJ, wet mass 1 kg
  note on carbon content, fossil: Fossil C content was calculated after fossil C contents of chemicals used in the production of the paper (in Tab 8.54 & 8.55 ecoinvent v2.2 report 11_III, part 8). CH3OH
  note on heating value, net: Based on literature, page 533, Report 17: Jungbluth, N., Chudacoff, M., Dauriat, A., Dinkel, F., Doka, G., Faist Emmenegger, M., Gnansounou, E., Kljun, N., Schleiss, K., Spielmann, M., Stettler, C., Sutter, J. 2007: Life Cycle Inventories of Bioenergy. ecoinvent report No. 17, Swiss Centre for Life Cycle Inventories, Dübendorf, CH.
- municipal solid waste: -2.68663e-5, -3.19026e-6, -0.0151579, -2.23242e-6, -7.16566e-7, -1.61963e-6, -6.74259e-5 kg (7 suppliers, which the file names only by identifier); sum of these -0.01526 kg; lognormal variance with pedigree 0.0026, pedigree (1,3,1,5,1)
  EcoSpold01Location=CH
  Average from finnish database and several companies
  Uncertainty: average from finnish database and several companies
  production volume; = paperProdVol * (BP_amount_10 / RP_amount_1)
    (same comment as for ash from paper production sludge)
  properties: carbon content, fossil 0.171549, carbon content, non-fossil 0.261655, dry mass 0.771 kg, heating value, net 11.74 MJ, water content 0.297017, wet mass 1 kg
  note on carbon content, fossil: Fossil C content was calculated after fossil C contents of chemicals used in the production of the paper (in Tab 8.54 & 8.55 ecoinvent v2.2 report 11_III, part 8). MSW composition in tab 4.1, ecoinvent v2.2 report 13_I. C content referred to 1 kg DM
  note on carbon content, non-fossil: Biogenic C content was calculated after biogenic C contents of chemicals used in the production of the paper (in Tab 8.54 & 8.55 ecoinvent v2.2 report 11_III, part 8). The cellulose content in 1 kg of paper (on a wet mas basis) was estimated as (1-chemical content), C content of cellulose was considered 0.44 kgC/kg dry mass (ecoinvent v2.2 report, n 15a, pg 40) MSW composition in tab 4.1, ecoinvent v2.2 report 13_I. C content referred to 1 kg DM
- natural gas, high pressure: 0.000343837, 0.00058001, 0.00126518, 0.000423402, 9.89474e-5, 0.000588915, 0.000565109, 0.00148597, 0.000573682, 0.000887324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 m3 (36 suppliers, which the file names only by identifier); sum of these 0.0428205 m3; lognormal variance with pedigree 0.0426, pedigree (1,3,5,5,1)
  EcoSpold01Location=RER
  Average from finnish database and several companies
  Uncertainty: average from finnish database and several companies
  properties: carbon content, fossil 0.602381, dry mass 0.84 kg, heating value, gross 40 MJ, heating value, net 36 MJ, wet mass 0.84 kg
  note on carbon content, fossil: An average C content of 0.506 kg C/ m3 has been assumed (this average has been calculated using data in Tab 3.5, ecoinvent v2.2 report 6_V
  note on heating value, net: Literature value, Source: Christoph Meili;Niels Jungbluth;Maresa Bussa (2021) Life cycle inventories of crude oil and natural gas extraction. ESU-services Ltd. commissioned by BAFU & VSG, Schaffhausen, Switzerland, http://esu-services.ch/data/public-lci-reports/
- nitrogen, liquid: 0.00013 kg; lognormal variance with pedigree 0.0546, pedigree (2,4,5,5,1)
  (same comment as for carbon dioxide, liquid)
  properties: dry mass 1 kg, wet mass 1 kg
- oxygen, liquid: 0.0134 kg; lognormal variance with pedigree 0.0546, pedigree (2,4,5,5,1)
  (same comment as for alkylketene dimer sizing agent, for paper production)
  properties: dry mass 1 kg, wet mass 1 kg
- paper mill, integrated: 5.44e-11 unit; lognormal variance with pedigree 0.448, pedigree (4,5,5,5,5)
  EcoSpold01Location=RER
  Own assumption
  Uncertainty: own assumption
- potato starch: 0.038 kg; lognormal variance with pedigree 0.0546, pedigree (2,4,5,5,1)
  EcoSpold01Location=DE
  Average data from finnish database
  Uncertainty: average data from finnish database
  properties: carbon content, non-fossil 0.46, dry mass 0.8 kg, heating value, net 10.66 MJ, water content 0.25, wet mass 1 kg
  note on carbon content, non-fossil: Biogenic C content was calculated after biogenic C contents of chemicals used in the production of the paper (in Tab 8.54 & 8.55 ecoinvent v2.2 report 11_III, part 8). The cellulose content in 1 kg of paper (on a wet mas basis) was estimated as (1-chemical content), C content of cellulose was considered 0.44 kgC/kg dry mass (ecoinvent v2.2 report, n 15a, pg 40) C-content of starch is considered 46% on dry mass basis (from "Evolutionary and Biochemical Aspects", A.D. Kay and T. Vrede (in Global Ecology, 2010, Elsevier B.V., S.E. Jørgensen Ed.)).
- pulpwood, hardwood, measured as solid wood under bark: 0.001696 m3; lognormal variance with pedigree 0.0426, pedigree (1,3,5,5,1)
  (same comment as for kaolin)
  properties: carbon content, non-fossil 0.494, dry mass 650 kg, heating value, net 6071.3 MJ, water content 0.8, wet mass 1170 kg
  note on carbon content, non-fossil: Biogenic C content was calculated after biogenic C contents of chemicals used in the production of the paper (in Tab 8.54 & 8.55 ecoinvent v2.2 report 11_III, part 8). The cellulose content in 1 kg of paper (on a wet mas basis) was estimated as (1-chemical content), C content of cellulose was considered 0.44 kgC/kg dry mass (ecoinvent v2.2 report, n 15a, pg 40) C content of dry mass is 0.494 kgC/kg dry wood (ecoinvent v2.2 report 9)
  note on heating value, net: Value based on "hardwood forestry, mixed species, sustainable forest management"The property is based on a value of 11.58MJ/kg
- pulpwood, softwood, measured as solid wood under bark: 0.001137 m3; lognormal variance with pedigree 0.0426, pedigree (1,3,5,5,1)
  (same comment as for kaolin)
  properties: carbon content, non-fossil 0.494, dry mass 450 kg, heating value, net 4483.78 MJ, water content 1.4, wet mass 1080 kg
  note on heating value, net: Value based on "softwood forestry, mixed species, sustainable forest management"The property is based on a value of 11.58MJ/kg
- quicklime, milled, loose: 0.00497 kg; lognormal variance with pedigree 0.0546, pedigree (2,4,5,5,1)
  Average data from finnish database
  EcoSpold01Location=CH
  Uncertainty: average data from finnish database
  properties: dry mass 0.99 kg, water content 0.010101, wet mass 1 kg
- residual softwood, wet: 0.000309 m3; lognormal variance with pedigree 0.0426, pedigree (1,3,5,5,1)
  (same comment as for kaolin)
  properties: carbon content, non-fossil 0.494, dry mass 450 kg, heating value, net 5962.7 MJ, water content 0.7, wet mass 765 kg
- sludge from pulp and paper production: -0.00901 kg; name BP_amount_6; lognormal variance with pedigree 0.0026, pedigree (1,3,1,5,1)
  (same comment as for ash from paper production sludge)
  production volume; = paperProdVol * (BP_amount_6 / RP_amount_1)
    (same comment as for ash from paper production sludge)
  properties: carbon content, non-fossil 0.21, dry mass 0.75 kg, heating value, net 2.65 MJ, water content 0.333333, wet mass 1 kg
  note on carbon content, non-fossil: Biogenic C content was calculated after biogenic C contents of chemicals used in the production of the paper (in Tab 8.54 & 8.55 ecoinvent v2.2 report 11_III, part 8). The cellulose content in 1 kg of paper (on a wet mas basis) was estimated as (1-chemical content), C content of cellulose was considered 0.44 kgC/kg dry mass (ecoinvent v2.2 report, n 15a, pg 40) Tab 6.21, ecoinvent v2.2 report 11_III & Tab A.9, ecoinvent v2.2 report 13_I. Sludge from pulp and paper contains 15.75% carbon
- sodium chlorate, powder: 0.0143 kg; lognormal variance with pedigree 0.0546, pedigree (2,4,5,5,1)
  (same comment as for carbon dioxide, liquid)
  properties: dry mass 1 kg, wet mass 1 kg
- sodium chloride, powder: 0.00023 kg; lognormal variance with pedigree 0.0546, pedigree (2,4,5,5,1)
  (same comment as for carbon dioxide, liquid)
  properties: dry mass 1 kg, wet mass 1 kg
- sodium hydroxide, without water, in 50% solution state: 0.0217 kg; lognormal variance with pedigree 0.0546, pedigree (2,4,5,5,1)
  (same comment as for carbon dioxide, liquid)
  properties: dry mass 1 kg, heating value, net 3.03 MJ, wet mass 1 kg
- spent antifreezer liquid: -4.8693e-8 kg; name BP_amount_3; = wasteAntifreezer_amountQcKg * paper_QcProdVol / paperProdVol
  (same comment as for hazardous waste, for incineration)
  production volume; = paperProdVol * (BP_amount_3 / RP_amount_1)
    Calculated from production volume of reference product using the relative outputs.
  property amount from Québec dataset in kg 1.94379e-6 kg; name wasteAntifreezer_amountQcKg
  properties: carbon content, fossil 0.431328, dry mass 0.482 kg, heating value, net 0.56 MJ, water content 1.07469, wet mass 1 kg
- spent solvent mixture: -3.5629e-8 kg; name BP_amount_2; = wasteSolvent_amountQcKg * paper_QcProdVol / paperProdVol
  (same comment as for hazardous waste, for incineration)
  production volume; = paperProdVol * (BP_amount_2 / RP_amount_1)
    Calculated from production volume of reference product using the relative outputs.
  property amount from Québec dataset in kg 1.42228e-6 kg; name wasteSolvent_amountQcKg
  properties: carbon content, fossil 0.571257, dry mass 0.835 kg, heating value, net 21.7 MJ, water content 0.197605, wet mass 1 kg
  note on carbon content, fossil: Tab A.7, ecoinvent v2.2 report 13_I. C content has been calculated after data in the tables, and then referred to 1 kg DM
- sulfate pulp, bleached: 0.03325 kg; = 0.035*0.95; lognormal variance with pedigree 0.0426, pedigree (1,3,5,5,1)
  Average from several european fine paper producers. pulp input is 5% unbleached pulp and 95% bleached pulp
  Uncertainty: average from several european fine paper producers
  properties: carbon content, non-fossil 0.494, dry mass 0.9 kg, heating value, net 13.23 MJ, water content 0.111111, wet mass 1 kg
  note on carbon content, non-fossil: C content of dry mass of sulfate pulp is 0.494 kgC/kg dry wood (ecoinvent v2.2 report 6_IX & ecoinvent v2.2 report 9). No other C containing products in the formulation of the pulp.
- sulfate pulp, unbleached: 0.00175 kg; = 0.035*0.05; lognormal variance with pedigree 0.0426, pedigree (1,3,5,5,1)
  (same comment as for sulfate pulp, bleached)
  properties: carbon content, non-fossil 0.494, dry mass 0.9 kg, heating value, net 13.23 MJ, price 0.355 EUR2005, water content 0.111111, wet mass 1 kg
- sulfur dioxide, liquid: 0.00114 kg; lognormal variance with pedigree 0.0546, pedigree (2,4,5,5,1)
  (same comment as for carbon dioxide, liquid)
  properties: dry mass 1 kg, wet mass 1 kg
- sulfuric acid: 0.0174 kg; lognormal variance with pedigree 0.0546, pedigree (2,4,5,5,1)
  (same comment as for carbon dioxide, liquid)
  properties: dry mass 1 kg, wet mass 1 kg
- waste mineral oil: -2.28872e-6 kg; name BP_amount_5; = wasteOil_amountQcKg * paper_QcProdVol / paperProdVol
  (same comment as for hazardous waste, for incineration)
  production volume; = paperProdVol * (BP_amount_5 / RP_amount_1)
    Calculated from production volume of reference product using the relative outputs.
  property amount from Québec dataset in kg 9.13639e-5 kg; name wasteOil_amountQcKg
  properties: carbon content, fossil 0.864444, dry mass 0.9 kg, heating value, net 34.7 MJ, water content 0.111111, wet mass 1 kg
- waste textile, soiled: -1.23099e-6 kg; name BP_amount_4; = wasteTextile_amountQcKg * paper_QcProdVol / paperProdVol
  (same comment as for hazardous waste, for incineration)
  production volume; = paperProdVol * (BP_amount_4 / RP_amount_1)
    Calculated from production volume of reference product using the relative outputs.
  property amount from Québec dataset in kg 4.91401e-5 kg; name wasteTextile_amountQcKg
  properties: carbon content, non-fossil 0.570519, dry mass 0.75 kg, heating value, net 14.45 MJ, water content 0.333333, wet mass 1 kg
- wood ash mixture, pure: -0.0274 kg; name BP_amount_7; lognormal variance with pedigree 0.0026, pedigree (1,3,1,5,1)
  (same comment as for ash from paper production sludge)
  production volume; = paperProdVol * (BP_amount_7 / RP_amount_1)
    (same comment as for ash from paper production sludge)
  properties: carbon content, non-fossil 0.012, dry mass 1 kg, wet mass 1 kg
  note on carbon content, non-fossil: Biogenic C content was calculated after biogenic C contents of chemicals used in the production of the paper (in Tab 8.54 & 8.55 ecoinvent v2.2 report 11_III, part 8). The cellulose content in 1 kg of paper (on a wet mas basis) was estimated as (1-chemical content), C content of cellulose was considered 0.44 kgC/kg dry mass (ecoinvent v2.2 report, n 15a, pg 40) Tab A.9, ecoinvent v2.2 report 13_I.

## Inputs from nature
- Water, cooling, unspecified natural origin [natural resource, in water]: 0.036 m3; name water_cooling_UNO_input; lognormal variance with pedigree 0.1126, pedigree (1,3,5,5,4)
  Estimation, based on data for sulphate pulp production
  Uncertainty: estimation, based on data for sulphate pulp production
- Water, unspecified natural origin [natural resource, in water]: 0.049 m3; name water_UNO_input; lognormal variance with pedigree 0.0426, pedigree (1,3,5,5,1)
  Average from finnish database and several companies
  Uncertainty: average from finnish database and several companies

## Emissions to nature
- Acetaldehyde [air, urban air close to ground]: 9.88e-7 kg; lognormal variance with pedigree 0.1806, pedigree (2,5,5,5,4)
  Estimation - based on respective heating modules
  Uncertainty: estimation - based on respective heating modules
- Acetic acid [air, urban air close to ground]: 9.49e-7 kg; lognormal variance with pedigree 0.1806, pedigree (2,5,5,5,4)
  (same comment as for Acetaldehyde)
- Acetone [air, urban air close to ground]: 1.75e-7 kg; lognormal variance with pedigree 0.1806, pedigree (2,5,5,5,4)
  (same comment as for Acetaldehyde)
- Acetylene [air, urban air close to ground]: 7.79e-6 kg; lognormal variance with pedigree 0.1806, pedigree (2,5,5,5,4)
  (same comment as for Acetaldehyde)
- Aluminium III [air, urban air close to ground]: 2.05e-5 kg; lognormal variance with pedigree 0.1806, pedigree (2,5,5,5,4)
  (same comment as for Acetaldehyde)
- Ammonia [air, urban air close to ground]: 2.3e-5 kg; lognormal variance with pedigree 0.1806, pedigree (2,5,5,5,4)
  (same comment as for Acetaldehyde)
- Antimony ion [air, urban air close to ground]: 3.92e-8 kg; lognormal variance with pedigree 0.1806, pedigree (2,5,5,5,4)
  (same comment as for Acetaldehyde)
- Arsenic ion [air, urban air close to ground]: 1.11e-7 kg; lognormal variance with pedigree 0.1806, pedigree (2,5,5,5,4)
  (same comment as for Acetaldehyde)
- Barium II [air, urban air close to ground]: 4.15e-7 kg; lognormal variance with pedigree 0.7806, pedigree (2,5,5,5,4)
  (same comment as for Acetaldehyde)
- Benzene [air, urban air close to ground]: 2.06e-5 kg; lognormal variance with pedigree 0.1806, pedigree (2,5,5,5,4)
  (same comment as for Acetaldehyde)
- Benzo(a)pyrene [air, urban air close to ground]: 3.75e-8 kg; lognormal variance with pedigree 0.1806, pedigree (2,5,5,5,4)
  (same comment as for Acetaldehyde)
- Beryllium II [air, urban air close to ground]: 4.15e-9 kg; lognormal variance with pedigree 0.7806, pedigree (2,5,5,5,4)
  (same comment as for Acetaldehyde)
- Boron [air, urban air close to ground]: 1.76e-5 kg; lognormal variance with pedigree 0.7806, pedigree (2,5,5,5,4)
  (same comment as for Acetaldehyde)
- Bromine [air, urban air close to ground]: 8.23e-7 kg; lognormal variance with pedigree 0.1806, pedigree (2,5,5,5,4)
  (same comment as for Acetaldehyde)
- Butane [air, urban air close to ground]: 1.17e-6 kg; lognormal variance with pedigree 0.4406, pedigree (2,5,5,5,4)
  (same comment as for Acetaldehyde)
- Cadmium II [air, urban air close to ground]: 5.99e-8 kg; lognormal variance with pedigree 0.7806, pedigree (2,5,5,5,4)
  (same comment as for Acetaldehyde)
- Calcium II [air, urban air close to ground]: 0.000156 kg; lognormal variance with pedigree 0.4406, pedigree (2,5,5,5,4)
  (same comment as for Acetaldehyde)
- Carbon dioxide, fossil [air, urban air close to ground]: 0.304 kg; lognormal variance with pedigree 0.0426, pedigree (1,3,5,5,1)
  (same comment as for Water, unspecified natural origin)
- Carbon dioxide, non-fossil [air, urban air close to ground]: 1.5 kg; lognormal variance with pedigree 0.0426, pedigree (1,3,5,5,1)
  (same comment as for Water, unspecified natural origin)
- Carbon monoxide, fossil [air, urban air close to ground]: 0.00618 kg; lognormal variance with pedigree 0.7806, pedigree (2,5,5,5,4)
  (same comment as for Acetaldehyde)
- Carbon monoxide, non-fossil [air, urban air close to ground]: 0.000639 kg; lognormal variance with pedigree 0.7806, pedigree (2,5,5,5,4)
  (same comment as for Acetaldehyde)
- Chlorine [air, urban air close to ground]: 2.39e-6 kg; lognormal variance with pedigree 0.4406, pedigree (2,5,5,5,4)
  (same comment as for Acetaldehyde)
- Chromium III [air, urban air close to ground]: 1.83e-7 kg; lognormal variance with pedigree 0.7806, pedigree (2,5,5,5,4)
  (same comment as for Acetaldehyde)
- Chromium VI [air, urban air close to ground]: 2.37e-9 kg; lognormal variance with pedigree 0.7806, pedigree (2,5,5,5,4)
  (same comment as for Acetaldehyde)
- Cobalt II [air, urban air close to ground]: 9.73e-8 kg; lognormal variance with pedigree 0.7806, pedigree (2,5,5,5,4)
  (same comment as for Acetaldehyde)
- Copper ion [air, urban air close to ground]: 3.94e-7 kg; lognormal variance with pedigree 0.7806, pedigree (2,5,5,5,4)
  (same comment as for Acetaldehyde)
- Dinitrogen monoxide [air, urban air close to ground]: 3.63e-5 kg; lognormal variance with pedigree 0.1806, pedigree (2,5,5,5,4)
  (same comment as for Acetaldehyde)
- Dioxins, measured as 2,3,7,8-tetrachlorodibenzo-p-dioxin [air, urban air close to ground]: 4.78e-12 kg; lognormal variance with pedigree 0.1806, pedigree (2,5,5,5,4)
  (same comment as for Acetaldehyde)
- Ethane [air, urban air close to ground]: 2.34e-5 kg; lognormal variance with pedigree 0.1806, pedigree (2,5,5,5,4)
  (same comment as for Acetaldehyde)
- Ethanol [air, urban air close to ground]: 3.49e-7 kg; lognormal variance with pedigree 0.1806, pedigree (2,5,5,5,4)
  (same comment as for Acetaldehyde)
- Ethyl benzene [air, urban air close to ground]: 3.99e-7 kg; lognormal variance with pedigree 0.1806, pedigree (2,5,5,5,4)
  (same comment as for Acetaldehyde)
- Ethylene [air, urban air close to ground]: 4.67e-5 kg; lognormal variance with pedigree 0.7806, pedigree (2,5,5,5,4)
  (same comment as for Acetaldehyde)
- Fluorine [air, urban air close to ground]: 6.65e-7 kg; lognormal variance with pedigree 0.1806, pedigree (2,5,5,5,4)
  (same comment as for Acetaldehyde)
- Formaldehyde [air, urban air close to ground]: 2.59e-6 kg; lognormal variance with pedigree 0.1806, pedigree (2,5,5,5,4)
  (same comment as for Acetaldehyde)
- Hexachlorobenzene [air, urban air close to ground]: 9.58e-14 kg; lognormal variance with pedigree 0.1806, pedigree (2,5,5,5,4)
  (same comment as for Acetaldehyde)
- Hydrocarbons, aliphatic, alkanes, unspecified [air, urban air close to ground]: 2.06e-5 kg; lognormal variance with pedigree 0.1806, pedigree (2,5,5,5,4)
  (same comment as for Acetaldehyde)
- Hydrocarbons, aliphatic, unsaturated [air, urban air close to ground]: 4.91e-5 kg; lognormal variance with pedigree 0.1806, pedigree (2,5,5,5,4)
  (same comment as for Acetaldehyde)
- Hydrocarbons, aromatic [air, urban air close to ground]: 1.75e-7 kg; lognormal variance with pedigree 0.1806, pedigree (2,5,5,5,4)
  (same comment as for Acetaldehyde)
- Hydrochloric acid [air, urban air close to ground]: 1.5e-5 kg; lognormal variance with pedigree 0.1806, pedigree (2,5,5,5,4)
  (same comment as for Acetaldehyde)
- Hydrogen fluoride [air, urban air close to ground]: 6.14e-7 kg; lognormal variance with pedigree 0.1806, pedigree (2,5,5,5,4)
  (same comment as for Acetaldehyde)
- Hydrogen sulfide [air, urban air close to ground]: 1.54e-7 kg; lognormal variance with pedigree 0.1806, pedigree (2,5,5,5,4)
  (same comment as for Acetaldehyde)
- Iodine [air, urban air close to ground]: 7.23e-8 kg; lognormal variance with pedigree 0.1806, pedigree (2,5,5,5,4)
  (same comment as for Acetaldehyde)
- Iron ion [air, urban air close to ground]: 2.2e-5 kg; lognormal variance with pedigree 0.7806, pedigree (2,5,5,5,4)
  (same comment as for Acetaldehyde)
- Lead II [air, urban air close to ground]: 4.73e-7 kg; lognormal variance with pedigree 0.7806, pedigree (2,5,5,5,4)
  (same comment as for Acetaldehyde)
- Lead-210 [air, urban air close to ground]: 0.000105 kBq; lognormal variance with pedigree 0.4406, pedigree (2,5,5,5,4)
  (same comment as for Acetaldehyde)
- Magnesium [air, urban air close to ground]: 1.72e-5 kg; lognormal variance with pedigree 0.7806, pedigree (2,5,5,5,4)
  (same comment as for Acetaldehyde)
- Manganese II [air, urban air close to ground]: 2.3e-6 kg; lognormal variance with pedigree 0.7806, pedigree (2,5,5,5,4)
  (same comment as for Acetaldehyde)
- Mercury II [air, urban air close to ground]: 2.23e-8 kg; lognormal variance with pedigree 0.7806, pedigree (2,5,5,5,4)
  (same comment as for Acetaldehyde)
- Methane, fossil [air, urban air close to ground]: 0.00047 kg; lognormal variance with pedigree 0.1806, pedigree (2,5,5,5,4)
  (same comment as for Acetaldehyde)
- Methane, non-fossil [air, urban air close to ground]: 5.32e-6 kg; lognormal variance with pedigree 0.1806, pedigree (2,5,5,5,4)
  (same comment as for Acetaldehyde)
- Methanol [air, urban air close to ground]: 5.94e-7 kg; lognormal variance with pedigree 0.1806, pedigree (2,5,5,5,4)
  (same comment as for Acetaldehyde)
- Molybdenum VI [air, urban air close to ground]: 8.76e-8 kg; lognormal variance with pedigree 0.7806, pedigree (2,5,5,5,4)
  (same comment as for Acetaldehyde)
- NMVOC, non-methane volatile organic compounds [air, urban air close to ground]: 3.51e-5 kg; lognormal variance with pedigree 0.1806, pedigree (2,5,5,5,4)
  (same comment as for Acetaldehyde)
- Nickel II [air, urban air close to ground]: 9.28e-7 kg; lognormal variance with pedigree 0.7806, pedigree (2,5,5,5,4)
  (same comment as for Acetaldehyde)
- Nitrogen oxides [air, urban air close to ground]: 0.00172 kg; lognormal variance with pedigree 0.0826, pedigree (1,3,5,5,1)
  (same comment as for Water, unspecified natural origin)
- PAH, polycyclic aromatic hydrocarbons [air, urban air close to ground]: 1.65e-7 kg; lognormal variance with pedigree 0.1806, pedigree (2,5,5,5,4)
  (same comment as for Acetaldehyde)
- Particulate Matter, < 2.5 um [air, urban air close to ground]: 0.000688 kg; lognormal variance with pedigree 0.4406, pedigree (2,5,5,5,4)
  (same comment as for Acetaldehyde)
- Particulate Matter, > 10 um [air, urban air close to ground]: 0.000229 kg; lognormal variance with pedigree 0.1806, pedigree (2,5,5,5,4)
  (same comment as for Acetaldehyde)
- Particulate Matter, > 2.5 um and < 10um [air, urban air close to ground]: 7.14e-5 kg; lognormal variance with pedigree 0.2606, pedigree (2,5,5,5,4)
  (same comment as for Acetaldehyde)
- Pentachlorophenol [air, urban air close to ground]: 1.08e-10 kg; lognormal variance with pedigree 0.1806, pedigree (2,5,5,5,4)
  (same comment as for Acetaldehyde)
- Pentane [air, urban air close to ground]: 2e-6 kg; lognormal variance with pedigree 0.1806, pedigree (2,5,5,5,4)
  (same comment as for Acetaldehyde)
- Phenol [air, urban air close to ground]: 7.69e-7 kg; lognormal variance with pedigree 0.1806, pedigree (2,5,5,5,4)
  (same comment as for Acetaldehyde)
- Phosphorus [air, urban air close to ground]: 4.16e-6 kg; lognormal variance with pedigree 0.1806, pedigree (2,5,5,5,4)
  (same comment as for Acetaldehyde)
- Polonium-210 [air, urban air close to ground]: 0.000193 kBq; lognormal variance with pedigree 0.4406, pedigree (2,5,5,5,4)
  (same comment as for Acetaldehyde)
- Potassium I [air, urban air close to ground]: 0.000314 kg; lognormal variance with pedigree 0.7806, pedigree (2,5,5,5,4)
  (same comment as for Acetaldehyde)
- Potassium-40 [air, urban air close to ground]: 2.84e-5 kBq; lognormal variance with pedigree 0.4406, pedigree (2,5,5,5,4)
  (same comment as for Acetaldehyde)
- Propane [air, urban air close to ground]: 1.59e-5 kg; lognormal variance with pedigree 0.1806, pedigree (2,5,5,5,4)
  (same comment as for Acetaldehyde)
- Propionic acid [air, urban air close to ground]: 3.34e-8 kg; lognormal variance with pedigree 0.1806, pedigree (2,5,5,5,4)
  (same comment as for Acetaldehyde)
- Propylene [air, urban air close to ground]: 7.79e-6 kg; lognormal variance with pedigree 0.1806, pedigree (2,5,5,5,4)
  (same comment as for Acetaldehyde)
- Radium-226 [air, urban air close to ground]: 2.7e-5 kBq; lognormal variance with pedigree 0.4406, pedigree (2,5,5,5,4)
  (same comment as for Acetaldehyde)
- Radium-228 [air, urban air close to ground]: 2.64e-5 kBq; lognormal variance with pedigree 0.4406, pedigree (2,5,5,5,4)
  (same comment as for Acetaldehyde)
- Radon-220 [air, urban air close to ground]: 6.35e-6 kBq; lognormal variance with pedigree 0.4406, pedigree (2,5,5,5,4)
  (same comment as for Acetaldehyde)
- Radon-222 [air, urban air close to ground]: 6.35e-6 kBq; lognormal variance with pedigree 0.4406, pedigree (2,5,5,5,4)
  (same comment as for Acetaldehyde)
- Scandium [air, urban air close to ground]: 1.23e-9 kg; lognormal variance with pedigree 0.7806, pedigree (2,5,5,5,4)
  (same comment as for Acetaldehyde)
- Selenium IV [air, urban air close to ground]: 1.32e-7 kg; lognormal variance with pedigree 0.7806, pedigree (2,5,5,5,4)
  (same comment as for Acetaldehyde)
- Silicon [air, urban air close to ground]: 0.000189 kg; lognormal variance with pedigree 0.7806, pedigree (2,5,5,5,4)
  (same comment as for Acetaldehyde)
- Sodium I [air, urban air close to ground]: 2.18e-5 kg; lognormal variance with pedigree 0.7806, pedigree (2,5,5,5,4)
  (same comment as for Acetaldehyde)
- Strontium II [air, urban air close to ground]: 4.46e-7 kg; lognormal variance with pedigree 0.7806, pedigree (2,5,5,5,4)
  (same comment as for Acetaldehyde)
- Sulfur dioxide [air, urban air close to ground]: 0.00052 kg; lognormal variance with pedigree 0.0426, pedigree (1,3,5,5,1)
  (same comment as for Water, unspecified natural origin)
- Thallium I [air, urban air close to ground]: 5.14e-10 kg; lognormal variance with pedigree 0.7806, pedigree (2,5,5,5,4)
  (same comment as for Acetaldehyde)
- Thorium [air, urban air close to ground]: 5.04e-9 kg; lognormal variance with pedigree 0.7806, pedigree (2,5,5,5,4)
  (same comment as for Acetaldehyde)
- Thorium-228 [air, urban air close to ground]: 1.25e-5 kBq; lognormal variance with pedigree 0.4406, pedigree (2,5,5,5,4)
  (same comment as for Acetaldehyde)
- Thorium-232 [air, urban air close to ground]: 7.78e-6 kBq; lognormal variance with pedigree 0.4406, pedigree (2,5,5,5,4)
  (same comment as for Acetaldehyde)
- Tin ion [air, urban air close to ground]: 3.23e-9 kg; lognormal variance with pedigree 0.7806, pedigree (2,5,5,5,4)
  (same comment as for Acetaldehyde)
- Titanium ion [air, urban air close to ground]: 4.66e-7 kg; lognormal variance with pedigree 0.7806, pedigree (2,5,5,5,4)
  (same comment as for Acetaldehyde)
- Toluene [air, urban air close to ground]: 5.92e-6 kg; lognormal variance with pedigree 0.1806, pedigree (2,5,5,5,4)
  (same comment as for Acetaldehyde)
- Uranium [air, urban air close to ground]: 8.28e-9 kg; lognormal variance with pedigree 0.7806, pedigree (2,5,5,5,4)
  (same comment as for Acetaldehyde)
- Uranium-238 [air, urban air close to ground]: 2.26e-5 kBq; lognormal variance with pedigree 0.4406, pedigree (2,5,5,5,4)
  (same comment as for Acetaldehyde)
- Vanadium V [air, urban air close to ground]: 3.24e-6 kg; lognormal variance with pedigree 0.7806, pedigree (2,5,5,5,4)
  (same comment as for Acetaldehyde)
- Water [air, unspecified]: 0.0213 m3; name water_to_air_unspecified; lognormal variance with pedigree 0.0827, pedigree (2,2,5,5,1)
  Calculated value based on literature values and expert opinion. See comments in the parametres' comment field.
  property fraction, origin: fresh water 0; name fraction_origin_fresh_water
  property fraction, origin: salt water 0; name fraction_origin_salt_water
  property fraction, origin: unspecified 1; name fraction_origin_unspecified
- Xylenes, unspecified [air, urban air close to ground]: 5.09e-6 kg; lognormal variance with pedigree 0.1806, pedigree (2,5,5,5,4)
  (same comment as for Acetaldehyde)
- Zinc II [air, urban air close to ground]: 4.05e-6 kg; lognormal variance with pedigree 0.7806, pedigree (2,5,5,5,4)
  (same comment as for Acetaldehyde)
- m-Xylene [air, urban air close to ground]: 1.6e-6 kg; lognormal variance with pedigree 0.1806, pedigree (2,5,5,5,4)
  (same comment as for Acetaldehyde)
- AOX, Adsorbable Organic Halides [water, surface water]: 9e-5 kg; lognormal variance with pedigree 0.0826, pedigree (1,3,5,5,1)
  (same comment as for Water, unspecified natural origin)
- BOD5, Biological Oxygen Demand [water, surface water]: 0.00114 kg; lognormal variance with pedigree 0.0826, pedigree (1,3,5,5,1)
  (same comment as for Water, unspecified natural origin)
- COD, Chemical Oxygen Demand [water, surface water]: 0.0169 kg; lognormal variance with pedigree 0.0826, pedigree (1,3,5,5,1)
  (same comment as for Water, unspecified natural origin)
- DOC, Dissolved Organic Carbon [water, surface water]: 0.00625926 kg; lognormal variance with pedigree 0.0826, pedigree (1,3,5,5,1)
  Calculated as equal to TOC.
  Uncertainty: average from finnish database and several companies
- Nitrogen [water, surface water]: 0.00015 kg; lognormal variance with pedigree 0.0826, pedigree (1,3,5,5,1)
  (same comment as for Water, unspecified natural origin)
- Phosphorus [water, surface water]: 1e-5 kg; lognormal variance with pedigree 0.0826, pedigree (1,3,5,5,1)
  (same comment as for Water, unspecified natural origin)
- Suspended solids, unspecified [water, surface water]: 0.00115 kg; lognormal variance with pedigree 0.0826, pedigree (1,3,5,5,1)
  (same comment as for Water, unspecified natural origin)
- TOC, Total Organic Carbon [water, surface water]: 0.00625926 kg; lognormal variance with pedigree 0.0826, pedigree (1,3,5,5,1)
  Calculated by default as TOC (gC) = COD/2.7 (COD measured in g O2). Should more correctly be calculated from the carbon content of the specified emissions to water.
  Uncertainty: average from finnish database and several companies
- Water [water, unspecified]: 0.0637 m3; name water_to_water_unspecified; lognormal variance with pedigree 0.0827, pedigree (2,2,5,5,1)
  (same comment as for Water)
  property carbon content, fossil 0; name C_content_fossil
  property carbon content, non-fossil 0; name C_content_non_fossil
  property dry mass 0 kg; name DM
  property fraction, origin: fresh water 0; name fraction_origin_fresh_water_Ww
  property fraction, origin: salt water 0; name fraction_origin_salt_water_Ww
  property fraction, origin: unspecified 1; name fraction_origin_unspecified_Ww
  property water in wet mass 1000 kg; name WWM
  property wet mass 1000 kg; name WM

## Sampling procedure
Based on literature and statistics (see dataset field “Published Source”)

## Extrapolations
This dataset has been copied from an original dataset covering the geography RER. The uncertainty has been adjusted accordingly.

## Review by Hans-Jörg Althaus 2003-08-26
passed
