# heat production, heavy fuel oil, at industrial furnace 1MW

Dataset: EcoSpold 2, unit process
Geography: CH
Time period: 1991-01-01 to 2023-12-31
Technology level: current
Classification: EcoSpold01Categories: oil/heating systems
Classification: ISIC rev.4 ecoinvent: 3530:Steam and air conditioning supply
Synonyms: Schweröl; HFO
Tags: ConvertedDataset
Scenario: Business-as-Usual
System model: Allocation, cut-off by classification
Generated by: Niels Jungbluth
Published in: Jungbluth, N. 2007
Database: ecoinvent
isCopyrightProtected: true
accessRestrictedTo: 1

## General comment
Inventory for the operation of an oil boiler, data related to fuel input.
[This dataset was already contained in the ecoinvent database version 2. It was not individually updated during the transfer to ecoinvent version 3. Life Cycle Impact Assessment results may still have changed, as they are affected by changes in the supply chain, i.e. in other datasets. This dataset was generated following the ecoinvent quality guidelines for version 2. It may have been subject to central changes described in the ecoinvent version 3 change report (http://www.ecoinvent.org/database/ecoinvent-version-3/reports-of-changes/), and the results of the central updates were reviewed extensively. The changes added e.g. consistent water flows and other information throughout the database. The documentation of this dataset can be found in the ecoinvent reports of version 2, which are still available via the ecoinvent website. The change report linked above covers all central changes that were made during the conversion process.]

## Included activities end
Direct air emissions from combustion, including infrastructure, fuel consumption, waste and auxiliary electricity use.

## Geography
Assumption for operation in Switzerland.

## Technology
Average non-modulating, non-condensing furnace used in 2000.

## Time period
New data for regulated emissions like NOx, particles, other figures are partly based on older literature data.

## Parameters
- scaling factor: 1.05263 dimensionless; name scaling_factor

## Reference product
- heat, district or industrial, other than natural gas: 1 MJ; = 0.95 * scaling_factor; By-product classification allocatable product; CPC 17300: Steam and hot water
  Amount was scaled to 1.
  production volume 1 MJ
    Literature value. According to BFE 2012, no district heat is produced with heavy fuel oil. A production volume of 1MJ is nevertheless inserted in order to keep the dataset in the database.
  property price 0.0106 EUR2005
    Average European district heat price from Ecoheatcool and Euroheat 2005-2006, Ecoheat Work package 1: The European heat market. Final report. 10.6 EUR/GJ i s the price of district heat. http://www.solarthermalworld.org/files/Ecoheatcool%20WP1%20Web.pdf?download
  properties: Corresponding fuel use 1.05263 MJ, carbon allocation 0 kg, carbon content 0, heating value, net 1 MJ

## Inputs from technosphere
- chimney: 3.65495e-8 m; = 3.4722E-08 * scaling_factor; lognormal variance with pedigree 0.3526, pedigree (3,3,5,1,1)
  Calculated
  Amount was scaled to the amount of reference product.
  This exchange has an activity link directly to the producing activity because the product is primarily consumed in the same geographical area where it is produced.
- electricity, low voltage: 0.000875168 kWh; = 0.00083141 * scaling_factor; lognormal variance with pedigree 0.0426, pedigree (3,3,5,1,1)
  Literature
  Amount was scaled to the amount of reference product.
  Literature
  Amount was scaled to the amount of reference product.
- heavy fuel oil: 0.0259263 kg; = 0.02463 * scaling_factor; lognormal variance with pedigree 0.0412, pedigree (2,3,5,1,1)
  (same comment as for electricity, low voltage)
  properties: carbon content, fossil 0.849, dry mass 1 kg, heating value, net 41.2 MJ, wet mass 1 kg
- industrial furnace, 1MW, oil: 2.924e-9 unit; = 2.7778E-09 * scaling_factor; lognormal variance with pedigree 0.3526, pedigree (3,3,5,1,1)
  Estimation 5000h use per year
  Amount was scaled to the amount of reference product.
  Estimation 5000h use per year
  Amount was scaled to the amount of reference product.
- oil storage, 3000l: 3.89863e-8 unit; = 3.7037E-08 * scaling_factor; lognormal variance with pedigree 0.3526, pedigree (3,3,5,1,1)
  (same comment as for chimney)

## Emissions to nature
- Acetaldehyde [air, urban air close to ground]: 1.57895e-7 kg; = 1.5E-07 * scaling_factor; lognormal variance with pedigree 0.8526, pedigree (3,3,5,1,1)
  Literature, basic uncertainty estimated = 6
  Amount was scaled to the amount of reference product.
- Acetic acid [air, urban air close to ground]: 6.31579e-7 kg; = 6E-07 * scaling_factor; lognormal variance with pedigree 0.8526, pedigree (3,3,5,1,1)
  (same comment as for Acetaldehyde)
- Acetone [air, urban air close to ground]: 1.57895e-7 kg; = 1.5E-07 * scaling_factor; lognormal variance with pedigree 0.8526, pedigree (3,3,5,1,1)
  (same comment as for Acetaldehyde)
- Ammonia [air, urban air close to ground]: 1.05263e-8 kg; = 1E-08 * scaling_factor; lognormal variance with pedigree 0.5, pedigree (1,1,5,1,1)
  Literature, calculation from ranges
  Amount was scaled to the amount of reference product.
- Arsenic ion [air, urban air close to ground]: 1.36842e-8 kg; = 1.3E-08 * scaling_factor; lognormal variance with pedigree 0.6926, pedigree (3,3,5,1,1)
  Literature
  Amount was scaled to the amount of reference product.
- Benzo(a)pyrene [air, urban air close to ground]: 2.94737e-11 kg; = 2.8E-11 * scaling_factor; lognormal variance with pedigree 0.8526, pedigree (3,3,5,1,1)
  (same comment as for Acetaldehyde)
- Calcium II [air, urban air close to ground]: 1.15789e-7 kg; = 1.1E-07 * scaling_factor; lognormal variance with pedigree 0.0926, pedigree (3,3,5,1,1)
  Literature
  Amount was scaled to the amount of reference product.
- Carbon dioxide, fossil [air, urban air close to ground]: 0.0831579 kg; = 0.079 * scaling_factor; lognormal variance with pedigree 0.0426, pedigree (3,3,5,1,1)
  Literature
  Amount was scaled to the amount of reference product.
- Carbon monoxide, fossil [air, urban air close to ground]: 7.36842e-6 kg; = 7E-06 * scaling_factor; lognormal variance with pedigree 0.2, pedigree (1,1,5,1,1)
  Calculation from ranges
  Amount was scaled to the amount of reference product.
- Chromium III [air, urban air close to ground]: 5.21053e-9 kg; = 4.95E-09 * scaling_factor; lognormal variance with pedigree 0.6926, pedigree (3,3,5,1,1)
  Literature
  Amount was scaled to the amount of reference product.
- Chromium VI [air, urban air close to ground]: 5.26316e-11 kg; = 5E-11 * scaling_factor; lognormal variance with pedigree 1.3726, pedigree (3,3,5,1,1)
  Literature, estimation 1% Cr VI of Cr, basic uncertainity estimated = 10
  Amount was scaled to the amount of reference product.
- Cobalt II [air, urban air close to ground]: 3.47368e-8 kg; = 3.3E-08 * scaling_factor; lognormal variance with pedigree 0.6926, pedigree (3,3,5,1,1)
  Literature
  Amount was scaled to the amount of reference product.
- Copper ion [air, urban air close to ground]: 1.68421e-8 kg; = 1.6E-08 * scaling_factor; lognormal variance with pedigree 0.6926, pedigree (3,3,5,1,1)
  Literature
  Amount was scaled to the amount of reference product.
- Dinitrogen monoxide [air, urban air close to ground]: 8.42105e-7 kg; = 8E-07 * scaling_factor; lognormal variance with pedigree 0.57, pedigree (1,1,5,1,1)
  Calculation from ranges
  Amount was scaled to the amount of reference product.
- Dioxins, measured as 2,3,7,8-tetrachlorodibenzo-p-dioxin [air, urban air close to ground]: 4.73684e-16 kg; = 4.5E-16 * scaling_factor; lognormal variance with pedigree 0.3526, pedigree (3,3,5,1,1)
  Literature
  Amount was scaled to the amount of reference product.
- Ethanol [air, urban air close to ground]: 3.15789e-7 kg; = 3E-07 * scaling_factor; lognormal variance with pedigree 0.8526, pedigree (3,3,5,1,1)
  (same comment as for Acetaldehyde)
- Formaldehyde [air, urban air close to ground]: 4.73684e-7 kg; = 4.5E-07 * scaling_factor; lognormal variance with pedigree 0.8526, pedigree (3,3,5,1,1)
  (same comment as for Acetaldehyde)
- Hydrocarbons, aliphatic, alkanes, unspecified [air, urban air close to ground]: 6.31579e-7 kg; = 6E-07 * scaling_factor; lognormal variance with pedigree 0.8526, pedigree (3,3,5,1,1)
  (same comment as for Acetaldehyde)
- Hydrocarbons, aliphatic, unsaturated [air, urban air close to ground]: 3.15789e-8 kg; = 3E-08 * scaling_factor; lognormal variance with pedigree 0.8526, pedigree (3,3,5,1,1)
  (same comment as for Acetaldehyde)
- Hydrocarbons, aromatic [air, urban air close to ground]: 1.57895e-7 kg; = 1.5E-07 * scaling_factor; lognormal variance with pedigree 0.8526, pedigree (3,3,5,1,1)
  (same comment as for Acetaldehyde)
- Hydrochloric acid [air, urban air close to ground]: 1.51579e-6 kg; = 1.44E-06 * scaling_factor; lognormal variance with pedigree 0.0926, pedigree (3,3,5,1,1)
  Literature
  Amount was scaled to the amount of reference product.
- Hydrogen fluoride [air, urban air close to ground]: 5.05263e-8 kg; = 4.8E-08 * scaling_factor; lognormal variance with pedigree 0.0926, pedigree (3,3,5,1,1)
  Literature
  Amount was scaled to the amount of reference product.
- Iron ion [air, urban air close to ground]: 8.63158e-7 kg; = 8.2E-07 * scaling_factor; lognormal variance with pedigree 0.6926, pedigree (3,3,5,1,1)
  Literature
  Amount was scaled to the amount of reference product.
- Lead II [air, urban air close to ground]: 1.52632e-7 kg; = 1.45E-07 * scaling_factor; lognormal variance with pedigree 0.6926, pedigree (3,3,5,1,1)
  Literature
  Amount was scaled to the amount of reference product.
- Mercury II [air, urban air close to ground]: 1.57895e-10 kg; = 1.5E-10 * scaling_factor; lognormal variance with pedigree 0.6926, pedigree (3,3,5,1,1)
  Literature
  Amount was scaled to the amount of reference product.
- Methane, fossil [air, urban air close to ground]: 3.15789e-6 kg; = 3E-06 * scaling_factor; lognormal variance with pedigree 0.8526, pedigree (3,3,5,1,1)
  (same comment as for Acetaldehyde)
- Methanol [air, urban air close to ground]: 5.36842e-7 kg; = 5.1E-07 * scaling_factor; lognormal variance with pedigree 0.0926, pedigree (3,3,5,1,1)
  Literature
  Amount was scaled to the amount of reference product.
- Molybdenum VI [air, urban air close to ground]: 8.42105e-9 kg; = 8E-09 * scaling_factor; lognormal variance with pedigree 0.0426, pedigree (3,3,5,1,1)
  Literature
  Amount was scaled to the amount of reference product.
- Nickel II [air, urban air close to ground]: 5.15789e-7 kg; = 4.9E-07 * scaling_factor; lognormal variance with pedigree 0.6926, pedigree (3,3,5,1,1)
  Literature
  Amount was scaled to the amount of reference product.
- Nitrogen oxides [air, urban air close to ground]: 0.000105263 kg; = 0.0001 * scaling_factor; lognormal variance with pedigree 0.69, pedigree (1,1,5,1,1)
  Calculation from ranges
  Amount was scaled to the amount of reference product.
- PAH, polycyclic aromatic hydrocarbons [air, urban air close to ground]: 6.10526e-10 kg; = 5.8E-10 * scaling_factor; lognormal variance with pedigree 0.3526, pedigree (3,3,5,1,1)
  Literature
  Amount was scaled to the amount of reference product.
- Particulate Matter, < 2.5 um [air, urban air close to ground]: 8.84211e-6 kg; = 8.4E-06 * scaling_factor; lognormal variance with pedigree 0.3526, pedigree (3,3,5,1,1)
  Literature
  Amount was scaled to the amount of reference product.
- Particulate Matter, > 10 um [air, urban air close to ground]: 2.52632e-6 kg; = 2.4E-06 * scaling_factor; lognormal variance with pedigree 0.3526, pedigree (3,3,5,1,1)
  Literature, basic uncertainty estimated = 3
  Amount was scaled to the amount of reference product.
- Particulate Matter, > 2.5 um and < 10um [air, urban air close to ground]: 1.26316e-6 kg; = 1.2E-06 * scaling_factor; lognormal variance with pedigree 0.3526, pedigree (3,3,5,1,1)
  (same comment as for Particulate Matter, > 10 um)
- Propane [air, urban air close to ground]: 3.15789e-8 kg; = 3E-08 * scaling_factor; lognormal variance with pedigree 0.8526, pedigree (3,3,5,1,1)
  (same comment as for Acetaldehyde)
- Selenium IV [air, urban air close to ground]: 1.26316e-8 kg; = 1.2E-08 * scaling_factor; lognormal variance with pedigree 0.6926, pedigree (3,3,5,1,1)
  Literature
  Amount was scaled to the amount of reference product.
- Sodium I [air, urban air close to ground]: 7.89474e-7 kg; = 7.5E-07 * scaling_factor; lognormal variance with pedigree 0.0926, pedigree (3,3,5,1,1)
  Literature
  Amount was scaled to the amount of reference product.
- Sulfur dioxide [air, urban air close to ground]: 0.000414737 kg; = 0.000394 * scaling_factor; lognormal variance with pedigree 1.24, pedigree (1,1,5,1,1)
  Calculation from ranges
  Amount was scaled to the amount of reference product.
- Toluene [air, urban air close to ground]: 3.15789e-8 kg; = 3E-08 * scaling_factor; lognormal variance with pedigree 0.8526, pedigree (3,3,5,1,1)
  (same comment as for Acetaldehyde)
- Vanadium V [air, urban air close to ground]: 1.05263e-6 kg; = 1E-06 * scaling_factor; lognormal variance with pedigree 0.6926, pedigree (3,3,5,1,1)
  Literature
  Amount was scaled to the amount of reference product.
- Zinc II [air, urban air close to ground]: 5.78947e-8 kg; = 5.5E-08 * scaling_factor; lognormal variance with pedigree 0.6926, pedigree (3,3,5,1,1)
  Literature
  Amount was scaled to the amount of reference product.

## Sampling procedure
Data published in literature based on measurements.

## Extrapolations
Some information from other European countries has been used to determine the emission factors.

## Review by Michael Spielmann (obsolete) 2006-02-16
passed
none
