# wax production, for lost-wax metal casting

Dataset: EcoSpold 2, unit process
Geography: GLO
Time period: 2013-01-01 to 2023-12-31
Technology level: current
Classification: ISIC rev.4 ecoinvent: 1920:Manufacture of refined petroleum products
Classification: EcoSpold01Categories: chemicals/organics
Scenario: Business-as-Usual
System model: Allocation, cut-off by classification
Generated by: Marylène Dussault
Database: ecoinvent
isCopyrightProtected: true
accessRestrictedTo: 1

## General comment
This dataset represents the production of wax for lost-wax casting (or investment casting).
Wax used in this type of casting is a mixture of different types of wax (both petroleum wax and natural), resins (both from synthetic and natural origin) and organic fillers. The composition of the wax vary from facility to facility. The wax pattern produced defines de quality of the final casting. This dataset is a copy of the ecoinvent v3.0 dataset "paraffin production, GLO 1995" used as proxy. Uncertainties have been adjusted accordinly.

## Included activities end
"This module contains material and energy input, production of waste and emissions for the production of n-paraffins out of crude oil. Water consumption and infrastructure have been estimated." as cited in original dataset.

## Geography
"Data based on the European paraffin production" as cited in original dataset.

## Technology
"Average technology, typical for European production conditions in the mid 90s" as cited in original dataset.

## Time period
"data of published literature" as cited in original dataset.

## Parameters
- wax, used: 0 kg; name wax

## Reference product
- wax, lost-wax casting: 1 kg; name RefProd; By-product classification allocatable product; CPC 33500: Petroleum jelly; paraffin wax, micro- crystalline petroleum wax, slack wax, ozokerite, lignite wax, peat wax, […]; HS2017 271290: Paraffin wax; containing by weight 0.75% or more of oil, obtained by synthesis or by other processes, wheth[...]
  production volume 4 kg; name ProdVol
    This is a placeholder value that does not reflect real-world production volumes. This dataset does not currently require a real-world production volume to work in the database framework, and no actual data were collected yet. This has no negative effect on the results of the ecoinvent database.
  property price 1.75 EUR2005
    Calculated based on literature value (UN Commodity Trade Statistics Database) using data on trade value and net weight (kg) for 5 reference countries/regions (EU-27, USA, JP, CN and IN) which weighted (by net weight) average is assumed to be a good approximation of the global price. The UN classification; 30404 Artificial waxes and prepared waxes (accessed 20140506). Data for the year 2005.
  properties: carbon allocation 0 kg, carbon content 0, heating value, net 25.76 MJ

## Inputs from technosphere
- chemical factory, organics: 4e-10 unit; lognormal variance with pedigree 0.6, pedigree (5,5,5,5,5)
  EcoSpold01Location=RER
  Estimated from a large chem. plant
  Uncertainty: No data available, the uncertainty has been maximized.
- electricity, medium voltage: 0.0258 kWh; lognormal variance with pedigree 0.23, pedigree (5,5,5,5,5)
  Estimation, based on ECOSOL data
  EcoSpold01Location=UCTE
  Uncertainty: No data available, the uncertainty has been maximized.
- heat, district or industrial, natural gas: 2.77 MJ; lognormal variance with pedigree 0.23, pedigree (5,5,5,5,5)
  EcoSpold01Location=RER
  Estimation, based on ECOSOL data
  Uncertainty: No data available, the uncertainty has been maximized.
  properties: heating value, net 1 MJ
- heat, district or industrial, other than natural gas: 2.027 MJ; lognormal variance with pedigree 0.23, pedigree (5,5,5,5,5)
  (same comment as for heat, district or industrial, natural gas)
  properties: heating value, net 1 MJ
- municipal solid waste: -0.000162676, -8.35364e-6, -9.91958e-7, -6.30262e-6, -6.1737e-6, -0.00471312, -6.94133e-7, -2.22804e-7, -5.03599e-7, -2.0965e-5 kg (10 suppliers, which the file names only by identifier); sum of these -0.00492 kg; lognormal variance with pedigree 0.22, pedigree (5,5,5,5,5)
  Data from ECOSOL study (Literature)
  EcoSpold01Location=CH
  Uncertainty: No data available, the uncertainty has been maximized.
  production volume; = ProdVol * waste / RefProd
    Calculated from production volume of reference product using the relative outputs.
  properties: carbon content, fossil 0.171549, carbon content, non-fossil 0.261655, dry mass 0.771 kg, heating value, net 11.74 MJ, water content 0.297017, wet mass 1 kg
  note on carbon content, fossil: MSW composition in tab 4.1, ecoinvent v2.2 report 13_I. C content referred to 1 kg DM
  note on heating value, net: Value taken from the general comment of the treatment dataset.

## Inputs from nature
- Oil, crude [natural resource, in ground]: 1.08 kg; lognormal variance with pedigree 0.22, pedigree (5,5,5,5,5)
  Data from ECOSOL study (Literature)
  Uncertainty: No data available, the uncertainty has been maximized.
- Water, cooling, unspecified natural origin [natural resource, in water]: 0.024 m3; lognormal variance with pedigree 0.29, pedigree (5,5,5,5,5)
  Estimated from a large chem. plant
  Uncertainty: No data available, the uncertainty has been maximized.
- Water, unspecified natural origin [natural resource, in water]: 0.006 m3; lognormal variance with pedigree 0.29, pedigree (5,5,5,5,5)
  (same comment as for Water, cooling, unspecified natural origin)

## Emissions to nature
- Carbon dioxide, fossil [air, urban air close to ground]: 0.311 kg; lognormal variance with pedigree 0.22, pedigree (5,5,5,5,5)
  (same comment as for Oil, crude)
- Carbon monoxide, fossil [air, urban air close to ground]: 4e-5 kg; lognormal variance with pedigree 0.87, pedigree (5,5,5,5,5)
  (same comment as for Oil, crude)
- NMVOC, non-methane volatile organic compounds [air, urban air close to ground]: 0.00082 kg; lognormal variance with pedigree 0.26, pedigree (5,5,5,5,5)
  (same comment as for Oil, crude)
- Nitrogen oxides [air, urban air close to ground]: 0.00172 kg; lognormal variance with pedigree 0.26, pedigree (5,5,5,5,5)
  (same comment as for Oil, crude)
- Particulate Matter, < 2.5 um [air, urban air close to ground]: 5.25e-5 kg; lognormal variance with pedigree 0.53, pedigree (5,5,5,5,5)
  (same comment as for Oil, crude)
- Particulate Matter, > 10 um [air, urban air close to ground]: 6.72e-5 kg; lognormal variance with pedigree 0.26, pedigree (5,5,5,5,5)
  (same comment as for Oil, crude)
- Particulate Matter, > 2.5 um and < 10um [air, urban air close to ground]: 9.03e-5 kg; lognormal variance with pedigree 0.34, pedigree (5,5,5,5,5)
  (same comment as for Oil, crude)
- Sulfur dioxide [air, urban air close to ground]: 0.00158 kg; lognormal variance with pedigree 0.22, pedigree (5,5,5,5,5)
  (same comment as for Oil, crude)
- Water [air, unspecified]: 0.01053 m3; lognormal variance with pedigree 0.2421, pedigree (5,2,5,5,5)
  Calculated value based on literature values and expert opinion. See comments in the parametres' comment field.
  Uncertainty: No data available, the uncertainty has been maximized.
- Aluminium III [water, surface water]: 7.71e-8 kg; lognormal variance with pedigree 0.87, pedigree (5,5,5,5,5)
  (same comment as for Oil, crude)
- Ammonium [water, surface water]: 2.23e-6 kg; lognormal variance with pedigree 0.26, pedigree (5,5,5,5,5)
  (same comment as for Oil, crude)
- BOD5, Biological Oxygen Demand [water, surface water]: 2e-5 kg; lognormal variance with pedigree 0.26, pedigree (5,5,5,5,5)
  (same comment as for Oil, crude)
- COD, Chemical Oxygen Demand [water, surface water]: 8.4e-5 kg; lognormal variance with pedigree 0.26, pedigree (5,5,5,5,5)
  (same comment as for Oil, crude)
- Chromium III [water, surface water]: 2.32e-7 kg; lognormal variance with pedigree 0.87, pedigree (5,5,5,5,5)
  (same comment as for Oil, crude)
- DOC, Dissolved Organic Carbon [water, surface water]: 3.11111e-5 kg; lognormal variance with pedigree 0.26, pedigree (5,5,5,5,5)
  Calculated as equal to TOC.
  Uncertainty: No data available, the uncertainty has been maximized.
- Fluoride [water, surface water]: 5.42e-7 kg; lognormal variance with pedigree 0.26, pedigree (5,5,5,5,5)
  (same comment as for Oil, crude)
- Iron ion [water, surface water]: 3.86e-7 kg; lognormal variance with pedigree 0.87, pedigree (5,5,5,5,5)
  (same comment as for Oil, crude)
- Nickel II [water, surface water]: 2.32e-7 kg; lognormal variance with pedigree 0.87, pedigree (5,5,5,5,5)
  (same comment as for Oil, crude)
- Oils, unspecified [water, surface water]: 1.4e-6 kg; lognormal variance with pedigree 0.53, pedigree (5,5,5,5,5)
  (same comment as for Oil, crude)
- Phenol [water, surface water]: 1.65e-7 kg; lognormal variance with pedigree 0.26, pedigree (5,5,5,5,5)
  (same comment as for Oil, crude)
- Phosphate [water, surface water]: 1.61e-6 kg; lognormal variance with pedigree 0.26, pedigree (5,5,5,5,5)
  (same comment as for Oil, crude)
- Sulfide [water, surface water]: 7.71e-8 kg; lognormal variance with pedigree 0.26, pedigree (5,5,5,5,5)
  (same comment as for Oil, crude)
- Suspended solids, unspecified [water, surface water]: 9.7e-6 kg; lognormal variance with pedigree 0.26, pedigree (5,5,5,5,5)
  (same comment as for Oil, crude)
- TOC, Total Organic Carbon [water, surface water]: 3.11111e-5 kg; lognormal variance with pedigree 0.26, pedigree (5,5,5,5,5)
  Calculated by default as TOC (gC) = COD/2.7 (COD measured in g O2). Should more correctly be calculated from the carbon content of the specified emissions to water.
  Uncertainty: No data available, the uncertainty has been maximized.
- Water [water, unspecified]: 0.01947 m3; lognormal variance with pedigree 0.25, pedigree (5,5,5,5,5)
  (same comment as for Water)
  property carbon content, fossil 0; name C_content_fossil
  property carbon content, non-fossil 0; name C_content_non_fossil
  property dry mass 0 kg; name DM
  property water in wet mass 1000 kg; name WWM
  property wet mass 1000 kg; name WM
- Zinc II [water, surface water]: 7.71e-8 kg; lognormal variance with pedigree 0.87, pedigree (5,5,5,5,5)
  (same comment as for Oil, crude)

## Extrapolations
"data out of ECOSOL study of European Surfactant Industry. Common translation rules used, reported in Chemical report (Althaus et al. 2003). This dataset has been copied from an original dataset covering the geography RER. The uncertainty has been adjusted accordingly." as cited in the original dataset.
