# lime, from liquid packaging board production to generic market for soil pH raising agent

Dataset: EcoSpold 2, unit process
Geography: GLO
Time period: 2022-01-01 to 2023-12-31
Technology level: current
Classification: ISIC rev.4 ecoinvent: 2012:Manufacture of fertilizers and nitrogen compounds
Scenario: Business-as-Usual
System model: Allocation, cut-off by classification
Generated by: Nora Minas
Database: ecoinvent
isCopyrightProtected: true
accessRestrictedTo: 1

## General comment
This is a renaming activity. Its purpose is to link 'lime, from liquid packaging board production' to the 'generic market for soil pH raising agent'. All products that enter this generic market provide the function of pH soil raising agent.

## Included activities start
Activity starts with the reception of 'lime, from liquid packaging board production'.

## Included activities end
Activity ends with the 'soil pH raising agent, as CaCO3' being ready for transportation.

## Reference product
- soil pH raising agent, as CaCO3: 1 kg; name soil_pH_raising_agent_as_CaCO3; By-product classification allocatable product; CPC 34659: Fertilizers n.e.c.; HS2017 283650: Carbonates; calcium carbonate
  production volume 9.0864e7 kg
    It is considered that all lime produced from “liquid packaging board production” goes to the generic market
  property carbon content, fossil 0.12; name soil_pH_raising_agent_C_content_fossil_0
    Stoichiometric calculation.
  property carbon content, non-fossil 0; name soil_pH_raising_a_C_content_non_fossil_0
  property dry mass 1 kg; name soil_pH_raising_agent_as_CaCO3_DM
  property water content 0; name soil_pH_raising_agent_as_water_content_0
  property water in wet mass 0 kg; name soil_pH_raising_agent_as_CaCO3_WWM
  property wet mass 1 kg; name soil_pH_raising_agent_as_CaCO3_WM
  properties: carbon allocation 0.12 kg, carbon content 0.12, price 0.117 EUR2005

## Inputs from technosphere
- lime, from liquid packaging board production: 1 kg
  properties: carbon content, fossil 0.120005, dry mass 1 kg, wet mass 1 kg
