# electricity voltage transformation from medium to low voltage

Dataset: EcoSpold 2, unit process
Geography: CA-QC
Time period: 2021-01-01 to 2023-12-31
Technology level: current
Classification: ISIC rev.4 ecoinvent: 3510:Electric power generation, transmission and distribution
Tags: Canada
Scenario: Business-as-Usual
System model: Allocation, cut-off by classification
Generated by: Pablo Tirado
Published in: Itten R. 2012
Database: ecoinvent
isCopyrightProtected: true
accessRestrictedTo: 1

## General comment
This dataset represents the transformation of electricity voltage from medium to low voltage. The losses are based on electricity generation and trade statistics: IEA World Energy Statistics and Balances, ISSN: 16834240, https://doi.org/10.1787/enestats-data-en Definition of the voltage levels: - High voltage level above 24 kV (large scale industry) - Medium voltage level between 1 kV and 24 kV (medium to small scale industry, service sector and public buildings) - Low voltage level below 1 kV (Households)

## Included activities start
This activity starts with the medium voltage electricity arriving at the transformer station.

## Included activities end
This activity ends with 1kWh of medium voltage electricity transformed to low voltage. This dataset includes the losses during voltage transformation. It doesn't include the transformer station itself as this is included in the dataset for the transmission network.

## Technology
Transformers are essential components of the electricity grid. They connect the different voltage levels.
Big power plants feed the electricity at a very high voltage to the electricity grid. Transformers between 600 MVA and 80 MVA can be found in substations, where the high transmission voltage is transformed to the medium distribution voltage. In an additional step the medium voltage is transformed to low voltage using transformers below 2.5 MVA. The small transformers below 2.5 MVA are allocated to the low voltage level, whereas all the other transformers are allocated to the medium voltage level.

## Parameters
- electricity transformation losses: 0.0241875 dimensionless; name electricity_transformation_losses; = electricity_losses_total*0.645*0.5; lognormal variance with pedigree 0.006, pedigree (1,1,1,1,1)
  Measured/Estimated value. Losses of electricity during transmission and transformation in the high voltage grid. 2005 data: LV MV HV TOTAL Consumed Electricity (GWh) 89 423 18 386 62 632 170 440 Losses (GWh) 8 280 1 246 3 257 12 783 Losses per voltage % 9,3% 6,8% 5,2% 7,5% % of total losses 64,8% 9,7% 25,5% (The consumed energy includes the losses) Source: http://www.regie-energie.qc.ca/audiences/3541-04/RepHqdDDR/HQD-14_doc09_3541_01nov04.pdf It is estimated that the losses are split between transformation and transmission according to the split from Swiss datasets: High voltage: 100% is allocated to the market (as it contains transformation and transmission) Medium voltage: 38.5% of losses at this voltage are allocated to transmission and 61.5% to transformation Low voltage: 50% of losses at this voltage are allocated to transformation and 50% to transmission Losses of electricity during transfrormation
  Uncertainty: T
- net electricity production in 2008: 2.1626e11 kWh; name net_electricity_2014; lognormal variance with pedigree 0.0006, pedigree (1,1,1,1,1)
  Measured value. Sum of produced and imported energy in 2014 in Quebec. This amount is used to calculate the transformation losses from high to medium voltage by multiplying it by the percentage of total losses of the network occurring at the transformation from high to medium voltage. Electricity imports and productions in 2014 kWh high voltage, hydro, reservoir, import from CA-NF 2,76E+10 high voltage, import from CA-NB 1.24E+08 high voltage, import from CA-ON 1.66E+09 high voltage, import from NPCC, US only 4.55E+08 high voltage, import from CA-MB 2.51E+07 high voltage, import from CA-NS 1.21E+06 hydro, reservoir, non-alpine region 1,11E+11 hydro, run-of-river 6,71E+10 Wind power 6.65E+09 Biomass and waste 1.72E+09
- total electricity losses within the country: 0.075 dimensionless; name electricity_losses_total; lognormal variance with pedigree 0.0006, pedigree (1,1,1,1,1)
  Measured value. Losses of electricity during transmission and transformation in the high voltage grid. LV MV HV TOTAL Consumed Electricity (GWh) 89 423 18 386 62 632 170 440 Losses (GWh) 8 280 1 246 3 257 12 783 Losses per voltage % 9,3% 6,8% 5,2% 7,5% % of total losses 64,8% 9,7% 25,5% Source: http://www.regie-energie.qc.ca/audiences/3541-04/RepHqdDDR/HQD-14_doc09_3541_01nov04.pdf Total losses of electricity from the net electricity fed into the grid until arriving at the end user (transmission and transformation losses).

## Reference product
- electricity, low voltage: 1 kWh; By-product classification allocatable product; CPC 17100: Electrical energy; HS2017 271600: Electrical energy
  production volume 1.14669e11 kWh
    For structural reasons of the ecoinvent database the annual import volume is set to zero in this dataset.
  property price 0.107 EUR2005
    Temporary price data. Calculated as 90% of purchasers price based on: IEA Key world energy statistics 2004 (www.iea.org/textbase/nppdf/free/2004/keyworld2004.pdf)
  properties: carbon allocation 0 kg, carbon content 0

## Inputs from technosphere
- electricity, medium voltage: 1.02419 kWh; = electricity_transformation_losses
  Measured/Estimated value. Losses of electricity during transmission and transformation in the high voltage grid. 2005 data: LV MV HV TOTAL Consumed Electricity (GWh) 89 423 18 386 62 632 170 440 Losses (GWh) 8 280 1 246 3 257 12 783 Losses per voltage % 9,3% 6,8% 5,2% 7,5% % of total losses 64,8% 9,7% 25,5% (The consumed energy includes the losses) Source: http://www.regie-energie.qc.ca/audiences/3541-04/RepHqdDDR/HQD-14_doc09_3541_01nov04.pdf It is estimated that the losses are split between transformation and transmission according to the split from Swiss datasets: High voltage: 100% is allocated to the market (as it contains transformation and transmission) Medium voltage: 38.5% of losses at this voltage are allocated to transmission and 61.5% to transformation Low voltage: 50% of losses at this voltage are allocated to transformation and 50% to transmission Losses of electricity during transfrormation
