# iron pellet production

Dataset: EcoSpold 2, unit process
Geography: RoW
Time period: 1999-01-01 to 2023-12-31
Technology level: current
Classification: EcoSpold01Categories: metals/extraction
Classification: ISIC rev.4 ecoinvent: 2410:Manufacture of basic iron and steel
Scenario: Business-as-Usual
System model: Allocation, cut-off by classification
Generated by: Hans-Jörg Althaus
Published in: Classen M. 2009
Database: ecoinvent
isCopyrightProtected: true
accessRestrictedTo: 1

## General comment
Inputs and air emissions from different sources. This dataset covers different situations in the world. As mentionned in the Geography Comment, some inputs and emissions relate to Quebec data.
No transport of iron ore because pellets are fabricated at mine, except for the Quebec situation where the pellets are not fabricated at the mine.
[This dataset was already contained in the ecoinvent database version 2. It was not individually updated during the transfer to ecoinvent version 3. Life Cycle Impact Assessment results may still have changed, as they are affected by changes in the supply chain, i.e. in other datasets. This dataset was generated following the ecoinvent quality guidelines for version 2. It may have been subject to central changes described in the ecoinvent version 3 change report (http://www.ecoinvent.org/database/ecoinvent-version-3/reports-of-changes/), and the results of the central updates were reviewed extensively. The changes added e.g. consistent water flows and other information throughout the database. The documentation of this dataset can be found in the ecoinvent reports of version 2, which are still available via the ecoinvent website. The change report linked above covers all central changes that were made during the conversion process.]

## Included activities start
The activity starts with the reception of the iron ore.

## Included activities end
Blending, mixing and sintering. Emissions are abated.

## Geography
Inputs relate to the global average. Emissions relate to European plants. Some inputs and emissions relate to Quebec data.

## Technology
Strate grate and grate kiln process

## Parameters
- annual production Quebec: 1.01e10 kg; name annualProductionPelletsQuebec; lognormal variance with pedigree 0.0026, pedigree (3,1,1,1,1)
  Québec's annual production volume.
- fraction, process water, to air: 0.15 dimensionless; name fraction_PW_to_air; lognormal variance with pedigree 0.092025, pedigree (4,4,3,2,4)
  Literature value. In case when no industry/process specific data are available, default evaporation fraction value is used. This value is 15% and is based on literature (Statistics Canada, 2007 & Shaffer, K.H., 2008, Consumptive water use in the Great Lakes Basin, USGS & Shiklomanov, 2003, World Water Resources at the Beginning of the 21st Century) and has been approved by an expert.

## Reference product
- iron pellet: 1 kg; name prod_ironPellet_kg; By-product classification allocatable product; CPC 41116: Ferrous products obtained by direct reduction of iron ore and other spongy ferrous products, in lumps, pellets[…]; HS2017 720310: Ferrous products; obtained by direct reduction of iron ore, in lumps, pellets or similar forms; CAS 65996-65-8
  EcoSpold01Location=GLO
  production volume 4.73333e11 kg; name annualProductionPelletsGLO
    Calculated as the sum of use of this product in other ecoinvent datasets (pig iron and sponge iron).
  property carbon content, fossil 0
    In pellets, the ore particles are connected chiefly by bridges of ore. The formation of iron oxide bridges is supported by additional slag bridges. Pellets are thoroughly oxidised (a maximum of 0.5 % (w/w) FeO) (ecoinvent v2.2 report 10_partII)
  property carbon content, non-fossil 0
    (same comment as for iron pellet)
  property price 0.0723712 EUR2005
    Calculated based on inputs: The price of the product has been calculated as a sum of the values of the material and energy inputs for this product. This value is therefore a rough estimation. It may underestimate the real price since there are additional expenses when producing any product. These expences can include for example labour costs, treatment of waste materials and profit for the producer. Please consider carefully whether this level of data quality is acceptable for your application.
  properties: carbon allocation 0 kg, carbon content 0, dry mass 1 kg, water content 0, water in wet mass 0 kg, wet mass 1 kg

## Inputs from technosphere
- activated bentonite: 0.04 kg; lognormal variance with pedigree 0.0402, pedigree (1,2,5,3,1)
  EcoSpold01Location=DE
  properties: dry mass 1 kg, wet mass 1 kg
- aluminium oxide factory: 2.5e-11 unit; lognormal variance with pedigree 0.8, pedigree (5,5,5,5,5)
  Rough estimation
  EcoSpold01Location=RER
  Uncertainty: rough estimation
- bentonite: 8.1154e-5 kg; = 0.004442*annualProductionPelletsQuebec/annualProductionPelletsGLO; lognormal variance with pedigree 0.0407, pedigree (1,2,5,1,1)
  Estimation. Adapted from dataset ''iron pellet production, Quebec, 2011''.
  properties: dry mass 1 kg, wet mass 1 kg
- chromium: 3.34336e-6 kg; = (grindingBalls_input*grindingBalls_chromiumFraction)*annualProductionPelletsQuebec/annualProductionPelletsGLO; lognormal variance with pedigree 0.04, pedigree (1,1,5,1,1)
  Estimation. Adapted from dataset ''iron pellet production, Quebec, 2011''.
  Uncertainty: Calculated variable. Uncertainty will be determined from propagation of uncertainty factors of underlying variables.
  properties: dry mass 1 kg, wet mass 1 kg
- dolomite: 0.000449663, 0.000238192 kg (2 suppliers, which the file names only by identifier); sum of these 0.000687854 kg; = 0.03765*annualProductionPelletsQuebec/annualProductionPelletsGLO; lognormal variance with pedigree 0.0427, pedigree (1,2,5,5,1)
  Estimation. Adapted from dataset ''iron pellet production, Quebec, 2011''.
  properties: carbon content, fossil 0.130435, dry mass 1 kg, heating value, net 3.95 MJ, wet mass 1 kg
- electricity, high voltage: 3.51798e-6, 0.000224308, 3.51617e-7, 2.33378e-6, 4.40092e-5, 8.18258e-7, 0.000458964, 1.19697e-5, 1.26149e-5, 5.21274e-6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 kWh (48 suppliers, which the file names only by identifier); sum of these 0.0012818 kWh; = 0.07016*annualProductionPelletsQuebec/annualProductionPelletsGLO; lognormal variance with pedigree 0.0427, pedigree (1,2,5,5,1)
  Estimation. Adapted from dataset ''iron pellet production, Quebec, 2011''.
- electricity, medium voltage: 2.2959e-5, 2.04201e-6, 0.000178041, 0.000233306, 0.000247072, 0.000125846, 1.73813e-5, 0.000110011, 4.64383e-6, 0.0007435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 kWh (48 suppliers, which the file names only by identifier); sum of these 0.025 kWh; lognormal variance with pedigree 0.0402, pedigree (1,2,5,3,1)
  EcoSpold01Location=UCTE
- hard coal: 0.000972282, 0.000230715, 0.000757006, 0.00688107, 0.000992191, 0.00214426, 0.00042194, 0.000600535 kg (8 suppliers, which the file names only by identifier); sum of these 0.013 kg; lognormal variance with pedigree 0.0402, pedigree (1,2,5,3,1)
  EcoSpold01Location=UCTE
  properties: carbon content, fossil 0.845, dry mass 0.94 kg, heating value, net 27.91 MJ, water content 0.0638298, wet mass 1 kg
  note on carbon content, fossil: C content 75-94% (specified in Tab 1.1, report 6, part VI). A mean content of 0.845 kg C/ kg dry hard coal was considered
  note on heating value, net: Based on the Characterization factor of Hard coal in the CED method
- heat, district or industrial, natural gas: 0.0176821, 0.0478394 MJ (2 suppliers, which the file names only by identifier); sum of these 0.0655215 MJ; lognormal variance with pedigree 0.0402, pedigree (1,2,5,3,1)
  EcoSpold01Location=RER
  properties: heating value, net 1 MJ
- heat, district or industrial, other than natural gas: 0.00840269 MJ; = (fuel_input_coke*Net_heat_value_coke*28.6/fuel_use_coke)*annualProductionPelletsQuebec/annualProductionPelletsGLO; lognormal variance with pedigree 0.04, pedigree (1,1,5,1,1)
  (same comment as for chromium)
  property Corresponding fuel use 1.2499 MJ; name fuel_use_coke
  property fuel input in physical units, kg 0.0201 kg; name fuel_input_coke
  property heating value, net 1 MJ; name Net_heat_value_coke
  note on Corresponding fuel use: Lower heating value of the fuel input related to the heat/electricity output. Calculated from heat production, at hard coal industrial furnace, based on hard coal NHV and fuel input. fuel input: 0,04325 kg/Mj of output Hard coal NHV= 28,9 MJ/kg Corresponding fuel use= 28,9* 0,04325
  note on fuel input in physical units, kg: Estimation. Taken from dataset ''iron pellet production, Quebec, 2011''.
- heat, district or industrial, other than natural gas: 0.00463851 MJ; = (fuel_input_HFO*density_HFO*1000*Net_heat_value_HFO*41.2/fuel_use_HFO)*annualProductionPelletsQuebec/annualProductionPelletsGLO; lognormal variance with pedigree 0.04, pedigree (1,1,5,1,1)
  (same comment as for chromium)
  property Corresponding fuel use 1.133 MJ; name fuel_use_HFO
  property density 1 kg/l; name density_HFO
  property fuel input in physical units, m3 6.982e-6 m3; name fuel_input_HFO
  property heating value, net 1 MJ; name Net_heat_value_HFO
  note on Corresponding fuel use: Lower heating value of the fuel input related to the heat/electricity output Source : heat production, heavy fuel oil, at industrial furnace 1MW, GLO
  note on density: Density value. Value Taken from Table 5.1 of report "Overview and methodology, Data quality guideline for the ecoinvent database version 3" (ecoinvent report No. 1 (v3), 2011)
  note on heating value, net: Net (lower) heating (calorific) value. Value Taken from Table 5.1 of report "Overview and methodology, Data quality guideline for the ecoinvent database version 3" (ecoinvent report No. 1 (v3), 2011)
- heat, district or industrial, other than natural gas: 3.56975e-7 MJ; = (fuel_input_propane*density_propane*1000*Net_heat_value_propane*46.46/fuel_use_propane)*annualProductionPelletsQuebec/annualProductionPelletsGLO; lognormal variance with pedigree 0.04, pedigree (1,1,5,1,1)
  (same comment as for chromium)
  property Corresponding fuel use 1.05263 MJ; name fuel_use_propane; = 1/0.95
  property density 0.515 kg/l; name density_propane
  property fuel input in physical units, m3 8.596e-10 m3; name fuel_input_propane
  property heating value, net 1 MJ; name Net_heat_value_propane
  note on Corresponding fuel use: Lower heating value of the fuel input related to the heat/electricity output
  note on density: Density for liquid propane (at 15°C), taken from http://www.cfbp.fr/proprietes-des-gpl/caracteristiques-generales-et-physico-chimiques-n305.
  note on heating value, net: Net (lower) heating (calorific) value. Taken directly from ecoinvent v3.0 dataset "propane, burned in building machine, GLO 2013".
- iron ore concentrate: 1.05 kg; lognormal variance with pedigree 0.0401, pedigree (1,2,5,1,1)
  ore transformed on site
  EcoSpold01Location=GLO
  properties: dry mass 1 kg, wet mass 1 kg
- lime: 0.000293965, 2.53893e-5 kg (2 suppliers, which the file names only by identifier); sum of these 0.000319354 kg; = 0.01748*annualProductionPelletsQuebec/annualProductionPelletsGLO; lognormal variance with pedigree 0.0427, pedigree (1,2,5,5,1)
  Estimation. Adapted from dataset ''iron pellet production, Quebec, 2011''.
  properties: carbon content, fossil 0.120005, dry mass 1 kg, wet mass 1 kg
- lubricating oil: 4.47292e-8, 2.12335e-7 kg (2 suppliers, which the file names only by identifier); sum of these 2.57064e-7 kg; = (wasteMineralOil+(used_oil_burned_onsite*lubricant_density))*(annualProductionPelletsQuebec/annualProductionPelletsGLO); lognormal variance with pedigree 0.04, pedigree (1,1,5,1,1)
  (same comment as for chromium)
  properties: carbon content, fossil 0.75, density 0.9 kg/l, dry mass 1 kg, heating value, net 40.2 MJ, input 1.558e-5 l, wet mass 1 kg
  note on carbon content, fossil: Lubricating oil is produced from diesel. C-content/dry mass of fats and oils considered 75%, from: ecoinvent v2.2 report, n 15a, pg 40
  note on density: Taken directly from http://www.engineeringtoolbox.com/liquids-densities-d_743.html.
  note on heating value, net: Literature value, Source: IPCC 2006, 2006 IPCC Guidelines for National Greenhouse Gas Inventories, Prepared by the National Greenhouse Gas Inventories Programme, Eggleston H.S., Buendia L., Miwa K., Ngara T. and Tanabe K. (eds). Published: IGES, Japan
- scrap steel: -0.00641836, -0.00306759, -3.88654e-6 kg (3 suppliers, which the file names only by identifier); sum of these -0.00948984 kg; = 9.996E-05*annualProductionPelletsQuebec/annualProductionPelletsGLO + 0.075586*69394305600/annualProductionPelletsGLO; lognormal variance with pedigree 0.0027, pedigree (1,2,1,5,1)
  Calculated based on amounts in the local geographies (CA-QC and IN), scaled down based on their production volumes.
  production volume; = annualProductionPelletsGLO * (scrapSteel / prod_ironPellet_kg)
    Equal to sum of production volumes in CA-QC and IN datasets.
  properties: dry mass 1 kg, wet mass 1 kg
- sodium hydroxide, without water, in 50% solution state: 1.64074e-7, 1.68025e-6 kg (2 suppliers, which the file names only by identifier); sum of these 1.84433e-6 kg; = 0.00010095*annualProductionPelletsQuebec/annualProductionPelletsGLO; lognormal variance with pedigree 0.0427, pedigree (1,2,5,5,1)
  Estimation. Adapted from dataset ''iron pellet production, Quebec, 2011''.
  properties: dry mass 1 kg, heating value, net 3.03 MJ, wet mass 1 kg
- solvent, organic: 1.25435e-9 kg; = spentSolventMixture*annualProductionPelletsQuebec/annualProductionPelletsGLO; lognormal variance with pedigree 0.04, pedigree (1,1,5,1,1)
  (same comment as for chromium)
  properties: carbon content, fossil 0.63072, dry mass 1 kg, heating value, net 19.11 MJ, wet mass 1 kg
- spent solvent mixture: -4.48973e-10, -1.91636e-8, -4.9045e-8 kg (3 suppliers, which the file names only by identifier); sum of these -6.86576e-8 kg; = 3.758E-06*annualProductionPelletsQuebec/annualProductionPelletsGLO; lognormal variance with pedigree 0.0027, pedigree (1,2,1,5,1)
  Estimation. Adapted from dataset ''iron pellet production, Quebec, 2011''.
  production volume; = annualProductionPelletsGLO * (spentSolventMixture / prod_ironPellet_kg)
    Calculated from production volume of reference product using the relative outputs.
  properties: carbon content, fossil 0.571257, dry mass 0.835 kg, heating value, net 21.7 MJ, water content 0.197605, wet mass 1 kg
  note on carbon content, fossil: Tab A.7, ecoinvent v2.2 report 13_I. C content has been calculated after data in the tables, and then referred to 1 kg DM
  note on heating value, net: Value taken from the general comment of the treatment dataset.
- steel, unalloyed: 1.89457e-5 kg; = (grindingBalls_input*grindingBalls_steelFraction)*annualProductionPelletsQuebec/annualProductionPelletsGLO; lognormal variance with pedigree 0.04, pedigree (1,1,5,1,1)
  (same comment as for chromium)
  property input_kg 0.00122 kg; name grindingBalls_input
  property steel, fraction 0.85; name grindingBalls_steelFraction
  properties: carbon content, fossil 0.0025, dry mass 1 kg, wet mass 1 kg
- tap water: 1.54502e-5, 2.35525e-5, 4.39478e-5, 0.000118392, 0.00679631, 0.00507497 kg (6 suppliers, which the file names only by identifier); sum of these 0.0120726 kg; = 0.6608*annualProductionPelletsQuebec/annualProductionPelletsGLO; lognormal variance with pedigree 0.0427, pedigree (1,2,5,5,1)
  Estimation. Adapted from dataset ''iron pellet production, Quebec, 2011''.
  properties: carbon content, fossil 0.00178991, dry mass 0.000337476 kg, water content 2962.17, wet mass 1 kg
  note on carbon content, fossil: Bicarbonate content is 2.93 mol/m3. CO2 content is 0.1 mol/m3 (ecoinvent v2.2 report 8, Tab 93.1).
- transport, freight train: 0.000715843, 0.00065533, 4.59755e-5, 0.000151526, 0.000904104 metric ton*km (5 suppliers, which the file names only by identifier); sum of these 0.00247278 metric ton*km; = ((fuel_input_diesel_train*density_diesel_train)/fuel_use_diesel_train)*annualProductionPelletsQuebec/annualProductionPelletsGLO; lognormal variance with pedigree 0.04, pedigree (1,1,5,1,1)
  (same comment as for chromium)
  properties: Corresponding fuel use, transport, freight train 0.0094148 kg, density 0.84 kg/l, input 0.001517 l
  note on Corresponding fuel use, transport, freight train: Source : transport, freight train, diesel, GLO (ecoinvent data)
- waste mineral oil: -3.29738e-10, -3.48751e-8, -1.33195e-8 kg (3 suppliers, which the file names only by identifier); sum of these -4.85243e-8 kg; = 2.656E-06*annualProductionPelletsQuebec/annualProductionPelletsGLO; lognormal variance with pedigree 0.0027, pedigree (1,2,1,5,1)
  Estimation. Adapted from dataset ''iron pellet production, Quebec, 2011''.
  production volume; = annualProductionPelletsGLO * (wasteMineralOil / prod_ironPellet_kg)
    Calculated from production volume of reference product using the relative outputs.
  properties: carbon content, fossil 0.864444, dry mass 0.9 kg, heating value, net 34.7 MJ, water content 0.111111, wet mass 1 kg
  note on carbon content, fossil: Tab A.6, ecoinvent v2.2 report 13_I. C content has been calculated after data in the tables, and then referred to 1 kg DM

## Inputs from nature
- Water, unspecified natural origin [natural resource, in water]: 9e-5 m3; name water_UNO_input; lognormal variance with pedigree 0.0401, pedigree (1,2,5,1,1)

## Emissions to nature
- Cadmium II [air, unspecified]: 2.1e-10 kg; lognormal variance with pedigree 0.6913, pedigree (2,3,5,3,1)
- Carbon dioxide, fossil [air, non-urban air or from high stacks]: 0.000424771 kg; = 0.02325*annualProductionPelletsQuebec/annualProductionPelletsGLO; lognormal variance with pedigree 0.0433, pedigree (2,2,5,5,1)
  Estimation. Adapted from dataset ''iron pellet production, Quebec, 2011''.
- Carbon dioxide, fossil [air, unspecified]: 0.0237 kg; lognormal variance with pedigree 0.0413, pedigree (2,3,5,3,1)
- Carbon monoxide, fossil [air, non-urban air or from high stacks]: 1.17036e-8 kg; = 6.406E-07*annualProductionPelletsQuebec/annualProductionPelletsGLO; lognormal variance with pedigree 0.6927, pedigree (2,2,5,5,1)
  Estimation. Adapted from dataset ''iron pellet production, Quebec, 2011''.
- Carbon monoxide, fossil [air, unspecified]: 0.00021 kg; lognormal variance with pedigree 0.6913, pedigree (2,3,5,3,1)
- Chromium III [air, unspecified]: 2.7e-9 kg; lognormal variance with pedigree 0.6913, pedigree (2,3,5,3,1)
  property chromium, fraction 0.15; name grindingBalls_chromiumFraction
- Copper ion [air, unspecified]: 4.6e-9 kg; lognormal variance with pedigree 0.6913, pedigree (2,3,5,3,1)
- Dinitrogen monoxide [air, non-urban air or from high stacks]: 8.38945e-10 kg; = 4.592E-8*annualProductionPelletsQuebec/annualProductionPelletsGLO; lognormal variance with pedigree 0.0827, pedigree (2,2,5,5,1)
  Estimation. Adapted from dataset ''iron pellet production, Quebec, 2011''.
- Dioxins, measured as 2,3,7,8-tetrachlorodibenzo-p-dioxin [air, unspecified]: 5.7e-15 kg; lognormal variance with pedigree 0.3413, pedigree (2,3,5,3,1)
- Hydrocarbons, aliphatic, alkanes, unspecified [air, unspecified]: 2.25e-5 kg; lognormal variance with pedigree 0.0813, pedigree (2,3,5,3,1)
- Hydrochloric acid [air, non-urban air or from high stacks]: 1.10897e-7 kg; = 6.07E-06*annualProductionPelletsQuebec/annualProductionPelletsGLO; lognormal variance with pedigree 0.0841, pedigree (3,2,5,5,1)
  Estimation. Adapted from dataset ''iron pellet production, Quebec, 2011''.
- Hydrochloric acid [air, unspecified]: 2.5e-5 kg; lognormal variance with pedigree 0.0813, pedigree (2,3,5,3,1)
- Hydrogen fluoride [air, non-urban air or from high stacks]: 2.5943e-7 kg; = 1.42E-05*annualProductionPelletsQuebec/annualProductionPelletsGLO; lognormal variance with pedigree 0.0841, pedigree (3,2,5,5,1)
  Estimation. Adapted from dataset ''iron pellet production, Quebec, 2011''.
- Hydrogen fluoride [air, unspecified]: 1.99e-5 kg; lognormal variance with pedigree 0.0813, pedigree (2,3,5,3,1)
- Lead II [air, unspecified]: 6.65e-8 kg; lognormal variance with pedigree 0.6913, pedigree (2,3,5,3,1)
- Manganese II [air, unspecified]: 2.3e-8 kg; lognormal variance with pedigree 0.6913, pedigree (2,3,5,3,1)
- Mercury II [air, non-urban air or from high stacks]: 5.53572e-11 kg; = 3.03E-09*annualProductionPelletsQuebec/annualProductionPelletsGLO; lognormal variance with pedigree 0.6941, pedigree (3,2,5,5,1)
  Estimation. Adapted from dataset ''iron pellet production, Quebec, 2011''.
- Mercury II [air, unspecified]: 2.5e-10 kg; lognormal variance with pedigree 0.6913, pedigree (2,3,5,3,1)
- Methane, fossil [air, non-urban air or from high stacks]: 3.41643e-11 kg; = 1.87E-09*annualProductionPelletsQuebec/annualProductionPelletsGLO; lognormal variance with pedigree 0.0827, pedigree (2,2,5,5,1)
  Estimation. Adapted from dataset ''iron pellet production, Quebec, 2011''.
- NMVOC, non-methane volatile organic compounds [air, non-urban air or from high stacks]: 2.35131e-11 kg; = 1.287E-09*annualProductionPelletsQuebec/annualProductionPelletsGLO; lognormal variance with pedigree 0.0827, pedigree (2,2,5,5,1)
  Estimation. Adapted from dataset ''iron pellet production, Quebec, 2011''.
- Nickel II [air, unspecified]: 1.5e-8 kg; lognormal variance with pedigree 0.6913, pedigree (2,3,5,3,1)
- Nitrogen oxides [air, non-urban air or from high stacks]: 1.1002e-7 kg; = 6.022E-06*annualProductionPelletsQuebec/annualProductionPelletsGLO; lognormal variance with pedigree 0.0827, pedigree (2,2,5,5,1)
  Estimation. Adapted from dataset ''iron pellet production, Quebec, 2011''.
- Nitrogen oxides [air, unspecified]: 0.000315 kg; lognormal variance with pedigree 0.0813, pedigree (2,3,5,3,1)
- PAH, polycyclic aromatic hydrocarbons [air, unspecified]: 1.9e-10 kg; lognormal variance with pedigree 0.3413, pedigree (2,3,5,3,1)
- Particulate Matter, < 2.5 um [air, non-urban air or from high stacks]: 1.89822e-7 kg; = 1.039E-05*annualProductionPelletsQuebec/annualProductionPelletsGLO; lognormal variance with pedigree 0.3427, pedigree (2,2,5,5,1)
  Estimation. Adapted from dataset ''iron pellet production, Quebec, 2011''.
- Particulate Matter, < 2.5 um [air, unspecified]: 7.5e-5 kg; lognormal variance with pedigree 0.3413, pedigree (2,3,5,3,1)
- Particulate Matter, > 10 um [air, non-urban air or from high stacks]: 3.28124e-7 kg; = 1.796E-05*annualProductionPelletsQuebec/annualProductionPelletsGLO; lognormal variance with pedigree 0.0827, pedigree (2,2,5,5,1)
  Estimation. Adapted from dataset ''iron pellet production, Quebec, 2011''.
- Particulate Matter, > 2.5 um and < 10um [air, non-urban air or from high stacks]: 2.249e-7 kg; = 1.231E-05*annualProductionPelletsQuebec/annualProductionPelletsGLO; lognormal variance with pedigree 0.1627, pedigree (2,2,5,5,1)
  Estimation. Adapted from dataset ''iron pellet production, Quebec, 2011''.
- Silver I [air, non-urban air or from high stacks]: 3.16066e-11 kg; = 1.73E-09*annualProductionPelletsQuebec/annualProductionPelletsGLO; lognormal variance with pedigree 0.6941, pedigree (3,2,5,5,1)
  Estimation. Adapted from dataset ''iron pellet production, Quebec, 2011''.
- Sulfur dioxide [air, non-urban air or from high stacks]: 5.2635e-7 kg; = 2.881E-05*annualProductionPelletsQuebec/annualProductionPelletsGLO; lognormal variance with pedigree 0.0433, pedigree (2,2,5,5,1)
  Estimation. Adapted from dataset ''iron pellet production, Quebec, 2011''.
- Sulfur dioxide [air, unspecified]: 0.000134 kg; lognormal variance with pedigree 0.0413, pedigree (2,3,5,3,1)
- Vanadium V [air, unspecified]: 8.55e-8 kg; lognormal variance with pedigree 0.6913, pedigree (2,3,5,3,1)
- Water [air, unspecified]: 1.53109e-5 m3; = (water_UNO_input + water_UNO_input_QC/1000)*fraction_PW_to_air; lognormal variance with pedigree 0.0807, pedigree (2,2,5,1,1)
  Calculated value based on literature values and expert opinion. See comments in the parametres' comment field.
- Zinc II [air, unspecified]: 5.62e-8 kg; lognormal variance with pedigree 0.6913, pedigree (2,3,5,3,1)
- Arsenic ion [water, surface water]: 3.4749e-12 kg; = 1.902E-10*annualProductionPelletsQuebec/annualProductionPelletsGLO; lognormal variance with pedigree 0.6927, pedigree (2,2,5,5,1)
  Estimation. Adapted from dataset ''iron pellet production, Quebec, 2011''.
- Cadmium II [water, surface water]: 1.73727e-12 kg; = 9.509E-11*annualProductionPelletsQuebec/annualProductionPelletsGLO; lognormal variance with pedigree 0.6927, pedigree (2,2,5,5,1)
  Estimation. Adapted from dataset ''iron pellet production, Quebec, 2011''.
- Chromium III [water, surface water]: 2.77882e-11 kg; = 1.521E-09*annualProductionPelletsQuebec/annualProductionPelletsGLO; lognormal variance with pedigree 0.6927, pedigree (2,2,5,5,1)
  Estimation. Adapted from dataset ''iron pellet production, Quebec, 2011''.
- Cobalt II [water, surface water]: 3.4749e-12 kg; = 1.902E-10*annualProductionPelletsQuebec/annualProductionPelletsGLO; lognormal variance with pedigree 0.6927, pedigree (2,2,5,5,1)
  Estimation. Adapted from dataset ''iron pellet production, Quebec, 2011''.
- Copper ion [water, surface water]: 3.4749e-12 kg; = 1.902E-10*annualProductionPelletsQuebec/annualProductionPelletsGLO; lognormal variance with pedigree 0.6927, pedigree (2,2,5,5,1)
  Estimation. Adapted from dataset ''iron pellet production, Quebec, 2011''.
- Iron ion [water, surface water]: 6.60633e-9 kg; = 3.616E-07*annualProductionPelletsQuebec/annualProductionPelletsGLO; lognormal variance with pedigree 0.6927, pedigree (2,2,5,5,1)
  Estimation. Adapted from dataset ''iron pellet production, Quebec, 2011''.
- Lead II [water, surface water]: 3.4749e-12 kg; = 1.902E-10*annualProductionPelletsQuebec/annualProductionPelletsGLO; lognormal variance with pedigree 0.6927, pedigree (2,2,5,5,1)
  Estimation. Adapted from dataset ''iron pellet production, Quebec, 2011''.
- Manganese II [water, surface water]: 1.04229e-9 kg; = 5.705E-8*annualProductionPelletsQuebec/annualProductionPelletsGLO; lognormal variance with pedigree 0.6927, pedigree (2,2,5,5,1)
  Estimation. Adapted from dataset ''iron pellet production, Quebec, 2011''.
- Mercury II [water, surface water]: 4.51627e-13 kg; = 2.472E-11*annualProductionPelletsQuebec/annualProductionPelletsGLO; lognormal variance with pedigree 0.6927, pedigree (2,2,5,5,1)
  Estimation. Adapted from dataset ''iron pellet production, Quebec, 2011''.
- Nickel II [water, surface water]: 3.4749e-12 kg; = 1.902E-10*annualProductionPelletsQuebec/annualProductionPelletsGLO; lognormal variance with pedigree 0.6927, pedigree (2,2,5,5,1)
  Estimation. Adapted from dataset ''iron pellet production, Quebec, 2011''.
- Nitrate [water, surface water]: 6.39257e-9 kg; = 3.499E-07*annualProductionPelletsQuebec/annualProductionPelletsGLO; lognormal variance with pedigree 0.0827, pedigree (2,2,5,5,1)
  Estimation. Adapted from dataset ''iron pellet production, Quebec, 2011''.
- Phosphorus [water, surface water]: 4.16915e-10 kg; = 2.282E-8*annualProductionPelletsQuebec/annualProductionPelletsGLO; lognormal variance with pedigree 0.0827, pedigree (2,2,5,5,1)
  Estimation. Adapted from dataset ''iron pellet production, Quebec, 2011''.
- Suspended solids, unspecified [water, surface water]: 2.22525e-8 kg; = 1.218E-06*annualProductionPelletsQuebec/annualProductionPelletsGLO; lognormal variance with pedigree 0.0827, pedigree (2,2,5,5,1)
  Estimation. Adapted from dataset ''iron pellet production, Quebec, 2011''.
- Water [water, unspecified]: 8.67617e-5 m3; = (water_UNO_input + water_UNO_input_QC/1000)*(1-fraction_PW_to_air)
  (same comment as for Water)
- Zinc II [water, surface water]: 1.38978e-11 kg; = 7.607E-10*annualProductionPelletsQuebec/annualProductionPelletsGLO; lognormal variance with pedigree 0.6927, pedigree (2,2,5,5,1)
  Estimation. Adapted from dataset ''iron pellet production, Quebec, 2011''.

## Sampling procedure
Main in- and outputs from world average and main emissions from some plants in the EU, all based on literature.
Some inputs and emissions relate to Quebec data, collected from one production site.

## Extrapolations
see Geography

## Review by Roland Hischier 2007-08-13
passed

## Review by Emilia Moreno Ruiz 2014-05-22
AL added to input of iron

## Review by Emilia Moreno Ruiz 2015-11-04
AL to diesel train removed
