# electricity production, nuclear, boiling water reactor

Dataset: EcoSpold 2, unit process
Geography: RU
Time period: 1990-01-01 to 2023-12-31
Technology level: modern
Classification: ISIC rev.4 ecoinvent: 3510:Electric power generation, transmission and distribution
Synonyms: BWR
Tags: nuclear power
Scenario: Business-as-Usual
System model: Allocation, cut-off by classification
Generated by: Karin Treyer
Published in: Dones, R. 2007
Database: ecoinvent
isCopyrightProtected: true
accessRestrictedTo: 1

## General comment
This dataset represents the production of high voltage electricity at a grid-connected nuclear boiling water reactor (BWR) in the Russian Federation in 2012.
It is a copy of the dataset "electricity production, nuclear, boiling water reactor, CH, 1995-2002", i.e. of a dataset with data for a Swiss nuclear BWR. The basic source for all exchanges is therefore the ecoinvent report "Kernenergie" (see Modelling and Administrative). Data of this CH dataset are scaled with a factor derived from the comparison of the efficiencies of Swiss BWR and those valid for this dataset in order to account for a higher or lower fuel input for the production of 1 kWh, respectively.
The average burnup 48.6 MWd/kg heavy metal of finally discharged fuel elements from the 2000/2002 fuel cycles has been assumed representative for the lifetime of the modeled plant (the burnup has increased from the initial about 33 MWd/kg heavy metal and may increase to 55 MWd/kg heavy metal in the future). The average burnup corresponds to an average enrichment of 3.8% U235 for fresh uranium fuel elements. For the calculation of the total net electricity delivered in 40 years lifetime, the sum of the actual production till 2002 and the prospective (9000 GWh/a) till end of life using is considered; this gives 3.46E11 kWh; the inverse gives the utilisation factor for the infrastructure. Full detailed information on material requirements during operation for 1991/1992 are available. The diesel requirements for the yearly test of diesel emergency generators are accounted for. Radioactive emission species to air and water are weighted averages of the emissions of the nuclear power plants Leibstadt and Mühleberg (CH) from 1995 to 2002. Alpha aerosols emission to air have been described with "aerosols, unspecified". Considered radioactive waste streams are: spent fuel to reprocessing (40%) and conditioning (60%); operational low active waste for conditioning in the intermediate repository; and, contaminated waste from dismantling.
[This dataset is meant to replace the following datasets:]

## Included activities start
From the constructed power plant ready to produce electricity and from the fuel ready in the power plant.

## Included activities end
This activity ends with 1kWh of high voltage electricity produced at the power plant and arrived at the busbar.
The module includes fuel elements, chemicals, and diesel requirements as well as the relevant transport requirements. Water use (fresh and decarbonized) for cooling is included. Considered radioactive waste streams are: spent fuel to reprocessing and conditioning; operational low active waste for conditioning in the intermediate repository; and, contaminated waste from dismantling. Non-radioactive wastes are accounted for.

The module includes fuel elements, chemicals, and diesel requirements as well as the relevant transport requirements. Water use (fresh and decarbonized) for cooling is included, but no cooling tower infrastructure. Considered radioactive waste streams are: spent fuel to reprocessing and conditioning; operational low active waste for conditioning in the intermediate repository; and, contaminated waste from dismantling. Non-radioactive wastes are accounted for.

## Geography
Extrapolated from Swiss data of one specific plant for requirements and all Swiss BWRs for emissions.

## Technology
Best current technology for fuel element. Standard technology for commercial operation.

## Time period
The Annual Production Volume is valid for the year 2012.

## Parameters
All rows: lognormal variance with pedigree 0.092025, pedigree (4,4,3,2,4)
- fraction, cooling water, to air: 0.0431288 dimensionless; name fraction_CW_to_air; = (WConsumption_EP_nuclear_recirculatingCS*recirculating_CS_fraction_from_allCS+WConsumption_EP_nuclear_onceT_andCP_CS*once_through_andCP_CS_fractio_from_allCS)/(WWithdrawal_EP_nuclear_recirculating_CS*recirculating_CS_fraction_from_allCS+WWithdrawal_EP_nuclear_onceT_andCP_CS*once_through_andCP_CS_fractio_from_allCS)
  Calculated value based on literature value (Scown, 2011 & Floerke, 2009, Future changes of freshwater needs in the electricity production sector & Stiegel, 2008, Estimating Freshwater Needs to Meet Future Thermoelectric Generation Requirements) (Vionnet, S., Quantis Water Database - Technical Report, 2012).
- fraction, water, decarbonised, to air: 0.0431288 dimensionless; name fraction_WDC_to_air; = fraction_CW_to_air
  Calculated value. See comments in the other parametres present in this dataset. Decarbonised water is considered to be always used as cooling water, thus cooling water fractions to air are applied to all carbonised water input flows to calculate the amount of water consumed in the processes.
  nan
- once-through and cooling pond cooling systems as a fraction of all cooling syste: 0.625 dimensionless; name once_through_andCP_CS_fractio_from_allCS
  Calculated as an average of data available for Europe (Floerke, 2008, Future changes of freshwater needs in the electricity production sector) and USA (NERL, 2011, Estimating freshwater needs to meet future thermoelectric generation requirements).
  nan
- recirculating cooling system as a fraction of all cooling systems: 0.375 dimensionless; name recirculating_CS_fraction_from_allCS
  (same comment as for once-through and cooling pond cooling systems as a fraction of all coo)
- water consumption, electricity production, nuclear, once-T and coolingP CS: 0.00296 m3/kWh; name WConsumption_EP_nuclear_onceT_andCP_CS
  Estimated based on literature (Scown, 2011, Water Footprint of U.S. Transportation Fuels, SI).
  nan
- water consumption, electricity production, nuclear, recirculating CS: 0.0024 m3/kWh; name WConsumption_EP_nuclear_recirculatingCS
  (same comment as for water consumption, electricity production, nuclear, once-T and cooling)
- water withdrawal, electricity production, nuclear, once-T and coolingP CS: 0.0995 m3/kWh; name WWithdrawal_EP_nuclear_onceT_andCP_CS
  (same comment as for water consumption, electricity production, nuclear, once-T and cooling)
- water withdrawal, electricity production, nuclear, recirculating CS: 0.0042 m3/kWh; name WWithdrawal_EP_nuclear_recirculating_CS
  (same comment as for water consumption, electricity production, nuclear, once-T and cooling)

## Reference product
- electricity, high voltage: 1 kWh; By-product classification allocatable product; CPC 17100: Electrical energy; HS2017 271600: Electrical energy
  production volume 8.35404e10 kWh; name apv_electricity
    Literature value/statistics. For both OECD and non-OECD countries, gross electricity production 2012 with nuclear plants was taken from the IEA electricity information 2014, table 1.2. For a split of this total value into electricity production in different types of nuclear plants (boiling water reactor, pressure water reactor and pressurised heavy water reactor), data from IEAE 2014 (PRIS database) were exploited. According to the PRIS database, 43% of installed nuclear capacity in Russia n is of the type "Light Water Graphite Reactor". As this type is not represented in ecoinvent, it is approximated with a boiling water reactor. An own electricity use of 6% (losses between gross and net electricity production) has been applied to the gross data based on IEA 2014.
    IEA. 2014. Electricity Information 2014. ISBN 978-92-64-21692-1. International Energy Agency (IEA), Paris Cedex (FR).
    IAEA. 2014. PRIS (Power Reactor Information System) - The database on nuclear power reactors. Country statistics. Online database. International Atomic Energy Agency.
  property price 0.0977 EUR2005
    Temporary price data. Calculated as 90% of purchasers price based on: 94% of the average price (to account for a 6% loss in transformation and transmission) for electricity for industrial consumersin 2005 (excluded taxes). From IEA.
  properties: carbon allocation 0 kg, carbon content 0

## Inputs from technosphere
- acetylene: 2.81232e-8, 5.92426e-9 kg (2 suppliers, which the file names only by identifier); sum of these 3.40475e-8 kg; lognormal variance with pedigree 0.0439, pedigree (2,2,5,5,2)
  Operator information
  properties: carbon content, fossil 0.923077, dry mass 1 kg, heating value, net 51.2 MJ, wet mass 1 kg
  note on carbon content, fossil: C2H2. ecoinvent v2.2 report n 8. Produced from partial oxidation of natural gas
  note on heating value, net: Based on literature, page 25 (Value may refer to HHV), Althaus H.-J., Chudacoff M., Hischier R., Jungbluth N., Osses M. and Primas A. (2007) Life Cycle Inventories of Chemicals. Final report ecoinvent data v2.0 No. 8. EMPA, Swiss Centre for Life Cycle Inventories, Dübendorf, CH, Online-Version under: www.ecoinvent.org.
- anionic resin: 1.10276e-6, 1.1139e-8 kg (2 suppliers, which the file names only by identifier); sum of these 1.1139e-6 kg; lognormal variance with pedigree 0.0439, pedigree (2,2,5,5,2)
  Operator information. All resin types needed are modeled as 50% anionic resin and 50% cationic resin.
  properties: carbon content, fossil 0.680721, dry mass 0.5 kg, heating value, net 9.09 MJ, water content 1, wet mass 1 kg
  note on carbon content, fossil: Cross-linked polystyrene beads are treated with chloromethyl methyl ether under anhydrous conditions, with either aluminum chloride or tin(IV) chloride as catalyst. Chloromethylated polystyrene is obtained. In a second stage, the chlorine in the chloromethylated group can be replaced by an amine (Anion exchange resins, in Ullmann). In this case, Trimethylamine, C3H9N, is used (ecoinvent v2.2 report 8-part 93). That is, the resine can be formulated as C12H18NCl (after Ullmann, Anion exchange resins). The resine is hydrated (ecoinvent v2.2 report 8, part II, Tab 93.7)
- argon, liquid: 4.27863e-6, 2.03112e-5 kg (2 suppliers, which the file names only by identifier); sum of these 2.45898e-5 kg; lognormal variance with pedigree 0.0439, pedigree (2,2,5,5,2)
  Estimation. Gas use in the power plant. Argon and helium are summed up in this exchange
  properties: dry mass 1 kg, wet mass 1 kg
- borax, anhydrous, powder: 3.03695e-8 kg; lognormal variance with pedigree 0.0439, pedigree (2,2,5,5,2)
  Operator information.
  properties: dry mass 1 kg, wet mass 1 kg
- boric acid, anhydrous, powder: 2.42746e-8 kg; lognormal variance with pedigree 0.0439, pedigree (2,2,5,5,2)
  Operator information.
  properties: dry mass 1 kg, wet mass 1 kg
- carbon dioxide, liquid: 2.74109e-8, 1.30216e-7 kg (2 suppliers, which the file names only by identifier); sum of these 1.57627e-7 kg; lognormal variance with pedigree 0.0439, pedigree (2,2,5,5,2)
  Estimation. Gas use in the power plant.
  properties: carbon content, fossil 0.272727, dry mass 1 kg, heating value, net 8.27 MJ, wet mass 1 kg
- cast iron: 1.21898e-7 kg; lognormal variance with pedigree 0.0439, pedigree (2,2,5,5,2)
  Operator information
  properties: carbon content, fossil 0.04, dry mass 1 kg, wet mass 1 kg
  note on carbon content, fossil: Cast iron is made by remelting pig iron in small furnaces (e.g. cupola furnaces or electric arc furnaces) and poured into moulds to make castings. It usually contains 2% to 6% carbon (ecoinvent v2.2 report 10_partII). An average content of 4% was considered
- cationic resin: 1.10276e-6, 1.1139e-8 kg (2 suppliers, which the file names only by identifier); sum of these 1.1139e-6 kg; lognormal variance with pedigree 0.0439, pedigree (2,2,5,5,2)
  (same comment as for anionic resin)
  properties: carbon content, fossil 0.521606, dry mass 0.5 kg, heating value, net 6.68 MJ, water content 1, wet mass 1 kg
  note on carbon content, fossil: Chemically inert polystyrene beads are treated with concentrated sulfuric or chlorosulfonic acid to give cross-linked polystyrene 3-sulfonic acid (Cation exchange resins, Ullmann). The resine was approximated as C8H8O3S (from Ullmann, Cation exchange resins). The resine is hydrated (ecoinvent v2.2 report 8, part II, Tab 93.5)
- cement, Portland: 7.80622e-6, 2.95814e-7 kg (2 suppliers, which the file names only by identifier); sum of these 8.10203e-6 kg; lognormal variance with pedigree 0.0439, pedigree (2,2,5,5,2)
  Operator information. Cement use for conditioning of the hard waste.
  properties: dry mass 1 kg, wet mass 1 kg
- chemical, inorganic: 6.31559e-7 kg; lognormal variance with pedigree 0.0439, pedigree (2,2,5,5,2)
  Operator information. Decontamination chemicals and salt for water softening.
  properties: carbon content, fossil 0.003, dry mass 1 kg, wet mass 1 kg
  note on carbon content, fossil: This dataset is an unweighted average of 20 inorganic substances (listed in Tab 88.1, ecoinvent v2.2 report 8, part II), being part of the top100 chemicals included in this database. The C-content has also been calculated as an unweighted average of the C content of the substances composing this dataset.
- chemical, organic: 1.30305e-6 kg; lognormal variance with pedigree 0.0439, pedigree (2,2,5,5,2)
  Operator information. This category contains solvents, frost protection, anticorrosives, industrial alcohol, washing agents.
  properties: carbon content, fossil 0.628, dry mass 1 kg, heating value, net 19.03 MJ, wet mass 1 kg
  note on carbon content, fossil: This dataset is an unweighted average of 20 organic substances (listed in Tab 88.1, ecoinvent v2.2 report 8, part II), being part of the top100 chemicals included in this database. The C-content has also been calculated as an unweighted average of the C content of the substances composing this dataset.
- concrete, normal strength: 1.67085e-8 m3; lognormal variance with pedigree 0.0439, pedigree (2,2,5,5,2)
  Literature value
  properties: dry mass 2190 kg, water content 0.086758, wet mass 2380 kg
- diesel, burned in diesel-electric generating set, 10MW: 0.000349932 MJ; lognormal variance with pedigree 0.0439, pedigree (2,2,5,5,2)
  Estimation. Diesel use for testing of the emergency power in the power plant.
  properties: heating value, net 1 MJ
- flat glass, coated: 2.76454e-6, 1.36529e-6 kg (2 suppliers, which the file names only by identifier); sum of these 4.12983e-6 kg; lognormal variance with pedigree 0.0439, pedigree (2,2,5,5,2)
  Operator information. Materials for sand blasting equipment.
  properties: dry mass 1 kg, wet mass 1 kg
- fly ash and scrubber sludge: -5.85598e-7, -1.48457e-6 kg (2 suppliers, which the file names only by identifier); sum of these -2.07017e-6 kg; lognormal variance with pedigree 0.0439, pedigree (2,2,5,5,2)
  Literature data
  production volume; = fly_ash * apv_electricity
    Calculated from the production volume of electricity, high voltage in proportion to the respective output amounts.
  properties: carbon content, fossil 0.167, dry mass 0.1 kg, water content 9, wet mass 1 kg
  note on carbon content, fossil: Tab A.6, ecoinvent v2.2 report 13_I. C content has been calculated after data in the tables, and then referred to 1 kg DM
- hazardous waste, for incineration: -6.19483e-7, -2.97907e-7 kg (2 suppliers, which the file names only by identifier); sum of these -9.1739e-7 kg; lognormal variance with pedigree 0.0439, pedigree (2,2,5,5,2)
  Literature data
  production volume; = hazwaste * apv_electricity
    (same comment as for fly ash and scrubber sludge)
  properties: carbon content, fossil 0.554667, dry mass 0.75 kg, heating value, net 17 MJ, water content 0.333333, wet mass 1 kg
  note on heating value, net: Value taken from the general comment of the treatment dataset.
- hydrogen, gaseous, medium pressure, merchant: 2.43008e-6, 7.29025e-6 kg (2 suppliers, which the file names only by identifier); sum of these 9.72034e-6 kg; lognormal variance with pedigree 0.0439, pedigree (2,2,5,5,2)
  Estimation. Gas use in the power plant.
  properties: dry mass 1 kg, heating value, net 120.21 MJ, wet mass 1 kg
- low level radioactive waste: -1.74104e-8 m3; name low_level_waste; lognormal variance with pedigree 0.0439, pedigree (2,2,5,5,2)
  Literature data
  production volume; = low_level_waste * apv_electricity
    (same comment as for fly ash and scrubber sludge)
  properties: dry mass 2500 kg, wet mass 2500 kg
- low level radioactive waste for final repository: -4.25593e-8 m3; name low_level_waste_final; lognormal variance with pedigree 0.0439, pedigree (2,2,5,5,2)
  Literature data
  production volume; = low_level_waste_final * apv_electricity
    (same comment as for fly ash and scrubber sludge)
  properties: dry mass 2500 kg, wet mass 2500 kg
- lubricating oil: 2.66957e-7, 1.26728e-6 kg (2 suppliers, which the file names only by identifier); sum of these 1.53424e-6 kg; lognormal variance with pedigree 0.0439, pedigree (2,2,5,5,2)
  Operator information. Oil and fats for hydraulic systems and general lubricating use.
  properties: carbon content, fossil 0.75, dry mass 1 kg, heating value, net 40.2 MJ, wet mass 1 kg
  note on carbon content, fossil: Lubricating oil is produced from diesel. C-content/dry mass of fats and oils considered 75%, from: ecoinvent v2.2 report, n 15a, pg 40
  note on heating value, net: Literature value, Source: IPCC 2006, 2006 IPCC Guidelines for National Greenhouse Gas Inventories, Prepared by the National Greenhouse Gas Inventories Programme, Eggleston H.S., Buendia L., Miwa K., Ngara T. and Tanabe K. (eds). Published: IGES, Japan
- nitrogen, liquid: 4.5761e-5, 1.25611e-5 kg (2 suppliers, which the file names only by identifier); sum of these 5.8322e-5 kg; lognormal variance with pedigree 0.0439, pedigree (2,2,5,5,2)
  Estimation. Gas use in the power plant. Nitrogen use and use of forming gas (5-10% H2, 90-95% N2) are summed up in this exchange.
  properties: dry mass 1 kg, wet mass 1 kg
- nuclear power plant, boiling water reactor 1000MW: 3.03695e-12 unit; lognormal variance with pedigree 0.0439, pedigree (2,2,5,5,2)
  Estimation. Total net electricity over a lifetime: 3.46E11 kWh
- oxygen, liquid: 3.39387e-6, 1.23688e-5 kg (2 suppliers, which the file names only by identifier); sum of these 1.57627e-5 kg; lognormal variance with pedigree 0.0439, pedigree (2,2,5,5,2)
  Estimation. Gas use in the power plant.
  properties: dry mass 1 kg, wet mass 1 kg
- paper, woodfree, coated: 1.55288e-7, 4.52102e-7 kg (2 suppliers, which the file names only by identifier); sum of these 6.0739e-7 kg; lognormal variance with pedigree 0.0439, pedigree (2,2,5,5,2)
  Operator information. Paper use in office. No other office materials have been considered.
  properties: carbon content, fossil 0.0590617, carbon content, non-fossil 0.22775, dry mass 0.945 kg, heating value, net 14.11 MJ, water content 0.0582011, wet mass 1 kg
  note on carbon content, fossil: Fossil C content was calculated after fossil C contents of chemicals used in the production of the paper (in Tab 8.72 & 8.73 ecoinvent v2.2 report 11_III, part 8).
  note on carbon content, non-fossil: Biogenic C content was calculated after biogenic C contents of chemicals used in the production of the paper (in Tab 8.72 & 8.73 ecoinvent v2.2 report 11_III, part 8). The cellulose content in 1 kg of paper (on a wet mas basis) was estimated as (1-chemical content), C content of cellulose was considered 0.44 kgC/kg dry mass (ecoinvent v2.2 report, n 15a, pg 40)
- reinforcing steel: 8.09153e-7 kg; lognormal variance with pedigree 0.0439, pedigree (2,2,5,5,2)
  Operator information
  properties: carbon content, fossil 0.004, dry mass 1 kg, wet mass 1 kg
- spent nuclear fuel: -2.81627e-6 kg; name spent_nuclear_fuel; lognormal variance with pedigree 0.0439, pedigree (2,2,5,5,2)
  Literature data
  production volume; = spent_nuclear_fuel * apv_electricity
    (same comment as for fly ash and scrubber sludge)
  properties: dry mass 1 kg, wet mass 1 kg
- steel, low-alloyed, hot rolled: 5.67458e-6 kg; lognormal variance with pedigree 0.0439, pedigree (2,2,5,5,2)
  Literature value
  properties: carbon content, fossil 0.005, dry mass 1 kg, wet mass 1 kg
  note on carbon content, fossil: Low alloyed steel composition given in Tab. 3.2 ecoinvent v2.2 report 10_partII. Steel assumed to have a C content of 0.5%
- uranium, enriched 3.8%, in fuel element for light water reactor: 2.81627e-6 kg; lognormal variance with pedigree 0.0439, pedigree (2,2,5,5,2)
  estimated variation over lifetime
  properties: dry mass 1 kg, wet mass 1 kg
- waste mineral oil: -1.11022e-6, -4.24016e-7 kg (2 suppliers, which the file names only by identifier); sum of these -1.53424e-6 kg; = lubricating_oil; lognormal variance with pedigree 0.0439, pedigree (2,2,5,5,2)
  Literature data
  production volume; = waste_oil* apv_electricity
    (same comment as for fly ash and scrubber sludge)
  properties: carbon content, fossil 0.864444, dry mass 0.9 kg, heating value, net 34.7 MJ, water content 0.111111, wet mass 1 kg
- water, decarbonised: 3.2812 kg; name water_decarbonised_input; = 900/(8.65E9/(365*24*60*60)); lognormal variance with pedigree 0.0483, pedigree (2,2,5,5,2)
  Literature value/estimation.
  properties: wet mass 1 kg

## Inputs from nature
- Water, cooling, unspecified natural origin [natural resource, in water]: 0.0637625 m3; name water_cooling_UNO_input; = ((recirculating_CS_fraction_from_allCS*WWithdrawal_EP_nuclear_recirculating_CS)+(once_through_andCP_CS_fractio_from_allCS*WWithdrawal_EP_nuclear_onceT_andCP_CS)); lognormal variance with pedigree 0.0483, pedigree (2,2,5,5,2)
  Calculated based on literature data.
  property carbon content, fossil 0.0104329; name C_content_fossil
  property carbon content, non-fossil 0; name C_content_non_fossil
  property dry mass 0.1101 kg; name DM
  property water content 9081.65; name water_content
  property water in wet mass 999.89 kg; name WWM
  property wet mass 1000 kg; name WM

## Emissions to nature
- Aerosols, radioactive, unspecified [air, non-urban air or from high stacks]: 9.1739e-9 kBq; lognormal variance with pedigree 0.0439, pedigree (2,2,5,5,2)
  Operator data. Weighted radioactive emissions into air of Swiss nuclear power plants 1995-2002 (Weighting with net electricity production).
- Antimony-124 [air, non-urban air or from high stacks]: 2.26983e-9 kBq; lognormal variance with pedigree 0.0439, pedigree (2,2,5,5,2)
  (same comment as for Aerosols, radioactive, unspecified)
- Argon-41 [air, non-urban air or from high stacks]: 0.00112441 kBq; lognormal variance with pedigree 0.0439, pedigree (2,2,5,5,2)
  (same comment as for Aerosols, radioactive, unspecified)
- Barium-140 [air, non-urban air or from high stacks]: 1.95458e-6 kBq; lognormal variance with pedigree 0.0439, pedigree (2,2,5,5,2)
  (same comment as for Aerosols, radioactive, unspecified)
- Caesium-134 [air, non-urban air or from high stacks]: 2.26983e-8 kBq; lognormal variance with pedigree 0.0439, pedigree (2,2,5,5,2)
  (same comment as for Aerosols, radioactive, unspecified)
- Caesium-137 [air, non-urban air or from high stacks]: 3.93017e-7 kBq; lognormal variance with pedigree 0.0439, pedigree (2,2,5,5,2)
  (same comment as for Aerosols, radioactive, unspecified)
- Carbon-14 [air, non-urban air or from high stacks]: 0.0490746 kBq; lognormal variance with pedigree 0.0439, pedigree (2,2,5,5,2)
  (same comment as for Aerosols, radioactive, unspecified)
- Cerium-141 [air, non-urban air or from high stacks]: 4.73932e-7 kBq; lognormal variance with pedigree 0.0439, pedigree (2,2,5,5,2)
  (same comment as for Aerosols, radioactive, unspecified)
- Chromium-51 [air, non-urban air or from high stacks]: 3.03695e-8 kBq; lognormal variance with pedigree 0.0439, pedigree (2,2,5,5,2)
  (same comment as for Aerosols, radioactive, unspecified)
- Cobalt-58 [air, non-urban air or from high stacks]: 2.12271e-8 kBq; lognormal variance with pedigree 0.0439, pedigree (2,2,5,5,2)
  (same comment as for Aerosols, radioactive, unspecified)
- Cobalt-60 [air, non-urban air or from high stacks]: 2.76373e-7 kBq; lognormal variance with pedigree 0.0439, pedigree (2,2,5,5,2)
  (same comment as for Aerosols, radioactive, unspecified)
- Iodine-131 [air, non-urban air or from high stacks]: 6.76746e-5 kBq; lognormal variance with pedigree 0.0439, pedigree (2,2,5,5,2)
  (same comment as for Aerosols, radioactive, unspecified)
- Krypton-85 [air, non-urban air or from high stacks]: 0.00491797 kBq; lognormal variance with pedigree 0.0439, pedigree (2,2,5,5,2)
  (same comment as for Aerosols, radioactive, unspecified)
- Krypton-85m [air, non-urban air or from high stacks]: 0.0154475 kBq; lognormal variance with pedigree 0.0439, pedigree (2,2,5,5,2)
  (same comment as for Aerosols, radioactive, unspecified)
- Krypton-87 [air, non-urban air or from high stacks]: 0.00624203 kBq; lognormal variance with pedigree 0.0439, pedigree (2,2,5,5,2)
  (same comment as for Aerosols, radioactive, unspecified)
- Krypton-88 [air, non-urban air or from high stacks]: 0.00825966 kBq; lognormal variance with pedigree 0.0439, pedigree (2,2,5,5,2)
  (same comment as for Aerosols, radioactive, unspecified)
- Krypton-89 [air, non-urban air or from high stacks]: 0.00352034 kBq; lognormal variance with pedigree 0.0439, pedigree (2,2,5,5,2)
  (same comment as for Aerosols, radioactive, unspecified)
- Lanthanum-140 [air, non-urban air or from high stacks]: 1.67085e-7 kBq; lognormal variance with pedigree 0.0439, pedigree (2,2,5,5,2)
  (same comment as for Aerosols, radioactive, unspecified)
- Manganese-54 [air, non-urban air or from high stacks]: 1.55525e-8 kBq; lognormal variance with pedigree 0.0439, pedigree (2,2,5,5,2)
  (same comment as for Aerosols, radioactive, unspecified)
- Niobium-95 [air, non-urban air or from high stacks]: 1.70237e-9 kBq; lognormal variance with pedigree 0.0439, pedigree (2,2,5,5,2)
  (same comment as for Aerosols, radioactive, unspecified)
- Ruthenium-103 [air, non-urban air or from high stacks]: 4.05627e-10 kBq; lognormal variance with pedigree 0.0439, pedigree (2,2,5,5,2)
  (same comment as for Aerosols, radioactive, unspecified)
- Tritium [air, non-urban air or from high stacks]: 0.064522 kBq; lognormal variance with pedigree 0.0439, pedigree (2,2,5,5,2)
  (same comment as for Aerosols, radioactive, unspecified)
- Water [air, unspecified]: 0.00289151 m3; name water_to_air_unspecified; = (water_decarbonised_input/1000)*fraction_WDC_to_air+water_cooling_UNO_input*fraction_CW_to_air; lognormal variance with pedigree 0.130025, pedigree (4,4,5,2,4)
  Calculated value based on literature values and expert opinion. See comments in the parametres" comment field.
  property fraction, origin: fresh water 0.0489412; name fraction_origin_fresh_water
  property fraction, origin: salt water 0; name fraction_origin_salt_water
  property fraction, origin: unspecified 0.951059; name fraction_origin_unspecified
- Xenon-131m [air, non-urban air or from high stacks]: 0.0327864 kBq; lognormal variance with pedigree 0.0439, pedigree (2,2,5,5,2)
  (same comment as for Aerosols, radioactive, unspecified)
- Xenon-133 [air, non-urban air or from high stacks]: 0.427695 kBq; lognormal variance with pedigree 0.0439, pedigree (2,2,5,5,2)
  (same comment as for Aerosols, radioactive, unspecified)
- Xenon-133m [air, non-urban air or from high stacks]: 0.00112441 kBq; lognormal variance with pedigree 0.0439, pedigree (2,2,5,5,2)
  (same comment as for Aerosols, radioactive, unspecified)
- Xenon-135 [air, non-urban air or from high stacks]: 0.267966 kBq; lognormal variance with pedigree 0.0439, pedigree (2,2,5,5,2)
  (same comment as for Aerosols, radioactive, unspecified)
- Xenon-135m [air, non-urban air or from high stacks]: 0.303695 kBq; lognormal variance with pedigree 0.0439, pedigree (2,2,5,5,2)
  (same comment as for Aerosols, radioactive, unspecified)
- Xenon-137 [air, non-urban air or from high stacks]: 0.00963627 kBq; lognormal variance with pedigree 0.0439, pedigree (2,2,5,5,2)
  (same comment as for Aerosols, radioactive, unspecified)
- Xenon-138 [air, non-urban air or from high stacks]: 0.0717729 kBq; lognormal variance with pedigree 0.0439, pedigree (2,2,5,5,2)
  (same comment as for Aerosols, radioactive, unspecified)
- Zinc-65 [air, non-urban air or from high stacks]: 7.76576e-8 kBq; lognormal variance with pedigree 0.0439, pedigree (2,2,5,5,2)
  (same comment as for Aerosols, radioactive, unspecified)
- Zirconium-95 [air, non-urban air or from high stacks]: 1.67085e-9 kBq; lognormal variance with pedigree 0.0439, pedigree (2,2,5,5,2)
  (same comment as for Aerosols, radioactive, unspecified)
- Antimony-124 [water, surface water]: 1.05085e-6 kBq; lognormal variance with pedigree 0.0439, pedigree (2,2,5,5,2)
  Operator data. Weighted radioactive emissions into water of Swiss nuclear power plants 1995-2002 (Weighting with net electricity production).
- Antimony-125 [water, surface water]: 1.37661e-6 kBq; lognormal variance with pedigree 0.0439, pedigree (2,2,5,5,2)
  (same comment as for Antimony-124)
- Barium-140 [water, surface water]: 5.0861e-6 kBq; lognormal variance with pedigree 0.0439, pedigree (2,2,5,5,2)
  (same comment as for Antimony-124)
- Caesium-134 [water, surface water]: 6.52576e-6 kBq; lognormal variance with pedigree 0.0439, pedigree (2,2,5,5,2)
  (same comment as for Antimony-124)
- Caesium-137 [water, surface water]: 0.000476034 kBq; lognormal variance with pedigree 0.0439, pedigree (2,2,5,5,2)
  (same comment as for Antimony-124)
- Cerium-141 [water, surface water]: 1.80746e-6 kBq; lognormal variance with pedigree 0.0439, pedigree (2,2,5,5,2)
  (same comment as for Antimony-124)
- Chromium-51 [water, surface water]: 0.000362542 kBq; lognormal variance with pedigree 0.0439, pedigree (2,2,5,5,2)
  (same comment as for Antimony-124)
- Cobalt-58 [water, surface water]: 8.23864e-5 kBq; lognormal variance with pedigree 0.0439, pedigree (2,2,5,5,2)
  (same comment as for Antimony-124)
- Cobalt-60 [water, surface water]: 0.000886915 kBq; lognormal variance with pedigree 0.0439, pedigree (2,2,5,5,2)
  (same comment as for Antimony-124)
- Iodine-131 [water, surface water]: 4.85492e-6 kBq; lognormal variance with pedigree 0.0439, pedigree (2,2,5,5,2)
  (same comment as for Antimony-124)
- Iodine-133 [water, surface water]: 2.65864e-6 kBq; lognormal variance with pedigree 0.0439, pedigree (2,2,5,5,2)
  (same comment as for Antimony-124)
- Iron-59 [water, surface water]: 3.38373e-7 kBq; lognormal variance with pedigree 0.0439, pedigree (2,2,5,5,2)
  (same comment as for Antimony-124)
- Lanthanum-140 [water, surface water]: 4.78136e-6 kBq; lognormal variance with pedigree 0.0439, pedigree (2,2,5,5,2)
  (same comment as for Antimony-124)
- Manganese-54 [water, surface water]: 7.66068e-5 kBq; lognormal variance with pedigree 0.0439, pedigree (2,2,5,5,2)
  (same comment as for Antimony-124)
- Molybdenum-99 [water, surface water]: 1.86e-6 kBq; lognormal variance with pedigree 0.0439, pedigree (2,2,5,5,2)
  (same comment as for Antimony-124)
- Niobium-95 [water, surface water]: 2.72169e-6 kBq; lognormal variance with pedigree 0.0439, pedigree (2,2,5,5,2)
  (same comment as for Antimony-124)
- Radioactive species, alpha emitters [water, surface water]: 4.92847e-8 kBq; lognormal variance with pedigree 0.0439, pedigree (2,2,5,5,2)
  (same comment as for Antimony-124)
- Ruthenium-103 [water, surface water]: 2.80576e-8 kBq; lognormal variance with pedigree 0.0439, pedigree (2,2,5,5,2)
  (same comment as for Antimony-124)
- Silver-110 [water, surface water]: 0.00134508 kBq; lognormal variance with pedigree 0.0439, pedigree (2,2,5,5,2)
  (same comment as for Antimony-124)
- Sodium-24 [water, surface water]: 1.31356e-6 kBq; lognormal variance with pedigree 0.0439, pedigree (2,2,5,5,2)
  (same comment as for Antimony-124)
- Strontium-89 [water, surface water]: 2.67966e-5 kBq; lognormal variance with pedigree 0.0439, pedigree (2,2,5,5,2)
  (same comment as for Antimony-124)
- Strontium-90 [water, surface water]: 3.01593e-6 kBq; lognormal variance with pedigree 0.0439, pedigree (2,2,5,5,2)
  (same comment as for Antimony-124)
- Technetium-99m [water, surface water]: 3.93017e-5 kBq; lognormal variance with pedigree 0.0439, pedigree (2,2,5,5,2)
  (same comment as for Antimony-124)
- Tritium [water, surface water]: 0.102458 kBq; lognormal variance with pedigree 0.0439, pedigree (2,2,5,5,2)
  (same comment as for Antimony-124)
- Water [water, unspecified]: 0.0641522 m3; name water_to_water_unspecified; = (water_decarbonised_input/1000)*(1-fraction_WDC_to_air)+water_cooling_UNO_input*(1-fraction_CW_to_air); lognormal variance with pedigree 0.130025, pedigree (4,4,5,2,4)
  (same comment as for Water)
  property fraction, origin: fresh water 0.0489412; name fraction_origin_fresh_water_Ww
  property fraction, origin: salt water 0; name fraction_origin_salt_water_Ww
  property fraction, origin: unspecified 0.951059; name fraction_origin_unspecified_Ww
- Zinc-65 [water, surface water]: 0.000191254 kBq; lognormal variance with pedigree 0.0439, pedigree (2,2,5,5,2)
  (same comment as for Antimony-124)
- Zirconium-95 [water, surface water]: 2.92136e-7 kBq; lognormal variance with pedigree 0.0439, pedigree (2,2,5,5,2)
  (same comment as for Antimony-124)

## Sampling procedure
Literature, statistics, and information from operators.

## Extrapolations
This datasets is taken over from a dataset valid for Switzerland (CH). Data quality for this Swiss dataset is high. Geographical uncertainty has been adjusted accordingly.

The Swiss dataset is valid for 1995-2002 and is partly based on older sources. Temporal uncertainty has been adjusted accordingly.
According to the PRIS database (see comment for annual production volume), 43% of installed nuclear capacity in Russia is of the type "Light Water Graphite Reactor". As this type is not represented in ecoinvent, it is approximated with a boiling water reactor.
