# samarium europium gadolinium concentrate to generic market for mischmetal

Dataset: EcoSpold 2, unit process
Geography: GLO
Time period: 2011-01-01 to 2023-12-31
Technology level: current
Classification: ISIC rev.4 ecoinvent: 0729:Mining of other non-ferrous metal ores
Classification: EcoSpold01Categories: chemicals/inorganics
Scenario: Business-as-Usual
System model: Allocation, cut-off by classification
Generated by: Bo Weidema
Database: ecoinvent
isCopyrightProtected: true
accessRestrictedTo: 1

## General comment
This dataset provides an outlet for surplus samarium europium gadolinium concentrate from co-production with other rare earth oxides. This dataset implies an assumption that a surplus will add to the content of these elements in the general mischmetal (mixed rare earths). This route should be replaced by a dataset representing the marginal application of the samarium europium gadolinium concentrate, as soon as this becomes available.

## Included activities start
This linking activity starts from the supply of surplus samarium europium gadolinium concentrate

## Included activities end
ends with the supply of mischmetal

## Technology
This is a linking activity between two markets, without any other activity. It has no other inputs and outputs.

## Reference product
- mischmetal: 1 kg; By-product classification allocatable product; CPC 34290: Compounds of rare earth metals, of yttrium or of scandium; HS2017 284690: Compounds, inorganic or organic (excluding cerium), of rare-earth metals, of yttrium, scandium or of mixtur[...]
  production volume 121351 kg
    Total rare earth produced in the world in 2005 was 122 000 ton REO eq (Table 6 in http://minerals.usgs.gov/minerals/pubs/commodity/rare_earths/myb1-2007-raree.xls). Rare-earth production in China accounts then for 98% of the world’s production, so the same assumptions have been applied for calculating global production volumes as for calculating chinese production volumes. It is estimated, that 10% of this production volume is traded on the generic market for mischmetal.
  property carbon content, fossil 0; name C_content_fossil
  property carbon content, non-fossil 0; name C_content_non_fossil
  property dry mass 1 kg; name DM
  property price 619.06 EUR2005
    Calculated based on inputs: The price of the product has been calculated as a sum of the values of the material and energy inputs for this product. This value is therefore a rough estimation. It may underestimate the real price since there are additional expenses when producing any product. These expences can include for example labour costs, treatment of waste materials and profit for the producer. Please consider carefully whether this level of data quality is acceptable for your application.
  property water content 0; name water_content
  property water in wet mass 0 kg; name WWM
  property wet mass 1 kg; name WM
  properties: carbon allocation 0 kg, carbon content 0

## Inputs from technosphere
- samarium-europium-gadolinium oxide: 1 kg
  properties: dry mass 1 kg, wet mass 1 kg
