# potato production

Dataset: EcoSpold 2, unit process
Geography: US-WA
Time period: 2010-01-01 to 2023-12-31
Technology level: current
Classification: ISIC rev.4 ecoinvent: 0113:Growing of vegetables and melons, roots and tubers
Synonyms: Solanum tuberosum L
Scenario: Business-as-Usual
System model: Allocation, cut-off by classification
Generated by: Juanita Barrera
Database: ecoinvent
isCopyrightProtected: true
accessRestrictedTo: 1

## General comment
This dataset represents the production of 1 kg of potato (fresh matter) in the US state of Washington at farm, with a harvested moisture content of 79.2%. This dataset includes cultivation of the field prior to planting, field treatments, planting, applications of nutrients and pesticides, fumigant, regulator and desiccant, and harvest (including grading).
The average yield of potato grown in Washington for the 2010-2021 seasons was 69,605 kg/ha (wet mass) (USDA NASS (2021b)). The dataset reflects the average potato produced in Washington from 2010 to 2021, inclusive, as that period allows for at least one value from USDA statistics for most parameters and generally three or more. Potato is a no tillage crop (0% no till, 0% reduced till, 100% conventional tillage) and grown in multiyear rotation, commonly 4-year rotation with other crops. This dataset reflects practices consistent with that.
Area, productivity, use of mineral fertilisers and other agrochemicals, and irrigation inputs are based on farmer data reported to the U.S. Department of Agriculture. This dataset does not consider the use of manure during the production process, although recent studies suggest that the use of manure (green and animal) should be studied and considered, as it could benefit the cultivation of this crop and interest appears to be rising. Lime use is based on soil pH and guidance from agricultural extension offices for potato. Field operations and equipment types and fuel use are based on materials provided to growers by the agricultural extension office(s), including farm budgets, and on survey information agricultural extension office(s) collect from growers, in conjunction with row spacing data from USDA Drainage (tile or ditch) is installed on 57.6% based on state-level agricultural survey data from USDA. Irrigation is included based on share of crop irrigated (32.0% over the time period,USDA NASS (2018c)). Chemigation is included in this and is not treated as an additional operation.
Total cropland land use, for all crops, in Washington decreased by 4% between 1997 and 2017 (NRCS 2020). USDA NASS does not report cropped area for potato prior to 2010. The crop LCI tool allocates land use change to all crops and activities that grew in the last 20 years in the US, and only to them, according to their respective area increase; crops for which planted area decreased are not attributed LUC impacts or credits. Thus, the amount of Land use change, annual crop is zero for Potato grown in Washington. The total cropland change 1997 to 2017 was -4.1% for all crops in Washington (NRCS 2020).
Soil characteristics, including pH, are based on the distribution of soil pH sampling results reported in the 2020 Soil Test Summary (Bruulsema and Jones 2021). The share of acidic soils is likely overestimated as more frequent testing is to be expected on soils having needed lime and thus low pH soils are likely to be more represented amongst the collected samples. No anti-erosion practices are assumed in the dataset; instead, the erosion soil loss reported in the U.S. Natural Resources Conservation Service's Natural Resource Inventory is used.
References
USDA NASS (2021b) POTATO - PRODUCTION - 2000-2021. US Department of Agriculture (USDA) National Agricultural Statistics Service. https://quickstats.nass.usda.gov (direct query: https://quickstats.nass.usda.gov/results/88567F9F-D7F3-3107-BC9E-BC1236B3DB44)
USDA NASS (2018c) 2018 Irrigation and Water Management Survey (2017 Census of Agriculture). US Department of Agriculture (USDA). https://www.nass.usda.gov/Publications/AgCensus/2017/Online_Resources/Farm_and_Ranch_Irrigation_Survey/index.php
NRCS (2020) Land Cover/use of non-Federal rural land, by State and year, in the 2017 National Resources Inventory. USDA, Natural Resources Conservation Service. http://www.nrcs.usda.gov/Internet/NRCS_RCA/reports/nri_crop_nat.html, https://www.nrcs.usda.gov/wps/portal/nrcs/rca/national/technical/nra/rca/text/#NRI%20Cropland
Bruulsema and Jones 2021. Soil Test Summary 2020. Foundation for Agronomic Research and Plant Nutrition Canada present this 2020 summary of soil test levels in North America. Foundation for Agronomic Research, Plant Nutrition Canada. https://soiltest.tfi.org/about/about_soil_test_summaryaccessed August 30, 2021

## Included activities start
This activity starts with soil cultivation after the harvest of the previous crop.

## Included activities end
This dataset includes cultivation of the field prior to planting, field treatments, planting, applications of nutrients and pesticides, and harvest (including grading). It ends with graded potato at the farm gate, prior to hauling and storage.

## Geography
Production of potato in Washington (US-WA).

## Technology
This dataset reflects current practice for potato in Washington as of 2021.

## Time period
The valid period covers 2010-01-01 through 2021-12-31 based on primary data sources. The production volumes, areas and applications are covered by data throughout the time period (annual for production and area, alternate years for applications). Because the specific pesticides used show time-dependent trends, the most recent 3 years of data are used to avoid underweighting the most dominant pesticides currently used and to avoid skewing impacts based on compounds no longer in use. Field operations are based on current enterprise crop budgets and change little year to year. Data for manure applications were only available for time periods prior to the valid periord but represent the best available option.

## Reference product
- potato: 1 kg; By-product classification allocatable product; CPC 01510: Potatoes; HS2017 070190: Vegetables; potatoes (other than seed), fresh or chilled
  This dataset represents the production of 1 kg of potato (fresh matter) in the US state of Washington at farm, with a harvested moisture content of 79.2%. This dataset includes cultivation of the field prior to planting, field treatments, planting, applications of nutrients and pesticides, fumigant, regulator and desiccant, and harvest (including grading).
  production volume 4.51724e6 kg; name pv_potato
    Average annual production of potato in Washington 2017-2021: 4.5 Mt/year (source POTATO - PRODUCTION, MEASURED IN Metric Tonne (converted from CWT) US Department of Agriculture (USDA NASS) 2021 (direct query https://quickstats.nass.usda.gov/results/331F88CC-004E-34D2-B825-F8F65DAC7879)
  property price 0.126051 EUR2005
    The price per kg of potato is considered for the years 2014-2021 for the state of Washington in the US. The values were retrieved in $/CWT [1] and converted into $/kg. References: [1] US Department of Agriculture (NASS), Quickstat, TabLe "POTATOES - PRICE RECEIVED, MEASURED IN $ / CWT", accessed on 25.08.2023, available at: https://quickstats.nass.usda.gov/
    The prices were converted to EUR based on the annual exchange rates published by the European Central Bank (https://sdw.ecb.europa.eu/quickview.do?SERIES_KEY=120.EXR.A.AUD.EUR.SP00.A, last accessed on 2023-06-01) and adjusted for inflation relative to 2005 using the producer price index (PPI) of the euro area, published by eurostat (https://ec.europa.eu/eurostat/databrowser/view/STS_INPP_A__custom_6416181/default/table?lang=en, last accessed on 2023-06-01).
  properties: carbon allocation 0.0988 kg, carbon content 0.475, carbon content, fossil 0, carbon content, non-fossil 0.475, dry mass 0.208 kg, energy content 3.8896 MJ, water content 3.80769, water in wet mass 0.792 kg, wet mass 1 kg

## Inputs from technosphere
- 1,3-dichloropropene: 0.00061424 kg; normal variance with pedigree 3.38814e-8, pedigree (1,2,2,3,1)
  Proxy for applied pesticide(s) Dichloropropene (4.275E+1 kg/ha {1,4,1,1,1}).
  Average over state-wide reported cropped area of Potato for all tillage practices (OPTiS 2020) and across all rotation patterns (Socolar et al 2021) - calculated from specified herbicide/insecticide/fungicide quantity applied to treated acres weighted by share of acres treated with that herbicide/insecticide/fungicide (2014, 2016, 2018, USDA NASS data, https://quickstats.nass.usda.gov).
  From POTATO - APPLICATIONS, MEASURED IN LB / ACRE / YEAR, AVG (fertilizer and pesticides, amount, number of applications) - 2000-2021, https://quickstats.nass.usda.gov/results/910944A6-DEB0-3216-B6B4-F5BA47F1D217
  properties: carbon content, fossil 0.327273, dry mass 1 kg, heating value, net 14.21 MJ, wet mass 1 kg
- NPK (15-15-15) fertiliser: 0.00135386 kg; normal variance with pedigree 3.15902e-9, pedigree (2,1,2,1,1)
  1.35E-3 kg NPK (15-15-15) fertiliser/kg Potato
  Quantities of specific fertiliser are calculated based on US fertiliser market share and nutrient compositions from the International Fertilizer Association data to meet total nutrient demand N-P-K-S: 220.23--145.05--166.21--37.53 kg/ha (USDA NASS data for 2010, 2014, 2016), over reported cropped area of specified crop (includes all rotation patterns): quantity of N applied to treated acres times percent of planted potato acres treated (USDA NASS) times share of N supplied by compound in U.S. consumption mix (ecoinvent and International Fertilizer Association 2019) times mass compound per mass N in compound.
  Sources:
  USDA NASS (2021c) POTATO - APPLICATIONS, MEASURED IN LB / ACRE / YEAR, AVG (fertilizer and pesticides, amount, number of applications) - 2000-2021. US Department of Agriculture (USDA) National Agricultural Statistics Service. https://quickstats.nass.usda.gov (direct query: https://quickstats.nass.usda.gov/results/910944A6-DEB0-3216-B6B4-F5BA47F1D217); Ecoinvent U.S. consumption mix for N fertilisers, from IFA data; IFA (2021) Nutrient content in percentage - IFA Fertilizer Converter. International Fertilizer Association. https://www.ifastat.org/converter/fertilizer-converter/accessed 2021-06-24
  properties: dry mass 1 kg, nitrogen content 0.15, phosphorus content 0.15, potassium content 0.15, wet mass 1 kg
  note on nitrogen content: Nitrogen content (on a dry matter basis) of NPK (15-15-15) fertiliser is calculated from the molecular formula of the substance ().
  note on phosphorus content: Phosphorus content (on a dry matter basis) of NPK (15-15-15) fertiliser is calculated from the molecular formula of the substance ().
  note on potassium content: Potassium content (on a dry matter basis) of NPK (15-15-15) fertiliser is calculated from the molecular formula of the substance ().
- [sulfonyl]urea-compound: 4.3359e-6 kg; normal variance with pedigree 2.76041e-13, pedigree (1,3,2,4,4)
  This exchange is an aggregate of proxies for applied pesticide(s) Cymoxanil , Linuron , Rimsulfuron , Novaluron (6.994E-2 kg/ha {1,2,1,1,1}; 1.976E-1 kg/ha {1,4,1,1,1}; 8.905E-3 kg/ha {1,4,1,1,1}; 2.535E-2 kg/ha {1,4,1,1,1}, respectively).
  Average over state-wide reported cropped area of Potato for all tillage practices (OPTiS 2020) and across all rotation patterns (Socolar et al 2021) - calculated from specified herbicide/insecticide/fungicide quantity applied to treated acres weighted by share of acres treated with that herbicide/insecticide/fungicide (2014, 2016, 2018, USDA NASS data, https://quickstats.nass.usda.gov).
  From POTATO - APPLICATIONS, MEASURED IN LB / ACRE / YEAR, AVG (fertilizer and pesticides, amount, number of applications) - 2000-2021, https://quickstats.nass.usda.gov/results/910944A6-DEB0-3216-B6B4-F5BA47F1D217
  properties: carbon content, fossil 0.540853, dry mass 1 kg, wet mass 1 kg
- [thio]carbamate-compound: 0.0012007 kg; normal variance with pedigree 1.26421e-7, pedigree (1,4,2,4,4)
  This exchange is an aggregate of proxies for applied pesticide(s) Mancozeb , Metiram , Propamocarb hydroch. , Eptc , Carbaryl , Oxamyl , Metam-potassium , Metam-sodium (3.26E+0 kg/ha {1,4,1,1,1}; 2.027E-1 kg/ha {1,4,1,1,1}; 1.27E-1 kg/ha {1,4,1,1,1}; 2.179E+0 kg/ha {1,4,1,1,1}; 8.204E-1 kg/ha {1,4,1,1,1}; 2.085E+0 kg/ha {1,4,1,1,1}; 5.682E+0 kg/ha {1,4,1,1,1}; 6.922E+1 kg/ha {1,4,1,1,1}, respectively).
  Average over state-wide reported cropped area of Potato for all tillage practices (OPTiS 2020) and across all rotation patterns (Socolar et al 2021) - calculated from specified herbicide/insecticide/fungicide quantity applied to treated acres weighted by share of acres treated with that herbicide/insecticide/fungicide (2014, 2016, 2018, USDA NASS data, https://quickstats.nass.usda.gov).
  From POTATO - APPLICATIONS, MEASURED IN LB / ACRE / YEAR, AVG (fertilizer and pesticides, amount, number of applications) - 2000-2021, https://quickstats.nass.usda.gov/results/910944A6-DEB0-3216-B6B4-F5BA47F1D217
  properties: carbon content, fossil 0.626349, dry mass 1 kg, wet mass 1 kg
- acetamide-anillide-compound, unspecified: 5.58138e-6 kg; normal variance with pedigree 2.32452e-12, pedigree (1,4,2,4,4)
  This exchange is an aggregate of proxies for applied pesticide(s) Mefenoxam , Zoxamide , Dimethenamid-p , Flumioxazin , Bifenazate (1.475E-1 kg/ha {1,4,1,1,1}; 5.132E-2 kg/ha {1,4,1,1,1}; 1.022E-1 kg/ha {1,4,1,1,1}; 5.806E-3 kg/ha {1,4,1,1,1}; 8.171E-2 kg/ha {1,4,1,1,1}, respectively).
  Average over state-wide reported cropped area of Potato for all tillage practices (OPTiS 2020) and across all rotation patterns (Socolar et al 2021) - calculated from specified herbicide/insecticide/fungicide quantity applied to treated acres weighted by share of acres treated with that herbicide/insecticide/fungicide (2014, 2016, 2018, USDA NASS data, https://quickstats.nass.usda.gov).
  From POTATO - APPLICATIONS, MEASURED IN LB / ACRE / YEAR, AVG (fertilizer and pesticides, amount, number of applications) - 2000-2021, https://quickstats.nass.usda.gov/results/910944A6-DEB0-3216-B6B4-F5BA47F1D217
  properties: carbon content, fossil 0.659175, dry mass 1 kg, wet mass 1 kg
- ammonia, anhydrous, liquid: 0.000953762 kg; normal variance with pedigree 2.39949e-8, pedigree (2,1,2,1,1)
  9.54E-4 kg ammonia, anhydrous, liquid/kg Potato
  Quantities of specific fertiliser are calculated based on US fertiliser market share and nutrient compositions from the International Fertilizer Association data to meet total nutrient demand N-P-K-S: 286.49--145.05--166.21--37.53 kg/ha (USDA NASS data for 2010, 2014, 2016), over reported cropped area of specified crop (includes all rotation patterns): quantity of N applied to treated acres times percent of planted potato acres treated (USDA NASS) times share of N supplied by compound in U.S. consumption mix (ecoinvent and International Fertilizer Association 2019) times mass compound per mass N in compound.
  Sources:
  0
  properties: dry mass 1 kg, wet mass 1 kg
- ammonium nitrate: 0.000146539 kg; normal variance with pedigree 5.66431e-10, pedigree (2,1,2,1,1)
  1.47E-4 kg ammonium nitrate/kg Potato
  Quantities of specific fertiliser are calculated based on US fertiliser market share and nutrient compositions from the International Fertilizer Association data to meet total nutrient demand N-P-K-S: 220.23--145.05--166.21--37.53 kg/ha (USDA NASS data for 2010, 2014, 2016), over reported cropped area of specified crop (includes all rotation patterns): quantity of N applied to treated acres times percent of planted potato acres treated (USDA NASS) times share of N supplied by compound in U.S. consumption mix (ecoinvent and International Fertilizer Association 2019) times mass compound per mass N in compound.
  Sources:
  USDA NASS (2021c) POTATO - APPLICATIONS, MEASURED IN LB / ACRE / YEAR, AVG (fertilizer and pesticides, amount, number of applications) - 2000-2021. US Department of Agriculture (USDA) National Agricultural Statistics Service. https://quickstats.nass.usda.gov (direct query: https://quickstats.nass.usda.gov/results/910944A6-DEB0-3216-B6B4-F5BA47F1D217); Ecoinvent U.S. consumption mix for N fertilisers, from IFA data; IFA (2021) Nutrient content in percentage - IFA Fertilizer Converter. International Fertilizer Association. https://www.ifastat.org/converter/fertilizer-converter/accessed 2021-06-24
  properties: dry mass 1 kg, wet mass 1 kg
- ammonium nitrate phosphate: 0.000132558 kg; normal variance with pedigree 4.63504e-10, pedigree (2,1,2,1,1)
  1.33E-4 kg ammonium nitrate phosphate /kg Potato
  Quantities of specific fertiliser are calculated based on US fertiliser market share and nutrient compositions from the International Fertilizer Association data to meet total nutrient demand N-P-K-S: 220.23--145.05--166.21--37.53 kg/ha (USDA NASS data for 2010, 2014, 2016), over reported cropped area of specified crop (includes all rotation patterns): quantity of N applied to treated acres times percent of planted potato acres treated (USDA NASS) times share of N supplied by compound in U.S. consumption mix (ecoinvent and International Fertilizer Association 2019) times mass compound per mass N in compound.
  Sources:
  USDA NASS (2021c) POTATO - APPLICATIONS, MEASURED IN LB / ACRE / YEAR, AVG (fertilizer and pesticides, amount, number of applications) - 2000-2021. US Department of Agriculture (USDA) National Agricultural Statistics Service. https://quickstats.nass.usda.gov (direct query: https://quickstats.nass.usda.gov/results/910944A6-DEB0-3216-B6B4-F5BA47F1D217); Ecoinvent U.S. consumption mix for N fertilisers, from IFA data; IFA (2021) Nutrient content in percentage - IFA Fertilizer Converter. International Fertilizer Association. https://www.ifastat.org/converter/fertilizer-converter/accessed 2021-06-24
  properties: dry mass 1 kg, nitrogen content 0.22, phosphorus content 0.0960126, wet mass 1 kg
  note on nitrogen content: Nitrogen content (on a dry matter basis) of ammonium nitrate phosphate is calculated from the molecular formula of the nutrient present in the substance.
  note on phosphorus content: Phosphorus content (on a dry matter basis) of ammonium nitrate phosphate is calculated from the molecular formula of the nutrient present in the substance.
- ammonium sulfate: 0.000480005 kg; normal variance with pedigree 6.07759e-9, pedigree (2,1,2,1,1)
  4.8E-4 kg ammonium sulfate/kg Potato
  Quantities of specific fertiliser are calculated based on US fertiliser market share and nutrient compositions from the International Fertilizer Association data to meet total nutrient demand N-P-K-S: 220.23--145.05--166.21--37.53 kg/ha (USDA NASS data for 2010, 2014, 2016), over reported cropped area of specified crop (includes all rotation patterns): quantity of N applied to treated acres times percent of planted potato acres treated (USDA NASS) times share of N supplied by compound in U.S. consumption mix (ecoinvent and International Fertilizer Association 2019) times mass compound per mass N in compound.
  Sources:
  USDA NASS (2021c) POTATO - APPLICATIONS, MEASURED IN LB / ACRE / YEAR, AVG (fertilizer and pesticides, amount, number of applications) - 2000-2021. US Department of Agriculture (USDA) National Agricultural Statistics Service. https://quickstats.nass.usda.gov (direct query: https://quickstats.nass.usda.gov/results/910944A6-DEB0-3216-B6B4-F5BA47F1D217); Ecoinvent U.S. consumption mix for N fertilisers, from IFA data; IFA (2021) Nutrient content in percentage - IFA Fertilizer Converter. International Fertilizer Association. https://www.ifastat.org/converter/fertilizer-converter/accessed 2021-06-24
  properties: dry mass 1 kg, wet mass 1 kg
- application of plant protection product, by airplane: 7.18342e-5 ha; lognormal variance with pedigree 0.0206, pedigree (4,4,3,1,3)
  0.0001 ha/ha (7.18E-5 ha/kg Potato) application of plant protection product, by airplane
  Application by of plant protection products (pesticides and, if used, growth regulator and/or desiccant, but excluding fumigant) for potato production in Washington includes 5 aerial spray passes and no passes with ground sprayer (based on detailed enterprise budgets). Application by of plant protection products (pesticides and, if used, growth regulator and/or desiccant, but excluding fumigant) for potato production in Washington includes 5 aerial spray passes and no passes with ground sprayer (based on detailed enterprise budgets). Operations are for production of russet potato (Galinato, 2019), supplemented with information from a multi-state comparison (Patterson, 2015).
  Field operations are as identified in crop- and rotation-specific enterprise crop budgets supplied by the regional agricultural extension office (state specific unless otherwise noted) and matched to equipment type in the budget or crop guidance, along with pest management documentation (Hills, et al., 2018, 2020; Hirnyck & Downey, 2006) and summary of practices for commercial production in the US (Belyea, 2010).Field operations are as identified in crop- and rotation-specific enterprise crop budgets supplied by the regional agricultural extension office (state specific unless otherwise noted) and matched to equipment type in the budget or crop guidance, along with pest management documentation (Hills, et al., 2018, 2020; Hirnyck & Downey, 2006) and summary of practices for commercial production in the US (Belyea, 2010). (Hills, Karen, et al 2018, Galinato, Suzette 2019, Patterson, Paul 2015, Belyea S. et al 2010). As the operation applies only to a portion of the harvested area, the number of passes has been scaled by the % of harvested area to which it applies (e.g., manure spreading or insecticide) as indicated by USDA statistics (applications) or USDA reports (manure use) or as otherwise indicated in enterprise crop budgets.
  Source(s):
  Plastina A and Johanns A (2021) Iowa Farm Custom Rate Survey, 2021 (2018, 2019, 2020). Cooperative Extension Service, Iowa State University of Science and Technology. https://www.extension.iastate.edu/agdm/crops/pdf/a3-10.pdf; Plastina, Johanns, Massman (2020) 2020 Iowa Farm Custom Rate Survey File A3-10. Cooperative Extension Service, Iowa State University of Science and Technology. https://iastate.app.box.com/embed/s/hbsel0lckc7vle74v4jkg7mf0ph3z39s/file/630724245464; Plastina, Johanns, Wynne (2019) 2019 Iowa Farm Custom Rate Survey File A3-10. Cooperative Extension Service, Iowa State University of Science and Technology. https://www.extension.iastate.edu/monroe/sites/www.extension.iastate.edu/files/monroe/2019%20Custom%20Rate%20Survey.pdf; Plastina, Johanns, Welter (2018) 2018 Iowa Farm Custom Rate Survey File A3-10. Cooperative Extension Service, Iowa State University of Science and Technology. https://www.extension.iastate.edu/hancock/sites/www.extension.iastate.edu/files/hancock/2018_CustomRateSurvey.pdf
  USDA NASS (2021c) POTATO - APPLICATIONS, MEASURED IN LB / ACRE / YEAR, AVG (fertilizer and pesticides, amount, number of applications) - 2000-2021. US Department of Agriculture (USDA) National Agricultural Statistics Service. https://quickstats.nass.usda.gov (direct query: https://quickstats.nass.usda.gov/results/910944A6-DEB0-3216-B6B4-F5BA47F1D217)
  NAAA (2020) Letter to the South Dakota Public Utilities Commission, July 30, 2020. National Agricultural Aviation Association. https://puc.sd.gov/commission/dockets/electric/2021/EL21-018/prefiledexhibits/MBExhH.pdf
  NAAA (2019) NAAA Member Survey Report. National Agricultural Aviation Association. https://www.agaviation.org/
  Galinato, Suzette (2019) 2019 Cost Estimates of Producing Fresh and Processing Potatoes in Washington. Washington State University.
  Patterson, Paul (2015) 2014 Cost of Potato Production Study for Colorado, Idaho, Washington and Wisconsin. University of Idaho College of Agricultural and Life Sciences.
  Hills, Karen, et al (2020) Improving Soil Health in Pacific Northwest Potato Production: a Review. American Journal of Potato Research. https://link.springer.com/article/10.1007/s12230-019-09742-7
  Hirnyck, Ronda & Downey, Lisa (2006) Pest Management Strategic Plan for Pacific Northwest Potato Production - REVISION.
  Hills, Karen, et al (2018) Safeguarding Potato Cropping Systems in the Pacific Northwest Through Improved Soil Health. Washington State University.
  Belyea S. et al (2010) Commercial Potato Production in North America. The Potato Association of America. ; Galinato, Suzette (2019) 2019 Cost Estimates of Producing Fresh and Processing Potatoes in Washington. Washington State University.
  Patterson, Paul (2015) 2014 Cost of Potato Production Study for Colorado, Idaho, Washington and Wisconsin. University of Idaho College of Agricultural and Life Sciences.
  Hills, Karen, et al (2020) Improving Soil Health in Pacific Northwest Potato Production: a Review. American Journal of Potato Research. https://link.springer.com/article/10.1007/s12230-019-09742-7
  Hirnyck, Ronda & Downey, Lisa (2006) Pest Management Strategic Plan for Pacific Northwest Potato Production - REVISION.
  Hills, Karen, et al (2018) Safeguarding Potato Cropping Systems in the Pacific Northwest Through Improved Soil Health. Washington State University.
  Belyea S. et al (2010) Commercial Potato Production in North America. The Potato Association of America.
- application of plant protection product, fumigation: 1.43668e-5 ha; lognormal variance with pedigree 0.0206, pedigree (4,4,3,1,3)
  1.44E-5 ha/kg application of plant protection product, fumigation (1. pass(es) per year).
  The field is treated with fumigant pre-planting (either in the spring before planting or fall after harvest of prior crop) to control soil-borne fungal diseases and pests. This application is distinct from application of other plant protection products. Operations are for production of russet potato (Galinato, 2019), supplemented with information from a multi-state comparison (Patterson, 2015).
  Field operations are as identified in crop- and rotation-specific enterprise crop budgets supplied by the regional agricultural extension office (state specific unless otherwise noted) and matched to equipment type in the budget or crop guidance, along with pest management documentation (Hills, et al., 2018, 2020; Hirnyck & Downey, 2006) and summary of practices for commercial production in the US (Belyea, 2010).Field operations are as identified in crop- and rotation-specific enterprise crop budgets supplied by the regional agricultural extension office (state specific unless otherwise noted) and matched to equipment type in the budget or crop guidance, along with pest management documentation (Hills, et al., 2018, 2020; Hirnyck & Downey, 2006) and summary of practices for commercial production in the US (Belyea, 2010).
  Sources:
  Galinato, Suzette (2019) 2019 Cost Estimates of Producing Fresh and Processing Potatoes in Washington. Washington State University.
  Patterson, Paul (2015) 2014 Cost of Potato Production Study for Colorado, Idaho, Washington and Wisconsin. University of Idaho College of Agricultural and Life Sciences.
  Hills, Karen, et al (2020) Improving Soil Health in Pacific Northwest Potato Production: a Review. American Journal of Potato Research. https://link.springer.com/article/10.1007/s12230-019-09742-7
  Hirnyck, Ronda & Downey, Lisa (2006) Pest Management Strategic Plan for Pacific Northwest Potato Production - REVISION.
  Hills, Karen, et al (2018) Safeguarding Potato Cropping Systems in the Pacific Northwest Through Improved Soil Health. Washington State University.
  Belyea S. et al (2010) Commercial Potato Production in North America. The Potato Association of America.
- benzo[thia]diazole-compound: 1.00741e-6 kg; lognormal variance with pedigree 0.042, pedigree (1,3,2,4,4)
  This exchange is an aggregate of proxies for applied pesticide(s) Cyazofamid , Clothianidin (3.011E-2 kg/ha {1,2,1,1,1}; 4.001E-2 kg/ha {1,4,1,1,1}, respectively).
  Average over state-wide reported cropped area of Potato for all tillage practices (OPTiS 2020) and across all rotation patterns (Socolar et al 2021) - calculated from specified herbicide/insecticide/fungicide quantity applied to treated acres weighted by share of acres treated with that herbicide/insecticide/fungicide (2014, 2016, 2018, USDA NASS data, https://quickstats.nass.usda.gov).
  From POTATO - APPLICATIONS, MEASURED IN LB / ACRE / YEAR, AVG (fertilizer and pesticides, amount, number of applications) - 2000-2021, https://quickstats.nass.usda.gov/results/910944A6-DEB0-3216-B6B4-F5BA47F1D217
  properties: carbon content, fossil 0.499869, dry mass 1 kg, wet mass 1 kg
- chlorothalonil: 3.134e-5 kg; normal variance with pedigree 8.85976e-12, pedigree (1,2,2,3,1)
  Proxy for applied pesticide(s) Chlorothalonil (2.181E+0 kg/ha {1,2,1,1,1}).
  Average over state-wide reported cropped area of Potato for all tillage practices (OPTiS 2020) and across all rotation patterns (Socolar et al 2021) - calculated from specified herbicide/insecticide/fungicide quantity applied to treated acres weighted by share of acres treated with that herbicide/insecticide/fungicide (2014, 2016, 2018, USDA NASS data, https://quickstats.nass.usda.gov).
  From POTATO - APPLICATIONS, MEASURED IN LB / ACRE / YEAR, AVG (fertilizer and pesticides, amount, number of applications) - 2000-2021, https://quickstats.nass.usda.gov/results/910944A6-DEB0-3216-B6B4-F5BA47F1D217
  properties: carbon content, fossil 0.360902, dry mass 1 kg, wet mass 1 kg
- copper oxide: 6.59243e-6 kg; normal variance with pedigree 2.04624e-11, pedigree (1,2,2,3,1)
  This exchange is an aggregate of proxies for applied pesticide(s) Copper chloride hyd. , Copper hydroxide (9.718E-2 kg/ha {1,2,1,1,1}; 3.617E-1 kg/ha {1,2,1,1,1}, respectively).
  Average over state-wide reported cropped area of Potato for all tillage practices (OPTiS 2020) and across all rotation patterns (Socolar et al 2021) - calculated from specified herbicide/insecticide/fungicide quantity applied to treated acres weighted by share of acres treated with that herbicide/insecticide/fungicide (2014, 2016, 2018, USDA NASS data, https://quickstats.nass.usda.gov).
  From POTATO - APPLICATIONS, MEASURED IN LB / ACRE / YEAR, AVG (fertilizer and pesticides, amount, number of applications) - 2000-2021, https://quickstats.nass.usda.gov/results/910944A6-DEB0-3216-B6B4-F5BA47F1D217
  properties: dry mass 1 kg, wet mass 1 kg
- cyclic N-compound: 1.74049e-5 kg; normal variance with pedigree 2.73282e-11, pedigree (1,3,2,4,4)
  This exchange is an aggregate of proxies for applied pesticide(s) Difenoconazole , Pcnb , Dimethoate , Thiamethoxam , Diquat dibromide (2.849E-2 kg/ha {1,2,1,1,1}; 8.194E-1 kg/ha {1,4,1,1,1}; 1.157E-1 kg/ha {1,4,1,1,1}; 5.269E-2 kg/ha {1,4,1,1,1}; 1.952E-1 kg/ha {1,4,1,1,1}, respectively).
  Average over state-wide reported cropped area of Potato for all tillage practices (OPTiS 2020) and across all rotation patterns (Socolar et al 2021) - calculated from specified herbicide/insecticide/fungicide quantity applied to treated acres weighted by share of acres treated with that herbicide/insecticide/fungicide (2014, 2016, 2018, USDA NASS data, https://quickstats.nass.usda.gov).
  From POTATO - APPLICATIONS, MEASURED IN LB / ACRE / YEAR, AVG (fertilizer and pesticides, amount, number of applications) - 2000-2021, https://quickstats.nass.usda.gov/results/910944A6-DEB0-3216-B6B4-F5BA47F1D217
  properties: carbon content, fossil 0.641962, dry mass 1 kg, wet mass 1 kg
- diammonium phosphate: 0.000220931 kg; normal variance with pedigree 1.28751e-9, pedigree (2,1,2,1,1)
  2.21E-4 kg diammonium phosphate/kg Potato
  Quantities of specific fertiliser are calculated based on US fertiliser market share and nutrient compositions from the International Fertilizer Association data to meet total nutrient demand N-P-K-S: 220.23--145.05--166.21--37.53 kg/ha (USDA NASS data for 2010, 2014, 2016), over reported cropped area of specified crop (includes all rotation patterns): quantity of N applied to treated acres times percent of planted potato acres treated (USDA NASS) times share of N supplied by compound in U.S. consumption mix (ecoinvent and International Fertilizer Association 2019) times mass compound per mass N in compound.
  Sources:
  USDA NASS (2021c) POTATO - APPLICATIONS, MEASURED IN LB / ACRE / YEAR, AVG (fertilizer and pesticides, amount, number of applications) - 2000-2021. US Department of Agriculture (USDA) National Agricultural Statistics Service. https://quickstats.nass.usda.gov (direct query: https://quickstats.nass.usda.gov/results/910944A6-DEB0-3216-B6B4-F5BA47F1D217); Ecoinvent U.S. consumption mix for N fertilisers, from IFA data; IFA (2021) Nutrient content in percentage - IFA Fertilizer Converter. International Fertilizer Association. https://www.ifastat.org/converter/fertilizer-converter/accessed 2021-06-24
  properties: dry mass 1 kg, nitrogen content 0.18, phosphorus content 0.200754, wet mass 1 kg
  note on nitrogen content: Nitrogen content (on a dry matter basis) of diammonium phosphate is calculated from the molecular formula of the nutrient present in the substance.
  note on phosphorus content: Phosphorus content (on a dry matter basis) of diammonium phosphate is calculated from the molecular formula of the nutrient present in the substance.
- diazole-compound: 1.95033e-6 kg; normal variance with pedigree 4.70476e-13, pedigree (1,2,2,4,4)
  This exchange is an aggregate of proxies for applied pesticide(s) Fluxapyroxad , Chlorantraniliprole , Fipronil , Imidacloprid (4.575E-2 kg/ha {1,4,1,1,1}; 5.604E-3 kg/ha {1,4,1,1,1}; 4.131E-2 kg/ha {1,4,1,1,1}; 4.308E-2 kg/ha {1,4,1,1,1}, respectively).
  Average over state-wide reported cropped area of Potato for all tillage practices (OPTiS 2020) and across all rotation patterns (Socolar et al 2021) - calculated from specified herbicide/insecticide/fungicide quantity applied to treated acres weighted by share of acres treated with that herbicide/insecticide/fungicide (2014, 2016, 2018, USDA NASS data, https://quickstats.nass.usda.gov).
  From POTATO - APPLICATIONS, MEASURED IN LB / ACRE / YEAR, AVG (fertilizer and pesticides, amount, number of applications) - 2000-2021, https://quickstats.nass.usda.gov/results/910944A6-DEB0-3216-B6B4-F5BA47F1D217
  properties: carbon content, fossil 0.541859, dry mass 1 kg, wet mass 1 kg
- dimethenamide: 7.31079e-7 kg; lognormal variance with pedigree 0.001, pedigree (1,2,2,3,1)
  Proxy for applied pesticide(s) Dimethenamid (5.089E-2 kg/ha {1,4,1,1,1}).
  Average over state-wide reported cropped area of Potato for all tillage practices (OPTiS 2020) and across all rotation patterns (Socolar et al 2021) - calculated from specified herbicide/insecticide/fungicide quantity applied to treated acres weighted by share of acres treated with that herbicide/insecticide/fungicide (2014, 2016, 2018, USDA NASS data, https://quickstats.nass.usda.gov).
  From POTATO - APPLICATIONS, MEASURED IN LB / ACRE / YEAR, AVG (fertilizer and pesticides, amount, number of applications) - 2000-2021, https://quickstats.nass.usda.gov/results/910944A6-DEB0-3216-B6B4-F5BA47F1D217
  properties: carbon content, fossil 0.521739, dry mass 1 kg, wet mass 1 kg
- dinitroaniline-compound: 1.0352e-5 kg; normal variance with pedigree 2.08619e-11, pedigree (1,3,2,4,4)
  This exchange is an aggregate of proxies for applied pesticide(s) Azoxystrobin , Famoxadone , Pyraclostrobin , Pyrimethanil , Pendimethalin (1.046E-1 kg/ha {1,2,1,1,1}; 5.573E-2 kg/ha {1,2,1,1,1}; 7.487E-2 kg/ha {1,4,1,1,1}; 1.266E-1 kg/ha {1,4,1,1,1}; 3.588E-1 kg/ha {1,4,1,1,1}, respectively).
  Average over state-wide reported cropped area of Potato for all tillage practices (OPTiS 2020) and across all rotation patterns (Socolar et al 2021) - calculated from specified herbicide/insecticide/fungicide quantity applied to treated acres weighted by share of acres treated with that herbicide/insecticide/fungicide (2014, 2016, 2018, USDA NASS data, https://quickstats.nass.usda.gov).
  From POTATO - APPLICATIONS, MEASURED IN LB / ACRE / YEAR, AVG (fertilizer and pesticides, amount, number of applications) - 2000-2021, https://quickstats.nass.usda.gov/results/910944A6-DEB0-3216-B6B4-F5BA47F1D217
  properties: carbon content, fossil 0.55516, dry mass 1 kg, wet mass 1 kg
- fertilising, by broadcaster: 2.00547e-5 ha; lognormal variance with pedigree 0.0206, pedigree (4,4,3,1,3)
  2.01E-5 ha/kg fertilising, by broadcaster (1.396 pass(es) per year).
  The dataset has an effective number of passes for application of mineral fertilisers of 15.05: 6.90 N applications on 98.3% of cropped area, 3.10 P applications on 91.3% of cropped area, 2.53 K applications on 90.7% of cropped area, and 3.73 S applications on 84.0% of cropped area (USDA NASS 2021c, data available for 2016 only). The necessary passes used to apply broadcast N are sufficient to supply the necessary PKS so additional passes beyond that for N application are not required. Applications of N are split between anhydrous ammonia and other NPK fertilsers because they are generally applied differently, with different equipment. Anhydrous ammonia application (knifing/injection) is calculated as market share of N that is anhydrous ammonia * total N applications. Other N application is then: total USDA N applications less applications of anhydrous ammonia. The market share of N that is anhydrous ammonia is calculated from fertiliser market group shares crossed with meeting NPKS nutrient demand (here, 80.34%). Thus, the dataset includes 5.45 anhydrous ammonia applications via injection (5.54 * 98.3% of crop area with applied N) and 9.6 other fertiliser applications via broadcast. Operations are for production of russet potato (Galinato, 2019), supplemented with information from a multi-state comparison (Patterson, 2015).
  Field operations are as identified in crop- and rotation-specific enterprise crop budgets supplied by the regional agricultural extension office (state specific unless otherwise noted) and matched to equipment type in the budget or crop guidance, along with pest management documentation (Hills, et al., 2018, 2020; Hirnyck & Downey, 2006) and summary of practices for commercial production in the US (Belyea, 2010). Field operations are as identified in crop- and rotation-specific enterprise crop budgets supplied by the regional agricultural extension office (state specific unless otherwise noted) and matched to equipment type in the budget or crop guidance, along with pest management documentation (Hills, et al., 2018, 2020; Hirnyck & Downey, 2006) and summary of practices for commercial production in the US (Belyea, 2010).
  Sources:
  Galinato, Suzette (2019) 2019 Cost Estimates of Producing Fresh and Processing Potatoes in Washington. Washington State University.
  Patterson, Paul (2015) 2014 Cost of Potato Production Study for Colorado, Idaho, Washington and Wisconsin. University of Idaho College of Agricultural and Life Sciences.
  Hills, Karen, et al (2020) Improving Soil Health in Pacific Northwest Potato Production: a Review. American Journal of Potato Research. https://link.springer.com/article/10.1007/s12230-019-09742-7
  Hirnyck, Ronda & Downey, Lisa (2006) Pest Management Strategic Plan for Pacific Northwest Potato Production - REVISION.
  Hills, Karen, et al (2018) Safeguarding Potato Cropping Systems in the Pacific Northwest Through Improved Soil Health. Washington State University.
  Belyea S. et al (2010) Commercial Potato Production in North America. The Potato Association of America.
  USDA NASS (2021c) POTATO - APPLICATIONS, MEASURED IN LB / ACRE / YEAR, AVG (fertilizer and pesticides, amount, number of applications) - 2000-2021. US Department of Agriculture (USDA) National Agricultural Statistics Service. https://quickstats.nass.usda.gov (direct query: https://quickstats.nass.usda.gov/results/910944A6-DEB0-3216-B6B4-F5BA47F1D217)
- fertilising, by injection: 8.19499e-5 ha; lognormal variance with pedigree 0.0206, pedigree (4,4,3,1,3)
  8.19E-5 ha/kg fertilising, by injection (5.704 pass(es) per year).
  The dataset has an effective number of passes for application of mineral fertilisers of 15.05: 6.90 N applications on 98.3% of cropped area, 3.10 P applications on 91.3% of cropped area, 2.53 K applications on 90.7% of cropped area, and 3.73 S applications on 84.0% of cropped area (USDA NASS 2021c, data available for 2016 only). The necessary passes used to apply broadcast N are sufficient to supply the necessary PKS so additional passes beyond that for N application are not required. Applications of N are split between anhydrous ammonia and other NPK fertilsers because they are generally applied differently, with different equipment. Anhydrous ammonia application (knifing/injection) is calculated as market share of N that is anhydrous ammonia * total N applications. Other N application is then: total USDA N applications less applications of anhydrous ammonia. The market share of N that is anhydrous ammonia is calculated from fertiliser market group shares crossed with meeting NPKS nutrient demand (here, 80.34%). Thus, the dataset includes 5.45 anhydrous ammonia applications via injection (5.54 * 98.3% of crop area with applied N) and 9.6 other fertiliser applications via broadcast. Operations are for production of russet potato (Galinato, 2019), supplemented with information from a multi-state comparison (Patterson, 2015).
  Field operations are as identified in crop- and rotation-specific enterprise crop budgets supplied by the regional agricultural extension office (state specific unless otherwise noted) and matched to equipment type in the budget or crop guidance, along with pest management documentation (Hills, et al., 2018, 2020; Hirnyck & Downey, 2006) and summary of practices for commercial production in the US (Belyea, 2010). Field operations are as identified in crop- and rotation-specific enterprise crop budgets supplied by the regional agricultural extension office (state specific unless otherwise noted) and matched to equipment type in the budget or crop guidance, along with pest management documentation (Hills, et al., 2018, 2020; Hirnyck & Downey, 2006) and summary of practices for commercial production in the US (Belyea, 2010).
  Sources:
  Galinato, Suzette (2019) 2019 Cost Estimates of Producing Fresh and Processing Potatoes in Washington. Washington State University.
  Patterson, Paul (2015) 2014 Cost of Potato Production Study for Colorado, Idaho, Washington and Wisconsin. University of Idaho College of Agricultural and Life Sciences.
  Hills, Karen, et al (2020) Improving Soil Health in Pacific Northwest Potato Production: a Review. American Journal of Potato Research. https://link.springer.com/article/10.1007/s12230-019-09742-7
  Hirnyck, Ronda & Downey, Lisa (2006) Pest Management Strategic Plan for Pacific Northwest Potato Production - REVISION.
  Hills, Karen, et al (2018) Safeguarding Potato Cropping Systems in the Pacific Northwest Through Improved Soil Health. Washington State University.
  Belyea S. et al (2010) Commercial Potato Production in North America. The Potato Association of America.
  USDA NASS (2021c) POTATO - APPLICATIONS, MEASURED IN LB / ACRE / YEAR, AVG (fertilizer and pesticides, amount, number of applications) - 2000-2021. US Department of Agriculture (USDA) National Agricultural Statistics Service. https://quickstats.nass.usda.gov (direct query: https://quickstats.nass.usda.gov/results/910944A6-DEB0-3216-B6B4-F5BA47F1D217)
- glyphosate: 3.82451e-6 kg; normal variance with pedigree 1.99233e-12, pedigree (1,2,2,3,1)
  Proxy for applied pesticide(s) Glyphosate iso. Salt (2.662E-1 kg/ha {1,4,1,1,1}).
  Average over state-wide reported cropped area of Potato for all tillage practices (OPTiS 2020) and across all rotation patterns (Socolar et al 2021) - calculated from specified herbicide/insecticide/fungicide quantity applied to treated acres weighted by share of acres treated with that herbicide/insecticide/fungicide (2014, 2016, 2018, USDA NASS data, https://quickstats.nass.usda.gov).
  From POTATO - APPLICATIONS, MEASURED IN LB / ACRE / YEAR, AVG (fertilizer and pesticides, amount, number of applications) - 2000-2021, https://quickstats.nass.usda.gov/results/910944A6-DEB0-3216-B6B4-F5BA47F1D217
  properties: carbon content, fossil 0.214286, dry mass 1 kg, wet mass 1 kg
- harvesting, by potato harvester: 1.50852e-5 ha; lognormal variance with pedigree 0.0206, pedigree (4,4,3,1,3)
  1.51E-5 ha/kg harvesting, by potato harvester (1.05 pass(es) per year).
  Used with harvester cart. Single pass harvesting including the use of windrower(s). The dataset considers 5% harvest debris in all harvesting, digging and grading field operations picked up during harvesting (see, e.g., Galinato, 2019). The inclusion of this debris enables the dataset to account for the energy required to move/transport the additional mass extracted during the harvesting. Operations are for production of russet potato (Galinato, 2019), supplemented with information from a multi-state comparison (Patterson, 2015).
  Field operations are as identified in crop- and rotation-specific enterprise crop budgets supplied by the regional agricultural extension office (state specific unless otherwise noted) and matched to equipment type in the budget or crop guidance, along with pest management documentation (Hills, et al., 2018, 2020; Hirnyck & Downey, 2006) and summary of practices for commercial production in the US (Belyea, 2010).Field operations are as identified in crop- and rotation-specific enterprise crop budgets supplied by the regional agricultural extension office (state specific unless otherwise noted) and matched to equipment type in the budget or crop guidance, along with pest management documentation (Hills, et al., 2018, 2020; Hirnyck & Downey, 2006) and summary of practices for commercial production in the US (Belyea, 2010).
  Sources:
  Galinato, Suzette (2019) 2019 Cost Estimates of Producing Fresh and Processing Potatoes in Washington. Washington State University.
  Patterson, Paul (2015) 2014 Cost of Potato Production Study for Colorado, Idaho, Washington and Wisconsin. University of Idaho College of Agricultural and Life Sciences.
  Hills, Karen, et al (2020) Improving Soil Health in Pacific Northwest Potato Production: a Review. American Journal of Potato Research. https://link.springer.com/article/10.1007/s12230-019-09742-7
  Hirnyck, Ronda & Downey, Lisa (2006) Pest Management Strategic Plan for Pacific Northwest Potato Production - REVISION.
  Hills, Karen, et al (2018) Safeguarding Potato Cropping Systems in the Pacific Northwest Through Improved Soil Health. Washington State University.
  Belyea S. et al (2010) Commercial Potato Production in North America. The Potato Association of America.
- harvesting, use of harvesting cart: 1.50852e-5 kg; lognormal variance with pedigree 0.0206, pedigree (4,4,3,1,3)
  1.51E-5 ha/kg harvesting, use of harvesting cart (1.05 pass(es) per year).
  Used with potato harvester. The dataset considers 5% harvest debris in all harvesting, digging and grading field operations picked up during harvesting (see, e.g., Galinato, 2019). The inclusion of this debris enables the dataset to account for the energy required to move/transport the additional mass extracted during the harvesting. Operations are for production of russet potato (Galinato, 2019), supplemented with information from a multi-state comparison (Patterson, 2015).
  Field operations are as identified in crop- and rotation-specific enterprise crop budgets supplied by the regional agricultural extension office (state specific unless otherwise noted) and matched to equipment type in the budget or crop guidance, along with pest management documentation (Hills, et al., 2018, 2020; Hirnyck & Downey, 2006) and summary of practices for commercial production in the US (Belyea, 2010).Field operations are as identified in crop- and rotation-specific enterprise crop budgets supplied by the regional agricultural extension office (state specific unless otherwise noted) and matched to equipment type in the budget or crop guidance, along with pest management documentation (Hills, et al., 2018, 2020; Hirnyck & Downey, 2006) and summary of practices for commercial production in the US (Belyea, 2010).
  Sources:
  Galinato, Suzette (2019) 2019 Cost Estimates of Producing Fresh and Processing Potatoes in Washington. Washington State University.
  Patterson, Paul (2015) 2014 Cost of Potato Production Study for Colorado, Idaho, Washington and Wisconsin. University of Idaho College of Agricultural and Life Sciences.
  Hills, Karen, et al (2020) Improving Soil Health in Pacific Northwest Potato Production: a Review. American Journal of Potato Research. https://link.springer.com/article/10.1007/s12230-019-09742-7
  Hirnyck, Ronda & Downey, Lisa (2006) Pest Management Strategic Plan for Pacific Northwest Potato Production - REVISION.
  Hills, Karen, et al (2018) Safeguarding Potato Cropping Systems in the Pacific Northwest Through Improved Soil Health. Washington State University.
  Belyea S. et al (2010) Commercial Potato Production in North America. The Potato Association of America.
- irrigation: 0.0351138 m3; lognormal variance with pedigree 0.0038, pedigree (1,3,3,1,2)
  2,444.1 m3/ha (3.51E-2 m3/kg Potato) irrigation. Water applied for irrigation (7,627 m3/irrigated ha, 2013, 2018 from USDA NASS (2018)), weighted by the share of acres irrigated (32.%, average over 2010-2018 from USDA NASS (2021); percent of harvested irrigated acres not reported 2019-2021).
  Sources:
  USDA NASS (2018c) 2018 Irrigation and Water Management Survey (2017 Census of Agriculture). US Department of Agriculture (USDA). https://www.nass.usda.gov/Publications/AgCensus/2017/Online_Resources/Farm_and_Ranch_Irrigation_Survey/index.php
  USDA NASS (2021f) Corn, Grain, Irrigated - Acres Harvested 2000-2021; Corn, Grain, Non-Irrigated - Acres Harvested 2000-2018. US Department of Agriculture (USDA). https://quickstats.nass.usda.gov
  properties: dry mass 0.11 kg, water content 9089.91, wet mass 1000 kg
- land use change, annual crop: 2.17478e-6 ha; lognormal variance with pedigree 0.082025, pedigree (1,1,3,2,1)
  Calculated value from ecoinvent Crop LCI tool, 0.15137 divided by the yield in kg/ha. Land use change is allocated to all crops and activities that grew in the last 20 years for the US, and only to them, according to their respective area increase. Crop production and natural land areas in all countries use data from 1989 to 2012 (FAOSTAT 2012), as well as for country climates and soil types (EU-JRC 2010c). Crops for which planted area decreased are not attributed LUC impacts or credits. Land use change (LUC) combines land transformation areas calculated with the adapted 'Direct Land Use Change Assessment Tool' version 2014 developed by Blonk Consultants and the carbon losses from soil organic carbon (SOC) and vegetation (VEG) as calculated in ecoinvent v3. See 'WFLDB-Guidelines.pdf', available at https://ecoquery.ecoinvent.org/File/Reports.
  Area cultivated for Potato in Washington decreased by4%(USDA NASS data)comparing five year rolling averages for the beginning and end of the 20 year time horizon
- limestone and gypsum application, by spreader: 8.4124e-7 ha; lognormal variance with pedigree 0.1381, pedigree (4,2,3,1,3)
  {4,2,2,1,3} 0.059 ha/ha (8.41E-7 ha/kg Potato), calculated as the fraction of crop area treated with lime (40.99%, from state level estimated agricultural acres with pH <6.1, Bruulsema T and Jones J D 2021) / (7 years between applications, based on Bruulsema T and Jones J D 2021).
  Lime is applied to all soils with pH below 6 based on expert guidance (Sawyer JE 2020). Cropped area needing liming is determined from distribution of soil pH sampling results reported in the 2020 Soil Test Summary (Bruulsema and Jones 2021). The share of acidic soils is likely overestimated as more more frequent testing is to be expected on soils having needed lime and thus low pH soils are likely to be more represented amongst the collected samples. (Mallarino A P, Pagani A, Sawyer J E 2011; Fernández F G and Hoeft R G 2012; Bly A and Gelderman R 2019; Shaver T M 2014) Fernández F G and Hoeft R G (2012a) Managing Soil pH and Crop Nutrients. Chapter 8 in the Illinois Agronomy Handbook.Crop Science Extension & Outreach, University of Illinois . http://extension.cropsciences.illinois.edu/handbook/pdfs/chapter08.pdf
  Sources:
  Bruulsema T and Jones J D (2021) Soil Test Summary 2020. Foundation for Agronomic Research and Plant Nutrition Canada present this 2020 summary of soil test levels in North America. Foundation for Agronomic Research, Plant Nutrition Canada. https://soiltest.tfi.org/about/about_soil_test_summaryaccessed August 30, 2021; Fernández F G and Hoeft R G (2012a) Managing Soil pH and Crop Nutrients. Chapter 8 in the Illinois Agronomy Handbook.Crop Science Extension & Outreach, University of Illinois . http://extension.cropsciences.illinois.edu/handbook/pdfs/chapter08.pdf; Shaver T M (2014) Nutrient Management for Agronomic Crops in Nebraska (rev Dec 2014). The University of Nebraska Institute of Agriculture and Natural Resources. https://extensionpublications.unl.edu/assets/pdf/ec155.pdfaccessed August 30, 2021; Bly A and Gelderman R (2019) Chapter: 25 Liming South Dakota Soils . SDSU Extension . https://extension.sdstate.edu/sites/default/files/2019-09/S-0003-25-Corn.pdf; Mallarino A P, Pagani A, Sawyer J E (2011) Corn and soybean response to soil pH level and liming. Paper presented at the 2011 Integrated Crop Management Conference. Iowa State University.Cooperative Extension Service, Iowa State University of Science and Technology. https://core.ac.uk/download/pdf/128983337.pdfaccessed November 17, 2021
- limestone, crushed, washed: 0.00415749 kg; lognormal variance with pedigree 0.1381, pedigree (4,2,3,1,3)
  {4,2,2,1,3} Application of limestone to raise soil pH, 289.38 kg/ha (4.16E-3 kg/kg Potato), calculated as the (mass of lime applied to treated acres (2 t/treated ha)) * fraction of crop area treated with lime (40.99%, from soil pH data from Bruulsema T and Jones J D 2021) / (7 years between applications, based on Fernández F G and Hoeft R G 2012a).
  Lime is applied to all soils with pH below 6 based on expert guidance (Sawyer JE 2020). Cropped area needing liming is determined from distribution of soil pH sampling results reported in the 2020 Soil Test Summary (Bruulsema and Jones 2021). The share of acidic soils is likely overestimated as more more frequent testing is to be expected on soils having needed lime and thus low pH soils are likely to be more represented amongst the collected samples. (Mallarino A P, Pagani A, Sawyer J E 2011; Fernández F G and Hoeft R G 2012; Bly A and Gelderman R 2019; Shaver T M 2014) The increase in pH with lime application remains dominant through at least 4 years from application and guidance suggests 4 to 10 years beween applications (Fernández F G and Hoeft R G 2012).
  Sources:
  Bruulsema T and Jones J D (2021) Soil Test Summary 2020. Foundation for Agronomic Research and Plant Nutrition Canada present this 2020 summary of soil test levels in North America. Foundation for Agronomic Research, Plant Nutrition Canada. https://soiltest.tfi.org/about/about_soil_test_summaryaccessed August 30, 2021; Fernández F G and Hoeft R G (2012a) Managing Soil pH and Crop Nutrients. Chapter 8 in the Illinois Agronomy Handbook.Crop Science Extension & Outreach, University of Illinois . http://extension.cropsciences.illinois.edu/handbook/pdfs/chapter08.pdf; Shaver T M (2014) Nutrient Management for Agronomic Crops in Nebraska (rev Dec 2014). The University of Nebraska Institute of Agriculture and Natural Resources. https://extensionpublications.unl.edu/assets/pdf/ec155.pdfaccessed August 30, 2021; Bly A and Gelderman R (2019) Chapter: 25 Liming South Dakota Soils . SDSU Extension . https://extension.sdstate.edu/sites/default/files/2019-09/S-0003-25-Corn.pdf; Mallarino A P, Pagani A, Sawyer J E (2011) Corn and soybean response to soil pH level and liming. Paper presented at the 2011 Integrated Crop Management Conference. Iowa State University.Cooperative Extension Service, Iowa State University of Science and Technology. https://core.ac.uk/download/pdf/128983337.pdfaccessed November 17, 2021
  properties: carbon content, fossil 0.117257, dry mass 0.998 kg, water content 0.00200401, wet mass 1 kg
  note on carbon content, fossil: Table 3.1, ecoinvent v2.2 report 7, part VII, pg 3. MW CaCO3=100, MW MgCO3=84. C content of limestone is 0.117257 kg/kg DM
- maleic hydrazide: 9.81844e-6 kg; normal variance with pedigree 8.15031e-12, pedigree (1,2,2,3,1)
  Proxy for applied pesticide(s) Maleic hydrazide, potassium salt (6.834E-1 kg/ha {1,4,1,1,1}).
  Average over state-wide reported cropped area of Potato for all tillage practices (OPTiS 2020) and across all rotation patterns (Socolar et al 2021) - calculated from specified herbicide/insecticide/fungicide quantity applied to treated acres weighted by share of acres treated with that herbicide/insecticide/fungicide (2014, 2016, 2018, USDA NASS data, https://quickstats.nass.usda.gov).
  From POTATO - APPLICATIONS, MEASURED IN LB / ACRE / YEAR, AVG (fertilizer and pesticides, amount, number of applications) - 2000-2021, https://quickstats.nass.usda.gov/results/910944A6-DEB0-3216-B6B4-F5BA47F1D217
- metolachlor: 4.52935e-6 kg; normal variance with pedigree 2.84284e-13, pedigree (1,2,2,3,1)
  This exchange is an aggregate of proxies for applied pesticide(s) Metolachlor , S-metolachlor (1.228E-1 kg/ha {1,4,1,1,1}; 1.925E-1 kg/ha {1,4,1,1,1}, respectively).
  Average over state-wide reported cropped area of Potato for all tillage practices (OPTiS 2020) and across all rotation patterns (Socolar et al 2021) - calculated from specified herbicide/insecticide/fungicide quantity applied to treated acres weighted by share of acres treated with that herbicide/insecticide/fungicide (2014, 2016, 2018, USDA NASS data, https://quickstats.nass.usda.gov).
  From POTATO - APPLICATIONS, MEASURED IN LB / ACRE / YEAR, AVG (fertilizer and pesticides, amount, number of applications) - 2000-2021, https://quickstats.nass.usda.gov/results/910944A6-DEB0-3216-B6B4-F5BA47F1D217
  properties: carbon content, fossil 0.633803, dry mass 1 kg, wet mass 1 kg
- monoammonium phosphate: 0.00178476 kg; normal variance with pedigree 8.40228e-8, pedigree (2,1,2,1,1)
  1.78E-3 kg monoammonium phosphate/kg Potato
  Quantities of specific fertiliser are calculated based on US fertiliser market share and nutrient compositions from the International Fertilizer Association data to meet total nutrient demand N-P-K-S: 220.23--145.05--166.21--37.53 kg/ha (USDA NASS data for 2010, 2014, 2016), over reported cropped area of specified crop (includes all rotation patterns): quantity of N applied to treated acres times percent of planted potato acres treated (USDA NASS) times share of N supplied by compound in U.S. consumption mix (ecoinvent and International Fertilizer Association 2019) times mass compound per mass N in compound.
  Sources:
  USDA NASS (2021c) POTATO - APPLICATIONS, MEASURED IN LB / ACRE / YEAR, AVG (fertilizer and pesticides, amount, number of applications) - 2000-2021. US Department of Agriculture (USDA) National Agricultural Statistics Service. https://quickstats.nass.usda.gov (direct query: https://quickstats.nass.usda.gov/results/910944A6-DEB0-3216-B6B4-F5BA47F1D217); Ecoinvent U.S. consumption mix for N fertilisers, from IFA data; IFA (2021) Nutrient content in percentage - IFA Fertilizer Converter. International Fertilizer Association. https://www.ifastat.org/converter/fertilizer-converter/accessed 2021-06-24
  properties: dry mass 1 kg, nitrogen content 0.084, phosphorus content 0.226939, wet mass 1 kg
  note on nitrogen content: Nitrogen content (on a dry matter basis) of monoammonium phosphate is calculated from the molecular formula of the nutrient present in the substance.
  note on phosphorus content: Phosphorus content (on a dry matter basis) of monoammonium phosphate is calculated from the molecular formula of the nutrient present in the substance.
- organophosphorus-compound, unspecified: 4.25073e-6 kg; normal variance with pedigree 7.87802e-13, pedigree (1,3,2,4,4)
  This exchange is an aggregate of proxies for applied pesticide(s) Glufosinate-ammonium , Beta-cyfluthrin , Cyfluthrin , Ethoprop , Phosmet (7.678E-2 kg/ha {1,4,1,1,1}; 1.071E-2 kg/ha {1,4,1,1,1}; 2.825E-3 kg/ha {1,4,1,1,1}; 1.793E-1 kg/ha {1,4,1,1,1}; 2.623E-2 kg/ha {1,4,1,1,1}, respectively).
  Average over state-wide reported cropped area of Potato for all tillage practices (OPTiS 2020) and across all rotation patterns (Socolar et al 2021) - calculated from specified herbicide/insecticide/fungicide quantity applied to treated acres weighted by share of acres treated with that herbicide/insecticide/fungicide (2014, 2016, 2018, USDA NASS data, https://quickstats.nass.usda.gov).
  From POTATO - APPLICATIONS, MEASURED IN LB / ACRE / YEAR, AVG (fertilizer and pesticides, amount, number of applications) - 2000-2021, https://quickstats.nass.usda.gov/results/910944A6-DEB0-3216-B6B4-F5BA47F1D217
  properties: carbon content, fossil 0.260898, dry mass 1 kg, wet mass 1 kg
- packaging, for fertilisers: 0.0313496 kg; name packaging_f; lognormal variance with pedigree 0.1708, pedigree (4,3,2,5,4)
  The total amount of mineral and/or synthetic fertilisers needed for the production of Potato is calculated to be circa 415.36kg/ha. The total amount of applied mineral fertiliser is doubled to account for the packaging of the diluted product. Lime is not delivered packaged. Thus, 0.031 kg/ha of packaging for fertilisers is calculated with this exchange.
  properties: carbon content, fossil 0.825301, dry mass 1 kg, price 0.0642 EUR2005, wet mass 1 kg
  note on carbon content, fossil: Considering a chemical formula (C2H4)n for polyethylene, carbon content-fossil is calculated to be 0.856286 kg of Carbon per kg of dry mass.
- packaging, for pesticides: 0.00395027 kg; name packaging_p; lognormal variance with pedigree 0.1708, pedigree (4,3,2,5,4)
  Total amount of active substance/s of pesticides used for the production of potato is calculated to be about 137.48 kg/ha (2014, 2016, 2018, USDA NASS data). The total amount of active substance/s is doubled in order to account for the packaging of the dilluted product of pesticides that are applied. Therefore, 274.96kg of packaging for pesticides per ha of Potato( 3.95E-3kg/kg) is calculated with this exchange.
  properties: carbon content, fossil 0.85714, dry mass 1 kg, price 0.0642 EUR2005, wet mass 1 kg
- pesticide, unspecified: 1.23414e-6 kg; normal variance with pedigree 1.21237e-15, pedigree (1,2,2,3,1)
  This exchange is an aggregate of proxies for applied pesticide(s) Abamectin, Clothianidin, Fipronil (4.573E-3 kg/ha {1,4,1,1,1}; 4.001E-2 kg/ha {1,4,1,1,1}; 4.131E-2 kg/ha {1,4,1,1,1}, respectively).
  Average over state-wide reported cropped area of Potato for all tillage practices (OPTiS 2020) and across all rotation patterns (Socolar et al 2021) - calculated from specified herbicide/insecticide/fungicide quantity applied to treated acres weighted by share of acres treated with that herbicide/insecticide/fungicide (2014, 2016, 2018, USDA NASS data, https://quickstats.nass.usda.gov).
  From POTATO - APPLICATIONS, MEASURED IN LB / ACRE / YEAR, AVG (fertilizer and pesticides, amount, number of applications) - 2000-2021, https://quickstats.nass.usda.gov/results/910944A6-DEB0-3216-B6B4-F5BA47F1D217
  properties: carbon content, fossil 0.486978, dry mass 1 kg, wet mass 1 kg
- phenoxy-compound: 6.05004e-6 kg; normal variance with pedigree 2.15765e-12, pedigree (1,3,2,3,4)
  This exchange is an aggregate of proxies for applied pesticide(s) Mandipropamide techn , Triphenyltin hydrox. , Propargite , Spinosad , Spiromesifen , Spirotetramat (2.024E-2 kg/ha {1,4,1,1,1}; 2.192E-2 kg/ha {1,4,1,1,1}; 2.257E-1 kg/ha {1,4,1,1,1}; 1.765E-2 kg/ha {1,4,1,1,1}; 9.398E-2 kg/ha {1,4,1,1,1}; 4.161E-2 kg/ha {1,4,1,1,1}, respectively).
  Average over state-wide reported cropped area of Potato for all tillage practices (OPTiS 2020) and across all rotation patterns (Socolar et al 2021) - calculated from specified herbicide/insecticide/fungicide quantity applied to treated acres weighted by share of acres treated with that herbicide/insecticide/fungicide (2014, 2016, 2018, USDA NASS data, https://quickstats.nass.usda.gov).
  From POTATO - APPLICATIONS, MEASURED IN LB / ACRE / YEAR, AVG (fertilizer and pesticides, amount, number of applications) - 2000-2021, https://quickstats.nass.usda.gov/results/910944A6-DEB0-3216-B6B4-F5BA47F1D217
  properties: carbon content, fossil 0.532559, dry mass 1 kg, wet mass 1 kg
- phosphoric acid, fertiliser grade, without water, in 70% solution state: 1.79806e-5 kg; lognormal variance with pedigree 0.041, pedigree (1,2,2,3,4)
  This exchange is an aggregate of proxies for applied pesticide(s) Mono-potassium salt , Phosphorous acid (1.682E-1 kg/ha {1,4,1,1,1}; 1.083E+0 kg/ha {1,4,1,1,1}, respectively).
  Average over state-wide reported cropped area of Potato for all tillage practices (OPTiS 2020) and across all rotation patterns (Socolar et al 2021) - calculated from specified herbicide/insecticide/fungicide quantity applied to treated acres weighted by share of acres treated with that herbicide/insecticide/fungicide (2014, 2016, 2018, USDA NASS data, https://quickstats.nass.usda.gov).
  From POTATO - APPLICATIONS, MEASURED IN LB / ACRE / YEAR, AVG (fertilizer and pesticides, amount, number of applications) - 2000-2021, https://quickstats.nass.usda.gov/results/910944A6-DEB0-3216-B6B4-F5BA47F1D217
  properties: dry mass 1 kg, wet mass 1 kg
- planting, potato: 1.43668e-5 ha; lognormal variance with pedigree 0.0206, pedigree (4,4,3,1,3)
  1.44E-5 ha/kg potato planting (1. pass(es) per year).
  The cutting and chemical treatment of seed potato are included in the process for seed potato production for setting.
  Operations are for production of russet potato (Galinato, 2019), supplemented with information from a multi-state comparison (Patterson, 2015).
  Field operations are as identified in crop- and rotation-specific enterprise crop budgets supplied by the regional agricultural extension office (state specific unless otherwise noted) and matched to equipment type in the budget or crop guidance, along with pest management documentation (Hills, et al., 2018, 2020; Hirnyck & Downey, 2006) and summary of practices for commercial production in the US (Belyea, 2010).Field operations are as identified in crop- and rotation-specific enterprise crop budgets supplied by the regional agricultural extension office (state specific unless otherwise noted) and matched to equipment type in the budget or crop guidance, along with pest management documentation (Hills, et al., 2018, 2020; Hirnyck & Downey, 2006) and summary of practices for commercial production in the US (Belyea, 2010).
  Sources:
  Galinato, Suzette (2019) 2019 Cost Estimates of Producing Fresh and Processing Potatoes in Washington. Washington State University.
  Patterson, Paul (2015) 2014 Cost of Potato Production Study for Colorado, Idaho, Washington and Wisconsin. University of Idaho College of Agricultural and Life Sciences.
  Hills, Karen, et al (2020) Improving Soil Health in Pacific Northwest Potato Production: a Review. American Journal of Potato Research. https://link.springer.com/article/10.1007/s12230-019-09742-7
  Hirnyck, Ronda & Downey, Lisa (2006) Pest Management Strategic Plan for Pacific Northwest Potato Production - REVISION.
  Hills, Karen, et al (2018) Safeguarding Potato Cropping Systems in the Pacific Northwest Through Improved Soil Health. Washington State University.
  Belyea S. et al (2010) Commercial Potato Production in North America. The Potato Association of America.
- potassium chloride: 0.00142786 kg; normal variance with pedigree 4.92012e-7, pedigree (2,1,2,1,1)
  1.43E-3 kg potassium chloride/kg Potato
  Quantities of specific fertiliser are calculated based on US fertiliser market share and nutrient compositions from the International Fertilizer Association data to meet total nutrient demand N-P-K-S: 220.23--145.05--166.21--37.53 kg/ha (USDA NASS data for 2010, 2014, 2016). Quantity of specific fertiliser calculated from: average total N application (2010, 2014, 2016, 2018) reported cropped area of specified crop (includes all rotation patterns) and share of fertilisers in U.S. consumption mix (ecoinvent and International Fertilizer Association 2019) times each fertiliser's K2O to N ratio (International Fertilizer Association), subtracted from the application rate for the necessary nutrient, and multiplied by the mass of the compound over the mass of K2O in the compound.
  Sources:
  USDA NASS (2021c) POTATO - APPLICATIONS, MEASURED IN LB / ACRE / YEAR, AVG (fertilizer and pesticides, amount, number of applications) - 2000-2021. US Department of Agriculture (USDA) National Agricultural Statistics Service. https://quickstats.nass.usda.gov (direct query: https://quickstats.nass.usda.gov/results/910944A6-DEB0-3216-B6B4-F5BA47F1D217); Ecoinvent U.S. consumption mix for N fertilisers, from IFA data; IFA (2021) Nutrient content in percentage - IFA Fertilizer Converter. International Fertilizer Association. https://www.ifastat.org/converter/fertilizer-converter/accessed 2021-06-24
  properties: dry mass 1 kg, wet mass 1 kg
- potassium nitrate: 0.000447838 kg; normal variance with pedigree 5.29031e-9, pedigree (2,1,2,1,1)
  4.48E-4 kg potassium nitrate/kg Potato
  Quantities of specific fertiliser are calculated based on US fertiliser market share and nutrient compositions from the International Fertilizer Association data to meet total nutrient demand N-P-K-S: 220.23--145.05--166.21--37.53 kg/ha (USDA NASS data for 2010, 2014, 2016), over reported cropped area of specified crop (includes all rotation patterns): quantity of N applied to treated acres times percent of planted potato acres treated (USDA NASS) times share of N supplied by compound in U.S. consumption mix (ecoinvent and International Fertilizer Association 2019) times mass compound per mass N in compound.
  Sources:
  USDA NASS (2021c) POTATO - APPLICATIONS, MEASURED IN LB / ACRE / YEAR, AVG (fertilizer and pesticides, amount, number of applications) - 2000-2021. US Department of Agriculture (USDA) National Agricultural Statistics Service. https://quickstats.nass.usda.gov (direct query: https://quickstats.nass.usda.gov/results/910944A6-DEB0-3216-B6B4-F5BA47F1D217); Ecoinvent U.S. consumption mix for N fertilisers, from IFA data; IFA (2021) Nutrient content in percentage - IFA Fertilizer Converter. International Fertilizer Association. https://www.ifastat.org/converter/fertilizer-converter/accessed 2021-06-24
  properties: dry mass 1 kg, wet mass 1 kg
- potassium sulfate: 0.00224408 kg; normal variance with pedigree 3.14257e-6, pedigree (2,1,2,1,1)
  1.56E+2 kg potassium sulfate/kg Potato
  Quantities of specific fertiliser are calculated based on US fertiliser market share and nutrient compositions from the International Fertilizer Association data to meet total nutrient demand N-P-K-S: 220.23--145.05--166.21--37.53 kg/ha (USDA NASS data for 2010, 2014, 2016). Quantity of specific fertiliser calculated from: average total N application (2010, 2014, 2016, 2018) reported cropped area of specified crop (includes all rotation patterns) and share of fertilisers in U.S. consumption mix (ecoinvent and International Fertilizer Association 2019) times each fertiliser's K2O to N ratio (International Fertilizer Association), subtracted from the application rate for the necessary nutrient, and multiplied by the mass of the compound over the mass of K2O in the compound. The remaining K2O and S demands are met from a mix of ammonium sulfate, potassium nitrate, potassium chloride, and potassium sulfate, the quantities of which are determined by satisfying the demand without adding any additional excess of any nutrient beyond that resulting from assuming the U.S. average mix of N fertilizers; any S demand remaining is met using elemental sulfur.
  Sources:
  USDA NASS (2021c) POTATO - APPLICATIONS, MEASURED IN LB / ACRE / YEAR, AVG (fertilizer and pesticides, amount, number of applications) - 2000-2021. US Department of Agriculture (USDA) National Agricultural Statistics Service. https://quickstats.nass.usda.gov (direct query: https://quickstats.nass.usda.gov/results/910944A6-DEB0-3216-B6B4-F5BA47F1D217); Ecoinvent U.S. consumption mix for N fertilisers, from IFA data; IFA (2021) Nutrient content in percentage - IFA Fertilizer Converter. International Fertilizer Association. https://www.ifastat.org/converter/fertilizer-converter/accessed 2021-06-24
  properties: dry mass 1 kg, wet mass 1 kg
- potato grading: 1.50852e-5 kg; lognormal variance with pedigree 0.0206, pedigree (4,4,3,1,3)
  1.51E-5 ha/kg potato grading (1.05 pass(es) per year).
  Potatoes are separated by size grade mechanically post-harvest. Operations are for production of russet potato (Galinato, 2019), supplemented with information from a multi-state comparison (Patterson, 2015).
  Field operations are as identified in crop- and rotation-specific enterprise crop budgets supplied by the regional agricultural extension office (state specific unless otherwise noted) and matched to equipment type in the budget or crop guidance, along with pest management documentation (Hills, et al., 2018, 2020; Hirnyck & Downey, 2006) and summary of practices for commercial production in the US (Belyea, 2010).Field operations are as identified in crop- and rotation-specific enterprise crop budgets supplied by the regional agricultural extension office (state specific unless otherwise noted) and matched to equipment type in the budget or crop guidance, along with pest management documentation (Hills, et al., 2018, 2020; Hirnyck & Downey, 2006) and summary of practices for commercial production in the US (Belyea, 2010).
  Sources:
  Galinato, Suzette (2019) 2019 Cost Estimates of Producing Fresh and Processing Potatoes in Washington. Washington State University.
  Patterson, Paul (2015) 2014 Cost of Potato Production Study for Colorado, Idaho, Washington and Wisconsin. University of Idaho College of Agricultural and Life Sciences.
  Hills, Karen, et al (2020) Improving Soil Health in Pacific Northwest Potato Production: a Review. American Journal of Potato Research. https://link.springer.com/article/10.1007/s12230-019-09742-7
  Hirnyck, Ronda & Downey, Lisa (2006) Pest Management Strategic Plan for Pacific Northwest Potato Production - REVISION.
  Hills, Karen, et al (2018) Safeguarding Potato Cropping Systems in the Pacific Northwest Through Improved Soil Health. Washington State University.
  Belyea S. et al (2010) Commercial Potato Production in North America. The Potato Association of America.
- potato seed, for setting: 0.0402576 kg; normal variance with pedigree 0.00391422, pedigree (3,1,2,1,2)
  Each planted hectare uses 2,802.12 kg seed (4.03E-2 kg/kg Potato). Treated seed. This value is taken from guidance (enterprise crop budget) for potato production in Washington (Galinato, Suzette 2019) and average spacing and seed potato size (Belyea S. et al 2010). The dataset assumes conventional seed potato as opposed to genetically modified varieties. While there are some varieties of modified potato authorized in the US, they have limited availability and minor uptake (USDA 2021). The uncertainty parameters are calculated from the uncertainty on the yield and the guidance variation from guidance for all states.
  Sources:
  Galinato, Suzette (2019) 2019 Cost Estimates of Producing Fresh and Processing Potatoes in Washington. Washington State University.
  Belyea S. et al (2010) Commercial Potato Production in North America. The Potato Association of America.
  USDA (2021) BE Potato crop summary. USDA. https://www.ams.usda.gov/sites/default/files/media/BEPotatoSummary.pdf
  properties: carbon content, non-fossil 0.4282, dry mass 0.22 kg, water content 3.54545, wet mass 1 kg
  note on carbon content, non-fossil: For potato, seeds are tubers (Tab 1.14, ecoinvent v2.2 report 15b). Composition data obtained from Potatoes, raw, skin, in (http://www.nal.usda.gov/fnic/foodcomp/search/). First, composition data were refered to 1 kg dry mass. Then, C-contents were calculated considering a C-content/dry mass of 46% in carbohydrates (including fibres), 53% in proteins and 75% in fats. All data from "Evolutionary and Biochemical Aspects", A.D. Kay and T. Vrede (in Global Ecology, 2010, Elsevier B.V., S.E. Jørgensen Ed.).
- pyrethroid-compound: 1.04478e-6 kg; normal variance with pedigree 5.01751e-14, pedigree (1,3,2,4,4)
  This exchange is an aggregate of proxies for applied pesticide(s) Bifenthrin , Esfenvalerate , Lambda-cyhalothrin , Permethrin , Pyrethrins , Zeta-cypermethrin (6.456E-3 kg/ha {1,4,1,1,1}; 2.302E-2 kg/ha {1,4,1,1,1}; 1.245E-2 kg/ha {1,4,1,1,1}; 2.871E-2 kg/ha {1,4,1,1,1}; 1.995E-3 kg/ha {1,4,1,1,1}; 8.967E-5 kg/ha {1,4,1,1,1}, respectively).
  Average over state-wide reported cropped area of Potato for all tillage practices (OPTiS 2020) and across all rotation patterns (Socolar et al 2021) - calculated from specified herbicide/insecticide/fungicide quantity applied to treated acres weighted by share of acres treated with that herbicide/insecticide/fungicide (2014, 2016, 2018, USDA NASS data, https://quickstats.nass.usda.gov).
  From POTATO - APPLICATIONS, MEASURED IN LB / ACRE / YEAR, AVG (fertilizer and pesticides, amount, number of applications) - 2000-2021, https://quickstats.nass.usda.gov/results/910944A6-DEB0-3216-B6B4-F5BA47F1D217
  properties: carbon content, fossil 0.623, dry mass 1 kg, wet mass 1 kg
- pyridine-compound: 7.91975e-6 kg; normal variance with pedigree 7.05512e-12, pedigree (1,3,2,4,4)
  This exchange is an aggregate of proxies for applied pesticide(s) Boscalid , Fluazinam , Fludioxonil , Fluopyram , Flutolanil , Flonicamid , Paraquat (1.511E-1 kg/ha {1,2,1,1,1}; 2.245E-1 kg/ha {1,2,1,1,1}; 9.575E-3 kg/ha {1,2,1,1,1}; 3.899E-2 kg/ha {1,2,1,1,1}; 6.416E-2 kg/ha {1,4,1,1,1}; 3.405E-2 kg/ha {1,4,1,1,1}; 2.884E-2 kg/ha , respectively).
  Average over state-wide reported cropped area of Potato for all tillage practices (OPTiS 2020) and across all rotation patterns (Socolar et al 2021) - calculated from specified herbicide/insecticide/fungicide quantity applied to treated acres weighted by share of acres treated with that herbicide/insecticide/fungicide (2014, 2016, 2018, USDA NASS data, https://quickstats.nass.usda.gov).
  From POTATO - APPLICATIONS, MEASURED IN LB / ACRE / YEAR, AVG (fertilizer and pesticides, amount, number of applications) - 2000-2021, https://quickstats.nass.usda.gov/results/910944A6-DEB0-3216-B6B4-F5BA47F1D217
  properties: carbon content, fossil 0.344279, dry mass 1 kg, wet mass 1 kg
- sulfur: 1.98403e-5 kg; normal variance with pedigree 5.00736e-11, pedigree (1,2,2,3,1)
  Proxy for applied pesticide(s) Sulfur (1.381E+0 kg/ha {1,4,1,1,1}).
  Average over state-wide reported cropped area of Potato for all tillage practices (OPTiS 2020) and across all rotation patterns (Socolar et al 2021) - calculated from specified herbicide/insecticide/fungicide quantity applied to treated acres weighted by share of acres treated with that herbicide/insecticide/fungicide (2014, 2016, 2018, USDA NASS data, https://quickstats.nass.usda.gov).
  From POTATO - APPLICATIONS, MEASURED IN LB / ACRE / YEAR, AVG (fertilizer and pesticides, amount, number of applications) - 2000-2021, https://quickstats.nass.usda.gov/results/910944A6-DEB0-3216-B6B4-F5BA47F1D217
  properties: dry mass 1 kg, wet mass 1 kg
- tillage, cultivating, chiselling: 1.43668e-5 ha; lognormal variance with pedigree 0.0206, pedigree (4,4,3,1,3)
  1.44E-5 ha/kg tillage, cultivating, chiselling (1. pass(es) per year).
  Operations are for production of russet potato (Galinato, 2019), supplemented with information from a multi-state comparison (Patterson, 2015).
  Field operations are as identified in crop- and rotation-specific enterprise crop budgets supplied by the regional agricultural extension office (state specific unless otherwise noted) and matched to equipment type in the budget or crop guidance, along with pest management documentation (Hills, et al., 2018, 2020; Hirnyck & Downey, 2006) and summary of practices for commercial production in the US (Belyea, 2010). Potato is a full tillage crop.
  Sources:
  Galinato, Suzette (2019) 2019 Cost Estimates of Producing Fresh and Processing Potatoes in Washington. Washington State University.
  Patterson, Paul (2015) 2014 Cost of Potato Production Study for Colorado, Idaho, Washington and Wisconsin. University of Idaho College of Agricultural and Life Sciences.
  Hills, Karen, et al (2020) Improving Soil Health in Pacific Northwest Potato Production: a Review. American Journal of Potato Research. https://link.springer.com/article/10.1007/s12230-019-09742-7
  Hirnyck, Ronda & Downey, Lisa (2006) Pest Management Strategic Plan for Pacific Northwest Potato Production - REVISION.
  Hills, Karen, et al (2018) Safeguarding Potato Cropping Systems in the Pacific Northwest Through Improved Soil Health. Washington State University.
  Belyea S. et al (2010) Commercial Potato Production in North America. The Potato Association of America.
- tillage, disking: 2.87337e-5 ha; lognormal variance with pedigree 0.0206, pedigree (4,4,3,1,3)
  2.87E-5 ha/kg tillage, disking (2. pass(es) per year).
  Operations are for production of russet potato (Galinato, 2019), supplemented with information from a multi-state comparison (Patterson, 2015). Field operations are as identified in crop- and rotation-specific enterprise crop budgets supplied by the regional agricultural extension office (state specific unless otherwise noted) and matched to equipment type in the budget or crop guidance, along with pest management documentation (Hills, et al., 2018, 2020; Hirnyck & Downey, 2006) and summary of practices for commercial production in the US (Belyea, 2010). Potato is a full tillage crop.
  Sources:
  Galinato, Suzette (2019) 2019 Cost Estimates of Producing Fresh and Processing Potatoes in Washington. Washington State University.
  Patterson, Paul (2015) 2014 Cost of Potato Production Study for Colorado, Idaho, Washington and Wisconsin. University of Idaho College of Agricultural and Life Sciences.
  Hills, Karen, et al (2020) Improving Soil Health in Pacific Northwest Potato Production: a Review. American Journal of Potato Research. https://link.springer.com/article/10.1007/s12230-019-09742-7
  Hirnyck, Ronda & Downey, Lisa (2006) Pest Management Strategic Plan for Pacific Northwest Potato Production - REVISION.
  Hills, Karen, et al (2018) Safeguarding Potato Cropping Systems in the Pacific Northwest Through Improved Soil Health. Washington State University.
  Belyea S. et al (2010) Commercial Potato Production in North America. The Potato Association of America.
- tillage, field cultivator with amendment: 2.87337e-5 ha; lognormal variance with pedigree 0.0206, pedigree (4,4,3,1,3)
  2.87E-5 ha/kg tillage, field cultivator with ammendment (2. pass(es) per year).
  Operations are for production of russet potato (Galinato, 2019), supplemented with information from a multi-state comparison (Patterson, 2015).
  Field operations are as identified in crop- and rotation-specific enterprise crop budgets supplied by the regional agricultural extension office (state specific unless otherwise noted) and matched to equipment type in the budget or crop guidance, along with pest management documentation (Hills, et al., 2018, 2020; Hirnyck & Downey, 2006) and summary of practices for commercial production in the US (Belyea, 2010).Field operations are as identified in crop- and rotation-specific enterprise crop budgets supplied by the regional agricultural extension office (state specific unless otherwise noted) and matched to equipment type in the budget or crop guidance, along with pest management documentation (Hills, et al., 2018, 2020; Hirnyck & Downey, 2006) and summary of practices for commercial production in the US (Belyea, 2010). Potato is a full tillage crop.
  Sources:
  Galinato, Suzette (2019) 2019 Cost Estimates of Producing Fresh and Processing Potatoes in Washington. Washington State University.
  Patterson, Paul (2015) 2014 Cost of Potato Production Study for Colorado, Idaho, Washington and Wisconsin. University of Idaho College of Agricultural and Life Sciences.
  Hills, Karen, et al (2020) Improving Soil Health in Pacific Northwest Potato Production: a Review. American Journal of Potato Research. https://link.springer.com/article/10.1007/s12230-019-09742-7
  Hirnyck, Ronda & Downey, Lisa (2006) Pest Management Strategic Plan for Pacific Northwest Potato Production - REVISION.
  Hills, Karen, et al (2018) Safeguarding Potato Cropping Systems in the Pacific Northwest Through Improved Soil Health. Washington State University.
  Belyea S. et al (2010) Commercial Potato Production in North America. The Potato Association of America.
- tillage, rolling: 1.43668e-5 ha; lognormal variance with pedigree 0.0206, pedigree (4,4,3,1,3)
  1.44E-5 ha/kg tillage, rolling (1. pass(es) per year).
  Flattening of potato vines. Operations are for production of russet potato (Galinato, 2019), supplemented with information from a multi-state comparison (Patterson, 2015).
  Field operations are as identified in crop- and rotation-specific enterprise crop budgets supplied by the regional agricultural extension office (state specific unless otherwise noted) and matched to equipment type in the budget or crop guidance, along with pest management documentation (Hills, et al., 2018, 2020; Hirnyck & Downey, 2006) and summary of practices for commercial production in the US (Belyea, 2010).Field operations are as identified in crop- and rotation-specific enterprise crop budgets supplied by the regional agricultural extension office (state specific unless otherwise noted) and matched to equipment type in the budget or crop guidance, along with pest management documentation (Hills, et al., 2018, 2020; Hirnyck & Downey, 2006) and summary of practices for commercial production in the US (Belyea, 2010). Potato is a full tillage crop.
  Sources:
  Galinato, Suzette (2019) 2019 Cost Estimates of Producing Fresh and Processing Potatoes in Washington. Washington State University.
  Patterson, Paul (2015) 2014 Cost of Potato Production Study for Colorado, Idaho, Washington and Wisconsin. University of Idaho College of Agricultural and Life Sciences.
  Hills, Karen, et al (2020) Improving Soil Health in Pacific Northwest Potato Production: a Review. American Journal of Potato Research. https://link.springer.com/article/10.1007/s12230-019-09742-7
  Hirnyck, Ronda & Downey, Lisa (2006) Pest Management Strategic Plan for Pacific Northwest Potato Production - REVISION.
  Hills, Karen, et al (2018) Safeguarding Potato Cropping Systems in the Pacific Northwest Through Improved Soil Health. Washington State University.
  Belyea S. et al (2010) Commercial Potato Production in North America. The Potato Association of America.
- tillage, subsoiling, by subsoiler or v-ripper: 1.43668e-5 ha; lognormal variance with pedigree 0.0206, pedigree (4,4,3,1,3)
  1.44E-5 ha/kg tillage, subsoiling, by subsoiler or v-ripper (1. pass(es) per year).
  Operations are for production of russet potato (Galinato, 2019), supplemented with information from a multi-state comparison (Patterson, 2015).
  Field operations are as identified in crop- and rotation-specific enterprise crop budgets supplied by the regional agricultural extension office (state specific unless otherwise noted) and matched to equipment type in the budget or crop guidance, along with pest management documentation (Hills, et al., 2018, 2020; Hirnyck & Downey, 2006) and summary of practices for commercial production in the US (Belyea, 2010). Potato is a full tillage crop.
  Sources:
  Galinato, Suzette (2019) 2019 Cost Estimates of Producing Fresh and Processing Potatoes in Washington. Washington State University.
  Patterson, Paul (2015) 2014 Cost of Potato Production Study for Colorado, Idaho, Washington and Wisconsin. University of Idaho College of Agricultural and Life Sciences.
  Hills, Karen, et al (2020) Improving Soil Health in Pacific Northwest Potato Production: a Review. American Journal of Potato Research. https://link.springer.com/article/10.1007/s12230-019-09742-7
  Hirnyck, Ronda & Downey, Lisa (2006) Pest Management Strategic Plan for Pacific Northwest Potato Production - REVISION.
  Hills, Karen, et al (2018) Safeguarding Potato Cropping Systems in the Pacific Northwest Through Improved Soil Health. Washington State University.
  Belyea S. et al (2010) Commercial Potato Production in North America. The Potato Association of America.
- triazine-compound: 5.57665e-6 kg; normal variance with pedigree 1.96388e-13, pedigree (1,3,2,4,4)
  This exchange is an aggregate of proxies for applied pesticide(s) Metribuzin , Pymetrozine (3.679E-1 kg/ha {1,4,1,1,1}; 2.024E-2 kg/ha {1,4,1,1,1}, respectively).
  Average over state-wide reported cropped area of Potato for all tillage practices (OPTiS 2020) and across all rotation patterns (Socolar et al 2021) - calculated from specified herbicide/insecticide/fungicide quantity applied to treated acres weighted by share of acres treated with that herbicide/insecticide/fungicide (2014, 2016, 2018, USDA NASS data, https://quickstats.nass.usda.gov).
  From POTATO - APPLICATIONS, MEASURED IN LB / ACRE / YEAR, AVG (fertilizer and pesticides, amount, number of applications) - 2000-2021, https://quickstats.nass.usda.gov/results/910944A6-DEB0-3216-B6B4-F5BA47F1D217
  properties: carbon content, fossil 0.475616, dry mass 1 kg, wet mass 1 kg
- triple superphosphate: 0.00179276 kg; normal variance with pedigree 3.17595e-7, pedigree (2,1,2,1,1)
  1.79E-3 kg triple superphosphate/kg Potato
  Quantities of specific fertiliser are calculated based on US fertiliser market share and nutrient compositions from the International Fertilizer Association data to meet total nutrient demand N-P-K-S: 220.23--145.05--166.21--37.53 kg/ha (USDA NASS data for 2010, 2014, 2016). Quantity of specific fertiliser calculated from: average total N application (2010, 2014, 2016, 2018) reported cropped area of specified crop (includes all rotation patterns) and share of fertilisers in U.S. consumption mix (ecoinvent and International Fertilizer Association 2019) times each fertiliser's P2O5 to N ratio (International Fertilizer Association), subtracted from the application rate for the necessary nutrient, and multiplied by the mass of the compound over the mass of P2O5 in the compound.
  Sources:
  USDA NASS (2021c) POTATO - APPLICATIONS, MEASURED IN LB / ACRE / YEAR, AVG (fertilizer and pesticides, amount, number of applications) - 2000-2021. US Department of Agriculture (USDA) National Agricultural Statistics Service. https://quickstats.nass.usda.gov (direct query: https://quickstats.nass.usda.gov/results/910944A6-DEB0-3216-B6B4-F5BA47F1D217); Ecoinvent U.S. consumption mix for N fertilisers, from IFA data; IFA (2021) Nutrient content in percentage - IFA Fertilizer Converter. International Fertilizer Association. https://www.ifastat.org/converter/fertilizer-converter/accessed 2021-06-24
  properties: dry mass 1 kg, phosphorus content 0.200754, wet mass 1 kg
  note on phosphorus content: Phosphorus content (on a dry matter basis) of triple superphosphate is calculated from the molecular formula of the nutrient present in the substance.
- urea: 0.00174572 kg; normal variance with pedigree 8.03875e-8, pedigree (2,1,2,1,1)
  1.75E-3 kg urea/kg Potato
  Quantities of specific fertiliser are calculated based on US fertiliser market share and nutrient compositions from the International Fertilizer Association data to meet total nutrient demand N-P-K-S: 220.23--145.05--166.21--37.53 kg/ha (USDA NASS data for 2010, 2014, 2016), over reported cropped area of specified crop (includes all rotation patterns): quantity of N applied to treated acres times percent of planted potato acres treated (USDA NASS) times share of N supplied by compound in U.S. consumption mix (ecoinvent and International Fertilizer Association 2019) times mass compound per mass N in compound.
  Sources:
  USDA NASS (2021c) POTATO - APPLICATIONS, MEASURED IN LB / ACRE / YEAR, AVG (fertilizer and pesticides, amount, number of applications) - 2000-2021. US Department of Agriculture (USDA) National Agricultural Statistics Service. https://quickstats.nass.usda.gov (direct query: https://quickstats.nass.usda.gov/results/910944A6-DEB0-3216-B6B4-F5BA47F1D217); Ecoinvent U.S. consumption mix for N fertilisers, from IFA data; IFA (2021) Nutrient content in percentage - IFA Fertilizer Converter. International Fertilizer Association. https://www.ifastat.org/converter/fertilizer-converter/accessed 2021-06-24
  properties: carbon content, fossil 0.2, dry mass 1 kg, wet mass 1 kg
- urea ammonium nitrate mix: 0.00294414 kg; normal variance with pedigree 2.28642e-7, pedigree (2,1,2,1,1)
  2.94E-3 kg urea ammonium nitrate mix/kg Potato
  Quantities of specific fertiliser are calculated based on US fertiliser market share and nutrient compositions from the International Fertilizer Association data to meet total nutrient demand N-P-K-S: 220.23--145.05--166.21--37.53 kg/ha (USDA NASS data for 2010, 2014, 2016), over reported cropped area of specified crop (includes all rotation patterns): quantity of N applied to treated acres times percent of planted potato acres treated (USDA NASS) times share of N supplied by compound in U.S. consumption mix (ecoinvent and International Fertilizer Association 2019) times mass compound per mass N in compound.
  Sources:
  USDA NASS (2021c) POTATO - APPLICATIONS, MEASURED IN LB / ACRE / YEAR, AVG (fertilizer and pesticides, amount, number of applications) - 2000-2021. US Department of Agriculture (USDA) National Agricultural Statistics Service. https://quickstats.nass.usda.gov (direct query: https://quickstats.nass.usda.gov/results/910944A6-DEB0-3216-B6B4-F5BA47F1D217); Ecoinvent U.S. consumption mix for N fertilisers, from IFA data; IFA (2021) Nutrient content in percentage - IFA Fertilizer Converter. International Fertilizer Association. https://www.ifastat.org/converter/fertilizer-converter/accessed 2021-06-24
  properties: carbon content, fossil 0.0879977, dry mass 0.75 kg, hydrogen content 0.095042, nitrogen content 0.401231, oxygen content 0.749063, water content 0.333333, wet mass 1 kg
  note on carbon content, fossil: Carbon content, fossil is calculated based on the chemical formula of the substance.
  note on hydrogen content: Hydrogen content (on a dry matter basis) of urea ammonium nitrate mix is calculated from the molecular formula of the substance (CH6N4O4).
  note on nitrogen content: Nitrogen content (on a dry matter basis) of urea ammonium nitrate mix is calculated from the molecular formula of the substance (CH6N4O4).
  note on oxygen content: Oxygen content (on a dry matter basis) of urea ammonium nitrate mix is calculated from the molecular formula of the substance (CH6N4O4).
- waste polyethylene: -0.0352999 kg; name waste_pe; = packaging_f+packaging_p; lognormal variance with pedigree 0.002625, pedigree (2,3,2,2,2)
  This waste is derived from the sum of packaging of pesticide and fertilizer.
  production volume; = waste_pe*pv_potato
    Calculated from production volume of reference product using the relative outputs.
  properties: carbon content, fossil 0.825301, dry mass 0.996 kg, heating value, net 42.47 MJ, water content 0.00401606, wet mass 1 kg
  note on carbon content, fossil: C content in 1 kg DM was calculated using data in Tab A.1, ecoinvent v2.2 report 13_I
  note on heating value, net: Value taken from the general comment of the treatment dataset.

## Inputs from nature
- Carbon dioxide, in air [natural resource, in air]: 1.38197 kg; lognormal variance with pedigree 0.0015, pedigree (2,2,2,1,1)
  Biogene carbon content of Potato on a dry matter basis 47.886% Carbon content of biomass fractions from Rouwenhorst et al. (1991) (carbohydrates and proteins) and Nemecek & Kägi (2007) (lipids, fibres ash). Carbohydrate, protein, lipid and fibre contents of from Feedipedia. Heuzé V., Tran G., Lebas F. (2017) Maize grain. Feedipedia, a programme by INRAE, CIRAD, AFZ and FAO. https://www.feedipedia.org/node/556 Last updated on September 7, 2017, 14:29.
- Energy, gross calorific value, in biomass [natural resource, biotic]: 3.8896 MJ; lognormal variance with pedigree 0.1235, pedigree (3,3,2,3,5)
  The gross energy content of Potato is 18.7MJ/kg on a dry matter basis, 87.2% dry matter as fed for North American Potato (Feedipedia - Maize 2017). At the harvest moisture content of 79.2% (), the energy content of Potato is 3.9MJ/kg product weight
  Source(s):
  Heuzé V., Tran G., Lebas F. (2017) Maize grain. Feedipedia, a programme by INRAE, CIRAD, AFZ and FAO. https://www.feedipedia.org/node/556 Last updated on September 7, 2017, 14:29. ;
- Occupation, annual crop, irrigated [natural resource, land]: 0.0460363 m2*year; lognormal variance with pedigree 0.0029, pedigree (2,2,2,1,1)
  Land occupation per year (annual growing season). 4.5 million tonnes from 2017-2021 on .1 million ha planted and .1 million ha harvested. Thus occupation is 0.144 ha/t or 1436.684 m2/t (0.1.437m2/kg). This overall land use is split into irrigated ( 32.04% ) and non-irrigated ( 67.96% ) based on agricultural census data ( USDA NASS ) 4.6E-2 m2 planted/kg harvested potato of irrigated land, and 9.76E-2 m2 planted/kg harvested potato of non-irrigated land
- Occupation, annual crop, non-irrigated [natural resource, land]: 0.097632 m2*year; lognormal variance with pedigree 0.0029, pedigree (2,2,2,1,1)
  (same comment as for Occupation, annual crop, irrigated)
- Transformation, from annual crop, irrigated [natural resource, land]: 0.0460363 m2; lognormal variance with pedigree 0.0089, pedigree (2,2,2,1,1)
  Transformation of land for planting. 4.5 million tonnes from 2017-2021 on .1 million ha planted and .1 million ha harvested. Thus occupation is 0.144 ha/t or 1436.684 m2/t (0.1.437m2/kg). This overall land use is split into irrigated ( 32.04% ) and non-irrigated ( 67.96% ) based on agricultural census data ( USDA NASS ) 4.6E-2 m2 planted/kg harvested potato of irrigated land, and 9.76E-2 m2 planted/kg harvested potato of non-irrigated land
- Transformation, from annual crop, non-irrigated [natural resource, land]: 0.097632 m2; lognormal variance with pedigree 0.0089, pedigree (2,2,2,1,1)
  (same comment as for Transformation, from annual crop, irrigated)
- Transformation, to annual crop, irrigated [natural resource, land]: 0.0460363 m2; lognormal variance with pedigree 0.0089, pedigree (2,2,2,1,1)
  (same comment as for Transformation, from annual crop, irrigated)
- Transformation, to annual crop, non-irrigated [natural resource, land]: 0.097632 m2; lognormal variance with pedigree 0.0089, pedigree (2,2,2,1,1)
  (same comment as for Transformation, from annual crop, irrigated)
## Emissions to nature
- Ammonia [air, non-urban air or from high stacks]: 0.00026993 kg; lognormal variance with pedigree 0.0172, pedigree (2,3,4,1,1)
  Ammonia volatilised from applied mineral and organic fertilisers, 18.8 kg NH3/ha (2.7E-4kg NH3/kg Potato) total, 18.8 kg NH3/ha (2.7E-4 kg NH3/kg Potato) from synthetic fertilisers, 0.0 kg NH3/ha (0.E+0 kg NH3/kg Potato) from manure. NH3 from volatilisation of mineral fertilisers is calculated using Tier 2 emission factors (temperate climate, specific fertiliser) from the European Environment Agency, EMEP/EEA 3Da1, Table3.2 (EEA 2019). NH3 from manure application is calculated with emission factors provided in EMEP/EEA 3.D.a.2.a (Animal manure applied to soils) (EEA 2019) for manure types used as (fraction TAN in total N)*(EF manure spreading per TAN) for each animal group and type. (kg NH3-N/kg N applied: ). The emissions from manure calculated here do not account for the change in N mineralization and phosphate runoff with incorporation type or time. Where impacts from manure application are expected to be significant, this should be considered as N volatilisation during and after application of manure ranges from as low as 1% N with direct injection to ~5% with immediate incorporation to 20-40% without incorporation (Sawyer J, Mallarino A P (2016) Using Manure Nutrients for Crop Production. Cooperative Extension Service, Iowa State University of Science and Technology. https://store.extension.iastate.edu/product/12874and Midwast Plan Services MWPS-18, 3ed).. NH3 from volatilisation of mineral fertilisers is calculated using Tier 2 emission factors (temperate climate, specific fertiliser) from the European Environment Agency, EMEP/EEA 3Da1, Table3.2 (EEA 2019). NH3 from manure application is calculated with emission factors provided in EMEP/EEA 3.D.a.2.a (Animal manure applied to soils) (EEA 2019) for manure types used as (fraction TAN in total N)*(EF manure spreading per TAN) for each animal group and type. (kg NH3-N/kg N applied: ). The emissions from manure calculated here do not account for the change in N mineralization and phosphate runoff with incorporation type or time. Where impacts from manure application are expected to be significant, this should be considered as N volatilisation during and after application of manure ranges from as low as 1% N with direct injection to ~5% with immediate incorporation to 20-40% without incorporation (Sawyer J, Mallarino A P (2016) Using Manure Nutrients for Crop Production. Cooperative Extension Service, Iowa State University of Science and Technology. https://store.extension.iastate.edu/product/12874and Midwast Plan Services MWPS-18, 3ed).
- Carbon dioxide, fossil [air, non-urban air or from high stacks]: 0.00206022 kg; normal variance with pedigree 0, pedigree (2,3,4,1,1)
  CO2 emissions from use of urea fertilisers and lime, 143.401 kg/ha (2.06E-3 kg/kg Potato): 86.63 kg/ha from lime and 56.77 kg/ha from urea and urea ammonium nitrate .
  Emissions are calculated following the IPCC NIR Guidelines, §11.3 and §11.4, using IPCC NIR equations 11.12 (lime) and 11.13 (urea) (mass of lime/urea * emissions factor for lime/urea) with Tier 1 emissions factors (IPCC 2006b). EF limestone = 0.12 kg CO2-C/kg limestone (0.06-0.12, uniform) and EF urea = 0.2 kg CO2-C/kg urea (0.1-0.2, uniform) applied to both urea and the approximately 35% of UAN that is urea. The result is converted from kg CO2-C to kg CO2 (multiplying by the molar mass of CO2/mass of C in CO2 = 44.01/12)
- Dinitrogen monoxide [air, non-urban air or from high stacks]: 8.52686e-5 kg; lognormal variance with pedigree 0.0392, pedigree (2,3,4,1,1)
  Direct and indirect N2O emissions from fertilizer and manure use and crop cultivation. Direct emissions: 4.18E+0 kgN2O/ha (8.56E-5 kg N2O/kg Potato), 1.04E-1 kg N2O/ha from synthetic fertiliser N and 0.E+0 kg N2O/ha from manure N, 2.64E+0kg N2O/ha from crop residues
- Nitrogen oxides [air, non-urban air or from high stacks]: 0.000117679 kg; lognormal variance with pedigree 0.0392, pedigree (2,3,4,1,1)
  8.2 kg NO2/ha (1.18E-4kg NO2/kg Potato), 8.19E+0 kg NO2/ha from fertilisers; 0.E+0 kg NO2/ha from manure) NOx emissions from fertilizer and manure nitrification after N loss from NH3, as NO2. Calculated according to EEA/EMEP guidance, EF_NO_Managed Soils = 0.04 kg NO2/kg N fertiliser and manure N applied (range 0.005 to 0.104, 95% CL), from Table 3.1, Tier 1 EFs for source category 3.D, EMEP/EEA Guidebook 2019.
- Water [air, non-urban air or from high stacks]: 0.0231751 m3; lognormal variance with pedigree 0.0015, pedigree (2,2,2,1,1)
  Irrigation water released to air via evapotranspiration. Calculated by the ecoinvent agricultural LCI tool.
- Abamectin [soil, agricultural]: 6.57005e-8 kg; normal variance with pedigree 1.21237e-15, pedigree (1,2,2,3,1)
  Abamectin emission to agricultural soil (4.573E-03 kg/ha). Pesticides are assumed to be ultimately 100% emitted to soil. Average over state-wide reported cropped area of Potato for all tillage practices (OPTiS 2020) and across all rotation patterns (Socolar et al 2021) - calculated from specified herbicide/insecticide/fungicide quantity applied to treated acres weighted by share of acres treated with that herbicide/insecticide/fungicide (2014, 2016, 2018, USDA NASS data, https://quickstats.nass.usda.gov) POTATO - APPLICATIONS, MEASURED IN LB / ACRE / YEAR, AVG (fertilizer and pesticides, amount, number of applications) - 2000-2021, https://quickstats.nass.usda.gov/results/910944A6-DEB0-3216-B6B4-F5BA47F1D217
- Azoxystrobin [soil, agricultural]: 1.50209e-6 kg; normal variance with pedigree 3.72377e-13, pedigree (1,2,2,3,1)
  Azoxystrobin emission to agricultural soil (1.046E-01 kg/ha). Pesticides are assumed to be ultimately 100% emitted to soil. Average over state-wide reported cropped area of Potato for all tillage practices (OPTiS 2020) and across all rotation patterns (Socolar et al 2021) - calculated from specified herbicide/insecticide/fungicide quantity applied to treated acres weighted by share of acres treated with that herbicide/insecticide/fungicide (2014, 2016, 2018, USDA NASS data, https://quickstats.nass.usda.gov) POTATO - APPLICATIONS, MEASURED IN LB / ACRE / YEAR, AVG (fertilizer and pesticides, amount, number of applications) - 2000-2021, https://quickstats.nass.usda.gov/results/910944A6-DEB0-3216-B6B4-F5BA47F1D217
- Beta-cyfluthrin [soil, agricultural]: 1.94444e-7 kg; normal variance with pedigree 7.49726e-15, pedigree (1,2,2,3,1)
  Beta-cyfluthrin emission to agricultural soil (1.353E-02 kg/ha). Pesticides are assumed to be ultimately 100% emitted to soil. Average over state-wide reported cropped area of Potato for all tillage practices (OPTiS 2020) and across all rotation patterns (Socolar et al 2021) - calculated from specified herbicide/insecticide/fungicide quantity applied to treated acres weighted by share of acres treated with that herbicide/insecticide/fungicide (2014, 2016, 2018, USDA NASS data, https://quickstats.nass.usda.gov) POTATO - APPLICATIONS, MEASURED IN LB / ACRE / YEAR, AVG (fertilizer and pesticides, amount, number of applications) - 2000-2021, https://quickstats.nass.usda.gov/results/910944A6-DEB0-3216-B6B4-F5BA47F1D217
- Bifenazate [soil, agricultural]: 1.17391e-6 kg; lognormal variance with pedigree 0.0334, pedigree (1,2,2,3,1)
  Bifenazate emission to agricultural soil (8.171E-02 kg/ha). Pesticides are assumed to be ultimately 100% emitted to soil. Average over state-wide reported cropped area of Potato for all tillage practices (OPTiS 2020) and across all rotation patterns (Socolar et al 2021) - calculated from specified herbicide/insecticide/fungicide quantity applied to treated acres weighted by share of acres treated with that herbicide/insecticide/fungicide (2014, 2016, 2018, USDA NASS data, https://quickstats.nass.usda.gov) POTATO - APPLICATIONS, MEASURED IN LB / ACRE / YEAR, AVG (fertilizer and pesticides, amount, number of applications) - 2000-2021, https://quickstats.nass.usda.gov/results/910944A6-DEB0-3216-B6B4-F5BA47F1D217
- Bifenthrin [soil, agricultural]: 9.27536e-8 kg; lognormal variance with pedigree 0.0334, pedigree (1,2,2,3,1)
  Bifenthrin emission to agricultural soil (6.456E-03 kg/ha). Pesticides are assumed to be ultimately 100% emitted to soil. Average over state-wide reported cropped area of Potato for all tillage practices (OPTiS 2020) and across all rotation patterns (Socolar et al 2021) - calculated from specified herbicide/insecticide/fungicide quantity applied to treated acres weighted by share of acres treated with that herbicide/insecticide/fungicide (2014, 2016, 2018, USDA NASS data, https://quickstats.nass.usda.gov) POTATO - APPLICATIONS, MEASURED IN LB / ACRE / YEAR, AVG (fertilizer and pesticides, amount, number of applications) - 2000-2021, https://quickstats.nass.usda.gov/results/910944A6-DEB0-3216-B6B4-F5BA47F1D217
- Boscalid [soil, agricultural]: 2.17118e-6 kg; normal variance with pedigree 9.61284e-14, pedigree (1,2,2,3,1)
  Boscalid emission to agricultural soil (1.511E-01 kg/ha). Pesticides are assumed to be ultimately 100% emitted to soil. Average over state-wide reported cropped area of Potato for all tillage practices (OPTiS 2020) and across all rotation patterns (Socolar et al 2021) - calculated from specified herbicide/insecticide/fungicide quantity applied to treated acres weighted by share of acres treated with that herbicide/insecticide/fungicide (2014, 2016, 2018, USDA NASS data, https://quickstats.nass.usda.gov) POTATO - APPLICATIONS, MEASURED IN LB / ACRE / YEAR, AVG (fertilizer and pesticides, amount, number of applications) - 2000-2021, https://quickstats.nass.usda.gov/results/910944A6-DEB0-3216-B6B4-F5BA47F1D217
- Cadmium II [soil, agricultural]: 7.15307e-8 kg; lognormal variance with pedigree 0.0432, pedigree (2,3,3,1,1)
  Emissions of heavy metals to soil are estimated based on the SALCA-heavy metal model (Freiermuth 2006) following the procedure in the ecoinvent agricultural LCI tool (Faist Emmenegger, Délerce-Mauris and Porté 2018 Models Integrated in Ecoinvent LCI Calculation Tool for Crop Production). The balance of heavy metal emissions to soils includes the net change from erosion, leaching, crop removal and fertilizer, manure, lime, planting and deposition. The crop system carries a share of heavy metals emissions based on the ratio of cropping additions to total additions (additions to crop system divided by additions to crop system plus depostion from air and present in soils) Sources for heavy metals contents include: Heavy-metal contents of plant material, maize (mg/kg dry matter, from Freiermuth 2006). ; Leaching of heavy metals to surface water (Wolfensberger & Dinkel 1997), where drainage is installed ; Deposition of heavy metals to soils, mg per ha per year (Freiermuth 2006). ; Deposition of heavy metals to soils, mg per ha per year (Freiermuth 2006). ; Average heavy metal contents in crop soils, mg per kg soil, based on data for Switzerland (from Keller & Desaules, 2001). state and regional erosion rates are from US NRC National Resources Inventory, 2017. and Drainage on all cropland acres state-wide, including tile drainage (1.7%,) and ditch drainage (4.3%). USDA (2018) 2017 Census of Agriculture, Volume 1, Chapter 2: State Level Data - Table 41. Land Use Practices: 2017 and 2012 (live table: https://www.nass.usda.gov/Quick_Stats/CDQT/chapter/2/table/41/state/US). US Department of Agriculture (USDA). https://www.nass.usda.gov/Publications/AgCensus/2017/Full_Report/Volume_1,_Chapter_2_US_State_Level/st99_2_0041_0041.pdf. Fertilizer, manure and pesticide application rates are based on USDA NASS data.
- Carbaryl [soil, agricultural]: 1.17863e-5 kg; lognormal variance with pedigree 0.0334, pedigree (1,2,2,3,1)
  Carbaryl emission to agricultural soil (8.204E-01 kg/ha). Pesticides are assumed to be ultimately 100% emitted to soil. Average over state-wide reported cropped area of Potato for all tillage practices (OPTiS 2020) and across all rotation patterns (Socolar et al 2021) - calculated from specified herbicide/insecticide/fungicide quantity applied to treated acres weighted by share of acres treated with that herbicide/insecticide/fungicide (2014, 2016, 2018, USDA NASS data, https://quickstats.nass.usda.gov) POTATO - APPLICATIONS, MEASURED IN LB / ACRE / YEAR, AVG (fertilizer and pesticides, amount, number of applications) - 2000-2021, https://quickstats.nass.usda.gov/results/910944A6-DEB0-3216-B6B4-F5BA47F1D217
- Chlorantraniliprole [soil, agricultural]: 8.05153e-8 kg; normal variance with pedigree 8.31862e-15, pedigree (1,2,2,3,1)
  Chlorantraniliprole emission to agricultural soil (5.604E-03 kg/ha). Pesticides are assumed to be ultimately 100% emitted to soil. Average over state-wide reported cropped area of Potato for all tillage practices (OPTiS 2020) and across all rotation patterns (Socolar et al 2021) - calculated from specified herbicide/insecticide/fungicide quantity applied to treated acres weighted by share of acres treated with that herbicide/insecticide/fungicide (2014, 2016, 2018, USDA NASS data, https://quickstats.nass.usda.gov) POTATO - APPLICATIONS, MEASURED IN LB / ACRE / YEAR, AVG (fertilizer and pesticides, amount, number of applications) - 2000-2021, https://quickstats.nass.usda.gov/results/910944A6-DEB0-3216-B6B4-F5BA47F1D217
- Chlorothalonil [soil, agricultural]: 3.134e-5 kg; normal variance with pedigree 8.85976e-12, pedigree (1,2,2,3,1)
  Chlorothalonil emission to agricultural soil (2.181E+00 kg/ha). Pesticides are assumed to be ultimately 100% emitted to soil. Average over state-wide reported cropped area of Potato for all tillage practices (OPTiS 2020) and across all rotation patterns (Socolar et al 2021) - calculated from specified herbicide/insecticide/fungicide quantity applied to treated acres weighted by share of acres treated with that herbicide/insecticide/fungicide (2014, 2016, 2018, USDA NASS data, https://quickstats.nass.usda.gov) POTATO - APPLICATIONS, MEASURED IN LB / ACRE / YEAR, AVG (fertilizer and pesticides, amount, number of applications) - 2000-2021, https://quickstats.nass.usda.gov/results/910944A6-DEB0-3216-B6B4-F5BA47F1D217
- Chromium III [soil, agricultural]: -7.90246e-6 kg; normal variance with pedigree 0.04, pedigree (2,3,3,1,1)
  (same comment as for Cadmium II)
- Clothianidin [soil, agricultural]: 5.74879e-7 kg; lognormal variance with pedigree 0.0334, pedigree (1,2,2,3,1)
  Clothianidin emission to agricultural soil (4.001E-02 kg/ha). Pesticides are assumed to be ultimately 100% emitted to soil. Average over state-wide reported cropped area of Potato for all tillage practices (OPTiS 2020) and across all rotation patterns (Socolar et al 2021) - calculated from specified herbicide/insecticide/fungicide quantity applied to treated acres weighted by share of acres treated with that herbicide/insecticide/fungicide (2014, 2016, 2018, USDA NASS data, https://quickstats.nass.usda.gov) POTATO - APPLICATIONS, MEASURED IN LB / ACRE / YEAR, AVG (fertilizer and pesticides, amount, number of applications) - 2000-2021, https://quickstats.nass.usda.gov/results/910944A6-DEB0-3216-B6B4-F5BA47F1D217
- Copper ion [soil, agricultural]: -2.02634e-5 kg; normal variance with pedigree 0.04, pedigree (2,3,3,1,1)
  (same comment as for Cadmium II)
- Copper oxide [soil, agricultural]: 5.1963e-6 kg; normal variance with pedigree 5.08525e-11, pedigree (1,2,2,3,1)
  Copper oxide emission to agricultural soil (3.617E-01 kg/ha). Pesticides are assumed to be ultimately 100% emitted to soil. Average over state-wide reported cropped area of Potato for all tillage practices (OPTiS 2020) and across all rotation patterns (Socolar et al 2021) - calculated from specified herbicide/insecticide/fungicide quantity applied to treated acres weighted by share of acres treated with that herbicide/insecticide/fungicide (2014, 2016, 2018, USDA NASS data, https://quickstats.nass.usda.gov) POTATO - APPLICATIONS, MEASURED IN LB / ACRE / YEAR, AVG (fertilizer and pesticides, amount, number of applications) - 2000-2021, https://quickstats.nass.usda.gov/results/910944A6-DEB0-3216-B6B4-F5BA47F1D217
- Cupric chloride dihydrate [soil, agricultural]: 1.39614e-6 kg; lognormal variance with pedigree 0.0334, pedigree (1,2,2,3,1)
  Cupric Chloride Hydrate emission to agricultural soil (9.718E-02 kg/ha). Pesticides are assumed to be ultimately 100% emitted to soil. Average over state-wide reported cropped area of Potato for all tillage practices (OPTiS 2020) and across all rotation patterns (Socolar et al 2021) - calculated from specified herbicide/insecticide/fungicide quantity applied to treated acres weighted by share of acres treated with that herbicide/insecticide/fungicide (2014, 2016, 2018, USDA NASS data, https://quickstats.nass.usda.gov) POTATO - APPLICATIONS, MEASURED IN LB / ACRE / YEAR, AVG (fertilizer and pesticides, amount, number of applications) - 2000-2021, https://quickstats.nass.usda.gov/results/910944A6-DEB0-3216-B6B4-F5BA47F1D217
- Cyazofamid [soil, agricultural]: 4.32528e-7 kg; lognormal variance with pedigree 0.0334, pedigree (1,2,2,3,1)
  Cyazofamid emission to agricultural soil (3.011E-02 kg/ha). Pesticides are assumed to be ultimately 100% emitted to soil. Average over state-wide reported cropped area of Potato for all tillage practices (OPTiS 2020) and across all rotation patterns (Socolar et al 2021) - calculated from specified herbicide/insecticide/fungicide quantity applied to treated acres weighted by share of acres treated with that herbicide/insecticide/fungicide (2014, 2016, 2018, USDA NASS data, https://quickstats.nass.usda.gov) POTATO - APPLICATIONS, MEASURED IN LB / ACRE / YEAR, AVG (fertilizer and pesticides, amount, number of applications) - 2000-2021, https://quickstats.nass.usda.gov/results/910944A6-DEB0-3216-B6B4-F5BA47F1D217
- Cyhalothrin [soil, agricultural]: 1.78851e-7 kg; normal variance with pedigree 8.98462e-15, pedigree (1,2,2,3,1)
  cyhalothrin emission to agricultural soil (1.245E-02 kg/ha). Pesticides are assumed to be ultimately 100% emitted to soil. Average over state-wide reported cropped area of Potato for all tillage practices (OPTiS 2020) and across all rotation patterns (Socolar et al 2021) - calculated from specified herbicide/insecticide/fungicide quantity applied to treated acres weighted by share of acres treated with that herbicide/insecticide/fungicide (2014, 2016, 2018, USDA NASS data, https://quickstats.nass.usda.gov) POTATO - APPLICATIONS, MEASURED IN LB / ACRE / YEAR, AVG (fertilizer and pesticides, amount, number of applications) - 2000-2021, https://quickstats.nass.usda.gov/results/910944A6-DEB0-3216-B6B4-F5BA47F1D217
- Cymoxanil [soil, agricultural]: 1.00483e-6 kg; normal variance with pedigree 1.30028e-13, pedigree (1,2,2,3,1)
  Cymoxanil emission to agricultural soil (6.994E-02 kg/ha). Pesticides are assumed to be ultimately 100% emitted to soil. Average over state-wide reported cropped area of Potato for all tillage practices (OPTiS 2020) and across all rotation patterns (Socolar et al 2021) - calculated from specified herbicide/insecticide/fungicide quantity applied to treated acres weighted by share of acres treated with that herbicide/insecticide/fungicide (2014, 2016, 2018, USDA NASS data, https://quickstats.nass.usda.gov) POTATO - APPLICATIONS, MEASURED IN LB / ACRE / YEAR, AVG (fertilizer and pesticides, amount, number of applications) - 2000-2021, https://quickstats.nass.usda.gov/results/910944A6-DEB0-3216-B6B4-F5BA47F1D217
- Dichlorprop-P [soil, agricultural]: 0.00061424 kg; normal variance with pedigree 3.38814e-8, pedigree (1,2,2,3,1)
  Dichloropropene emission to agricultural soil (4.275E+01 kg/ha). Pesticides are assumed to be ultimately 100% emitted to soil. Average over state-wide reported cropped area of Potato for all tillage practices (OPTiS 2020) and across all rotation patterns (Socolar et al 2021) - calculated from specified herbicide/insecticide/fungicide quantity applied to treated acres weighted by share of acres treated with that herbicide/insecticide/fungicide (2014, 2016, 2018, USDA NASS data, https://quickstats.nass.usda.gov) POTATO - APPLICATIONS, MEASURED IN LB / ACRE / YEAR, AVG (fertilizer and pesticides, amount, number of applications) - 2000-2021, https://quickstats.nass.usda.gov/results/910944A6-DEB0-3216-B6B4-F5BA47F1D217
- Difenoconazole [soil, agricultural]: 4.09376e-7 kg; normal variance with pedigree 5.06323e-14, pedigree (1,2,2,3,1)
  Difenoconazole emission to agricultural soil (2.849E-02 kg/ha). Pesticides are assumed to be ultimately 100% emitted to soil. Average over state-wide reported cropped area of Potato for all tillage practices (OPTiS 2020) and across all rotation patterns (Socolar et al 2021) - calculated from specified herbicide/insecticide/fungicide quantity applied to treated acres weighted by share of acres treated with that herbicide/insecticide/fungicide (2014, 2016, 2018, USDA NASS data, https://quickstats.nass.usda.gov) POTATO - APPLICATIONS, MEASURED IN LB / ACRE / YEAR, AVG (fertilizer and pesticides, amount, number of applications) - 2000-2021, https://quickstats.nass.usda.gov/results/910944A6-DEB0-3216-B6B4-F5BA47F1D217
- Dimethenamid-P [soil, agricultural]: 1.468e-6 kg; normal variance with pedigree 2.02502e-12, pedigree (1,2,2,3,1)
  Dimethenamid-P emission to agricultural soil (1.022E-01 kg/ha). Pesticides are assumed to be ultimately 100% emitted to soil. Average over state-wide reported cropped area of Potato for all tillage practices (OPTiS 2020) and across all rotation patterns (Socolar et al 2021) - calculated from specified herbicide/insecticide/fungicide quantity applied to treated acres weighted by share of acres treated with that herbicide/insecticide/fungicide (2014, 2016, 2018, USDA NASS data, https://quickstats.nass.usda.gov) POTATO - APPLICATIONS, MEASURED IN LB / ACRE / YEAR, AVG (fertilizer and pesticides, amount, number of applications) - 2000-2021, https://quickstats.nass.usda.gov/results/910944A6-DEB0-3216-B6B4-F5BA47F1D217
- Dimethenamide [soil, agricultural]: 7.31079e-7 kg; lognormal variance with pedigree 0.0334, pedigree (1,2,2,3,1)
  Dimethenamid emission to agricultural soil (5.089E-02 kg/ha). Pesticides are assumed to be ultimately 100% emitted to soil. Average over state-wide reported cropped area of Potato for all tillage practices (OPTiS 2020) and across all rotation patterns (Socolar et al 2021) - calculated from specified herbicide/insecticide/fungicide quantity applied to treated acres weighted by share of acres treated with that herbicide/insecticide/fungicide (2014, 2016, 2018, USDA NASS data, https://quickstats.nass.usda.gov) POTATO - APPLICATIONS, MEASURED IN LB / ACRE / YEAR, AVG (fertilizer and pesticides, amount, number of applications) - 2000-2021, https://quickstats.nass.usda.gov/results/910944A6-DEB0-3216-B6B4-F5BA47F1D217
- Dimethoate [soil, agricultural]: 1.66227e-6 kg; normal variance with pedigree 4.49632e-13, pedigree (1,2,2,3,1)
  Dimethoate emission to agricultural soil (1.157E-01 kg/ha). Pesticides are assumed to be ultimately 100% emitted to soil. Average over state-wide reported cropped area of Potato for all tillage practices (OPTiS 2020) and across all rotation patterns (Socolar et al 2021) - calculated from specified herbicide/insecticide/fungicide quantity applied to treated acres weighted by share of acres treated with that herbicide/insecticide/fungicide (2014, 2016, 2018, USDA NASS data, https://quickstats.nass.usda.gov) POTATO - APPLICATIONS, MEASURED IN LB / ACRE / YEAR, AVG (fertilizer and pesticides, amount, number of applications) - 2000-2021, https://quickstats.nass.usda.gov/results/910944A6-DEB0-3216-B6B4-F5BA47F1D217
- Diquat dibromide [soil, agricultural]: 2.80471e-6 kg; normal variance with pedigree 7.60155e-13, pedigree (1,2,2,3,1)
  Diquat Dibromide emission to agricultural soil (1.952E-01 kg/ha). Pesticides are assumed to be ultimately 100% emitted to soil. Average over state-wide reported cropped area of Potato for all tillage practices (OPTiS 2020) and across all rotation patterns (Socolar et al 2021) - calculated from specified herbicide/insecticide/fungicide quantity applied to treated acres weighted by share of acres treated with that herbicide/insecticide/fungicide (2014, 2016, 2018, USDA NASS data, https://quickstats.nass.usda.gov) POTATO - APPLICATIONS, MEASURED IN LB / ACRE / YEAR, AVG (fertilizer and pesticides, amount, number of applications) - 2000-2021, https://quickstats.nass.usda.gov/results/910944A6-DEB0-3216-B6B4-F5BA47F1D217
- EPTC [soil, agricultural]: 3.13011e-5 kg; normal variance with pedigree 9.05331e-11, pedigree (1,2,2,3,1)
  EPTC emission to agricultural soil (2.179E+00 kg/ha). Pesticides are assumed to be ultimately 100% emitted to soil. Average over state-wide reported cropped area of Potato for all tillage practices (OPTiS 2020) and across all rotation patterns (Socolar et al 2021) - calculated from specified herbicide/insecticide/fungicide quantity applied to treated acres weighted by share of acres treated with that herbicide/insecticide/fungicide (2014, 2016, 2018, USDA NASS data, https://quickstats.nass.usda.gov) POTATO - APPLICATIONS, MEASURED IN LB / ACRE / YEAR, AVG (fertilizer and pesticides, amount, number of applications) - 2000-2021, https://quickstats.nass.usda.gov/results/910944A6-DEB0-3216-B6B4-F5BA47F1D217
- Esfenvalerate [soil, agricultural]: 3.30717e-7 kg; normal variance with pedigree 1.62805e-14, pedigree (1,2,2,3,1)
  Esfenvalerate emission to agricultural soil (2.302E-02 kg/ha). Pesticides are assumed to be ultimately 100% emitted to soil. Average over state-wide reported cropped area of Potato for all tillage practices (OPTiS 2020) and across all rotation patterns (Socolar et al 2021) - calculated from specified herbicide/insecticide/fungicide quantity applied to treated acres weighted by share of acres treated with that herbicide/insecticide/fungicide (2014, 2016, 2018, USDA NASS data, https://quickstats.nass.usda.gov) POTATO - APPLICATIONS, MEASURED IN LB / ACRE / YEAR, AVG (fertilizer and pesticides, amount, number of applications) - 2000-2021, https://quickstats.nass.usda.gov/results/910944A6-DEB0-3216-B6B4-F5BA47F1D217
- Ethoprop [soil, agricultural]: 2.57633e-6 kg; lognormal variance with pedigree 0.0334, pedigree (1,2,2,3,1)
  Ethoprophos emission to agricultural soil (1.793E-01 kg/ha). Pesticides are assumed to be ultimately 100% emitted to soil. Average over state-wide reported cropped area of Potato for all tillage practices (OPTiS 2020) and across all rotation patterns (Socolar et al 2021) - calculated from specified herbicide/insecticide/fungicide quantity applied to treated acres weighted by share of acres treated with that herbicide/insecticide/fungicide (2014, 2016, 2018, USDA NASS data, https://quickstats.nass.usda.gov) POTATO - APPLICATIONS, MEASURED IN LB / ACRE / YEAR, AVG (fertilizer and pesticides, amount, number of applications) - 2000-2021, https://quickstats.nass.usda.gov/results/910944A6-DEB0-3216-B6B4-F5BA47F1D217
- Famoxadone [soil, agricultural]: 8.00725e-7 kg; normal variance with pedigree 9.00069e-14, pedigree (1,2,2,3,1)
  Famoxadone emission to agricultural soil (5.573E-02 kg/ha). Pesticides are assumed to be ultimately 100% emitted to soil. Average over state-wide reported cropped area of Potato for all tillage practices (OPTiS 2020) and across all rotation patterns (Socolar et al 2021) - calculated from specified herbicide/insecticide/fungicide quantity applied to treated acres weighted by share of acres treated with that herbicide/insecticide/fungicide (2014, 2016, 2018, USDA NASS data, https://quickstats.nass.usda.gov) POTATO - APPLICATIONS, MEASURED IN LB / ACRE / YEAR, AVG (fertilizer and pesticides, amount, number of applications) - 2000-2021, https://quickstats.nass.usda.gov/results/910944A6-DEB0-3216-B6B4-F5BA47F1D217
- Fentin hydroxide [soil, agricultural]: 3.14976e-7 kg; lognormal variance with pedigree 0.0334, pedigree (1,2,2,3,1)
  Fentin hydroxide emission to agricultural soil (2.192E-02 kg/ha). Pesticides are assumed to be ultimately 100% emitted to soil. Average over state-wide reported cropped area of Potato for all tillage practices (OPTiS 2020) and across all rotation patterns (Socolar et al 2021) - calculated from specified herbicide/insecticide/fungicide quantity applied to treated acres weighted by share of acres treated with that herbicide/insecticide/fungicide (2014, 2016, 2018, USDA NASS data, https://quickstats.nass.usda.gov) POTATO - APPLICATIONS, MEASURED IN LB / ACRE / YEAR, AVG (fertilizer and pesticides, amount, number of applications) - 2000-2021, https://quickstats.nass.usda.gov/results/910944A6-DEB0-3216-B6B4-F5BA47F1D217
- Fipronil [soil, agricultural]: 5.93559e-7 kg; lognormal variance with pedigree 0.0334, pedigree (1,2,2,3,1)
  Fipronil emission to agricultural soil (4.131E-02 kg/ha). Pesticides are assumed to be ultimately 100% emitted to soil. Average over state-wide reported cropped area of Potato for all tillage practices (OPTiS 2020) and across all rotation patterns (Socolar et al 2021) - calculated from specified herbicide/insecticide/fungicide quantity applied to treated acres weighted by share of acres treated with that herbicide/insecticide/fungicide (2014, 2016, 2018, USDA NASS data, https://quickstats.nass.usda.gov) POTATO - APPLICATIONS, MEASURED IN LB / ACRE / YEAR, AVG (fertilizer and pesticides, amount, number of applications) - 2000-2021, https://quickstats.nass.usda.gov/results/910944A6-DEB0-3216-B6B4-F5BA47F1D217
- Flonicamid [soil, agricultural]: 4.89211e-7 kg; normal variance with pedigree 3.19337e-14, pedigree (1,2,2,3,1)
  Flonicamid emission to agricultural soil (3.405E-02 kg/ha). Pesticides are assumed to be ultimately 100% emitted to soil. Average over state-wide reported cropped area of Potato for all tillage practices (OPTiS 2020) and across all rotation patterns (Socolar et al 2021) - calculated from specified herbicide/insecticide/fungicide quantity applied to treated acres weighted by share of acres treated with that herbicide/insecticide/fungicide (2014, 2016, 2018, USDA NASS data, https://quickstats.nass.usda.gov) POTATO - APPLICATIONS, MEASURED IN LB / ACRE / YEAR, AVG (fertilizer and pesticides, amount, number of applications) - 2000-2021, https://quickstats.nass.usda.gov/results/910944A6-DEB0-3216-B6B4-F5BA47F1D217
- Fluazinam [soil, agricultural]: 3.22537e-6 kg; normal variance with pedigree 3.84833e-13, pedigree (1,2,2,3,1)
  Fluazinam emission to agricultural soil (2.245E-01 kg/ha). Pesticides are assumed to be ultimately 100% emitted to soil. Average over state-wide reported cropped area of Potato for all tillage practices (OPTiS 2020) and across all rotation patterns (Socolar et al 2021) - calculated from specified herbicide/insecticide/fungicide quantity applied to treated acres weighted by share of acres treated with that herbicide/insecticide/fungicide (2014, 2016, 2018, USDA NASS data, https://quickstats.nass.usda.gov) POTATO - APPLICATIONS, MEASURED IN LB / ACRE / YEAR, AVG (fertilizer and pesticides, amount, number of applications) - 2000-2021, https://quickstats.nass.usda.gov/results/910944A6-DEB0-3216-B6B4-F5BA47F1D217
- Fludioxonil [soil, agricultural]: 1.3756e-7 kg; normal variance with pedigree 3.68696e-15, pedigree (1,2,2,3,1)
  Fludioxonil emission to agricultural soil (9.575E-03 kg/ha). Pesticides are assumed to be ultimately 100% emitted to soil. Average over state-wide reported cropped area of Potato for all tillage practices (OPTiS 2020) and across all rotation patterns (Socolar et al 2021) - calculated from specified herbicide/insecticide/fungicide quantity applied to treated acres weighted by share of acres treated with that herbicide/insecticide/fungicide (2014, 2016, 2018, USDA NASS data, https://quickstats.nass.usda.gov) POTATO - APPLICATIONS, MEASURED IN LB / ACRE / YEAR, AVG (fertilizer and pesticides, amount, number of applications) - 2000-2021, https://quickstats.nass.usda.gov/results/910944A6-DEB0-3216-B6B4-F5BA47F1D217
- Flumioxazin [soil, agricultural]: 8.34138e-8 kg; lognormal variance with pedigree 0.0334, pedigree (1,2,2,3,1)
  Flumioxazin emission to agricultural soil (5.806E-03 kg/ha). Pesticides are assumed to be ultimately 100% emitted to soil. Average over state-wide reported cropped area of Potato for all tillage practices (OPTiS 2020) and across all rotation patterns (Socolar et al 2021) - calculated from specified herbicide/insecticide/fungicide quantity applied to treated acres weighted by share of acres treated with that herbicide/insecticide/fungicide (2014, 2016, 2018, USDA NASS data, https://quickstats.nass.usda.gov) POTATO - APPLICATIONS, MEASURED IN LB / ACRE / YEAR, AVG (fertilizer and pesticides, amount, number of applications) - 2000-2021, https://quickstats.nass.usda.gov/results/910944A6-DEB0-3216-B6B4-F5BA47F1D217
- Fluopyram [soil, agricultural]: 5.60185e-7 kg; normal variance with pedigree 1.9999e-13, pedigree (1,2,2,3,1)
  Fluopyram emission to agricultural soil (3.899E-02 kg/ha). Pesticides are assumed to be ultimately 100% emitted to soil. Average over state-wide reported cropped area of Potato for all tillage practices (OPTiS 2020) and across all rotation patterns (Socolar et al 2021) - calculated from specified herbicide/insecticide/fungicide quantity applied to treated acres weighted by share of acres treated with that herbicide/insecticide/fungicide (2014, 2016, 2018, USDA NASS data, https://quickstats.nass.usda.gov) POTATO - APPLICATIONS, MEASURED IN LB / ACRE / YEAR, AVG (fertilizer and pesticides, amount, number of applications) - 2000-2021, https://quickstats.nass.usda.gov/results/910944A6-DEB0-3216-B6B4-F5BA47F1D217
- Flutolanil [soil, agricultural]: 9.21846e-7 kg; lognormal variance with pedigree 0.0334, pedigree (1,2,2,3,1)
  Flutolanil emission to agricultural soil (6.416E-02 kg/ha). Pesticides are assumed to be ultimately 100% emitted to soil. Average over state-wide reported cropped area of Potato for all tillage practices (OPTiS 2020) and across all rotation patterns (Socolar et al 2021) - calculated from specified herbicide/insecticide/fungicide quantity applied to treated acres weighted by share of acres treated with that herbicide/insecticide/fungicide (2014, 2016, 2018, USDA NASS data, https://quickstats.nass.usda.gov) POTATO - APPLICATIONS, MEASURED IN LB / ACRE / YEAR, AVG (fertilizer and pesticides, amount, number of applications) - 2000-2021, https://quickstats.nass.usda.gov/results/910944A6-DEB0-3216-B6B4-F5BA47F1D217
- Fluxapyroxad [soil, agricultural]: 6.57327e-7 kg; lognormal variance with pedigree 0.0334, pedigree (1,2,2,3,1)
  Fluxapyroxad emission to agricultural soil (4.575E-02 kg/ha). Pesticides are assumed to be ultimately 100% emitted to soil. Average over state-wide reported cropped area of Potato for all tillage practices (OPTiS 2020) and across all rotation patterns (Socolar et al 2021) - calculated from specified herbicide/insecticide/fungicide quantity applied to treated acres weighted by share of acres treated with that herbicide/insecticide/fungicide (2014, 2016, 2018, USDA NASS data, https://quickstats.nass.usda.gov) POTATO - APPLICATIONS, MEASURED IN LB / ACRE / YEAR, AVG (fertilizer and pesticides, amount, number of applications) - 2000-2021, https://quickstats.nass.usda.gov/results/910944A6-DEB0-3216-B6B4-F5BA47F1D217
- Fungicides, unspecified [soil, agricultural]: 2.91204e-6 kg; normal variance with pedigree 3.95407e-12, pedigree (1,2,2,3,1)
  proxy for Metiram emission to agricultural soil (2.027E-01 kg/ha). Pesticides are assumed to be ultimately 100% emitted to soil. Average over state-wide reported cropped area of Potato for all tillage practices (OPTiS 2020) and across all rotation patterns (Socolar et al 2021) - calculated from specified herbicide/insecticide/fungicide quantity applied to treated acres weighted by share of acres treated with that herbicide/insecticide/fungicide (2014, 2016, 2018, USDA NASS data, https://quickstats.nass.usda.gov) POTATO - APPLICATIONS, MEASURED IN LB / ACRE / YEAR, AVG (fertilizer and pesticides, amount, number of applications) - 2000-2021, https://quickstats.nass.usda.gov/results/910944A6-DEB0-3216-B6B4-F5BA47F1D217
- Glufosinate [soil, agricultural]: 1.10315e-6 kg; normal variance with pedigree 2.8189e-13, pedigree (1,2,2,3,1)
  Glufosinate emission to agricultural soil (7.678E-02 kg/ha). Pesticides are assumed to be ultimately 100% emitted to soil. Average over state-wide reported cropped area of Potato for all tillage practices (OPTiS 2020) and across all rotation patterns (Socolar et al 2021) - calculated from specified herbicide/insecticide/fungicide quantity applied to treated acres weighted by share of acres treated with that herbicide/insecticide/fungicide (2014, 2016, 2018, USDA NASS data, https://quickstats.nass.usda.gov) POTATO - APPLICATIONS, MEASURED IN LB / ACRE / YEAR, AVG (fertilizer and pesticides, amount, number of applications) - 2000-2021, https://quickstats.nass.usda.gov/results/910944A6-DEB0-3216-B6B4-F5BA47F1D217
- Glyphosate [soil, agricultural]: 3.82451e-6 kg; normal variance with pedigree 1.99233e-12, pedigree (1,2,2,3,1)
  Glyphosate emission to agricultural soil (2.662E-01 kg/ha). Pesticides are assumed to be ultimately 100% emitted to soil. Average over state-wide reported cropped area of Potato for all tillage practices (OPTiS 2020) and across all rotation patterns (Socolar et al 2021) - calculated from specified herbicide/insecticide/fungicide quantity applied to treated acres weighted by share of acres treated with that herbicide/insecticide/fungicide (2014, 2016, 2018, USDA NASS data, https://quickstats.nass.usda.gov) POTATO - APPLICATIONS, MEASURED IN LB / ACRE / YEAR, AVG (fertilizer and pesticides, amount, number of applications) - 2000-2021, https://quickstats.nass.usda.gov/results/910944A6-DEB0-3216-B6B4-F5BA47F1D217
- Imidacloprid [soil, agricultural]: 6.1893e-7 kg; normal variance with pedigree 2.87548e-14, pedigree (1,2,2,3,1)
  Imidacloprid emission to agricultural soil (4.308E-02 kg/ha). Pesticides are assumed to be ultimately 100% emitted to soil. Average over state-wide reported cropped area of Potato for all tillage practices (OPTiS 2020) and across all rotation patterns (Socolar et al 2021) - calculated from specified herbicide/insecticide/fungicide quantity applied to treated acres weighted by share of acres treated with that herbicide/insecticide/fungicide (2014, 2016, 2018, USDA NASS data, https://quickstats.nass.usda.gov) POTATO - APPLICATIONS, MEASURED IN LB / ACRE / YEAR, AVG (fertilizer and pesticides, amount, number of applications) - 2000-2021, https://quickstats.nass.usda.gov/results/910944A6-DEB0-3216-B6B4-F5BA47F1D217
- Lead II [soil, agricultural]: -2.01402e-6 kg; normal variance with pedigree 0.04, pedigree (2,3,3,1,1)
  (same comment as for Cadmium II)
- Linuron [soil, agricultural]: 2.83889e-6 kg; lognormal variance with pedigree 0.0334, pedigree (1,2,2,3,1)
  Linuron emission to agricultural soil (1.976E-01 kg/ha). Pesticides are assumed to be ultimately 100% emitted to soil. Average over state-wide reported cropped area of Potato for all tillage practices (OPTiS 2020) and across all rotation patterns (Socolar et al 2021) - calculated from specified herbicide/insecticide/fungicide quantity applied to treated acres weighted by share of acres treated with that herbicide/insecticide/fungicide (2014, 2016, 2018, USDA NASS data, https://quickstats.nass.usda.gov) POTATO - APPLICATIONS, MEASURED IN LB / ACRE / YEAR, AVG (fertilizer and pesticides, amount, number of applications) - 2000-2021, https://quickstats.nass.usda.gov/results/910944A6-DEB0-3216-B6B4-F5BA47F1D217
- Maleic hydrazide [soil, agricultural]: 9.81844e-6 kg; normal variance with pedigree 8.15031e-12, pedigree (1,2,2,3,1)
  maleic hydrazide emission to agricultural soil (6.834E-01 kg/ha). Pesticides are assumed to be ultimately 100% emitted to soil. Average over state-wide reported cropped area of Potato for all tillage practices (OPTiS 2020) and across all rotation patterns (Socolar et al 2021) - calculated from specified herbicide/insecticide/fungicide quantity applied to treated acres weighted by share of acres treated with that herbicide/insecticide/fungicide (2014, 2016, 2018, USDA NASS data, https://quickstats.nass.usda.gov) POTATO - APPLICATIONS, MEASURED IN LB / ACRE / YEAR, AVG (fertilizer and pesticides, amount, number of applications) - 2000-2021, https://quickstats.nass.usda.gov/results/910944A6-DEB0-3216-B6B4-F5BA47F1D217
- Mancozeb [soil, agricultural]: 4.68412e-5 kg; normal variance with pedigree 1.1317e-10, pedigree (1,2,2,3,1)
  Mancozeb emission to agricultural soil (3.260E+00 kg/ha). Pesticides are assumed to be ultimately 100% emitted to soil. Average over state-wide reported cropped area of Potato for all tillage practices (OPTiS 2020) and across all rotation patterns (Socolar et al 2021) - calculated from specified herbicide/insecticide/fungicide quantity applied to treated acres weighted by share of acres treated with that herbicide/insecticide/fungicide (2014, 2016, 2018, USDA NASS data, https://quickstats.nass.usda.gov) POTATO - APPLICATIONS, MEASURED IN LB / ACRE / YEAR, AVG (fertilizer and pesticides, amount, number of applications) - 2000-2021, https://quickstats.nass.usda.gov/results/910944A6-DEB0-3216-B6B4-F5BA47F1D217
- Mandipropamid [soil, agricultural]: 2.90781e-7 kg; normal variance with pedigree 2.15447e-14, pedigree (1,2,2,3,1)
  Mandipropamide emission to agricultural soil (2.024E-02 kg/ha). Pesticides are assumed to be ultimately 100% emitted to soil. Average over state-wide reported cropped area of Potato for all tillage practices (OPTiS 2020) and across all rotation patterns (Socolar et al 2021) - calculated from specified herbicide/insecticide/fungicide quantity applied to treated acres weighted by share of acres treated with that herbicide/insecticide/fungicide (2014, 2016, 2018, USDA NASS data, https://quickstats.nass.usda.gov) POTATO - APPLICATIONS, MEASURED IN LB / ACRE / YEAR, AVG (fertilizer and pesticides, amount, number of applications) - 2000-2021, https://quickstats.nass.usda.gov/results/910944A6-DEB0-3216-B6B4-F5BA47F1D217
- Mercury II [soil, agricultural]: -4.50687e-7 kg; normal variance with pedigree 0.04, pedigree (2,3,3,1,1)
  (same comment as for Cadmium II)
- Metalaxil [soil, agricultural]: 2.1188e-6 kg; normal variance with pedigree 7.05612e-13, pedigree (1,2,2,3,1)
  Metalaxil emission to agricultural soil (1.475E-01 kg/ha). Pesticides are assumed to be ultimately 100% emitted to soil. Average over state-wide reported cropped area of Potato for all tillage practices (OPTiS 2020) and across all rotation patterns (Socolar et al 2021) - calculated from specified herbicide/insecticide/fungicide quantity applied to treated acres weighted by share of acres treated with that herbicide/insecticide/fungicide (2014, 2016, 2018, USDA NASS data, https://quickstats.nass.usda.gov) POTATO - APPLICATIONS, MEASURED IN LB / ACRE / YEAR, AVG (fertilizer and pesticides, amount, number of applications) - 2000-2021, https://quickstats.nass.usda.gov/results/910944A6-DEB0-3216-B6B4-F5BA47F1D217
- Metam-sodium [soil, agricultural]: 0.00107608 kg; lognormal variance with pedigree 0.0334, pedigree (1,2,2,3,1)
  Metam-sodium emission to agricultural soil (7.490E+01 kg/ha). Pesticides are assumed to be ultimately 100% emitted to soil. Average over state-wide reported cropped area of Potato for all tillage practices (OPTiS 2020) and across all rotation patterns (Socolar et al 2021) - calculated from specified herbicide/insecticide/fungicide quantity applied to treated acres weighted by share of acres treated with that herbicide/insecticide/fungicide (2014, 2016, 2018, USDA NASS data, https://quickstats.nass.usda.gov) POTATO - APPLICATIONS, MEASURED IN LB / ACRE / YEAR, AVG (fertilizer and pesticides, amount, number of applications) - 2000-2021, https://quickstats.nass.usda.gov/results/910944A6-DEB0-3216-B6B4-F5BA47F1D217
- Metolachlor [soil, agricultural]: 1.76361e-6 kg; lognormal variance with pedigree 0.0334, pedigree (1,2,2,3,1)
  Metolachlor emission to agricultural soil (1.228E-01 kg/ha). Pesticides are assumed to be ultimately 100% emitted to soil. Average over state-wide reported cropped area of Potato for all tillage practices (OPTiS 2020) and across all rotation patterns (Socolar et al 2021) - calculated from specified herbicide/insecticide/fungicide quantity applied to treated acres weighted by share of acres treated with that herbicide/insecticide/fungicide (2014, 2016, 2018, USDA NASS data, https://quickstats.nass.usda.gov) POTATO - APPLICATIONS, MEASURED IN LB / ACRE / YEAR, AVG (fertilizer and pesticides, amount, number of applications) - 2000-2021, https://quickstats.nass.usda.gov/results/910944A6-DEB0-3216-B6B4-F5BA47F1D217
- Metribuzin [soil, agricultural]: 5.28583e-6 kg; normal variance with pedigree 7.05755e-13, pedigree (1,2,2,3,1)
  Metribuzin emission to agricultural soil (3.679E-01 kg/ha). Pesticides are assumed to be ultimately 100% emitted to soil. Average over state-wide reported cropped area of Potato for all tillage practices (OPTiS 2020) and across all rotation patterns (Socolar et al 2021) - calculated from specified herbicide/insecticide/fungicide quantity applied to treated acres weighted by share of acres treated with that herbicide/insecticide/fungicide (2014, 2016, 2018, USDA NASS data, https://quickstats.nass.usda.gov) POTATO - APPLICATIONS, MEASURED IN LB / ACRE / YEAR, AVG (fertilizer and pesticides, amount, number of applications) - 2000-2021, https://quickstats.nass.usda.gov/results/910944A6-DEB0-3216-B6B4-F5BA47F1D217
- Monopotassium phosphite [soil, agricultural]: 2.41675e-6 kg; lognormal variance with pedigree 0.0334, pedigree (1,2,2,3,1)
  Monopotassium phosphite emission to agricultural soil (1.682E-01 kg/ha). Pesticides are assumed to be ultimately 100% emitted to soil. Average over state-wide reported cropped area of Potato for all tillage practices (OPTiS 2020) and across all rotation patterns (Socolar et al 2021) - calculated from specified herbicide/insecticide/fungicide quantity applied to treated acres weighted by share of acres treated with that herbicide/insecticide/fungicide (2014, 2016, 2018, USDA NASS data, https://quickstats.nass.usda.gov) POTATO - APPLICATIONS, MEASURED IN LB / ACRE / YEAR, AVG (fertilizer and pesticides, amount, number of applications) - 2000-2021, https://quickstats.nass.usda.gov/results/910944A6-DEB0-3216-B6B4-F5BA47F1D217
- Nickel II [soil, agricultural]: -6.55971e-6 kg; normal variance with pedigree 0.04, pedigree (2,3,3,1,1)
  (same comment as for Cadmium II)
- Novaluron [soil, agricultural]: 3.64251e-7 kg; lognormal variance with pedigree 0.0334, pedigree (1,2,2,3,1)
  Novaluron emission to agricultural soil (2.535E-02 kg/ha). Pesticides are assumed to be ultimately 100% emitted to soil. Average over state-wide reported cropped area of Potato for all tillage practices (OPTiS 2020) and across all rotation patterns (Socolar et al 2021) - calculated from specified herbicide/insecticide/fungicide quantity applied to treated acres weighted by share of acres treated with that herbicide/insecticide/fungicide (2014, 2016, 2018, USDA NASS data, https://quickstats.nass.usda.gov) POTATO - APPLICATIONS, MEASURED IN LB / ACRE / YEAR, AVG (fertilizer and pesticides, amount, number of applications) - 2000-2021, https://quickstats.nass.usda.gov/results/910944A6-DEB0-3216-B6B4-F5BA47F1D217
- Oxamyl [soil, agricultural]: 2.99517e-5 kg; normal variance with pedigree 7.94225e-11, pedigree (1,2,2,3,1)
  Oxamyl emission to agricultural soil (2.085E+00 kg/ha). Pesticides are assumed to be ultimately 100% emitted to soil. Average over state-wide reported cropped area of Potato for all tillage practices (OPTiS 2020) and across all rotation patterns (Socolar et al 2021) - calculated from specified herbicide/insecticide/fungicide quantity applied to treated acres weighted by share of acres treated with that herbicide/insecticide/fungicide (2014, 2016, 2018, USDA NASS data, https://quickstats.nass.usda.gov) POTATO - APPLICATIONS, MEASURED IN LB / ACRE / YEAR, AVG (fertilizer and pesticides, amount, number of applications) - 2000-2021, https://quickstats.nass.usda.gov/results/910944A6-DEB0-3216-B6B4-F5BA47F1D217
- Paraquat [soil, agricultural]: 4.14403e-7 kg; normal variance with pedigree 2.85224e-14, pedigree (1,2,2,3,1)
  Paraquat emission to agricultural soil (2.884E-02 kg/ha). Pesticides are assumed to be ultimately 100% emitted to soil. Average over state-wide reported cropped area of Potato for all tillage practices (OPTiS 2020) and across all rotation patterns (Socolar et al 2021) - calculated from specified herbicide/insecticide/fungicide quantity applied to treated acres weighted by share of acres treated with that herbicide/insecticide/fungicide (2014, 2016, 2018, USDA NASS data, https://quickstats.nass.usda.gov) POTATO - APPLICATIONS, MEASURED IN LB / ACRE / YEAR, AVG (fertilizer and pesticides, amount, number of applications) - 2000-2021, https://quickstats.nass.usda.gov/results/910944A6-DEB0-3216-B6B4-F5BA47F1D217
- Pendimethalin [soil, agricultural]: 5.15467e-6 kg; normal variance with pedigree 6.24803e-13, pedigree (1,2,2,3,1)
  Pendimethalin emission to agricultural soil (3.588E-01 kg/ha). Pesticides are assumed to be ultimately 100% emitted to soil. Average over state-wide reported cropped area of Potato for all tillage practices (OPTiS 2020) and across all rotation patterns (Socolar et al 2021) - calculated from specified herbicide/insecticide/fungicide quantity applied to treated acres weighted by share of acres treated with that herbicide/insecticide/fungicide (2014, 2016, 2018, USDA NASS data, https://quickstats.nass.usda.gov) POTATO - APPLICATIONS, MEASURED IN LB / ACRE / YEAR, AVG (fertilizer and pesticides, amount, number of applications) - 2000-2021, https://quickstats.nass.usda.gov/results/910944A6-DEB0-3216-B6B4-F5BA47F1D217
- Permethrin [soil, agricultural]: 4.12507e-7 kg; normal variance with pedigree 2.33697e-14, pedigree (1,2,2,3,1)
  Permethrin emission to agricultural soil (2.871E-02 kg/ha). Pesticides are assumed to be ultimately 100% emitted to soil. Average over state-wide reported cropped area of Potato for all tillage practices (OPTiS 2020) and across all rotation patterns (Socolar et al 2021) - calculated from specified herbicide/insecticide/fungicide quantity applied to treated acres weighted by share of acres treated with that herbicide/insecticide/fungicide (2014, 2016, 2018, USDA NASS data, https://quickstats.nass.usda.gov) POTATO - APPLICATIONS, MEASURED IN LB / ACRE / YEAR, AVG (fertilizer and pesticides, amount, number of applications) - 2000-2021, https://quickstats.nass.usda.gov/results/910944A6-DEB0-3216-B6B4-F5BA47F1D217
- Phosmet [soil, agricultural]: 3.76812e-7 kg; lognormal variance with pedigree 0.0334, pedigree (1,2,2,3,1)
  Phosmet emission to agricultural soil (2.623E-02 kg/ha). Pesticides are assumed to be ultimately 100% emitted to soil. Average over state-wide reported cropped area of Potato for all tillage practices (OPTiS 2020) and across all rotation patterns (Socolar et al 2021) - calculated from specified herbicide/insecticide/fungicide quantity applied to treated acres weighted by share of acres treated with that herbicide/insecticide/fungicide (2014, 2016, 2018, USDA NASS data, https://quickstats.nass.usda.gov) POTATO - APPLICATIONS, MEASURED IN LB / ACRE / YEAR, AVG (fertilizer and pesticides, amount, number of applications) - 2000-2021, https://quickstats.nass.usda.gov/results/910944A6-DEB0-3216-B6B4-F5BA47F1D217
- Phosphorous acid [soil, agricultural]: 1.55638e-5 kg; lognormal variance with pedigree 0.0334, pedigree (1,2,2,3,1)
  Phosphorous acid emission to agricultural soil (1.083E+00 kg/ha). Pesticides are assumed to be ultimately 100% emitted to soil. Average over state-wide reported cropped area of Potato for all tillage practices (OPTiS 2020) and across all rotation patterns (Socolar et al 2021) - calculated from specified herbicide/insecticide/fungicide quantity applied to treated acres weighted by share of acres treated with that herbicide/insecticide/fungicide (2014, 2016, 2018, USDA NASS data, https://quickstats.nass.usda.gov) POTATO - APPLICATIONS, MEASURED IN LB / ACRE / YEAR, AVG (fertilizer and pesticides, amount, number of applications) - 2000-2021, https://quickstats.nass.usda.gov/results/910944A6-DEB0-3216-B6B4-F5BA47F1D217
- Propamocarb [soil, agricultural]: 1.82408e-6 kg; normal variance with pedigree 5.53513e-13, pedigree (1,2,2,3,1)
  Propamocarb emission to agricultural soil (1.270E-01 kg/ha). Pesticides are assumed to be ultimately 100% emitted to soil. Average over state-wide reported cropped area of Potato for all tillage practices (OPTiS 2020) and across all rotation patterns (Socolar et al 2021) - calculated from specified herbicide/insecticide/fungicide quantity applied to treated acres weighted by share of acres treated with that herbicide/insecticide/fungicide (2014, 2016, 2018, USDA NASS data, https://quickstats.nass.usda.gov) POTATO - APPLICATIONS, MEASURED IN LB / ACRE / YEAR, AVG (fertilizer and pesticides, amount, number of applications) - 2000-2021, https://quickstats.nass.usda.gov/results/910944A6-DEB0-3216-B6B4-F5BA47F1D217
- Propargite [soil, agricultural]: 3.24267e-6 kg; lognormal variance with pedigree 0.0334, pedigree (1,2,2,3,1)
  Propargite emission to agricultural soil (2.257E-01 kg/ha). Pesticides are assumed to be ultimately 100% emitted to soil. Average over state-wide reported cropped area of Potato for all tillage practices (OPTiS 2020) and across all rotation patterns (Socolar et al 2021) - calculated from specified herbicide/insecticide/fungicide quantity applied to treated acres weighted by share of acres treated with that herbicide/insecticide/fungicide (2014, 2016, 2018, USDA NASS data, https://quickstats.nass.usda.gov) POTATO - APPLICATIONS, MEASURED IN LB / ACRE / YEAR, AVG (fertilizer and pesticides, amount, number of applications) - 2000-2021, https://quickstats.nass.usda.gov/results/910944A6-DEB0-3216-B6B4-F5BA47F1D217
- Pymetrozine [soil, agricultural]: 2.90821e-7 kg; lognormal variance with pedigree 0.0334, pedigree (1,2,2,3,1)
  Pymetrozine emission to agricultural soil (2.024E-02 kg/ha). Pesticides are assumed to be ultimately 100% emitted to soil. Average over state-wide reported cropped area of Potato for all tillage practices (OPTiS 2020) and across all rotation patterns (Socolar et al 2021) - calculated from specified herbicide/insecticide/fungicide quantity applied to treated acres weighted by share of acres treated with that herbicide/insecticide/fungicide (2014, 2016, 2018, USDA NASS data, https://quickstats.nass.usda.gov) POTATO - APPLICATIONS, MEASURED IN LB / ACRE / YEAR, AVG (fertilizer and pesticides, amount, number of applications) - 2000-2021, https://quickstats.nass.usda.gov/results/910944A6-DEB0-3216-B6B4-F5BA47F1D217
- Pyraclostrobin [soil, agricultural]: 1.07558e-6 kg; normal variance with pedigree 3.33227e-13, pedigree (1,2,2,3,1)
  Pyraclostrobin emission to agricultural soil (7.487E-02 kg/ha). Pesticides are assumed to be ultimately 100% emitted to soil. Average over state-wide reported cropped area of Potato for all tillage practices (OPTiS 2020) and across all rotation patterns (Socolar et al 2021) - calculated from specified herbicide/insecticide/fungicide quantity applied to treated acres weighted by share of acres treated with that herbicide/insecticide/fungicide (2014, 2016, 2018, USDA NASS data, https://quickstats.nass.usda.gov) POTATO - APPLICATIONS, MEASURED IN LB / ACRE / YEAR, AVG (fertilizer and pesticides, amount, number of applications) - 2000-2021, https://quickstats.nass.usda.gov/results/910944A6-DEB0-3216-B6B4-F5BA47F1D217
- Pyrethrum [soil, agricultural]: 2.86634e-8 kg; lognormal variance with pedigree 0.0334, pedigree (1,2,2,3,1)
  Pyrethrum emission to agricultural soil (1.995E-03 kg/ha). Pesticides are assumed to be ultimately 100% emitted to soil. Average over state-wide reported cropped area of Potato for all tillage practices (OPTiS 2020) and across all rotation patterns (Socolar et al 2021) - calculated from specified herbicide/insecticide/fungicide quantity applied to treated acres weighted by share of acres treated with that herbicide/insecticide/fungicide (2014, 2016, 2018, USDA NASS data, https://quickstats.nass.usda.gov) POTATO - APPLICATIONS, MEASURED IN LB / ACRE / YEAR, AVG (fertilizer and pesticides, amount, number of applications) - 2000-2021, https://quickstats.nass.usda.gov/results/910944A6-DEB0-3216-B6B4-F5BA47F1D217
- Pyrimethanil [soil, agricultural]: 1.81892e-6 kg; normal variance with pedigree 1.78792e-12, pedigree (1,2,2,3,1)
  Pyrimethanil emission to agricultural soil (1.266E-01 kg/ha). Pesticides are assumed to be ultimately 100% emitted to soil. Average over state-wide reported cropped area of Potato for all tillage practices (OPTiS 2020) and across all rotation patterns (Socolar et al 2021) - calculated from specified herbicide/insecticide/fungicide quantity applied to treated acres weighted by share of acres treated with that herbicide/insecticide/fungicide (2014, 2016, 2018, USDA NASS data, https://quickstats.nass.usda.gov) POTATO - APPLICATIONS, MEASURED IN LB / ACRE / YEAR, AVG (fertilizer and pesticides, amount, number of applications) - 2000-2021, https://quickstats.nass.usda.gov/results/910944A6-DEB0-3216-B6B4-F5BA47F1D217
- Quintozene [soil, agricultural]: 1.17715e-5 kg; lognormal variance with pedigree 0.0334, pedigree (1,2,2,3,1)
  Quintozene emission to agricultural soil (8.194E-01 kg/ha). Pesticides are assumed to be ultimately 100% emitted to soil. Average over state-wide reported cropped area of Potato for all tillage practices (OPTiS 2020) and across all rotation patterns (Socolar et al 2021) - calculated from specified herbicide/insecticide/fungicide quantity applied to treated acres weighted by share of acres treated with that herbicide/insecticide/fungicide (2014, 2016, 2018, USDA NASS data, https://quickstats.nass.usda.gov) POTATO - APPLICATIONS, MEASURED IN LB / ACRE / YEAR, AVG (fertilizer and pesticides, amount, number of applications) - 2000-2021, https://quickstats.nass.usda.gov/results/910944A6-DEB0-3216-B6B4-F5BA47F1D217
- Rimsulfuron [soil, agricultural]: 1.2793e-7 kg; normal variance with pedigree 2.5914e-16, pedigree (1,2,2,3,1)
  Rimsulfuron emission to agricultural soil (8.905E-03 kg/ha). Pesticides are assumed to be ultimately 100% emitted to soil. Average over state-wide reported cropped area of Potato for all tillage practices (OPTiS 2020) and across all rotation patterns (Socolar et al 2021) - calculated from specified herbicide/insecticide/fungicide quantity applied to treated acres weighted by share of acres treated with that herbicide/insecticide/fungicide (2014, 2016, 2018, USDA NASS data, https://quickstats.nass.usda.gov) POTATO - APPLICATIONS, MEASURED IN LB / ACRE / YEAR, AVG (fertilizer and pesticides, amount, number of applications) - 2000-2021, https://quickstats.nass.usda.gov/results/910944A6-DEB0-3216-B6B4-F5BA47F1D217
- S-Metolachlor [soil, agricultural]: 2.76574e-6 kg; normal variance with pedigree 4.23999e-13, pedigree (1,2,2,3,1)
  S-metolachlor emission to agricultural soil (1.925E-01 kg/ha). Pesticides are assumed to be ultimately 100% emitted to soil. Average over state-wide reported cropped area of Potato for all tillage practices (OPTiS 2020) and across all rotation patterns (Socolar et al 2021) - calculated from specified herbicide/insecticide/fungicide quantity applied to treated acres weighted by share of acres treated with that herbicide/insecticide/fungicide (2014, 2016, 2018, USDA NASS data, https://quickstats.nass.usda.gov) POTATO - APPLICATIONS, MEASURED IN LB / ACRE / YEAR, AVG (fertilizer and pesticides, amount, number of applications) - 2000-2021, https://quickstats.nass.usda.gov/results/910944A6-DEB0-3216-B6B4-F5BA47F1D217
- Spinosad [soil, agricultural]: 2.53623e-7 kg; lognormal variance with pedigree 0.0334, pedigree (1,2,2,3,1)
  Spinosad emission to agricultural soil (1.765E-02 kg/ha). Pesticides are assumed to be ultimately 100% emitted to soil. Average over state-wide reported cropped area of Potato for all tillage practices (OPTiS 2020) and across all rotation patterns (Socolar et al 2021) - calculated from specified herbicide/insecticide/fungicide quantity applied to treated acres weighted by share of acres treated with that herbicide/insecticide/fungicide (2014, 2016, 2018, USDA NASS data, https://quickstats.nass.usda.gov) POTATO - APPLICATIONS, MEASURED IN LB / ACRE / YEAR, AVG (fertilizer and pesticides, amount, number of applications) - 2000-2021, https://quickstats.nass.usda.gov/results/910944A6-DEB0-3216-B6B4-F5BA47F1D217
- Spiromesifen [soil, agricultural]: 1.35024e-6 kg; normal variance with pedigree 5.85463e-13, pedigree (1,2,2,3,1)
  Spiromesifren emission to agricultural soil (9.398E-02 kg/ha). Pesticides are assumed to be ultimately 100% emitted to soil. Average over state-wide reported cropped area of Potato for all tillage practices (OPTiS 2020) and across all rotation patterns (Socolar et al 2021) - calculated from specified herbicide/insecticide/fungicide quantity applied to treated acres weighted by share of acres treated with that herbicide/insecticide/fungicide (2014, 2016, 2018, USDA NASS data, https://quickstats.nass.usda.gov) POTATO - APPLICATIONS, MEASURED IN LB / ACRE / YEAR, AVG (fertilizer and pesticides, amount, number of applications) - 2000-2021, https://quickstats.nass.usda.gov/results/910944A6-DEB0-3216-B6B4-F5BA47F1D217
- Spirotetramat [soil, agricultural]: 5.97746e-7 kg; normal variance with pedigree 5.30384e-14, pedigree (1,2,2,3,1)
  Spirotetramat emission to agricultural soil (4.161E-02 kg/ha). Pesticides are assumed to be ultimately 100% emitted to soil. Average over state-wide reported cropped area of Potato for all tillage practices (OPTiS 2020) and across all rotation patterns (Socolar et al 2021) - calculated from specified herbicide/insecticide/fungicide quantity applied to treated acres weighted by share of acres treated with that herbicide/insecticide/fungicide (2014, 2016, 2018, USDA NASS data, https://quickstats.nass.usda.gov) POTATO - APPLICATIONS, MEASURED IN LB / ACRE / YEAR, AVG (fertilizer and pesticides, amount, number of applications) - 2000-2021, https://quickstats.nass.usda.gov/results/910944A6-DEB0-3216-B6B4-F5BA47F1D217
- Sulfur [soil, agricultural]: 1.98403e-5 kg; normal variance with pedigree 5.00736e-11, pedigree (1,2,2,3,1)
  Sulfur emission to agricultural soil (1.381E+00 kg/ha). Pesticides are assumed to be ultimately 100% emitted to soil. Average over state-wide reported cropped area of Potato for all tillage practices (OPTiS 2020) and across all rotation patterns (Socolar et al 2021) - calculated from specified herbicide/insecticide/fungicide quantity applied to treated acres weighted by share of acres treated with that herbicide/insecticide/fungicide (2014, 2016, 2018, USDA NASS data, https://quickstats.nass.usda.gov) POTATO - APPLICATIONS, MEASURED IN LB / ACRE / YEAR, AVG (fertilizer and pesticides, amount, number of applications) - 2000-2021, https://quickstats.nass.usda.gov/results/910944A6-DEB0-3216-B6B4-F5BA47F1D217
- Thiamethoxam [soil, agricultural]: 7.57059e-7 kg; normal variance with pedigree 3.24276e-14, pedigree (1,2,2,3,1)
  Thiamethoxam emission to agricultural soil (5.269E-02 kg/ha). Pesticides are assumed to be ultimately 100% emitted to soil. Average over state-wide reported cropped area of Potato for all tillage practices (OPTiS 2020) and across all rotation patterns (Socolar et al 2021) - calculated from specified herbicide/insecticide/fungicide quantity applied to treated acres weighted by share of acres treated with that herbicide/insecticide/fungicide (2014, 2016, 2018, USDA NASS data, https://quickstats.nass.usda.gov) POTATO - APPLICATIONS, MEASURED IN LB / ACRE / YEAR, AVG (fertilizer and pesticides, amount, number of applications) - 2000-2021, https://quickstats.nass.usda.gov/results/910944A6-DEB0-3216-B6B4-F5BA47F1D217
- Zeta-cypermethrin [soil, agricultural]: 1.28824e-9 kg; lognormal variance with pedigree 0.0334, pedigree (1,2,2,3,1)
  Zeta-cypermethrin emission to agricultural soil (8.967E-05 kg/ha). Pesticides are assumed to be ultimately 100% emitted to soil. Average over state-wide reported cropped area of Potato for all tillage practices (OPTiS 2020) and across all rotation patterns (Socolar et al 2021) - calculated from specified herbicide/insecticide/fungicide quantity applied to treated acres weighted by share of acres treated with that herbicide/insecticide/fungicide (2014, 2016, 2018, USDA NASS data, https://quickstats.nass.usda.gov) POTATO - APPLICATIONS, MEASURED IN LB / ACRE / YEAR, AVG (fertilizer and pesticides, amount, number of applications) - 2000-2021, https://quickstats.nass.usda.gov/results/910944A6-DEB0-3216-B6B4-F5BA47F1D217
- Zinc II [soil, agricultural]: -3.55012e-5 kg; normal variance with pedigree 0.04, pedigree (2,3,3,1,1)
  (same comment as for Cadmium II)
- Zoxamide [soil, agricultural]: 7.37252e-7 kg; lognormal variance with pedigree 0.0334, pedigree (1,2,2,3,1)
  Zoxamide emission to agricultural soil (5.132E-02 kg/ha). Pesticides are assumed to be ultimately 100% emitted to soil. Average over state-wide reported cropped area of Potato for all tillage practices (OPTiS 2020) and across all rotation patterns (Socolar et al 2021) - calculated from specified herbicide/insecticide/fungicide quantity applied to treated acres weighted by share of acres treated with that herbicide/insecticide/fungicide (2014, 2016, 2018, USDA NASS data, https://quickstats.nass.usda.gov) POTATO - APPLICATIONS, MEASURED IN LB / ACRE / YEAR, AVG (fertilizer and pesticides, amount, number of applications) - 2000-2021, https://quickstats.nass.usda.gov/results/910944A6-DEB0-3216-B6B4-F5BA47F1D217
- Cadmium II [water, ground-]: 7.37862e-10 kg; lognormal variance with pedigree 0.0932, pedigree (2,3,3,1,1)
  Emissions of heavy metals to ground water arise from leaching. These emissions are estimated based on the SALCA-heavy metal model (Freiermuth 2006) following the procedure in the ecoinvent agricultural LCI tool (Faist Emmenegger, Délerce-Mauris and Porté 2018 Models Integrated in Ecoinvent LCI Calculation Tool for Crop Production). The crop system carries a share of heavy metals emissions based on the ratio of cropping additions to total additions (additions to crop system divided by additions to crop system plus depostion from air and present in soils)Sources for heavy metals leaching to groundwater include: Leaching of heavy metals to groundwater (Wolfensberger & Dinkel 1997), where no drainage is installed ; the share of leaching to groundwater is calcualted from Drainage on all cropland acres state-wide, including tile drainage (1.7%,) and ditch drainage (4.3%). USDA (2018) 2017 Census of Agriculture, Volume 1, Chapter 2: State Level Data - Table 41. Land Use Practices: 2017 and 2012 (live table: https://www.nass.usda.gov/Quick_Stats/CDQT/chapter/2/table/41/state/US). US Department of Agriculture (USDA). https://www.nass.usda.gov/Publications/AgCensus/2017/Full_Report/Volume_1,_Chapter_2_US_State_Level/st99_2_0041_0041.pdf.
- Cadmium II [water, surface water]: 1.0337e-7 kg; lognormal variance with pedigree 0.0932, pedigree (2,3,3,1,1)
  Emissions of heavy metals to surface water arise from leaching (when drainage is present) and erosion. Emissions are estimated based on the SALCA-heavy metal model (Freiermuth 2006) following the procedure in the ecoinvent agricultural LCI tool (Faist Emmenegger, Délerce-Mauris and Porté 2018 Models Integrated in Ecoinvent LCI Calculation Tool for Crop Production). The crop system carries a share of heavy metals emissions based on the ratio of cropping additions to total additions (additions to crop system divided by additions to crop system plus depostion from air and present in soils) Sources for heavy metals contents include: Leaching of heavy metals to surface water (Wolfensberger & Dinkel 1997), where drainage is installed ; Average heavy metal contents in crop soils, mg per kg soil, based on data for Switzerland (from Keller & Desaules, 2001). erosion rates are from US NRC National Resources Inventory, 2017. and Drainage on all cropland acres state-wide, including tile drainage (1.7%,) and ditch drainage (4.3%). USDA (2018) 2017 Census of Agriculture, Volume 1, Chapter 2: State Level Data - Table 41. Land Use Practices: 2017 and 2012 (live table: https://www.nass.usda.gov/Quick_Stats/CDQT/chapter/2/table/41/state/US). US Department of Agriculture (USDA). https://www.nass.usda.gov/Publications/AgCensus/2017/Full_Report/Volume_1,_Chapter_2_US_State_Level/st99_2_0041_0041.pdf. Fertilizer, manure and pesticide application rates are based on USDA NASS data.
- Chromium III [water, ground-]: 3.55669e-7 kg; lognormal variance with pedigree 0.0932, pedigree (2,3,3,1,1)
  (same comment as for Cadmium II)
- Chromium III [water, surface water]: 1.00445e-5 kg; lognormal variance with pedigree 0.0932, pedigree (2,3,3,1,1)
  (same comment as for Cadmium II)
- Copper ion [water, ground-]: 5.56705e-8 kg; lognormal variance with pedigree 0.0932, pedigree (2,3,3,1,1)
  (same comment as for Cadmium II)
- Copper ion [water, surface water]: 3.42248e-6 kg; lognormal variance with pedigree 0.0932, pedigree (2,3,3,1,1)
  (same comment as for Cadmium II)
- Lead II [water, ground-]: 4.45634e-10 kg; lognormal variance with pedigree 0.0932, pedigree (2,3,3,1,1)
  (same comment as for Cadmium II)
- Lead II [water, surface water]: 9.2628e-6 kg; lognormal variance with pedigree 0.0932, pedigree (2,3,3,1,1)
  (same comment as for Cadmium II)
- Mercury II [water, ground-]: 1.6309e-11 kg; lognormal variance with pedigree 0.0932, pedigree (2,3,3,1,1)
  (same comment as for Cadmium II)
- Mercury II [water, surface water]: 2.8644e-7 kg; lognormal variance with pedigree 0.0932, pedigree (2,3,3,1,1)
  (same comment as for Cadmium II)
- Nickel II [water, surface water]: 9.2256e-6 kg; lognormal variance with pedigree 0.0932, pedigree (2,3,3,1,1)
  (same comment as for Cadmium II)
- Nitrate [water, ground-]: 0.00448734 kg; lognormal variance with pedigree 0.0409, pedigree (2,2,2,1,1)
  The total nitrate leaching/runoff is 7.374E+2kg NO3/kg/ha (4.487E-3kg NO3/kg Potato), 6.47E+2kg NO3/ha from fertilisers, 0.E+0kg NO3/ha , 9.46E+1kg NO3/ha from soil mineralization, and -4.183E+0kg NO3 N uptake. 57.6% is emitted to surface water and 42.4% to ground water, since 57.6% of cropland in Washington has drainage. Nitrate leaching is calculated with the SQCB-NO3 model (Faist Emmenegger et al. 2009) using general (state-level parameters for slope and clay content, local precipitation and irrigation data).
  Sources:
  Faist Emmenegger M, Reinhard J, Zah R (2009) Sustainability Quick Check for Biofuels - in- termediate background report. With contributions from T. Ziep, R. Weichbrodt, Prof. Dr. V. Wohlgemuth, FHTW Berlin and A. Roches, R. Freiermuth Knuchel, Dr. G. Gaillard, Agroscope Reckenholz-Tänikon. Dübendorf. https://www.researchgate.net/profile/Rainer-Zah/publication/230725635_SQCB_-_Sustainability_Quick_Check_for_Biofuels_Second_draft_18th_February_2009_-_Intermediate_Background_Report_With_contributions_from_T_Ziep_R_Weichbrodt_Prof_Dr_V_Wohlgemuth_FHTW_Berlin_and_A_Roche/links/56b458fb08ae1f8aa45392e6/SQCB-Sustainability-Quick-Check-for-Biofuels-Second-draft-18th-February-2009-Intermediate-Background-Report-With-contributions-from-T-Ziep-R-Weichbrodt-Prof-Dr-V-Wohlgemuth-FHTW-Berlin-and-A-R.pdf; DeBruin J and Butzen S (2020) Nitrogen uptake by corn . Pioneer. https://www.pioneer.com/us/agronomy/nitrogen_uptake_corn.htmlaccessed 11-20-2021; Fan, Y., Wang, Z., Liao, D. et al. Uptake and utilization of nitrogen, phosphorus and potassium as related to yield advantage in maize-soybean intercropping under different row configurations. Sci Rep 10, 9504 (2020). https://doi.org/10.1038/s41598-020-66459-y; Hollinger S E (1995) Midwestern Climate Center Soils Atlas and Database. Crop Science Extension & Outreach, University of Illinois . https://www.isws.illinois.edu/pubdoc/C/ISWSC-179.pdf; Bruulsema T and Jones J D (2021) Soil Test Summary 2020. Foundation for Agronomic Research and Plant Nutrition Canada present this 2020 summary of soil test levels in North America. Foundation for Agronomic Research, Plant Nutrition Canada. https://soiltest.tfi.org/about/about_soil_test_summaryaccessed August 30, 2021
- Nitrate [water, surface water]: 0.00610637 kg; lognormal variance with pedigree 0.0409, pedigree (2,2,2,1,1)
  (same comment as for Nitrate)
- Phosphate [water, ground-]: 2.01136e-6 kg; lognormal variance with pedigree 0.0428, pedigree (2,4,2,1,1)
  Phosphate leaching to ground water 0.14 kg PO4/ha (2.011E-6 kg/kg Potato): 7.E-2 kg PO4/ha from manure and 7.E-2 kg PO4/ha from leaching from arable land. Phosphate leaching to ground water is calculated using the SALCA-P model (Prasuhn 2006) with an average leaching factor for arable lands and the amount of phosphate in any applied manure, as implemented in the ecoinvent agricultural LCI tool (see Ecoinvent_Too_Model_Description_20191015.pdf). Does not incorporate state or county data on soils, slope or conservation drainage infrastructure. Calculated with the ecoinvent agricultural LCI tool.
- Phosphate [water, surface water]: 3.42593e-6 kg; lognormal variance with pedigree 0.0428, pedigree (2,4,2,1,1)
  Phosphate runoff to surface water 0.238kg PO4/ha (3.426E-6: 0.E+0 kg PO4/ha from manure, 6.346E-2 kg PO4/ha from mineral fertilisers, and 1.75E-1 kg PO4/ha from leaching from arable landPhosphate runoff to surface water is calculated using the SALCA-P model (Prasuhn 2006) with an average leaching factor for arable lands and the amount of phosphate in any applied solid manure, liquid manure and mineral fertilisers, as implemented in the ecoinvent agricultural LCI tool (see Ecoinvent_Too_Model_Description_20191015.pdf). Does not incorporate state or county data on soils, slope or conservation drainage infrastructure. Calculated with the ecoinvent agricultural LCI tool. (0.E+0 kg PO4/ha from manure, 6.346E-2 kg PO4/ha from mineral fertilisers, and 1.75E-1 kg PO4/ha from leaching from arable land)
- Phosphorus [water, surface water]: 8.92285e-7 kg; lognormal variance with pedigree 0.0502, pedigree (3,2,4,3,1)
  Phosphorus emissions to surface water are based on the SALCA-P model (Prasuhn 2006), but using state-specific data for agricultural land (not crop-specific). The erosion and soil test values encompass the state-wide reported cropped area of Potato in Idaho for all tillage practices (OPTiS 2020) and across all rotation patterns (Socolar et al 2021).Soil Phosphorus losses are calculated from an annual soil loss from water erosion on agricultural soils in Idaho of 5.537t/ha/year (NRCS 2020b)with a Phosphorus soil concentration of 25mg/kg soil, the median value from 1,597 soil test samples reported for Idaho in the 2020 Soil Test Survey, (the average of the 2005, 2010, 2015, and 2020 median soil Phosphorus concentrations is 33.8mg/kg soil) (Bruulsema T and Jones J D 2021).No enrichment factor has been applied, because the phosphorus soil concentration samples are specifically agricultural land in the study area and thus any enrichment as a result of synthetic and organic fertilisers is already caputred in the soil test.An active cultivation duration of 6.8 months (0.56 year), covering cultivation through harvest (from weekly progress reports,USDA NASS 2021b), is used to adjust the annual erosion to the crop share (see Faist-Emmenegger et al 2009).No adjustment has been made for the presence of drainage (installed on 6.% of crop land, USDA 2018) or any anti-erosion practices.Sources:
  NRCS (2020a) Soil losses from erosion (water and wind) on cultivated cropland, in the 2017 National Resources Inventory. USDA, Natural Resources Conservation Service. http://www.nrcs.usda.gov/Internet/NRCS_RCA/reports/nri_crop_nat.html; Bruulsema T and Jones J D (2021) Soil Test Summary 2020. Foundation for Agronomic Research and Plant Nutrition Canada present this 2020 summary of soil test levels in North America. Foundation for Agronomic Research, Plant Nutrition Canada. https://soiltest.tfi.org/about/about_soil_test_summaryaccessed August 30, 2021; USDA NASS (2021b) POTATO - PRODUCTION - 2000-2021. US Department of Agriculture (USDA) National Agricultural Statistics Service. https://quickstats.nass.usda.gov (direct query: https://quickstats.nass.usda.gov/results/88567F9F-D7F3-3107-BC9E-BC1236B3DB44); USDA (2018) 2017 Census of Agriculture, Volume 1, Chapter 2: State Level Data - Table 41. Land Use Practices: 2017 and 2012 (live table: https://www.nass.usda.gov/Quick_Stats/CDQT/chapter/2/table/41/state/US). US Department of Agriculture (USDA). https://www.nass.usda.gov/Publications/AgCensus/2017/Full_Report/Volume_1,_Chapter_2_US_State_Level/st99_2_0041_0041.pdf; Prasuhn, V (2006) Erfassung der PO4-Austräge für die Ökobilanzierung. SALCA-Phosphor. Zü-rich, CH, Agrocope FAL Reckenholz. Agrocope. ; Faist Emmenegger M, Reinhard J, Zah R (2009) Sustainability Quick Check for Biofuels - in- termediate background report. With contributions from T. Ziep, R. Weichbrodt, Prof. Dr. V. Wohlgemuth, FHTW Berlin and A. Roches, R. Freiermuth Knuchel, Dr. G. Gaillard, Agroscope Reckenholz-Tänikon. Dübendorf. https://www.researchgate.net/profile/Rainer-Zah/publication/230725635_SQCB_-_Sustainability_Quick_Check_for_Biofuels_Second_draft_18th_February_2009_-_Intermediate_Background_Report_With_contributions_from_T_Ziep_R_Weichbrodt_Prof_Dr_V_Wohlgemuth_FHTW_Berlin_and_A_Roche/links/56b458fb08ae1f8aa45392e6/SQCB-Sustainability-Quick-Check-for-Biofuels-Second-draft-18th-February-2009-Intermediate-Background-Report-With-contributions-from-T-Ziep-R-Weichbrodt-Prof-Dr-V-Wohlgemuth-FHTW-Berlin-and-A-R.pdf
- Water [water, ground-]: 0.00948073 m3; lognormal variance with pedigree 0.0015, pedigree (2,2,2,1,1)
  Irrigation water not taken up by crop. Calculated by the ecoinvent agricultural LCI tool.
- Water [water, surface water]: 0.00245797 m3; lognormal variance with pedigree 0.0015, pedigree (2,2,2,1,1)
  Irrigation water not taken up by crop. Calculated by the ecoinvent agricultural LCI tool.
- Zinc II [water, ground-]: 1.88229e-7 kg; lognormal variance with pedigree 0.0932, pedigree (2,3,3,1,1)
  (same comment as for Cadmium II)
- Zinc II [water, surface water]: 2.60777e-5 kg; lognormal variance with pedigree 0.0932, pedigree (2,3,3,1,1)
  (same comment as for Cadmium II)

## Sampling procedure
Data is obtained from state, county and national statistics, agricultural extension offices, and published literature. Data for production, yields, applications of NPKS fertilisers, applications of pesticides, row width, and irrigation (if any) was obtained from the US Dept of Agriculture's National Agricultural Statistics Service and in most cases provides high-quality data spanning the dataset time period. Field operations and energy use are from enterprise crop budgets provided by local agricultural extensions offices and their farmer survey data. Literature data is used where USDA and agricultural extension guidance and data are not available.

## Extrapolations
Mineral fertiliser applications are crop and location (state and sub-state levels) specific for nutrient applied, based on survey data compiled by the USDA National Agricultural Statistics Service. Specific fertilisers are extrapolated from mineral fertiliser applications to potato in Washington and market consumption in the US (IFA 2020). Organic fertiliser types are extrapolated from animal manure use data for potato in Washington (state-level) based on data collected by the USDA Economic Reserach Service for 2010, 2005 and 2000 and current materials on lifestock levels. Rotations are based on published analysis and classification of Cropland Data Layer GIS data for 2012-2018 and other sources (Socolar et al 2021). Corn in a non-repetitive rotation with anything (>4% of land surveyed) else is treated as corn-corn as the most conservative option. The rotation pattern is assumed to steady throughout the period, consistent with number of years classified. Data about tillage practices are from crop-specific GIS data for corn encompassing the dataset years (OpTIS 2020). Soil characteristics, including pH and clay content, are extrapolated from survey year 2017 (Iowa soil survey, ISPAIDver 8.1.1 2019) and taken as valid for the full time period. data reported 2020 (pH, SOM) and 1995 (clay, slope, approximated with US average farmland slope and clay content), Drainage tile data from 2012 (reported to USDA for the 2012 agricultural census) is extrapolated as valid from that date through the rest of the time period of the dataset and the distribution of drainage is treated as homogenous for all field crops. Machine usage is modelled with Iowa/midwestern US diesel consumption and field operations set out by the regional agricultural extension office and crop budgets (Lazarus 2020, ISU 2015-2021). Machine sizes (power) are approximate but based on common, recent surveys and equipment analyses (Lazarus 2020). Transports are modelled with standard distances. Emissions are calculated with standard methods according to ecoinvent documentation (Nemecek and Schnetzer, 2011. '01 crop production-direct field emissions natural resources' v1.2, August 2011, available at ) and the World Food LCA Database guidelines and the ecoinvent agricultural LCI tool.
