# polyurethane production, flexible foam, TDI-based, high density

Dataset: EcoSpold 2, unit process
Geography: RER
Time period: 1997-01-01 to 2023-12-31
Technology level: current
Classification: ISIC rev.4 ecoinvent: 2013:Manufacture of plastics and synthetic rubber in primary forms
Synonyms: flexible polyurethane foams FPF PU
Scenario: Business-as-Usual
System model: Allocation, cut-off by classification
Generated by: EUROPUR
Published in: EUROPUR 2015
Database: ecoinvent
isCopyrightProtected: true
accessRestrictedTo: 1

## General comment
This dataset represents the production of 1 kg of one possible composition of polyurethane (PUR) flexible foam (35 to 40 kg/m³). Flexible polyurethane foam is used to manufacture mattresses, upholstered furniture and car seats, but also acoustic insulation boards, carpet underlays, household sponges, clothing and sportswear, packaging and many other applications. More specifically, the high density TDI-based grades are typically used in furniture and bedding, whereas the low-density TDI-based grades are preferred for insulation, packaging, building and footwear.This dataset models the production of PUR foam from polyol and toluene diisocyanate (TDI). The inventory is estimated based on industrial data.
References:
Adam, N., Avar, G., Blankenheim, H., Friederichs, W., Giersig, M., Weigand, E., Halfmann, M., Wittbecker, F.-W., Larimer, D.-R., Maier, U., Meyer-Ahrens, S., Noble, K.-L. and Wussow, H.-G. 2005. Polyurethanes. Ullmann's Encyclopedia of Industrial Chemistry.
[This dataset is meant to replace the following datasets:
- polyurethane production, flexible foam, RER, 1997 - 2020]

## Included activities start
From reception of raw materials at the factory gate.

## Included activities end
This activity ends with the production of 1 kg of PUR flexible foam.

## Geography
Typical composition for European conditions.

## Technology
Polyurethane is made by reacting diisocyanates and polyols. To generate PU foam, addition of water to the main reagents causes a side reaction producing carbon dioxide, which acts as a blowing agent. Flexible slabstock polyurethane foams are produced as large blocks using a continuous process with minimal human handling. Continuous foam machines are the standard in Europe today.
Reference:
The full report can be accessed here: https://www.europur.org/images/20150821_EPD_EUROPUR_PU_foam.pdf (last accessed 2020-12-14).

## Time period
Time of publications.

## Parameters
- fraction, process water, to air: 0.205 dimensionless; name fraction_PW_to_air; lognormal variance with pedigree 0.092025, pedigree (4,4,3,2,4)
  Literature value (Statistics Canada, 2007 & Shaffer, K.H., 2008, Consumptive water use in the Great Lakes Basin, USGS) (Vionnet, S., Quantis Water Database - Technical Report, 2012).

## Reference product
- polyurethane, flexible foam: 1 kg; name RP; By-product classification allocatable product; CPC 34740: Polyacetals, other polyethers and epoxide resins, in primary forms; polycarbonates, alkyd resins, polyallyl es[…]; HS2017 390950: Polyurethanes; in primary forms; CAS 9009-54-5
  PUR flexible foam is used for manufacturing products such as mattresses, cushions and car seats.
  production volume 6.46e7 kg; name RP_PV
    The amount of total production of flexible polyurethane foam in 2018 in EU28 was of 1.7 million t, information taken from Austin, A. 2019. The European flexible PU foam market report for 2018. PU magazine vol 16, NO.4 - August/September 2019. The figures were provided by Europur. According to the article roughly half of the amount of MDI compared to TDI was consumed to produce flexible foam. Based on the amount of MDI/TDI consumed in the process, the split between MDI and TDI based polyurethane foams has been calculated. A 50/50 split was assumed among the two types of TDI products. 5% of overall foams are assumed to be flame retardant based on lack of data, assuming flame retardant foams belong to the "other" category in figure 2 of the article.
  property carbon content, fossil 0.633827
    Polyurethanes (PUR) is the collective name for an extensive group of polymers with very different compositions and correspondingly varied property profiles, though their molecule chain contains all a urethane group (-NH-CO-O-). All PURs are built on a common principle : they are produced by the diisocyanate polyaddition process, that links polyols and (di)isocyanates. In this dataset, an example of typical polyurethane mixture is described (Ullmann, Polyurethanes, Dieterich et al. & ecoinvent v2 report 11_II). C content was calculated as an addition of C contents in its components.
  properties: carbon allocation 0.633827 kg, carbon content 0.633827, carbon content, non-fossil 0, dry mass 1 kg, heating value, net 30.67 MJ, price 1.29 EUR2005, water content 0, water in wet mass 0 kg, wet mass 1 kg

## Inputs from technosphere
- N-methyl-2-pyrrolidone: 4.5e-5 kg; lognormal variance with pedigree 0.0415, pedigree (2,2,2,1,4)
  properties: carbon content, fossil 0.585366, dry mass 1 kg, heating value, net 29.36 MJ, wet mass 1 kg
- chemical factory, organics: 4e-10 unit; lognormal variance with pedigree 0.31, pedigree (2,3,2,4,3)
  Calculated based on literature data published by the industry. For this activity, no information was readily available concerning infrastructure and land-use. Therefore, the infrastructure is estimated based on data from two chemical factories, the BASF site of Ludwigshafen and the chemical factory in Gendorf (which are both located in Germany), which produce a wide range of chemical substances. Based on this data, the following assumptions are made: the built area amounts to about 4.2 ha, the plant has an average output of 50'000 t/a and a lifespan of fifty years. The estimated infrastructure amount is therefore 4.00 E-10 units per kg of produced chemical.
  References:
  Althaus H.-J., Chudacoff M., Hischier R., Jungbluth N., Osses M. and Primas A. (2007) Life Cycle Inventories of Chemicals. ecoinvent report No. 8, v2.0. EMPA Dübendorf, Swiss Centre for Life Cycle Inventories, Dübendorf, CH.
  Gendorf (2000) Umwelterklärung 2000, Werk Gendorf. Werk Gendorf, Burgkirchen.
- chemical, organic: 0.00213 kg; lognormal variance with pedigree 0.0415, pedigree (2,2,2,1,4)
  Chemicals included: Bis(2-dimethylaminoethyl) ether (BDMAEE), Red Pigment, Tin(II) 2-ethylhexanoate
  properties: carbon content, fossil 0.628, dry mass 1 kg, heating value, net 19.03 MJ, wet mass 1 kg
  note on carbon content, fossil: This dataset is an unweighted average of 20 organic substances (listed in Tab 88.1, ecoinvent v2.2 report 8, part II), being part of the top100 chemicals included in this database. The C-content has also been calculated as an unweighted average of the C content of the substances composing this dataset.
- compressed air, 1000 kPa gauge: 0.00613241 m3; lognormal variance with pedigree 0.0015, pedigree (2,2,2,1,1)
- cyclic N-compound: 0.000455 kg; lognormal variance with pedigree 0.0415, pedigree (2,2,2,1,4)
  properties: carbon content, fossil 0.641962, dry mass 1 kg, wet mass 1 kg
- dichloromethane: 1.55e-5 kg; lognormal variance with pedigree 0.0015, pedigree (2,2,2,1,1)
  properties: carbon content, fossil 0.142857, dry mass 1 kg, heating value, net 7.14 MJ, wet mass 1 kg
- diethylene glycol: 0.00020771 kg; lognormal variance with pedigree 0.0415, pedigree (2,2,2,1,4)
  properties: carbon content, fossil 0.45283, dry mass 1 kg, heating value, net 25.14 MJ, wet mass 1 kg
- electricity, medium voltage: 0.0366327 kWh; lognormal variance with pedigree 0.0015, pedigree (2,2,2,1,1)
- heat, district or industrial, natural gas: 0.00066746 MJ; lognormal variance with pedigree 0.0015, pedigree (2,2,2,1,1)
  properties: heating value, net 1 MJ
- lime, hydrated, packed: 0.00907304 kg; lognormal variance with pedigree 0.0015, pedigree (2,2,2,1,1)
  properties: dry mass 0.997 kg, water content 0.00300903, wet mass 1 kg
- monoethanolamine: 0.000367 kg; lognormal variance with pedigree 0.0015, pedigree (2,2,2,1,1)
  properties: carbon content, fossil 0.393443, dry mass 1 kg, heating value, net 25.8 MJ, wet mass 1 kg
- nitrogen, liquid: 0.00036656 kg; lognormal variance with pedigree 0.0015, pedigree (2,2,2,1,1)
  properties: dry mass 1 kg, wet mass 1 kg
- packaging film, low density polyethylene: 0.00116293 kg; lognormal variance with pedigree 0.0015, pedigree (2,2,2,1,1)
  properties: carbon content, fossil 0.857143, dry mass 1 kg, heating value, net 42.47 MJ, wet mass 1 kg
- paper, woodcontaining, supercalendered: 0.00817715 kg; lognormal variance with pedigree 0.0015, pedigree (2,2,2,1,1)
  properties: carbon content, fossil 0.0109646, carbon content, non-fossil 0.289073, dry mass 0.945 kg, heating value, net 14.11 MJ, water content 0.0582011, wet mass 1 kg
- polyether polyols, long chain: 0.747946 kg; lognormal variance with pedigree 0.0015, pedigree (2,2,2,1,1)
  properties: carbon content, fossil 0.640856, dry mass 1 kg, heating value, gross 35 MJ, heating value, net 31.53 MJ, wet mass 1 kg
- silicon, metallurgical grade: 0.00735373 kg; lognormal variance with pedigree 0.0015, pedigree (2,2,2,1,1)
  properties: dry mass 1 kg, wet mass 1 kg
- spent solvent mixture: -3.93745e-7, -1.68063e-5 kg (2 suppliers, which the file names only by identifier); sum of these -1.72e-5 kg; lognormal variance with pedigree 0.0013, pedigree (2,2,1,1,1)
  production volume; = RP_PV * ( BP_spent_solvent / RP)
    Calculated from production volume of reference product using the relative outputs.
  properties: carbon content, fossil 0.571257, dry mass 0.835 kg, heating value, net 21.7 MJ, water content 0.197605, wet mass 1 kg
  note on carbon content, fossil: Tab A.7, ecoinvent v2.2 report 13_I. C content has been calculated after data in the tables, and then referred to 1 kg DM
  note on heating value, net: Value taken from the general comment of the treatment dataset.
- styrene-acrylonitrile copolymer: 0.00891573 kg; lognormal variance with pedigree 0.0015, pedigree (2,2,2,1,1)
  properties: carbon content, fossil 0.856023, dry mass 1 kg, heating value, net 32.54 MJ, wet mass 1 kg
- tap water: 0.00385371 kg; lognormal variance with pedigree 0.0015, pedigree (2,2,2,1,1)
  properties: carbon content, fossil 0.00178991, dry mass 0.000337476 kg, water content 2962.17, wet mass 1 kg
  note on carbon content, fossil: Bicarbonate content is 2.93 mol/m3. CO2 content is 0.1 mol/m3 (ecoinvent v2.2 report 8, Tab 93.1).
- toluene diisocyanate: 0.278127 kg; lognormal variance with pedigree 0.0015, pedigree (2,2,2,1,1)
  properties: carbon content, fossil 0.62069, dry mass 1 kg, heating value, net 22.98 MJ, wet mass 1 kg
- triphenyl phosphate: 0.00043545 kg; lognormal variance with pedigree 0.0415, pedigree (2,2,2,1,4)
  properties: heating value, net 25.65 MJ
- urea: 0.0003065 kg; lognormal variance with pedigree 0.0015, pedigree (2,2,2,1,1)
  properties: carbon content, fossil 0.2, dry mass 1 kg, wet mass 1 kg
- waste paint: -0.00132497, -5.03386e-6 kg (2 suppliers, which the file names only by identifier); sum of these -0.00133 kg; lognormal variance with pedigree 0.0013, pedigree (2,2,1,1,1)
  production volume; = RP_PV * (BP_waste_paint / RP)
    Calculated from production volume of reference product using the relative outputs.
  properties: carbon content, fossil 0.65, dry mass 1 kg, heating value, net 19.7 MJ, wet mass 1 kg
- waste paper, unsorted: -0.00091242 kg; name BP_waste_paper; lognormal variance with pedigree 0.0013, pedigree (2,2,1,1,1)
  production volume; = RP_PV * ( BP_waste_paper / RP)
    Calculated from production volume of reference product using the relative outputs.
  properties: heating value, net 14.11 MJ, price 0.093 EUR2005
- waste plastic, mixture: -0.00954152 kg; name BP_waste_plastic; lognormal variance with pedigree 0.0013, pedigree (2,2,1,1,1)
  production volume; = RP_PV * ( BP_waste_plastic / RP)
    Calculated from production volume of reference product using the relative outputs.
  properties: carbon content, fossil 0.747344, dry mass 0.847 kg, heating value, net 30.79 MJ, water content 0.180638, wet mass 1 kg
- waste polyurethane: -0.00441579 kg; name BP_waste_polyurethane; lognormal variance with pedigree 0.0013, pedigree (2,2,1,1,1)
  Typical example, based on industry data.
  production volume; = RP_PV * ( BP_waste_polyurethane / RP)
    Calculated from the production volume of polyurethane, flexible foam in proportion to the respective output amounts.
  properties: carbon content, fossil 0.641283, dry mass 0.998 kg, heating value, net 30.67 MJ, water content 0.00200401, wet mass 1 kg
  note on carbon content, fossil: C content was calculated for 1 kg DM, using data in Tab A.2, ecoinvent v2.2 report 13_I.
- wastewater, average: -2.10832e-8, -8.38917e-7 m3 (2 suppliers, which the file names only by identifier); sum of these -8.6e-7 m3; lognormal variance with pedigree 0.0013, pedigree (2,2,1,1,1)
  production volume; = RP_PV * ( BP_wastewater / RP)
    Calculated from production volume of reference product using the relative outputs.
  properties: carbon content, non-fossil 0.194039, dry mass 0.346837 kg, water content 2882.2, wet mass 1000 kg
  note on carbon content, non-fossil: 0.0673 kg TOC/m3 (Tab A.17, ecoinvent v2.2 report 13_I). TOC was considered as Total Carbon.
- water, deionised: 0.016678, 6.00366e-5 kg (2 suppliers, which the file names only by identifier); sum of these 0.016738 kg; lognormal variance with pedigree 0.0015, pedigree (2,2,2,1,1)
  properties: wet mass 1 kg

## Inputs from nature
- Water, cooling, unspecified natural origin [natural resource, in water]: 1.16e-8 m3; lognormal variance with pedigree 0.0015, pedigree (2,2,2,1,1)

## Emissions to nature
- Carbon dioxide, fossil [air, urban air close to ground]: 0.0484 kg; lognormal variance with pedigree 0.0015, pedigree (2,2,2,1,1)
  Typical example, based on industry data.
- NMVOC, non-methane volatile organic compounds [air, unspecified]: 0.00162814 kg; lognormal variance with pedigree 0.0409, pedigree (2,2,2,1,1)
- Particulate Matter, > 2.5 um and < 10um [air, unspecified]: 1.17e-8 kg; lognormal variance with pedigree 0.3009, pedigree (2,2,2,1,1)
- Water [air, unspecified]: 1.16e-8 m3; lognormal variance with pedigree 0.0409, pedigree (2,2,2,1,1)
  Calculated as a fraction of the input of water. For more details, refer to the mathematical relation and the parameters.
  property fraction, origin: fresh water 0; name fraction_origin_fresh_water
  property fraction, origin: salt water 0; name fraction_origin_salt_water
  property fraction, origin: unspecified 1; name fraction_origin_unspecified

## Sampling procedure
Data based on industry report and expert judgement.
