# operation, liquid manure storage and processing facility

Dataset: EcoSpold 2, unit process
Geography: RoW
Time period: 1994-01-01 to 2023-12-31
Technology level: current
Classification: EcoSpold01Categories: agricultural means of production/buildings
Classification: ISIC rev.4 ecoinvent: 3821:Treatment and disposal of non-hazardous waste
Tags: Operation; ConvertedDataset
Scenario: Business-as-Usual
System model: Allocation, cut-off by classification
Generated by: Dunja Dux
Published in: Nemecek, T. 2007
Database: ecoinvent
isCopyrightProtected: true
accessRestrictedTo: 1

## General comment
The module includes the use of energy and auxiliary materials for the operation of marine screw agitator. The functional unit is m3 slurry.
[This dataset was already contained in the ecoinvent database version 2. It was not individually updated during the transfer to ecoinvent version 3. Life Cycle Impact Assessment results may still have changed, as they are affected by changes in the supply chain, i.e. in other datasets. This dataset was generated following the ecoinvent quality guidelines for version 2. It may have been subject to central changes described in the ecoinvent version 3 change report (http://www.ecoinvent.org/database/ecoinvent-version-3/reports-of-changes/), and the results of the central updates were reviewed extensively. The changes added e.g. consistent water flows and other information throughout the database. The documentation of this dataset can be found in the ecoinvent reports of version 2, which are still available via the ecoinvent website. The change report linked above covers all central changes that were made during the conversion process.]

## Included activities end
The inventory takes into account the energy and auxiliary materials like water, lubricating oil and cleaning agents. Also included is the use of the infrastructure. Not taken into account were the direct emission of the animal husbandry, fodder production and produced waste water.

## Geography
The inventory applies for Swiss agricultural buildings only, because of the solid method of construction.

## Technology
The use of energy and auxiliary materials are calculated for the conditions defined in the infrastructure-module with literature data and experts knowledge.

## Time period
Period indicated in the reference.

## Reference product
- operation, liquid manure storage and processing facility: 1 m3; By-product classification allocatable product; CPC 8612: Animal husbandry services
  EcoSpold01Location=CH
  production volume 2.61476e9 m3
    Amount of liquid manure is from cattle and swine in mixed farming systems. The amount of liquid manure from cattle is calculated from the number of cattle (from FAOSTAT), 2833 kg feed dry matter intake per unit of cattle, 22% of this dry matter appears in the manure (18% for beef cattle, 23% for dairy cows), 3% of the manure is handled as liquid manure with 7.5% dry matter content. The amount of swine manure is calculated from the meat production (from FAOSTAT), 0.94 kg manure dry matter per kg meat (at 55% dry matter), 71% of swine manure handled as liquid manure with 5% dry matter content.
  property price 0.0440098 EUR2005
    Calculated based on inputs: The price of the product has been calculated as a sum of the values of the material and energy inputs for this product. This value is therefore a rough estimation. It may underestimate the real price since there are additional expenses when producing any product. These expences can include for example labour costs, treatment of waste materials and profit for the producer. Please consider carefully whether this level of data quality is acceptable for your application.
  properties: carbon allocation 0 kg, carbon content 0

## Inputs from technosphere
- electricity, low voltage: 0.0143541, 0.0637749, 0.000640746, 0.0100762, 0.209144, 0.0206435, 0.00527083, 0.000128584, 0.0474002, 0.00356718 kWh (10 suppliers, which the file names only by identifier); sum of these 0.375 kWh; lognormal variance with pedigree 0.0427, pedigree (2,2,5,5,1)
  EcoSpold01Location=CH
- liquid manure storage and processing facility: 3.47e-5 m3; source Nemecek, T. 2007; lognormal variance with pedigree 0.3427, pedigree (2,2,5,5,1)
  Estimated value.
  EcoSpold01Location=CH

## Sampling procedure
In the use of energy and auxiliary materials are big differences between the farms. The inventory is based on mean values from CH and WEU.

## Extrapolations
This dataset has been copied from an original dataset covering the geography CH. The uncertainty has been adjusted accordingly.

## Review by Roland Hischier 2003-08-06
Passed.
