# aubergine production, open field

Dataset: EcoSpold 2, unit process
Geography: IN
Time period: 2015-01-01 to 2023-12-31
Technology level: current
Classification: ISIC rev.4 ecoinvent: 0113:Growing of vegetables and melons, roots and tubers
Scenario: Business-as-Usual
System model: Allocation, cut-off by classification
Generated by: Sigma Das
Database: ecoinvent
isCopyrightProtected: true
accessRestrictedTo: 1

## General comment
This dataset represents the production of 1 kg of fresh Brinjal during January-May, 2016 at a farm located in village Bhagatpur Ratan, District Moradabad of Uttar Pradesh State in India.P. In this area, fields are irrigated with ground water using electric pump for surface irrigation. The farm has a yield of 26,250 kg fresh matter per ha for this crop cycle. Sowing date for the crop is 3-Feburary, 2016 and harvesting date is 15-May, 2016. Mineral NPK fertilizer input is 104-48-24 kg/ha. Organic fertilizer applied amounts to 60,000 kg of manure from cattle dung. Pesticides used has active ingredient of Carbofuran 450g/ha and Chlorantranilipore 10g/ha. In case of Chlorantranilipore, the ingredient Clothianidin is used as proxy for this dataset. Machinery is used only for soil cultivation with fuel consumption of 12.48 kg/ha using plough and rotary cultivator for soil tillage.
[This dataset is meant to replace the following datasets:]

## Included activities start
This activity starts about four and half weeks after the harvest of the previous crop. The soil is prepared for cultivation in mid-January and sowing of seeds started about three weeks after soil preparation. Thereafter the crop is mature for harvesting in about 3 months.

## Included activities end
The activity ends with the harvesting of the mature Brinjal from the Brinjal plant

## Technology
Cultivation of Brinjal follows conventional production standards

## Time period
Soil cultivating date for the main crop: 17-January, 2016; Harvesting date main crop: 15-May, 2016. The soil cultivation, sowing and harvesting dates are taken as the middle date of the week or fortnight told to the data collector by the farmer. Total time from date of sowing to date of harvesting comes to 100 days. The data is collected for one crop cycle. The cycle of one year is considered for entry in ecoeditor.

## Reference product
- aubergine: 1 kg; By-product classification allocatable product; CPC 01233: Eggplants (aubergines); HS2017 070930: Vegetables; aubergines, (e.g. plants), fresh or chilled
  production volume 1.25152e10 kg; = 12515.22*1000*1000
    Production volume for India is for the year 2015-16 given in '000 tonnes at http://agriexchange.apeda.gov.in/India%20Production/India_Productions.aspx?cat=Vegetables&hscode=1070
  property price 1.02 EUR2005
    Calculated from the trade statistics for the year 2005 published by the UN (COMTRADE database, accessed 20151105) as an average of 5 biggest importers of aubergine in the world; USA, DE, FR, UK and IT. Comtrade cathegory: 70930: Aubergines (eggplants), fresh or chilled.
  properties: carbon allocation 0 kg, carbon content 0

## Inputs from technosphere
- [thio]carbamate-compound: 1.71429e-5 kg; lognormal variance with pedigree 0.0052, pedigree (2,4,3,1,1)
  The data was collected for a hectare area through interview
  properties: carbon content, fossil 0.626349, dry mass 1 kg, wet mass 1 kg
- acetamide-anillide-compound, unspecified: 2.85714e-6 kg; lognormal variance with pedigree 0.0052, pedigree (2,4,3,1,1)
  The data was collected for a hectare area through interview
  properties: carbon content, fossil 0.659175, dry mass 1 kg, wet mass 1 kg
- compost: 2.28571 kg; lognormal variance with pedigree 0.0052, pedigree (2,4,3,1,1)
  Home made compost
  property cadmium content 3.6e-7; name Cd_content
  property chromium content 2.23e-5; name Cr_content
  property copper content 5.77e-5; name Cu_content
  property dry mass 0.5 kg; name DM
  property lead content 4.9e-5; name Pb_content
  property mercury content 1.2e-7; name Hg_content
  property nickel content 1.63e-5; name Ni_content
  property nitrogen content 0.014; name N_content
  property phosphorus content 0.0035; name P_content
  property potassium content 0.01; name K_content
  property zinc content 0.000184; name Zn_content
  properties: carbon content, non-fossil 0.183645, water content 1, wet mass 1 kg
- copper oxide: 1.71429e-5 kg; lognormal variance with pedigree 0.0052, pedigree (2,4,3,1,1)
  The data was collected for a hectare area through interview
  properties: dry mass 1 kg, wet mass 1 kg
- cyclic N-compound: 3.80952e-7 kg; lognormal variance with pedigree 0.0052, pedigree (2,4,3,1,1)
  The data was collected for a hectare area through interview
  properties: carbon content, fossil 0.641962, dry mass 1 kg, wet mass 1 kg
- inorganic nitrogen fertiliser, as N: 0.000675143 kg; lognormal variance with pedigree 0.0052, pedigree (2,4,3,1,1)
  The data was collected for a hectare area through interview
  properties: dry mass 1 kg, wet mass 1 kg
- inorganic phosphorus fertiliser, as P2O5: 0.00182857 kg; lognormal variance with pedigree 0.0052, pedigree (2,4,3,1,1)
  The data was collected for a hectare area through interview
  properties: dry mass 1 kg, wet mass 1 kg
- inorganic potassium fertiliser, as K2O: 0.000914286 kg; lognormal variance with pedigree 0.0052, pedigree (2,4,3,1,1)
  The data was collected for a hectare area through interview
  properties: dry mass 1 kg, wet mass 1 kg
- irrigation: 0.0411429 m3; lognormal variance with pedigree 0.0052, pedigree (2,4,3,1,1)
  The data was collected for a hectare area through interview
  properties: dry mass 0.11 kg, water content 9089.91, wet mass 1000 kg
- land use change, annual crop: 8.45102e-6 ha; lognormal variance with pedigree 0.0126, pedigree (2,4,3,1,1)
  Calculated Value. This value has been calculated by using the ecoinvent LCI calculation tool for crop production.
- packaging, for fertilisers: 0.0134286 kg; lognormal variance with pedigree 0.0532, pedigree (4,3,3,5,4)
  Total amount of active substance/s of fertilisers needed for the production of 'aubergine' is calculated to be circa 6.71E-03 kg. Fertiliser/s used in this dataset is/are: 'nitrogen fertiliser, as N', 'phosphate fertiliser, as P2O5', 'potassium fertiliser, as K2O', 'urea, as N'. The total amount of active substance/s is doubled in order to account for the packaging of the dilluted product of fertiliser/s that is/are applied. Therefore, 1.34E-02 kg of packaging for fertilisers is justified with this exchange.
  properties: carbon content, fossil 0.825301, dry mass 1 kg, heating value, net 25.01 MJ, price 0.0642 EUR2005, wet mass 1 kg
  note on carbon content, fossil: Considering a chemical formula (C2H4)n for polyethylene, carbon content-fossil is calculated to be 0.856286 kg of Carbon per kg of dry mass.
- packaging, for pesticides: 7.50476e-5 kg; lognormal variance with pedigree 0.0532, pedigree (4,3,3,5,4)
  Total amount of active substance/s of pesticides needed for the production of aubergine is calculated to be circa 3.75E-05 kg. Pesticide/s used in this dataset is/are: '[thio]carbamate-compound', 'acetamide-anillide-compound, unspecified', 'copper oxide', 'cyclic N-compound'. The total amount of active substance/s is doubled in order to account for the packaging of the dilluted product of pesticide/s that is/are applied. Therefore, 7.50E-05 kg of packaging for pesticides is justified with this exchange.
  properties: carbon content, fossil 0.85714, dry mass 1 kg, heating value, net 25.97 MJ, price 0.0642 EUR2005, wet mass 1 kg
- plastic tunnel: 6.85714e-6 m2; lognormal variance with pedigree 0.0052, pedigree (2,4,3,1,1)
  The data was collected for a hectare area through interview
- tillage, ploughing: 1.22045e-5 ha; lognormal variance with pedigree 0.0052, pedigree (2,4,3,1,1)
  The data was collected for a hectare area through interview
- tillage, rotary cultivator: 1.11271e-5 ha; lognormal variance with pedigree 0.0052, pedigree (2,4,3,1,1)
  The data was collected for a hectare area through interview
- urea: 0.00706657 kg; lognormal variance with pedigree 0.0052, pedigree (2,4,3,1,1)
  The exchange has been updated from 'urea, as N' into 'urea' and therefore its amount has been scaled (multiplied) from 0.0033 kg by 2.1438 kg of 'urea' per kg of 'urea, as N'. Original comment of the exchange is: The data was collected for a hectare area through interview
  properties: carbon content, fossil 0.2, dry mass 1 kg, wet mass 1 kg

## Inputs from nature
- Carbon dioxide, in air [natural resource, in air]: 0.138506 kg; lognormal variance with pedigree 0.0052, pedigree (2,4,3,1,1)
  (same comment as for land use change, annual crop)
- Energy, gross calorific value, in biomass [natural resource, biotic]: 1.5953 MJ; lognormal variance with pedigree 0.0052, pedigree (2,4,3,1,1)
  (same comment as for land use change, annual crop)
- Occupation, annual crop, irrigated [natural resource, land]: 0.15873 m2*year; lognormal variance with pedigree 0.0066, pedigree (2,4,3,1,1)
  Calculated Value. This value has been calculated by using the ecoinvent LCI calculation tool for crop production
- Transformation, from annual crop, irrigated [natural resource, land]: 0.380952 m2; lognormal variance with pedigree 0.0126, pedigree (2,4,3,1,1)
  (same comment as for Occupation, annual crop, irrigated)
- Transformation, to annual crop, irrigated [natural resource, land]: 0.380952 m2; lognormal variance with pedigree 0.0126, pedigree (2,4,3,1,1)
  (same comment as for Occupation, annual crop, irrigated)

## Emissions to nature
- Ammonia [air, non-urban air or from high stacks]: 0.00206984 kg; lognormal variance with pedigree 0.0126, pedigree (2,4,3,1,1)
  (same comment as for land use change, annual crop)
- Carbon dioxide, fossil [air, non-urban air or from high stacks]: 0.0051785 kg; lognormal variance with pedigree 0.0052, pedigree (2,4,3,1,1)
  (same comment as for land use change, annual crop)
- Dinitrogen monoxide [air, non-urban air or from high stacks]: 0.00041512 kg; lognormal variance with pedigree 0.0346, pedigree (2,4,3,1,1)
  (same comment as for land use change, annual crop)
- Nitrogen oxides [air, non-urban air or from high stacks]: 0.00122481 kg; lognormal variance with pedigree 0.0446, pedigree (2,4,3,1,1)
  (same comment as for land use change, annual crop)
- Water [air, non-urban air or from high stacks]: 0.0209829 m3; lognormal variance with pedigree 0.0052, pedigree (2,4,3,1,1)
  (same comment as for land use change, annual crop)
- Cadmium II [soil, agricultural]: 4.66864e-7 kg; lognormal variance with pedigree 0.0446, pedigree (2,4,3,1,1)
  (same comment as for land use change, annual crop)
- Carbofuran [soil, agricultural]: 1.71429e-5 kg; lognormal variance with pedigree 0.0376, pedigree (2,4,3,1,1)
  The data was collected for a hectare area through interview
- Chromium III [soil, agricultural]: 2.44158e-5 kg; lognormal variance with pedigree 0.0446, pedigree (2,4,3,1,1)
  (same comment as for land use change, annual crop)
- Clothianidin [soil, agricultural]: 3.80952e-7 kg; lognormal variance with pedigree 0.0376, pedigree (2,4,3,1,1)
  The data was collected for a hectare area through interview
- Copper ion [soil, agricultural]: 9.64502e-5 kg; lognormal variance with pedigree 0.0446, pedigree (2,4,3,1,1)
  This exchange is an aggregation of amounts:
  7.930735552878688E-5. Comment:
  1.7142857142857142E-5. Comment:
- Lead II [soil, agricultural]: 5.40964e-5 kg; lognormal variance with pedigree 0.0446, pedigree (2,4,3,1,1)
  (same comment as for land use change, annual crop)
- Mercury II [soil, agricultural]: 1.30961e-7 kg; lognormal variance with pedigree 0.0446, pedigree (2,4,3,1,1)
  (same comment as for land use change, annual crop)
- Metalaxil [soil, agricultural]: 2.85714e-6 kg; lognormal variance with pedigree 0.0376, pedigree (2,4,3,1,1)
  The data was collected for a hectare area through interview
- Nickel II [soil, agricultural]: 1.70209e-5 kg; lognormal variance with pedigree 0.0446, pedigree (2,4,3,1,1)
  (same comment as for land use change, annual crop)
- Zinc II [soil, agricultural]: 0.000202668 kg; lognormal variance with pedigree 0.0446, pedigree (2,4,3,1,1)
  (same comment as for land use change, annual crop)
- Cadmium II [water, ground-]: 7.76594e-10 kg; lognormal variance with pedigree 0.0946, pedigree (2,4,3,1,1)
  (same comment as for land use change, annual crop)
- Cadmium II [water, surface water]: 2.02555e-8 kg; lognormal variance with pedigree 0.0946, pedigree (2,4,3,1,1)
  (same comment as for land use change, annual crop)
- Chromium III [water, ground-]: 3.35778e-7 kg; lognormal variance with pedigree 0.0946, pedigree (2,4,3,1,1)
  (same comment as for land use change, annual crop)
- Chromium III [water, surface water]: 1.81661e-6 kg; lognormal variance with pedigree 0.0946, pedigree (2,4,3,1,1)
  (same comment as for land use change, annual crop)
- Copper ion [water, ground-]: 5.71165e-8 kg; lognormal variance with pedigree 0.0946, pedigree (2,4,3,1,1)
  (same comment as for land use change, annual crop)
- Copper ion [water, surface water]: 2.64196e-6 kg; lognormal variance with pedigree 0.0946, pedigree (2,4,3,1,1)
  (same comment as for land use change, annual crop)
- Lead II [water, ground-]: 9.47369e-9 kg; lognormal variance with pedigree 0.0946, pedigree (2,4,3,1,1)
  (same comment as for land use change, annual crop)
- Lead II [water, surface water]: 1.67012e-6 kg; lognormal variance with pedigree 0.0946, pedigree (2,4,3,1,1)
  (same comment as for land use change, annual crop)
- Mercury II [water, ground-]: 2.05184e-11 kg; lognormal variance with pedigree 0.0946, pedigree (2,4,3,1,1)
  (same comment as for land use change, annual crop)
- Mercury II [water, surface water]: 5.16264e-9 kg; lognormal variance with pedigree 0.0946, pedigree (2,4,3,1,1)
  (same comment as for land use change, annual crop)
- Nickel II [water, surface water]: 1.66454e-6 kg; lognormal variance with pedigree 0.0946, pedigree (2,4,3,1,1)
  (same comment as for land use change, annual crop)
- Nitrate [water, ground-]: 0.00756505 kg; lognormal variance with pedigree 0.0446, pedigree (2,4,3,1,1)
  (same comment as for land use change, annual crop)
- Phosphate [water, ground-]: 3.40688e-6 kg; lognormal variance with pedigree 0.0446, pedigree (2,4,3,1,1)
  (same comment as for land use change, annual crop)
- Phosphate [water, surface water]: 9.53925e-6 kg; lognormal variance with pedigree 0.0446, pedigree (2,4,3,1,1)
  (same comment as for land use change, annual crop)
- Phosphorus [water, surface water]: 0.000138541 kg; lognormal variance with pedigree 0.0446, pedigree (2,4,3,1,1)
  (same comment as for land use change, annual crop)
- Water [water, ground-]: 0.0160457 m3; lognormal variance with pedigree 0.0052, pedigree (2,4,3,1,1)
  (same comment as for land use change, annual crop)
- Water [water, surface water]: 0.00411429 m3; lognormal variance with pedigree 0.0052, pedigree (2,4,3,1,1)
  (same comment as for land use change, annual crop)
- Zinc II [water, ground-]: 5.20281e-7 kg; lognormal variance with pedigree 0.0946, pedigree (2,4,3,1,1)
  (same comment as for land use change, annual crop)
- Zinc II [water, surface water]: 4.69486e-6 kg; lognormal variance with pedigree 0.0946, pedigree (2,4,3,1,1)
  (same comment as for land use change, annual crop)

## Sampling procedure
The farmer was identified and contacted by agriculture science faculty familiar with the local farmers in the region. Data was collected directly from the farmer through semi-structured interview using a questionnaire based on the input requirements of the ecoinvent LCI calculation tool for crop production. The farmer does not maintain any written records and has provided the data from recent memory. In this region, typically farmers are unable to provide exact name of active ingredient in the pesticide they use and the same was noted from details given on the pesticide packet. Individual farmer is not able to calculate fuel consumption for his own farm alone and this information has been collected from farming community of the area.

## Extrapolations
Ecoinvent LCI calculation tool for crop production was used to calculate field emissions from the cultivation process. Number of wet days have been taken for neighboring region (New Delhi) and rainfall data is Normal rainfall for Western Uttar Pradesh where the farm is located.
