# methanol production, biomass gasification

Dataset: EcoSpold 2, unit process
Geography: RoW
Time period: 1995-01-01 to 2023-12-31
Technology level: current
Classification: ISIC rev.4 ecoinvent: 2011:Manufacture of basic chemicals
Classification: EcoSpold01Categories: biomass/fuels
Synonyms: monohydroxymethane; methyl hydroxide; methyl alcohol
Tags: ConvertedDataset
Scenario: Business-as-Usual
System model: Allocation, cut-off by classification
Share of production covered: 0 %
Generated by: Edgard Gnansounou
Published in: Jungbluth N. 2007
Database: ecoinvent
isCopyrightProtected: true
accessRestrictedTo: 1

## General comment
The process describes the production of methanol derived from syngas and refers to a full-methanol steam reforming process to obtain a 2.2:1 H2:CO ratio of the syngas for the sole production of methanol. No CO2 use, no Hydrogen production (assumed to be burned in the furnace).
[This dataset was already contained in the ecoinvent database version 2. It was not individually updated during the transfer to ecoinvent version 3. Life Cycle Impact Assessment results may still have changed, as they are affected by changes in the supply chain, i.e. in other datasets. This dataset was generated following the ecoinvent quality guidelines for version 2. It may have been subject to central changes described in the ecoinvent version 3 change report (http://www.ecoinvent.org/database/ecoinvent-version-3/reports-of-changes/), and the results of the central updates were reviewed extensively. The changes added e.g. consistent water flows and other information throughout the database. The documentation of this dataset can be found in the ecoinvent reports of version 2, which are still available via the ecoinvent website. The change report linked above covers all central changes that were made during the conversion process.]

## Included activities end
Raw materials including syngas, processing energy, estimate on catalyst use based on 'methanol from natural gas', emissions to air and water from process, plant infrastructure.

## Geography
Data from few literature sources, largely based on methanol from natural gas.

## Technology
Data refers to full-methanol steam reforming (as opposed to autothermal reforming) of syngas derived from biomass gasification.

## Time period
Data from 1995 to 2004, pilot scale, future technology

## Parameters
- fraction, cooling water, cooling pond system, to air: 0.032 dimensionless; name fraction_CW_CP_to_air; lognormal variance with pedigree 0.0413, pedigree (2,3,1,3,1)
  Calculated based on literature value (Scown, C.D., 2011, Water Footprint of U.S. Transportation Fuels and supplying information of the article) (Vionnet, S., Quantis Water Database - Technical Report, 2012).
- fraction, cooling water, once-through system, to air: 0.004 dimensionless; name fraction_CW_OT_to_air; lognormal variance with pedigree 0.0413, pedigree (2,3,1,3,1)
  (same comment as for fraction, cooling water, cooling pond system, to air)
- fraction, cooling water, recirculating system, to air: 0.771 dimensionless; name fraction_CW_R_to_air; lognormal variance with pedigree 0.0413, pedigree (2,3,1,3,1)
  (same comment as for fraction, cooling water, cooling pond system, to air)
- fraction, cooling water, to air: 0.3875 dimensionless; name fraction_CW_to_air; = (0.5*fraction_CW_OT_to_air)+(0.5*fraction_CW_R_to_air); lognormal variance with pedigree 0.092025, pedigree (4,4,3,2,4)
  Calculated value based on literature value (see comments of the other parametres present in this dataset) and expert opinion. In the case when no industry/literature data are available about the type of cooling or directly fraction, cooling water, to air specific for the process a default assumption is applied. It is assumed that the once-through cooling system is used in 50% of all cases and recirculating system is used in another 50% of all cases.
- fraction, process water, to air: 0.15 dimensionless; name fraction_PW_to_air; lognormal variance with pedigree 0.092025, pedigree (4,4,3,2,4)
  Literature value (Statistics Canada, 2007 & Shaffer, K.H., 2008, Consumptive water use in the Great Lakes Basin, USGS) (Vionnet, S., Quantis Water Database - Technical Report, 2012).
- fraction, water, deionised, to air: 0.15 dimensionless; name fraction_WDI_to_air; = fraction_PW_to_air; lognormal variance with pedigree 0.092025, pedigree (4,4,3,2,4)
  Calculated value. See comment in the other parametres present in this dataset. Deionised water is considered to be always used as process water, thus process water fractions to air are applied to all deionised water input flows to calculate the amount of water consumed in the processes.

## Reference product
- methanol, from biomass: 1 kg; By-product classification allocatable product; CPC 34139: Other alcohols, phenols, phenol-alcohols, and their halogenated, sulphonated, nitrated or nitrosated derivativ[…]; HS2017 290511: Alcohols; saturated monohydric, methanol (methyl alcohol); CAS 67-56-1
  EcoSpold01Location=CH
  production volume 737631 kg
    Output from pilot plants. Estimated at 10 times output from 1 Swiss pilot plant.
  property heating value, net 26.48 MJ
    LHV is calculated based on the elemental composition of the substance. Based on the CAS number of the substance (000067-56-1), the chemical formula of the substance is found to be: CH4O, (PubChem 2020).
    Reference: Kim, S., Chen, J., Cheng, T., Gindulyte, A., He, J., He, S., Li, Q., Shoemaker, B. A., Thiessen, P. A., Yu, B., Zaslavsky, L., Zhang, J., & Bolton, E. E. (2019). PubChem 2019 update: improved access to chemical data. Nucleic acids research, 47(D1), D1102–D1109. https://doi.org/10.1093/nar/gky1033
  property price 0.216 EUR2005
    Methyl alcohol, import prices for EU-27, USA, Japan, China, and India(http://data.un.org/browse.aspx?d=Comtrade; downloaded 13 September 2010)
  properties: carbon allocation 0.375 kg, carbon content 0.375375, carbon content, fossil 0, carbon content, non-fossil 0.375375, dry mass 0.999 kg, water content 0.001001, water in wet mass 0.001 kg, wet mass 1 kg

## Inputs from technosphere
- aluminium oxide, non-metallurgical: 0.000205251, 3.47489e-5 kg (2 suppliers, which the file names only by identifier); sum of these 0.00024 kg; lognormal variance with pedigree 0.288, pedigree (4,5,5,5,5)
  EcoSpold01Location=RER
  Adapted from 'methanol (from natural gas), at plant'
  Uncertainty: Adapted from 'methanol (from natural gas), at plant'
  properties: dry mass 1 kg, wet mass 1 kg
- copper oxide: 9e-5 kg; lognormal variance with pedigree 0.288, pedigree (4,5,5,5,5)
  (same comment as for aluminium oxide, non-metallurgical)
  properties: dry mass 1 kg, wet mass 1 kg
- electricity, medium voltage: 0.00773061, 0.154208, 0.0518136, 0.00236738, 0.000473828, 0.000101742, 0.0107679, 0.0159244, 0.0333622 kWh (9 suppliers, which the file names only by identifier); sum of these 0.27675 kWh; lognormal variance with pedigree 0.142, pedigree (4,4,5,5,4)
  EcoSpold01Location=CH
  Data strongly dependent on technology, data from one source
  Uncertainty: Data strongly dependent on technology, data from one source
- methanol factory: 3.7037e-11 unit; lognormal variance with pedigree 0.3712, pedigree (2,3,5,5,3)
  Calculation
  EcoSpold01Location=GLO
  Uncertainty: Calculation
- molybdenum: 1e-5 kg; lognormal variance with pedigree 0.288, pedigree (4,5,5,5,5)
  Adapted from 'methanol (from natural gas), at plant'
  EcoSpold01Location=RER
  Uncertainty: Adapted from 'methanol (from natural gas), at plant'
  properties: dry mass 1 kg, wet mass 1 kg
- nickel, class 1: 2e-5 kg; lognormal variance with pedigree 0.288, pedigree (4,5,5,5,5)
  EcoSpold01Location=GLO
  Adapted from 'methanol (from natural gas), at plant'
  Uncertainty: Adapted from 'methanol (from natural gas), at plant'
  properties: dry mass 1 kg, wet mass 1 kg
- synthetic gas: 7.1255 m3; lognormal variance with pedigree 0.1141, pedigree (3,2,5,5,4)
  Data derived from literature survey (>20 sources) 2000-2005
  EcoSpold01Location=CH
  Uncertainty: Data derived from literature survey (>20 sources) 2000-2005
  properties: carbon content, non-fossil 0.15525, dry mass 1.045 kg, heating value, net 5.2 MJ, water content 0.100478, wet mass 1.15 kg
  note on carbon content, non-fossil: Density of the gas (1.15 kg/Nm3), and dry mass were used to convert 0.135 kgC/kg in kg C/Nm3. All data from Tab 18.6, ecoinvent v2.2 report n 17.
  note on heating value, net: Based on literature, Report 17: Jungbluth, N., Chudacoff, M., Dauriat, A., Dinkel, F., Doka, G., Faist Emmenegger, M., Gnansounou, E., Kljun, N., Schleiss, K., Spielmann, M., Stettler, C., Sutter, J. 2007: Life Cycle Inventories of Bioenergy. ecoinvent report No. 17, Swiss Centre for Life Cycle Inventories, Dübendorf, CH.
- wastewater, average: -0.00427914, -0.00102323, -1.52354e-5 m3 (3 suppliers, which the file names only by identifier); sum of these -0.0053176 m3; lognormal variance with pedigree 0.2106, pedigree (5,5,5,5,5)
  Estimated, to close mass balance
  EcoSpold01Location=CH
  Uncertainty: Estimated, to close mass balance
  production volume
    Calculated from the production volume of methanol, from biomass in proportion to the respective output amounts.
  properties: carbon content, non-fossil 0.194039, dry mass 0.346837 kg, mass concentration, TOC 0.1091 kg/m3, mass concentration, calcium 0.039453 kg/m3, mass concentration, chlorine 0.030031 kg/m3, mass concentration, hydrogen 0.013365 kg/m3, mass concentration, nitrogen 0.031015 kg/m3, mass concentration, oxygen 0.069824 kg/m3, mass concentration, sodium 0.06456 kg/m3, mass concentration, sulfur 0.015602 kg/m3, water content 2882.2, wet mass 1000 kg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
  note on carbon content, non-fossil: 0.0673 kg TOC/m3 (Tab A.17, ecoinvent v2.2 report 13_I). TOC was considered as Total Carbon.
- water, deionised: 0.200174, 0.649826 kg (2 suppliers, which the file names only by identifier); sum of these 0.85 kg; lognormal variance with pedigree 0.1146, pedigree (3,3,5,5,4)
  Data dependent on technology
  EcoSpold01Location=CH
  Uncertainty: Data dependent on technology
  properties: wet mass 1 kg
- zinc: 3e-5 kg; lognormal variance with pedigree 0.288, pedigree (4,5,5,5,5)
  (same comment as for molybdenum)
  properties: dry mass 1 kg, wet mass 1 kg

## Inputs from nature
- Water, cooling, unspecified natural origin [natural resource, in water]: 0.00816 m3; name water_cooling_UNO_input; lognormal variance with pedigree 0.1232, pedigree (2,3,5,5,4)
  Data dependent on technology, average used
  Uncertainty: Data dependent on technology, average used

## Emissions to nature
- Acetaldehyde [air, urban air close to ground]: 3.1008e-9 kg; lognormal variance with pedigree 0.1646, pedigree (3,3,5,5,4)
  Calculation, from syngas composition and natural gas combustion
  Uncertainty: Calculation, from syngas composition and natural gas combustion
- Acetic acid [air, urban air close to ground]: 4.6512e-7 kg; lognormal variance with pedigree 0.1646, pedigree (3,3,5,5,4)
  (same comment as for Acetaldehyde)
- Benzene [air, urban air close to ground]: 1.2403e-6 kg; lognormal variance with pedigree 0.1646, pedigree (3,3,5,5,4)
  (same comment as for Acetaldehyde)
- Benzo(a)pyrene [air, urban air close to ground]: 3.1008e-11 kg; lognormal variance with pedigree 0.4246, pedigree (3,3,5,5,4)
  (same comment as for Acetaldehyde)
- Butane [air, urban air close to ground]: 2.1706e-6 kg; lognormal variance with pedigree 0.1646, pedigree (3,3,5,5,4)
  (same comment as for Acetaldehyde)
- Carbon dioxide, non-fossil [air, urban air close to ground]: 2.7642 kg; lognormal variance with pedigree 0.1146, pedigree (3,3,5,5,4)
  Calculation, to close carbon balance
  Uncertainty: Calculation, to close carbon balance
- Carbon monoxide, non-fossil [air, urban air close to ground]: 6.5117e-6 kg; lognormal variance with pedigree 0.7646, pedigree (3,3,5,5,4)
  (same comment as for Acetaldehyde)
- Dinitrogen monoxide [air, urban air close to ground]: 3.1008e-7 kg; lognormal variance with pedigree 0.1646, pedigree (3,3,5,5,4)
  (same comment as for Acetaldehyde)
- Dioxins, measured as 2,3,7,8-tetrachlorodibenzo-p-dioxin [air, urban air close to ground]: 9.3024e-17 kg; lognormal variance with pedigree 0.4246, pedigree (3,3,5,5,4)
  (same comment as for Acetaldehyde)
- Formaldehyde [air, urban air close to ground]: 3.1008e-7 kg; lognormal variance with pedigree 0.1646, pedigree (3,3,5,5,4)
  (same comment as for Acetaldehyde)
- Mercury II [air, urban air close to ground]: 9.3024e-11 kg; lognormal variance with pedigree 0.7646, pedigree (3,3,5,5,4)
  (same comment as for Acetaldehyde)
- Methane, non-fossil [air, urban air close to ground]: 6.2016e-6 kg; lognormal variance with pedigree 0.1646, pedigree (3,3,5,5,4)
  (same comment as for Acetaldehyde)
- Methanol [air, urban air close to ground]: 0.00053 kg; lognormal variance with pedigree 0.0846, pedigree (2,4,5,5,1)
  Based on ecoinvent Guidelines
  Uncertainty: Based on ecoinvent Guidelines
- Nitrogen oxides [air, urban air close to ground]: 0.00020551 kg; lognormal variance with pedigree 0.1646, pedigree (3,3,5,5,4)
  (same comment as for Acetaldehyde)
- PAH, polycyclic aromatic hydrocarbons [air, urban air close to ground]: 3.1008e-8 kg; lognormal variance with pedigree 0.4246, pedigree (3,3,5,5,4)
  (same comment as for Acetaldehyde)
- Particulate Matter, < 2.5 um [air, urban air close to ground]: 6.2016e-7 kg; lognormal variance with pedigree 0.4246, pedigree (3,3,5,5,4)
  (same comment as for Acetaldehyde)
- Pentane [air, urban air close to ground]: 3.7209e-6 kg; lognormal variance with pedigree 0.1646, pedigree (3,3,5,5,4)
  (same comment as for Acetaldehyde)
- Propane [air, urban air close to ground]: 6.2016e-7 kg; lognormal variance with pedigree 0.1646, pedigree (3,3,5,5,4)
  (same comment as for Acetaldehyde)
- Propionic acid [air, urban air close to ground]: 6.2016e-8 kg; lognormal variance with pedigree 0.1646, pedigree (3,3,5,5,4)
  (same comment as for Acetaldehyde)
- Sulfur dioxide [air, urban air close to ground]: 1.7054e-6 kg; lognormal variance with pedigree 0.1146, pedigree (3,3,5,5,4)
  (same comment as for Acetaldehyde)
- Toluene [air, urban air close to ground]: 6.2016e-7 kg; lognormal variance with pedigree 0.1646, pedigree (3,3,5,5,4)
  (same comment as for Acetaldehyde)
- Water [air, unspecified]: 0.0032895 m3; name water_to_air_unspecified; lognormal variance with pedigree 0.0827, pedigree (2,2,5,5,1)
  Calculated value based on literature values and expert opinion. See comments in the parametres' comment field.
  property fraction, origin: fresh water 0.0387597; name fraction_origin_fresh_water
  property fraction, origin: salt water 0; name fraction_origin_salt_water
  property fraction, origin: unspecified 0.96124; name fraction_origin_unspecified
- AOX, Adsorbable Organic Halides [water, surface water]: 1e-6 kg; lognormal variance with pedigree 0.182, pedigree (3,5,5,5,4)
  Adapted from 'methanol (from natural gas), at plant'
  Uncertainty: Adapted from 'methanol (from natural gas), at plant'
- BOD5, Biological Oxygen Demand [water, surface water]: 0.00018 kg; lognormal variance with pedigree 0.182, pedigree (3,5,5,5,4)
  (same comment as for AOX, Adsorbable Organic Halides)
- COD, Chemical Oxygen Demand [water, surface water]: 0.00049 kg; lognormal variance with pedigree 0.182, pedigree (3,5,5,5,4)
  (same comment as for AOX, Adsorbable Organic Halides)
- Chloride [water, surface water]: 2e-6 kg; lognormal variance with pedigree 0.442, pedigree (3,5,5,5,4)
  (same comment as for AOX, Adsorbable Organic Halides)
- DOC, Dissolved Organic Carbon [water, surface water]: 0.00024 kg; lognormal variance with pedigree 0.182, pedigree (3,5,5,5,4)
  (same comment as for AOX, Adsorbable Organic Halides)
- Formaldehyde [water, surface water]: 0.0001 kg; lognormal variance with pedigree 0.442, pedigree (3,5,5,5,4)
  (same comment as for AOX, Adsorbable Organic Halides)
- Methanol [water, surface water]: 3e-5 kg; lognormal variance with pedigree 0.442, pedigree (3,5,5,5,4)
  (same comment as for AOX, Adsorbable Organic Halides)
- Phenol [water, surface water]: 1e-5 kg; lognormal variance with pedigree 0.442, pedigree (3,5,5,5,4)
  (same comment as for AOX, Adsorbable Organic Halides)
- Phosphorus [water, surface water]: 1e-5 kg; lognormal variance with pedigree 0.182, pedigree (3,5,5,5,4)
  (same comment as for AOX, Adsorbable Organic Halides)
- Suspended solids, unspecified [water, surface water]: 2e-5 kg; lognormal variance with pedigree 0.182, pedigree (3,5,5,5,4)
  (same comment as for AOX, Adsorbable Organic Halides)
- TOC, Total Organic Carbon [water, surface water]: 0.00024 kg; lognormal variance with pedigree 0.182, pedigree (3,5,5,5,4)
  (same comment as for AOX, Adsorbable Organic Halides)

## Sampling procedure
Production assessed with mixed data from literature and the ecoinvent 'methanol from natural gas' process. Data is considered relatively weak, as there is no commercial experience of methanol from bio-syngas. Representativity of the data seems difficult to assess.

## Extrapolations
none This dataset has been copied from an original dataset covering the geography CH. The uncertainty has been adjusted accordingly.

## Review by Niels Jungbluth 2006-07-12
Passed.
none
