# wastewater treatment facility construction, capacity 5E9l/year

Dataset: EcoSpold 2, unit process
Geography: CH
Time period: 1996-01-01 to 2023-12-31
Technology level: current
Classification: EcoSpold01Categories: waste management/wastewater treatment
Classification: ISIC rev.4 ecoinvent: 4220:Construction of utility projects
Synonyms: municipal WWTP infrastructure capacity class 3
Tags: ConvertedDataset
Scenario: Business-as-Usual
System model: Allocation, cut-off by classification
Generated by: Gabor Doka (obsolete)
Published in: Doka G. 2007
Database: ecoinvent
isCopyrightProtected: true
accessRestrictedTo: 1

## General comment
For municipal wastewater treatment plant capacity class 3 with an average per-captia equivalent PCE (Einwohnergleichwert) of 24'864 and an average annual sewage volume of 5.0 million m3/a. This is the average plant size in Switzerland. A lifetime of 30 years is assumed.
[This dataset was already contained in the ecoinvent database version 2. It was not individually updated during the transfer to ecoinvent version 3. Life Cycle Impact Assessment results may still have changed, as they are affected by changes in the supply chain, i.e. in other datasets. This dataset was generated following the ecoinvent quality guidelines for version 2. It may have been subject to central changes described in the ecoinvent version 3 change report (http://www.ecoinvent.org/database/ecoinvent-version-3/reports-of-changes/), and the results of the central updates were reviewed extensively. The changes added e.g. consistent water flows and other information throughout the database. The documentation of this dataset can be found in the ecoinvent reports of version 2, which are still available via the ecoinvent website. The change report linked above covers all central changes that were made during the conversion process.]

## Included activities end
Infrastructure materials for municipal wastewater treatment plant, transports, dismantling. Land use burdens.

## Geography
Specific to the technology mix encountered in Switzerland in 2000. Well applicable to modern treatment practices in Europe, North America or Japan.

## Technology
Three stage wastewater treatment (mechanical, biological, chemical) including sludge digestion (fermentation) according to the average technology in Switzerland

## Parameters
- fraction, process water, to air: 0.15 dimensionless; name fraction_PW_to_air; lognormal variance with pedigree 0.092025, pedigree (4,4,3,2,4)
  Literature value. In case when no industry/process specific data are available, default evaporation fraction value is used. This value is 15% and is based on literature (Statistics Canada, 2007 & Shaffer, K.H., 2008, Consumptive water use in the Great Lakes Basin, USGS & Shiklomanov, 2003, World Water Resources at the Beginning of the 21st Century) and has been approved by an expert.
- fraction, tap water, to air: 0.15 dimensionless; name fraction_TW_to_air; = fraction_PW_to_air; lognormal variance with pedigree 0.092025, pedigree (4,4,3,2,4)
  Calculated value. See comment in the other parametres present in this dataset. Tap water is considered to be always used as process water, thus process water fractions to air are applied to all tap water input flows to calculate the amount of water consumed in the processes.

## Reference product
- wastewater treatment facility, capacity 5E9l/year: 1 unit; By-product classification allocatable product; CPC 53253: Sewage and water treatment plants
  EcoSpold01Location=CH
  production volume 0.0336675 unit
    This is a placeholder value that does not reflect real-world production volumes. This dataset does not currently require a real-world production volume to work in the database framework, and no actual data were collected yet. This has no negative effect on the results of the ecoinvent database. The placeholder value of this activity was scaled according to the nominal GDP of 2005 (source: United Nations, http://data.un.org/Glossary.aspx?q=GDP+%28current+US%24%29, accessed 20130726) to reflect an appropriate share of the global production volume, which is also a placeholder value.
  property price 1.07776e7 EUR2005
    Calculated based on inputs: The price of the product has been calculated as a sum of the values of the material and energy inputs for this product. This value is therefore a rough estimation. It may underestimate the real price since there are additional expenses when producing any product. These expences can include for example labour costs, treatment of waste materials and profit for the producer. Please consider carefully whether this level of data quality is acceptable for your application.
  properties: carbon allocation 0 kg, carbon content 0

## Inputs from technosphere
- aluminium, cast alloy: 33900 kg; lognormal variance with pedigree 0.3401, pedigree (1,2,5,1,1)
  EcoSpold01Location=RER
  Data from 3 plants
  Uncertainty: & basic uncertainty of 3; Data from 3 plants
  properties: dry mass 1 kg, wet mass 1 kg
- chemical, inorganic: 19400 kg; lognormal variance with pedigree 0.3401, pedigree (1,2,5,1,1)
  EcoSpold01Location=GLO
  Data from 3 plants
  Uncertainty: & basic uncertainty of 3; Data from 3 plants
  properties: carbon content, fossil 0.003, dry mass 1 kg, wet mass 1 kg
  note on carbon content, fossil: This dataset is an unweighted average of 20 inorganic substances (listed in Tab 88.1, ecoinvent v2.2 report 8, part II), being part of the top100 chemicals included in this database. The C-content has also been calculated as an unweighted average of the C content of the substances composing this dataset.
- chemical, organic: 159000 kg; lognormal variance with pedigree 0.3401, pedigree (1,2,5,1,1)
  Data from 3 plants
  EcoSpold01Location=GLO
  Uncertainty: & basic uncertainty of 3; Data from 3 plants
  properties: carbon content, fossil 0.628, dry mass 1 kg, heating value, net 19.03 MJ, wet mass 1 kg
  note on carbon content, fossil: This dataset is an unweighted average of 20 organic substances (listed in Tab 88.1, ecoinvent v2.2 report 8, part II), being part of the top100 chemicals included in this database. The C-content has also been calculated as an unweighted average of the C content of the substances composing this dataset.
- concrete, 37MPa: 39000 m3; lognormal variance with pedigree 0.3401, pedigree (1,2,5,1,1)
  EcoSpold01Location=CH
  Data from 3 plants
  Uncertainty: & basic uncertainty of 3; Data from 3 plants
  properties: dry mass 2290 kg, water content 0.0655022, wet mass 2440 kg
- copper, cathode: 36000 kg; lognormal variance with pedigree 0.3401, pedigree (1,2,5,1,1)
  (same comment as for aluminium, cast alloy)
  properties: dry mass 1 kg, wet mass 1 kg
- electricity, medium voltage: 1480 kWh; lognormal variance with pedigree 0.3401, pedigree (1,2,5,1,1)
  Data from 3 plants
  EcoSpold01Location=CH
  Uncertainty: & basic uncertainty of 3; Data from 3 plants
- excavation, hydraulic digger: 136000 m3; lognormal variance with pedigree 0.3401, pedigree (1,2,5,1,1)
  Data from 3 plants
  EcoSpold01Location=RER
  Uncertainty: & basic uncertainty of 3; Data from 3 plants
- extrusion, plastic film: 96200 kg; lognormal variance with pedigree 0.3401, pedigree (1,2,5,1,1)
  (same comment as for aluminium, cast alloy)
- glass fibre: 76500 kg; lognormal variance with pedigree 0.3401, pedigree (1,2,5,1,1)
  (same comment as for excavation, hydraulic digger)
  properties: dry mass 1 kg, wet mass 1 kg
- limestone, crushed, washed: 837000 kg; lognormal variance with pedigree 0.3401, pedigree (1,2,5,1,1)
  (same comment as for concrete, 37MPa)
  properties: carbon content, fossil 0.117257, dry mass 0.998 kg, water content 0.00200401, wet mass 1 kg
  note on carbon content, fossil: Table 3.1, ecoinvent v2.2 report 7, part VII, pg 3. MW CaCO3=100, MW MgCO3=84. C content of limestone is 0.117257 kg/kg DM
- pitch: 19600 kg; lognormal variance with pedigree 0.3401, pedigree (1,2,5,1,1)
  (same comment as for concrete, 37MPa)
  properties: carbon content, fossil 0.83, dry mass 1 kg, heating value, net 28 MJ, wet mass 1 kg
- polyethylene, high density, granulate: 95500 kg; lognormal variance with pedigree 0.3401, pedigree (1,2,5,1,1)
  (same comment as for aluminium, cast alloy)
  properties: carbon content, fossil 0.857143, dry mass 1 kg, heating value, net 42.47 MJ, wet mass 1 kg
  note on carbon content, fossil: Polyethylene is formed out of a huge amount of ethylene monomers (C2H4) (ecoinvent v2.2 report 11_II). MW=28 g/mol
- polyethylene, low density, granulate: 628 kg; lognormal variance with pedigree 0.3401, pedigree (1,2,5,1,1)
  (same comment as for aluminium, cast alloy)
  properties: carbon content, fossil 0.857143, dry mass 1 kg, heating value, net 42.47 MJ, wet mass 1 kg
- reinforcing steel: 3.03e6 kg; lognormal variance with pedigree 0.3401, pedigree (1,2,5,1,1)
  (same comment as for aluminium, cast alloy)
  properties: carbon content, fossil 0.004, dry mass 1 kg, wet mass 1 kg
- steel, chromium steel 18/8, hot rolled: 243000 kg; lognormal variance with pedigree 0.3401, pedigree (1,2,5,1,1)
  (same comment as for aluminium, cast alloy)
  properties: carbon content, fossil 0.0008, dry mass 1 kg, wet mass 1 kg
  note on carbon content, fossil: Stainless steel model is the grade 304 steel (18/8 stainless, 18% chromium 8% nickel; max. 0.08% C)
- stone wool, packed: 34100 kg; lognormal variance with pedigree 0.3401, pedigree (1,2,5,1,1)
  (same comment as for concrete, 37MPa)
  properties: carbon content, fossil 0.015401, dry mass 1 kg, wet mass 1 kg
  note on carbon content, fossil: The chemical composition of the glass fibres used in the rock wool production is similar to the composition of naturally cooled volcano basalt and has a composition listed in Tab. 3.1 and 3.2 in ecoinvent v2.2 report 16, part XIV. Rock wool contains: a minimum of 96% mineral fibres,between 0.5 and 3.0 weight percent of phenolic resin depending on the specific product characteristics, and about 0.2 percent mineral oil (ecoinvent v2.2 report 16, part XIV). An average composition of 1.8% phenolic resin, 0.2% mineral oil, and 98% mineral fibres has been assumed and used to calculate C content of the rock wool
- synthetic rubber: 34500 kg; lognormal variance with pedigree 0.3401, pedigree (1,2,5,1,1)
  (same comment as for aluminium, cast alloy)
  properties: carbon content, fossil 0.871949, dry mass 1 kg, heating value, net 26.42 MJ, wet mass 1 kg
  note on carbon content, fossil: EPDM (Ethylene-propene-diene terpolymer) rubber is a terpolymer of ethylene, propene, and a diene with the residual unsaturated portion of the diene in the side chain (ecoinvent v2.2 report 7-part XX & Ullmann). Chemical formula (deduced from Evidences of Solvent-Induced Miscibility in Polychloroprene-co-Ethylene-Propene Diene Terpolymer Blends, Dubey et al., Journal of Applied Polymer Science, 2009, 111:1884–1891): C20H35
- tap water: 4.76e6 kg; name tap_water_input; lognormal variance with pedigree 0.3401, pedigree (1,2,5,1,1)
  (same comment as for excavation, hydraulic digger)
  properties: carbon content, fossil 0.00178991, dry mass 0.000337476 kg, water content 2962.17, wet mass 1 kg
  note on carbon content, fossil: Bicarbonate content is 2.93 mol/m3. CO2 content is 0.1 mol/m3 (ecoinvent v2.2 report 8, Tab 93.1).
- waste bitumen sheet: -19600 kg; lognormal variance with pedigree 0.3003, pedigree (1,2,2,1,1)
  (same comment as for concrete, 37MPa)
  production volume
    Calculated from the production volume of wastewater treatment facility, capacity 5E9l/year in proportion to the respective output amounts.
  properties: carbon content, fossil 0.643207, dry mass 0.985 kg, heating value, net 40.2 MJ, water content 0.0152284, wet mass 1 kg
  note on carbon content, fossil: The bitumen sheet is made of 63% bitumen, 24% surface spread and filler (assumed to be pure SiO2), 6% carrier fleece (assumed to be PE) and 7% elastomer (assumed to be PS) (ecoinvent v2.2 report 13_I, pg 40). C content of bitumen, PE and PS from Tab A.6 and A.1 (ecoinvent v2.2 report 13_I, pg 40), respectively. C content of waste also given in the dataset
  note on heating value, net: Literature value, Source: IPCC 2006, 2006 IPCC Guidelines for National Greenhouse Gas Inventories, Prepared by the National Greenhouse Gas Inventories Programme, Eggleston H.S., Buendia L., Miwa K., Ngara T. and Tanabe K. (eds). Published: IGES, Japan
- waste mineral wool: -111000 kg; lognormal variance with pedigree 0.3003, pedigree (1,2,2,1,1)
  (same comment as for concrete, 37MPa)
  production volume
    (same comment as for waste bitumen sheet)
  properties: dry mass 1 kg, wet mass 1 kg
- waste polyethylene/polypropylene product: -131000 kg; lognormal variance with pedigree 0.3003, pedigree (1,2,2,1,1)
  (same comment as for electricity, medium voltage)
  production volume
    (same comment as for waste bitumen sheet)
  properties: carbon content, fossil 0.748045, dry mass 0.847 kg, heating value, net 42.47 MJ, water content 0.180638, wet mass 1 kg
  note on carbon content, fossil: Mixed various plastics was used to estimate the C content of this waste (Tab A.2, ecoinvent v2.2 report 13_I)
- waste reinforced concrete: -8.89e7 kg; lognormal variance with pedigree 0.3003, pedigree (1,2,2,1,1)
  (same comment as for concrete, 37MPa)
  production volume
    (same comment as for waste bitumen sheet)
  properties: dry mass 0.99418 kg, water content 0.00585407, wet mass 1 kg

## Inputs from nature
- Occupation, construction site [natural resource, land]: 23100 m2*year; lognormal variance with pedigree 0.0812, pedigree (2,3,5,1,1)
  Estimate on land area from 3 plants, class capacity size and building, operation time
  Uncertainty: & basic uncertainty of 1.5; estimate on land area from 3 plants, class capacity size and building, operation time
- Occupation, industrial area [natural resource, land]: 692000 m2*year; lognormal variance with pedigree 0.0812, pedigree (2,3,5,1,1)
  (same comment as for Occupation, construction site)
- Transformation, from pasture, man made [natural resource, land]: 23100 m2; lognormal variance with pedigree 0.1612, pedigree (2,3,5,1,1)
  Estimate on land area from 3 plants
  Uncertainty: & basic uncertainty of 2; estimate on land area from 3 plants
- Transformation, to industrial area [natural resource, land]: 23000 m2; lognormal variance with pedigree 0.1612, pedigree (2,3,5,1,1)
  (same comment as for Transformation, from pasture, man made)

## Emissions to nature
- Water [air, unspecified]: 714 m3; name water_to_air_unspecified; = (tap_water_input/1000*fraction_TW_to_air); lognormal variance with pedigree 0.0807, pedigree (2,2,5,1,1)
  Calculated value based on literature values and expert opinion. See comments in the parametres' comment field.
  property fraction, origin: fresh water 1; name fraction_origin_fresh_water
  property fraction, origin: salt water 0; name fraction_origin_salt_water
  property fraction, origin: unspecified 0; name fraction_origin_unspecified
- Water [water, unspecified]: 4046 m3; name water_to_water_unspecified; = (tap_water_input/1000)*(1-fraction_TW_to_air); lognormal variance with pedigree 0.0807, pedigree (2,2,5,1,1)
  (same comment as for Water)
  property carbon content, fossil 0; name C_content_fossil
  property carbon content, non-fossil 0; name C_content_non_fossil
  property dry mass 0 kg; name DM
  property fraction, origin: fresh water 1; name fraction_origin_fresh_water_Ww
  property fraction, origin: salt water 0; name fraction_origin_salt_water_Ww
  property fraction, origin: unspecified 0; name fraction_origin_unspecified_Ww
  property water in wet mass 1000 kg; name WWM
  property wet mass 1000 kg; name WM

## Sampling procedure
data from literature

## Extrapolations
data from three Swiss WWTP, linearily extrapolated according to capacity class.

## Review by Niels Jungbluth 2003-06-18
Passed.
