# cottonseed oil, refined, to generic market for vegetable oil, refined

Dataset: EcoSpold 2, unit process
Geography: GLO
Time period: 2012-01-01 to 2023-12-31
Technology level: current
Classification: ISIC rev.4 ecoinvent: 1040:Manufacture of vegetable and animal oils and fats
Scenario: Business-as-Usual
System model: Allocation, cut-off by classification
Generated by: Tereza Levova
Database: ecoinvent
isCopyrightProtected: true
accessRestrictedTo: 1

## General comment
Vegetable oils are often traded on the same market, simply because most of the uses requiring vegetable oil do not require specific vegetable oil. The purpose of this activity is to link certain amount of specific vegetable oils and create generic vegetable oil which can be then traded on generic vegetable oil market.

## Included activities end
This activity renames part of the refined cottonseed oil to vegetable oil, refined for sale on this generic vegetable oil market.

## Parameters
- fraction: 0.802 dimensionless; name fraction_of_crude_oil_PV_to_refinery; lognormal variance with pedigree 0.0086, pedigree (4,1,1,1,1)
  According to literature (USDA, http://usda.mannlib.cornell.edu/MannUsda/viewDocumentInfo.do?documentID=1290 and http://lipidlibrary.aocs.org/market/nonfood.htm) 19.8% of vegetable oil, crude produced is further processed to be used for non-food products. The remaining 80.2 % is refined into vegetable oil, refined and used during food production.
- fraction_to_generic_market: 0.9 % (obsolete); lognormal variance with pedigree 0.0406, pedigree (5,1,1,1,1)
  It is assumed that 90% of cotton seed oil, refined is traded on generic vegetable oil market, i.e. its buyers do not care what type of vegetable oil they are buying. Remaining 10% of the production volume (PV) is assumed to be used for uses, where specific type of vegetable oil is required and cannot be substituted by any other vegetable oil.

## Reference product
- vegetable oil, refined: 1 kg; By-product classification allocatable product; CPC 21691: Other vegetable oils, crude or refined, n.e.c.; HS2017 151590: Vegetable fats and oils and their fractions; fixed, n.e.c. in heading no. 1515, whether or not refined, but[...]
  production volume 3.50617e9 kg; = 4857538*1000*fraction_of_crude_oil_PV_to_refinery*fraction_to_generic_market
    According to literature (USDA, http://usda.mannlib.cornell.edu/MannUsda/viewDocumentInfo.do?documentID=1290 and http://lipidlibrary.aocs.org/market/nonfood.htm) 19.8% of vegetable oil, crude produced is further processed to be used for non-food products. The remaining 80.2 % is refined into vegetable oil, refined and used during food production. According to FAO (http://faostat.fao.org/) 4.86E+9 kg of cotton seed oil, crude was produced in 2005.
  property heating value, net 38.4 MJ
    Values is approximated from HHV from "vegetable oil, crude". Source: Radovanovic,M.; Zivanovic,T.; Stojiljkovic,D.; Jovanovic,V.; Jerinic,N.; Knezevic,S. et.al. Utilization of sunflower husk as a fuel for industrial boilers - 20 years experience. Proc. 5th Eur. Conf. on Industrial Furnaces&Boilers 2000,vol.2,p.221-233.
    Available at: https://phyllis.nl/Biomass/View/2152
  property price 0.503 EUR2005
    Average price of soybean oil, refined and palm oil, refined. Sources: Average 2005 prices for EU27, USA, China, Japan and India from Import/Export data (US$ and tonnes) in UN Commodity Trade Statistics Database
  properties: carbon allocation 0.768 kg, carbon content 0.768, carbon content, fossil 0, carbon content, non-fossil 0.768, dry mass 1 kg, water content 0, water in wet mass 0 kg, wet mass 1 kg

## Inputs from technosphere
- cottonseed oil, refined: 1 kg; name cottonseed_oil_refined
  properties: carbon content, non-fossil 0.612118, dry mass 1 kg, heating value, net 38.4 MJ, wet mass 1 kg
  note on heating value, net: Values is approximated from HHV from "vegetable oil, crude". Source: Radovanovic,M.; Zivanovic,T.; Stojiljkovic,D.; Jovanovic,V.; Jerinic,N.; Knezevic,S. et.al. Utilization of sunflower husk as a fuel for industrial boilers - 20 years experience. Proc. 5th Eur. Conf. on Industrial Furnaces&Boilers 2000,vol.2,p.221-233. Available at: https://phyllis.nl/Biomass/View/2152

## Review by Bo Weidema 2012-03-14
Production volumes are for 2005, even though the dataset is indicated to be valid for 2012.

## Review by Bo Weidema 2012-08-23
Changed to a treatment activity (with "cottonseed oil, refined" as negative reference product).
