# paper production, woodfree, coated, at integrated mill

Dataset: EcoSpold 2, unit process
Geography: RoW
Time period: 2000-01-01 to 2023-12-31
Technology level: current
Classification: EcoSpold01Categories: paper & cardboard/graphic paper
Classification: ISIC rev.4 ecoinvent: 1701:Manufacture of pulp, paper and paperboard
Synonyms: coated fine paper
Tags: ConvertedDataset
Scenario: Business-as-Usual
System model: Allocation, cut-off by classification
Generated by: Roland Hischier
Published in: Hischier R. 2007
Database: ecoinvent
isCopyrightProtected: true
accessRestrictedTo: 1

## General comment
This dataset is an identical copy of corresponding RER dataset. Wood free, coated paper (also called coated fine paper) is used for all kind of printing and other graphic purposes. Wood free paper is defined as containing at least 90% of the fibres in form of chemical pulp. Coated means that the paper is coated with a coating material like kaolin or calcium carbonate on one or two sides. This dataset represents the production at integrated mills with their own pulp production next to the paper machine.
The main sources for the dataset are the Finnish EcoData database from KCL (KCL (2002)) as well as several CER‘s of integrated and non-integrated paper mills (Äänekoski (2001); Grycksbo (2002); Kangas (2001); Kymi (2001); Nordland Papier (2001); Oulu (2002); Uetersen (2001))
An additional source is the European IPPC documentation for the paper and pulp industry (European Commission (2000)).
References
Äänekoski (2001) EMAS statement 2000. M-real Paper, Äänekoski (Finland)
Grycksbo (2002) Environmental Report 2001. StoraEnso, Grycksbo (Sweden) as pdf-File under: http://www.storaenso.com/CDAvgn/main/0,,1_-2395-2103-,00.html
Kangas (2001) EMAS statement 2000. M-real Paper, Jyväskylä (Finland)
KCL (2002) KCL EcoData - life cycle inventory database. The Finnish Pulp and Paper Research Institute (KCL), Espoo (Finnland)
Kymi (2001) Kymi Paper Oy Environmental Protection in 2000. UPM-Kymmene Kymi Paper Oy, Kuusankoski (Finland) as pdf-File under: http://www.paper.upm-kymmene.com
Nordland Papier (2001) Umwelterklärung 2001. UPM-Kymmene Nordland Papier AG, Dörpen (Germany) as pdf-File under: http://www.paper.upm-kymmene.com
Oulu (2002) Environmental Statement 2001. Stora Enso Oyj, Oulu (Finland) as pdf-File under: http://www.storaenso.com/CDAvgn/main/0,,1_-2393-2097-,00.html
Uetersen (2001) Vereinfachte Umwelterklärung 2000. StoraEnso Uetersen GmbH, Uetersen (Germany) as pdf-File under: http://www.storaenso.com/CDAvgn/main/0,,1_-2394-2102-,00.html

## Included activities start
This activity starts with the reception of the raw materials, such as pulpwood.

## Included activities end
This module includes the European production of coated woodfree paper in an integrated paper mill - including wood handling, chemical pulping and bleaching, paper production, energy production on-site, recovery cycles of chemicals and internal waste water treatment.

## Geography
Data from a finnish database and from several European fine paper producers used as European average data.

## Technology
Average of present used technology

## Time period
Data represent the average technology in the late 1990ies and early 2000s. The production volume is valid for 2018.

## Parameters
- fraction, cooling water, cooling pond system, to air: 0.032 dimensionless; name fraction_CW_CP_to_air; lognormal variance with pedigree 0.0413, pedigree (2,3,1,3,1)
  Calculated based on literature value (Scown, C.D., 2011, Water Footprint of U.S. Transportation Fuels and supplying information of the article) (Vionnet, S., Quantis Water Database - Technical Report, 2012).
- fraction, cooling water, once-through system, to air: 0.004 dimensionless; name fraction_CW_OT_to_air; lognormal variance with pedigree 0.0413, pedigree (2,3,1,3,1)
  (same comment as for fraction, cooling water, cooling pond system, to air)
- fraction, cooling water, recirculating system, to air: 0.771 dimensionless; name fraction_CW_R_to_air; lognormal variance with pedigree 0.0413, pedigree (2,3,1,3,1)
  (same comment as for fraction, cooling water, cooling pond system, to air)
- fraction, cooling water, to air: 0.3875 dimensionless; name fraction_CW_to_air; = (0.5*fraction_CW_OT_to_air)+(0.5*fraction_CW_R_to_air); lognormal variance with pedigree 0.092025, pedigree (4,4,3,2,4)
  Calculated value based on literature value (see comments of the other parametres present in this dataset) and expert opinion. In the case when no industry/literature data are available about the type of cooling or directly fraction, cooling water, to air specific for the process a default assumption is applied. It is assumed that the once-through cooling system is used in 50% of all cases and recirculating system is used in another 50% of all cases.
- fraction, process water, to air: 0.15 dimensionless; name fraction_PW_to_air; lognormal variance with pedigree 0.092025, pedigree (4,4,3,2,4)

## Reference product
- paper, woodfree, coated: 1 kg; name Amount_ref; By-product classification allocatable product; CPC 32113: Mechanical wood pulp; semi-chemical wood pulp; pulps of fibrous cellulosic material other than wood; HS2017 481013: Paper and paperboard; coated with kaolin or other inorganic substances, for printing & writing, graphics, c[...]
  EcoSpold01Location=RER
  production volume 1.44684e10 kg; name PV_ref; = (6212000000 *0.8)/(21908724538088.93/85693321610361.34)
    Kg/year, valid for 2018
    The global annual PV was estimated by scaling the European PV according to the ratio of the European GDP and global GDP. According to expert judgement 80 % of graphical paper is produced at integrated mills.
    Source: CEPI Key Statistics 2018, <http://www.cepi.org/system/files/public/documents/publications/Final%20Key%20Statistics%202018.pdf>
    <http://www.cepi.org/system/files/public/documents/publications/Final%20Key%20Statistics%202018.pdf>
  property carbon content, fossil 0.0590617
    Fossil C content was calculated after fossil C contents of chemicals used in the production of the paper (in Tab 8.72 & 8.73 ecoinvent v2.2 report 11_III, part 8).
  property carbon content, non-fossil 0.28
    Biogenic C content was calculated after biogenic C contents of chemicals used in the production of the paper (in Tab 8.72 & 8.73 ecoinvent v2.2 report 11_III, part 8). The cellulose content in 1 kg of paper (on a wet mas basis) was estimated as (1-chemical content), C content of cellulose was considered 0.44 kgC/kg dry mass (ecoinvent v2.2 report, n 15a, pg 40)
  property price 0.729 EUR2005
    Export prices for the World+ according to: http://faostat.fao.org/site/626/DesktopDefault.aspx?PageID=626#ancor downloaded 28 April 2009; calculated as export value divided by export volume.
  properties: carbon allocation 0.320413 kg, carbon content 0.339062, dry mass 0.945 kg, heating value, net 14.11 MJ, water content 0.0582011, water in wet mass 0.055 kg, wet mass 1 kg

## Inputs from technosphere
- alkylketene dimer sizing agent, for paper production: 0.00213 kg; lognormal variance with pedigree 0.0546, pedigree (2,4,5,5,1)
  Average data from finnish database
  EcoSpold01Location=RER
  Uncertainty: average data from finnish database
  properties: carbon content, non-fossil 0.538229, dry mass 1 kg, heating value, net 16.31 MJ, wet mass 1 kg
  note on carbon content, non-fossil: Biogenic C content was calculated after biogenic C contents of chemicals used in the production of the paper (in Tab 8.72 & 8.73 ecoinvent v2.2 report 11_III, part 8). The cellulose content in 1 kg of paper (on a wet mas basis) was estimated as (1-chemical content), C content of cellulose was considered 0.44 kgC/kg dry mass (ecoinvent v2.2 report, n 15a, pg 40) Chemical formula of alkyl ketene dimer was considered as C38H72O20, and the molecular weight 848g/mol. It is produced from Fatty acids, from vegetarian oil
- carbon dioxide, liquid: 0.00109 kg; lognormal variance with pedigree 0.0546, pedigree (2,4,5,5,1)
  (same comment as for alkylketene dimer sizing agent, for paper production)
  properties: carbon content, fossil 0.272727, dry mass 1 kg, heating value, net 8.27 MJ, wet mass 1 kg
  note on carbon content, fossil: Fossil C content was calculated after fossil C contents of chemicals used in the production of the paper (in Tab 8.72 & 8.73 ecoinvent v2.2 report 11_III, part 8). CO2.
- carboxymethyl cellulose, powder: 0.0022 kg; lognormal variance with pedigree 0.0546, pedigree (2,4,5,5,1)
  EcoSpold01Location=RER
  Average data from finnish database
  Uncertainty: average data from finnish database
  properties: carbon content, fossil 0.0979592, carbon content, non-fossil 0.293878, dry mass 1 kg, heating value, net 20.19 MJ, wet mass 1 kg
  note on carbon content, fossil: Fossil C content was calculated after fossil C contents of chemicals used in the production of the paper (in Tab 8.72 & 8.73 ecoinvent v2.2 report 11_III, part 8). Chemical structure: Cellulose-O-CH2-COO-Na+. CMC is produced by the processing of alkaline cellulose with mono acetic acid (ecoinvent v2.2 report 12, pg 76 & 81). MW Acetic acid (CH3-COOH) is 60 g/mol. The degree of carboxymethyl substitution in CMC is variable. It was considered that every molecule of glucose (monomers of cellulose) had a carboxymethyl substitution. MW of glucose (C6H10O5) is 162 g/mol; cellulose is (C6H10O5)n. MW of Na is 23
  note on carbon content, non-fossil: Biogenic C content was calculated after biogenic C contents of chemicals used in the production of the paper (in Tab 8.72 & 8.73 ecoinvent v2.2 report 11_III, part 8). The cellulose content in 1 kg of paper (on a wet mas basis) was estimated as (1-chemical content), C content of cellulose was considered 0.44 kgC/kg dry mass (ecoinvent v2.2 report, n 15a, pg 40) Chemical structure: Cellulose-O-CH2-COO-Na+. CMC is produced by the processing of alkaline cellulose with mono acetic acid (ecoinvent v2.2 report 12, pg 76 & 81). MW Acetic acid is 60 g/mol. The degree of carboxymethyl substitution in CMC is variable. It was considered that every molecule of glucose (monomers of cellulose) had a carboxymethyl substitution. MW of glucose (C6H10O5) is 162 g/mol; cellulose is (C6H10O5)n.
- chemical, organic: 0.00263 kg; lognormal variance with pedigree 0.0546, pedigree (2,4,5,5,1)
  EcoSpold01Location=GLO
  Average data from finnish database
  Uncertainty: average data from finnish database
  properties: carbon content, fossil 0.628, dry mass 1 kg, heating value, net 19.03 MJ, wet mass 1 kg
  note on carbon content, fossil: Fossil C content was calculated after fossil C contents of chemicals used in the production of the paper (in Tab 8.72 & 8.73 ecoinvent v2.2 report 11_III, part 8). This dataset is an unweighted average of 20 organic substances (listed in Tab 88.1, ecoinvent v2.2 report 8, part II), being part of the top100 chemicals included in this database. The C-content has also been calculated as an unweighted average of the C content of the substances composing this dataset.
- electricity, medium voltage: 0.0116415, 0.232221, 0.0780255, 0.00356501, 0.000713533, 0.000153212, 0.0239804 kWh (7 suppliers, which the file names only by identifier); sum of these 0.3503 kWh; lognormal variance with pedigree 0.0426, pedigree (1,3,5,5,1)
  EcoSpold01Location=NORDEL
  Average from finnish database and several companies
  Uncertainty: average from finnish database and several companies
- hard coal: 0.000557931, 0.000132393, 0.00394861, 0.000927326, 0.000569355, 0.000831809, 0.00123045, 0.000242124 kg (8 suppliers, which the file names only by identifier); sum of these 0.00844 kg; lognormal variance with pedigree 0.0426, pedigree (1,3,5,5,1)
  Average from finnish database and several companies
  EcoSpold01Location=WEU
  Uncertainty: average from finnish database and several companies
  properties: carbon content, fossil 0.845, dry mass 0.94 kg, heating value, net 27.91 MJ, water content 0.0638298, wet mass 1 kg
  note on carbon content, fossil: Fossil C content was calculated after fossil C contents of chemicals used in the production of the paper (in Tab 8.72 & 8.73 ecoinvent v2.2 report 11_III, part 8). C content 75-94% (specified in Tab 1.1, report 6, part VI). A mean content of 0.845 kg C/ kg dry hard coal was considered
  note on heating value, net: Based on the Characterization factor of Hard coal in the CED method
- hazardous waste, for underground deposit: -4e-5 kg; name Amount_BP3; lognormal variance with pedigree 0.0026, pedigree (1,3,1,5,1)
  Average from finnish database and several companies
  EcoSpold01Location=DE
  Uncertainty: average from finnish database and several companies
  production volume; = PV_ref*(Amount_BP3/ Amount_ref)
    Calculated from the production volume of paper, woodfree, coated in proportion to the respective output amounts.
  properties: carbon content, fossil 0.554667, dry mass 1 kg, wet mass 1 kg
  note on carbon content, fossil: Fossil C content was calculated after fossil C contents of chemicals used in the production of the paper (in Tab 8.72 & 8.73 ecoinvent v2.2 report 11_III, part 8). Tab A.6, ecoinvent v2.2 report 13_I, average hazardous waste composition was used, and referred to 0% water mass. No waste-specific emission are currently inventoried for underground deposits. Accordingly, no waste composition must be specified. For generic, average waste to underground deposit deposition in a 200 liter steel drum without cement solidification is assumed (ecoinvent v2.2 report 13_I).
- heavy fuel oil: 0.000356179, 0.000207408, 0.00105442, 0.0246487, 0.000266074, 0.00136722 kg (6 suppliers, which the file names only by identifier); sum of these 0.0279 kg; lognormal variance with pedigree 0.0426, pedigree (1,3,5,5,1)
  Average from finnish database and several companies
  EcoSpold01Location=RER
  Uncertainty: average from finnish database and several companies
  properties: carbon content, fossil 0.849, dry mass 1 kg, heating value, net 41.2 MJ, wet mass 1 kg
  note on carbon content, fossil: Fossil C content was calculated after fossil C contents of chemicals used in the production of the paper (in Tab 8.72 & 8.73 ecoinvent v2.2 report 11_III, part 8). C-content is 84.9% (ecoinvent v2.2 report 6_IV, Tab 3.18)
- hydrogen peroxide, without water, in 50% solution state: 0.00401 kg; lognormal variance with pedigree 0.0546, pedigree (2,4,5,5,1)
  (same comment as for alkylketene dimer sizing agent, for paper production)
  properties: dry mass 1 kg, heating value, net 7.13 MJ, wet mass 1 kg
- kaolin: 0.172 kg; lognormal variance with pedigree 0.0426, pedigree (1,3,5,5,1)
  Average from several european fine paper producers
  EcoSpold01Location=RER
  Uncertainty: average from several european fine paper producers
  properties: dry mass 1 kg, wet mass 1 kg
- latex: 0.041 kg; lognormal variance with pedigree 0.0546, pedigree (2,4,5,5,1)
  (same comment as for carboxymethyl cellulose, powder)
  properties: carbon content, fossil 0.872983, dry mass 1 kg, heating value, net 26.45 MJ, wet mass 1 kg
  note on carbon content, fossil: Fossil C content was calculated after fossil C contents of chemicals used in the production of the paper (in Tab 8.72 & 8.73 ecoinvent v2.2 report 11_III, part 8). The Styrene-butadiene dispersion is based on styrene and 1,3-butadiene plus co-monomers like i.e. ac-rylonitrile or (meth-)acrylic acid (ecoinvent v2.2 report 11_III). Following specifications in US Patent 3,875,101 (1971), the dispersion was considered as: 52.5% 1.3-butadiene (0.8571 kg C/kg dry mass); 43% styrene (0.9231 kg C/kg dry mass); 2% acrylic acid (0.5 kg C/kg dry mass); 2.5% acrolein (C3H4O, MW=56; 0.6429 kg C/kg dry mass)
- lignite briquettes: 1.63 MJ; lognormal variance with pedigree 0.0426, pedigree (1,3,5,5,1)
  EcoSpold01Location=DE
  Average from finnish database and several companies
  Uncertainty: average from finnish database and several companies
  properties: carbon content, fossil 0.65679, dry mass 0.0415385 kg, heating value, net 19.5 MJ, water content 0.234568, wet mass 0.0512821 kg
  note on carbon content, fossil: Fossil C content was calculated after fossil C contents of chemicals used in the production of the paper (in Tab 8.72 & 8.73 ecoinvent v2.2 report 11_III, part 8). 53.2% C and 19% water in wet mass (ecoinvent v2.1 report 6_VI Table 7.1)
  note on heating value, net: Based on literature, page 52, Report 5: Dones, R., Bauer, C., Bolliger, R., Burger, B., faist Emmenegger, M., Frischknecht, R., Heck, T., Jungbluth, N., Röder, A., Tuchschmid, M. (2007) Life Cycle Inventories of Energy Systems: Resulst for current Systems in Switzerland and other UCTE Countries. ecoinvent report No. 5. Paul Scherrer Institut Villigen, Swiss Centre for Life Cycle Inventories, Dübendorf, CH
- lime: 0.172 kg; lognormal variance with pedigree 0.0426, pedigree (1,3,5,5,1)
  EcoSpold01Location=CH
  Average from several european fine paper producers
  Uncertainty: average from several european fine paper producers
  properties: carbon content, fossil 0.120005, dry mass 1 kg, wet mass 1 kg
  note on carbon content, fossil: Fossil C content was calculated after fossil C contents of chemicals used in the production of the paper (in Tab 8.72 & 8.73 ecoinvent v2.2 report 11_III, part 8). CaCO3 (MW=100)
- magnesium sulfate: 0.00234 kg; lognormal variance with pedigree 0.0546, pedigree (2,4,5,5,1)
  (same comment as for carboxymethyl cellulose, powder)
  properties: dry mass 1 kg, wet mass 1 kg
- methanol: 0.000381041, 0.00073897, 6.99884e-5 kg (3 suppliers, which the file names only by identifier); sum of these 0.00119 kg; lognormal variance with pedigree 0.0546, pedigree (2,4,5,5,1)
  Average data from finnish database
  EcoSpold01Location=GLO
  Uncertainty: average data from finnish database
  properties: carbon content, fossil 0.375, dry mass 1 kg, heating value, net 20 MJ, wet mass 1 kg
  note on carbon content, fossil: Fossil C content was calculated after fossil C contents of chemicals used in the production of the paper (in Tab 8.72 & 8.73 ecoinvent v2.2 report 11_III, part 8). CH3OH
  note on heating value, net: Based on literature, page 533, Report 17: Jungbluth, N., Chudacoff, M., Dauriat, A., Dinkel, F., Doka, G., Faist Emmenegger, M., Gnansounou, E., Kljun, N., Schleiss, K., Spielmann, M., Stettler, C., Sutter, J. 2007: Life Cycle Inventories of Bioenergy. ecoinvent report No. 17, Swiss Centre for Life Cycle Inventories, Dübendorf, CH.
- municipal solid waste: -5.34518e-5, -6.34716e-6, -3.95032e-5, -0.0301575, -4.4415e-6, -1.42564e-6, -3.22234e-6, -0.000134147 kg (8 suppliers, which the file names only by identifier); sum of these -0.0304 kg; lognormal variance with pedigree 0.0026, pedigree (1,3,1,5,1)
  EcoSpold01Location=CH
  Average from finnish database and several companies
  Uncertainty: average from finnish database and several companies
  production volume; = PV_ref*(Amount_BP1/ Amount_ref)
    (same comment as for hazardous waste, for underground deposit)
  properties: carbon content, fossil 0.171549, carbon content, non-fossil 0.261655, dry mass 0.771 kg, heating value, net 11.74 MJ, water content 0.297017, wet mass 1 kg
  note on carbon content, fossil: Fossil C content was calculated after fossil C contents of chemicals used in the production of the paper (in Tab 8.72 & 8.73 ecoinvent v2.2 report 11_III, part 8). MSW composition in tab 4.1, ecoinvent v2.2 report 13_I. C content referred to 1 kg DM
  note on carbon content, non-fossil: Biogenic C content was calculated after biogenic C contents of chemicals used in the production of the paper (in Tab 8.72 & 8.73 ecoinvent v2.2 report 11_III, part 8). The cellulose content in 1 kg of paper (on a wet mas basis) was estimated as (1-chemical content), C content of cellulose was considered 0.44 kgC/kg dry mass (ecoinvent v2.2 report, n 15a, pg 40) MSW composition in tab 4.1, ecoinvent v2.2 report 13_I. C content referred to 1 kg DM
  note on heating value, net: Value taken from the general comment of the treatment dataset.
- natural gas, high pressure: 0.0003643, 0.000614529, 0.00134047, 0.0004486, 0.000104836, 0.000623963, 0.00059874, 0.0015744, 0.000607823, 0.000940132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 m3 (37 suppliers, which the file names only by identifier); sum of these 0.0471795 m3; lognormal variance with pedigree 0.0426, pedigree (1,3,5,5,1)
  (same comment as for heavy fuel oil)
  properties: carbon content, fossil 0.602381, dry mass 0.84 kg, heating value, gross 40 MJ, heating value, net 36 MJ, wet mass 0.84 kg
  note on carbon content, fossil: An average C content of 0.506 kg C/ m3 has been assumed (this average has been calculated using data in Tab 3.5, ecoinvent v2.2 report 6_V
  note on heating value, net: Literature value, Source: Christoph Meili;Niels Jungbluth;Maresa Bussa (2021) Life cycle inventories of crude oil and natural gas extraction. ESU-services Ltd. commissioned by BAFU & VSG, Schaffhausen, Switzerland, http://esu-services.ch/data/public-lci-reports/
- nitrogen, liquid: 0.00012 kg; lognormal variance with pedigree 0.0546, pedigree (2,4,5,5,1)
  (same comment as for alkylketene dimer sizing agent, for paper production)
  properties: dry mass 1 kg, wet mass 1 kg
- optical brighteners, for paper production: 0.002 kg; lognormal variance with pedigree 0.0546, pedigree (2,4,5,5,1)
  (same comment as for carboxymethyl cellulose, powder)
  properties: carbon content, fossil 0.557859, dry mass 1 kg, heating value, net 16.9 MJ, wet mass 1 kg
  note on carbon content, fossil: Fossil C content was calculated after fossil C contents of chemicals used in the production of the paper (in Tab 8.72 & 8.73 ecoinvent v2.2 report 11_III, part 8). Mixture of two optical brighteners (DAS-1 and distyrylbiphenyl type), ecoinvent v2.2 report 11-III, pg 298
- oxygen, liquid: 0.0129 kg; lognormal variance with pedigree 0.0546, pedigree (2,4,5,5,1)
  (same comment as for alkylketene dimer sizing agent, for paper production)
  properties: dry mass 1 kg, wet mass 1 kg
- paper mill, integrated: 5.44e-11 unit; lognormal variance with pedigree 0.448, pedigree (4,5,5,5,5)
  EcoSpold01Location=RER
  Own assumption
  Uncertainty: own assumption
- potato starch: 0.0152 kg; lognormal variance with pedigree 0.0546, pedigree (2,4,5,5,1)
  Average data from finnish database
  EcoSpold01Location=DE
  Uncertainty: average data from finnish database
  properties: carbon content, non-fossil 0.46, dry mass 0.8 kg, heating value, net 10.66 MJ, water content 0.25, wet mass 1 kg
  note on carbon content, non-fossil: Biogenic C content was calculated after biogenic C contents of chemicals used in the production of the paper (in Tab 8.72 & 8.73 ecoinvent v2.2 report 11_III, part 8). The cellulose content in 1 kg of paper (on a wet mas basis) was estimated as (1-chemical content), C content of cellulose was considered 0.44 kgC/kg dry mass (ecoinvent v2.2 report, n 15a, pg 40) C-content of starch is considered 46% on dry mass basis (from "Evolutionary and Biochemical Aspects", A.D. Kay and T. Vrede (in Global Ecology, 2010, Elsevier B.V., S.E. Jørgensen Ed.)).
- pulpwood, hardwood, measured as solid wood under bark: 0.001561 m3; lognormal variance with pedigree 0.0426, pedigree (1,3,5,5,1)
  EcoSpold01Location=RER
  Average from several european fine paper producers
  Uncertainty: average from several european fine paper producers
  properties: carbon content, non-fossil 0.494, dry mass 563.2 kg, heating value, net 6071.3 MJ, water content 0.8, wet mass 1013.76 kg
  note on carbon content, non-fossil: Biogenic C content was calculated after biogenic C contents of chemicals used in the production of the paper (in Tab 8.72 & 8.73 ecoinvent v2.2 report 11_III, part 8). The cellulose content in 1 kg of paper (on a wet mas basis) was estimated as (1-chemical content), C content of cellulose was considered 0.44 kgC/kg dry mass (ecoinvent v2.2 report, n 15a, pg 40) C content of dry mass is 0.494 kgC/kg dry wood (ecoinvent v2.2 report 9)
  note on heating value, net: Value based on "hardwood forestry, mixed species, sustainable forest management"The property is based on a value of 11.58MJ/kg
- pulpwood, softwood, measured as solid wood under bark: 0.001044 m3; lognormal variance with pedigree 0.0426, pedigree (1,3,5,5,1)
  (same comment as for pulpwood, hardwood, measured as solid wood under bark)
  properties: carbon content, non-fossil 0.494, dry mass 387.2 kg, heating value, net 4483.78 MJ, water content 1.4, wet mass 929.28 kg
  note on heating value, net: Value based on "softwood forestry, mixed species, sustainable forest management"The property is based on a value of 11.58MJ/kg
- quicklime, milled, loose: 0.00472 kg; lognormal variance with pedigree 0.0546, pedigree (2,4,5,5,1)
  Average data from finnish database
  EcoSpold01Location=CH
  Uncertainty: average data from finnish database
  properties: dry mass 0.99 kg, water content 0.010101, wet mass 1 kg
- residual softwood, wet: 0.0002052 m3; lognormal variance with pedigree 0.0426, pedigree (1,3,5,5,1)
  (same comment as for kaolin)
  properties: carbon content, non-fossil 0.494, dry mass 450 kg, heating value, net 5962.7 MJ, water content 0.7, wet mass 765 kg
- sodium chlorate, powder: 0.0137 kg; lognormal variance with pedigree 0.0546, pedigree (2,4,5,5,1)
  (same comment as for alkylketene dimer sizing agent, for paper production)
  properties: dry mass 1 kg, wet mass 1 kg
- sodium chloride, powder: 0.00022 kg; lognormal variance with pedigree 0.0546, pedigree (2,4,5,5,1)
  (same comment as for carboxymethyl cellulose, powder)
  properties: dry mass 1 kg, wet mass 1 kg
- sodium hydroxide, without water, in 50% solution state: 0.0206 kg; lognormal variance with pedigree 0.0546, pedigree (2,4,5,5,1)
  (same comment as for alkylketene dimer sizing agent, for paper production)
  properties: dry mass 1 kg, heating value, net 3.03 MJ, wet mass 1 kg
- sulfate pulp, bleached: 0.02812 kg; = 0.0296*0.95; lognormal variance with pedigree 0.0426, pedigree (1,3,5,5,1)
  Average from several european fine paper producers. pulp input is 5% unbleached pulp and 95% bleached pulp
  Uncertainty: average from several european fine paper producers
  properties: carbon content, non-fossil 0.494, dry mass 0.9 kg, heating value, net 13.23 MJ, water content 0.111111, wet mass 1 kg
  note on carbon content, non-fossil: C content of dry mass of sulfate pulp is 0.494 kgC/kg dry wood (ecoinvent v2.2 report 6_IX & ecoinvent v2.2 report 9). No other C containing products in the formulation of the pulp.
- sulfate pulp, unbleached: 0.00148 kg; = 0.0296*0.05; lognormal variance with pedigree 0.0426, pedigree (1,3,5,5,1)
  (same comment as for sulfate pulp, bleached)
  properties: carbon content, non-fossil 0.494, dry mass 0.9 kg, heating value, net 13.23 MJ, price 0.355 EUR2005, water content 0.111111, wet mass 1 kg
- sulfur dioxide, liquid: 0.00109 kg; lognormal variance with pedigree 0.0546, pedigree (2,4,5,5,1)
  (same comment as for alkylketene dimer sizing agent, for paper production)
  properties: dry mass 1 kg, wet mass 1 kg
- sulfuric acid: 0.0165 kg; lognormal variance with pedigree 0.0546, pedigree (2,4,5,5,1)
  (same comment as for alkylketene dimer sizing agent, for paper production)
  properties: dry mass 1 kg, wet mass 1 kg
- wood ash mixture, pure: -0.00345 kg; name Amount_BP2; lognormal variance with pedigree 0.0026, pedigree (1,3,1,5,1)
  Average from finnish database and several companies
  EcoSpold01Location=CH
  Uncertainty: average from finnish database and several companies
  production volume; = PV_ref*(Amount_BP2/ Amount_ref)
    (same comment as for hazardous waste, for underground deposit)
  properties: carbon content, non-fossil 0.012, dry mass 1 kg, wet mass 1 kg
  note on carbon content, non-fossil: Biogenic C content was calculated after biogenic C contents of chemicals used in the production of the paper (in Tab 8.72 & 8.73 ecoinvent v2.2 report 11_III, part 8). The cellulose content in 1 kg of paper (on a wet mas basis) was estimated as (1-chemical content), C content of cellulose was considered 0.44 kgC/kg dry mass (ecoinvent v2.2 report, n 15a, pg 40) Tab A.9, ecoinvent v2.2 report 13_I.

## Inputs from nature
- Water, cooling, unspecified natural origin [natural resource, in water]: 0.0563 m3; name water_cooling_UNO_input; lognormal variance with pedigree 0.0426, pedigree (1,3,5,5,1)
  Average from several european fine paper producers
  Uncertainty: average from several european fine paper producers
- Water, unspecified natural origin [natural resource, in water]: 0.0524 m3; name water_UNO_input; lognormal variance with pedigree 0.0426, pedigree (1,3,5,5,1)
  Average from finnish database and several companies
  Uncertainty: average from finnish database and several companies

## Emissions to nature
- Acetaldehyde [air, urban air close to ground]: 9.71e-7 kg; lognormal variance with pedigree 0.1806, pedigree (2,5,5,5,4)
  Estimation - based on respective heating modules
  Uncertainty: estimation - based on respective heating modules
- Acetic acid [air, urban air close to ground]: 9.66e-7 kg; lognormal variance with pedigree 0.1806, pedigree (2,5,5,5,4)
  (same comment as for Acetaldehyde)
- Acetone [air, urban air close to ground]: 1.72e-7 kg; lognormal variance with pedigree 0.1806, pedigree (2,5,5,5,4)
  (same comment as for Acetaldehyde)
- Acetylene [air, urban air close to ground]: 8.27e-6 kg; lognormal variance with pedigree 0.1806, pedigree (2,5,5,5,4)
  (same comment as for Acetaldehyde)
- Aluminium III [air, urban air close to ground]: 2.2e-5 kg; lognormal variance with pedigree 0.1806, pedigree (2,5,5,5,4)
  (same comment as for Acetaldehyde)
- Ammonia [air, urban air close to ground]: 2.26e-5 kg; lognormal variance with pedigree 0.1806, pedigree (2,5,5,5,4)
  (same comment as for Acetaldehyde)
- Antimony ion [air, urban air close to ground]: 4.16e-8 kg; lognormal variance with pedigree 0.1806, pedigree (2,5,5,5,4)
  (same comment as for Acetaldehyde)
- Arsenic ion [air, urban air close to ground]: 1.16e-7 kg; lognormal variance with pedigree 0.1806, pedigree (2,5,5,5,4)
  (same comment as for Acetaldehyde)
- Barium II [air, urban air close to ground]: 4.43e-7 kg; lognormal variance with pedigree 0.7806, pedigree (2,5,5,5,4)
  (same comment as for Acetaldehyde)
- Benzene [air, urban air close to ground]: 2.09e-5 kg; lognormal variance with pedigree 0.1806, pedigree (2,5,5,5,4)
  (same comment as for Acetaldehyde)
- Benzo(a)pyrene [air, urban air close to ground]: 3.92e-8 kg; lognormal variance with pedigree 0.1806, pedigree (2,5,5,5,4)
  (same comment as for Acetaldehyde)
- Beryllium II [air, urban air close to ground]: 4.43e-9 kg; lognormal variance with pedigree 0.7806, pedigree (2,5,5,5,4)
  (same comment as for Acetaldehyde)
- Boron [air, urban air close to ground]: 1.87e-5 kg; lognormal variance with pedigree 0.7806, pedigree (2,5,5,5,4)
  (same comment as for Acetaldehyde)
- Bromine [air, urban air close to ground]: 8.11e-7 kg; lognormal variance with pedigree 0.1806, pedigree (2,5,5,5,4)
  (same comment as for Acetaldehyde)
- Butane [air, urban air close to ground]: 1.29e-6 kg; lognormal variance with pedigree 0.4406, pedigree (2,5,5,5,4)
  (same comment as for Acetaldehyde)
- Cadmium II [air, urban air close to ground]: 6e-8 kg; lognormal variance with pedigree 0.7806, pedigree (2,5,5,5,4)
  (same comment as for Acetaldehyde)
- Calcium II [air, urban air close to ground]: 0.000159 kg; lognormal variance with pedigree 0.4406, pedigree (2,5,5,5,4)
  (same comment as for Acetaldehyde)
- Carbon dioxide, fossil [air, urban air close to ground]: 0.374 kg; lognormal variance with pedigree 0.0426, pedigree (1,3,5,5,1)
  (same comment as for Water, unspecified natural origin)
- Carbon dioxide, non-fossil [air, urban air close to ground]: 1.44 kg; lognormal variance with pedigree 0.0426, pedigree (1,3,5,5,1)
  (same comment as for Water, unspecified natural origin)
- Carbon monoxide, fossil [air, urban air close to ground]: 0.00656 kg; lognormal variance with pedigree 0.7806, pedigree (2,5,5,5,4)
  (same comment as for Acetaldehyde)
- Carbon monoxide, non-fossil [air, urban air close to ground]: 0.000627 kg; lognormal variance with pedigree 0.7806, pedigree (2,5,5,5,4)
  (same comment as for Acetaldehyde)
- Chlorine [air, urban air close to ground]: 2.35e-6 kg; lognormal variance with pedigree 0.4406, pedigree (2,5,5,5,4)
  (same comment as for Acetaldehyde)
- Chromium III [air, urban air close to ground]: 1.9e-7 kg; lognormal variance with pedigree 0.7806, pedigree (2,5,5,5,4)
  (same comment as for Acetaldehyde)
- Chromium VI [air, urban air close to ground]: 2.54e-9 kg; lognormal variance with pedigree 0.7806, pedigree (2,5,5,5,4)
  (same comment as for Acetaldehyde)
- Cobalt II [air, urban air close to ground]: 1e-7 kg; lognormal variance with pedigree 0.7806, pedigree (2,5,5,5,4)
  (same comment as for Acetaldehyde)
- Copper ion [air, urban air close to ground]: 3.91e-7 kg; lognormal variance with pedigree 0.7806, pedigree (2,5,5,5,4)
  (same comment as for Acetaldehyde)
- Dinitrogen monoxide [air, urban air close to ground]: 3.57e-5 kg; lognormal variance with pedigree 0.1806, pedigree (2,5,5,5,4)
  (same comment as for Acetaldehyde)
- Dioxins, measured as 2,3,7,8-tetrachlorodibenzo-p-dioxin [air, urban air close to ground]: 5.61e-12 kg; lognormal variance with pedigree 0.1806, pedigree (2,5,5,5,4)
  (same comment as for Acetaldehyde)
- Ethane [air, urban air close to ground]: 2.48e-5 kg; lognormal variance with pedigree 0.1806, pedigree (2,5,5,5,4)
  (same comment as for Acetaldehyde)
- Ethanol [air, urban air close to ground]: 3.45e-7 kg; lognormal variance with pedigree 0.1806, pedigree (2,5,5,5,4)
  (same comment as for Acetaldehyde)
- Ethyl benzene [air, urban air close to ground]: 3.92e-7 kg; lognormal variance with pedigree 0.1806, pedigree (2,5,5,5,4)
  (same comment as for Acetaldehyde)
- Ethylene [air, urban air close to ground]: 4.96e-5 kg; lognormal variance with pedigree 0.7806, pedigree (2,5,5,5,4)
  (same comment as for Acetaldehyde)
- Fluorine [air, urban air close to ground]: 6.53e-7 kg; lognormal variance with pedigree 0.1806, pedigree (2,5,5,5,4)
  (same comment as for Acetaldehyde)
- Formaldehyde [air, urban air close to ground]: 2.58e-6 kg; lognormal variance with pedigree 0.1806, pedigree (2,5,5,5,4)
  (same comment as for Acetaldehyde)
- Hexachlorobenzene [air, urban air close to ground]: 9.4e-14 kg; lognormal variance with pedigree 0.1806, pedigree (2,5,5,5,4)
  (same comment as for Acetaldehyde)
- Hydrocarbons, aliphatic, alkanes, unspecified [air, urban air close to ground]: 2.08e-5 kg; lognormal variance with pedigree 0.1806, pedigree (2,5,5,5,4)
  (same comment as for Acetaldehyde)
- Hydrocarbons, aliphatic, unsaturated [air, urban air close to ground]: 4.88e-5 kg; lognormal variance with pedigree 0.1806, pedigree (2,5,5,5,4)
  (same comment as for Acetaldehyde)
- Hydrocarbons, aromatic [air, urban air close to ground]: 1.72e-7 kg; lognormal variance with pedigree 0.1806, pedigree (2,5,5,5,4)
  (same comment as for Acetaldehyde)
- Hydrochloric acid [air, urban air close to ground]: 1.69e-5 kg; lognormal variance with pedigree 0.1806, pedigree (2,5,5,5,4)
  (same comment as for Acetaldehyde)
- Hydrogen fluoride [air, urban air close to ground]: 6.75e-7 kg; lognormal variance with pedigree 0.1806, pedigree (2,5,5,5,4)
  (same comment as for Acetaldehyde)
- Hydrogen sulfide [air, urban air close to ground]: 1.63e-7 kg; lognormal variance with pedigree 0.1806, pedigree (2,5,5,5,4)
  (same comment as for Acetaldehyde)
- Iodine [air, urban air close to ground]: 7.69e-8 kg; lognormal variance with pedigree 0.1806, pedigree (2,5,5,5,4)
  (same comment as for Acetaldehyde)
- Iron ion [air, urban air close to ground]: 2.35e-5 kg; lognormal variance with pedigree 0.7806, pedigree (2,5,5,5,4)
  (same comment as for Acetaldehyde)
- Lead II [air, urban air close to ground]: 4.72e-7 kg; lognormal variance with pedigree 0.7806, pedigree (2,5,5,5,4)
  (same comment as for Acetaldehyde)
- Lead-210 [air, urban air close to ground]: 0.000112 kBq; lognormal variance with pedigree 0.4406, pedigree (2,5,5,5,4)
  (same comment as for Acetaldehyde)
- Magnesium [air, urban air close to ground]: 1.8e-5 kg; lognormal variance with pedigree 0.7806, pedigree (2,5,5,5,4)
  (same comment as for Acetaldehyde)
- Manganese II [air, urban air close to ground]: 2.27e-6 kg; lognormal variance with pedigree 0.7806, pedigree (2,5,5,5,4)
  (same comment as for Acetaldehyde)
- Mercury II [air, urban air close to ground]: 2.34e-8 kg; lognormal variance with pedigree 0.7806, pedigree (2,5,5,5,4)
  (same comment as for Acetaldehyde)
- Methane, fossil [air, urban air close to ground]: 0.000499 kg; lognormal variance with pedigree 0.1806, pedigree (2,5,5,5,4)
  (same comment as for Acetaldehyde)
- Methane, non-fossil [air, urban air close to ground]: 5.22e-6 kg; lognormal variance with pedigree 0.1806, pedigree (2,5,5,5,4)
  (same comment as for Acetaldehyde)
- Methanol [air, urban air close to ground]: 5.86e-7 kg; lognormal variance with pedigree 0.1806, pedigree (2,5,5,5,4)
  (same comment as for Acetaldehyde)
- Molybdenum VI [air, urban air close to ground]: 9.16e-8 kg; lognormal variance with pedigree 0.7806, pedigree (2,5,5,5,4)
  (same comment as for Acetaldehyde)
- NMVOC, non-methane volatile organic compounds [air, urban air close to ground]: 3.66e-5 kg; lognormal variance with pedigree 0.1806, pedigree (2,5,5,5,4)
  (same comment as for Acetaldehyde)
- Nickel II [air, urban air close to ground]: 9.23e-7 kg; lognormal variance with pedigree 0.7806, pedigree (2,5,5,5,4)
  (same comment as for Acetaldehyde)
- Nitrogen oxides [air, urban air close to ground]: 0.00168 kg; lognormal variance with pedigree 0.0826, pedigree (1,3,5,5,1)
  (same comment as for Water, unspecified natural origin)
- PAH, polycyclic aromatic hydrocarbons [air, urban air close to ground]: 1.64e-7 kg; lognormal variance with pedigree 0.1806, pedigree (2,5,5,5,4)
  (same comment as for Acetaldehyde)
- Particulate Matter, < 2.5 um [air, urban air close to ground]: 0.000679 kg; lognormal variance with pedigree 0.4406, pedigree (2,5,5,5,4)
  (same comment as for Acetaldehyde)
- Particulate Matter, > 10 um [air, urban air close to ground]: 0.000242 kg; lognormal variance with pedigree 0.1806, pedigree (2,5,5,5,4)
  (same comment as for Acetaldehyde)
- Particulate Matter, > 2.5 um and < 10um [air, urban air close to ground]: 7.58e-5 kg; lognormal variance with pedigree 0.2606, pedigree (2,5,5,5,4)
  (same comment as for Acetaldehyde)
- Pentachlorophenol [air, urban air close to ground]: 1.06e-10 kg; lognormal variance with pedigree 0.1806, pedigree (2,5,5,5,4)
  (same comment as for Acetaldehyde)
- Pentane [air, urban air close to ground]: 2.21e-6 kg; lognormal variance with pedigree 0.1806, pedigree (2,5,5,5,4)
  (same comment as for Acetaldehyde)
- Phenol [air, urban air close to ground]: 8.15e-7 kg; lognormal variance with pedigree 0.1806, pedigree (2,5,5,5,4)
  (same comment as for Acetaldehyde)
- Phosphorus [air, urban air close to ground]: 4.1e-6 kg; lognormal variance with pedigree 0.1806, pedigree (2,5,5,5,4)
  (same comment as for Acetaldehyde)
- Polonium-210 [air, urban air close to ground]: 0.000207 kBq; lognormal variance with pedigree 0.4406, pedigree (2,5,5,5,4)
  (same comment as for Acetaldehyde)
- Potassium I [air, urban air close to ground]: 0.000308 kg; lognormal variance with pedigree 0.7806, pedigree (2,5,5,5,4)
  (same comment as for Acetaldehyde)
- Potassium-40 [air, urban air close to ground]: 3.05e-5 kBq; lognormal variance with pedigree 0.4406, pedigree (2,5,5,5,4)
  (same comment as for Acetaldehyde)
- Propane [air, urban air close to ground]: 1.69e-5 kg; lognormal variance with pedigree 0.1806, pedigree (2,5,5,5,4)
  (same comment as for Acetaldehyde)
- Propionic acid [air, urban air close to ground]: 3.69e-8 kg; lognormal variance with pedigree 0.1806, pedigree (2,5,5,5,4)
  (same comment as for Acetaldehyde)
- Propylene [air, urban air close to ground]: 8.27e-6 kg; lognormal variance with pedigree 0.1806, pedigree (2,5,5,5,4)
  (same comment as for Acetaldehyde)
- Radium-226 [air, urban air close to ground]: 2.9e-5 kBq; lognormal variance with pedigree 0.4406, pedigree (2,5,5,5,4)
  (same comment as for Acetaldehyde)
- Radium-228 [air, urban air close to ground]: 2.99e-5 kBq; lognormal variance with pedigree 0.4406, pedigree (2,5,5,5,4)
  (same comment as for Acetaldehyde)
- Radon-220 [air, urban air close to ground]: 6.76e-6 kBq; lognormal variance with pedigree 0.4406, pedigree (2,5,5,5,4)
  (same comment as for Acetaldehyde)
- Radon-222 [air, urban air close to ground]: 6.76e-6 kBq; lognormal variance with pedigree 0.4406, pedigree (2,5,5,5,4)
  (same comment as for Acetaldehyde)
- Scandium [air, urban air close to ground]: 1.34e-9 kg; lognormal variance with pedigree 0.7806, pedigree (2,5,5,5,4)
  (same comment as for Acetaldehyde)
- Selenium IV [air, urban air close to ground]: 1.4e-7 kg; lognormal variance with pedigree 0.7806, pedigree (2,5,5,5,4)
  (same comment as for Acetaldehyde)
- Silicon [air, urban air close to ground]: 0.000201 kg; lognormal variance with pedigree 0.7806, pedigree (2,5,5,5,4)
  (same comment as for Acetaldehyde)
- Sodium I [air, urban air close to ground]: 2.17e-5 kg; lognormal variance with pedigree 0.7806, pedigree (2,5,5,5,4)
  (same comment as for Acetaldehyde)
- Strontium II [air, urban air close to ground]: 4.78e-7 kg; lognormal variance with pedigree 0.7806, pedigree (2,5,5,5,4)
  (same comment as for Acetaldehyde)
- Sulfur dioxide [air, urban air close to ground]: 0.00049 kg; lognormal variance with pedigree 0.0426, pedigree (1,3,5,5,1)
  (same comment as for Water, unspecified natural origin)
- Thallium I [air, urban air close to ground]: 5.91e-10 kg; lognormal variance with pedigree 0.7806, pedigree (2,5,5,5,4)
  (same comment as for Acetaldehyde)
- Thorium [air, urban air close to ground]: 5.4e-9 kg; lognormal variance with pedigree 0.7806, pedigree (2,5,5,5,4)
  (same comment as for Acetaldehyde)
- Thorium-228 [air, urban air close to ground]: 1.34e-5 kBq; lognormal variance with pedigree 0.4406, pedigree (2,5,5,5,4)
  (same comment as for Acetaldehyde)
- Thorium-232 [air, urban air close to ground]: 8.35e-6 kBq; lognormal variance with pedigree 0.4406, pedigree (2,5,5,5,4)
  (same comment as for Acetaldehyde)
- Tin ion [air, urban air close to ground]: 3.45e-9 kg; lognormal variance with pedigree 0.7806, pedigree (2,5,5,5,4)
  (same comment as for Acetaldehyde)
- Titanium ion [air, urban air close to ground]: 5.05e-7 kg; lognormal variance with pedigree 0.7806, pedigree (2,5,5,5,4)
  (same comment as for Acetaldehyde)
- Toluene [air, urban air close to ground]: 5.98e-6 kg; lognormal variance with pedigree 0.1806, pedigree (2,5,5,5,4)
  (same comment as for Acetaldehyde)
- Uranium [air, urban air close to ground]: 8.85e-9 kg; lognormal variance with pedigree 0.7806, pedigree (2,5,5,5,4)
  (same comment as for Acetaldehyde)
- Uranium-238 [air, urban air close to ground]: 2.43e-5 kBq; lognormal variance with pedigree 0.4406, pedigree (2,5,5,5,4)
  (same comment as for Acetaldehyde)
- Vanadium V [air, urban air close to ground]: 3.21e-6 kg; lognormal variance with pedigree 0.7806, pedigree (2,5,5,5,4)
  (same comment as for Acetaldehyde)
- Water [air, unspecified]: 0.0296763 m3; name water_to_air_unspecified; lognormal variance with pedigree 0.0827, pedigree (2,2,5,5,1)
  Calculated value based on literature values and expert opinion. See comments in the parametres' comment field.
  property fraction, origin: fresh water 0; name fraction_origin_fresh_water
  property fraction, origin: salt water 0; name fraction_origin_salt_water
  property fraction, origin: unspecified 1; name fraction_origin_unspecified
- Xylenes, unspecified [air, urban air close to ground]: 5.4e-6 kg; lognormal variance with pedigree 0.1806, pedigree (2,5,5,5,4)
  (same comment as for Acetaldehyde)
- Zinc II [air, urban air close to ground]: 3.98e-6 kg; lognormal variance with pedigree 0.7806, pedigree (2,5,5,5,4)
  (same comment as for Acetaldehyde)
- m-Xylene [air, urban air close to ground]: 1.57e-6 kg; lognormal variance with pedigree 0.1806, pedigree (2,5,5,5,4)
  (same comment as for Acetaldehyde)
- AOX, Adsorbable Organic Halides [water, surface water]: 0.00011 kg; lognormal variance with pedigree 0.0826, pedigree (1,3,5,5,1)
  (same comment as for Water, unspecified natural origin)
- BOD5, Biological Oxygen Demand [water, surface water]: 0.00121 kg; lognormal variance with pedigree 0.0826, pedigree (1,3,5,5,1)
  (same comment as for Water, unspecified natural origin)
- COD, Chemical Oxygen Demand [water, surface water]: 0.0133 kg; lognormal variance with pedigree 0.0826, pedigree (1,3,5,5,1)
  (same comment as for Water, unspecified natural origin)
- DOC, Dissolved Organic Carbon [water, surface water]: 0.00492593 kg; lognormal variance with pedigree 0.0826, pedigree (1,3,5,5,1)
  Calculated as equal to TOC.
  Uncertainty: average from finnish database and several companies
- Nitrogen [water, surface water]: 0.00013 kg; lognormal variance with pedigree 0.0826, pedigree (1,3,5,5,1)
  (same comment as for Water, unspecified natural origin)
- Phosphorus [water, surface water]: 1.3e-5 kg; lognormal variance with pedigree 0.0826, pedigree (1,3,5,5,1)
  (same comment as for Water, unspecified natural origin)
- Suspended solids, unspecified [water, surface water]: 0.00119 kg; lognormal variance with pedigree 0.0826, pedigree (1,3,5,5,1)
  (same comment as for Water, unspecified natural origin)
- TOC, Total Organic Carbon [water, surface water]: 0.00492593 kg; lognormal variance with pedigree 0.0826, pedigree (1,3,5,5,1)
  Calculated by default as TOC (gC) = COD/2.7 (COD measured in g O2). Should more correctly be calculated from the carbon content of the specified emissions to water.
  Uncertainty: average from finnish database and several companies
- Water [water, unspecified]: 0.0790238 m3; name water_to_water_unspecified; lognormal variance with pedigree 0.0827, pedigree (2,2,5,5,1)
  (same comment as for Water)
  property carbon content, fossil 0; name C_content_fossil
  property carbon content, non-fossil 0; name C_content_non_fossil
  property dry mass 0 kg; name DM
  property fraction, origin: fresh water 0; name fraction_origin_fresh_water_Ww
  property fraction, origin: salt water 0; name fraction_origin_salt_water_Ww
  property fraction, origin: unspecified 1; name fraction_origin_unspecified_Ww
  property water in wet mass 1000 kg; name WWM
  property wet mass 1000 kg; name WM

## Sampling procedure
Based on literature and statistics (see dataset field “Published Source”)

## Extrapolations
This dataset has been copied from an original dataset covering the geography RER. The uncertainty has been adjusted accordingly.

## Review by Hans-Jörg Althaus 2003-08-26
passed
