# sugar beet production

Dataset: EcoSpold 2, unit process
Geography: CH
Time period: 1996-01-01 to 2023-12-31
Technology level: current
Classification: ISIC rev.4 ecoinvent: 0113:Growing of vegetables and melons, roots and tubers
Synonyms: Beta vulgaris
Scenario: Business-as-Usual
System model: Allocation, cut-off by classification
Share of production covered: 98 %
Generated by: Thomas Nemecek
Published in: Nemecek, T. 2007
Database: ecoinvent
isCopyrightProtected: true
accessRestrictedTo: 1

## General comment
This dataset represents the production of 1 kg of sugar beet root and 0.67 kg of sugar beet crown and leaf (both fresh matter; sugar beet crown and leaf is labelled 'biowaste'). The yield of sugar beet root is 77640 kg/ha at a moisture content at storage of 77%, the yield of sugar beet crown and leaf is 51760 kg/ha at a moisture content of 86%.
Sugar beet crown and leaf are only harvested in 0.5% of the cases. This dataset is parameterized with respect to the fraction of crown and leaf harvested. The default fraction of harvested crown and leaf is 0.5%, exchanges in the dataset represent weighted averages of 99.5% of crown and leaf non-harvested and 0.5% harvested. Changes in this fraction will affect corresponing machine processes and direct field emissions, amount of the by product and CO2 bound from atmosphere in exported products.

## Included activities start
This activity starts after the harvest of the previous crop. The inputs of seeds, mineral fertilisers and pesticides are considered. Farm manure as an organic fertiliser is only accounted for in terms of direct field emissions; all pre-processes are included in the animal production systems.

## Included activities end
The dataset includes all machine operations and corresponding machine infrastructure and sheds. Machine operations are: soil cultivation, sowing, fertilisation, weed control, pest management, harvest and transport from field to farm (1 km). Further, direct field emissions are included. The cultivation of green manure during winter before sowing beets is also included. This activity ends after harvest at the farm gate.

## Geography
Refers to an average production in the Swiss lowlands.

## Technology
Integrated production

## Time period
The yield data have been updated to an average of the years 2000, 2005 & 2008. (Schweizerischer Bauernverband: Statistische Erhebungen und Schätzungen über Landwirtschaft und Ernährung 2009)

## Parameters
- CO2/C molecular weight ratio: 3.66667 dimensionless; name CO2_C; = 44/12
  factor for conversion of C to CO2
- LUC_crop_specific: 1 dimensionless
  This parameter allows to switch between a "crop specific" and a "country specific" approach when calculating the LUC of a crop. By default, the chosen approach is "crop specific", so the value of the parameter is 1. If you want to apply a "country specific" approach, turn the parameter to 0.
- fraction of sugar beet crown and leaf harvested: 0.005 dimensionless; name crown_leaf_harvest
  sugar beet crown and leaf harvested. Has to add up to 1 with fraction NOT harvested.
- fraction of sugar beet crown and leaf not harvested: 0.995 dimensionless; name crown_leaf_residue; = 1- crown_leaf_harvest
  sugar beet crown and leaf left in the field as crop residues. Has to add up to 1 with fraction harvested
- fraction, irrigation water to surface water: 0.2 dimensionless; name fraction_IW_to_surface_water; lognormal variance with pedigree 0.0886, pedigree (4,3,1,1,4)
  Literature value (Döll, 2011) cross referenced with expert opinion.
- fraction, irrigation water, to air: 0.3353 dimensionless; name fraction_IW_to_air; lognormal variance with pedigree 0.0409, pedigree (2,2,2,1,1)
  Literature value (Siebert, 2010) (Vionnet, S., Quantis Water Database - Technical Report, 2012).
- fraction, irrigation water, to ground water: 0.8 dimensionless; name fraction_IW_to_ground_water; lognormal variance with pedigree 0.0886, pedigree (4,3,1,1,4)
  Literature value (Döll, 2011) cross referenced with expert opinion.

## Reference product
- sugar beet: 1 kg; name REF_PRODUCT; By-product classification allocatable product; CPC 01801: Sugar beet; HS2017 121291: Sugar beet; fit for human consumption, fresh, chilled, frozen or dried, whether or not ground
  production volume 1.4558e9 kg; name ref_prod_PV
    CH prod of sugar beets: 1455800t in 2004.
    Source: ecoinvent 2; 77% water content
  property carbon content, fossil 0; name REF_PRODUCT_C_content_fossil
    fossil carbon content on a dry matter basis
  property carbon content, non-fossil 0.417649; name REF_PRODUCT_C_content_non_fossil
    biogene carbon content on a dry matter basis
  property dry mass 0.23 kg; name REF_PRODUCT_DM
  property energy content 3.7789 MJ
    See chapter 'Product Properties' in '01_crop production - yields & inputs CH & Europe_v1.0.pdf', section 'AGRICULTURAL PRODUCTION IN SWITZERLAND' - pdf-document on the dedicated talk page of ecoinvent (www.ecoinvent.org/documentation)
  property price 0.0444 EUR2005
    Calculated based on literature data. The import quantity of sugar beet in 2005 is 803011 ton. The import value is 43094000 USD. The resulting price is (import value/import quantity*0.827=) 0.044 EUR/kg.
  property water content 3.34783; name REF_PRODUCT_water_content; = (1-REF_PRODUCT_DM)/REF_PRODUCT_DM
  property water in wet mass 0.77 kg; name REF_PRODUCT_WWM; = 1-REF_PRODUCT_DM
  property wet mass 1 kg; name REF_PRODUCT_WM
  properties: carbon allocation 0.0960593 kg, carbon content 0.417649

## Inputs from technosphere
- [thio]carbamate-compound: 4.76558e-6 kg; lognormal variance with pedigree 0.0407, pedigree (2,2,5,1,1)
  See chapter 'Yields and Inputs of Arable Crop Production' in '01_crop production - yields & inputs CH & Europe_v1.0.pdf', section 'AGRICULTURAL PRODUCTION IN SWITZERLAND' - pdf-document on the dedicated talk page of ecoinvent (www.ecoinvent.org/documentation)
  See chapter 'Yields and Inputs of Arable Crop Production' in '01_crop production - yields & inputs CH & Europe_v1.0.pdf', section 'AGRICULTURAL PRODUCTION IN SWITZERLAND' - pdf-document on the dedicated talk page of ecoinvent (www.ecoinvent.org/documentation)
  properties: carbon content, fossil 0.626349, dry mass 1 kg, wet mass 1 kg
  note on carbon content, fossil: Approximated as an unweighted average of the C-content of the [thio]carbamate-compounds (Tab 2.25 Sutter, 2010) carbofuran,orbencarb, prosulfocarb
- ammonium nitrate: 0.000795306 kg; lognormal variance with pedigree 0.0406, pedigree (2,1,5,1,1)
  The exchange has been updated from 'ammonium nitrate, as N' into 'ammonium nitrate' and therefore its amount has been scaled (multiplied) from 0.0003 kg by 2.8573 kg of 'ammonium nitrate' per kg of 'ammonium nitrate, as N'. Original comment of the exchange is: See chapter 'Yields and Inputs of Arable Crop Production' in '01_crop production - yields & inputs CH & Europe_v1.0.pdf', section 'AGRICULTURAL PRODUCTION IN SWITZERLAND' - pdf-document on the dedicated talk page of ecoinvent (www.ecoinvent.org/documentation)
  See chapter 'Yields and Inputs of Arable Crop Production' in '01_crop production - yields & inputs CH & Europe_v1.0.pdf', section 'AGRICULTURAL PRODUCTION IN SWITZERLAND' - pdf-document on the dedicated talk page of ecoinvent (www.ecoinvent.org/documentation)
  properties: dry mass 1 kg, wet mass 1 kg
- ammonium sulfate: 2.10624e-5 kg; lognormal variance with pedigree 0.0406, pedigree (2,1,5,1,1)
  (same comment as for [thio]carbamate-compound)
  properties: dry mass 1 kg, wet mass 1 kg
- application of plant protection product, by field sprayer: 5.66718e-5 ha; lognormal variance with pedigree 0.0406, pedigree (2,1,5,1,1)
  See chapter 'Yields and Inputs of Arable Crop Production' in '01_crop production - yields & inputs CH & Europe_v1.0.pdf', section 'AGRICULTURAL PRODUCTION IN SWITZERLAND' - pdf-document on the dedicated talk page of ecoinvent (www.ecoinvent.org/documentation)
  This exchange has an activity link directly to the producing activity because the product is primarily consumed in the same geographical area where it is produced.
- benzimidazole-compound: 7.72798e-6 kg; lognormal variance with pedigree 0.0407, pedigree (2,2,5,1,1)
  (same comment as for [thio]carbamate-compound)
  properties: carbon content, fossil 0.529668, dry mass 1 kg, wet mass 1 kg
  note on carbon content, fossil: C content estimated as an average of that of the pesticides Carbendazim, prochloraz and ethofumesate (Sutter 2010)
- biowaste: -0.00333333 kg; name BY_PRODUCT; = 0 * crown_leaf_residue + 0.666666667 * crown_leaf_harvest
  ['Biowaste' represents the harvested crown and leaf of sugar beets.] Crown with leaves that is chopped of the sugar beet at harvest is considered a by-product if harvested. Current practice in Switzerland is to crown and leaf in the field as crop residues in which case it is not considered as a by-product.
  production volume; = ref_prod_PV * ( BY_PRODUCT / REF_PRODUCT)
    Calculated from production volume of reference product using the relative outputs.
  property carbon content, fossil 0; name BY_PRODUCT_C_content_fossil
  property carbon content, non-fossil 0.37805; name BY_PRODUCT_C_content_non_fossil
  property dry mass 0.14 kg; name BY_PRODUCT_DM
  property energy content 2.3254 MJ; name BY_PRODUCT_energy_content
  property water content 6.14286; name BY_PRODUCT_water_content
  property water in wet mass 0.86 kg; name BY_PRODUCT_WWM
  property wet mass 1 kg; name BY_PRODUCT_WM
  properties: heating value, net 4.29 MJ
  note on carbon content, non-fossil: biogene carbon content on a dry matter basis. Composition data obtained for 'Zuckerrübenblätter, mit Köpfen, grün' (in Swiss feedstuff database: http://www.feed-alp.admin.ch/start.php?action=adv_search&cmd=list_feed&lang=D). First, composition data were refered to 1 kg dry mass. Then, C-contents were calculated considering a C-content/dry mass of 44% in carbohydrates (including fibres), 53% in proteins and 75% in fats. All data from ecoinvent report, n 15a, pg 40, except C-content in protein, that comes from Determination of protein concentration by total organic carbon analysis, Rouwenhorst et al., 1991, J Biochem and Biophys Methods, 22:119-128.
  note on energy content: See chapter 'Product Properties' in '01_crop production - yields & inputs CH & Europe_v1.0.pdf', section 'AGRICULTURAL PRODUCTION IN SWITZERLAND' - pdf-document on the dedicated talk page of ecoinvent (www.ecoinvent.org/documentation)
  note on heating value, net: Value taken from the general comment of the treatment dataset.
- cyclic N-compound: 1.93199e-6 kg; lognormal variance with pedigree 0.0407, pedigree (2,2,5,1,1)
  (same comment as for [thio]carbamate-compound)
  properties: carbon content, fossil 0.641962, dry mass 1 kg, wet mass 1 kg
  note on carbon content, fossil: Calculated as an unweigthed average of the C content of the cyclic N-compounds where information was avaliable in Sutter, 2010, following the classification in Tab 2.25 in Sutter 2010: Difenoconazole (C19H17Cl2N3O3), Fenpropidin (C19H31N), Fenpropimorph (C20H33NO), Flusilazole (C16H15F2N3Si), Metconazole (C17H22ClN3O), Penconazole (C13H15Cl2N3), Propiconazole (C15H17Cl2N3O2), Tebuconazole (C16H22ClN3O)
- fertilising, by broadcaster: 5.15198e-5 ha; lognormal variance with pedigree 0.0406, pedigree (2,1,5,1,1)
  (same comment as for application of plant protection product, by field sprayer)
- fodder loading, by self-loading trailer: 2.61333e-5 m3; = 0 * crown_leaf_residue + 0.005226667 * crown_leaf_harvest; lognormal variance with pedigree 0.0806, pedigree (2,1,5,1,4)
  (same comment as for application of plant protection product, by field sprayer)
- green manure, Swiss integrated production, until February: 1.288e-5 ha; lognormal variance with pedigree 0.0406, pedigree (2,1,5,1,1)
  (same comment as for [thio]carbamate-compound)
- harvesting, by complete harvester, beets: 1.288e-5 ha; lognormal variance with pedigree 0.0406, pedigree (2,1,5,1,1)
  (same comment as for application of plant protection product, by field sprayer)
- hoeing: 2.57599e-5 ha; lognormal variance with pedigree 0.0406, pedigree (2,1,5,1,1)
  (same comment as for application of plant protection product, by field sprayer)
- inorganic nitrogen fertiliser, as N: 0.000151277 kg; lognormal variance with pedigree 0.0406, pedigree (2,1,5,1,1)
  (same comment as for [thio]carbamate-compound)
  properties: dry mass 1 kg, wet mass 1 kg
- inorganic phosphorus fertiliser, as P2O5: 8.09641e-5 kg; lognormal variance with pedigree 0.0406, pedigree (2,1,5,1,1)
  (same comment as for [thio]carbamate-compound)
  properties: dry mass 1 kg, wet mass 1 kg
- irrigation: 0.00577147 m3; name water_irrigation_input; source Siebert, S. 2010; lognormal variance with pedigree 0.0427, pedigree (2,2,5,1,1)
  Calculated based on literature values (Döll, 2010) and partially modelled at ETH (Pfister, S.).
  property carbon content, fossil 0; name C_content_fossil
  property carbon content, non-fossil 0; name C_content_non_fossil
  property dry mass 0.11 kg; name DM
  property water content 9089.91; name water_content
  property water in wet mass 999.89 kg; name WWM
  property wet mass 1000 kg; name WM
- liquid manure spreading, by vacuum tanker: 0.000169191 m3; lognormal variance with pedigree 0.0406, pedigree (2,1,5,1,1)
  (same comment as for application of plant protection product, by field sprayer)
- packaging, for fertilisers: 0.00268069 kg; lognormal variance with pedigree 0.0912, pedigree (4,3,5,5,4)
  Total amount of active substance/s of fertilisers needed for the production of 'sugar beet' is calculated to be circa 1.34E-03 kg. Fertiliser/s used in this dataset is/are: 'ammonium nitrate, as N', 'ammonium sulfate, as N', 'nitrogen fertiliser, as N', 'phosphate fertiliser, as P2O5', 'phosphate rock, as P2O5, beneficiated, dry', 'potassium chloride, as K2O', 'potassium sulfate, as K2O', 'urea, as N'. The total amount of active substance/s is doubled in order to account for the packaging of the dilluted product of fertiliser/s that is/are applied. Therefore, 2.68E-03 kg of packaging for fertilisers is justified with this exchange.
  properties: carbon content, fossil 0.825301, dry mass 1 kg, heating value, net 25.01 MJ, price 0.0642 EUR2005, wet mass 1 kg
  note on carbon content, fossil: Considering a chemical formula (C2H4)n for polyethylene, carbon content-fossil is calculated to be 0.856286 kg of Carbon per kg of dry mass.
- packaging, for pesticides: 8.86991e-5 kg; lognormal variance with pedigree 0.0912, pedigree (4,3,5,5,4)
  Total amount of active substance/s of pesticides needed for the production of sugar beet is calculated to be circa 4.43E-05 kg. Pesticide/s used in this dataset is/are: '[thio]carbamate-compound', 'benzimidazole-compound', 'cyclic N-compound', 'pesticide, unspecified', 'triazine-compound, unspecified'. The total amount of active substance/s is doubled in order to account for the packaging of the dilluted product of pesticide/s that is/are applied. Therefore, 8.87E-05 kg of packaging for pesticides is justified with this exchange.
  properties: carbon content, fossil 0.85714, dry mass 1 kg, heating value, net 25.97 MJ, price 0.0642 EUR2005, wet mass 1 kg
- pesticide, unspecified: 3.9065e-6 kg; lognormal variance with pedigree 0.0407, pedigree (2,2,5,1,1)
  (same comment as for [thio]carbamate-compound)
  properties: carbon content, fossil 0.486978, dry mass 1 kg, wet mass 1 kg
  note on carbon content, fossil: Mean of C content in all pesticides whose formula has been documented in Sutter 2010
- phosphate rock, beneficiated: 8.01362e-5 kg; lognormal variance with pedigree 0.0406, pedigree (2,1,5,1,1)
  The exchange has been updated from 'phosphate rock, as P2O5, beneficiated, dry' into 'phosphate rock, beneficiated' and therefore its amount has been scaled (multiplied) from 0 kg by 3.125 kg of 'phosphate rock, beneficiated' per kg of 'phosphate rock, as P2O5, beneficiated, dry'. Original comment of the exchange is: See chapter 'Yields and Inputs of Arable Crop Production' in '01_crop production - yields & inputs CH & Europe_v1.0.pdf', section 'AGRICULTURAL PRODUCTION IN SWITZERLAND' - pdf-document on the dedicated talk page of ecoinvent (www.ecoinvent.org/documentation)
  See chapter 'Yields and Inputs of Arable Crop Production' in '01_crop production - yields & inputs CH & Europe_v1.0.pdf', section 'AGRICULTURAL PRODUCTION IN SWITZERLAND' - pdf-document on the dedicated talk page of ecoinvent (www.ecoinvent.org/documentation)
  properties: dry mass 1 kg, wet mass 1 kg
- potassium chloride: 0.001018 kg; lognormal variance with pedigree 0.0406, pedigree (2,1,5,1,1)
  The exchange has been updated from 'potassium chloride, as K2O' into 'potassium chloride' and therefore its amount has been scaled (multiplied) from 0.0006 kg by 1.5829 kg of 'potassium chloride' per kg of 'potassium chloride, as K2O'. Original comment of the exchange is: See chapter 'Yields and Inputs of Arable Crop Production' in '01_crop production - yields & inputs CH & Europe_v1.0.pdf', section 'AGRICULTURAL PRODUCTION IN SWITZERLAND' - pdf-document on the dedicated talk page of ecoinvent (www.ecoinvent.org/documentation)
  See chapter 'Yields and Inputs of Arable Crop Production' in '01_crop production - yields & inputs CH & Europe_v1.0.pdf', section 'AGRICULTURAL PRODUCTION IN SWITZERLAND' - pdf-document on the dedicated talk page of ecoinvent (www.ecoinvent.org/documentation)
  properties: dry mass 1 kg, wet mass 1 kg
- potassium sulfate: 7.80398e-5 kg; lognormal variance with pedigree 0.0406, pedigree (2,1,5,1,1)
  The exchange has been updated from 'potassium sulfate, as K2O' into 'potassium sulfate' and therefore its amount has been scaled (multiplied) from 0 kg by 1.85 kg of 'potassium sulfate' per kg of 'potassium sulfate, as K2O'. Original comment of the exchange is: See chapter 'Yields and Inputs of Arable Crop Production' in '01_crop production - yields & inputs CH & Europe_v1.0.pdf', section 'AGRICULTURAL PRODUCTION IN SWITZERLAND' - pdf-document on the dedicated talk page of ecoinvent (www.ecoinvent.org/documentation)
  See chapter 'Yields and Inputs of Arable Crop Production' in '01_crop production - yields & inputs CH & Europe_v1.0.pdf', section 'AGRICULTURAL PRODUCTION IN SWITZERLAND' - pdf-document on the dedicated talk page of ecoinvent (www.ecoinvent.org/documentation)
  properties: dry mass 1 kg, wet mass 1 kg
- solid manure loading and spreading, by hydraulic loader and spreader: 0.115791 kg; lognormal variance with pedigree 0.0406, pedigree (2,1,5,1,1)
  (same comment as for application of plant protection product, by field sprayer)
- sowing: 1.288e-5 ha; lognormal variance with pedigree 0.0406, pedigree (2,1,5,1,1)
  (same comment as for application of plant protection product, by field sprayer)
- sugar beet seed, for sowing: 2.70479e-5 kg; name SEED; lognormal variance with pedigree 0.0406, pedigree (2,1,5,1,1)
  See chapter 'Yields and Inputs of Arable Crop Production' in '01_crop production - yields & inputs CH & Europe_v1.0.pdf', section 'AGRICULTURAL PRODUCTION IN SWITZERLAND' - pdf-document on the dedicated talk page of ecoinvent (www.ecoinvent.org/documentation)
  property carbon content, non-fossil 0.447696; name SEED_C_content_non_fossil
  property dry mass 0.85 kg; name SEED_DM
  property energy content 15.3935 MJ; name SEED_energy_content
  note on energy content: See '01_crop production - seed production & processing_v1.0.pdf' - pdf-document on the dedicated talk page of ecoinvent (www.ecoinvent.org/documentation)
- tillage, harrowing, by spring tine harrow: 2.57599e-5 ha; lognormal variance with pedigree 0.0406, pedigree (2,1,5,1,1)
  (same comment as for application of plant protection product, by field sprayer)
- tillage, ploughing: 1.288e-5 ha; lognormal variance with pedigree 0.0406, pedigree (2,1,5,1,1)
  (same comment as for application of plant protection product, by field sprayer)
- transport, tractor and trailer, agricultural: 0.001 metric ton*km; lognormal variance with pedigree 0.0406, pedigree (2,1,5,1,1)
  (same comment as for [thio]carbamate-compound)
- triazine-compound: 2.60175e-5 kg; lognormal variance with pedigree 0.0407, pedigree (2,2,5,1,1)
  (same comment as for [thio]carbamate-compound)
  properties: carbon content, fossil 0.475616, dry mass 1 kg, wet mass 1 kg
  note on carbon content, fossil: An unweighted average of the C content in Atrazine, Cyanazine, metamitron, simazine, and terbuthylazine. Those substances are classified as triazine-compounds in Tab 2.25, Sutter 2010
- urea: 0.000209555 kg; lognormal variance with pedigree 0.0406, pedigree (2,1,5,1,1)
  The exchange has been updated from 'urea, as N' into 'urea' and therefore its amount has been scaled (multiplied) from 0.0001 kg by 2.1438 kg of 'urea' per kg of 'urea, as N'. Original comment of the exchange is: See chapter 'Yields and Inputs of Arable Crop Production' in '01_crop production - yields & inputs CH & Europe_v1.0.pdf', section 'AGRICULTURAL PRODUCTION IN SWITZERLAND' - pdf-document on the dedicated talk page of ecoinvent (www.ecoinvent.org/documentation)
  See chapter 'Yields and Inputs of Arable Crop Production' in '01_crop production - yields & inputs CH & Europe_v1.0.pdf', section 'AGRICULTURAL PRODUCTION IN SWITZERLAND' - pdf-document on the dedicated talk page of ecoinvent (www.ecoinvent.org/documentation)
  properties: carbon content, fossil 0.2, dry mass 1 kg, wet mass 1 kg

## Inputs from nature
- Carbon dioxide, in air [natural resource, in air]: 0.352826 kg; = 44/12 * (REF_PRODUCT_C_content_non_fossil * REF_PRODUCT * REF_PRODUCT_DM + BY_PRODUCT_C_content_non_fossil * BY_PRODUCT * BY_PRODUCT_DM - SEED_C_content_non_fossil * SEED * SEED_DM); lognormal variance with pedigree 0.0406, pedigree (2,1,5,1,1)
  Modelled,see chapter 'CO2 binding' in '01_crop production_direct field emissions and natural resources_v1.0.pdf' - pdf-document on the dedicated talk page of ecoinvent (www.ecoinvent.org/documentation)
- Energy, gross calorific value, in biomass [natural resource, biotic]: 3.7785 MJ; lognormal variance with pedigree 0.0411891, pedigree (2,1,5,1,1)
- Occupation, annual crop, non-irrigated, intensive [natural resource, land]: 0.0758682 m2*year; lognormal variance with pedigree 0.0506, pedigree (2,1,5,1,1)
  Modelled, see chapter 'Land use' in '01_crop production_direct field emissions and natural resources_v1.0.pdf' - pdf-document on the dedicated talk page of ecoinvent (www.ecoinvent.org/documentation)
- Transformation, from annual crop, non-irrigated, intensive [natural resource, land]: 0.1288 m2; lognormal variance with pedigree 0.0506, pedigree (2,1,5,1,1)
  (same comment as for Occupation, annual crop, non-irrigated, intensive)
- Transformation, to annual crop, non-irrigated, intensive [natural resource, land]: 0.1288 m2; lognormal variance with pedigree 0.0506, pedigree (2,1,5,1,1)
  (same comment as for Occupation, annual crop, non-irrigated, intensive)

## Emissions to nature
- Ammonia [air, non-urban air or from high stacks]: 0.0002047 kg; lognormal variance with pedigree 0.0507, pedigree (2,2,5,1,1)
  Modelled with the 'AGRAMMON model' described in '01_crop production_direct field emissions and natural resources_v1.0.pdf' - pdf-document on the dedicated talk page of ecoinvent (www.ecoinvent.org/documentation)
- Carbon dioxide, fossil [air, non-urban air or from high stacks]: 0.000153466 kg; lognormal variance with pedigree 0.0407, pedigree (2,2,5,1,1)
  Modelled, see chapter 'Release of fossil CO2 after urea applications' in '01_crop production_assessment methods of direct field emissions_v1.0.pdf' - pdf-document on the dedicated talk page of ecoinvent (www.ecoinvent.org/documentation)
- Dinitrogen monoxide [air, non-urban air or from high stacks]: 6.67251e-5 kg; name N2O; = 6.6898*POWER(10;-05) * crown_leaf_residue + 3.2327*POWER(10;-05)* crown_leaf_harvest; lognormal variance with pedigree 0.0707, pedigree (2,2,5,1,1)
  Modelled, see chapter 'Emissions of N2O to the air' in '01_crop production_direct field emissions and natural resources_v1.0.pdf' - pdf-document on the dedicated talk page of ecoinvent (www.ecoinvent.org/documentation)
- Nitrogen oxides [air, non-urban air or from high stacks]: 1.40123e-5 kg; = N2O*0.21; lognormal variance with pedigree 0.0707, pedigree (2,2,5,1,1)
  Modelled, see chapter 'Emissions of NOx to the air' in '01_crop production_direct field emissions and natural resources_v1.0.pdf' - pdf-document on the dedicated talk page of ecoinvent (www.ecoinvent.org/documentation)
- Water [air, unspecified]: 0.00193518 m3; name water_to_air_unspecified; = (water_irrigation_input*fraction_IW_to_air); lognormal variance with pedigree 0.0807, pedigree (2,2,5,1,1)
  Calculated value based on literature values and expert opinion. See comments in the parametres' comment field.
  property fraction, origin: fresh water 1; name fraction_origin_fresh_water
  property fraction, origin: salt water 0; name fraction_origin_salt_water
  property fraction, origin: unspecified 0; name fraction_origin_unspecified
- Cadmium II [soil, agricultural]: -4.26791e-8 kg
  Modelled, see chapter 'Emissions of heavy metals to agricultural soil, surface water and ground water' in '01_crop production_direct field emissions and natural resources_v1.0.pdf' - pdf-document on the dedicated talk page of ecoinvent (www.ecoinvent.org/documentation)
- Chlorothalonil [soil, agricultural]: 9.01597e-7 kg; lognormal variance with pedigree 0.0507, pedigree (2,2,5,1,1)
  Modelled, see chapter 'Emissions of pesticides to agricultural soil' in '01_crop production_direct field emissions and natural resources_v1.0.pdf' - pdf-document on the dedicated talk page of ecoinvent (www.ecoinvent.org/documentation)
- Chromium III [soil, agricultural]: -3.43045e-7 kg
  (same comment as for Cadmium II)
- Copper ion [soil, agricultural]: -1.87159e-6 kg
  (same comment as for Cadmium II)
- Ethofumesate [soil, agricultural]: 6.82638e-6 kg; lognormal variance with pedigree 0.0507, pedigree (2,2,5,1,1)
  (same comment as for Chlorothalonil)
- Fenpropimorph [soil, agricultural]: 1.93199e-6 kg; lognormal variance with pedigree 0.0507, pedigree (2,2,5,1,1)
  (same comment as for Chlorothalonil)
- Fungicides, unspecified [soil, agricultural]: 3.25863e-7 kg; lognormal variance with pedigree 0.0507, pedigree (2,2,5,1,1)
  (same comment as for Chlorothalonil)
- Lead II [soil, agricultural]: 1.78139e-8 kg; lognormal variance with pedigree 0.0807, pedigree (2,2,5,1,1)
  (same comment as for Cadmium II)
- Mercury II [soil, agricultural]: -9.52458e-9 kg
  (same comment as for Cadmium II)
- Metaldehyde [soil, agricultural]: 1.0304e-6 kg; lognormal variance with pedigree 0.0507, pedigree (2,2,5,1,1)
  (same comment as for Chlorothalonil)
- Metamitron [soil, agricultural]: 2.60175e-5 kg; lognormal variance with pedigree 0.0507, pedigree (2,2,5,1,1)
  (same comment as for Chlorothalonil)
- Nickel II [soil, agricultural]: 1.45608e-8 kg; lognormal variance with pedigree 0.0807, pedigree (2,2,5,1,1)
  (same comment as for Cadmium II)
- Phenmedipham [soil, agricultural]: 4.76558e-6 kg; lognormal variance with pedigree 0.0507, pedigree (2,2,5,1,1)
  (same comment as for Chlorothalonil)
- Zinc II [soil, agricultural]: -2.53928e-6 kg
  (same comment as for Cadmium II)
- Cadmium II [water, ground-]: 3.92521e-10 kg; lognormal variance with pedigree 0.1307, pedigree (2,2,5,1,1)
  (same comment as for Cadmium II)
- Cadmium II [water, surface water]: 2.84751e-10 kg; lognormal variance with pedigree 0.1307, pedigree (2,2,5,1,1)
  (same comment as for Cadmium II)
- Chromium III [water, ground-]: 2.3386e-7 kg; lognormal variance with pedigree 0.1307, pedigree (2,2,5,1,1)
  (same comment as for Cadmium II)
- Chromium III [water, surface water]: 4.01933e-8 kg; lognormal variance with pedigree 0.1307, pedigree (2,2,5,1,1)
  (same comment as for Cadmium II)
- Copper ion [water, ground-]: 4.47875e-8 kg; lognormal variance with pedigree 0.1307, pedigree (2,2,5,1,1)
  (same comment as for Cadmium II)
- Copper ion [water, surface water]: 3.7782e-8 kg; lognormal variance with pedigree 0.1307, pedigree (2,2,5,1,1)
  (same comment as for Cadmium II)
- Lead II [water, ground-]: 2.62653e-9 kg; lognormal variance with pedigree 0.1307, pedigree (2,2,5,1,1)
  (same comment as for Cadmium II)
- Lead II [water, surface water]: 1.2896e-8 kg; lognormal variance with pedigree 0.1307, pedigree (2,2,5,1,1)
  (same comment as for Cadmium II)
- Mercury II [water, ground-]: 1.40986e-10 kg; lognormal variance with pedigree 0.1307, pedigree (2,2,5,1,1)
  (same comment as for Cadmium II)
- Mercury II [water, surface water]: 1.34449e-10 kg; lognormal variance with pedigree 0.1307, pedigree (2,2,5,1,1)
  (same comment as for Cadmium II)
- Nickel II [water, ground-]: 2.5122e-12 kg; lognormal variance with pedigree 0.1307, pedigree (2,2,5,1,1)
  (same comment as for Cadmium II)
- Nickel II [water, surface water]: 3.46358e-8 kg; lognormal variance with pedigree 0.1307, pedigree (2,2,5,1,1)
  (same comment as for Cadmium II)
- Nitrate [water, ground-]: 0.00222276 kg; lognormal variance with pedigree 0.0807, pedigree (2,2,5,1,1)
  Modelled with the 'SALCA-NO3 model' described in '01_crop production_direct field emissions and natural resources_v1.0.pdf' - pdf-document on the dedicated talk page of ecoinvent (www.ecoinvent.org/documentation)
- Phosphate [water, ground-]: 1.66598e-6 kg; lognormal variance with pedigree 0.0807, pedigree (2,2,5,1,1)
- Phosphate [water, surface water]: 5.16522e-6 kg; lognormal variance with pedigree 0.0807, pedigree (2,2,5,1,1)
- Phosphorus [water, surface water]: 1.08887e-6 kg; lognormal variance with pedigree 0.0807, pedigree (2,2,5,1,1)
- Water [water, ground-]: 0.00306904 m3; name water_to_water_ground; = water_irrigation_input*(1-fraction_IW_to_air)*fraction_IW_to_ground_water; lognormal variance with pedigree 0.1286, pedigree (4,3,5,1,4)
  Calculated value. See the parameters and their comments to understand the calculation.
  property fraction, origin: fresh water 1; name fraction_origin_fresh_water_Wgw
  property fraction, origin: salt water 0; name fraction_origin_salt_water_Wgw
  property fraction, origin: unspecified 0; name fraction_origin_unspecified_Wgw
- Water [water, surface water]: 0.00076726 m3; name water_to_water_surface; = water_irrigation_input*(1-fraction_IW_to_air)*fraction_IW_to_surface_water; lognormal variance with pedigree 0.1286, pedigree (4,3,5,1,4)
  Calculated value. See the parameters and their comments to understand the calculation.
  property fraction, origin: fresh water 1; name fraction_origin_fresh_water_Wsw
  property fraction, origin: salt water 0; name fraction_origin_salt_water_Wsw
- Zinc II [water, ground-]: 3.38223e-7 kg; lognormal variance with pedigree 0.1307, pedigree (2,2,5,1,1)
  (same comment as for Cadmium II)
- Zinc II [water, surface water]: 7.68539e-8 kg; lognormal variance with pedigree 0.1307, pedigree (2,2,5,1,1)
  (same comment as for Cadmium II)

## Sampling procedure
Data were compiled from statistics, pilot network, fertilising recommendations, documents from extension services, information provided by retailers and expert knowledge. The production data were verified and adjusted by a group of experts.

## Review by Hans-Jörg Althaus 2009-01-22
passed
none
