# powertrain production, for electric passenger car

Dataset: EcoSpold 2, unit process
Geography: GLO
Time period: 2005-01-01 to 2023-12-31
Technology level: modern
Classification: ISIC rev.4 ecoinvent: 2710:Manufacture of electric motors, generators, transformers and electricity di
Scenario: Business-as-Usual
System model: Allocation, cut-off by classification
Generated by: F. Habermacher
Published in: F. Habermacher 2011
Database: ecoinvent
isCopyrightProtected: true
accessRestrictedTo: 1

## General comment
This dataset describes the electric drivetrain for an electric passenger car. The drivetrain considered is suitable for a system of about 100kW maximal power. The optimal system comprises an electric motor (53kg), a converter (4.5kg), an inverter (9.5kg), a charger (6.2 kg), a power distribution unit (3.9kg) and cables (3m). The data describing all the modules in this dataset (except cables) is based on direct information from the Swiss manufacturer Brusa.

## Included activities start
This dataset takes as input the manufactured modules in the electric drivetrain (motor, converter, inverter, charger, power distribution unit and cables) and assembles them together. The production efforts and materialzation for each module is provided in the respective dataset.

## Included activities end
The dataset brings the various components modularly together. The production efforts are described in each module.

## Technology
This dataset is based on current, high-level standard.

## Reference product
- powertrain, for electric passenger car: 1 kg; name RP_amount_1; source F. Habermacher 2011; By-product classification allocatable product; CPC 46960: Parts for the goods of subclasses 46910, 46921 and 46929; electrical parts n.e.c. of machinery or apparatus; HS2017 854890: Electrical parts of machinery or apparatus; n.e.c. in chapter 85
  production volume 721980 kg; name RP_PV_1
    Based on a rough estimate of a total production of about 9000 electric passenger cars.
  property price 187 EUR2005
    Calculated based on assumptions and data from the producer. The producer states, that the price of a power train is around 21000 euro (Bursa, http://www.brusa.biz/fileadmin/Diverses/Download/Flyer/Flyer_Drivetrain_Sets_inkl_Preis.pdf, accessed 20130725). It is estimated, that the market price=basic price + basic price*0.4. The total value (basic price) of the powertrain (21000/(1+0.4)=) 16150 euro is divided between the separate parts of the power train by their weight. The resulting price per kilogram is thus assumed to be the same for all the different parts of the power train (inverter, charger, motor, converter, etc.).
  properties: carbon allocation 0 kg, carbon content 0

## Inputs from technosphere
- cable, three-conductor cable: 0.0373972 m; source F. Habermacher 2011; lognormal variance with pedigree 0.0444, pedigree (3,3,5,4,2)
  Based on literature and own experience.
  property carbon content, fossil 0.451335; name C_content_fossil
  property carbon content, non-fossil 0; name C_content_non_fossil
  property dry mass 1.04 kg; name DM
  property water content 0; name water_content
  property water in wet mass 0 kg; name WWM
  property wet mass 1.04 kg; name WM
- charger, electric passenger car: 0.0772875 kg; source F. Habermacher 2011; lognormal variance with pedigree 0.0438, pedigree (1,4,5,4,2)
  This electric drivetrain and the data describing each component is based on direct information from the Swiss manufacturer Brusa.
- converter, for electric passenger car: 0.0560957 kg; source F. Habermacher 2011; lognormal variance with pedigree 0.0438, pedigree (1,4,5,4,2)
  (same comment as for charger, electric passenger car)
- electric motor, electric passenger car: 0.660683 kg
- inverter, for electric passenger car: 0.118424 kg; source F. Habermacher 2011; lognormal variance with pedigree 0.0438, pedigree (1,4,5,4,2)
  (same comment as for charger, electric passenger car)
- power distribution unit, for electric passenger car: 0.0486163 kg; source F. Habermacher 2011; lognormal variance with pedigree 0.0438, pedigree (1,4,5,4,2)
  (same comment as for charger, electric passenger car)
- used powertrain from electric passenger car, manual dismantling: -1 kg; name BP_amount_1; source F. Habermacher 2011
  production volume; = RP_PV_1 * (BP_amount_1 / RP_amount_1)
    Calculated from production volume of reference product using the relative outputs.

## Sampling procedure
Data on materials and technology has been provided directly by the Swiss manufacturer Brusa.

## Extrapolations
The data has been gathered between 2010 and 2011 and is expected, due to the high quality of the manufacturer, to be representative at least until 2015.
