# battery cell production, Li-ion, LFP

Dataset: EcoSpold 2, unit process
Geography: RoW
Time period: 2018-12-31 to 2025-12-31
Technology level: current
Classification: ISIC rev.4 ecoinvent: 2720:Manufacture of batteries and accumulators
Synonyms: lithium iron phosphate; Li-ion; battery cell
Scenario: Business-as-Usual
System model: Allocation, cut-off by classification
Generated by: Eleonora Crenna
Published in: Dai, Q. 2018
Database: ecoinvent
isCopyrightProtected: true
accessRestrictedTo: 1

## General comment
This dataset represents the production of 1 kg of Li-ion battery cell with lithium iron phosphate (LFP) cathode and graphite-based anode.The specific energy density of a cell is 0.159 kWh/kg cell, calculated from Dai et al. (2018) for battery electric vehicle. The inventory is modelled according to the publication of Dai et al. (2018) and in line with other literature, e.g. Simon et al. (2016, Table 3). Infrastructure is included as well.
Reference:
Dai, Q., Kelly, J. C., Dunn, J., & Benavides, P. T. (2018). Update of bill-of-materials and cathode materials production for lithium-ion batteries in the GREET model. Argonne National Laboratory.
Simon, B., Bachtin, K., Kiliç, A., Amor, B., & Weil, M. (2016). Proposal of a framework for scale‐up life cycle inventory: A case of nanofibers for lithium iron phosphate cathode applications. Integrated environmental assessment and management, 12(3), 465-477.

## Included activities start
The activity starts with the battery cell components and the materials for additional components (esternal case, tabs, etc.) entering the factory gate.

## Included activities end
The activity ends with the production of Li-ion battery cells.

## Geography
This dataset is extrapolated from CN production to global.

## Technology
This dataset includes a method of producing Li-ion cell. After the manufacture of electrodes, the production of cells includes cell assembly and finishing. Lithium ion batteries are manufactured in sets of positive electrode (i.e. LFP cathode) and negative electrode (i.e. graphite anode), piled one on top of the other and then assembled in cells. A separator, i.e. a porous membrane is located in between electrodes to allow the flow of lithium ions. Within the cells, lithium ions move from the cathode into the liquid electrolyte through the micropores of the separator into the graphite anode during the charging phase. During the discharge of the battery, the Li+ ions move back into the cathode.

## Time period
The time period is from 2018 (year of the collection of data) and 2025 (assuming that this producing technology is still viable in the near future)

## Reference product
- battery cell, Li-ion, LFP: 1 kg; By-product classification allocatable product; CPC 46410: Primary cells and primary batteries; HS2017 850650: Cells and batteries; primary, lithium
  production volume 4.68688e7 kg; = 619948187 *0.15*0.73
    The PV is expressed in kg. According to UN Comtrade (https://comtrade.un.org/data/, HS code: 850760) 619948187 kg Li-ion batteries were exported globally in 2019. Approximately 15% are LFP Li-ion batteries (Benchmark Mineral Intelligence, 2019. The Current Position of Li-ion Raw Material Supply and the Role of Recycling), of which LFP cells represent approximately 73% weight of a battery pack
  property price 10.1354 EUR2005
    Converted to EUR2005. 84 $ * 0.115 kWh/kg_battery / 0.72kg_Cell/kg_battery. Price retrieved from: https://thedeepdive.ca/lithium-ion-battery-cells-cathodes-and-costs/
  properties: carbon allocation 0.226973 kg, carbon content 0.226973, carbon content, fossil 0.225404, carbon content, non-fossil 0.00156844, dry mass 1 kg, water content 0, water in wet mass 0 kg, wet mass 1 kg

## Inputs from technosphere
- aluminium collector foil, for Li-ion battery: 0.0495 kg; source Dai, Q. 2018; lognormal variance with pedigree 0.0046, pedigree (3,4,1,1,1)
  Literature.
  properties: aluminium content 1, dry mass 1 kg, wet mass 1 kg
- aluminium, wrought alloy: 0.026 kg; name Al_input; = 0.0166+0.0094; source Dai, Q. 2018; lognormal variance with pedigree 0.0046, pedigree (3,4,1,1,1)
  Literature. Material for cell container (0.0166 kg) and positive terminal (0.0094 kg)
  properties: dry mass 1 kg, wet mass 1 kg
- anode, graphite, for Li-ion battery: 0.1779 kg; source Dai, Q. 2018; lognormal variance with pedigree 0.0032, pedigree (2,4,1,1,1)
  Literature.
  properties: carbon content, fossil 0.968898, carbon content, non-fossil 0.0088164, dry mass 1 kg, wet mass 1 kg
- battery separator: 0.0156 kg; lognormal variance with pedigree 0.0032, pedigree (2,4,1,1,1)
  Literature.
  properties: carbon content, fossil 0.603377, dry mass 1 kg, wet mass 1 kg
- cathode, LFP, for Li-ion battery: 0.3676 kg; source Dai, Q. 2018; lognormal variance with pedigree 0.013225, pedigree (2,4,3,2,3)
  Literature.
  properties: dry mass 1 kg, wet mass 1 kg
- chemical factory, organics: 4e-10 unit; lognormal variance with pedigree 0.478, pedigree (4,5,5,5,5)
  Calculated based on literature data published by the industry. For this activity, no information was readily available concerning infrastructure and land-use. Therefore, the infrastructure is estimated based on data from two chemical factories, the BASF site of Ludwigshafen and the chemical factory in Gendorf (which are both located in Germany), which produce a wide range of chemical substances. Based on this data, the following assumptions are made: the built area amounts to about 4.2 ha, the plant has an average output of 50'000 t/a and a lifespan of fifty years. The estimated infrastructure amount is therefore 4.00 E-10 units per kg of produced chemical.
  References:
  Althaus H.-J., Chudacoff M., Hischier R., Jungbluth N., Osses M. and Primas A. (2007) Life Cycle Inventories of Chemicals. ecoinvent report No. 8, v2.0. EMPA Dübendorf, Swiss Centre for Life Cycle Inventories, Dübendorf, CH.
  Gendorf (2000) Umwelterklärung 2000, Werk Gendorf. Werk Gendorf, Burgkirchen.om ecoinvent)
- copper collector foil, for Li-ion battery: 0.1099 kg; source Dai, Q. 2018; lognormal variance with pedigree 0.0032, pedigree (2,4,1,1,1)
  Literature.
  properties: copper content 1, dry mass 1 kg, wet mass 1 kg
- copper, anode: 0.0292 kg; name Cu_input; source Dai, Q. 2018; lognormal variance with pedigree 0.0041, pedigree (2,4,2,3,2)
  Literature. Material for the negative terminal
  properties: copper content 0.997, dry mass 1 kg, wet mass 1 kg
- electricity, medium voltage: 0.00124739, 0.000110945, 0.00967319, 0.0126758, 0.0134237, 0.00683737, 0.000944345, 0.005977, 0.000252305, 0.0403952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 kWh (47 suppliers, which the file names only by identifier); sum of these 0.958424 kWh; = ((7+26)/2 + 5.2) * 0.27778 * 0.159; lognormal variance with pedigree 0.0032, pedigree (2,4,1,1,1)
  Literature. Electricity demand for cell assembly in dry room (7-26 MJ/kWh cell, Dai et al. 2017) and for final cell forming & charging (5.2 MJ/kWh cell, from Dai et al., 2019). Proxy from NMC/NCA energy demand, adapted to LFP cell based on specific energy ( 0.159 kWh/ kg cell), Dai et al. 2018). Conversion factor 1MJ = 0.27778 kWh
  References:
  Dai, Q., Dunn, J., Kelly, J. C., & Elgowainy, A. (2017) Update of Life Cycle Analysis of Lithium-Ion Batteries in the GREET Model. Argonne National Laboratory
  Dai, Q., Kelly, J. C., Dunn, J., & Benavides, P. T. (2018). Update of bill-of-materials and cathode materials production for lithium-ion batteries in the GREET model. Argonne National Laboratory.
  Dai, Q., Kelly, J. C., Gaines, L., & Wang, M. (2019). Life cycle analysis of lithium-ion batteries for automotive applications. Batteries, 5(2), 48.
- electrolyte, for Li-ion battery: 0.2215 kg; source Dai, Q. 2018; lognormal variance with pedigree 0.0032, pedigree (2,4,1,1,1)
  Literature.
  properties: carbon content, fossil 0.183946, dry mass 1 kg, wet mass 1 kg
- extrusion, plastic film: 0.0042 kg; = PP_input+ PET_input; lognormal variance with pedigree 0.0046, pedigree (3,4,1,1,1)
  Proxy for the production of plastic materials
- heat, district or industrial, natural gas: 10.0965 MJ; = ((56+71)/2)*0.159; lognormal variance with pedigree 0.0032, pedigree (2,4,1,1,1)
  Literature.Original value of 56-71 MJ/kWh cell taken from Dai et al. (2017), representing the energy demand for cell assembly in dry room. It includes cell stacking, terminal welding, electrode fillind and cell closing, and refers to 43Ah, 3.7 V NMC cells. This value is used to calculate the heat demand for LFP cells, considering the average energy demand and the storage capacity per LFP cell (0.159 kWh/ kg cell based on Dai et al., 2018)
  Reference:
  Dai et al. (2017). Update of Life Cycle Analysis of Lithium-Ion Batteries in the GREET Model. ArgonneNational Laboratory.
  Dai, Q., Kelly, J. C., Dunn, J., & Benavides, P. T. (2018). Update of bill-of-materials and cathode materials production for lithium-ion batteries in the GREET model. Argonne National Laboratory.
  properties: heating value, net 1 MJ
- polyethylene terephthalate, granulate, amorphous: 0.0031 kg; name PET_input; source Dai, Q. 2018; lognormal variance with pedigree 0.0046, pedigree (3,4,1,1,1)
  Literature.
  properties: carbon content, fossil 0.625, dry mass 1 kg, heating value, net 22.95 MJ, wet mass 1 kg
- polypropylene, granulate: 0.0011 kg; name PP_input; source Dai, Q. 2018; lognormal variance with pedigree 0.0046, pedigree (3,4,1,1,1)
  Literature.
  properties: carbon content, fossil 0.857143, dry mass 1 kg, heating value, net 32.78 MJ, wet mass 1 kg
  note on heating value, net: Value extracted from "treatment of waste polypropylene, open burning"
- sheet rolling, aluminium: 0.026 kg; = Al_input; lognormal variance with pedigree 0.0046, pedigree (3,4,1,1,1)
  Proxy for the production of the aluminium products (i.e. cell container and positive terminal)
- sheet rolling, copper: 0.0292 kg; lognormal variance with pedigree 0.0046, pedigree (3,4,1,1,1)
  Proxy for the production of the negative terminal

## Sampling procedure
The data about the production process of LFP battery cells are retrieved from the literature (Dai et al., 2018; Simon et al., 2016).

Reference:
Dai, Q., Kelly, J. C., Dunn, J., & Benavides, P., (2018). Update of Bill-of-Materials and Cathode Materials Production for Lithium-Ion Batteries in the GREET Model., 15, 0 - Undefined, Technical Report. Argonne National Laboratory, IL, USA
Simon, B., Bachtin, K., Kiliç, A., Amor, B., & Weil, M. (2016). Proposal of a framework for scale‐up life cycle inventory: A case of nanofibers for lithium iron phosphate cathode applications. Integrated environmental assessment and management, 12(3), 465-477.

## Extrapolations
This dataset was extrapolated from national producers to global.
