# electricity production, hydro, reservoir, alpine region

Dataset: EcoSpold 2, unit process
Geography: PE
Time period: 2012-01-01 to 2023-12-31
Technology level: old
Classification: ISIC rev.4 ecoinvent: 3510:Electric power generation, transmission and distribution
Tags: hydro power
Scenario: Business-as-Usual
System model: Allocation, cut-off by classification
Generated by: Alfredo Pro Castaneyra
Published in: Suppen, N 2017
Database: ecoinvent
isCopyrightProtected: true
accessRestrictedTo: 1

## General comment
This dataset represents the production of high voltage electricity at grid-connected reservoir (alpine region) hydropower plants in Peru. This dataset is based on the dataset: "electricity production, hydro, reservoir, alpine region, GLO" (accessed October 2017) and adapted using some regional data.The regional data was obtained from peruvian hydro power plants, including: efficiency, land use transformation, and water consumption. Data from nine hydropower plants was used. These plants represent 63% of the hydropower generation in the country in 2014. The plants are: Mantaro (26%), Restitución(8%), Cañon del Pato (7%), Platanal (6%), Yuncan (4%), San Gaban (4%), Chimay (3%), Machupicchu (3%) and Charcani V (3%). Data was obtained from the Committee of Economic Operations of the National Interconnected System (COES, 2014), the national peruvian entity that regulates the dispatch and generation of energy from the electricity sector. The COES publishes the statistics of operations of the National Interconnected System (SEIN) in an annual basis. The operational statistics for year 2014 were used. In year 2014. In addition, public access information was requested from the General Directorate of Environmental Energy Affairs (DGAAE) of the Ministry of Energy and Mines of the plants in operation in 2014; these reports provided technical data on the operation of the plant.
Hydropower generation in 2014 was 53.45% of the production of electricity in the country, a total of 21002.83 GWh. (COES, 2014)
Sources: COES, 2014. Sub Dirección de Gestión de la Información. RA-SGI-0115. ESTADISTICA RELEVANTE DEL SISTEMA ELÉCTRICO INTERCONECTADO NACIONAL, 2014. Retrieved online from http://www.coes.org.pe/Portal/Publicaciones/Estadisticas/ 2014/PDF/07_PRODUCCION HIDROELECTRICA Y RECURSOS HIDRICOS, 14 nov 2017
MINEM, 2017. Ministerio de Energía y Minas. Anuario Ejecutivo de Electricidad 2014. Dirección General de Electricidad. Retrieved online from http://www.minem.gob.pe/_estadisticaSector.php?idSector=6 , 10 January 2017.
MINEM, 2014. Balance Nacional de Energía. Retrieved online from: http://www.minem.gob.pe/minem/archivos/PUBLI_BNE_2014(1).pdf, 10 January 2017.

## Included activities start
This dataset starts from the power plant ready to produce electricity, i.e. the reservoir filled with water

## Included activities end
This activity ends with 1kWh of high voltage electricity produced at the power plant and arrived at the busbar.

This dataset includes
- the area/volume occupied for the barrage, power station, and the lake
- a preliminary estimation of emissions of methane and dinitrogen oxide
- operation and maintenance activities and materials of the power plants, such as lubricating oil or mass of water passing through the turbines.

This dataset doesn't include
- land use for access roads to the reservoir
- emissions of carbon dioxide
- raw materials extraction, decommissioning and waste treatment as these activities are already included in the infrastructure datasets
- transformation of the electricity produced.

## Geography
The nine power plants are located throughout the country. In central Perú, department of Huancavelica, the hydropower plants of Mantaro and Restitucion are located. Platanal is found in Lima and Chimay in Junin, also central parts of the country. The other hydropower plants that were consideredt are from Ancash, Cuzco, Puno and Arequipa. Considering he geographical location (climate) and altitude of these hydropower plants, they have been classified as "alpine region" (altitude range from 2000 to 4080 meters).

## Technology
The efficiency considered in this dataset is based on the one reported in the dataset: "electricity production, hydro, reservoir, alpine region, PE, 2008-2008" (accessed October 2017). he majority of hydroelectric power plants in the Peru are old technology (90%). Most plants in the country use Pelton turbines. The technology used in the dataset has an overall efficiency of 82%, more modern technologies show an overall efficiency of about 88%. The overall efficiency is composed of the efficiency of the works water channel, the turbine, the generator and the transformer and are listed below:
Efficiency of power plant current modern
Works water channel 0.95 0.95
Turbine 0.87 0.91
Generator 0.96 0.98
Transformer 0.98 0.99
Reservoir power plant total
without works water channel 0.82 0.88
with works water channel 0.78 0.84
Pumped storage power plant 0.70 0.74
References:
Bischof, R. (1992) Modernisierungspotential bei bestehenden Wasserkraftwerken. Vortrag beim Schweizerischen Technischen Verband, Sektion Graubünden, 21. Oktober 1992. Churwalden, Schweiz [unpublished].
König F., von (1985) Bau von Wasserkraftanlagen. C.F. Müller, Karlsruhe.

## Time period
The Annual Production Volume is valid for the year 2014.

## Parameters
- lifetime: 150 year; lognormal variance with pedigree 0.0014, pedigree (2,2,1,3,1)
  Estimation based on experiences as considered in the dataset "electricity production, hydro, reservoir, alpine region, PE, 2008-2008" (accessed October 2017).
- losses from gross electricity production: 0.01 dimensionless; name losses_gross_net; lognormal variance with pedigree 0.003225, pedigree (3,3,1,2,1)
  Literature value as considered in the "electricity production, hydro, reservoir, alpine region, PE, 2008-2008" (accessed October 2017) dataset. Generic value taken from the IEA Electricity information 2014, part I, p. I.7: 'The difference between gross and net electricity production is generally observed to be about 7% for conventional thermal stations, 1% for hydro stations and 6% for nuclear.'
  IEA/OECD. 2014. Electricity Information 2014. International Energy Agency (IEA), Paris Cedex (FR).
  nan
  Uncertainty: Generic assumption

## Reference product
- electricity, high voltage: 1 kWh; By-product classification allocatable product; CPC 17100: Electrical energy; HS2017 271600: Electrical energy
  production volume 2.81599e10 kWh; name apv_electricity
    The production data correspond to total net electricity production of hydro reservoir in Peru in 2014. COES, 2014)
    Sources:
    COES, 2014. Sub Dirección de Gestión de la Información. RA-SGI-0115. ESTADISTICA RELEVANTE DEL SISTEMA ELÉCTRICO INTERCONECTADO NACIONAL, 2014. Retrieved online from http://www.coes.org.pe/Portal/Publicaciones/Estadisticas/ 2014/PDF/07_PRODUCCION HIDROELECTRICA Y RECURSOS HIDRICOS, 14 nov 2017
  property price 0.0977 EUR2005
    Temporary price data. Calculated as 90% of purchasers price based on: 94% of the average price (to account for a 6% loss in transformation and transmission) for electricity for industrial consumersin 2005 (excluded taxes). From IEA.
  properties: carbon allocation 0 kg, carbon content 0

## Inputs from technosphere
- hydropower plant, reservoir, alpine region: 4.0404e-13 unit; = 1/(150*16500000000); lognormal variance with pedigree 0.0536, pedigree (3,5,5,5,2)
  Literature value/calculated value. The needed amount of infrastructure per kWh produced is calculated with the lifetime and the annual net energy production (16500GWh/a). Value taken over from the corresponding global (GLO) dataset.
- lubricating oil: 7.56e-6 kg; name lubricating_oil; = 0.000009*0.84; source Vögtlin H. J. 2002, p. p.36 in Bolliger, Tab. 5.2; lognormal variance with pedigree 0.1001, pedigree (4,2,3,5,3)
  The value is taken from "electricity production, hydro, reservoir, alpine region, PE, 2008-2008" (accessed October 2017), where it states that is is an estimation. Data for a run-of-river power station were overtaken.
  properties: carbon content, fossil 0.75, dry mass 1 kg, heating value, net 40.2 MJ, wet mass 1 kg
  note on carbon content, fossil: Lubricating oil is produced from diesel. C-content/dry mass of fats and oils considered 75%, from: ecoinvent v2.2 report, n 15a, pg 40
  note on heating value, net: Literature value, Source: IPCC 2006, 2006 IPCC Guidelines for National Greenhouse Gas Inventories, Prepared by the National Greenhouse Gas Inventories Programme, Eggleston H.S., Buendia L., Miwa K., Ngara T. and Tanabe K. (eds). Published: IGES, Japan
- waste mineral oil: -7.56e-6 kg; name waste_oil; = lubricating_oil; lognormal variance with pedigree 0.094, pedigree (1,1,3,5,1)
  Estimation. The value is taken from "electricity production, hydro, reservoir, alpine region, PE, 2008-2008" (accessed October 2017), that reports tha it is based on data of Swiss reservoir power plants. The lubricating oil is in a closed loop system (i.e. cannot get into the turbined water system) and is disposed annualy as waste oil in a hazardous waste treatment plant. The information given is based on own assumptions.
  production volume; = apv_electricity* waste_oil
    Calculated from the production volume of electricity, high voltage, hydro, reservoir, alpine region in proportion to the respective output amounts.
  properties: carbon content, fossil 0.864444, dry mass 0.9 kg, heating value, net 34.7 MJ, water content 0.111111, wet mass 1 kg
  note on carbon content, fossil: Tab A.6, ecoinvent v2.2 report 13_I. C content has been calculated after data in the tables, and then referred to 1 kg DM
  note on heating value, net: Value taken from the general comment of the treatment dataset.

## Inputs from nature
- Energy, potential (in hydropower reservoir), converted [natural resource, in water]: 3.79 MJ
  Value taken over from "electricity production, hydro, reservoir, alpine region, PE, 2008-2008" (accessed October 2017).
- Occupation, lake, artificial [natural resource, land]: 0.00345 m2*year; = transformation_from*lifetime; lognormal variance with pedigree 0.074, pedigree (1,1,3,5,1)
  Value taken from "electricity production, hydro, reservoir, alpine region, PE, 1945-2015" (accessed October 2017).
- Transformation, from unspecified [natural resource, land]: 2.3e-5 m2; name transformation_from; lognormal variance with pedigree 0.164, pedigree (1,1,3,5,1)
  Value taken over from "electricity production, hydro, reservoir, alpine region, PE, 1945-2015" (accessed October 2017).
- Transformation, to industrial area [natural resource, land]: 2.3e-7 m2; name Transformation_to_industrial_area_amount; = transformation_from*0.01
  Calculated value. A weighted average using the value of transformation, to industrial area, from the peruvian dataset (electricity production, hydro, reservoir, alpine region, PE, 2008-2008" - accessed October 2017) and extrapolated considering the production of the nine hydropower plants. (Ministerio de Energía y Minas, 2014; Subdirección de Gestión de la Información. COES, 2014). References:
  COES, 2014. Sub Dirección de Gestión de la Información. RA-SGI-0115. ESTADISTICA RELEVANTE DEL SISTEMA ELÉCTRICO INTERCONECTADO NACIONAL, 2014. Retrieved online from http://www.coes.org.pe/Portal/Publicaciones/Estadisticas/ 2014/PDF/07_PRODUCCION HIDROELECTRICA Y RECURSOS HIDRICOS, 14 nov 2017 Ministerio de Energía y Minas. Anuario Ejecutivo de Electricidad 2014. Dirección General de Electricidad. Retrieved online from http://www.minem.gob.pe/_estadisticaSector.php?idSector=6 , 10 January 2017. In the peruvian dataset (electricity production, hydro, reservoir, alpine region, PE, 2008-2008" - accessed October 2017), this value was calculated using the value reported in the literature (Flury and Frischknecht, 2012)
  Sources data: Flury, K.; Frischknecht, R.; 2012. Life Cycle Inventories of Hydroelectric Power Generation, ESU-services Ltd., fair consulting in sustainability.
- Transformation, to lake, artificial [natural resource, land]: 2.277e-5 m2; = transformation_from- Transformation_to_industrial_area_amount
  Calculated value. A weighted average using the value of transformation,to lake, artificial, from the peruvian dataset (electricity production, hydro, reservoir, alpine region, PE, 2008-2008" - accessed October 2017) and extrapolated considering the production of the nine hydropower plants. (Ministerio de Energía y Minas, 2014; Subdirección de Gestión de la Información. COES, 2014). References:
  COES, 2014. Sub Dirección de Gestión de la Información. RA-SGI-0115. ESTADISTICA RELEVANTE DEL SISTEMA ELÉCTRICO INTERCONECTADO NACIONAL, 2014. Retrieved online from http://www.coes.org.pe/Portal/Publicaciones/Estadisticas/ 2014/PDF/07_PRODUCCION HIDROELECTRICA Y RECURSOS HIDRICOS, 14 nov 2017 Ministerio de Energía y Minas. Anuario Ejecutivo de Electricidad 2014. Dirección General de Electricidad. Retrieved online from http://www.minem.gob.pe/_estadisticaSector.php?idSector=6 , 10 January 2017. In the peruvian dataset (electricity production, hydro, reservoir, alpine region, PE, 2008-2008" - accessed October 2017), this value was calculated using the value reported in the literature (Flury and Frischknecht, 2012)
  Sources data: Flury, K.; Frischknecht, R.; 2012. Life Cycle Inventories of Hydroelectric Power Generation, ESU-services Ltd., fair consulting in sustainability.
- Volume occupied, reservoir [natural resource, in water]: 0.15 m3*year; source BWW 1991, p. p.35 in Bolliger, Tab. 5.2; lognormal variance with pedigree 0.164, pedigree (1,1,3,5,1)
  (same comment as for Transformation, from unspecified)
- Water, turbine use, unspecified natural origin [natural resource, in water]: 0.88807 m3; name water_turbine_use_UNO_input; lognormal variance with pedigree 0.004, pedigree (1,1,3,5,1)
  Calculated value. A weighted average based on net electricity production and water for turbine use (m3/kWh) of the nine hydropower plants. (Ministerio de Energía y Minas, 2014; Subdirección de Gestión de la Información. COES, 2014).
  Power plant: MANTARO, Net electricity production: 5409 GWh water: 3030 million m3
  Power plant: RESTITUCIÓN, Net electricity production: 1629 GWh water: 2724 million m3
  Power plant: CAÑON DEL PATO, Net electricity production: 1430 GWh water: 1505 million m3
  Power plant: PLATANAL, Net electricity production: 1167 GWh water: 778 million m3
  Power plant: YUNCAN, Net electricity production: 921 GWh water: 726 million m3
  Power plant: SAN GABAN, Net electricity production: 774 GWh water: 468 million m3
  Power plant: CHIMAY, Net electricity production: 714 GWh water: 1397 million m3
  Power plant: MACHUPICCHU, Net electricity production: 671 GWh water: 816 million m3
  Power plant: CHARCANI V, Net electricity production: 559 GWh water: 346 million m3
  References:
  COES, 2014. Sub Dirección de Gestión de la Información. RA-SGI-0115. ESTADISTICA RELEVANTE DEL SISTEMA ELÉCTRICO INTERCONECTADO NACIONAL, 2014. Retrieved online from http://www.coes.org.pe/Portal/Publicaciones/Estadisticas/ 2014/PDF/07_PRODUCCION HIDROELECTRICA Y RECURSOS HIDRICOS, 14 nov 2017 Ministerio de Energía y Minas. Anuario Ejecutivo de Electricidad 2014. Dirección General de Electricidad. Retrieved online from http://www.minem.gob.pe/_estadisticaSector.php?idSector=6 , 10 January 2017.

## Emissions to nature
- Dinitrogen monoxide [air, non-urban air or from high stacks]: 7.7e-8 kg
  Value taken over from "electricity production, hydro, reservoir, alpine region, PE, 1945-2015" (accessed October 2017). The comment in the original dataset is as follows:
  Estimation. Total emissions of greenhouse gases are assumed to be 0.3 CO2equivalents per kWh. Research projects in Swiss natural lakes had measurements of 8-16 micromol per m2 and day (brutto emissions). Because of the limited rates of nitrification and denitrification, a maximum of 0.24 to 2.4 micromol per m2 and Tag can be assumed for Swiss reservoir plants.
- Methane, non-fossil [air, non-urban air or from high stacks]: 1.4e-5 kg; lognormal variance with pedigree 0.1726, pedigree (4,4,5,5,2)
  (same comment as for Transformation, from unspecified)
- Water [air, unspecified]: 0.15 m3; name water_to_air_unspecified; lognormal variance with pedigree 0.0427, pedigree (2,2,3,1,1)
  (same comment as for Transformation, from unspecified)
  property fraction, origin: fresh water 1; name fraction_origin_fresh_water_Ww
  property fraction, origin: salt water 0; name fraction_origin_salt_water_Ww
  property fraction, origin: unspecified 0; name fraction_origin_unspecified_Ww
- Water [water, unspecified]: 0.73807 m3; name water_to_water_unspecified; = water_turbine_use_UNO_input-water_to_air_unspecified; lognormal variance with pedigree 0.130025, pedigree (4,4,5,2,4)
  Calculated value assuming the water consumed is the water, turbine use (m3/kWh). The turbined volumes were considered for the nine powerr plants, found in the following country statistics: COES, 2014. Sub Dirección de Gestión de la Información. RA-SGI-0115. ESTADISTICA RELEVANTE DEL SISTEMA ELÉCTRICO INTERCONECTADO NACIONAL, 2014. Retrieved online from http://www.coes.org.pe/Portal/Publicaciones/Estadisticas/ 2014/PDF/07_PRODUCCION HIDROELECTRICA Y RECURSOS HIDRICOS, 14 nov 2017
  property fraction, origin: fresh water 1; name fraction_origin_fresh_water
  property fraction, origin: salt water 0; name fraction_origin_salt_water
  property fraction, origin: unspecified 0; name fraction_origin_unspecified

## Sampling procedure
Data from nine hydropower plants was used. These plants represent 63% of hydropower generation in the country in 2014. The plants are: Mantaro (26%), Restitucion(8%), Cañon del Pato (7%), Platanal (6%), Yuncan (4%), San Gaban (4%), Chimay (3%), Machupicchu (3%) and Charcani V (3%). Data was obtained from the Committee of Economic Operations of the National Interconnected System (COES), Source: COES, 2014. Sub Dirección de Gestión de la Información. RA-SGI-0115. ESTADISTICA RELEVANTE DEL SISTEMA ELÉCTRICO INTERCONECTADO NACIONAL, 2014. Retrieved online from http://www.coes.org.pe/Portal/Publicaciones/Estadisticas/ 2014/PDF/07_PRODUCCION HIDROELECTRICA Y RECURSOS HIDRICOS, 14 nov 2017

## Extrapolations
This dataset has been extrapolated from "electricity production, hydro, reservoir, alpine region, PE, 2008-2008" (accessed October 2017), which in turn is based on a Swiss dataset for reservoir hydropower plants. Some of the exchanges and parameters were regionalized with data from Peruvian power plants, including: efficiency, land use transformation, and water consumption. Data from the following nine plants was used: Mantaro, Restitución, Cañon del Pato, Platanal, Yuncan, San Gaban, Chimay, Machupicchu and Charcani V.

## Review by Christopher Oberschelp 2018-01-16
Documentation, key values and data format seem reasonable. Individual deviations may be spotted by comparison with reference datasets. Uncertainties might have to be adjusted later (as agreed upon with ecoinvent).
