# lithium chloride production

Dataset: EcoSpold 2, unit process
Geography: GLO
Time period: 2000-01-01 to 2023-12-31
Technology level: current
Classification: EcoSpold01Categories: chemicals/inorganics
Classification: ISIC rev.4 ecoinvent: 2011:Manufacture of basic chemicals
Tags: ConvertedDataset
Scenario: Business-as-Usual
System model: Allocation, cut-off by classification
Share of production covered: 100 %
Generated by: Jürgen Sutter
Published in: Sutter, J. 2007
Database: ecoinvent
isCopyrightProtected: true
accessRestrictedTo: 1

## General comment
This dataset represents the production of 1 kg lithium chloride, at plant, global. The production of lithium chloride by means of the reaction of lithium carbonate and hydrochloric acid is considered. The functional unit is 1 kg of highly pure lithium chloride, that is, all data in the present report is referred to 1 kg lithium chloride 100%. The system includes the process with consumption of raw materials, energy, infrastructure and land use as well as the generation of emissions to air and water. It also includes transportation of the raw materials. Transient or unstable operations like starting-up or shutting-down, are not included, but the production during stable operation conditions. Storage and transportation of the final product are also not included. It is assumed that the manufacturing plants are located in an urban/industrial area and consequently the emissions are categorised as emanating in a high population density area. The emissions into water are assumed to be emitted into rivers.
[This dataset was already contained in the ecoinvent database version 2. It was not individually updated during the transfer to ecoinvent version 3. Life Cycle Impact Assessment results may still have changed, as they are affected by changes in the supply chain, i.e. in other datasets. This dataset was generated following the ecoinvent quality guidelines for version 2. It may have been subject to central changes described in the ecoinvent version 3 change report (http://www.ecoinvent.org/database/ecoinvent-version-3/reports-of-changes/), and the results of the central updates were reviewed extensively. The changes added e.g. consistent water flows and other information throughout the database. The documentation of this dataset can be found in the ecoinvent reports of version 2, which are still available via the ecoinvent website. The change report linked above covers all central changes that were made during the conversion process.]

## Included activities start
From the reception of lithium carbonate and hydrochloric acid at the factory gate.

## Included activities end
This activity ends with the production of lithium chloride including materials, energy uses, infrastructure and emissions.

## Geography
The inventory is modelled for the world.

## Technology
The known methods of producing lithium chloride from lithium ores have not been adopted commercially. At present, it is produced exclusively by reaction of lithium carbonate and hydrochloric acid, with special steel or nickel equipment because of the extreme corrosivity of lithium chloride.
Li2CO3 + 2HCl → 2LiCl + CO2 + H2O
Concentration of the solution (e.g., in a vacuum evaporator) causes lithium chloride to crys-tallize. It is then separated from the mother liquor, dried, and packed in moisture-proof containers.
Wietelmann, U., Bauer, R.: Lithium and Lithium Compounds. Published online: 2000. In: Ullmann's Encyclopedia of Industrial Chemistry, Seventh Edition, 2004 Electronic Release (ed. Fiedler E., Grossmann G., Kersebohm D., Weiss G. and Witte C.). 7 th Electronic Release Edition. Wiley InterScience, New York, Online-Version under: http://www.mrw.interscience.wiley.com/emrw/9783527306732/home

## Time period
Time of publications

## Parameters
- fraction, cooling water, cooling pond system, to air: 0.032 dimensionless; name fraction_CW_CP_to_air; lognormal variance with pedigree 0.0413, pedigree (2,3,1,3,1)
  Calculated based on literature value (Scown, C.D., 2011, Water Footprint of U.S. Transportation Fuels and supplying information of the article) (Vionnet, S., Quantis Water Database - Technical Report, 2012).
- fraction, cooling water, once-through system, to air: 0.004 dimensionless; name fraction_CW_OT_to_air; lognormal variance with pedigree 0.0413, pedigree (2,3,1,3,1)
  (same comment as for fraction, cooling water, cooling pond system, to air)
- fraction, cooling water, recirculating system, to air: 0.771 dimensionless; name fraction_CW_R_to_air; lognormal variance with pedigree 0.0413, pedigree (2,3,1,3,1)
  (same comment as for fraction, cooling water, cooling pond system, to air)
- fraction, cooling water, to air: 0.3875 dimensionless; name fraction_CW_to_air; = (0.5*fraction_CW_OT_to_air)+(0.5*fraction_CW_R_to_air); lognormal variance with pedigree 0.092025, pedigree (4,4,3,2,4)
  Calculated value based on literature value (see comments of the other parametres present in this dataset) and expert opinion. In the case when no industry/literature data are available about the type of cooling or directly fraction, cooling water, to air specific for the process a default assumption is applied. It is assumed that the once-through cooling system is used in 50% of all cases and recirculating system is used in another 50% of all cases.

## Reference product
- lithium chloride: 1 kg; By-product classification allocatable product; CPC 34231: Chemical elements n.e.c.; inorganic acids except phosphoric, nitric and sulphonitric; inorganic oxygen compoun[…]; HS2017 282739: Chlorides; other than of ammonium, calcium, magnesium, aluminium and nickel; CAS 7447-41-8
  Lithium chloride is white crystalline salt. It is hygroscopic and highly soluble in water, and is highly polar. It is more soluble in polar organic solvents such as methanol and acetone than is sodium chloride or potassium chloride.
  Lithium chloride is extremely hygroscopic; thus, like lithium bromide, it is used for drying gases and in air conditioners of the absorber type. Because molten lithium chloride readily dissolves metallic oxides, it is used as a component of fluxes and dipping baths for welding and brazing aluminum and light metal alloys. Most of the lithium chloride produced is used as starting material for the production of lithium metal by molten salt electrolysis.
  EcoSpold01Location=GLO
  production volume 7.2e6 kg
    Unknown
    Estimated from requirement for lithium metal plus approx. 10% for other uses.
  property price 6.92 EUR2005
    Calculated based on inputs: The price of the product has been calculated as a sum of the values of the material and energy inputs for this product: 6.75EUR/kg lithium carbonate + 0.127 EUR/kg hydrochloric acid + 0.1 EUR/kWh electricity, medium voltage, results in a price for lithium chloride of 6.92EUR/kg. This value is a rough estimation. It may underestimate the real price since there are additional expenses when producing any product. These expences can include for example labour costs, treatment of waste materials and profit for the producer. Please consider carefully whether this level of data quality is acceptable for your application. Cross-reference: The consumer price for lithium chloride is 141 EURO for 0.5kg (sigmaaldrich.com, 2016). (sigmaaldrich.com, 2016. Accessible at: http://www.sigmaaldrich.com/catalog/product/sigma/l9650?lang=de&region=DE&cm_sp=Insite-_-prodRecCold_xviews-_-prodRecCold10-1 , last accessed 21 April 2016)
  properties: carbon allocation 0 kg, carbon content 0, carbon content, fossil 0, carbon content, non-fossil 0, dry mass 1 kg, water content 0, water in wet mass 0 kg, wet mass 1 kg

## Inputs from technosphere
- chemical factory, organics: 4e-10 unit; lognormal variance with pedigree 0.448, pedigree (4,5,5,5,5)
  Estimation. The infrastructure is estimated based on the module "chemical plant, organics". This module assumes a built area of about 4.2 ha, an average output of 50'000 t/a, and plant life of fifty years.
  EcoSpold01Location=RER
  Uncertainty: Estimation
- electricity, medium voltage: 0.56944 kWh; source Kim S. 2003; lognormal variance with pedigree 0.0401, pedigree (1,2,5,1,1)
  EcoSpold01Location=UCTE
  Literature value.
  Kim S., Overcash M.: Energy in chemical manufacturing processes: gate-to-gate information for life cycle assessment. In: Journal of Chemical Technology & Biotechnology vol. 78, no. 9: 995-1005(11). 2003
  Uncertainty: Kim 2003
- hydrochloric acid, without water, in 30% solution state: 0.162028, 0.740232 kg (2 suppliers, which the file names only by identifier); sum of these 0.90226 kg; source Wietelmann, U. 2004; lognormal variance with pedigree 0.076, pedigree (4,5,5,1,1)
  EcoSpold01Location=RER
  Stoechiometric calculation. The values for the consumption of the raw materials are calculated with an assumed yield of 95 %.
  Uncertainty: Stoechiometric calculation
  properties: dry mass 1 kg, heating value, net 3.32 MJ, wet mass 1 kg
- lithium carbonate: 0.92732 kg; source Wietelmann, U. 2004; lognormal variance with pedigree 0.076, pedigree (4,5,5,1,1)
  EcoSpold01Location=GLO
  Stoechiometric calculation. The values for the consumption of the raw materials are calculated with an assumed yield of 95 %.
  Uncertainty: Stoechiometric calculation
  properties: carbon content, fossil 0.16255, dry mass 1 kg, heating value, net 4.93 MJ, wet mass 1 kg
- wastewater, average: -1.09589e-8, -1.82361e-6, -4.36062e-7, -6.49273e-9 m3 (4 suppliers, which the file names only by identifier); sum of these -2.27712e-6 m3; lognormal variance with pedigree 0.0452, pedigree (2,4,1,5,4)
  Calculated based on literature data published by the GENDORF Chemical Park. The factory produced an average of 2462760 tonnes of chemical substances (including intermediates) per year in the years 2015-2019. The average ouput of wastewater going to an external wastewater treatment plant in the years 2015-2019 was 5608 m3 per year. This equals 0.000002277 m3/kg chemical produced.
  References:
  Chemiepark GENDORF, Umwelterklärung 2016, https://www.gendorf.de/Nachbarn/Umweltschutz/Industrie%20und%20Nachhaltigkeit
  Chemiepark GENDORF, Umwelterklärung 2017, https://www.gendorf.de/Nachbarn/Umweltschutz/Industrie%20und%20Nachhaltigkeit
  Chemiepark GENDORF, Umwelterklärung 2020, https://www.gendorf.de/Nachbarn/Umweltschutz/Industrie%20und%20Nachhaltigkeit
  properties: carbon content, non-fossil 0.194039, dry mass 0.346837 kg, mass concentration, TOC 0.1091 kg/m3, mass concentration, calcium 0.039453 kg/m3, mass concentration, chlorine 0.030031 kg/m3, mass concentration, hydrogen 0.013365 kg/m3, mass concentration, nitrogen 0.031015 kg/m3, mass concentration, oxygen 0.069824 kg/m3, mass concentration, sodium 0.06456 kg/m3, mass concentration, sulfur 0.015602 kg/m3, water content 2882.2, wet mass 1000 kg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
  note on carbon content, non-fossil: 0.0673 kg TOC/m3 (Tab A.17, ecoinvent v2.2 report 13_I). TOC was considered as Total Carbon.

## Inputs from nature
- Water, cooling, unspecified natural origin [natural resource, in water]: 0.014707 m3; source Gendorf 2000; lognormal variance with pedigree 0.0852, pedigree (2,4,5,5,4)
  Calculated based on literature data published by the GENDORF Chemical Park. The factory produced an average of 2462760 tonnes of chemical substances (including intermediates) per year in the years 2015-2019. The average amount of cooling water released in the years 2015-2019 was 34408800 t per year. It was assumed that 5% of the cooling water was emitted to air during its use, therefore, to calculate the input of cooling water, the output value reported by GENDORF was scaled up by the factor 1/0.95. This equals 0.014707 m3/kg chemical produced.
  References:
  Chemiepark GENDORF, Umwelterklärung 2016, https://www.gendorf.de/Nachbarn/Umweltschutz/Industrie%20und%20Nachhaltigkeit
  Chemiepark GENDORF, Umwelterklärung 2017, https://www.gendorf.de/Nachbarn/Umweltschutz/Industrie%20und%20Nachhaltigkeit
  Chemiepark GENDORF, Umwelterklärung 2020, https://www.gendorf.de/Nachbarn/Umweltschutz/Industrie%20und%20Nachhaltigkeit
  Uncertainty: Estimation
- Water, river [natural resource, in water]: 0.000965426 m3; lognormal variance with pedigree 0.0852, pedigree (2,4,5,5,4)
  Calculated based on literature data published by the GENDORF Chemical Park. The factory produced an average of 2462760 tonnes of chemical substances (including intermediates) per year in the years 2015-2019. The average consumption of river water in the years 2015-2019 was 22000820 t per year. However, since the cooling water is modelled as an input, the amount of river water was adjusted to avoid double counting. 55% of the input amount of cooling water was deducted from the amount of river water, as that is the share of river water versus well water. This equals 0.00096543 m3/kg chemical produced.
  References:
  Chemiepark GENDORF, Umwelterklärung 2016, https://www.gendorf.de/Nachbarn/Umweltschutz/Industrie%20und%20Nachhaltigkeit
  Chemiepark GENDORF, Umwelterklärung 2017, https://www.gendorf.de/Nachbarn/Umweltschutz/Industrie%20und%20Nachhaltigkeit
  Chemiepark GENDORF, Umwelterklärung 2020, https://www.gendorf.de/Nachbarn/Umweltschutz/Industrie%20und%20Nachhaltigkeit
- Water, well, in ground [natural resource, in water]: 0.000816522 m3; lognormal variance with pedigree 0.0852, pedigree (2,4,5,5,4)
  Calculated based on literature data published by the GENDORF Chemical Park. The factory produced an average of 2462760 tonnes of chemical substances (including intermediates) per year in the years 2015-2019. The average consumption of well water in the years 2015-2019 was 18607480 t per year. However, since the cooling water is modelled as an input, the amount of well water was adjusted to avoid double counting. 45% of the input amount of cooling water was deducted from the amount of well water, as that is the share of well water versus river water. This equals 0.00081652 m3/kg chemical produced.
  References:
  Chemiepark GENDORF, Umwelterklärung 2016, https://www.gendorf.de/Nachbarn/Umweltschutz/Industrie%20und%20Nachhaltigkeit
  Chemiepark GENDORF, Umwelterklärung 2017, https://www.gendorf.de/Nachbarn/Umweltschutz/Industrie%20und%20Nachhaltigkeit
  Chemiepark GENDORF, Umwelterklärung 2020, https://www.gendorf.de/Nachbarn/Umweltschutz/Industrie%20und%20Nachhaltigkeit

## Emissions to nature
- Carbon dioxide, fossil [air, urban air close to ground]: 0.52381 kg; source Wietelmann, U. 2004; lognormal variance with pedigree 0.1786, pedigree (4,5,5,5,5)
  Estimation. The carbon dioxide emissions are calculated from the co-produced CO2 in the lithium chloride production reaction and the water treatment CO2 emissions.
  Uncertainty: Estimation
- Hydrochloric acid [air, urban air close to ground]: 0.0018045 kg; lognormal variance with pedigree 0.188, pedigree (4,5,5,5,5)
  Estimation. As approximation the air emissions occurring from the purge vent, the distillation vent and fugitive emission sources were estimated to 0.2% of the hydrogen chloride input.
  Uncertainty: Estimation
- Water [air, unspecified]: 0.00147008 m3; lognormal variance with pedigree 0.1246, pedigree (2,4,5,5,4)
  Calculated based on literature data published by the GENDORF Chemical Park. The factory produced an average of 2462760 tonnes of chemical substances (including intermediates) per year in the years 2015-2019. To determine the emissions of water to air, the difference of all water inputs (from river, well, tap water and cooling) and outputs (wastewater, emissions to water) was calculated. The average ouput of water to air in the years 2015-2019 was 3620444 m3 per year. This equals 0.00147 m3/kg chemical produced. For more information on the other water exchanges please consult the respective exchange comment.
  References:
  Chemiepark GENDORF, Umwelterklärung 2016, https://www.gendorf.de/Nachbarn/Umweltschutz/Industrie%20und%20Nachhaltigkeit
  Chemiepark GENDORF, Umwelterklärung 2017, https://www.gendorf.de/Nachbarn/Umweltschutz/Industrie%20und%20Nachhaltigkeit
  Chemiepark GENDORF, Umwelterklärung 2020, https://www.gendorf.de/Nachbarn/Umweltschutz/Industrie%20und%20Nachhaltigkeit
  property fraction, origin: fresh water 0; name fraction_origin_fresh_water
  property fraction, origin: salt water 0; name fraction_origin_salt_water
  property fraction, origin: unspecified 1; name fraction_origin_unspecified
- BOD5, Biological Oxygen Demand [water, surface water]: 0.09396 kg; lognormal variance with pedigree 0.188, pedigree (4,5,5,5,5)
  Calculated value as 0.5*COD.
  Uncertainty: Calculated from the water emissions
- COD, Chemical Oxygen Demand [water, surface water]: 0.04698 kg; lognormal variance with pedigree 0.188, pedigree (4,5,5,5,5)
  Calculated value as COD (g O2) = 2.7*TOC (gC).
  Uncertainty: Calculated from the water emissions
- Carbonate [water, surface water]: 0.037594 kg; lognormal variance with pedigree 0.448, pedigree (4,5,5,5,5)
  Estimation. The remaining amount of unreacted lithium carbonate (5 % of the input) is assumed to leave the production process with the waste water.
  Uncertainty: Estimation
- Chloride [water, surface water]: 0.042105 kg; lognormal variance with pedigree 0.448, pedigree (4,5,5,5,5)
  Estimation. The remaining amount of hydrogen chloride (4.8 % of the input) is assumed to leave the production process with the waste water.
  Uncertainty: Estimation
- DOC, Dissolved Organic Carbon [water, surface water]: 0.0174 kg; lognormal variance with pedigree 0.188, pedigree (4,5,5,5,5)
  Calculated value from the water emissions. The values for TOC and DOC used in this dataset were calculated from the amount of carbonate in the treated waste water. For the calculation of the values for DOC the worst case scenario TOC = DOC was used.
  Uncertainty: Calculated from the water emissions
- Lithium I [water, surface water]: 0.0087719 kg; lognormal variance with pedigree 0.828, pedigree (4,5,5,5,5)
  (same comment as for Carbonate)
- TOC, Total Organic Carbon [water, surface water]: 0.0174 kg; lognormal variance with pedigree 0.188, pedigree (4,5,5,5,5)
  Calculated value from the water emissions. The values for TOC and DOC used in this dataset were calculated from the amount of carbonate in the treated waste water.
  Uncertainty: Calculated from the water emissions
- Water [water, unspecified]: 0.0150391 m3; lognormal variance with pedigree 0.1246, pedigree (2,4,5,5,4)
  Calculated based on literature data published by the GENDORF Chemical Park. The factory produced an average of 2462760 tonnes of chemical substances (including intermediates) per year in the years 2015-2019. The amount of water released back to the environment consists of the sum of the amount of process water treated in the internal WWTP that is then released back to the environment and the amount of cooling water released back to the environment. The average ouput of the internal WWTP in the years 2015-2019 was 2628800 m3 and that of cooling water released back to the environment was 34408800 m3. This gives a yearly average of 37037600 m3 emissions of water to water. This equals 0.01504 m3/kg chemical produced.
  References:
  Chemiepark GENDORF, Umwelterklärung 2016, https://www.gendorf.de/Nachbarn/Umweltschutz/Industrie%20und%20Nachhaltigkeit
  Chemiepark GENDORF, Umwelterklärung 2017, https://www.gendorf.de/Nachbarn/Umweltschutz/Industrie%20und%20Nachhaltigkeit
  Chemiepark GENDORF, Umwelterklärung 2020, https://www.gendorf.de/Nachbarn/Umweltschutz/Industrie%20und%20Nachhaltigkeit
  property carbon content, fossil 0; name C_content_fossil
  property carbon content, non-fossil 0; name C_content_non_fossil
  property dry mass 0 kg; name DM
  property fraction, origin: fresh water 0; name fraction_origin_fresh_water_Ww
  property fraction, origin: salt water 0; name fraction_origin_salt_water_Ww
  property fraction, origin: unspecified 1; name fraction_origin_unspecified_Ww
  property water in wet mass 1000 kg; name WWM
  property wet mass 1000 kg; name WM

## Sampling procedure
Standard values

## Extrapolations
Emissions are estimated. Infrastructure and transports are calculated with standard values.

## Review by Roland Hischier 2009-01-28
passed.
none

## Review by Roland Hischier 2011-09-23
Transfer of documentation done.
