# ground granulated blast furnace slag production

Dataset: EcoSpold 2, unit process
Geography: RoW
Time period: 2001-01-01 to 2023-12-31
Technology level: current
Classification: ISIC rev.4 ecoinvent: 239:Manufacture of non-metallic mineral products n.e.c.
Synonyms: GGBFS; slag cement
Scenario: Business-as-Usual
System model: Allocation, cut-off by classification
Generated by: [System]
Database: ecoinvent
isCopyrightProtected: true
accessRestrictedTo: 1

## General comment
This dataset represents the production of ground granulated blast furnace slag (GGBFS) in the global geography. This dataset was built as a weighted average of regional datasets of the same activityName.
The ground granulated blast furnace slag (GGBFS) is a by-product of iron manufacturing which when added to concrete improves its properties such as workability, strength and durability.
GGBFS is a supplementary cementious material used as a partial replacement for Portland cement in concrete.
This activity includes the process steps (i) quenching/granulation, (ii) dewatering and/or drying, (iii) crushing, (iv) grinding, and (v) storage in pile and silo.

## Included activities start
From transport of molten iron blast furnace slag for granulation from pig iron production (within the steel plant). Granulation is followed by dewatering and/or drying, crushing, grinding and finally storage.

## Included activities end
This activity ends with the storage of the finished product (GGBFS) in silo.
This activity does neither include packaging and distribution of the final product, nor the treatment of wastewater generated in the granulation process step.

## Geography
This dataset is a weighted average built from the following geographies: IN, US, ZA.

## Technology
This material is obtained by the heating of iron ore, limestone and coke at a temperature about 1500 degree Celsius. The process is carried out in a blast furnace.
The formation of GGBFS is not direct. The by-product of iron manufacturing is a molten slag and molten iron. The molten slag consists of alumina and silica, also with the certain amount of oxides.
This slag is later granulated by cooling it. For this, it is allowed to pass through a high-pressure water get. This result in quenching of the particles which results in granules of size lesser than 5mm in diameter.
The main constituents of blast furnace slag are CaO, SiO2, Al2O3 and MgO. These are the minerals that are found in most of the cementitious substances.
The particles are further dried and ground in a rotating ball mill to form a fine powder, known as ground granulated blast furnace slag cement.

## Time period
This dataset is considered valid at least from the earliest start date (2001) until the latest end date (2017) of the regional datasets with the same activity name.

## Reference product
- ground granulated blast furnace slag: 1 kg; name BP_1; By-product classification allocatable product; CPC 37440: Portland cement, aluminous cement, slag cement and similar hydraulic cements, except in the form of clinkers; HS2017 261900: Slag, dross; (other than granulated slag), scalings and other waste from the manufacture of iron or steel
  The amount of this exchange is calculated as a weighted average of the IN, US and ZA datasets, according to their production volumes. For more details, please consult the regional datasets with same activity name.
  production volume 3.96327e9 kg; = ABS(PV_RP*BP_1/RP)
    Calculated from the production volume of the reference product in proportion to the respective output amounts.
  property carbon content, fossil 0
    Industry value; Arcelor Mittal, chemical composition of blast furnace slag (http://www.cst.com.br/english/products/co_products/catalog_products/blast_slag/blast_slag.asp, accessed: 20121003).
  property price 0.0615 EUR2005
    2005 import and export prices (total trades (USD) divided by total weight (kg) in China, India, USA, Japan, Russia and Europe, major producers and consumers (http://www.cementchina.net/freport/showfre.asp?id=749) from UN Commodity Trade Statistics Database (http://data.un.org/Explorer.aspxDatabase [Accessed 2 July 2010]). Commodity: Cement (portland, aluminious, slag or hydraulic)
  properties: carbon allocation 0 kg, carbon content 0, carbon content, non-fossil 0, dry mass 1 kg, water content 0, water in wet mass 0 kg, wet mass 1 kg

## Inputs from technosphere
- air filter, central unit, 600 m3/h: 2.9043e-5 unit; lognormal variance with pedigree 0.0059, pedigree (2,2,3,5,2)
  (same comment as for ground granulated blast furnace slag)
  properties: carbon content, fossil 0.085325, dry mass 0.4 kg, wet mass 0.4 kg
- blast furnace slag: 1.00106 kg; name RP
  (same comment as for ground granulated blast furnace slag)
  production volume; name PV_RP; = 3E+09*96513077364367.9/23315080560000
    Estimated value. The production volume is based on the production volume of the US and the nominal GDP 2021 for the World and for the US.
    The annual production volume of GGBFS in the US is estimated to be 3E+09 kg/a (USGS, 2021). The global nominal (current) GDP in 2021 was 9.65E+13 US$ and of the US 2.33E+13 US$.
    Sources:
    USGS, Iron and Steel Slag Statistics and Information, Minerals Yearbook, 2021. Available at: https://www.usgs.gov/centers/national-minerals-information-center/iron-and-steel-slag-statistics-and-information
    https://api.worldbank.org/v2/en/indicator/NY.GDP.MKTP.CD?downloadformat=excel, accessed on 20231010.
  properties: aluminium content 0.0569762, calcium content 0.261278, dry mass 0.995 kg, iron content 0.00564652, magnesium content 0.074219, manganese content 0.00536715, oxygen content 0.404598, silicon content 0.169199, sulfur content 0.0086603, titanium content 0.00463813, water content 0.00502513, wet mass 1 kg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
  note on aluminium content: The value of 'aluminium content' is documented in Turner & Symeonidis, 2020. Reference: Turner David & Symeonidis Avraam, 2020, Life cycle inventories of the treatment of iron and steelmaking by-products, ecoinvent association, Zürich, Switzerland
  note on calcium content: The value of 'calcium content' is documented in Turner & Symeonidis, 2020. Reference: Turner David & Symeonidis Avraam, 2020, Life cycle inventories of the treatment of iron and steelmaking by-products, ecoinvent association, Zürich, Switzerland
  note on iron content: The value of 'iron content' is documented in Turner & Symeonidis, 2020. Reference: Turner David & Symeonidis Avraam, 2020, Life cycle inventories of the treatment of iron and steelmaking by-products, ecoinvent association, Zürich, Switzerland
  note on magnesium content: The value of 'magnesium content' is documented in Turner & Symeonidis, 2020. Reference: Turner David & Symeonidis Avraam, 2020, Life cycle inventories of the treatment of iron and steelmaking by-products, ecoinvent association, Zürich, Switzerland
  note on manganese content: The value of 'manganese content' is documented in Turner & Symeonidis, 2020. Reference: Turner David & Symeonidis Avraam, 2020, Life cycle inventories of the treatment of iron and steelmaking by-products, ecoinvent association, Zürich, Switzerland
  note on oxygen content: The value of 'oxygen content' is documented in Turner & Symeonidis, 2020. Reference: Turner David & Symeonidis Avraam, 2020, Life cycle inventories of the treatment of iron and steelmaking by-products, ecoinvent association, Zürich, Switzerland
  note on silicon content: The value of 'silicon content' is documented in Turner & Symeonidis, 2020. Reference: Turner David & Symeonidis Avraam, 2020, Life cycle inventories of the treatment of iron and steelmaking by-products, ecoinvent association, Zürich, Switzerland
  note on sulfur content: The value of 'sulfur content' is documented in Turner & Symeonidis, 2020. Reference: Turner David & Symeonidis Avraam, 2020, Life cycle inventories of the treatment of iron and steelmaking by-products, ecoinvent association, Zürich, Switzerland
  note on titanium content: The value of 'titanium content' is documented in Turner & Symeonidis, 2020. Reference: Turner David & Symeonidis Avraam, 2020, Life cycle inventories of the treatment of iron and steelmaking by-products, ecoinvent association, Zürich, Switzerland
- cement factory: 5.36e-11 unit; lognormal variance with pedigree 0.51, pedigree (5,5,5,5,5)
  (same comment as for ground granulated blast furnace slag)
- diesel, burned in building machine: 0.00162534 MJ; lognormal variance with pedigree 0.0059, pedigree (2,2,3,5,2)
  (same comment as for ground granulated blast furnace slag)
  properties: heating value, net 1 MJ
- electricity, medium voltage: 4.61665e-6, 0.000525832, 6.66996e-5, 5.93238e-6, 0.000517239, 2.29759e-6, 0.000677791, 1.47275e-5, 0.000717784, 0.000365604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 kWh (74 suppliers, which the file names only by identifier); sum of these 0.0598335 kWh; lognormal variance with pedigree 0.0064, pedigree (2,3,3,5,2)
  (same comment as for ground granulated blast furnace slag)
- ethylene glycol: 6.76322e-8, 1.11847e-6 kg (2 suppliers, which the file names only by identifier); sum of these 1.1861e-6 kg; lognormal variance with pedigree 0.0059, pedigree (2,2,3,5,2)
  (same comment as for ground granulated blast furnace slag)
  properties: carbon content, fossil 0.387097, dry mass 1 kg, heating value, net 23.44 MJ, wet mass 1 kg
- hard coal: 1.76987e-5, 4.19977e-6, 1.378e-5, 0.000125258, 1.80611e-5, 3.90325e-5, 1.09317e-5 kg (7 suppliers, which the file names only by identifier); sum of these 0.000228961 kg; lognormal variance with pedigree 0.058, pedigree (4,5,5,5,1)
  (same comment as for ground granulated blast furnace slag)
  properties: carbon content, fossil 0.845, dry mass 0.94 kg, heating value, net 27.91 MJ, water content 0.0638298, wet mass 1 kg
  note on carbon content, fossil: C content 75-94% (specified in Tab 1.1, report 6, part VI). A mean content of 0.845 kg C/ kg dry hard coal was considered
  note on heating value, net: Based on the Characterization factor of Hard coal in the CED method
- heat, district or industrial, other than natural gas: 0.172245 MJ; lognormal variance with pedigree 0.0058, pedigree (2,3,3,5,1)
  (same comment as for ground granulated blast furnace slag)
  properties: heating value, net 1 MJ
- inert waste: -0.000821638, -0.000233097 kg (2 suppliers, which the file names only by identifier); sum of these -0.00105473 kg; lognormal variance with pedigree 0.3033, pedigree (2,2,1,5,2)
  (same comment as for ground granulated blast furnace slag)
  production volume; = ABS(PV_RP*BP_2/RP)
    (same comment as for ground granulated blast furnace slag)
  properties: dry mass 1 kg, wet mass 1 kg
- light fuel oil: 0.000366649, 7.61179e-5, 1.8032e-5, 2.6005e-6, 2.41499e-6 kg (5 suppliers, which the file names only by identifier); sum of these 0.000465815 kg; lognormal variance with pedigree 0.0059, pedigree (2,2,3,5,2)
  (same comment as for ground granulated blast furnace slag)
  properties: carbon content, fossil 0.862, dry mass 1 kg, heating value, net 42.6 MJ, wet mass 1 kg
- lubricating oil: 6.57636e-7, 3.12188e-6 kg (2 suppliers, which the file names only by identifier); sum of these 3.77952e-6 kg; lognormal variance with pedigree 0.0059, pedigree (2,2,3,5,2)
  (same comment as for ground granulated blast furnace slag)
  properties: carbon content, fossil 0.75, dry mass 1 kg, heating value, net 40.2 MJ, wet mass 1 kg
  note on carbon content, fossil: Lubricating oil is produced from diesel. C-content/dry mass of fats and oils considered 75%, from: ecoinvent v2.2 report, n 15a, pg 40
  note on heating value, net: Literature value, Source: IPCC 2006, 2006 IPCC Guidelines for National Greenhouse Gas Inventories, Prepared by the National Greenhouse Gas Inventories Programme, Eggleston H.S., Buendia L., Miwa K., Ngara T. and Tanabe K. (eds). Published: IGES, Japan
- natural gas, high pressure: 2.42956e-5, 4.09836e-5, 8.93978e-5, 2.99177e-5, 6.99164e-6, 4.16128e-5, 3.99307e-5, 0.000104999, 3.55892e-6, 4.05365e-5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 m3 (38 suppliers, which the file names only by identifier); sum of these 0.00324066 m3; lognormal variance with pedigree 0.0059, pedigree (2,2,3,5,2)
  (same comment as for ground granulated blast furnace slag)
  properties: carbon content, fossil 0.741, dry mass 0.735 kg, heating value, gross 40 MJ, heating value, net 36 MJ, wet mass 0.735 kg
  note on heating value, gross: At standard conditions; based on Meili et al. (2022) section 5.2
- solvent, organic: 7.77738e-7 kg; lognormal variance with pedigree 0.0059, pedigree (2,2,3,5,2)
  (same comment as for ground granulated blast furnace slag)
  properties: carbon content, fossil 0.63072, dry mass 1 kg, heating value, net 19.11 MJ, wet mass 1 kg
- steel, low-alloyed: 0.000332296 kg; lognormal variance with pedigree 0.0059, pedigree (2,2,3,5,2)
  (same comment as for ground granulated blast furnace slag)
  properties: carbon content, fossil 0.005, dry mass 1 kg, wet mass 1 kg
- wastewater from ground granulated blast furnace slag production: -0.000331521 m3; name BP_3; lognormal variance with pedigree 0.3233, pedigree (2,2,1,5,2)
  (same comment as for ground granulated blast furnace slag)
  production volume; = ABS(PV_RP*BP_3/RP)
    (same comment as for ground granulated blast furnace slag)
  properties: carbon content, fossil 0.027074, dry mass 0.449139 kg, water content 2225.48, wet mass 1000 kg
  note on carbon content, fossil: TOC =0.01216 kg/m3 (Tab A.20, ecoinvent v2.2 report 13_I). TOC was considered as Total Carbon.

## Inputs from nature
- Water, unspecified natural origin [natural resource, in water]: 0.000567323 m3; lognormal variance with pedigree 0.0458, pedigree (3,3,5,5,2)
  (same comment as for ground granulated blast furnace slag)

## Emissions to nature
- Carbon dioxide, fossil [air, non-urban air or from high stacks]: 0.0192764 kg; lognormal variance with pedigree 0.0833, pedigree (2,2,5,5,2)
  (same comment as for ground granulated blast furnace slag)
- Carbon monoxide, fossil [air, unspecified]: 5.13035e-5 kg; lognormal variance with pedigree 0.6933, pedigree (2,2,5,5,2)
  (same comment as for ground granulated blast furnace slag)
- Hydrogen sulfide [air, unspecified]: 9.74904e-5 kg; lognormal variance with pedigree 0.0453, pedigree (2,2,3,5,2)
  (same comment as for ground granulated blast furnace slag)
- Methane, fossil [air, unspecified]: 4.95591e-7 kg; lognormal variance with pedigree 0.0453, pedigree (2,2,3,5,2)
  (same comment as for ground granulated blast furnace slag)
- NMVOC, non-methane volatile organic compounds [air, unspecified]: 2.87588e-7 kg; lognormal variance with pedigree 0.0833, pedigree (2,2,5,5,2)
  (same comment as for ground granulated blast furnace slag)
- Nitrogen oxides [air, unspecified]: 2.27806e-6 kg; lognormal variance with pedigree 0.0833, pedigree (2,2,5,5,2)
  (same comment as for ground granulated blast furnace slag)
- Particulate Matter, > 2.5 um and < 10um [air, unspecified]: 1.43556e-6 kg; lognormal variance with pedigree 0.3053, pedigree (2,2,3,5,2)
  (same comment as for ground granulated blast furnace slag)
- Sulfur dioxide [air, unspecified]: 0.000217452 kg; lognormal variance with pedigree 0.0833, pedigree (2,2,5,5,2)
  (same comment as for ground granulated blast furnace slag)
- Water [air, unspecified]: 5.44801e-5 m3; lognormal variance with pedigree 0.132, pedigree (4,4,5,5,4)
  (same comment as for ground granulated blast furnace slag)
- Water [water, unspecified]: 0.000181322 m3; lognormal variance with pedigree 0.132, pedigree (4,4,5,5,4)
  (same comment as for ground granulated blast furnace slag)

## Sampling procedure
This dataset was built as a weighted average of regional datasets of the same activityName. Weights are based on production volumes.
IN: production volume = 5.39e+09 kg/year, weight = 0.6382
US: production volume = 3e+09 kg/year, weight = 0.3554
ZA: production volume = 5.4e+07 kg/year, weight = 0.006387

## Extrapolations
This dataset was built as a weighted average of regional datasets of the same activityName. See sampling procedure for details.
Uncertainty has been adjusted accordingly.
