# acetic acid production, methanol carboxylation (Monsanto), product in 98% solution state

Dataset: EcoSpold 2, unit process
Geography: RoW
Time period: 1989-01-01 to 2023-12-31
Technology level: current
Classification: ISIC rev.4 ecoinvent: 2011:Manufacture of basic chemicals
Synonyms: Acetic acid; Ethylic acid; Methanecarboxylic acid; Ethanoic acid; Vinegar acid; Glacial acetic acid
Scenario: Business-as-Usual
System model: Allocation, cut-off by classification
Generated by: Iasonas Ioannou
Published in: Althaus H.-J. 2007
Database: ecoinvent
isCopyrightProtected: true
accessRestrictedTo: 1

## General comment
This dataset represents the production of 1 kg of acetic acid by methanol carbonylation using the Monsanto process. Acetic acid (CH3COOH) is a clear, colorless, corrosive liquid that has a pungent vinegar-like odor. It is found in dilute solutions in many plant and animal systems. Vinegar (4–12% acetic acid solutions produced by the fermentation of wines) has been known for more than 5000 years. Acetic acid is mainly used for the production of vinyl acetate and acetic anhydride. In the Celanese process (which was developed based on the Monsanto process), acetic acid is produced by carbonylation of methanol, using rhodium as catalyst (Le Berre et al. 2014).
In this dataset, the raw material inputs, and process-specific material exchanges, are modelled with a generic stoichiometry-based tool, using literature or estimated yields. The emissions are modelled with a default value, which is estimated based on losses, unreacted chemicals, among others. At the same time, the energy consumption is based on data from literature sources. Finally, the auxiliary (i.e., cooling water and infrastructure) exchanges are modelled with a default value based on industry data from literature sources. For more information on the calculations refer to the sampling procedure.
References:
Althaus H.-J., Chudacoff M., Hischier R., Jungbluth N., Osses M. and Primas A. (2007) Life Cycle Inventories of Chemicals. ecoinvent report No. 8, v2.0. EMPA Dübendorf, Swiss Centre for Life Cycle Inventories, Dübendorf, CH.
Le Berre, C., Serp, P., Kalck, P. and Torrence, G. P. 2014. Acetic Acid. Ullmann's Encyclopedia of Industrial Chemistry.

## Included activities start
The activity starts when the raw materials enter the process.

## Included activities end
The activity ends with acetic acid being ready for further transformation or transportation at the production site gate. Materials entering the process are included as well as energy uses, infrastructure and emissions.

## Geography
The inventory is modelled at the Global level. The main material inputs and outputs of this activity are generated with on a generic stoichiometry-based model, using literature or estimated yields. Furthermore, the source of information for the heat and electricity inputs is literature data for the specific technology. Finally, the main source of information for the values for water (process and cooling), nitrogen, chemical factory is industry data from the GENDORF Chemical Park, which is based in Germany and produced an average of 2462760 tonnes of chemical substances in the years 2015-2019. For more information on the calculations refer to the sampling procedure.
The dataset could also be considered as not geography-specific, and thus, valid for a broader geographical coverage.
References:
Hischier, R. (2005) Establishing Life Cycle Inventories of Chemicals Based on Differing Data Availability (9 pp). The International Journal of Life Cycle Assessment, Volume 10, Issue 1, pp 59-67. 10.1065/lca2004.10.181.7
Chemiepark GENDORF, Umwelterklärung 2016, https://www.gendorf.de/Nachbarn/Umweltschutz/Industrie%20und%20Nachhaltigkeit
Chemiepark GENDORF, Umwelterklärung 2017, https://www.gendorf.de/Nachbarn/Umweltschutz/Industrie%20und%20Nachhaltigkeit
Chemiepark GENDORF, Umwelterklärung 2020, https://www.gendorf.de/Nachbarn/Umweltschutz/Industrie%20und%20Nachhaltigkeit
Chauvel, Alain, Gilles Lefebvre, and L. Castex in "Petrochemical processes. Technical and economical characteristics Vol. 2." (1989)

## Technology
The Monsanto process, with rhodium catalyst and methyl iodide promoter, catalyzes the carbonylation of methanol and is one of the most widely adopted technologies for the global production of acetic acid (Althaus, 2007), the reaction of which is as follows:
CH3OH + CO → CH3COOH, ΔH = -0.1386 MJ
The older BASF process uses a cobalt catalyst. In 2000, BP has started producing acetic acid using the Cativa process, which uses a promoted iridium catalyst package instead of the rhodium complex. (Jones, 2000)
The operating conditions of this homogeneous catalytic carbonylation reaction (Monsanto process) spans from 30–60 bar and at temperatures of 150–200 °C and gives selectivity of over 99% based on methanol (Le Berre,2014). Methanol carbonylation in polar solvents is preferred (i.e., acetic acid/water solvent medium). A small amount of methanol may be loss due to side reactions with propionic acid as the main product. The carbon monoxide is lost in the reaction with water to carbon dioxide and hydrogen.
In this dataset, a yield of 95% was assumed.
References:
Le Berre, C., Serp, P., Kalck, P. and Torrence, G. P. 2014. Acetic Acid. Ullmann's Encyclopedia of Industrial Chemistry.
Jones, Jane H. "The Cativa™ process for the manufacture of acetic acid." Platinum Metals Review 44.3 (2000): 94-105.
Althaus H.-J., Chudacoff M., Hischier R., Jungbluth N., Osses M. and Primas A. (2007) Life Cycle Inventories of Chemicals. Final report ecoinvent data v2.0 No. 8. Swiss Centre for Life Cycle Inventories, Dübendorf, CH.

## Time period
The time period spans from the earliest year from which at least one of the input values was obtained until 2022, but overall form the most realistic picture of the production. Besides, the activity is partly generated, in terms of material inputs and outputs, based on a generic stoichiometry-based model, using literature or estimated yields, which does not expect to change over time.
The source of information for the heat and electricity inputs is literature data (from 1989) for the specific technology. Finally, the main source of information for the values for water (process and cooling), nitrogen, chemical factory is industry data from the GENDORF Chemical Park. The values are a 5-year average of data from 2015 to 2019 published by the GENDORF Chemical Park, which is based in Germany and produced an average of 2462760 tonnes of chemical substances in the years 2015-2019. The end time period is therefore set based on the years from Gendorf reference.
For more information on the calculations refer to the sampling procedure and in the comments of the exchanges.
References:
Hischier, R. (2005) Establishing Life Cycle Inventories of Chemicals Based on Differing Data Availability (9 pp). The International Journal of Life Cycle Assessment, Volume 10, Issue 1, pp 59-67. 10.1065/lca2004.10.181.7
Chemiepark GENDORF, Umwelterklärung 2016, https://www.gendorf.de/Nachbarn/Umweltschutz/Industrie%20und%20Nachhaltigkeit
Chemiepark GENDORF, Umwelterklärung 2017, https://www.gendorf.de/Nachbarn/Umweltschutz/Industrie%20und%20Nachhaltigkeit
Chemiepark GENDORF, Umwelterklärung 2020, https://www.gendorf.de/Nachbarn/Umweltschutz/Industrie%20und%20Nachhaltigkeit
Chauvel, Alain, Gilles Lefebvre, and L. Castex in "Petrochemical processes. Technical and economical characteristics Vol. 2." (1989)

## Reference product
- acetic acid, without water, in 98% solution state: 1 kg; name RP; By-product classification allocatable product; CPC 34120: Industrial monocarboxylic fatty acids; acid oils from refining; HS2017 382319: Industrial monocarboxylic fatty acids; acid oils from refining; (other than stearic acid, oleic acid or tal[...]; CAS 64-19-7
  Acetic acid (CH3COOH) is a clear, colorless, corrosive liquid that has a pungent vinegar-like odor. It is found in dilute solutions in many plant and animal systems. Vinegar (4–12% acetic acid solutions produced by the fermentation of wines) has been known for more than 5000 years. Acetic acid is mainly used for the production of vinyl acetate and acetic anhydride. References: Althaus H.-J., Chudacoff M., Hischier R., Jungbluth N., Osses M. and Primas A. (2007) Life Cycle Inventories of Chemicals. ecoinvent report No. 8, v2.0. EMPA Dübendorf, Swiss Centre for Life Cycle Inventories, Dübendorf, CH. Le Berre, C., Serp, P., Kalck, P. and Torrence, G. P. 2014. Acetic Acid. Ullmann's Encyclopedia of Industrial Chemistry.
  production volume 3e9 kg; name RP_PV
    Souce: http://en.wikipedia.org/wiki/Acetic_acid downloaded 23 April 2009. 75% is from methanol carbonylation
  property heating value, net 14.6 MJ
    Based on literature, page 10, Althaus H.-J., Chudacoff M., Hischier R., Jungbluth N., Osses M. and Primas A. (2007) Life Cycle Inventories of Chemicals. Final report ecoinvent data v2.0 No. 8. EMPA, Swiss Centre for Life Cycle Inventories, Dübendorf, CH, Online-Version under: www.ecoinvent.org.
  property price 0.479 EUR2005
    Calculated value based on data from United Nations Commodity Trade Statistics Database (comtrade.un.org). UN comtrade category: 291521 Acetic aicid. Prices from the year 2005. Using exchange rate of 1EURO = 1.209 USD. Average of price of import into 5 main markets (EU, US, JP, IN and CN).
  properties: allocation factor 0.980151, carbon allocation 0.400016 kg, carbon content 0.400016, carbon content, fossil 0.400016, carbon content, non-fossil 0, dry mass 1 kg, true value 0.479, water content 0, water in wet mass 0 kg, wet mass 1 kg

## Inputs from technosphere
- carbon monoxide: 0.486072 kg; lognormal variance with pedigree 0.0046, pedigree (2,3,2,5,2)
  Calculated value based on stoichiometric calculations and literature data. For more information on the calculations refer to the sampling procedure.
  properties: carbon content, fossil 0.428571, dry mass 1 kg, heating value, net 12.99 MJ, wet mass 1 kg
  note on carbon content, fossil: CO. It is assumed that CO is produced from partial combustion of heavy heating oil.
- chemical factory, organics: 3.92061e-10 unit; lognormal variance with pedigree 0.4248, pedigree (2,4,2,5,5)
  Calculated based on literature data published by the industry. For this activity, no information was readily available concerning infrastructure and land-use. Therefore, the infrastructure is estimated based on data from two chemical factories, the BASF site of Ludwigshafen and the chemical factory in Gendorf (which are both located in Germany), which produce a wide range of chemical substances. Based on this data, the following assumptions are made: the built area amounts to about 4.2 ha, the plant has an average output of 50'000 t/a and a lifespan of fifty years. The estimated infrastructure amount is therefore 4.00 E-10 units per kg of produced chemical. References: Althaus H.-J., Chudacoff M., Hischier R., Jungbluth N., Osses M. and Primas A. (2007) Life Cycle Inventories of Chemicals. ecoinvent report No. 8, v2.0. EMPA Dübendorf, Swiss Centre for Life Cycle Inventories, Dübendorf, CH. Gendorf (2000) Umwelterklärung 2000, Werk Gendorf. Werk Gendorf, Burgkirchen.
- electricity, medium voltage: 0.00586317, 0.116957, 0.0392972, 0.0017955, 0.000359368, 7.71644e-5, 0.0120776 kWh (7 suppliers, which the file names only by identifier); sum of these 0.176427 kWh; lognormal variance with pedigree 0.0046, pedigree (2,3,2,5,2)
  Value reported by Chauvel, Alain, Gilles Lefebvre, and L. Castex in "Petrochemical processes. Technical and economical characteristics Vol. 2." (1989).
- heat, from steam, in chemical industry: 5.39083 MJ; lognormal variance with pedigree 0.0046, pedigree (2,3,2,5,2)
  (same comment as for electricity, medium voltage)
  properties: heating value, net 1 MJ
- methanol: 0.177594, 0.344416, 0.0326199 kg (3 suppliers, which the file names only by identifier); sum of these 0.55463 kg; lognormal variance with pedigree 0.0046, pedigree (2,3,2,5,2)
  (same comment as for carbon monoxide)
  properties: carbon content, fossil 0.375, dry mass 1 kg, heating value, net 20 MJ, wet mass 1 kg
  note on heating value, net: Based on literature, page 533, Report 17: Jungbluth, N., Chudacoff, M., Dauriat, A., Dinkel, F., Doka, G., Faist Emmenegger, M., Gnansounou, E., Kljun, N., Schleiss, K., Spielmann, M., Stettler, C., Sutter, J. 2007: Life Cycle Inventories of Bioenergy. ecoinvent report No. 17, Swiss Centre for Life Cycle Inventories, Dübendorf, CH.
- wastewater, average: -2.22682e-6, -7.92832e-9 m3 (2 suppliers, which the file names only by identifier); sum of these -2.23475e-6 m3; lognormal variance with pedigree 0.1252, pedigree (2,4,1,5,5)
  Calculated based on literature data published by the GENDORF Chemical Park. The factory produced an average of 2462760 tonnes of chemical substances (including intermediates) per year in the years 2015-2019. The average ouput of wastewater going to an external wastewater treatment plant in the years 2015-2019 was 5608 m3 per year. This equals 0.000002277 m3/kg chemical produced. References: Chemiepark GENDORF, Umwelterklärung 2016, https://www.gendorf.de/Nachbarn/Umweltschutz/Industrie%20und%20Nachhaltigkeit Chemiepark GENDORF, Umwelterklärung 2017, https://www.gendorf.de/Nachbarn/Umweltschutz/Industrie%20und%20Nachhaltigkeit Chemiepark GENDORF, Umwelterklärung 2020, https://www.gendorf.de/Nachbarn/Umweltschutz/Industrie%20und%20Nachhaltigkeit
  production volume; = RP_PV * (WW / RP)
    Calculated from production volume of reference product using the relative outputs.
  properties: carbon content, non-fossil 0.194039, dry mass 0.346837 kg, mass concentration, TOC 0.1091 kg/m3, mass concentration, calcium 0.039453 kg/m3, mass concentration, chlorine 0.030031 kg/m3, mass concentration, hydrogen 0.013365 kg/m3, mass concentration, nitrogen 0.031015 kg/m3, mass concentration, oxygen 0.069824 kg/m3, mass concentration, sodium 0.06456 kg/m3, mass concentration, sulfur 0.015602 kg/m3, water content 2882.2, wet mass 1000 kg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
  note on carbon content, non-fossil: 0.0673 kg TOC/m3 (Tab A.17, ecoinvent v2.2 report 13_I). TOC was considered as Total Carbon.

## Inputs from nature
- Water, cooling, unspecified natural origin [natural resource, in water]: 0.122392 m3; name CW_u; = 0.891930591 * ( 140 / 1000 ); lognormal variance with pedigree 0.1254, pedigree (2,4,2,5,5)
  This value is estimated based on the cooling requirements reported by Chauvel, Alain, Gilles Lefebvre, and L. Castex in "Petrochemical processes. Technical and economical characteristics Vol. 2." (1989). The value of cooling water input for the latter process is 0.14 m3 per kg.
  At the same time, the latter amount was split between the following sources (1) "Water, cooling, unspecified natural origin", (2) "Water, river", and (3) "Water, well. in ground"
- Water, river [natural resource, in water]: 0.00803432 m3; name CW_r; = 0.058550155 * ( 140 / 1000 ); lognormal variance with pedigree 0.1254, pedigree (2,4,2,5,5)
  (same comment as for Water, cooling, unspecified natural origin)
- Water, well, in ground [natural resource, in water]: 0.00679509 m3; name CW_g; = 0.049519254 * ( 140 / 1000 ); lognormal variance with pedigree 0.1254, pedigree (2,4,2,5,5)
  (same comment as for Water, cooling, unspecified natural origin)

## Emissions to nature
- Carbon dioxide, fossil [air, unspecified]: 0.0790139 kg; lognormal variance with pedigree 0.006, pedigree (3,3,2,5,2)
  Calculated losses, based on the boiling point of a chemical, to water or to air. In addition, unreacted chemicals are assumed to go to wastewater treatment, which has a conversion rate in biological treatment of 95% of carbon into carbon dioxide. The remaining 5% are released as emissions to water.
- Carbon monoxide, fossil [air, unspecified]: 0.00363946 kg; lognormal variance with pedigree 0.006, pedigree (3,3,2,5,2)
  (same comment as for Carbon dioxide, fossil)
- Methanol [air, unspecified]: 0.00137469 kg; lognormal variance with pedigree 0.006, pedigree (3,3,2,5,2)
  (same comment as for Carbon dioxide, fossil)
- Water [air, unspecified]: 0.0122178 m3; = 0.089036947 * (CW_u + CW_r + CW_g ); lognormal variance with pedigree 0.1648, pedigree (2,4,2,5,5)
  Calculated value. This output flow is estimated based on the inputs. For more details, see Mathematical Relation.
  property fraction, origin: fresh water 0.00197047; name fraction_origin_fresh_water
  property fraction, origin: salt water 0; name fraction_origin_salt_water
  property fraction, origin: unspecified 0.99803; name fraction_origin_unspecified
- Acetic acid [water, unspecified]: 0.000245038 kg; lognormal variance with pedigree 0.006, pedigree (3,3,2,5,2)
  (same comment as for Carbon dioxide, fossil)
- BOD5, Biological Oxygen Demand [water, unspecified]: 0.00302378 kg; lognormal variance with pedigree 0.218, pedigree (4,5,5,5,5)
  Calculated value. The BOD, COD, TOC and BOD5 are calculated based on the amount and type of emissions released to water in the same activity.
- COD, Chemical Oxygen Demand [water, unspecified]: 0.00302378 kg; lognormal variance with pedigree 0.218, pedigree (4,5,5,5,5)
  (same comment as for BOD5, Biological Oxygen Demand)
- DOC, Dissolved Organic Carbon [water, unspecified]: 0.00113392 kg; lognormal variance with pedigree 0.218, pedigree (4,5,5,5,5)
  (same comment as for BOD5, Biological Oxygen Demand)
- Methanol [water, unspecified]: 0.00138314 kg; lognormal variance with pedigree 0.006, pedigree (3,3,2,5,2)
  (same comment as for Carbon dioxide, fossil)
- TOC, Total Organic Carbon [water, unspecified]: 0.00113392 kg; lognormal variance with pedigree 0.218, pedigree (4,5,5,5,5)
  (same comment as for BOD5, Biological Oxygen Demand)
- Water [water, unspecified]: 0.125003 m3; = 0.910963053 * (CW_u + CW_r + CW_g ); lognormal variance with pedigree 0.1648, pedigree (2,4,2,5,5)
  (same comment as for Water)
  property carbon content, fossil 0; name C_content_fossil
  property carbon content, non-fossil 0; name C_content_non_fossil
  property dry mass 0 kg; name DM
  property fraction, origin: fresh water 0.00197047; name fraction_origin_fresh_water_Ww
  property fraction, origin: salt water 0; name fraction_origin_salt_water_Ww
  property fraction, origin: unspecified 0.99803; name fraction_origin_unspecified_Ww
  property water in wet mass 1000 kg; name WWM
  property wet mass 1000 kg; name WM

## Sampling procedure
Literature data and stoichiometric calculation. This inventory is partially based on a generic model of the production of chemicals. The data generated by this model have been improved with compound-specific data when available. The model of the production of chemicals is using specific industry or literature data wherever possible and more generic data on chemical production processes to fill compound-specific data gaps when necessary. The basic principles of the model have been published in literature (Hischier, 2005). The model has been updated and extended with newly available data from the chemical industry. In the model, unreacted fractions are treated in a waste treatment process, and emissions reported are after a waste treatment process that is included in the scope of this dataset. For volatile reactants, a small level of evaporation is assumed. Solvents and catalysts are mostly recycled in closed-loop systems within the scope of the dataset and reported flows are for losses from this system.
The source of information for the heat and electricity inputs is literature data (from 1989) for the specific technology. Finally, the main source of information for the values for water (process and cooling), nitrogen, and chemical factory is industry data from the GENDORF Chemical Park. The values are a 5-year average of data from 2015 to 2019 published by the GENDORF Chemical Park, which is based in Germany and produced an average of 2462760 tonnes of chemical substances in the years 2015-2019. For more information refer to the comments of the exchanges.

References:
Hischier, R. (2005) Establishing Life Cycle Inventories of Chemicals Based on Differing Data Availability (9 pp). The International Journal of Life Cycle Assessment, Volume 10, Issue 1, pp 59-67. 10.1065/lca2004.10.181.7
Chemiepark GENDORF, Umwelterklärung 2016, https://www.gendorf.de/Nachbarn/Umweltschutz/Industrie%20und%20Nachhaltigkeit
Chemiepark GENDORF, Umwelterklärung 2017, https://www.gendorf.de/Nachbarn/Umweltschutz/Industrie%20und%20Nachhaltigkeit
Chemiepark GENDORF, Umwelterklärung 2020, https://www.gendorf.de/Nachbarn/Umweltschutz/Industrie%20und%20Nachhaltigkeit
Chauvel, Alain, Gilles Lefebvre, and L. Castex in "Petrochemical processes. Technical and economical characteristics Vol. 2." (1989)

## Extrapolations
This dataset has been copied from an original dataset covering the geography RER. The uncertainty has been adjusted accordingly.
