# treatment of inert waste, inert material landfill

Dataset: EcoSpold 2, unit process
Geography: CH
Time period: 1995-01-01 to 2023-12-31
Technology level: current
Classification: ISIC rev.4 ecoinvent: 3821:Treatment and disposal of non-hazardous waste
Scenario: Business-as-Usual
System model: Allocation, cut-off by classification
Generated by: Gabor Doka (obsolete)
Published in: Doka G. 2007
Database: ecoinvent
isCopyrightProtected: true
accessRestrictedTo: 1

## General comment
This dataset represents the activity of waste disposal of 'inert waste, for final disposal' in an inert material landfill.

## Included activities start
The activity starts with the waste being available at the gate of the treatment facility. Collection and transportation of the waste to the treatment plant is not included.

## Included activities end
The activity ends with the waste being treated and no direct emissions from inert material landfill (leachate) are inventoried, as they are considered negligible. The dataset contains only exchanges to process-specific burdens (energy, land use) and infrastructure.

## Geography
Modelling parameters affecting the treatment technology are specific to this geography and to the technology mix encountered in Switzerland in 2000.

## Technology
Inert material landfill with leachate collection system and renaturation after closure. 50% of the sites is equipped with a base seal.

## Reference product
- inert waste, for final disposal: -1 kg; By-product classification Waste; CPC 39990: Other wastes n.e.c.
  production volume 1.703e9 kg
    Estimated data. Accoridng to EMPA (2015) the total amount of C&D waste that was sent to landfill in Switzerland in 2012 was of 1703 thousand tons. The report cites as a source: “Author’s extrapolations using the data available in (FOEN, 2008)”. The report mentions that all C&D waste is sent to an inert material landfill. EMPA, 2015. Nanomaterials in Landfills Module 3: Nanomaterials in Construction Waste. EMPA, Swiss Federal Laboratories for Materials Science and Technology. FOEN, 2008. Bauabfälle Hochbau in der Schweiz. Ergebnisse der Studie 2008, in: Wüest&Partner (Ed.). Bundesamt für Umwelt (BAFU), Schweiz.
  property price 0 EUR2005
    Waste products are assigned a price of zero as they are assumed to require further treatment.
  properties: carbon allocation 0 kg, carbon content 0, carbon content, fossil 0, carbon content, non-fossil 0, dry mass 0.995 kg, water content 0.00502513, water in wet mass 0.005 kg, wet mass 1 kg

## Inputs from technosphere
- inert material landfill: 1.48e-9 unit; lognormal variance with pedigree 0.04, pedigree (1,1,5,1,1)
  landfill infrastructure per kg waste, uncerteinty heeded in module. This exchange has an activity link directly to the producing activity because the product is primarily consumed in the same geographical area where it is produced.
- process-specific burdens, inert material landfill: 1 kg; lognormal variance with pedigree 0.04, pedigree (1,1,5,1,1)
  process-specific burdens per kg waste, uncerteinty heeded in module.;activityLink introduced to establish a direct link to the corresponding regional supply of this product

## Review by Niels Jungbluth 2003-05-28
Passed.

## Review by Emilia Moreno Ruiz 2015-10-16
PV adjusted
