# treatment of scrap tin sheet, sanitary landfill

Dataset: EcoSpold 2, unit process
Geography: PE
Time period: 1994-01-01 to 2023-01-01
Technology level: current
Classification: ISIC rev.4 ecoinvent: 3821:Treatment and disposal of non-hazardous waste
Scenario: Business-as-Usual
System model: Allocation, cut-off by classification
Generated by: Nikolia Stoikou
Database: ecoinvent
isCopyrightProtected: true
accessRestrictedTo: 1

## General comment
This dataset represents the activity of waste disposal of 'scrap tin sheet' in a sanitary landfill. Recommended use of this dataset: for disposal of tin sheet packaging (tin cans, paint buckets) but without paper parts (please inventory any paper separately), which go to disposal as part of communal waste. Larger amounts of separated tin sheet will not be disposed in incinerators or landfills, but rather go to recycling. Inventoried waste contains several fractions: 99.8% tin sheet inert; 0.195% tin volatile. Waste composition (wet, in ppmw): H2O na; O na; H na; C na; S na; N na; P na; B na; Cl 750; Br na; F na; I na; Ag na; As na; Ba na; Cd 30; Co na; Cr na; Cu 199; Hg na; Mn na; Mo na; Ni na; Pb 380; Sb na; Se na; Sn 3900; V na; Zn 202; Be na; Sc na; Sr na; Ti na; Tl na; W na; Si na; Fe 994570; Ca na; Al na; K na; Mg na; Na na. Share of carbon in initial waste waste that is biogenic 60.4%. Also includes recursive controlled landfilling of higher order (tertiary) sewage sludge from purification in wastewater treatment from the treatment chain WWT<-SLF<-WWT<-SLF. Share of metals in waste not oxidised and bulk-recyclable (exclude very small or thin parts) Iron: 100%; Alu: 0%; Copper: 0%. Overall degradability of waste during 100 years: 50%. Degradability of composing waste fractions: tin sheet inert: 50%; tin volatile: 50%. Landfill gas capture and utilisation generates 0.000007058 kWh of electricity and 0.00001273 MJ of useful heat. 0 kg waste mass remains in the landfill even after the long term period.

## Included activities start
The activity starts with the waste being available at the gate of the treatment facility. Collection and transportation of the waste to the treatment plant is not included.

## Included activities end
The activity ends with the waste being treated and waste-specific emissions from the landfill are released to the environment (air due to landfil gas, water due to landfil leachate, and subsequent into groundwater).

## Geography
This site has mean annual temperature (MAT) of 19.72 degC, mean annual precipitation (MAP) of 1606.64 mm/year, and net infiltration of 958.64 mm/year. The leachate percolating through the landfill has an average residence time of 5.22 years.
World Bank, 2021. Observed Climatology of Mean-Temperature 1991-2020 Peru, Climate Change Knowledge Portal for Development Practisioners and Policy Makers, The World Bank Group Available at: https://climateknowledgeportal.worldbank.org/country/peru/climate-data-historical
Arias, P.A., Garreaud, R., Poveda, G., Espinoza, J.C., Molina-Carpio, J., Masiokas, M., Viale, M., Scaff, L. and Van Oevelen, P.J., 2021. Hydroclimate of the Andes part II: Hydroclimate variability and sub-continental patterns. Frontiers in Earth Science, 8, p.666. Available at: https://www.frontiersin.org/articles/10.3389/feart.2020.505467/full

## Technology
This is an inventory for a sanitary (controlled) landfill for municipal solid waste. Ultimate average landfill height is 20 meters. Operation phase duration is 30 years. The total raw landfill gas mass produced in the landfill from this waste is 0.0004336 kg. The total CH4 mass in the raw landfill gas is 0.000009033 kg. Percentage of landfill gas directly emitted is 47w%. Percentage of landfill gas captured and flared is 18.02w%. Percentage of landfill gas captured and utilised is 34.98%. Conversion efficiencies are 27.8e% for electricity and 13.5e% for useful heat. Leachate collected during the first 100 years is collected and treated region-specifically before emission. Based on average waste composition and climate data the end of carbonate phase is estimated to be reached 2'374 years after waste deposition.

## Reference product
- scrap tin sheet: -1 kg; By-product classification Waste; CPC 39366: Waste and scrap of tin; HS2017 800200: Tin; waste and scrap
  Main reference product of this activity
  production volume 0.001619 kg
    Calculated from the global production volume using the Peruvian GDP as sclaling factor. 50 * 0.323%
  property price 0 EUR2005
    Waste products are assigned a price of zero as they are assumed to require further treatment.
  properties: cadmium content 3.08547e-5, carbon allocation 1.55069e-5 kg, carbon content 1.56553e-5, carbon content, fossil 1.56553e-5, carbon content, non-fossil 0, chlorine content 0.000747587, copper content 0.000198526, dry mass 0.990521 kg, hydrogen content 2.18915e-6, iron content 0.993813, lead content 0.000379176, nitrogen content 6.6402e-6, oxygen content 0.000711715, tin content 0.00389153, water content 0.00956941, water in wet mass 0.0094787 kg, wet mass 1 kg, zinc content 0.000202943

## Inputs from technosphere
- cast iron: 1.49386e-6 kg; lognormal variance with pedigree 0.32902, pedigree (1,1,4,1,1)
  For sewer auxiliary materials.
  Uncertainty: Uncertainty calculated from uncertainty in base parameters.
  properties: carbon content, fossil 0.04, dry mass 1 kg, wet mass 1 kg
- concrete, 30MPa: 1.44729e-7 m3; lognormal variance with pedigree 0.32902, pedigree (1,1,4,1,1)
  For leachate collection tanks and sewer pipe.
  Uncertainty: Uncertainty calculated from uncertainty in base parameters.
  properties: dry mass 2205 kg, water content 0.0816327, wet mass 2385 kg
- diesel, burned in building machine: 0.0490059 MJ; lognormal variance with pedigree 0.32902, pedigree (1,1,4,1,1)
  For waste distribution and compaction, construction diesel for base and compartment seals, for access street and sewer construction.
  Uncertainty: Uncertainty calculated from uncertainty in base parameters.
  properties: heating value, net 1 MJ
- electricity, low voltage: 1.5192e-5 kWh; lognormal variance with pedigree 0.028756, pedigree (1,1,4,1,1)
  Administrative building electricity consumption.
  Uncertainty: Uncertainty calculated from uncertainty in base parameters.
- excavation, hydraulic digger: 0.000392709 m3; lognormal variance with pedigree 0.32902, pedigree (1,1,4,1,1)
  Excavation work for landfill construction, sewer construction and recultivation.
  Uncertainty: Uncertainty calculated from uncertainty in base parameters.
- excavation, skid-steer loader: 0.000392709 m3; lognormal variance with pedigree 0.32902, pedigree (1,1,4,1,1)
  (same comment as for excavation, hydraulic digger)
- extrusion, plastic pipes: 8.60263e-5 kg; lognormal variance with pedigree 0.32902, pedigree (1,1,4,1,1)
  For base and interior drain system of landfill, sewer auxiliary materials.
  Uncertainty: Uncertainty calculated from uncertainty in base parameters.
- gravel, round: 0.162192 kg; lognormal variance with pedigree 0.32902, pedigree (1,1,4,1,1)
  For base and flank gravel beds and concrete, for access street, for drainage beds, for recultivation layer.
  Uncertainty: Uncertainty calculated from uncertainty in base parameters.
  properties: dry mass 1 kg, wet mass 1 kg
- heat, district or industrial, other than natural gas: 0.00163089 MJ; lognormal variance with pedigree 0.028756, pedigree (1,1,4,1,1)
  Administrative building space heat demand.
  Uncertainty: Uncertainty calculated from uncertainty in base parameters.
  properties: heating value, net 1 MJ
- leachate, SLF, scrap tin sheet: -0.0048678 m3
  Landfill leachate captured during short-term sent to wastewater treatment.
  production volume
    calculated in proportion to incinerated waste input
  properties: carbon content, non-fossil 7.48453e-6, dry mass 1.56734 kg, fossil share of carbon 1, mass concentration, cadmium 5.62877e-7 kg/m3, mass concentration, chlorine 0.00015194 kg/m3, mass concentration, iron 0.00140724 kg/m3, mass concentration, nitrogen 1.28036e-6 kg/m3, mass concentration, oxygen 2.56319e-6 kg/m3, mass concentration, tin 2.36336e-6 kg/m3, mass concentration, zinc 9.92191e-7 kg/m3, water content 637.025, wet mass 1000 kg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
- pitch: 0.00241806 kg; lognormal variance with pedigree 0.32902, pedigree (1,1,4,1,1)
  For base and compartment seals and access street construction.
  Uncertainty: Uncertainty calculated from uncertainty in base parameters.
  properties: carbon content, fossil 0.83, dry mass 1 kg, heating value, net 28 MJ, wet mass 1 kg
- polyethylene, high density, granulate: 0.000271929 kg; lognormal variance with pedigree 0.32902, pedigree (1,1,4,1,1)
  For base and compartment seals, for base and interior drain system of landfill, sewer auxiliary materials.
  Uncertainty: Uncertainty calculated from uncertainty in base parameters.
  properties: carbon content, fossil 0.857143, dry mass 1 kg, heating value, net 42.47 MJ, wet mass 1 kg
- polypropylene, granulate: 2.26343e-7 kg; lognormal variance with pedigree 0.32902, pedigree (1,1,4,1,1)
  (same comment as for cast iron)
  properties: carbon content, fossil 0.857143, dry mass 1 kg, heating value, net 32.78 MJ, wet mass 1 kg
  note on heating value, net: Value extracted from "treatment of waste polypropylene, open burning"
- polyvinylchloride, bulk polymerised: 2.26343e-7 kg; lognormal variance with pedigree 0.32902, pedigree (1,1,4,1,1)
  (same comment as for cast iron)
  properties: carbon content, fossil 0.387097, dry mass 1 kg, heating value, net 21.5 MJ, wet mass 1 kg
- reinforcing steel: 8.82737e-6 kg; lognormal variance with pedigree 0.32902, pedigree (1,1,4,1,1)
  (same comment as for cast iron)
  properties: carbon content, fossil 0.004, dry mass 1 kg, wet mass 1 kg
- sand: 6.77218e-5 kg; lognormal variance with pedigree 0.32902, pedigree (1,1,4,1,1)
  (same comment as for cast iron)
  properties: dry mass 1 kg, wet mass 1 kg
- steel, chromium steel 18/8, hot rolled: 3.07826e-6 kg; lognormal variance with pedigree 0.32902, pedigree (1,1,4,1,1)
  (same comment as for cast iron)
  properties: carbon content, fossil 0.0008, dry mass 1 kg, wet mass 1 kg
- synthetic rubber: 9.05372e-8 kg; lognormal variance with pedigree 0.32902, pedigree (1,1,4,1,1)
  (same comment as for cast iron)
  properties: carbon content, fossil 0.871949, dry mass 1 kg, heating value, net 26.42 MJ, wet mass 1 kg
- tap water: 0.0018815 kg; lognormal variance with pedigree 0.32902, pedigree (1,1,4,1,1)
  (same comment as for cast iron)
  properties: carbon content, fossil 0.00178991, dry mass 0.000337476 kg, water content 2962.17, wet mass 1 kg

## Inputs from nature
- Organic carbon, placed in landfill [inventory indicator, waste]: 1.57054e-5 kg; lognormal variance with pedigree 0.29773, pedigree (1,1,4,1,1)
  Mass of organic carbon in waste (without inorganic carbon), initially (year 1) put in sanitary landfill. The exchange represents a flow that is within the technosphere. This exchange should only be used to apply ecofactors for the Swiss LCIA method of Ecological Scarcity and not any other purpose.
  Uncertainty: uncertainty is derived from uncertainty in waste composition and flows.
- Waste mass, total, placed in landfill [inventory indicator, waste]: 1.0128 kg
  Mass of waste initially (year 1) put in sanitary landfill. The exchange represents a flow that is within the technosphere. This exchange should only be used to apply ecofactors for the Swiss LCIA method of Ecological Scarcity and not any other purpose.
- Occupation, construction site [natural resource, land]: 0.0002532 m2*year; lognormal variance with pedigree 0.32902, pedigree (1,1,4,1,1)
  For construction phase of the landfill.
  Uncertainty: Uncertainty calculated from uncertainty in base parameters.
- Occupation, dump site [natural resource, land]: 0.0015192 m2*year; lognormal variance with pedigree 0.32902, pedigree (1,1,4,1,1)
  For landfill operation phase.
  Uncertainty: Uncertainty calculated from uncertainty in base parameters.
- Occupation, shrub land, sclerophyllous [natural resource, land]: 0.0002532 m2*year; lognormal variance with pedigree 0.32902, pedigree (1,1,4,1,1)
  Restoration and aftercare phase.
  Uncertainty: Uncertainty calculated from uncertainty in base parameters.
- Occupation, traffic area, road network [natural resource, land]: 0.00187368 m2*year; lognormal variance with pedigree 0.32902, pedigree (1,1,4,1,1)
  For access road.
  Uncertainty: Uncertainty calculated from uncertainty in base parameters.
- Transformation, from dump site, sanitary landfill [natural resource, land]: 5.064e-5 m2; lognormal variance with pedigree 0.32902, pedigree (1,1,4,1,1)
  Conversion after landfill operation.
  Uncertainty: Uncertainty calculated from uncertainty in base parameters.
- Transformation, from pasture, man made [natural resource, land]: 6.0768e-5 m2; lognormal variance with pedigree 0.32902, pedigree (1,1,4,1,1)
  Original conversion of landfill area and access road.
  Uncertainty: Uncertainty calculated from uncertainty in base parameters.
- Transformation, from shrub land, sclerophyllous [natural resource, land]: 5.064e-5 m2; lognormal variance with pedigree 0.32902, pedigree (1,1,4,1,1)
  After restoration.
  Uncertainty: Uncertainty calculated from uncertainty in base parameters.
- Transformation, to dump site, sanitary landfill [natural resource, land]: 5.064e-5 m2; lognormal variance with pedigree 0.32902, pedigree (1,1,4,1,1)
  Conversion to landfill area.
  Uncertainty: Uncertainty calculated from uncertainty in base parameters.
- Transformation, to forest, unspecified [natural resource, land]: 5.064e-5 m2; lognormal variance with pedigree 0.32902, pedigree (1,1,4,1,1)
  Conversion to forest after renaturation.
  Uncertainty: Uncertainty calculated from uncertainty in base parameters.
- Transformation, to shrub land, sclerophyllous [natural resource, land]: 5.064e-5 m2; lognormal variance with pedigree 0.32902, pedigree (1,1,4,1,1)
  Initial restoration and renaturation.
  Uncertainty: Uncertainty calculated from uncertainty in base parameters.
- Transformation, to traffic area, road network [natural resource, land]: 1.0128e-5 m2; lognormal variance with pedigree 0.32902, pedigree (1,1,4,1,1)
  Construction of access road.
  Uncertainty: Uncertainty calculated from uncertainty in base parameters.

## Emissions to nature
- Cadmium II [air, non-urban air or from high stacks]: 1.82665e-8 kg; lognormal variance with pedigree 1.815, pedigree (1,1,4,1,1)
  Emission from direct release or combustion of landfill biogas.
  Uncertainty: Uncertainty calculated from uncertainty of the waste composition of this waste, uncertainty in waste decomposition and short-term leaching in landfill-
- Carbon dioxide, fossil [air, non-urban air or from high stacks]: 2.47185e-5 kg; lognormal variance with pedigree 0.30991, pedigree (1,1,4,1,1)
  (same comment as for Cadmium II)
- Carbon monoxide, fossil [air, non-urban air or from high stacks]: 1.5081e-9 kg; lognormal variance with pedigree 0.95688, pedigree (1,1,4,1,1)
  (same comment as for Cadmium II)
- Copper ion [air, non-urban air or from high stacks]: 1.39342e-10 kg; lognormal variance with pedigree 2.4834, pedigree (1,1,4,1,1)
  (same comment as for Cadmium II)
- Heat, waste [air, non-urban air or from high stacks]: 0.000144687 MJ
  Emission from direct release or incineration of landfill biogas.
- Hydrochloric acid [air, non-urban air or from high stacks]: 1.06608e-5 kg; lognormal variance with pedigree 1.0297, pedigree (1,1,4,1,1)
  (same comment as for Cadmium II)
- Iron ion [air, non-urban air or from high stacks]: 1.71254e-6 kg; lognormal variance with pedigree 1.498, pedigree (1,1,4,1,1)
  (same comment as for Cadmium II)
- Lead II [air, non-urban air or from high stacks]: 3.73616e-10 kg; lognormal variance with pedigree 2.3538, pedigree (1,1,4,1,1)
  (same comment as for Cadmium II)
- Methane, fossil [air, non-urban air or from high stacks]: 3.2078e-6 kg; lognormal variance with pedigree 0.35044, pedigree (1,1,4,1,1)
  (same comment as for Cadmium II)
- NMVOC, non-methane volatile organic compounds [air, non-urban air or from high stacks]: 2.85317e-11 kg; lognormal variance with pedigree 0.35044, pedigree (1,1,4,1,1)
  (same comment as for Cadmium II)
- Nitrogen oxides [air, non-urban air or from high stacks]: 3.65796e-9 kg
  Emission from direct release or combustion of landfill biogas.
- Particulate Matter, < 2.5 um [air, non-urban air or from high stacks]: 5.06292e-10 kg; lognormal variance with pedigree 0.61107, pedigree (1,1,4,1,1)
  (same comment as for Cadmium II)
- Tin ion [air, non-urban air or from high stacks]: 2.87609e-9 kg; lognormal variance with pedigree 2.0894, pedigree (1,1,4,1,1)
  (same comment as for Cadmium II)
- Zinc II [air, non-urban air or from high stacks]: 1.07329e-9 kg; lognormal variance with pedigree 2.2116, pedigree (1,1,4,1,1)
  (same comment as for Cadmium II)
- Non-hazardous waste disposed [inventory indicator, waste]: 1.0128 kg
  Inventory indicator for waste mass disposed in landfill. To be used in EN15804 "other data" results.
- Ammonium [water, ground-, long-term]: 2.71616e-15 kg; lognormal variance with pedigree 2.1788, pedigree (1,1,4,1,1)
  Emissions from long-term leachate (>100a).
  Uncertainty: Uncertainty calculated from uncertainty of the waste composition of this waste, uncertainty in waste decomposition and short-term leaching in landfill
- BOD5, Biological Oxygen Demand [water, ground-, long-term]: 1.62671e-6 kg; lognormal variance with pedigree 0.31256, pedigree (1,1,4,1,1)
  Emissions from long-term leachate (>100a).
  Uncertainty: Uncertainty calculated from uncertainty of the waste composition of this waste, uncertainty in waste decomposition and short-term leaching in landfill.
- COD, Chemical Oxygen Demand [water, ground-, long-term]: 6.87147e-6 kg; lognormal variance with pedigree 0.31256, pedigree (1,1,4,1,1)
  (same comment as for Ammonium)
- Cadmium II [water, ground-, long-term]: 2.81952e-5 kg; lognormal variance with pedigree 1.094, pedigree (1,1,4,1,1)
  (same comment as for Ammonium)
- Chloride [water, ground-, long-term]: 7.4998e-13 kg; lognormal variance with pedigree 2.625, pedigree (1,1,4,1,1)
  (same comment as for Ammonium)
- Copper ion [water, ground-, long-term]: 0.000198673 kg; lognormal variance with pedigree 0.87745, pedigree (1,1,4,1,1)
  (same comment as for Ammonium)
- DOC, Dissolved Organic Carbon [water, ground-, long-term]: 6.28248e-6 kg; lognormal variance with pedigree 0.31256, pedigree (1,1,4,1,1)
  (same comment as for Ammonium)
- Iron ion [water, ground-, long-term]: 0.990142 kg; lognormal variance with pedigree 0.00800701, pedigree (1,1,4,1,1)
  (same comment as for Ammonium)
- Lead II [water, ground-, long-term]: 0.000379269 kg; lognormal variance with pedigree 0.79152, pedigree (1,1,4,1,1)
  (same comment as for Ammonium)
- Nitrate [water, ground-, long-term]: 2.85648e-16 kg; lognormal variance with pedigree 2.1788, pedigree (1,1,4,1,1)
  (same comment as for Ammonium)
- Nitrite [water, ground-, long-term]: 1.47833e-16 kg; lognormal variance with pedigree 2.1788, pedigree (1,1,4,1,1)
  (same comment as for Ammonium)
- Nitrogen, organic bound [water, ground-, long-term]: 4.43938e-15 kg; lognormal variance with pedigree 2.1788, pedigree (1,1,4,1,1)
  (same comment as for Ammonium)
- TOC, Total Organic Carbon [water, ground-, long-term]: 6.28248e-6 kg; lognormal variance with pedigree 0.31256, pedigree (1,1,4,1,1)
  (same comment as for Ammonium)
- Tin ion [water, ground-, long-term]: 0.00389248 kg; lognormal variance with pedigree 0.49014, pedigree (1,1,4,1,1)
  (same comment as for Ammonium)
- Zinc II [water, ground-, long-term]: 0.000198762 kg; lognormal variance with pedigree 0.86775, pedigree (1,1,4,1,1)
  (same comment as for Ammonium)
