# milk evaporation

Dataset: EcoSpold 2, unit process
Geography: RoW
Time period: 2004-01-01 to 2023-12-31
Technology level: current
Classification: ISIC rev.4 ecoinvent: 1050:Manufacture of dairy products
Synonyms: concentrated milk production; milk concentration
Scenario: Business-as-Usual
System model: Allocation, cut-off by classification
Generated by: François Saunier
Database: ecoinvent
isCopyrightProtected: true
accessRestrictedTo: 1

## General comment
This GLO dataset is based on the Quebec dataset. Uncertainty has been adjusted accordingly.
The functional unit is 1 kg water evaporated. This module is based on literature from milk processing equipment manufacturer and should be used when evaluating evaporation of water from raw (or skimmed) milk to produce evaporated milk. Basic solid contents are 9% for input and 50% for output. Only steam and energy demand for the evaporator are considered.

## Included activities start
From raw (or skimmed) milk at evaporator input.

## Included activities end
This activity ends with evaporated milk at the output of the evaporator.
The dataset includes the energy demand (supplied by consumption of electricity) and steam production for evaporating 1 kg of water. The dataset does not include waste and emissions to environment (except water from steam to air).

## Geography
Data used are from one European company whose equipment is used worldwide.
Quebec specificity for steam production from natural gas is supposed. Uncertainty is adjusted accordingly in this GLO dataset.

## Technology
Evaporation occurs in a 5-effect evaporator with thermal vapour recompression (TVR).
Motor power is 75kW, and evaporation is performed with steam consumption of 1610 kg/h. Evaporator capacity is 15 ton of milk per hour.
References :
WESTERGAARD, V. ( 2004). Milk powder technology : evaporation and spray drying. Report for GEA Niro, Danemark. 301 p.

## Time period
Time of publication of the report used for data.
Source : WESTERGAARD, V. ( 2004). Milk powder technology : evaporation and spray drying. Report for GEA Niro, Danemark. 301 p.

## Parameters
- evaporation capacity: 13400 kg/hour; name evaporation_capacity; lognormal variance with pedigree 0.0019, pedigree (2,3,1,3,1)
  Mass of condensate (water) produced per hour in the evaporator.
  Source : WESTERGAARD, V. ( 2004). Milk powder technology : evaporation and spray drying. Report for GEA Niro, Danemark. 301 p.
- heat for steam: 3.07 MJ/kg; name heat_for_steam; lognormal variance with pedigree 0.1638, pedigree (2,3,5,5,5)
  Heat for production of 1 kg of steam.
  Source : ecoinvent 3.0 dataset "production of steam in chemical industry"
- motor power: 75 kW; name motor_power; lognormal variance with pedigree 0.0019, pedigree (2,3,1,3,1)
  Source : WESTERGAARD, V. ( 2004). Milk powder technology : evaporation and spray drying. Report for GEA Niro, Danemark. 301 p.
- steam consumption: 1610 kg/hour; name steam_consumption; lognormal variance with pedigree 0.0019, pedigree (2,3,1,3,1)
  kg of steam per hour.
  Source : WESTERGAARD, V. ( 2004). Milk powder technology : evaporation and spray drying. Report for GEA Niro, Danemark. 301 p.
- water for steam: 1.17 kg/kg; name water_for_steam; lognormal variance with pedigree 0.1638, pedigree (2,3,5,5,5)
  kg of water for production of 1 kg of steam
  Source : ecoinvent 3.0 dataset "production of steam in chemical industry"

## Reference product
- evaporation of milk: 1 kg; By-product classification allocatable product; CPC 88150: Dairy product manufacturing services
  Functional unit is kg of water evaporated
  production volume 3.98223 kg
    Dummy value to be replaced by measured, estimated or calculated value.
    This is a placeholder value that does not reflect real-world production volumes. This dataset does not currently require a real-world production volume to work in the database framework, and no actual data were collected yet. This has no negative effect on the results of the ecoinvent database.
  property price 0.00509925 EUR2005
    Calculated based on inputs: The price of the product has been calculated as a sum of the values of the material and energy inputs for this product. This value is therefore a rough estimation. It may underestimate the real price since there are additional expenses when producing any product. These expences can include for example labour costs, treatment of waste materials and profit for the producer. Please consider carefully whether this level of data quality is acceptable for your application.
  properties: carbon allocation 0 kg, carbon content 0

## Inputs from technosphere
- chemical factory, organics: 1.08673e-12 unit; = (1/5.056)/factory_annual_production*factory_lifetime; lognormal variance with pedigree 0.51, pedigree (5,5,5,5,5)
  Proxy value for the infrastructures. Calculation based on the evaporated milk production for the removal of 1kg of water (on a basis of basic solid contents of 9% for input and 50% for output, 5,056kg of water are removed for the production of 1kg of evaporated milk) and the total production of the plant among its lifetime.
  property chemical factory annual production 9.1e12 kg/year; name factory_annual_production
  property lifetime 50 year; name factory_lifetime
  note on chemical factory annual production: Based on the ecoinvent 2.0 report L Life Cycle Inventories of Chemicals
- electricity, medium voltage: 0.000157577, 0.00314332, 7.86888e-5, 4.82556e-5, 0.000680415, 9.65831e-6, 2.07386e-6, 0.000219488, 0.000324596, 0.000932943 kWh (10 suppliers, which the file names only by identifier); sum of these 0.00559701 kWh; = motor_power/evaporation_capacity; lognormal variance with pedigree 0.04, pedigree (1,1,5,1,1)
  Calculated value.
  Uncertainty: No uncertainty added - uncertainty based on propagation of the uncertainty of the underlying parameters.
- heat, district or industrial, natural gas: 0.0995426, 0.269316 MJ (2 suppliers, which the file names only by identifier); sum of these 0.368858 MJ; = heat_for_steam*steam_consumption/evaporation_capacity; lognormal variance with pedigree 0.04, pedigree (1,1,5,1,1)
  Calculated value. Heat for production of the steam used in the evaporator. It is assumed that steam is produced from natural gas, as it's the prevalent fuel for heat production in Quebec.
  Uncertainty: No uncertainty added - uncertainty based on propagation of the uncertainty of the underlying parameters.
  properties: heating value, net 1 MJ
- tap water: 0.000171468, 0.000261389, 0.000487738, 0.00131393, 0.00659118, 0.0754263, 0.0563226 kg (7 suppliers, which the file names only by identifier); sum of these 0.140575 kg; = water_for_steam*steam_consumption/evaporation_capacity; lognormal variance with pedigree 0.04, pedigree (1,1,5,1,1)
  Calculated value. Water input for production of the steam used in the evaporator.
  Uncertainty: No uncertainty added - uncertainty based on propagation of the uncertainty of the underlying parameters.
  properties: carbon content, fossil 0.00178991, dry mass 0.000337476 kg, water content 2962.17, wet mass 1 kg
  note on carbon content, fossil: Bicarbonate content is 2.93 mol/m3. CO2 content is 0.1 mol/m3 (ecoinvent v2.2 report 8, Tab 93.1).

## Emissions to nature
- Water [air, unspecified]: 0.000140575 m3; = water_use/1000; lognormal variance with pedigree 0.21, pedigree (5,5,5,5,5)
  Calculated value. All steam is supposed to be rejected to atmosphere.
  Uncertainty: No uncertainty added - uncertainty based on propagation of the uncertainty of the underlying parameters.

## Extrapolations
The GLO dataset is based on the Quebec dataset. Uncertainty has been adjusted accordingly.
Proxy dataset based on literature from milk processing equipment manufacturer. Only energy demand of the evaporator and steam production are considered.
Infrastructure are extrapolated from the "chemical factory, organics" dataset.
The dataset does not include waste and emissions to environment (except steam to air).
