# ethyl acetate production

Dataset: EcoSpold 2, unit process
Geography: RoW
Time period: 1991-01-01 to 2023-12-31
Technology level: current
Classification: ISIC rev.4 ecoinvent: 2011:Manufacture of basic chemicals
Synonyms: Vinegar naphtha; Acetic ether; Ethyl ethanoate; Ethyl acetic ester; Acetoxyethane; ETHYL ACETATE
Scenario: Business-as-Usual
System model: Allocation, cut-off by classification
Share of production covered: 100 %
Generated by: Jürgen Sutter
Published in: Sutter, J. 2007
Database: ecoinvent
isCopyrightProtected: true
accessRestrictedTo: 1

## General comment
This dataset represents the production of 1 kg of ethyl acetate from ethanol. Ethyl acetate (CH3COOC2H5) is a colourless, mobile, volatile liquid with a pleasant fruity odour. It is soluble in ethyl alcohol and ether, and slightly soluble in water. Ethyl acetate is an active solvent that is available in three grades: anhydrous with 85 - 88 %, with 12 - 15 % ethanol denaturated with 1 % MIK, 99% and 99.5% (urethane grade). The most popular grade, 99% is mainly used in industrial lacquers and surface coating resins. It is also used as an extraction solvent in the production of pharmaceuticals and food and as a carrier solvent for herbicides. About 60% of the demand is in coatings. Process solvents, including pharmaceuticals and organic synthesis, account for 15% of the demand, as does printing inks. Miscellaneous uses, including adhesives and cosmetics, account for 10% of consumption.
This dataset considers the production of ethyl acetate by means of the esterification of ethanol with acetic acid. The raw materials and energy consumptions are modelled with literature data. The water exchanges are approximated based on data from a large chemical factory (Gendorf 2016). The emissions are estimated and the infrastructure is included with a default value.
References:
Sutter, J. (2007) Life Cycle Inventories of Petrochemical Solvents. ecoinvent report No. 22. Swiss Centre for Life Cycle Inventories, Dübendorf, 2007.
Gendorf (2016) Umwelterklärung 2015, Werk Gendorf Industriepark, www.gendorf.de.

## Included activities start
From the reception of ethanol at the factory gate.

## Included activities end
This activity ends with the production of 1kg of ethyl acetate, 100% at the factory gate. The dataset includes the input materials, energy uses, infrastructure and emissions.

## Geography
The inventory is modelled for Europe but is assumed to be representative of the global production. Some values are based on data from a large chemical factory located in Germany. These are assumed to be valid for this geography.

## Technology
An aqueous solution of acetic acid is mixed with ethanol; then 1% sulfuric acid is added. The mixture is preheated before passing into an esterifying column where it is refluxed and some of the distillate removed overhead. The mixture, containing about 20% of the ester, goes into a second refluxing column where a ternary azeotrope (consisting of 83% ethyl acetate, 9% ethanol and 8% of water) is removed overhead at a temperature of about 70°C.
An equal volume of water is mixed with the distillate after which it separates into two layers. The bottom layer is fed into a separator column and ester is recovered as a ternary azeotrope. Any alcohol remaining in the bottom layer is vaporized and recycled to the esterification column.
The upper layer, containing around 93% ethyl acetate together with some water and ethanol, passes to a refluxing column where it is mixed with sufficient ester to ensure that the water and ethyl alcohol are removed as a ternary azeotrope overhead. The residue in the column, consisting of 95% ethyl acetate, is redistilled to remove any impurities. The process leads to a yield of 99 %.
Reference:
Wells, G. Margaret: Handbook of petrochemicals and processes. Aldershot, Hampshire 1991

## Time period
Time of publications. Some values are based on data published by the Gendorf factory that were collected between 2011 and 2015. The time period has been adjusted accordingly. For more details, see the comments of the exchanges.

## Reference product
- ethyl acetate: 1 kg; name RP; source Dutia, P. 2004; By-product classification allocatable product; CPC 34120: Industrial monocarboxylic fatty acids; acid oils from refining; HS2017 291531: Acids; saturated acyclic monocarboxylic acids; ethyl acetate; CAS 141-78-6
  Ethyl acetate is a colourless, mobile, volatile liquid with a pleasant fruity odour. It is soluble in ethyl alcohol and ether, and slightly soluble in water.
  Ethyl acetate finds use as a solvent in a wide range of applications, across many industries, including:
  1. Surface coating and thinners: Ethyl acetate is one of the most popular solvents and finds wide use in the manufacture of nitrocellulose lacquers, varnishes and thinners. It exhibits high dilution ratios with both aromatic and aliphatic diluents and is the least toxic of industrial organic solvents.
  2. Pharmaceuticals: Ethyl acetate is an important component in extractants for the concentration and purification of antibiotics. It is also used as an intermediate in the manufacture of various drugs.
  3. Flavours and essences: Ethyl acetate finds extensive use in the preparation of synthetic fruit essences, flavours and perfumes.
  4. Flexible packaging: Substantial quantities of ethyl acetate are used in the manufacture of flexible packaging and in the manufacture of polyester films and BOPP films. It is also used in the treatment of aluminium foils.
  5. Miscellaneous: Ethyl acetate is used in the manufacture of adhesives, cleaning fluids, inks, nail-polish removers and silk, coated papers, explosiv.
  Ethyl acetate is an active solvent that is available in three grades: anhydrous with 85 - 88 % with 12 - 15 % ethanol denaturated with 1 % MIK, 99% and 99.5% (urethane grade). The most popular grade, 99% is mainly used in industrial lacquers and surface coating resins. It is also used as an extraction solvent in the production of pharmaceuticals and food and as a carrier solvent for herbicides. About 60% of demand is in coatings. Process solvents, including pharmaceuticals and organic synthesis, account for 15% of demand, as does printing inks. Miscellaneous uses, including adhesives and cosmetics, account for 10% of consumption.
  The total global production for ethyl acetate is estimated to be in the 1.3 million tons in 2002.
  production volume 8.735e8 kg; name RP_PV
    Capacity utilisation 85% on total production capacity (1515 million kg) from Dutia P. (2004). Ethyl Acetate: A Techno-Commercial Profile. Chemical Weekly (August 10) p. 179-186 http://www.chemicalweekly.com/Profiles/Ethyl_Acetate.pdf (minus 125 million kg from butane oxidation)
  property heating value, net 31.32 MJ
    LHV is calculated based on the elemental composition of the substance. Based on the CAS number of the substance (000123-86-4), the chemical formula of the substance is found to be: C6H12O2, (PubChem 2020).
    Reference: Kim, S., Chen, J., Cheng, T., Gindulyte, A., He, J., He, S., Li, Q., Shoemaker, B. A., Thiessen, P. A., Yu, B., Zaslavsky, L., Zhang, J., & Bolton, E. E. (2019). PubChem 2019 update: improved access to chemical data. Nucleic acids research, 47(D1), D1102–D1109. https://doi.org/10.1093/nar/gky1033
  property price 0.52 EUR2005
    Temporary price data. Calculated as 90% of purchasers price based on: 2004 import and export prices (total trades (USD) divided by total weight (kg) in EU27, USA, China, Japan and India) from UN Commodity Trade Statistics Database (http://data.un.org/Explorer.aspxDatabase [Accessed 2 July 2010]). Commodity: Ethyl acetate
  properties: carbon allocation 0.545455 kg, carbon content 0.545455, carbon content, fossil 0.545455, carbon content, non-fossil 0, dry mass 1 kg, water content 0, water in wet mass 0 kg, wet mass 1 kg

## Inputs from technosphere
- acetic acid, without water, in 98% solution state: 0.69 kg; source Wells, M. 1991; lognormal variance with pedigree 0.0101, pedigree (1,2,4,5,1)
  Literature value.
  Uncertainty: W
  properties: carbon content, fossil 0.400016, dry mass 1 kg, heating value, net 14.6 MJ, wet mass 1 kg
  note on heating value, net: Based on literature, page 10, Althaus H.-J., Chudacoff M., Hischier R., Jungbluth N., Osses M. and Primas A. (2007) Life Cycle Inventories of Chemicals. Final report ecoinvent data v2.0 No. 8. EMPA, Swiss Centre for Life Cycle Inventories, Dübendorf, CH, Online-Version under: www.ecoinvent.org.
- chemical factory, organics: 4e-10 unit; lognormal variance with pedigree 0.31, pedigree (2,3,2,4,3)
  Calculated based on literature data published by the industry. For this activity, no information was readily available concerning infrastructure and land-use. Therefore, the infrastructure is estimated based on data from two chemical factories, the BASF site of Ludwigshafen and the chemical factory in Gendorf (which are both located in Germany), which produce a wide range of chemical substances. Based on this data, the following assumptions are made: the built area amounts to about 4.2 ha, the plant has an average output of 50'000 t/a and a lifespan of fifty years. The estimated infrastructure amount is therefore 4.00 E-10 units per kg of produced chemical.
  References:
  Althaus H.-J., Chudacoff M., Hischier R., Jungbluth N., Osses M. and Primas A. (2007) Life Cycle Inventories of Chemicals. ecoinvent report No. 8, v2.0. EMPA Dübendorf, Swiss Centre for Life Cycle Inventories, Dübendorf, CH.
  Gendorf (2000) Umwelterklärung 2000, Werk Gendorf. Werk Gendorf, Burgkirchen.
- electricity, medium voltage: 0.00261466, 0.0521567, 0.0175245, 0.0008007, 0.000160259, 3.44113e-5, 0.00538599 kWh (7 suppliers, which the file names only by identifier); sum of these 0.0786772 kWh; source Kim S. 2003; lognormal variance with pedigree 0.0101, pedigree (1,2,4,5,1)
  Literature value.
  Uncertainty: K
- ethanol, without water, in 99.7% solution state, from ethylene: 0.62 kg; source Wells, M. 1991; lognormal variance with pedigree 0.0101, pedigree (1,2,4,5,1)
  Literature value.
  Uncertainty: W
  properties: carbon content, fossil 0.521739, dry mass 1 kg, heating value, net 28.1 MJ, wet mass 1 kg
  note on heating value, net: Based on literature, page 275, Report 17: Jungbluth, N., Chudacoff, M., Dauriat, A., Dinkel, F., Doka, G., Faist Emmenegger, M., Gnansounou, E., Kljun, N., Schleiss, K., Spielmann, M., Stettler, C., Sutter, J. 2007: Life Cycle Inventories of Bioenergy. ecoinvent report No. 17, Swiss Centre for Life Cycle Inventories, Dübendorf, CH.
- heat, district or industrial, natural gas: 0.108616, 6.60978 MJ (2 suppliers, which the file names only by identifier); sum of these 6.7184 MJ; source Kim S. 2003; lognormal variance with pedigree 0.0101, pedigree (1,2,4,5,1)
  Literature value.
  Uncertainty: K
  properties: heating value, net 1 MJ
- heat, district or industrial, other than natural gas: 3.74819, 0.00173647 MJ (2 suppliers, which the file names only by identifier); sum of these 3.74993 MJ; source Kim S. 2003; lognormal variance with pedigree 0.0101, pedigree (1,2,4,5,1)
  Literature value.
  Uncertainty: K
  properties: heating value, net 1 MJ
- sulfuric acid: 0.0131 kg; source Wells, M. 1991; lognormal variance with pedigree 0.0101, pedigree (1,2,4,5,1)
  Literature value.
  Uncertainty: W
  properties: dry mass 1 kg, wet mass 1 kg
- tap water: 5.28156e-5, 8.05128e-5, 0.000150233, 0.000404717, 4.8717e-5, 0.00203022, 0.0232328 kg (7 suppliers, which the file names only by identifier); sum of these 0.026 kg; lognormal variance with pedigree 0.0106, pedigree (2,3,2,4,3)
  Calculated based on literature data published by the industry. This value is a 5-year average of data (2011 - 2015) published by the Gendorf factory (Gendorf, 2016, Umwelterklärung, www.gendorf.de), (Gendorf, 2015, Umwelterklärung, www.gendorf.de), (Gendorf, 2014, Umwelterklärung, www.gendorf.de). The amount of tap water per kg of chemical substance produced is calculated using literature data published by the Gendorf factory based in Germany, which produces a wide range of chemical substances. The factory produced 1657400 tonnes of chemical substances in the year 2015 (Gendorf, 2016, Umwelterklärung, www.gendorf.de) and 740000 tonnes of intermediate products. The amount of tap water consumed in the year 2015 was 55100 tonnes (Gendorf, 2016, Umwelterklärung, www.gendorf.de). The resulting amount of tap water is 0.023 kg/kg of chemical product produced. The 5-year average (2011 - 2015, weighted by production volume) is 0.026 kg/kg.
  properties: carbon content, fossil 0.00178991, dry mass 0.000337476 kg, water content 2962.17, wet mass 1 kg
  note on carbon content, fossil: Bicarbonate content is 2.93 mol/m3. CO2 content is 0.1 mol/m3 (ecoinvent v2.2 report 8, Tab 93.1).
- wastewater, average: -2.26904e-6, -8.07865e-9 m3 (2 suppliers, which the file names only by identifier); sum of these -2.27712e-6 m3; lognormal variance with pedigree 0.0452, pedigree (2,4,1,5,4)
  Calculated based on literature data published by the GENDORF Chemical Park. The factory produced an average of 2462760 tonnes of chemical substances (including intermediates) per year in the years 2015-2019. The average ouput of wastewater going to an external wastewater treatment plant in the years 2015-2019 was 5608 m3 per year. This equals 0.000002277 m3/kg chemical produced.
  References:
  Chemiepark GENDORF, Umwelterklärung 2016, https://www.gendorf.de/Nachbarn/Umweltschutz/Industrie%20und%20Nachhaltigkeit
  Chemiepark GENDORF, Umwelterklärung 2017, https://www.gendorf.de/Nachbarn/Umweltschutz/Industrie%20und%20Nachhaltigkeit
  Chemiepark GENDORF, Umwelterklärung 2020, https://www.gendorf.de/Nachbarn/Umweltschutz/Industrie%20und%20Nachhaltigkeit
  production volume; = RP_PV*BP_wastewater_average/ABS(RP)
    Calculated from the production volume of ethyl acetate in proportion to the respective output amounts.
  properties: carbon content, non-fossil 0.194039, dry mass 0.346837 kg, water content 2882.2, wet mass 1000 kg
  note on carbon content, non-fossil: 0.0673 kg TOC/m3 (Tab A.17, ecoinvent v2.2 report 13_I). TOC was considered as Total Carbon.

## Inputs from nature
- Water, cooling, unspecified natural origin [natural resource, in water]: 0.014707 m3; lognormal variance with pedigree 0.0454, pedigree (2,4,2,5,4)
  Calculated based on literature data published by the GENDORF Chemical Park. The factory produced an average of 2462760 tonnes of chemical substances (including intermediates) per year in the years 2015-2019. The average amount of cooling water released in the years 2015-2019 was 34408800 t per year. It was assumed that 5% of the cooling water was emitted to air during its use, therefore, to calculate the input of cooling water, the output value reported by GENDORF was scaled up by the factor 1/0.95. This equals 0.014707 m3/kg chemical produced.
  References:
  Chemiepark GENDORF, Umwelterklärung 2016, https://www.gendorf.de/Nachbarn/Umweltschutz/Industrie%20und%20Nachhaltigkeit
  Chemiepark GENDORF, Umwelterklärung 2017, https://www.gendorf.de/Nachbarn/Umweltschutz/Industrie%20und%20Nachhaltigkeit
  Chemiepark GENDORF, Umwelterklärung 2020, https://www.gendorf.de/Nachbarn/Umweltschutz/Industrie%20und%20Nachhaltigkeit
- Water, river [natural resource, in water]: 0.000965426 m3; lognormal variance with pedigree 0.0454, pedigree (2,4,2,5,4)
  Calculated based on literature data published by the GENDORF Chemical Park. The factory produced an average of 2462760 tonnes of chemical substances (including intermediates) per year in the years 2015-2019. The average consumption of river water in the years 2015-2019 was 22000820 t per year. However, since the cooling water is modelled as an input, the amount of river water was adjusted to avoid double counting. 55% of the input amount of cooling water was deducted from the amount of river water, as that is the share of river water versus well water. This equals 0.00096543 m3/kg chemical produced.
  References:
  Chemiepark GENDORF, Umwelterklärung 2016, https://www.gendorf.de/Nachbarn/Umweltschutz/Industrie%20und%20Nachhaltigkeit
  Chemiepark GENDORF, Umwelterklärung 2017, https://www.gendorf.de/Nachbarn/Umweltschutz/Industrie%20und%20Nachhaltigkeit
  Chemiepark GENDORF, Umwelterklärung 2020, https://www.gendorf.de/Nachbarn/Umweltschutz/Industrie%20und%20Nachhaltigkeit
- Water, well, in ground [natural resource, in water]: 0.000816522 m3; lognormal variance with pedigree 0.0454, pedigree (2,4,2,5,4)
  Calculated based on literature data published by the GENDORF Chemical Park. The factory produced an average of 2462760 tonnes of chemical substances (including intermediates) per year in the years 2015-2019. The average consumption of well water in the years 2015-2019 was 18607480 t per year. However, since the cooling water is modelled as an input, the amount of well water was adjusted to avoid double counting. 45% of the input amount of cooling water was deducted from the amount of well water, as that is the share of well water versus river water. This equals 0.00081652 m3/kg chemical produced.
  References:
  Chemiepark GENDORF, Umwelterklärung 2016, https://www.gendorf.de/Nachbarn/Umweltschutz/Industrie%20und%20Nachhaltigkeit
  Chemiepark GENDORF, Umwelterklärung 2017, https://www.gendorf.de/Nachbarn/Umweltschutz/Industrie%20und%20Nachhaltigkeit
  Chemiepark GENDORF, Umwelterklärung 2020, https://www.gendorf.de/Nachbarn/Umweltschutz/Industrie%20und%20Nachhaltigkeit

## Emissions to nature
- Acetic acid [air, urban air close to ground]: 0.00138 kg; lognormal variance with pedigree 0.188, pedigree (4,5,5,5,5)
  Estimation. Air emissions occurring from the purge vent, the distillation vent and fugitive emission sources were estimated to 0.2% of the raw material input.
  The carbon contained in the removed ethanol and acetic acid during wastewater treatment was accounted for as CO2 emissions to air.
  It is assumed that the manufacturing plants are located in an urban/industrial area and consequently the emissions are categorised as emanating in a high population density area.
  Uncertainty: E
- Carbon dioxide, fossil [air, urban air close to ground]: 0.0085398 kg; lognormal variance with pedigree 0.1786, pedigree (4,5,5,5,5)
  Estimation. Air emissions occurring from the purge vent, the distillation vent and fugitive emission sources were estimated to 0.2% of the raw material input.
  The carbon contained in the removed ethanol and acetic acid during wastewater treatment was accounted for as CO2 emissions to air.
  It is assumed that the manufacturing plants are located in an urban/industrial area and consequently the emissions are categorised as emanating in a high population density area.
  Uncertainty: C
- Ethanol [air, urban air close to ground]: 0.00124 kg; lognormal variance with pedigree 0.188, pedigree (4,5,5,5,5)
  (same comment as for Acetic acid)
- Water [air, unspecified]: 0.00147008 m3; lognormal variance with pedigree 0.0848, pedigree (2,4,2,5,4)
  Calculated based on literature data published by the GENDORF Chemical Park. The factory produced an average of 2462760 tonnes of chemical substances (including intermediates) per year in the years 2015-2019. To determine the emissions of water to air, the difference of all water inputs (from river, well, tap water and cooling) and outputs (wastewater, emissions to water) was calculated. The average ouput of water to air in the years 2015-2019 was 3620444 m3 per year. This equals 0.00147 m3/kg chemical produced. For more information on the other water exchanges please consult the respective exchange comment.
  References:
  Chemiepark GENDORF, Umwelterklärung 2016, https://www.gendorf.de/Nachbarn/Umweltschutz/Industrie%20und%20Nachhaltigkeit
  Chemiepark GENDORF, Umwelterklärung 2017, https://www.gendorf.de/Nachbarn/Umweltschutz/Industrie%20und%20Nachhaltigkeit
  Chemiepark GENDORF, Umwelterklärung 2020, https://www.gendorf.de/Nachbarn/Umweltschutz/Industrie%20und%20Nachhaltigkeit
  property fraction, origin: fresh water 0; name fraction_origin_fresh_water
  property fraction, origin: salt water 0; name fraction_origin_salt_water
  property fraction, origin: unspecified 1; name fraction_origin_unspecified
- Acetic acid [water, surface water]: 0.00552 kg; lognormal variance with pedigree 0.448, pedigree (4,5,5,5,5)
  Estimation. 0.8% of the raw material input is assumed to leave the production process with the wastewater.
  It is assumed that the manufacturing plants are located in an urban/industrial area and consequently the emissions are categorised as emanating in a high population density area.
  Water emissions are assumed to be emitted into rivers.
  Uncertainty: E
- BOD5, Biological Oxygen Demand [water, unspecified]: 0.0155699 kg; lognormal variance with pedigree 0.218, pedigree (4,5,5,5,5)
  Calculated value. The BOD, COD, TOC and BOD5 are calculated based on the amount and type of emissions released to water in the same activity.
- COD, Chemical Oxygen Demand [water, unspecified]: 0.0155699 kg; lognormal variance with pedigree 0.218, pedigree (4,5,5,5,5)
  (same comment as for BOD5, Biological Oxygen Demand)
- DOC, Dissolved Organic Carbon [water, unspecified]: 0.00479002 kg; lognormal variance with pedigree 0.218, pedigree (4,5,5,5,5)
  (same comment as for BOD5, Biological Oxygen Demand)
- Ethanol [water, surface water]: 0.00496 kg; lognormal variance with pedigree 0.188, pedigree (4,5,5,5,5)
  (same comment as for Acetic acid)
- Sulfate [water, surface water]: 0.012833 kg; lognormal variance with pedigree 0.188, pedigree (4,5,5,5,5)
  (same comment as for Acetic acid)
- TOC, Total Organic Carbon [water, unspecified]: 0.00479002 kg; lognormal variance with pedigree 0.218, pedigree (4,5,5,5,5)
  (same comment as for BOD5, Biological Oxygen Demand)
- Water [water, unspecified]: 0.0150391 m3; lognormal variance with pedigree 0.0848, pedigree (2,4,2,5,4)
  Calculated based on literature data published by the GENDORF Chemical Park. The factory produced an average of 2462760 tonnes of chemical substances (including intermediates) per year in the years 2015-2019. The amount of water released back to the environment consists of the sum of the amount of process water treated in the internal WWTP that is then released back to the environment and the amount of cooling water released back to the environment. The average ouput of the internal WWTP in the years 2015-2019 was 2628800 m3 and that of cooling water released back to the environment was 34408800 m3. This gives a yearly average of 37037600 m3 emissions of water to water. This equals 0.01504 m3/kg chemical produced.
  References:
  Chemiepark GENDORF, Umwelterklärung 2016, https://www.gendorf.de/Nachbarn/Umweltschutz/Industrie%20und%20Nachhaltigkeit
  Chemiepark GENDORF, Umwelterklärung 2017, https://www.gendorf.de/Nachbarn/Umweltschutz/Industrie%20und%20Nachhaltigkeit
  Chemiepark GENDORF, Umwelterklärung 2020, https://www.gendorf.de/Nachbarn/Umweltschutz/Industrie%20und%20Nachhaltigkeit
  property carbon content, fossil 0; name C_content_fossil
  property carbon content, non-fossil 0; name C_content_non_fossil
  property dry mass 0 kg; name DM
  property fraction, origin: fresh water 0; name fraction_origin_fresh_water_Ww
  property fraction, origin: salt water 0; name fraction_origin_salt_water_Ww
  property fraction, origin: unspecified 1; name fraction_origin_unspecified_Ww
  property water in wet mass 1000 kg; name WWM
  property wet mass 1000 kg; name WM

## Sampling procedure
Literature data. Some values are calculated based on data from a large chemical factory located in Germany. For more details, see the comments of the exchanges.

## Extrapolations
This dataset has been copied from an original dataset covering the geography RER. The uncertainty has been adjusted accordingly.

## Review by Gregor Wernet 2017-08-04
This dataset was additionally reviewed in a separate review process by Eric Johnson of Atlantic Consulting as well as Emilia Moreno Ruiz and Gregor Wernet of ecoinvent.
