# treatment of bagasse, from sugarcane, in heat and power co-generation unit, 6400kW thermal

Dataset: EcoSpold 2, unit process
Geography: BR-North-eastern grid
Time period: 2014-01-01 to 2023-12-31
Technology level: current
Classification: EcoSpold01Categories: waste management/others
Classification: ISIC rev.4 ecoinvent: 3530:Steam and air conditioning supply
Tags: with true value
Scenario: Business-as-Usual
System model: Allocation, cut-off by classification
Generated by: Henrique Rogerio Antunes de Souza Junior
Published in: Bauer, C. 2007
Database: ecoinvent
isCopyrightProtected: true
accessRestrictedTo: 1

## General comment
Treatment of bagasse, from sugarcane by combustion in a heat and power cogeneration unit. Emission factors have been used from dataset "heat and power co-generation, wood chips, 6400kW thermal" . Emissions of CO2 and CO are based on carbon content of bagasse. Electricity and heat generation are based on lower heating value of bagasse and efficiency of the cogen unit.
The production volume of this activity is calculated based on the amount of electricity produced from bagasse and other biomass in 2015 according to the Ministry of Mines and Energy of Brazil (MME, 2016), minus the amount of electricity produced from sugarcane processing (see datasets: sugarcane processing, modern annexed plant, BR, 2014; sugarcane processing, modern autonomous plant, BR; 2014). The ratio kg/KWh of the original dataset, “treatment of bagasse, from sugarcane, in heat and power co-generation unit, 6400kW thermal, GLO, 2001” was maintained.
MME (2016). Matrizes Elétricas Estaduais: Ano Referência 2015. Edição de 23 de novembro de 2016. Ministério De Minas E Energia – MME. Secretaria De Planejamento E Desenvolvimento Energético. Núcleo De Estudos Estratégicos De Energia. Accessible online: http://www.mme.gov.br/documents/10584/3580498/03+-+Matrizes+El%C3%A9tricas+Estaduais+2016+-+ano+ref.+2015+%28PDF%29/ddfaad8c-a436-4aa8-b619-f95dd2cf689c?version=1.0, February 2019
The original ecoinvent dataset used as a basis was 'treatment of bagasse, from sugarcane, in heat and power co-generation unit, 6400kW thermal, GLO, 2000 - 2001' and it has been copied in '12/2017'
[This dataset is meant to replace the following datasets:]

## Included activities start
From reception of bagasse at the cogeneration plant

## Included activities end
This module describes the combustion of bagasse, from sugarcane. Included are the infrastructure, the bagasse input, the emissions to air and the disposal of the ashes. Also included are substances needed for operation: lubricating oil, ammonia, organic chemicals, sodium chloride, chlorine and decarbonized water.

## Geography
based on geography of dataset for cane sugar production with ethanol by-product, that also includes burning of bagasse

## Technology
based on the dataset "treatment of bagasse, from sugarcane, in heat and power co-generation unit, 6400kW thermal" GLO, 2001

## Time period
based on dataset wood chips, burned in cogen 6400 kWh

## Parameters
- fraction, cooling water, cooling pond system, to air: 0.032 dimensionless; name fraction_CW_CP_to_air; lognormal variance with pedigree 0.0413, pedigree (2,3,1,3,1)
  Calculated based on literature value (Scown, C.D., 2011, Water Footprint of U.S. Transportation Fuels and supplying information of the article) (Vionnet, S., Quantis Water Database - Technical Report, 2012).
- fraction, cooling water, once-through system, to air: 0.004 dimensionless; name fraction_CW_OT_to_air; lognormal variance with pedigree 0.0413, pedigree (2,3,1,3,1)
  (same comment as for fraction, cooling water, cooling pond system, to air)
- fraction, cooling water, recirculating system, to air: 0.771 dimensionless; name fraction_CW_R_to_air; lognormal variance with pedigree 0.0413, pedigree (2,3,1,3,1)
  (same comment as for fraction, cooling water, cooling pond system, to air)
- fraction, cooling water, to air: 0.3875 dimensionless; name fraction_CW_to_air; = (0.5*fraction_CW_OT_to_air)+(0.5*fraction_CW_R_to_air); lognormal variance with pedigree 0.092025, pedigree (4,4,3,2,4)
  Calculated value based on literature value (see comments of the other parametres present in this dataset) and expert opinion. In the case when no industry/literature data are available about the type of cooling or directly fraction, cooling water, to air specific for the process a default assumption is applied. It is assumed that the once-through cooling system is used in 50% of all cases and recirculating system is used in another 50% of all cases.
- fraction, water, decarbonised, to air: 0.3875 dimensionless; name fraction_WDC_to_air; = fraction_CW_to_air; lognormal variance with pedigree 0.092025, pedigree (4,4,3,2,4)
  Calculated value. See comments in the other parametres present in this dataset. Decarbonised water is considered to be always used as cooling water, thus cooling water fractions to air are applied to all carbonised water input flows to calculate the amount of water consumed in the processes.

## Reference product
- electricity, high voltage: 1 kWh; name electricity_output; = bagasse_input*0.787*15.4*(1/3.6)*(8/100)*(-1); source Bauer, C. 2007; By-product classification allocatable product; CPC 17100: Electrical energy; HS2017 271600: Electrical energy
  Electricity production is calculated based on lower calorific value of bagasse (15.4 MJ/kg dry matter), the dry matter content (0.787kg DM/kg fresh bagasse) and the electric efficiency of the cogen unit (8%).
  Note: 1 kWh= 3.6 MJ
  The electric effiency of the specific cogen unit can be found in the report for wood energy (see source).
  production volume 1.88514e9 kWh; name electricity_annual_production; = 93816000000*(0.02+0.05)-(1.39E+08+3.19E+07)
    The production volume of electricity as product of the treatment of sugarcane bagasse in heat and power co-generation unit the Brazilian North-eastern grid was calculated as follows:
    The Brazilian Ministry of Energy and Mining (MME, 2016) reports a total electricity production in the North-eastern grid area in 2015 of 9.38E+10 kWh, of which 2% are generated from bagasse and 5% from other biomass. Electricity generation from other biomass was approximated with electricity from bagasse, i.e. 7% of 9.38E+10 kWh is assumed from bagasse (6.57E+10 kWh). Of those 6.57E+10 kWh, a part is supplied by sugarcane processing (see datasets: sugarcane processing, modern annexed plant, BR, 2014; sugarcane processing, modern autonomous plant, BR; 2014). The calculation of electricity production volumes from sugarcane processing is described in the respective datasets.
    The balance between electricity supplied from the sugarcane processing datasets and the MME statistics was here used as production volume of electricity from treatment of sugarcane bagasse in heat and power co-generation.
    MME (2016). Matrizes Elétricas Estaduais: Ano Referência 2015. Edição de 23 de novembro de 2016. Ministério De Minas E Energia - MME. Secretaria De Planejamento E Desenvolvimento Energético. Núcleo De Estudos Estratégicos De Energia. Accessible online: <http://www.mme.gov.br/documents/10584/3580498/03+-+Matrizes+El%C3%A9tricas+Estaduais+2016+-+ano+ref.+2015+%28PDF%29/ddfaad8c-a436-4aa8-b619-f95dd2cf689c?version=1.0>, February 2019
  property exergy 3.6 MJ; name electricity_output_exergy
    allocation factor for electricity (=1) vs. heat, where heat is calculated as the termodynamic mean temperature Tm = (Tfeed-Treturn)/ln(Tfeed/Treturn), relative to the application temperature (Tu, typically = 293 K), i.e. (Tm-Tu)/Tm
  property price 0.0977 EUR2005
    Temporary price data. Calculated as 90% of purchasers price based on: 94% of the average price (to account for a 6% loss in transformation and transmission) for electricity for industrial consumersin 2005 (excluded taxes). From IEA.
  property true value relation 3.6; name electricity_output_true_value_relation
    property to calculate "true value" from
  properties: allocation factor 0.379774, carbon allocation 0 kg, carbon content 0, true value 0.0475611

## Inputs from technosphere
- bagasse, from sugarcane: 1.41007 kg; name bagasse_input
  production volume; name bagasse_input_annual_production; = (7913342222.22222/2131291668.10864)*electricity_annual_production
    The production volume of sugarcane bagasse treated in this activity is calculated based on the production volume of electricity generated by the same activity. (See production volume comment of electricity for the same activity.)
  property carbon content, non-fossil 0.443; name bagasse_input_C_content_non_fossil
  property dry mass 0.787 kg; name bagasse_input_DM
  properties: heating value, net 15.4 MJ, price 0.01 EUR2005, water content 0.270648, wet mass 1 kg
  note on carbon content, non-fossil: biogene carbon content on a dry matter basis C content (dry matter basis) is 44.3% (Tab 16.24, ecoinvent v2.2 report 17)
- chemical, organic: 9.84793e-5 kg; = (5.74E-06* heat_output)/0.767; source Bauer, C. 2007; lognormal variance with pedigree 0.0346, pedigree (2,4,3,5,3)
  value adapted from dataset "wood chips, burned in cogen 6400kWh".
  In the original dataset, 5.74E-6 kg of chemical, organic are used to produce 0.767MJ end heat.
  EcoSpold01Location=GLO
  Uncertainty: etha+ project Alcosuisse, industrial data
  properties: carbon content, fossil 0.628, dry mass 1 kg, heating value, net 19.03 MJ, wet mass 1 kg
  note on carbon content, fossil: This dataset is an unweighted average of 20 organic substances (listed in Tab 88.1, ecoinvent v2.2 report 8, part II), being part of the top100 chemicals included in this database. The C-content has also been calculated as an unweighted average of the C content of the substances composing this dataset.
- chlorine, liquid: 5.62739e-6 kg; = (3.28E-07* heat_output)/0.767; source Bauer, C. 2007; lognormal variance with pedigree 0.072, pedigree (4,4,5,5,1)
  EcoSpold01Location=RER
  value adapted from dataset "wood chips, burned in cogen 6400kWh".
  In the original dataset, 3.28E-7 kg of chlorine are used to produce 0.767MJ end heat.
  Uncertainty: Adapted from the dataset 'wood chips, in cogen 6400kWth, wood', according to actual water, carbon and energy content of the fuel (wood chips u=40%)
  properties: dry mass 1 kg, wet mass 1 kg
- heat and power co-generation unit, 6400kW thermal, building: 4.13498e-9 unit; = heat_output/(0.85*80*4.68E7); source Bauer, C. 2007; lognormal variance with pedigree 0.372, pedigree (4,4,5,5,1)
  EcoSpold01Location=CH
  The demanded infrastructure is calculated as:
  demanded infrastrucutre (unit/MJend) = MJend energy (MJ)/(capacity utilzation rate * Lifetime (y) * capacity (MJ/unit*y)
  The capacity for the cogen unit is 4,67E7 MJ/y. The lifetime is 80 years. The capacity utilization rate is 0.85.
  Uncertainty: Adapted from the dataset 'wood chips, in cogen 6400kWth, wood', according to actual water, carbon and energy content of the fuel (wood chips u=40%)
- heat and power co-generation unit, 6400kW thermal, common components for heat+electricity: 1.65399e-8 unit; = heat_output/(0.85*20*4.68E7); source Bauer, C. 2007; lognormal variance with pedigree 0.372, pedigree (4,4,5,5,1)
  EcoSpold01Location=CH
  The demanded infrastructure is calculated as:
  demanded infrastrucutre (unit/MJend) = MJend energy (MJ)/(capacity utilzation rate * Lifetime (y) * capacity (MJ/unit*y)
  The capacity for the cogen unit is 4,67E7 MJ/y. The lifetime is 20 years. The capacity utilization rate is 0.85.
  Uncertainty: Adapted from the dataset 'wood chips, in cogen 6400kWth, wood', according to actual water, carbon and energy content of the fuel (wood chips u=40%)
- heat and power co-generation unit, 6400kW thermal, components for electricity only: 1.65399e-8 unit; = heat_output/(0.85*20*4.68E7); source Bauer, C. 2007; lognormal variance with pedigree 0.372, pedigree (4,4,5,5,1)
  The demanded infrastructure is calculated as:
  demanded infrastrucutre (unit/MJend) = MJend energy (MJ)/(capacity utilzation rate * Lifetime (y) * capacity (MJ/unit*y)
  The capacity for the cogen unit is 4,67E7 MJ/y. The lifetime is 20 years. The capacity utilization rate is 0.85.
  EcoSpold01Location=CH
  Uncertainty: Adapted from the dataset 'wood chips, in cogen 6400kWth, wood', according to actual water, carbon and energy content of the fuel (wood chips u=40%)
- municipal solid waste: -5.62739e-5 kg; name municipal_waste_output; = (3.28E-06* heat_output)/0.767; lognormal variance with pedigree 0.0322, pedigree (4,4,2,5,1)
  EcoSpold01Location=CH
  value adapted from dataset "wood chips, burned in cogen 6400kWh".
  In the original dataset, 3.28E-6 kg of municipal solid waste are produced for 0.767MJ end heat.
  Uncertainty: Adapted from the dataset 'wood chips, in cogen 6400kWth, wood', according to actual water, carbon and energy content of the fuel (wood chips u=40%)
  production volume; = municipal_waste_output* bagasse_input_annual_production
    Calculated from production volume of reference product using the relative outputs.
  properties: carbon content, fossil 0.171549, carbon content, non-fossil 0.261655, dry mass 0.771 kg, heating value, net 11.74 MJ, water content 0.297017, wet mass 1 kg
  note on carbon content, fossil: MSW composition in tab 4.1, ecoinvent v2.2 report 13_I. C content referred to 1 kg DM
  note on heating value, net: Value taken from the general comment of the treatment dataset.
- sodium chloride, powder: 7.03423e-5 kg; = (4.1E-06* heat_output)/0.767; source Bauer, C. 2007; lognormal variance with pedigree 0.072, pedigree (4,4,5,5,1)
  value adapted from dataset "wood chips, burned in cogen 6400kWh".
  In the original dataset, 4.1E-6 kg of water are used to produce 0.767MJ end heat.
  EcoSpold01Location=RER
  Uncertainty: Adapted from the dataset 'wood chips, in cogen 6400kWth, wood', according to actual water, carbon and energy content of the fuel (wood chips u=40%)
  properties: dry mass 1 kg, wet mass 1 kg
- waste mineral oil: -5.62739e-5 kg; name waste_oil_output; = (3.28E-06* heat_output)/0.767; lognormal variance with pedigree 0.0322, pedigree (4,4,2,5,1)
  value adapted from dataset "wood chips, burned in cogen 6400kWh".
  In the original dataset, 3.28E-6 kg of waste mineral oil are produced for 0.767MJ end heat.
  EcoSpold01Location=CH
  Uncertainty: Adapted from the dataset 'wood chips, in cogen 6400kWth, wood', according to actual water, carbon and energy content of the fuel (wood chips u=40%)
  production volume; = municipal_waste_output* bagasse_input_annual_production
    Calculated from production volume of reference product using the relative outputs.
  properties: carbon content, fossil 0.864444, dry mass 0.9 kg, heating value, net 34.7 MJ, water content 0.111111, wet mass 1 kg
  note on carbon content, fossil: Tab A.6, ecoinvent v2.2 report 13_I. C content has been calculated after data in the tables, and then referred to 1 kg DM
- water, decarbonised: 0.0135023 kg; name water_decarbonised_input; = (0.000787* heat_output)/0.767; source Bauer, C. 2007; lognormal variance with pedigree 0.072, pedigree (4,4,5,5,1)
  value adapted from dataset "wood chips, burned in cogen 6400kWh".
  In the original dataset, 0.000787 kg of water are used to produce 0.767MJ end heat.
  value adapted from dataset "wood chips, burned in cogen 6400kWh".
  In the original dataset, 0.000787 kg of water are used to produce 0.767MJ end heat.
  EcoSpold01Location=RER
  Uncertainty: Adapted from the dataset 'wood chips, in cogen 6400kWth, wood', according to actual water, carbon and energy content of the fuel (wood chips u=40%)
  properties: wet mass 1 kg
- wood ash mixture, pure: -0.0110973 kg; name wood_ash_output; = (1/100)* bagasse_input*(-1)*0.787; lognormal variance with pedigree 0.0666, pedigree (4,5,5,5,3)
  for wood chips it is estimated that 1% of the dry mass is converted in ash. This is also assumed for bagasse.
  production volume; = bagasse_input_annual_production * wood_ash_output
    Calculated from production volume of reference product using the relative outputs.
  property carbon content, non-fossil 0.012; name wood_ash_output_C_content_non_fossil
  properties: dry mass 1 kg, wet mass 1 kg
  note on carbon content, non-fossil: biogene carbon content on a dry matter basis Tab A.9, ecoinvent v2.2 report 13_I.

## Emissions to nature
- Acetaldehyde [air, urban air close to ground]: 1.22705e-6 kg; = 7.18E-08* bagasse_input*(-1)*15.4*0.787; source Bauer, C. 2007; lognormal variance with pedigree 0.112, pedigree (4,4,5,5,1)
  calculated from the emission factor (kg/MJ input) given for cogen 6400kW.
  Uncertainty: Adapted from the dataset 'wood chips, in cogen 6400kWth, wood', according to actual water, carbon and energy content of the fuel (wood chips u=40%)
- Ammonia [air, urban air close to ground]: 3.48632e-5 kg; = 2.04E-06* bagasse_input*(-1)*15.4*0.787; source Bauer, C. 2007; lognormal variance with pedigree 0.082, pedigree (4,4,5,5,1)
  (same comment as for Acetaldehyde)
- Arsenic ion [air, urban air close to ground]: 2.0166e-8 kg; = 1.18E-09* bagasse_input*(-1)*15.4*0.787; source Bauer, C. 2007; lognormal variance with pedigree 0.722, pedigree (4,4,5,5,1)
  (same comment as for Acetaldehyde)
- Benzene [air, urban air close to ground]: 1.82861e-5 kg; = 1.07E-6* bagasse_input*(-1)*15.4*0.787; source Bauer, C. 2007; lognormal variance with pedigree 0.112, pedigree (4,4,5,5,1)
  (same comment as for Acetaldehyde)
- Benzo(a)pyrene [air, urban air close to ground]: 1.00488e-8 kg; = 5.88E-10* bagasse_input*(-1)*15.4*0.787; source Bauer, C. 2007; lognormal variance with pedigree 0.372, pedigree (4,4,5,5,1)
  (same comment as for Acetaldehyde)
- Bromine [air, urban air close to ground]: 1.20654e-6 kg; = 7.06E-08* bagasse_input*(-1)*15.4*0.787; source Bauer, C. 2007; lognormal variance with pedigree 0.722, pedigree (4,4,5,5,1)
  (same comment as for Acetaldehyde)
- Cadmium II [air, urban air close to ground]: 1.4082e-8 kg; = 8.24E-10* bagasse_input*(-1)*15.4*0.787; source Bauer, C. 2007; lognormal variance with pedigree 0.722, pedigree (4,4,5,5,1)
  calculated from the emission factor (kg/MJ input) given for cogen 6400kW.
  Uncertainty: Adapted from the dataset 'wood chips, in cogen 6400kWth, wood', according to actual water, carbon and energy content of the fuel (pressed sorghum bagasse)
- Calcium II [air, urban air close to ground]: 0.000117578 kg; = 6.88E-06* bagasse_input*(-1)*15.4*0.787; source Bauer, C. 2007; lognormal variance with pedigree 0.722, pedigree (4,4,5,5,1)
  (same comment as for Acetaldehyde)
- Carbon dioxide, non-fossil [air, urban air close to ground]: 1.80237 kg; name carbon_dioxide; = ((0.34864* bagasse_input*-1) - ( carbon_monoxide*(12/28))-(0.0012*wood_ash_output))*( carbon_dioxide_MW/12); lognormal variance with pedigree 0.004, pedigree (1,1,3,5,1)
  It is assumed that all carbon content in bagasse leaves the system as emissions (CO and CO2) and ash (wood ash). The CO2 emissions are calculated by substracting the amount of C in the bagasse to the amount of carbon that leaves the system as CO (7mg/MJend) and ash (1.2E-3kg/kg ash). The rest of C is assumed to leave the system as CO2. The calculations are done using the molecular weight (MW) and carbon content with the following steps:
  mass of C in input bagasse=(0.34864kgC/1kg bagasse)* mass input bagasse
  mass of C as CO = output emissions CO (kg) * MWC / MWCO
  mass of C as ash = carbon content in ash (kg/kg) * output ash (kg)
  emissions of C as CO2= mass of C in input bagasse - mass of C as CO - mass of C in ash
  emissions of CO2=emissions of C as CO2 * (MW CO2/MW C)
  Note: molecular weight of C is 12 g/mol
  Uncertainty: Adapted from the dataset 'wood chips, in cogen 6400kWth, wood', according to actual water, carbon and energy content of the fuel (wood chips u=40%)
  property molecular weight 44 g/mol; name carbon_dioxide_MW
- Carbon monoxide, non-fossil [air, urban air close to ground]: 9.21141e-5 kg; name carbon_monoxide; = 7E-06*15.4*0.787*(77/100); source Bauer, C. 2007; lognormal variance with pedigree 0.722, pedigree (4,4,5,5,1)
  It is assumed that 7 mg of CO are produced per MJend. To calculate this, the calorific value of bagasse, the dry matter content and calorific efficiency of the cogen are used.
  Uncertainty: Adapted from the dataset 'wood chips, in cogen 6400kWth, wood', according to actual water, carbon and energy content of the fuel (wood chips u=40%)
  property molecular weight 28 g/mol; name carbon_monoxide_MW
- Chlorine [air, urban air close to ground]: 3.62304e-6 kg; = 2.12E-07* bagasse_input*(-1)*15.4*0.787; source Bauer, C. 2007; lognormal variance with pedigree 0.112, pedigree (4,4,5,5,1)
  (same comment as for Cadmium II)
- Chromium III [air, urban air close to ground]: 7.96386e-8 kg; = 4.66E-09* bagasse_input*(-1)*15.4*0.787; source Bauer, C. 2007; lognormal variance with pedigree 0.722, pedigree (4,4,5,5,1)
  (same comment as for Acetaldehyde)
- Chromium VI [air, urban air close to ground]: 8.04931e-10 kg; = 4.71E-11* bagasse_input*(-1)*15.4*0.787; source Bauer, C. 2007; lognormal variance with pedigree 0.722, pedigree (4,4,5,5,1)
  (same comment as for Acetaldehyde)
- Copper ion [air, urban air close to ground]: 4.42626e-7 kg; = 2.59E-08* bagasse_input*(-1)*15.4*0.787; source Bauer, C. 2007; lognormal variance with pedigree 0.722, pedigree (4,4,5,5,1)
  (same comment as for Acetaldehyde)
- Dinitrogen monoxide [air, urban air close to ground]: 4.63134e-5 kg; = 2.71E-06* bagasse_input*(-1)*15.4*0.787; source Bauer, C. 2007; lognormal variance with pedigree 0.112, pedigree (4,4,5,5,1)
  (same comment as for Acetaldehyde)
- Dioxins, measured as 2,3,7,8-tetrachlorodibenzo-p-dioxin [air, urban air close to ground]: 6.23779e-13 kg; = 3.65E-14* bagasse_input*(-1)*15.4*0.787; source Bauer, C. 2007; lognormal variance with pedigree 0.372, pedigree (4,4,5,5,1)
  (same comment as for Acetaldehyde)
- Ethyl benzene [air, urban air close to ground]: 6.03271e-7 kg; = 3.53E-08* bagasse_input*(-1)*15.4*0.787; source Bauer, C. 2007; lognormal variance with pedigree 0.112, pedigree (4,4,5,5,1)
  (same comment as for Acetaldehyde)
- Fluorine [air, urban air close to ground]: 1.00488e-6 kg; = 5.88E-08* bagasse_input*(-1)*15.4*0.787; source Bauer, C. 2007; lognormal variance with pedigree 0.112, pedigree (4,4,5,5,1)
  (same comment as for Cadmium II)
- Formaldehyde [air, urban air close to ground]: 2.61474e-6 kg; = 1.53E-07* bagasse_input*(-1)*15.4*0.787; source Bauer, C. 2007; lognormal variance with pedigree 0.5526, pedigree (2,1,3,1,5)
  calculated from the emission factor (kg/MJ input) given for cogen 6400kW.
- Hexachlorobenzene [air, urban air close to ground]: 1.44751e-13 kg; = 8.47E-15* bagasse_input*(-1)*15.4*0.787; source Bauer, C. 2007; lognormal variance with pedigree 0.372, pedigree (4,4,5,5,1)
  (same comment as for Acetaldehyde)
- Hydrocarbons, aliphatic, alkanes, unspecified [air, urban air close to ground]: 1.82861e-5 kg; = 1.07E-06* bagasse_input*(-1)*15.4*0.787; source Bauer, C. 2007; lognormal variance with pedigree 0.112, pedigree (4,4,5,5,1)
  (same comment as for Cadmium II)
- Hydrocarbons, aliphatic, unsaturated [air, urban air close to ground]: 6.23779e-5 kg; = 3.65E-06* bagasse_input*(-1)*15.4*0.787; source Bauer, C. 2007; lognormal variance with pedigree 0.112, pedigree (4,4,5,5,1)
  (same comment as for Acetaldehyde)
- Lead II [air, urban air close to ground]: 4.25537e-7 kg; = 2.49E-08* bagasse_input*(-1)*15.4*0.787; source Bauer, C. 2007; lognormal variance with pedigree 0.722, pedigree (4,4,5,5,1)
  (same comment as for Acetaldehyde)
- Magnesium [air, urban air close to ground]: 7.24609e-6 kg; = 4.24E-07* bagasse_input*(-1)*15.4*0.787; source Bauer, C. 2007; lognormal variance with pedigree 0.722, pedigree (4,4,5,5,1)
  (same comment as for Acetaldehyde)
- Manganese II [air, urban air close to ground]: 7.24609e-6 kg; = 4.24E-07* bagasse_input*(-1)*15.4*0.787; source Bauer, C. 2007; lognormal variance with pedigree 0.722, pedigree (4,4,5,5,1)
  (same comment as for Acetaldehyde)
- Mercury II [air, urban air close to ground]: 6.03271e-9 kg; = 3.53E-10* bagasse_input*(-1)*15.4*0.787; source Bauer, C. 2007; lognormal variance with pedigree 0.722, pedigree (4,4,5,5,1)
  (same comment as for Acetaldehyde)
- Methane, non-fossil [air, urban air close to ground]: 8.04931e-6 kg; = 4.71E-07* bagasse_input*(-1)*15.4*0.787; source Bauer, C. 2007; lognormal variance with pedigree 0.112, pedigree (4,4,5,5,1)
  (same comment as for Acetaldehyde)
- NMVOC, non-methane volatile organic compounds [air, urban air close to ground]: 1.20654e-5 kg; = 7.06E-07* bagasse_input*(-1)*15.4*0.787; source Bauer, C. 2007; lognormal variance with pedigree 0.112, pedigree (4,4,5,5,1)
  (same comment as for Acetaldehyde)
- Nickel II [air, urban air close to ground]: 1.20654e-7 kg; = 7.06E-09* bagasse_input*(-1)*15.4*0.787; source Bauer, C. 2007; lognormal variance with pedigree 0.722, pedigree (4,4,5,5,1)
  (same comment as for Acetaldehyde)
- Nitrogen oxides [air, urban air close to ground]: 0.00194824 kg; = 1.14E-04* bagasse_input*(-1)*15.4*0.787; source Bauer, C. 2007; lognormal variance with pedigree 0.1018, pedigree (2,3,5,1,2)
  (same comment as for Acetaldehyde)
- PAH, polycyclic aromatic hydrocarbons [air, urban air close to ground]: 2.23877e-7 kg; = 1.31E-08* bagasse_input*(-1)*15.4*0.787; source Bauer, C. 2007; lognormal variance with pedigree 0.372, pedigree (4,4,5,5,1)
  (same comment as for Acetaldehyde)
- Particulate Matter, < 2.5 um [air, urban air close to ground]: 0.00122705 kg; = 7.18E-05* bagasse_input*(-1)*15.4*0.787; source Bauer, C. 2007; lognormal variance with pedigree 0.3618, pedigree (2,3,5,1,2)
  (same comment as for Acetaldehyde)
- Pentachlorophenol [air, urban air close to ground]: 1.62866e-10 kg; = 9.53E-12* bagasse_input*(-1)*15.4*0.787; source Bauer, C. 2007; lognormal variance with pedigree 0.112, pedigree (4,4,5,5,1)
  (same comment as for Acetaldehyde)
- Phosphorus [air, urban air close to ground]: 6.03271e-6 kg; = 3.53E-07* bagasse_input*(-1)*15.4*0.787; source Bauer, C. 2007; lognormal variance with pedigree 0.112, pedigree (4,4,5,5,1)
  (same comment as for Acetaldehyde)
- Potassium I [air, urban air close to ground]: 0.00046997 kg; = 2.75E-05* bagasse_input*(-1)*15.4*0.787; source Bauer, C. 2007; lognormal variance with pedigree 0.722, pedigree (4,4,5,5,1)
  (same comment as for Acetaldehyde)
- Sodium I [air, urban air close to ground]: 2.61474e-5 kg; = 1.53E-06* bagasse_input*(-1)*15.4*0.787; source Bauer, C. 2007; lognormal variance with pedigree 0.722, pedigree (4,4,5,5,1)
  (same comment as for Acetaldehyde)
- Sulfur dioxide [air, urban air close to ground]: 4.25537e-5 kg; = 2.49E-06* bagasse_input*(-1)*15.4*0.787; source Bauer, C. 2007; lognormal variance with pedigree 0.0618, pedigree (2,3,5,1,2)
  (same comment as for Cadmium II)
- Toluene [air, urban air close to ground]: 6.03271e-6 kg; = 3.53E-07* bagasse_input*(-1)*15.4*0.787; source Bauer, C. 2007; lognormal variance with pedigree 0.112, pedigree (4,4,5,5,1)
  (same comment as for Acetaldehyde)
- Water [air, unspecified]: 5.23214e-6 m3; name water_to_air_unspecified; = (water_decarbonised_input/1000)*fraction_WDC_to_air; lognormal variance with pedigree 0.130025, pedigree (4,4,5,2,4)
  Calculated value based on literature values and expert opinion. See comments in the parametres' comment field.
  property fraction, origin: fresh water 1; name fraction_origin_fresh_water
  property fraction, origin: salt water 0; name fraction_origin_salt_water
  property fraction, origin: unspecified 0; name fraction_origin_unspecified
- Zinc II [air, urban air close to ground]: 6.03271e-6 kg; = 3.53E-07* bagasse_input*(-1)*15.4*0.787; source Bauer, C. 2007; lognormal variance with pedigree 0.722, pedigree (4,4,5,5,1)
  (same comment as for Acetaldehyde)
- m-Xylene [air, urban air close to ground]: 2.40967e-6 kg; = 1.41E-07* bagasse_input*(-1)*15.4*0.787; source Bauer, C. 2007; lognormal variance with pedigree 0.112, pedigree (4,4,5,5,1)
  (same comment as for Acetaldehyde)
- Water [water, unspecified]: 8.27016e-6 m3; name water_to_water_unspecified; = (water_decarbonised_input/1000)*(1-fraction_WDC_to_air); lognormal variance with pedigree 0.130025, pedigree (4,4,5,2,4)
  (same comment as for Water)
  property fraction, origin: fresh water 1; name fraction_origin_fresh_water_Ww
  property fraction, origin: salt water 0; name fraction_origin_salt_water_Ww
  property fraction, origin: unspecified 0; name fraction_origin_unspecified_Ww

## Extrapolations
The original dataset is valid is based on measures from one cogen unit in Switzerland and has been extrapolated to a global dataset

The dataset was updated for energy production from biomass
Updated data for regionalization of Brazil (2014-2017):

- Production Volume
- Biomass input (Bagasse (2%) and Other Bioenergies (5%): includes firewood, bleach, rice hulls, biogas, wood, vegetable oils, etc.)

## Review by Christopher Oberschelp 2017-11-30
Dataset seems appropriately documented and key exchanges look reasonable. Individual deviations may be spotted by comparison with reference datasets (as there have been some back-and-forth changes of exchanges).
