# electricity, medium voltage, municipal waste incineration, import from Germany

Dataset: EcoSpold 2, unit process
Geography: CH
Time period: 2021-01-01 to 2023-12-31
Technology level: current
Classification: ISIC rev.4 ecoinvent: 3510:Electric power generation, transmission and distribution
Scenario: Business-as-Usual
System model: Allocation, cut-off by classification
Generated by: Johannes Müller
Database: ecoinvent
isCopyrightProtected: true
accessRestrictedTo: 1

## General comment
This dataset represents the amount of imported electricity generated from wastes, from DE to CH. The import volume is defined directly in the Swiss market mix, this is in the dataset market for electricity, medium voltage, CH. It is therefore set to rero in this dataset.
For a discussion of different ways of modeling electricity trade in LCI, please refer to (Itten & Frischknecht 2012).

## Included activities start
This activity represents the point of "handing over" the electricity from one country to the other at the border.

## Included activities end
This dataset doesn't include any electricity losses or transmission infrastructure as these are accounted for in the market datasets.

## Reference product
- electricity, medium voltage: 1 kWh; By-product classification allocatable product; CPC 17100: Electrical energy; HS2017 271600: Electrical energy
  production volume 0 kWh
    The contribution of this import to the Swiss electricity mix is defined directly in the market for electricity, high voltage, CH.
  property price 0.1 EUR2005
    Calculated to be between the price of electricity, high voltage and electricity, low voltage.
  properties: carbon allocation 0 kg, carbon content 0

## Inputs from technosphere
- electricity, medium voltage: 1 kWh; lognormal variance with pedigree 0.0088, pedigree (1,1,2,1,3)
  Imports of electricity from biofules from DE to CH are assumed to be supplied by the activity "electricity, from municipal waste incineration to generic market for electricity, medium voltage" (DE). An ActivityLink was established to reflect this.
