# rare earth oxides production, from rare earth carbonate concentrate

Dataset: EcoSpold 2, unit process
Geography: RoW
Time period: 2017-01-01 to 2023-12-31
Technology level: current
Classification: ISIC rev.4 ecoinvent: 0729:Mining of other non-ferrous metal ores
Synonyms: ion-adsorption clays; REO; REE
Tags: combined production
Scenario: Business-as-Usual
System model: Allocation, cut-off by classification
Generated by: Efstathios Kakkos
Database: ecoinvent
isCopyrightProtected: true
accessRestrictedTo: 1

## General comment
For the processing of rare earth carbonates (extracted from ion-adsorption clays) to produce rare earth oxides, globally. This dataset is based on the following publication: Arshi, P. S., Vahidi, E., & Zhao, F. (2018). Behind the Scenes of Clean Energy: The Environmental Footprint of Rare Earth Products. ACS Sustainable Chemistry & Engineering, 6(3), 3311-3320. doi:10.1021/acssuschemeng.7b03484 and the critical materials life cycle assessment tool (CMLCAT) of Arshi et al. (2018), provided by F. Zhao from Purdue University.Specific modifications were made in order to make the dataset more transparent.
Background: Metals are produced as part of a complex, highly interconnected and interdependent system, with many desirable but scarce/critical metals recovered as by-products during the production of one or more ‘host’ metal(s). Currently, mining and processing of rare earth elements is predominantly carried out in China, where they are extracted mainly via open pit mining of bastnäsite and/or monazite deposits or the leaching of ion-adsorption clays.
Modelling approach: This dataset was created using the critical materials life cycle assessment tool (CMLCAT) of Arshi et al. (2018).

## Included activities start
The activity starts with the processing of rare earth carbonate concentrate.

## Included activities end
The activity ends with the production of individual rare earth oxides.

## Allocation
No allocation is applied.

## Geography
This dataset is valid for the whole corresponding region.

## Technology
This dataset refers to the extraction (calcination) and refining (solvent extraction) of individual rare earth oxides, obtained from mined rare earth carbonates. ""After drying and calcination, 90−92% mixed REOs are produced. The REO mixture from the leaching process undergoes a combined solvent extraction process at a facility in Southern China. The process inventory includes conversion to RE chlorides, repeated SX using organic solvents such as P204 and P507 and precipitation using oxalic acid. The high purity individual RE precipitate is further roasted to obtain separated pure oxides."" Source: Arshi, P. S., Vahidi, E., & Zhao, F. (2018). Behind the Scenes of Clean Energy: The Environmental Footprint of Rare Earth Products. ACS Sustainable Chemistry & Engineering, 6(3), 3311-3320. doi:10.1021/acssuschemeng.7b03484

## Time period
Data are considered representative of current production practices.

## Reference product
- lanthanum oxide: 1 kg; name La2O3; By-product classification allocatable product; CPC 3429: Compounds of rare earth metals, of yttrium or of scandium; HS2017 284690: Compounds, inorganic or organic (excluding cerium), of rare-earth metals, of yttrium, scandium or of mixtur[...]; CAS 1312-81-8
  production volume 5.60356e6 kg
    The production volume of lanthanum oxide from ion adsorption clays is expressed in kg. The production volume is estimated the following way: The total production volume of rare earth metals for China for 2015, which is provided by the U.S. GEOLOGICAL SURVEY MINERALS YEAR-BOOK—2015 report on page 19 table 6 (105000000 kg) is multiplied by the percentage attributed to China’s REE production from ion - adsorption clays (35%) (RECOVERY OF RARE EARTH ELEMENTS FROM CLAY MINERALS, 2014, Vladimiros G. PAPANGELAKIS and Georgiana MOLDOVEANU), the mass fraction of the lanthanum oxide contained in the final refined REO (0.2721) and the contribution percentage of China to the global production (81.4%) based again on the abovementioned USGS report.
  property lanthanum content 0.85268; name La2O3_La_content
    lanthanum content on a dry matter basis
  property oxygen content 0.14732; name La2O3_O_content
    oxygen content on a dry matter basis
  property price 6.27984 EUR2005
    This price is based on an average price from 2012 to 2022 data collected from the ISE database. The price is calculated considering the incoterm:FOB Last access: October 2023 The prices were converted to EUR based on the annual exchange rates published by the European Central Bank (https://sdw.ecb.europa.eu/quickview.do?SERIES_KEY=120.EXR.A.USD.EUR.SP00.A, last accessed on 2023-06-01) and adjusted for inflation relative to 2005 using the producer price index (PPI) of the euro area, published by eurostat (https://ec.europa.eu/eurostat/databrowser/view/STS_INPP_A__custom_6416181/default/table?lang=en, last accessed on 2023-06-01).
  properties: allocation factor 0.270811, carbon allocation 0 kg, carbon content 0, carbon content, fossil 0, carbon content, non-fossil 0, dry mass 1 kg, true value 1.70883, water content 0, water in wet mass 0 kg, wet mass 1 kg

## Inputs from technosphere
- DTPA, diethylenetriaminepentaacetic acid: 0.00275693, 0.00558244 kg (2 suppliers, which the file names only by identifier); sum of these 0.00833937 kg; = 0.025321888*CeO2/0.822296519+0.025321888*Eu2O3/0.822296519+0.025321888*La2O3/0.822296519+0.025321888*Nd2O3/0.822296519+0.025321888*Sm2O3/0.822296519+0.025321888*Yb2O3/0.822296519+0.025321888*Y2O3/0.822296519; lognormal variance with pedigree 0.0052, pedigree (2,1,3,5,1)
  Value taken from the critical materials life cycle assessment tool (CMLCAT) of Arshi et al. (2018), provided by F. Zhao from Purdue university (more information on the sampling procedure) and adjusted to correspond to the production of indi-vidual rare earth metals.
  properties: carbon content, fossil 0.427481, dry mass 1 kg, heating value, net 12.95 MJ, wet mass 1 kg
- barium hydroxide: 0.0347356 kg; = 0.105472103*CeO2/0.822296519+0.105472103*Eu2O3/0.822296519+0.105472103*La2O3/0.822296519+0.105472103*Nd2O3/0.822296519+0.105472103*Sm2O3/0.822296519+0.105472103*Yb2O3/0.822296519+0.105472103*Y2O3/0.822296519; lognormal variance with pedigree 0.0052, pedigree (2,1,3,5,1)
  (same comment as for DTPA, diethylenetriaminepentaacetic acid)
- chemical factory, organics: 2.27241e-9 unit; = 6.90E-09*CeO2/0.822296519+6.90E-09*Eu2O3/0.822296519+6.90E-09*La2O3/0.822296519+6.90E-09*Nd2O3/0.822296519+6.90E-09*Sm2O3/0.822296519+6.90E-09*Yb2O3/0.822296519+6.90E-09*Y2O3/0.822296519; lognormal variance with pedigree 0.3346, pedigree (2,1,3,5,1)
  Input has been assumed for compliance with the Ecoinvent Guidelines. Value has been taken from the dataset ""rare earth oxides production from bastnäsite concentrate"" from the Ecoinvent database version 3.6.
- citric acid: 0.260503 kg; = 0.791*CeO2/0.822296519+0.791*Eu2O3/0.822296519+0.791*La2O3/0.822296519+0.791*Nd2O3/0.822296519+0.791*Sm2O3/0.822296519+0.791*Yb2O3/0.822296519+0.791*Y2O3/0.822296519; lognormal variance with pedigree 0.0052, pedigree (2,1,3,5,1)
  (same comment as for DTPA, diethylenetriaminepentaacetic acid)
  properties: carbon content, fossil 0.375099, dry mass 1 kg, heating value, net 16.41 MJ, wet mass 1 kg
- electricity, medium voltage: 0.0156029, 0.000228836, 2.03531e-5, 0.00177457, 0.0023254, 0.00246261, 0.00125433, 0.000173242, 0.00109649, 4.62858e-5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 kWh (53 suppliers, which the file names only by identifier); sum of these 0.244681 kWh; = 0.742957081666666*CeO2/0.822296519+0.742957081666666*Eu2O3/0.822296519+0.742957081666666*La2O3/0.822296519+0.742957081666666*Nd2O3/0.822296519+0.742957081666666*Sm2O3/0.822296519+0.742957081666666*Yb2O3/0.822296519+0.742957081666666*Y2O3/0.822296519; lognormal variance with pedigree 0.0052, pedigree (2,1,3,5,1)
  (same comment as for DTPA, diethylenetriaminepentaacetic acid)
- esters of versatic acid: 0.00342989, 0.00169388 kg (2 suppliers, which the file names only by identifier); sum of these 0.00512376 kg; = 0.01555794*CeO2/0.822296519+0.01555794*Eu2O3/0.822296519+0.01555794*La2O3/0.822296519+0.01555794*Nd2O3/0.822296519+0.01555794*Sm2O3/0.822296519+0.01555794*Yb2O3/0.822296519+0.01555794*Y2O3/0.822296519; lognormal variance with pedigree 0.0052, pedigree (2,1,3,5,1)
  (same comment as for DTPA, diethylenetriaminepentaacetic acid)
  properties: carbon content, fossil 0.727273, dry mass 1 kg, heating value, net 22.04 MJ, wet mass 1 kg
- fatty alcohol: 0.0112369 kg; = 0.034120172*CeO2/0.822296519+0.034120172*Eu2O3/0.822296519+0.034120172*La2O3/0.822296519+0.034120172*Nd2O3/0.822296519+0.034120172*Sm2O3/0.822296519+0.034120172*Yb2O3/0.822296519+0.034120172*Y2O3/0.822296519; lognormal variance with pedigree 0.0052, pedigree (2,1,3,5,1)
  (same comment as for DTPA, diethylenetriaminepentaacetic acid)
  properties: carbon content, fossil 0.0408973, carbon content, non-fossil 0.743434, dry mass 1 kg, heating value, net 41.01 MJ, wet mass 1 kg
- hazardous waste, for underground deposit: -5.34112e-5, -0.000829205 kg (2 suppliers, which the file names only by identifier); sum of these -0.000882616 kg; = 0.00268*CeO2/0.822296519+0.00268*Eu2O3/0.822296519+0.00268*La2O3/0.822296519+0.00268*Nd2O3/0.822296519+0.00268*Sm2O3/0.822296519+0.00268*Yb2O3/0.822296519+0.00268*Y2O3/0.822296519; lognormal variance with pedigree 0.0032, pedigree (2,1,1,5,1)
  (same comment as for DTPA, diethylenetriaminepentaacetic acid)
  production volume
    The production volume is expressed in kg. Its calculation is based on the fact that for the production of 0.2721 kg of lanthanum oxide from ion adsorption clays, 0.00268 kg of hazardous waste, for underground deposit is produced as a byproduct. The global annual production of lanthanum oxide through that pathway is assumed to be 8139663 kg (see lanthanum oxide PV comment).
  properties: carbon content, fossil 0.55467, dry mass 1 kg, wet mass 1 kg
- hydrochloric acid, without water, in 30% solution state: 0.190915, 0.872206 kg (2 suppliers, which the file names only by identifier); sum of these 1.06312 kg; = 3.22809*CeO2/0.822296519+3.22809*Eu2O3/0.822296519+3.22809*La2O3/0.822296519+3.22809*Nd2O3/0.822296519+3.22809*Sm2O3/0.822296519+3.22809*Yb2O3/0.822296519+3.22809*Y2O3/0.822296519; lognormal variance with pedigree 0.0052, pedigree (2,1,3,5,1)
  (same comment as for DTPA, diethylenetriaminepentaacetic acid)
  properties: dry mass 1 kg, heating value, net 3.32 MJ, wet mass 1 kg
- kerosene: 0.00165437, 0.00808381, 6.06804e-5, 4.77903e-5, 7.78367e-5, 0.000908493, 0.00028636, 0.000117601 kg (8 suppliers, which the file names only by identifier); sum of these 0.0112369 kg; = 0.034120172*CeO2/0.822296519+0.034120172*Eu2O3/0.822296519+0.034120172*La2O3/0.822296519+0.034120172*Nd2O3/0.822296519+0.034120172*Sm2O3/0.822296519+0.034120172*Yb2O3/0.822296519+0.034120172*Y2O3/0.822296519; lognormal variance with pedigree 0.0052, pedigree (2,1,3,5,1)
  (same comment as for DTPA, diethylenetriaminepentaacetic acid)
  properties: carbon content, fossil 0.85, dry mass 1 kg, heating value, net 43 MJ, wet mass 1 kg
- low level radioactive waste: -1.42272e-5 m3; = 4.32E-05*CeO2/0.822296519+4.32E-05*Eu2O3/0.822296519+4.32E-05*La2O3/0.822296519+4.32E-05*Nd2O3/0.822296519+4.32E-05*Sm2O3/0.822296519+4.32E-05*Yb2O3/0.822296519+4.32E-05*Y2O3/0.822296519; lognormal variance with pedigree 0.0032, pedigree (2,1,1,5,1)
  (same comment as for DTPA, diethylenetriaminepentaacetic acid)
  production volume
    The production volume is expressed in m3. Its calculation is based on the fact that for the production of 0.2721 kg of lanthanum oxide from ion adsorption clays, 4.32E-05 m3 of low level radioactive waste is produced as a byproduct. The global annual production of lanthanum oxide through that pathway is assumed to be 8139663 kg (see lanthanum oxide PV comment).
  properties: dry mass 2500 kg, wet mass 2500 kg
- municipal solid waste: -5.78216e-5, -2.96922e-6, -3.52582e-7, -2.2402e-6, -2.19438e-6, -0.00167523, -2.46723e-7, -7.91936e-8, -1.78999e-7, -7.45179e-6 kg (10 suppliers, which the file names only by identifier); sum of these -0.00174877 kg; = 0.00531*CeO2/0.822296519+0.00531*Eu2O3/0.822296519+0.00531*La2O3/0.822296519+0.00531*Nd2O3/0.822296519+0.00531*Sm2O3/0.822296519+0.00531*Yb2O3/0.822296519+0.00531*Y2O3/0.822296519; lognormal variance with pedigree 0.0032, pedigree (2,1,1,5,1)
  (same comment as for DTPA, diethylenetriaminepentaacetic acid)
  production volume
    The production volume is expressed in kg. Its calculation is based on the fact that for the production of 0.2721 kg of lanthanum oxide from ion adsorption clays, 0.00531 kg of municipal solid waste is produced as a byproduct. The global annual production of lanthanum oxide through that pathway is assumed to be 8139663 kg (see lanthanum oxide PV comment).
  properties: carbon content, fossil 0.17155, carbon content, non-fossil 0.26165, dry mass 0.771 kg, heating value, net 11.74 MJ, water content 0.29702, wet mass 1 kg
  note on heating value, net: Value taken from the general comment of the treatment dataset.
- natural gas, high pressure: 0.00393979, 0.00664594, 0.0144968, 0.00485147, 0.00113377, 0.00674797, 0.00647519, 0.0170267, 0.000577118, 0.00657342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 m3 (39 suppliers, which the file names only by identifier); sum of these 0.60934 m3; = 1.850218*CeO2/0.822296519+1.850218*Eu2O3/0.822296519+1.850218*La2O3/0.822296519+1.850218*Nd2O3/0.822296519+1.850218*Sm2O3/0.822296519+1.850218*Yb2O3/0.822296519+1.850218*Y2O3/0.822296519; lognormal variance with pedigree 0.0052, pedigree (2,1,3,5,1)
  (same comment as for DTPA, diethylenetriaminepentaacetic acid)
  properties: carbon content, fossil 0.602381, dry mass 0.84 kg, heating value, gross 40 MJ, heating value, net 36 MJ, wet mass 0.84 kg
  note on carbon content, fossil: An average C content of 0.506 kg C/ m3 has been assumed (this average has been calculated using data in Tab 3.5, ecoinvent v2.2 report 6_V
  note on heating value, net: Literature value, Source: Christoph Meili;Niels Jungbluth;Maresa Bussa (2021) Life cycle inventories of crude oil and natural gas extraction. ESU-services Ltd. commissioned by BAFU & VSG, Schaffhausen, Switzerland, http://esu-services.ch/data/public-lci-reports/
- rare earth carbonate concentrate: 0.519983 kg; = 1.578891846034*CeO2/0.822296519+1.578891846034*Eu2O3/0.822296519+1.578891846034*La2O3/0.822296519+1.578891846034*Nd2O3/0.822296519+1.578891846034*Sm2O3/0.822296519+1.578891846034*Yb2O3/0.822296519+1.578891846034*Y2O3/0.822296519; lognormal variance with pedigree 0.0052, pedigree (2,1,3,5,1)
  (same comment as for DTPA, diethylenetriaminepentaacetic acid)
  properties: cerium content 0.0135, dry mass 1 kg, dysprosium content 0.0157982, erbium content 0.00810191, gadolinium content 0.021148, lanthanum content 0.122451, neodymium content 0.0992702, praseodymium content 0.02728, samarium content 0.0216019, wet mass 1 kg, ytterbium content 0.00802466, yttrium content 0.10252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
  note on cerium content: The calculation of the individual rare earth element (REE) content of the carbonate concentrate is based on the fact that the concentrate contains 45% mixed REE and that the per kg production of refined RE oxides from the ion adsorption clays contain 0.03 kg cerium oxide.
  note on dysprosium content: The calculation of the individual rare earth element (REE) content of the carbonate concentrate is based on the fact that the concentrate contains 45% mixed REE and that the per kg production of refined RE oxides from the ion adsorption clays contain 0.0351 dysprosium oxide.
  note on erbium content: The calculation of the individual rare earth element (REE) content of the carbonate concentrate is based on the fact that the concentrate contains 45% mixed REE and that the per kg production of refined RE oxides from the ion adsorption clays contain 0.018 kg erbium oxide.
  note on gadolinium content: The calculation of the individual rare earth element (REE) content of the carbonate concentrate is based on the fact that the concentrate contains 45% mixed REE and that the per kg production of refined RE oxides from the ion adsorption clays contain 0.047 gadolinium oxide.
  note on lanthanum content: The calculation of the individual rare earth element (REE) content of the carbonate concentrate is based on the fact that the concentrate contains 45% mixed REE and that the per kg production of refined RE oxides from the ion adsorption clays contain 0.2721 kg lanthanum oxide.
  note on neodymium content: The calculation of the individual rare earth element (REE) content of the carbonate concentrate is based on the fact that the concentrate contains 45% mixed REE and that the per kg production of refined RE oxides from the ion adsorption clays contain 0.2206 kg neodymium oxide.
  note on praseodymium content: The calculation of the individual rare earth element (REE) content of the carbonate concentrate is based on the fact that the concentrate contains 45% mixed REE and that the per kg production of refined RE oxides from the ion adsorption clays contain 0.0606 kg praseodymium oxide.
  note on samarium content: The calculation of the individual rare earth element (REE) content of the carbonate concentrate is based on the fact that the concentrate contains 45% mixed REE and that the per kg production of refined RE oxides from the ion adsorption clays contain 0.048 kg samarium oxide.
  note on ytterbium content: The calculation of the individual rare earth element (REE) content of the carbonate concentrate is based on the fact that the concentrate contains 45% mixed REE and that the per kg production of refined RE oxides from the ion adsorption clays contain 0.0178 kg ytterbium oxide.
  note on yttrium content: The calculation of the individual rare earth element (REE) content of the carbonate concentrate is based on the fact that the concentrate contains 45% mixed REE and that the per kg production of refined RE oxides from the ion adsorption clays contain 0.2278 kg yttrium oxide.
- refinery sludge: -6.62596e-5, -3.03337e-6, -0.000638776 kg (3 suppliers, which the file names only by identifier); sum of these -0.000708069 kg; = 0.00215*CeO2/0.822296519+0.00215*Eu2O3/0.822296519+0.00215*La2O3/0.822296519+0.00215*Nd2O3/0.822296519+0.00215*Sm2O3/0.822296519+0.00215*Yb2O3/0.822296519+0.00215*Y2O3/0.822296519; lognormal variance with pedigree 0.0032, pedigree (2,1,1,5,1)
  (same comment as for DTPA, diethylenetriaminepentaacetic acid)
  production volume
    The production volume is expressed in kg. Its calculation is based on the fact that for the production of 0.2721 kg of lanthanum oxide from ion adsorption clays, 0.00215 kg of refinery sludge is produced as a byproduct. The global annual production of lanthanum oxide through that pathway is assumed to be 8139663 kg (see lanthanum oxide PV comment).
  properties: carbon content, fossil 0.76786, dry mass 0.105 kg, heating value, net 2.45 MJ, water content 8.5238, wet mass 1 kg
- soda ash, dense: 0.0949487 kg; = 0.288304721*CeO2/0.822296519+0.288304721*Eu2O3/0.822296519+0.288304721*La2O3/0.822296519+0.288304721*Nd2O3/0.822296519+0.288304721*Sm2O3/0.822296519+0.288304721*Yb2O3/0.822296519+0.288304721*Y2O3/0.822296519; lognormal variance with pedigree 0.0052, pedigree (2,1,3,5,1)
  (same comment as for DTPA, diethylenetriaminepentaacetic acid)
  properties: carbon content, fossil 0.113208, dry mass 1 kg, heating value, net 3.43 MJ, wet mass 1 kg
- soda ash, light: 0.0775915, 0.0173571 kg (2 suppliers, which the file names only by identifier); sum of these 0.0949487 kg; = 0.288304721*CeO2/0.822296519+0.288304721*Eu2O3/0.822296519+0.288304721*La2O3/0.822296519+0.288304721*Nd2O3/0.822296519+0.288304721*Sm2O3/0.822296519+0.288304721*Yb2O3/0.822296519+0.288304721*Y2O3/0.822296519; lognormal variance with pedigree 0.0052, pedigree (2,1,3,5,1)
  (same comment as for DTPA, diethylenetriaminepentaacetic acid)
  properties: carbon content, fossil 0.0517241, dry mass 1 kg, heating value, net 3.43 MJ, wet mass 1 kg
- sodium hydroxide, without water, in 50% solution state: 0.0782117, 0.800952 kg (2 suppliers, which the file names only by identifier); sum of these 0.879164 kg; = 2.669517*CeO2/0.822296519+2.669517*Eu2O3/0.822296519+2.669517*La2O3/0.822296519+2.669517*Nd2O3/0.822296519+2.669517*Sm2O3/0.822296519+2.669517*Yb2O3/0.822296519+2.669517*Y2O3/0.822296519; lognormal variance with pedigree 0.0052, pedigree (2,1,3,5,1)
  (same comment as for DTPA, diethylenetriaminepentaacetic acid)
  properties: dry mass 1 kg, heating value, net 3.03 MJ, wet mass 1 kg
- spent solvent mixture: -0.00646086, -0.27577, -0.705772 kg (3 suppliers, which the file names only by identifier); sum of these -0.988003 kg; = 3*CeO2/0.822296519+3*Eu2O3/0.822296519+3*La2O3/0.822296519+3*Nd2O3/0.822296519+3*Sm2O3/0.822296519+3*Yb2O3/0.822296519+3*Y2O3/0.822296519; lognormal variance with pedigree 0.0032, pedigree (2,1,1,5,1)
  Value calculated from simplified mass balance and assumed here for completeness purposes. The value was not contained originally in the critical materials life cycle assessment tool (CMLCAT) of Arshi et al. (2018), provided by F. Zhao from Purdue university.
  production volume
    The production volume is expressed in m3. Its calculation is based on the fact that for the production of 0.2721 kg of lanthanum oxide from ion adsorption clays, 3 kg of spent solvent mixture is produced as a byproduct. The global annual production of lanthanum oxide through that pathway is assumed to be 8139663 kg (see lanthanum oxide PV comment).
  properties: carbon content, fossil 0.167313, dry mass 0.835 kg, heating value, net 21.7 MJ, water content 0.197605, wet mass 1 kg
  note on carbon content, fossil: Tab A.7, ecoinvent v2.2 report 13_I. C content has been calculated after data in the tables, and then referred to 1 kg DM
- sulfidic tailings, generic: -1.71048 kg; = 5.193754739*CeO2/0.822296519+5.193754739*Eu2O3/0.822296519+5.193754739 *La2O3/0.822296519+5.193754739*Nd2O3/0.822296519+5.193754739 *Sm2O3/0.822296519+5.193754739*Yb2O3/0.822296519+5.193754739*Y2O3/0.822296519; lognormal variance with pedigree 0.0032, pedigree (2,1,1,5,1)
  (same comment as for spent solvent mixture)
  production volume
    The production volume is expressed in m3. Its calculation is based on the fact that for the production of 0.2721 kg of lanthanum oxide from ion adsorption clays, 5.1938 kg of sulfidic tailings is produced as a byproduct. The global annual production of lanthanum oxide through that pathway is assumed to be 8139663 kg (see lanthanum oxide PV comment).
  properties: aluminium content 0.014738, calcium content 0.0045972, carbon content, fossil 0.0087785, dry mass 0.7 kg, iron content 0.015374, magnesium content 0.0022359, oxygen content 0.89157, potassium content 0.0025181, silicon content 0.053273, sodium content 0.0014472, water content 0.42857, wet mass 1 kg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
- wastewater, average: -8.60631e-5, -0.0143213, -0.00342451, -5.09893e-5 m3 (4 suppliers, which the file names only by identifier); sum of these -0.0178829 m3; = 0.0543*CeO2/0.822296519+0.0543*Eu2O3/0.822296519+0.0543*La2O3/0.822296519+0.0543*Nd2O3/0.822296519+0.0543*Sm2O3/0.822296519+0.0543*Yb2O3/0.822296519+0.0543*Y2O3/0.822296519; lognormal variance with pedigree 0.0032, pedigree (2,1,1,5,1)
  (same comment as for spent solvent mixture)
  production volume
    The production volume is expressed in m3. Its calculation is based on the fact that for the production of 0.2721 kg of lanthanum oxide from ion adsorption clays, 0.0543 m3 of wastewater, average is produced as a byproduct. The global annual production of lanthanum oxide through that pathway is assumed to be 8139663 kg (see lanthanum oxide PV comment).
  properties: carbon content, non-fossil 0.19404, dry mass 0.34684 kg, mass concentration, TOC 0.1091 kg/m3, mass concentration, calcium 0.039453 kg/m3, mass concentration, chlorine 0.030031 kg/m3, mass concentration, hydrogen 0.013365 kg/m3, mass concentration, nitrogen 0.031015 kg/m3, mass concentration, oxygen 0.069824 kg/m3, mass concentration, sodium 0.06456 kg/m3, mass concentration, sulfur 0.015602 kg/m3, water content 2882.17, wet mass 1000 kg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

## Inputs from nature
- Water, unspecified natural origin [natural resource, in water]: 0.0185516 m3; = 0.056330472*CeO2/0.822296519+0.056330472*Eu2O3/0.822296519+0.056330472*La2O3/0.822296519+0.056330472*Nd2O3/0.822296519+0.056330472*Sm2O3/0.822296519+0.056330472*Yb2O3/0.822296519+0.056330472*Y2O3/0.822296519; lognormal variance with pedigree 0.0052, pedigree (2,1,3,5,1)
  (same comment as for DTPA, diethylenetriaminepentaacetic acid)

## Emissions to nature
- Carbon dioxide, fossil [air, non-urban air or from high stacks]: 1.06138 kg; = 3.22281358467545*CeO2/0.822296519+3.22281358467545*Eu2O3/0.822296519+3.22281358467545*La2O3/0.822296519+3.22281358467545*Nd2O3/0.822296519+3.22281358467545*Sm2O3/0.822296519+3.22281358467545*Yb2O3/0.822296519+3.22281358467545*Y2O3/0.822296519; lognormal variance with pedigree 0.0052, pedigree (2,1,3,5,1)
  (same comment as for DTPA, diethylenetriaminepentaacetic acid)
- Chlorine [air, non-urban air or from high stacks]: 7.06725e-7 kg; = 0.00000214592*CeO2/0.822296519+0.00000214592*Eu2O3/0.822296519+0.00000214592*La2O3/0.822296519+0.00000214592*Nd2O3/0.822296519+0.00000214592*Sm2O3/0.822296519+0.00000214592*Yb2O3/0.822296519+0.00000214592*Y2O3/0.822296519; lognormal variance with pedigree 0.0446, pedigree (2,1,3,5,1)
  (same comment as for DTPA, diethylenetriaminepentaacetic acid)
- Hydrocarbons, aliphatic, alkanes, unspecified [air, non-urban air or from high stacks]: 7.774e-6 kg; = 0.0000236052*CeO2/0.822296519+0.0000236052*Eu2O3/0.822296519+0.0000236052*La2O3/0.822296519+0.0000236052*Nd2O3/0.822296519+0.0000236052*Sm2O3/0.822296519+0.0000236052*Yb2O3/0.822296519+0.0000236052*Y2O3/0.822296519; lognormal variance with pedigree 0.1246, pedigree (2,1,3,5,1)
  (same comment as for DTPA, diethylenetriaminepentaacetic acid)
- Hydrochloric acid [air, non-urban air or from high stacks]: 4.59372e-6 kg; = 0.0000139485*CeO2/0.822296519+0.0000139485*Eu2O3/0.822296519+0.0000139485*La2O3/0.822296519+0.0000139485*Nd2O3/0.822296519+0.0000139485*Sm2O3/0.822296519+0.0000139485*Yb2O3/0.822296519+0.0000139485*Y2O3/0.822296519; lognormal variance with pedigree 0.0446, pedigree (2,1,3,5,1)
  (same comment as for DTPA, diethylenetriaminepentaacetic acid)
- Nitrogen oxides [air, non-urban air or from high stacks]: 0.000766444 kg; = 0.002327253*CeO2/0.822296519+0.002327253*Eu2O3/0.822296519+0.002327253*La2O3/0.822296519+0.002327253*Nd2O3/0.822296519+0.002327253*Sm2O3/0.822296519+0.002327253*Yb2O3/0.822296519+0.002327253*Y2O3/0.822296519; lognormal variance with pedigree 0.0446, pedigree (2,1,3,5,1)
  (same comment as for DTPA, diethylenetriaminepentaacetic acid)
- Particulate Matter, > 10 um [air, non-urban air or from high stacks]: 3.14493e-5 kg; = 0.0000954936*CeO2/0.822296519+0.0000954936*Eu2O3/0.822296519+0.0000954936*La2O3/0.822296519+0.0000954936*Nd2O3/0.822296519+0.0000954936*Sm2O3/0.822296519+0.0000954936*Yb2O3/0.822296519+0.0000954936*Y2O3/0.822296519; lognormal variance with pedigree 0.0446, pedigree (2,1,3,5,1)
  (same comment as for DTPA, diethylenetriaminepentaacetic acid)
- Sulfur dioxide [air, non-urban air or from high stacks]: 5.30044e-6 kg; = 0.0000160944*CeO2/0.822296519+0.0000160944*Eu2O3/0.822296519+0.0000160944*La2O3/0.822296519+0.0000160944*Nd2O3/0.822296519+0.0000160944*Sm2O3/0.822296519+0.0000160944*Yb2O3/0.822296519+0.0000160944*Y2O3/0.822296519; lognormal variance with pedigree 0.0052, pedigree (2,1,3,5,1)
  (same comment as for DTPA, diethylenetriaminepentaacetic acid)
- BOD5, Biological Oxygen Demand [water, unspecified]: 0.000801929 kg; name BOD; = 0.002435*CeO2/0.822296519+0.002435*Eu2O3/0.822296519+0.002435*La2O3/0.822296519+0.002435*Nd2O3/0.822296519+0.002435*Sm2O3/0.822296519+0.002435*Yb2O3/0.822296519+0.002435*Y2O3/0.822296519; lognormal variance with pedigree 0.0446, pedigree (2,1,3,5,1)
  (same comment as for DTPA, diethylenetriaminepentaacetic acid)
- COD, Chemical Oxygen Demand [water, unspecified]: 0.00160386 kg; name COD; = 0.00487*CeO2/0.822296519+0.00487*Eu2O3/0.822296519+0.00487*La2O3/0.822296519+0.00487*Nd2O3/0.822296519+0.00487*Sm2O3/0.822296519+0.00487*Yb2O3/0.822296519+0.00487*Y2O3/0.822296519; lognormal variance with pedigree 0.0446, pedigree (2,1,3,5,1)
  (same comment as for DTPA, diethylenetriaminepentaacetic acid)
- Chlorine [water, unspecified]: 0.00418255 kg; = 0.0127*CeO2/0.822296519+0.0127*Eu2O3/0.822296519+0.0127*La2O3/0.822296519+0.0127*Nd2O3/0.822296519+0.0127*Sm2O3/0.822296519+0.0127*Yb2O3/0.822296519+0.0127*Y2O3/0.822296519; lognormal variance with pedigree 0.0446, pedigree (2,1,3,5,1)
  (same comment as for DTPA, diethylenetriaminepentaacetic acid)
- DOC, Dissolved Organic Carbon [water, unspecified]: 0.000594022 kg; name DOC; = 0.0018037037037037*CeO2/0.822296519+0.0018037037037037*Eu2O3/0.822296519+0.0018037037037037*La2O3/0.822296519+0.0018037037037037*Nd2O3/0.822296519+0.0018037037037037*Sm2O3/0.822296519+0.0018037037037037*Yb2O3/0.822296519+0.0018037037037037*Y2O3/0.822296519; lognormal variance with pedigree 0.0446, pedigree (2,1,3,5,1)
  (same comment as for DTPA, diethylenetriaminepentaacetic acid)
- Nitrogen [water, unspecified]: 0.000104728 kg; = 0.000318*CeO2/0.822296519+0.000318*Eu2O3/0.822296519+0.000318*La2O3/0.822296519+0.000318*Nd2O3/0.822296519+0.000318*Sm2O3/0.822296519+0.000318*Yb2O3/0.822296519+0.000318*Y2O3/0.822296519; lognormal variance with pedigree 0.0446, pedigree (2,1,3,5,1)
  (same comment as for DTPA, diethylenetriaminepentaacetic acid)
- Oils, unspecified [water, unspecified]: 1.11644e-5 kg; = 0.0000339*CeO2/0.822296519+0.0000339*Eu2O3/0.822296519+0.0000339*La2O3/0.822296519+0.0000339*Nd2O3/0.822296519+0.0000339*Sm2O3/0.822296519+0.0000339*Yb2O3/0.822296519+0.0000339*Y2O3/0.822296519; lognormal variance with pedigree 0.0446, pedigree (2,1,3,5,1)
  (same comment as for DTPA, diethylenetriaminepentaacetic acid)
- Suspended solids, unspecified [water, unspecified]: 0.000267749 kg; = 0.000813*CeO2/0.822296519+0.000813*Eu2O3/0.822296519+0.000813*La2O3/0.822296519+0.000813*Nd2O3/0.822296519+0.000813*Sm2O3/0.822296519+0.000813*Yb2O3/0.822296519+0.000813*Y2O3/0.822296519; lognormal variance with pedigree 0.0446, pedigree (2,1,3,5,1)
  (same comment as for DTPA, diethylenetriaminepentaacetic acid)
- TOC, Total Organic Carbon [water, unspecified]: 0.000594022 kg; name TOC; = 0.0018037037037037*CeO2/0.822296519+0.0018037037037037*Eu2O3/0.822296519+0.0018037037037037*La2O3/0.822296519+0.0018037037037037*Nd2O3/0.822296519+0.0018037037037037*Sm2O3/0.822296519+0.0018037037037037*Yb2O3/0.822296519+0.0018037037037037*Y2O3/0.822296519; lognormal variance with pedigree 0.0446, pedigree (2,1,3,5,1)
  (same comment as for DTPA, diethylenetriaminepentaacetic acid)

## Sampling procedure
This dataset is based on the following publication: Arshi, P. S., Vahidi, E., & Zhao, F. (2018). Behind the Scenes of Clean Energy: The Environmental Footprint of Rare Earth Products. ACS Sustainable Chemistry & Engineering, 6(3), 3311-3320. doi:10.1021/acssuschemeng.7b03484.
All exchanges from/ to the environment and from/to the technosphere were calculated using the critical materials life cycle assessment tool (CMLCAT) of Arshi et al. (2018), provided by F. Zhao from Purdue university. This excel-based software acts as a supporting tool to the abovementioned publication. Individual exchanges such as sulfidic tailings and wastewater which were not contained in the original datasets have been added for completness purposes and their calculation is based on mass balance.

## Extrapolations
Data are extrapolated from chinese production data to represent the global production, as China represents 81.4% of global rare earth element production (USGS minerals yearbook - 2016).
