# electricity voltage transformation from high to medium voltage, aluminium industry

Dataset: EcoSpold 2, unit process
Geography: IAI Area, Russia & RER w/o EU27 & EFTA
Time period: 2015-01-01 to 2023-12-31
Technology level: current
Classification: ISIC rev.4 ecoinvent: 3510:Electric power generation, transmission and distribution
Tags: electricity, primary aluminium industry
Scenario: Business-as-Usual
System model: Allocation, cut-off by classification
Generated by: Pascal Lesage
Database: ecoinvent
isCopyrightProtected: true
accessRestrictedTo: 1

## General comment
This dataset represents the transformation of electricity voltage from high to medium voltage. It is specific to the electricity mix consumed for aluminium production in the European aluminium producing countries outside the region covered by the European Aluminium Association (EAA), i.e. outside EU27 and EFTA. The actual countries covered by this region are Russia, Montenegro and Bosnia and Herzegovina. It includes transformation losses. Capital goods are however included in electricity markets.
It is assumed the primary aluminium industry consumes medium voltage electricity.
This dataset represents the transformation of electricity voltage from high to medium voltage.
Definition of the voltage levels:
- High voltage level above 24 kV (large scale industry)
- Medium voltage level between 1 kV and 24 kV (medium to small scale industry, service sector
and public buildings)
- Low voltage level below 1 kV (Households)

## Included activities start
This activity starts with the high voltage electricity arriving at the transformer station.

## Included activities end
This activity ends with 1kWh of high voltage electricity transformed to medium voltage.
This dataset includes the losses during voltage transformation.
It doesn't include the transformer station itself as this is included in the dataset for the transmission network.

## Time period
Production volume updated with 2015 data from IAI

## Reference product
- electricity, medium voltage, aluminium industry: 1 kWh; By-product classification allocatable product; CPC 17100: Electrical energy; HS2017 271600: Electrical energy
  production volume 5.88e10 kWh
    Calculated value. Based on the region's total production of high voltage electricity for the aluminium industry less high voltage transportation losses and losses of transforming from high to medium voltage. Please refer to the aluminium industry high voltage electricity production datasets for more information on the calculation of the annual production volume of high voltage electricity.
  property price 0.1 EUR2005
    Estimated to be the same as the generic "electricity, medium voltage".
  properties: carbon allocation 0 kg, carbon content 0

## Inputs from technosphere
- electricity, high voltage, aluminium industry: 1.0094 kWh
  Calculated, see 'Extrapolations'

## Extrapolations
Losses are specific to the aluminium industry in that they are calculated as the aluminium industry electricity consumption weighted average of losses, using country level loss factors when available (BA, RU). For ME, country-specific loss data are not available (i.e. the electricity production of the countries is not modelled in ecoinvent), and 'Rest of World' losses are used as an approximation.
