# acetic acid production, butane oxidation

Dataset: EcoSpold 2, unit process
Geography: RoW
Time period: 1989-01-01 to 2023-12-31
Technology level: current
Classification: EcoSpold01Categories: chemicals/organics
Classification: ISIC rev.4 ecoinvent: 2011:Manufacture of basic chemicals
Tags: ConvertedDataset
Scenario: Business-as-Usual
System model: Allocation, cut-off by classification
Share of production covered: 100 %
Generated by: Jürgen Sutter
Published in: Sutter, J. 2007
Database: ecoinvent
isCopyrightProtected: true
accessRestrictedTo: 1

## General comment
The multioutput-process "formic acid production, butane oxidation process" delivers the co-products formic acid, methyl acetate, ethyl acetate, acetic acid, methyl ethyl ketone, and acetone. The allocation is based on mass balance.
[This dataset was already contained in the ecoinvent database version 2. It was not individually updated during the transfer to ecoinvent version 3. Life Cycle Impact Assessment results may still have changed, as they are affected by changes in the supply chain, i.e. in other datasets. This dataset was generated following the ecoinvent quality guidelines for version 2. It may have been subject to central changes described in the ecoinvent version 3 change report (http://www.ecoinvent.org/database/ecoinvent-version-3/reports-of-changes/), and the results of the central updates were reviewed extensively. The changes added e.g. consistent water flows and other information throughout the database. The documentation of this dataset can be found in the ecoinvent reports of version 2, which are still available via the ecoinvent website. The change report linked above covers all central changes that were made during the conversion process.]

## Included activities end
Butane oxidation including materials, energy uses, infrastructure and emissions.

## Geography
The inventory is modelled for Europe.

## Technology
Oxidation of butane

## Time period
Time of publications.

## Parameters
- fraction, cooling water, cooling pond system, to air: 0.032 dimensionless; name fraction_CW_CP_to_air; lognormal variance with pedigree 0.0413, pedigree (2,3,1,3,1)
  Calculated based on literature value (Scown, C.D., 2011, Water Footprint of U.S. Transportation Fuels and supplying information of the article) (Vionnet, S., Quantis Water Database - Technical Report, 2012).
- fraction, cooling water, once-through system, to air: 0.004 dimensionless; name fraction_CW_OT_to_air; lognormal variance with pedigree 0.0413, pedigree (2,3,1,3,1)
  (same comment as for fraction, cooling water, cooling pond system, to air)
- fraction, cooling water, recirculating system, to air: 0.771 dimensionless; name fraction_CW_R_to_air; lognormal variance with pedigree 0.0413, pedigree (2,3,1,3,1)
  (same comment as for fraction, cooling water, cooling pond system, to air)
- fraction, cooling water, to air: 0.3875 dimensionless; name fraction_CW_to_air; = (0.5*fraction_CW_OT_to_air)+(0.5*fraction_CW_R_to_air); lognormal variance with pedigree 0.092025, pedigree (4,4,3,2,4)
  Calculated value based on literature value (see comments of the other parametres present in this dataset) and expert opinion. In the case when no industry/literature data are available about the type of cooling or directly fraction, cooling water, to air specific for the process a default assumption is applied. It is assumed that the once-through cooling system is used in 50% of all cases and recirculating system is used in another 50% of all cases.
- fraction, process water, to air: 0.205 dimensionless; name fraction_PW_to_air; lognormal variance with pedigree 0.092025, pedigree (4,4,3,2,4)
  Literature value (Statistics Canada, 2007 & Shaffer, K.H., 2008, Consumptive water use in the Great Lakes Basin, USGS) (Vionnet, S., Quantis Water Database - Technical Report, 2012).
- fraction, water, deionised, to air: 0.205 dimensionless; name fraction_WDI_to_air; = fraction_PW_to_air; lognormal variance with pedigree 0.092025, pedigree (4,4,3,2,4)
  Calculated value. See comment in the other parametres present in this dataset. Deionised water is considered to be always used as process water, thus process water fractions to air are applied to all deionised water input flows to calculate the amount of water consumed in the processes.

## Reference product
- acetone, liquid: 1 kg; name BP_amount_1; By-product classification allocatable product; CPC 34170: Ethers, alcohol peroxides, ether peroxides, epoxides, acetals and hemiacetals, and their halogenated, sulphona[…]; HS2017 291411: Ketones; acyclic, without other oxygen function, acetone; CAS 67-64-1
  production volume 3.4e7 kg; = RP_PV_1 * (BP_amount_1 / RP_amount_1)
    Calculated relative to main output (acetic acid)
  property heating value, net 31.32 MJ
    LHV is calculated based on the elemental composition of the substance. Based on the CAS number of the substance (000067-64-1), the chemical formula of the substance is found to be: C3H6O, (PubChem 2020).
    Reference: Kim, S., Chen, J., Cheng, T., Gindulyte, A., He, J., He, S., Li, Q., Shoemaker, B. A., Thiessen, P. A., Yu, B., Zaslavsky, L., Zhang, J., & Bolton, E. E. (2019). PubChem 2019 update: improved access to chemical data. Nucleic acids research, 47(D1), D1102–D1109. https://doi.org/10.1093/nar/gky1033
  property price 0.437564 EUR2005
    Calculated value based on data from United Nations Commodity Trade Statistics Database (comtrade.un.org). UN comtrade category: 291411 Ketones; acyclic, without other oxygen function, acetone. Average of years 2015-2019. Average of price of import into 5 main markets (EU, US, JP, IN and CN), last accessed 2022-08-02.
    The price was converted to EUR based on the annual exchange rates published by the European Central Bank (https://sdw.ecb.europa.eu/quickview.do?SERIES_KEY=120.EXR.A.USD.EUR.SP00.A, last accessed on 2022-02-15) and adjusted for inflation relative to 2005 using the producer price index (PPI) of the euro area, published by eurostat (https://appsso.eurostat.ec.europa.eu/nui/show.do?dataset=sts_inpp_a&lang=en, last accessed on 2022-05-04).
  properties: EcoSpold01Allocation_undefined_10 3.863, EcoSpold01Allocation_undefined_11 3.863, EcoSpold01Allocation_undefined_12 3.863, EcoSpold01Allocation_undefined_13 3.863, EcoSpold01Allocation_undefined_14 3.863, EcoSpold01Allocation_undefined_15 3.863, EcoSpold01Allocation_undefined_16 3.863, EcoSpold01Allocation_undefined_17 3.863, EcoSpold01Allocation_undefined_18 3.863, EcoSpold01Allocation_undefined_19 3.863, EcoSpold01Allocation_undefined_2 3.863, EcoSpold01Allocation_undefined_20 3.863, EcoSpold01Allocation_undefined_21 3.863, EcoSpold01Allocation_undefined_26 100, EcoSpold01Allocation_undefined_3 3.863, EcoSpold01Allocation_undefined_4 3.863, EcoSpold01Allocation_undefined_5 3.863, EcoSpold01Allocation_undefined_6 3.863, EcoSpold01Allocation_undefined_7 3.863, EcoSpold01Allocation_undefined_8 3.863, EcoSpold01Allocation_undefined_9 3.863, allocation factor 0.0334371, carbon allocation 0.62069 kg, carbon content 0.62069, carbon content, fossil 0.62069, carbon content, non-fossil 0, dry mass 1 kg, true value 0.029171, water content 0, water in wet mass 0 kg, wet mass 1 kg

## Inputs from technosphere
- chemical factory, organics: 3.46236e-10 unit; lognormal variance with pedigree 0.448, pedigree (4,5,5,5,5)
  Estimation
  EcoSpold01Location=RER
  Uncertainty: Estimation
- electricity, medium voltage: 0.00616708, 0.123019, 0.0413342, 0.00188857, 0.000377996, 8.11642e-5, 0.0127037 kWh (7 suppliers, which the file names only by identifier); sum of these 0.185572 kWh; lognormal variance with pedigree 0.0726, pedigree (1,3,5,5,1)
  Chauvel 1989
  EcoSpold01Location=UCTE
  Uncertainty: Chauvel 1989
- heat, district or industrial, natural gas: 0.0610093, 3.71271 MJ (2 suppliers, which the file names only by identifier); sum of these 3.77372 MJ; lognormal variance with pedigree 0.0726, pedigree (1,3,5,5,1)
  Uncertainty: Chauvel 1989
  properties: heating value, net 1 MJ
- heat, district or industrial, other than natural gas: 2.10535, 0.000975372 MJ (2 suppliers, which the file names only by identifier); sum of these 2.10633 MJ; lognormal variance with pedigree 0.0726, pedigree (1,3,5,5,1)
  Uncertainty: Chauvel 1989
  properties: heating value, net 1 MJ
- liquefied petroleum gas: 0.00282134, 0.0270948, 0.0085057, 0.00189317, 0.0962361, 0.402758 kg (6 suppliers, which the file names only by identifier); sum of these 0.539309 kg; lognormal variance with pedigree 0.0726, pedigree (1,3,5,5,1)
  Chauvel 1989
  EcoSpold01Location=CH
  Uncertainty: Chauvel 1989
  properties: carbon content, fossil 0.821863, dry mass 1 kg, heating value, net 45.5 MJ, wet mass 1 kg
  note on heating value, net: Indicative value. Reference: Fuels - Higher and Lower Calorific Values, available at: https://www.engineeringtoolbox.com/fuels-higher-calorific-values-d_169.html
- water, deionised: 2.50779 kg; name water_deionised_input; source Chauvel, A. 1989; lognormal variance with pedigree 0.0726, pedigree (1,3,5,5,1)
  EcoSpold01Location=CH
  Literature value. Data from a French production plant. Values converted to a base of butane using yields of the diverse co-products.
  Uncertainty: Chauvel 1989
  properties: wet mass 1 kg

## Inputs from nature
- Water, cooling, unspecified natural origin [natural resource, in water]: 0.130405 m3; name water_cooling_UNO_input; source Chauvel, A. 1989; lognormal variance with pedigree 0.0726, pedigree (1,3,5,5,1)
  Literature value. Data from a French production plant.
  Uncertainty: Chauvel 1989

## Emissions to nature
- Butane [air, urban air close to ground]: 0.00107862 kg; lognormal variance with pedigree 0.188, pedigree (4,5,5,5,5)
  Estimation
  Uncertainty: Estimation
- Carbon dioxide, fossil [air, urban air close to ground]: 0.00815435 kg; lognormal variance with pedigree 0.1786, pedigree (4,5,5,5,5)
  Calculated from the water treatment
  Uncertainty: Calculated from the water treatment
- Water [air, unspecified]: 0.051045 m3; name water_to_air_unspecified; lognormal variance with pedigree 0.0827, pedigree (2,2,5,5,1)
  Calculated value based on literature values and expert opinion. See comments in the parametres' comment field.
  property fraction, origin: fresh water 0.0100712; name fraction_origin_fresh_water
  property fraction, origin: salt water 0; name fraction_origin_salt_water
  property fraction, origin: unspecified 0.989929; name fraction_origin_unspecified
- Acetaldehyde [water, surface water]: 0.000862894 kg; lognormal variance with pedigree 0.188, pedigree (4,5,5,5,5)
  Estimation
  Uncertainty: Estimation
- BOD5, Biological Oxygen Demand [water, surface water]: 0.00815435 kg; lognormal variance with pedigree 0.188, pedigree (4,5,5,5,5)
  Calculated from the water emissions
  Uncertainty: Calculated from the water emissions
- Butanol [water, surface water]: 0.000539309 kg; lognormal variance with pedigree 0.188, pedigree (4,5,5,5,5)
  Estimation
  Uncertainty: Estimation
- Butyl acetate [water, surface water]: 0.000701101 kg; lognormal variance with pedigree 0.188, pedigree (4,5,5,5,5)
  Estimation
  Uncertainty: Estimation
- COD, Chemical Oxygen Demand [water, surface water]: 0.00815435 kg; lognormal variance with pedigree 0.188, pedigree (4,5,5,5,5)
  Calculated from the water emissions
  Uncertainty: Calculated from the water emissions
- DOC, Dissolved Organic Carbon [water, surface water]: 0.0022651 kg; lognormal variance with pedigree 0.188, pedigree (4,5,5,5,5)
  Calculated from the water emissions
  Uncertainty: Calculated from the water emissions
- Ethanol [water, surface water]: 0.00124041 kg; lognormal variance with pedigree 0.188, pedigree (4,5,5,5,5)
  Estimation
  Uncertainty: Estimation
- Methanol [water, surface water]: 0.000862894 kg; lognormal variance with pedigree 0.448, pedigree (4,5,5,5,5)
  Estimation
  Uncertainty: Estimation
- TOC, Total Organic Carbon [water, surface water]: 0.0022651 kg; lognormal variance with pedigree 0.188, pedigree (4,5,5,5,5)
  Calculated from the water emissions
  Uncertainty: Calculated from the water emissions
- Water [water, unspecified]: 0.0818651 m3; name water_to_water_unspecified; lognormal variance with pedigree 0.0827, pedigree (2,2,5,5,1)
  (same comment as for Water)
  property carbon content, fossil 0; name C_content_fossil
  property carbon content, non-fossil 0; name C_content_non_fossil
  property dry mass 0 kg; name DM
  property fraction, origin: fresh water 0.0243529; name fraction_origin_fresh_water_Ww
  property fraction, origin: salt water 0; name fraction_origin_salt_water_Ww
  property fraction, origin: unspecified 0.975647; name fraction_origin_unspecified_Ww
  property water in wet mass 1000 kg; name WWM
  property wet mass 1000 kg; name WM

## Sampling procedure
Literature data

## Extrapolations
Transports and emissions are modelled with standard methods. This dataset has been copied from an original dataset covering the geography RER. The uncertainty has been adjusted accordingly.

## Review by Roland Hischier 2007-09-01
passed.

## Review by Emilia Moreno Ruiz 2012-03-08
submitted to correct name change from "acetone", to "acetone, liquid"
