# treatment of sulfidic tailings, generic, tailings impoundment

Dataset: EcoSpold 2, unit process
Geography: GLO
Time period: 2015-01-01 to 2023-12-31
Technology level: current
Classification: ISIC rev.4 ecoinvent: 3822:Treatment and disposal of hazardous waste
Synonyms: tails; sulphidic; pond; tailing
Scenario: Business-as-Usual
System model: Allocation, cut-off by classification
Share of production covered: 80 %
Generated by: David Turner
Database: ecoinvent
isCopyrightProtected: true
accessRestrictedTo: 1

## General comment
This dataset represents the activity of waste disposal of generic sulfidic tailings in a tailings impoundment. This dataset is recommended to be used for the disposal of sulfidic tailings at sites worldwide, excluding those from the deposits of sulfidic copper, nickel, zinc-lead, gold and silver, for which metal-specific datasets are available.
Background: Tailings, a waste material produced during mineral concentration (beneficiation), often contain significant quantities of mobile toxic metals and are typically produced in large quantities. To manage these wastes, tailings are commonly stored behind dammed impoundments, known as tailings ponds. These ponds pose a significant long-term pollution risk as metals may leach out into the surrounding environment, potentially over very long timeframes.
Modelling approach: This dataset was produced using a model developed specifically for assessing the long-term emissions of tailings disposal (see Doka, 2017). The tailings disposal model is based on the modelling framework applied in existing landfill process models used in ecoinvent and is based on a top-down approach. Literature data on measurements of deposited tailings compositions (solids) and measured current concentrations in leachate (liquid) form the basis of the model and are used to characterise pollutant mobility and calculate the currently occurring rate of emissions of the landfill. Heeding chief parameters, such as hydrology, pH development and elemental chemistry, these emissions are then projected into the future. Tailings composition is based on the typical composition of tailings at generic sulfidic metal mine sites worldwide; i.e. composition is not region-specific. Land use was calculated following the approach described by Doka (2008). Based on an assumed generic final height of a tailings impoundment of 60 m and an assumed tailings density of 2200 kg/m3, a land area of 7.58E-06 m2 is required per kilogram of sulfidic tailings. The land is assumed to be converted from unknown origin to a disposal site. After an operational phase of 30 years, spontaneous restoration of a consolidated state is assumed to be reached after one hundred years. The total occupation time is therefore 130 years and the land occupation per kilogram tailings is 9.85E-04 m2.
Waste composition (wet, in ppm): H2O 300000; O 624100; H na; C 6145; S 359.53; N 5.0454; P 223.04; B 54.583; Cl 102.61; Br 0.22894; F 772.88; I na; Ag 8.5672; As 54.876; Ba 349.73; Cd 4.2073; Co 14.437; Cr 55.949; Cu 649.95; Hg 0.26107; Mn 191.27; Mo 11.985; Ni 26.998; Pb 164.15; Sb 28.927; Se 6.5496; Sn 27.855; V 127.15; Zn 232.03; Be 1.1555; Sc 12.867; Sr 98.34; Ti 227.57; Tl 2.8558; W 9.9784; Si 37291; Fe 10762; Ca 3218.1; Al 10317; K 1762.7; Mg 1565.1; Na 1013. // Share of carbon in waste that is biogenic 0%.
Activity extent: The dataset includes all potential emissions to the environment and land use changes. Input exchanges of infrastructure, materials, energy, and water are not included here but are accounted for in the upstream activity [metal/mineral] mine operation.
References
Doka, G. (2008). Life Cycle Inventory data of mining waste: Emissions from sulfidic tailings disposal. Zürich, Switzerland: Doka Life Cycle Assessments.
Doka, G. (2017). A model for waste-specific and climate-specific life cycle inventories of tailings impoundments. Zürich, Switzerland: Doka Life Cycle Assessments.

## Included activities start
The activity starts at the point of waste deposition in the impoundment. All upstream activities, including the pumping of tailings to the site, any dewatering or treatment, or other transport-related activities are excluded.

## Included activities end
Waste-specific short- and long-term emissions to the environment via impoundment leachate; land transformation and occupation. Note that the structural integrity of the site is assumed to be unwavering during the entie modelled time horizon; i.e. accidental releases of leachate (due to impoundment failure) are not considered.

## Geography
Given name of site is 'Generic deposits; Global'. Impoundment site with mean annual temperature (MAT) of 10.068211884955 degC, mean annual precipitation (MAP) of 628.973921087922 mm/year, mean annual actual evaporation (EAT) of 397.612760551586 mm/year, and net infiltration of 430.167540812129 mm/year (using half of natural surface evapotranspiration).

## Technology
This is an inventory for an impoundment of copper ore beneficiation tailings waste. The following assumptions were made concerning technology: final impoundment height is 60 meters; operation phase duration is 30 years; and impoundment leachates are released into the environment untreated.

## Time period
"Data on average composition of tailings and tailings-derived leachates from literature sources published between 1994 and 2017 (mean publication date: 2009±6). Mean annual temperature and precipitation data for 1970-2000 (source: Fick and Hijmans, 2017); mean annual evapotranspiration for 1950-2000 (source: Fekete et al., 2002). Production volume based on world mine production data from the USGS Minerals Yearbook 2015. Transfer coefficients from prospective, tailings-specific model.
References:
Fekete, B. M., Vorosmarty, C. J. & Grabs, W. (2002). High-resolution fields of global runoff combining observed river discharge and simulated water balances. Global Biogeochemical Cycles, 16, 15-1 - 15-10.
Fick, S. E. & Hijmans, R. J. (2017). Worldclim 2: New 1-km spatial resolution climate surfaces for global land areas. International Journal of Climatology, 37, 4302-4315."

## Reference product
- sulfidic tailings, generic: -1 kg; By-product classification Waste; CPC 39310: Slag, dross, scalings and other waste from the manufacture of iron or steel; HS2017 250300: Sulphur of all kinds; other than sublimed, precipitated and colloidal sulphur
  main reference product of this activity (supply of disposal service).
  production volume 2.81e12 kg
    Estimate of total global tailings production volume from the mining and concentration of sulfidic metal ore resources, based on the worldwide mine production (kg) of nickel, copper, zinc, lead, cinnebar, gold and silver from sulfidic mineral deposits (assumed to represent the majority of sulfidic mineral resources globally) multiplied by estimated tailings generation rates per kg of each mined metal (83.0 kg per kg nickel, 160 kg per kg copper, 15.5 kg per kg zinc-lead, 332 kg per kg cinnebar, 6328 kg per kg gold and 1999 kg per kg silver).
  property price 0 EUR2005
    Waste products are assigned a price of zero as they are assumed to require further treatment.
  properties: aluminium content 0.014738, antimony content 4.1325e-5, arsenic content 7.8394e-5, barium content 0.00049962, beryllium content 1.6507e-6, boron content 7.7976e-5, bromine content 3.2706e-7, cadmium content 6.0104e-6, calcium content 0.0045972, carbon allocation 0.00614495 kg, carbon content 0.0087785, carbon content, fossil 0.0087785, chlorine content 0.00014659, chromium content 7.9928e-5, cobalt content 2.0624e-5, copper content 0.0009285, dry mass 0.7 kg, fluorine content 0.0011041, iron content 0.015374, lead content 0.0002345, magnesium content 0.0022359, manganese content 0.00027325, mercury content 3.7296e-7, molybdenum content 1.7121e-5, nickel content 3.8568e-5, nitrogen content 7.2076e-6, oxygen content 0.89157, phosphorus content 0.00031862, potassium content 0.0025181, scandium content 1.8381e-5, selenium content 9.3566e-6, silicon content 0.053273, silver content 1.2239e-5, sodium content 0.0014472, strontium content 0.00014049, sulfur content 0.00051362, thallium content 4.0797e-6, tin content 3.9792e-5, titanium content 0.0003251, tungsten content 1.4255e-5, vanadium content 0.00018165, water content 0.42857, water in wet mass 0.3 kg, wet mass 1 kg, zinc content 0.00033146

## Inputs from nature
- Occupation, dump site [natural resource, land]: 0.00098485 m2*year; lognormal variance with pedigree 0.15166, pedigree (1,1,3,1,1)
  for impoundment operation phase and 100 year renaturation phase.
  Uncertainty: Uncertainty calculated from uncertainty in base parameters.
- Transformation, from unspecified [natural resource, land]: 7.5758e-6 m2; lognormal variance with pedigree 0.032596, pedigree (1,1,3,1,1)
  conversion of impoundment area.
  Uncertainty: Uncertainty calculated from uncertainty in base parameters.
- Transformation, to dump site [natural resource, land]: 7.5758e-6 m2; lognormal variance with pedigree 0.032596, pedigree (1,1,3,1,1)
  conversion to impoundment area.
  Uncertainty: Uncertainty calculated from uncertainty in base parameters.

## Emissions to nature
- Aluminium III [water, ground-]: 6.5593e-6 kg; lognormal variance with pedigree 0.27087, pedigree (1,1,3,1,1)
  burden from short-term leachate to groundwater in uncontrolled impoundment in moist cimate.
  Uncertainty: Uncertainty calculated from unertainty of the waste composition of this waste and short-term leaching in landfill
- Aluminium III [water, ground-, long-term]: 0.01031 kg; lognormal variance with pedigree 0.092919, pedigree (1,1,3,1,1)
  Emissions from long-term leachate (>100a) directly from tailings impoundment.
  Uncertainty: Uncertainty calculated depending on waste input and uncertainty of long-term transfer coefficents in landfill.
- Ammonium [water, ground-]: 1.1565e-6 kg; lognormal variance with pedigree 0.34153, pedigree (1,1,3,1,1)
  (same comment as for Aluminium III)
- Ammonium [water, ground-, long-term]: 5.4996e-9 kg; lognormal variance with pedigree 0.3474, pedigree (1,1,3,1,1)
  (same comment as for Aluminium III)
- Antimony ion [water, ground-]: 1.1371e-8 kg; lognormal variance with pedigree 0.47748, pedigree (1,1,3,1,1)
  (same comment as for Aluminium III)
- Antimony ion [water, ground-, long-term]: 7.2695e-7 kg; lognormal variance with pedigree 1.1318, pedigree (1,1,3,1,1)
  (same comment as for Aluminium III)
- Arsenic ion [water, ground-]: 1.3538e-8 kg; lognormal variance with pedigree 0.47152, pedigree (1,1,3,1,1)
  (same comment as for Aluminium III)
- Arsenic ion [water, ground-, long-term]: 5.4862e-5 kg; lognormal variance with pedigree 0.26248, pedigree (1,1,3,1,1)
  (same comment as for Aluminium III)
- BOD5, Biological Oxygen Demand [water, ground-]: 1.7895e-9 kg; lognormal variance with pedigree 0.332, pedigree (1,1,3,1,1)
  (same comment as for Aluminium III)
- BOD5, Biological Oxygen Demand [water, ground-, long-term]: 1.0719e-6 kg; lognormal variance with pedigree 0.45259, pedigree (1,1,3,1,1)
  (same comment as for Aluminium III)
- Barium II [water, ground-]: 1.989e-9 kg; lognormal variance with pedigree 0.53442, pedigree (1,1,3,1,1)
  (same comment as for Aluminium III)
- Barium II [water, ground-, long-term]: 0.00017941 kg; lognormal variance with pedigree 0.22878, pedigree (1,1,3,1,1)
  (same comment as for Aluminium III)
- Beryllium II [water, ground-]: 2.8722e-9 kg; lognormal variance with pedigree 0.52367, pedigree (1,1,3,1,1)
  (same comment as for Aluminium III)
- Beryllium II [water, ground-, long-term]: 1.1526e-6 kg; lognormal variance with pedigree 0.38967, pedigree (1,1,3,1,1)
  (same comment as for Aluminium III)
- Boron [water, ground-]: 1.8464e-8 kg; lognormal variance with pedigree 0.4613, pedigree (1,1,3,1,1)
  (same comment as for Aluminium III)
- Boron [water, ground-, long-term]: 1.1826e-6 kg; lognormal variance with pedigree 1.1804, pedigree (1,1,3,1,1)
  (same comment as for Aluminium III)
- Bromine [water, ground-]: 2.4115e-10 kg; lognormal variance with pedigree 0.60324, pedigree (1,1,3,1,1)
  (same comment as for Aluminium III)
- Bromine [water, ground-, long-term]: 1.0705e-7 kg; lognormal variance with pedigree 0.47781, pedigree (1,1,3,1,1)
  (same comment as for Aluminium III)
- COD, Chemical Oxygen Demand [water, ground-]: 8.9477e-8 kg; lognormal variance with pedigree 0.332, pedigree (1,1,3,1,1)
  (same comment as for Aluminium III)
- COD, Chemical Oxygen Demand [water, ground-, long-term]: 5.3597e-5 kg; lognormal variance with pedigree 0.45259, pedigree (1,1,3,1,1)
  (same comment as for Aluminium III)
- Cadmium II [water, ground-]: 1.4016e-8 kg; lognormal variance with pedigree 0.47226, pedigree (1,1,3,1,1)
  (same comment as for Aluminium III)
- Cadmium II [water, ground-, long-term]: 4.1933e-6 kg; lognormal variance with pedigree 0.34749, pedigree (1,1,3,1,1)
  (same comment as for Aluminium III)
- Calcium II [water, ground-]: 5.331e-5 kg; lognormal variance with pedigree 0.2052, pedigree (1,1,3,1,1)
  (same comment as for Aluminium III)
- Calcium II [water, ground-, long-term]: 0.0031648 kg; lognormal variance with pedigree 0.12882, pedigree (1,1,3,1,1)
  (same comment as for Aluminium III)
- Chloride [water, ground-]: 1.733e-5 kg; lognormal variance with pedigree 0.26093, pedigree (1,1,3,1,1)
  (same comment as for Aluminium III)
- Chloride [water, ground-, long-term]: 8.528e-5 kg; lognormal variance with pedigree 0.24208, pedigree (1,1,3,1,1)
  (same comment as for Aluminium III)
- Chromium VI [water, ground-]: 7.9111e-9 kg; lognormal variance with pedigree 0.48926, pedigree (1,1,3,1,1)
  (same comment as for Aluminium III)
- Chromium VI [water, ground-, long-term]: 5.0995e-7 kg; lognormal variance with pedigree 1.6412, pedigree (1,1,3,1,1)
  (same comment as for Aluminium III)
- Cobalt II [water, ground-]: 1.2978e-7 kg; lognormal variance with pedigree 0.40113, pedigree (1,1,3,1,1)
  (same comment as for Aluminium III)
- Cobalt II [water, ground-, long-term]: 1.4307e-5 kg; lognormal variance with pedigree 0.30683, pedigree (1,1,3,1,1)
  (same comment as for Aluminium III)
- Copper ion [water, ground-]: 2.9972e-7 kg; lognormal variance with pedigree 0.36897, pedigree (1,1,3,1,1)
  (same comment as for Aluminium III)
- Copper ion [water, ground-, long-term]: 0.00064965 kg; lognormal variance with pedigree 0.1805, pedigree (1,1,3,1,1)
  (same comment as for Aluminium III)
- DOC, Dissolved Organic Carbon [water, ground-]: 9.8233e-7 kg; lognormal variance with pedigree 0.332, pedigree (1,1,3,1,1)
  (same comment as for Aluminium III)
- DOC, Dissolved Organic Carbon [water, ground-, long-term]: 0.00058841 kg; lognormal variance with pedigree 0.45259, pedigree (1,1,3,1,1)
  (same comment as for Aluminium III)
- Fluoride [water, ground-]: 8.141e-7 kg; lognormal variance with pedigree 0.33635, pedigree (1,1,3,1,1)
  (same comment as for Aluminium III)
- Fluoride [water, ground-, long-term]: 0.00036139 kg; lognormal variance with pedigree 0.21092, pedigree (1,1,3,1,1)
  (same comment as for Aluminium III)
- Hydrogen sulfide [water, ground-]: 3.7701e-5 kg; lognormal variance with pedigree 0.20519, pedigree (1,1,3,1,1)
  (same comment as for Aluminium III)
- Hydrogen sulfide [water, ground-, long-term]: 5.1319e-5 kg; lognormal variance with pedigree 0.2018, pedigree (1,1,3,1,1)
  (same comment as for Aluminium III)
- Iron ion [water, ground-]: 4.9235e-6 kg; lognormal variance with pedigree 0.28038, pedigree (1,1,3,1,1)
  (same comment as for Aluminium III)
- Iron ion [water, ground-, long-term]: 0.010757 kg; lognormal variance with pedigree 0.091659, pedigree (1,1,3,1,1)
  (same comment as for Aluminium III)
- Lead II [water, ground-]: 1.7364e-8 kg; lognormal variance with pedigree 0.46305, pedigree (1,1,3,1,1)
  (same comment as for Aluminium III)
- Lead II [water, ground-, long-term]: 0.00016413 kg; lognormal variance with pedigree 0.22602, pedigree (1,1,3,1,1)
  (same comment as for Aluminium III)
- Magnesium [water, ground-]: 2.6386e-5 kg; lognormal variance with pedigree 0.22775, pedigree (1,1,3,1,1)
  (same comment as for Aluminium III)
- Magnesium [water, ground-, long-term]: 0.0015388 kg; lognormal variance with pedigree 0.15187, pedigree (1,1,3,1,1)
  (same comment as for Aluminium III)
- Manganese II [water, ground-]: 1.2495e-6 kg; lognormal variance with pedigree 0.32488, pedigree (1,1,3,1,1)
  (same comment as for Aluminium III)
- Manganese II [water, ground-, long-term]: 0.00019002 kg; lognormal variance with pedigree 0.22094, pedigree (1,1,3,1,1)
  (same comment as for Aluminium III)
- Mercury II [water, ground-]: 2.3341e-10 kg; lognormal variance with pedigree 0.60437, pedigree (1,1,3,1,1)
  (same comment as for Aluminium III)
- Mercury II [water, ground-, long-term]: 2.6084e-7 kg; lognormal variance with pedigree 0.43753, pedigree (1,1,3,1,1)
  (same comment as for Aluminium III)
- Molybdenum VI [water, ground-]: 1.2434e-7 kg; lognormal variance with pedigree 0.40302, pedigree (1,1,3,1,1)
  (same comment as for Aluminium III)
- Molybdenum VI [water, ground-, long-term]: 5.8241e-6 kg; lognormal variance with pedigree 0.34525, pedigree (1,1,3,1,1)
  (same comment as for Aluminium III)
- Nickel II [water, ground-]: 7.9957e-8 kg; lognormal variance with pedigree 0.41453, pedigree (1,1,3,1,1)
  (same comment as for Aluminium III)
- Nickel II [water, ground-, long-term]: 2.6918e-5 kg; lognormal variance with pedigree 0.28607, pedigree (1,1,3,1,1)
  (same comment as for Aluminium III)
- Nitrate [water, ground-]: 1.8254e-5 kg; lognormal variance with pedigree 0.34153, pedigree (1,1,3,1,1)
  (same comment as for Aluminium III)
- Nitrate [water, ground-, long-term]: 8.6807e-8 kg; lognormal variance with pedigree 0.3474, pedigree (1,1,3,1,1)
  (same comment as for Aluminium III)
- Phosphate [water, ground-]: 3.7029e-5 kg; lognormal variance with pedigree 0.26033, pedigree (1,1,3,1,1)
  (same comment as for Aluminium III)
- Phosphate [water, ground-, long-term]: 0.00064647 kg; lognormal variance with pedigree 0.2159, pedigree (1,1,3,1,1)
  (same comment as for Aluminium III)
- Potassium I [water, ground-]: 5.7409e-7 kg; lognormal variance with pedigree 0.34792, pedigree (1,1,3,1,1)
  (same comment as for Aluminium III)
- Potassium I [water, ground-, long-term]: 0.00031236 kg; lognormal variance with pedigree 0.33517, pedigree (1,1,3,1,1)
  (same comment as for Aluminium III)
- Scandium [water, ground-]: 3.7585e-8 kg; lognormal variance with pedigree 0.43954, pedigree (1,1,3,1,1)
  (same comment as for Aluminium III)
- Scandium [water, ground-, long-term]: 1.2829e-5 kg; lognormal variance with pedigree 0.31064, pedigree (1,1,3,1,1)
  (same comment as for Aluminium III)
- Selenium IV [water, ground-]: 4.9952e-9 kg; lognormal variance with pedigree 0.50495, pedigree (1,1,3,1,1)
  (same comment as for Aluminium III)
- Selenium IV [water, ground-, long-term]: 3.1551e-7 kg; lognormal variance with pedigree 0.90781, pedigree (1,1,3,1,1)
  (same comment as for Aluminium III)
- Silicon [water, ground-]: 3.5049e-6 kg; lognormal variance with pedigree 0.29746, pedigree (1,1,3,1,1)
  (same comment as for Aluminium III)
- Silicon [water, ground-, long-term]: 0.00022698 kg; lognormal variance with pedigree 1.6832, pedigree (1,1,3,1,1)
  (same comment as for Aluminium III)
- Silver I [water, ground-]: 9.6368e-10 kg; lognormal variance with pedigree 0.55908, pedigree (1,1,3,1,1)
  (same comment as for Aluminium III)
- Silver I [water, ground-, long-term]: 8.5662e-6 kg; lognormal variance with pedigree 0.32408, pedigree (1,1,3,1,1)
  (same comment as for Aluminium III)
- Sodium I [water, ground-]: 9.323e-6 kg; lognormal variance with pedigree 0.25958, pedigree (1,1,3,1,1)
  (same comment as for Aluminium III)
- Sodium I [water, ground-, long-term]: 0.00099976 kg; lognormal variance with pedigree 0.16599, pedigree (1,1,3,1,1)
  (same comment as for Aluminium III)
- Strontium II [water, ground-]: 1.3174e-7 kg; lognormal variance with pedigree 0.39682, pedigree (1,1,3,1,1)
  (same comment as for Aluminium III)
- Strontium II [water, ground-, long-term]: 9.8208e-5 kg; lognormal variance with pedigree 0.24306, pedigree (1,1,3,1,1)
  (same comment as for Aluminium III)
- Sulfate [water, ground-]: 0.00035035 kg; lognormal variance with pedigree 0.20519, pedigree (1,1,3,1,1)
  (same comment as for Aluminium III)
- Sulfate [water, ground-, long-term]: 0.0004769 kg; lognormal variance with pedigree 0.2018, pedigree (1,1,3,1,1)
  (same comment as for Aluminium III)
- TOC, Total Organic Carbon [water, ground-]: 9.8233e-7 kg; lognormal variance with pedigree 0.332, pedigree (1,1,3,1,1)
  (same comment as for Aluminium III)
- TOC, Total Organic Carbon [water, ground-, long-term]: 0.00058841 kg; lognormal variance with pedigree 0.45259, pedigree (1,1,3,1,1)
  (same comment as for Aluminium III)
- Thallium I [water, ground-]: 5.0752e-10 kg; lognormal variance with pedigree 0.58006, pedigree (1,1,3,1,1)
  (same comment as for Aluminium III)
- Thallium I [water, ground-, long-term]: 2.8553e-6 kg; lognormal variance with pedigree 0.36019, pedigree (1,1,3,1,1)
  (same comment as for Aluminium III)
- Tin ion [water, ground-]: 2.7725e-8 kg; lognormal variance with pedigree 0.44839, pedigree (1,1,3,1,1)
  (same comment as for Aluminium III)
- Tin ion [water, ground-, long-term]: 2.7827e-5 kg; lognormal variance with pedigree 0.28503, pedigree (1,1,3,1,1)
  (same comment as for Aluminium III)
- Titanium ion [water, ground-]: 8.245e-9 kg; lognormal variance with pedigree 0.48767, pedigree (1,1,3,1,1)
  (same comment as for Aluminium III)
- Titanium ion [water, ground-, long-term]: 0.00022756 kg; lognormal variance with pedigree 0.21517, pedigree (1,1,3,1,1)
  (same comment as for Aluminium III)
- Tungsten [water, ground-]: 1.9931e-8 kg; lognormal variance with pedigree 0.46, pedigree (1,1,3,1,1)
  (same comment as for Aluminium III)
- Tungsten [water, ground-, long-term]: 1.2095e-6 kg; lognormal variance with pedigree 0.59725, pedigree (1,1,3,1,1)
  (same comment as for Aluminium III)
- Vanadium V [water, ground-]: 2.8747e-9 kg; lognormal variance with pedigree 0.52259, pedigree (1,1,3,1,1)
  (same comment as for Aluminium III)
- Vanadium V [water, ground-, long-term]: 1.8603e-7 kg; lognormal variance with pedigree 2.8973, pedigree (1,1,3,1,1)
  (same comment as for Aluminium III)
- Zinc II [water, ground-]: 9.7102e-7 kg; lognormal variance with pedigree 0.33217, pedigree (1,1,3,1,1)
  (same comment as for Aluminium III)
- Zinc II [water, ground-, long-term]: 0.00023105 kg; lognormal variance with pedigree 0.21453, pedigree (1,1,3,1,1)
  (same comment as for Aluminium III)

## Sampling procedure
Tailings model based on observed leachate concentrations in literature. Extrapolated to 60"000 years heeding chemical characteristics. Initial waste composition from various literature sources. Climate information for national copper deposits (identified from the USGS Major Mineral Deposits database) from literature as follows: global mean annual temperature and precipitation data from Fick and Hijmans (2017); global mean annual evapotranspiration data from Fekete et al. (2002).

References:
Fekete, B. M., Vorosmarty, C. J. & Grabs, W. (2002). High-resolution fields of global runoff combining observed river discharge and simulated water balances. Global Biogeochemical Cycles, 16, 15-1 - 15-10.
Fick, S. E. & Hijmans, R. J. (2017). Worldclim 2: New 1-km spatial resolution climate surfaces for global land areas. International Journal of Climatology, 37, 4302-4315.

## Extrapolations
Climate data collected for sulfide mineral deposits globally and aggregated to reflect average climatic conditions of sulfide mineral deposits worldwide. Initial tailings composition based on global average generic tailings composition, derived from literature data. Initial leachate concentration based on generic global average data also obtained from the literature.
