# o-phenylene diamine production

Dataset: EcoSpold 2, unit process
Geography: GLO
Time period: 2012-01-01 to 2023-12-31
Technology level: current
Classification: ISIC rev.4 ecoinvent: 2011:Manufacture of basic chemicals
Classification: EcoSpold01Categories: chemicals/organics
Scenario: Business-as-Usual
System model: Allocation, cut-off by classification
Generated by: Marylène Dussault
Published in: Fierz-David, H.E. 1921
Database: ecoinvent
isCopyrightProtected: true
accessRestrictedTo: 1

## General comment
This dataset represents the production of o-phenylenediamine from hydrogenation of 2-nitroaniline. Most communly used hydrogenation reduction for the family of products is reported to be the Bechamp reduction which involves use of iron and acid as regents. Reaction is assumed to yield 95% of product. This dataset is a estimation partially based on literature for the production of ortho-phenylendiamine.

## Included activities start
with 2-nitroaniline

## Included activities end
With production ortho-phenylendiamine. This dataset includes only raw materials. Energy requirements, wastes and emissions have been excluded due to lack of data.

## Reference product
- o-phenylene diamine: 1 kg; name OPD; By-product classification allocatable product; CPC 34150: Amine-function compounds; oxygen-function amino-compounds, except lysine and its esters and salts thereof and […]; HS2017 292151: Amine-function compounds; aromatic amines and their derivatives; o-, m-, p-phenylenediamine, diaminotoluene[...]; CAS 95-54-5
  1
  production volume 1.1e7 kg; name PV_OPD
    Estimated.
  property carbon content, fossil 0.67; name OPD_C_content_fossil
    fossil carbon content on a dry matter basis
  property carbon content, non-fossil 0; name OPD_C_content_non_fossil
    biogene carbon content on a dry matter basis
  property dry mass 1 kg; name OPD_DM
  property heating value, net 29.16 MJ
    LHV is calculated based on the elemental composition of the substance. Based on the CAS number of the substance (000095-54-5), the chemical formula of the substance is found to be: C6H8N2, (PubChem 2020).
    Reference: Kim, S., Chen, J., Cheng, T., Gindulyte, A., He, J., He, S., Li, Q., Shoemaker, B. A., Thiessen, P. A., Yu, B., Zaslavsky, L., Zhang, J., & Bolton, E. E. (2019). PubChem 2019 update: improved access to chemical data. Nucleic acids research, 47(D1), D1102–D1109. https://doi.org/10.1093/nar/gky1033
  property price 9.8469 EUR2005
    Price based on IndiaMart (available here:https://www.indiamart.com/proddetail/ortho-phenylene-diamine-22504721762.html, accessed 2022-06-17)
    The prices were converted to EUR based on the annual exchange rates published by the European Central Bank (https://sdw.ecb.europa.eu/quickview.do?SERIES_KEY=120.EXR.A.USD.EUR.SP00.A, last accessed on 2022-02-15) and adjusted for inflation relative to 2005 using the producer price index (PPI) of the euro area, published by eurostat (https://appsso.eurostat.ec.europa.eu/nui/show.do?dataset=sts_inpp_a&lang=en, last accessed on 2022-05-04).
  property water in wet mass 0 kg; name OPD_WWM
  property wet mass 1 kg; name OPD_WM
  properties: carbon allocation 0.67 kg, carbon content 0.67

## Inputs from technosphere
- 2-nitroaniline: 1.34495 kg; lognormal variance with pedigree 0.0247, pedigree (4,2,4,1,3)
  Estimated value. Based on stochiometry and assumption of 95% yield.
  properties: carbon content, fossil 0.521741, dry mass 1 kg, heating value, net 21.07 MJ, wet mass 1 kg
- blast furnace sludge: -0.558393, -0.0222796, -1.94273, -0.634493 kg (4 suppliers, which the file names only by identifier); sum of these -3.15789 kg; = iron; lognormal variance with pedigree 0.1306, pedigree (5,5,5,5,4)
  Approximated process, Reprensents iron waste from Bechamp reaction, which is known to be important and in the form of sludge. Value is estimated based on mass of iron used in the reaction, but is likely to be underestimated because it is mix with other substances.
  production volume; = PV_OPD * (BP_amount_1 / OPD)
    Calculated from production volume of reference product using the relative outputs.
  properties: carbon content, fossil 0.339168, dry mass 0.914 kg, water content 0.0940919, wet mass 1 kg
- chemical factory, organics: 4e-10 unit; lognormal variance with pedigree 0.3107, pedigree (2,2,4,5,1)
  Approximated value. Infrastructure of a typical plant.
  Uncertainty: infrastructure of a typical plant
- electricity, medium voltage: 0.025683 kWh; lognormal variance with pedigree 0.1786, pedigree (4,5,5,5,5)
  Estimated value. Represents energy requirement for phenylenediamine production. No data were available. Thus, value taken directly from ecoinvent V3.0 chloronitrobenzene production, which is assumed to be similar.
- heat, from steam, in chemical industry: 5.46623, 0.963765 MJ (2 suppliers, which the file names only by identifier); sum of these 6.43 MJ; lognormal variance with pedigree 0.1786, pedigree (4,5,5,5,5)
  (same comment as for electricity, medium voltage)
  properties: heating value, net 1 MJ
- hydrochloric acid, without water, in 30% solution state: 0.0130319, 0.0595366 kg (2 suppliers, which the file names only by identifier); sum of these 0.0725684 kg; lognormal variance with pedigree 0.0832, pedigree (3,3,5,1,4)
  Literature value. Based on Fierz-David (1921).
  properties: dry mass 1 kg, heating value, net 3.32 MJ, wet mass 1 kg
- iron scrap, sorted, pressed: 2.53382, 0.624072 kg (2 suppliers, which the file names only by identifier); sum of these 3.15789 kg; lognormal variance with pedigree 0.0832, pedigree (3,3,5,1,4)
  Literature value. Based on Fierz-David (1921). Reported as fine iron turnings which is used as catalyst.
  properties: dry mass 1 kg, wet mass 1 kg
- soda ash, light: 0.0858054, 0.0191946 kg (2 suppliers, which the file names only by identifier); sum of these 0.105 kg; lognormal variance with pedigree 0.0832, pedigree (3,3,5,1,4)
  Literature value. Based on Fierz-David (1921).
  properties: carbon content, fossil 0.0517241, dry mass 1 kg, heating value, net 3.43 MJ, wet mass 1 kg
- tap water: 1.9 kg; name tapwater; source Sadek, S. E. 1992; lognormal variance with pedigree 0.0606, pedigree (3,5,5,5,3)
  Literature value. Reprensents water use for Bechamp reduction. Reported as hydraulic load in Sadek, S.E., et al (1992).
  properties: carbon content, fossil 0.00178991, dry mass 0.000337476 kg, water content 2962.17, wet mass 1 kg
  note on carbon content, fossil: Bicarbonate content is 2.93 mol/m3. CO2 content is 0.1 mol/m3 (ecoinvent v2.2 report 8, Tab 93.1).
- wastewater, average: -9.95885e-6, -0.0016572, -0.00039627, -5.90025e-6 m3 (4 suppliers, which the file names only by identifier); sum of these -0.00206933 m3; = (water+tapwater)/1000; lognormal variance with pedigree 0.0986, pedigree (4,5,5,5,4)
  Approximated process. Represents treatment of wastewater from phenylenediamine production.
  production volume; = PV_OPD * (BP_amount_2 / OPD)
    Calculated from production volume of reference product using the relative outputs.
  properties: carbon content, non-fossil 0.194039, dry mass 0.346837 kg, water content 2882.2, wet mass 1000 kg
  note on carbon content, non-fossil: 0.0673 kg TOC/m3 (Tab A.17, ecoinvent v2.2 report 13_I). TOC was considered as Total Carbon.
- water, deionised: 0.0398423, 0.000143422, 0.129341 kg (3 suppliers, which the file names only by identifier); sum of these 0.169326 kg; lognormal variance with pedigree 0.0832, pedigree (3,3,5,1,4)
  Calculated value. Water content of acid solution.
  properties: wet mass 1 kg

## Emissions to nature
- Hydrochloric acid [air, non-urban air or from high stacks]: 0.000145137 kg; = HCl*0.002; source Hischier, R. 2005; lognormal variance with pedigree 0.218, pedigree (4,5,5,5,5)
  Estimated value. Represents hydrochloridric acid emitted to air based on assumption for chemical production published by Hischier et al. (2005).
- BOD5, Biological Oxygen Demand [water, surface water]: 0.085 kg; = TOC*1.7; source Doka G. 2009; lognormal variance with pedigree 0.1, pedigree (3,5,5,5,3)
  Calculated value. Calculated by default as BOD (gC2) = 1.27 TOC (BOD measured in g O2). Conversion factor used by Doka (2009).
- COD, Chemical Oxygen Demand [water, surface water]: 0.135 kg; = TOC*2.7; lognormal variance with pedigree 0.1, pedigree (3,5,5,5,3)
  Calculated value. Calculated by default as TOC (gC) = COD/2.7 (COD measured in g O2).
- Carbonate [water, unspecified]: 0.0594495 kg; lognormal variance with pedigree 0.138, pedigree (4,5,5,5,4)
  Stochiometric value. Represented carbonate ions emitted to water from neutralisation of chlroridric acid with soda ash.
- Chloride [water, unspecified]: 0.0704166 kg; lognormal variance with pedigree 0.138, pedigree (4,5,5,5,4)
  Calculated value. Represents chloride emissions to water from neutralised chloridric acid. Value was calculated based on chloride input minus estimation of air emissions,
- DOC, Dissolved Organic Carbon [water, surface water]: 0.05 kg; = TOC; lognormal variance with pedigree 0.1, pedigree (3,5,5,5,3)
  Calculated value. Calculated as equal to TOC.
- Sodium I [water, unspecified]: 0.0455505 kg; lognormal variance with pedigree 0.138, pedigree (4,5,5,5,4)
  (same comment as for Carbonate)
- TOC, Total Organic Carbon [water, surface water]: 0.05 kg; name TOC; source Sadek, S. E. 1992; lognormal variance with pedigree 0.1, pedigree (3,5,5,5,3)
  (same comment as for tap water)

## Sampling procedure
see technology

## Extrapolations
see technology and generalComments This dataset has been copied from an original dataset covering the geography RER. The uncertainty has been adjusted accordingly.
