# polyethylene terephthalate production, granulate, amorphous, recycled

Dataset: EcoSpold 2, unit process
Geography: CH
Time period: 2014-01-01 to 2023-12-31
Technology level: current
Classification: ISIC rev.4 ecoinvent: 3830:Materials recovery
Scenario: Business-as-Usual
System model: Allocation, cut-off by classification
Generated by: Thomas Kägi
Published in: Kägi T. 2017
Database: ecoinvent
isCopyrightProtected: true
accessRestrictedTo: 1

## General comment
The functional unit represents the production of 1 kg of polyethylene terephthalate granulate, recycled, amorphous. This process delivers the byproduct waste polethylene, unsorted, for recycling.
About 40’000 t of PET bottles per year are collected in Switzerland and further processed to bottle grade (30 % recycling content) or amorphous (50 % recycling content) PET granulate. 20 % of the PET cannot be recycled again and is incinerated. Data for the PET recycling processes were derived via PET Recycling Schweiz (PRS).
After sorting, the pure-coloured PET bales are processed according to the United Resource Recovery Corporation (URRC)-procedure in one of two recycling plants in Switzerland. First, the wire around the PET bales is cut away and the bottles are separated again. The PET bottles pass through a metal separator which also separates aluminium-containing labels. The bottles are then shredded with knives to 12 mm size in the mill. The so-called flakes arrive from above into the air separator that separates the label residues from the PET flakes. The label residues end up in the incin-erator. Purified from the labels, the flakes land in a pool of water where the bottle caps, made of PE, float on top where-as the PET flakes which are heavier than water, sink to the bottom. Thus, the PE caps can be easily separated from the PET and are transferred to the PE recycling. The PET flakes are treated with 50% sodium hydroxide and the flakes-liquor mixture is heated to approximately 200 degree. The liquor dissolves the PET surface layer. With this procedure, even the SiOx coating of the bottle-inside is removed. The purified PET flakes are washed with water and then dried. The PET flakes have now such a high quality again that they may come into contact with bottle again. There are two recycled PET grades produced in Switzerland: amorphous and bottle grade. For bottle grade, the viscosity of the recycled flakes is increased to a comparable level of primary PET by solid state polymerization (SSP). Data were derived from involved recycling facilities.
For further information see Kägi et al. (2017). Life Cycle Inventories for Swiss Recycling Processes - Part Carbotech: Recycling of Cardboard, Glass, PE, PET, Tinplate

## Included activities start
Service is starting with the receipt of bales of sorted waste PET

## Included activities end
This module includes all processes of the production of recycled PET granulate, amorphous up to the factory gate. Machinery infrastructure is excluded

## Allocation
economic allocation should be used: 99.5 % is allocated to recycled PET granulate, 0.5% to waste PE

## Reference product
- polyethylene terephthalate, granulate, amorphous, recycled: 1 kg; name RP_amount; By-product classification allocatable product; CPC 34710: Polymers of ethylene, in primary forms; HS2017 390120: Ethylene polymers; in primary forms, polyethylene having a specific gravity of 0.94 or more; CAS 25038-59-9
  production volume 2.5e7 kg; name RP_PV
    40'000 t waste PET recycled per year in Switzerland; 5/8 as amorphous
  property heating value, net 22.95 MJ
    Assumed equal to "polyethylene terephthalate, granulate, amorphous"
  properties: carbon allocation 0.625 kg, carbon content 0.625, carbon content, fossil 0.625, carbon content, non-fossil 0, dry mass 1 kg, price 0.84 EUR2005, water content 0, water in wet mass 0 kg, wet mass 1 kg

## Inputs from technosphere
- chemical, organic: 0.0011 kg; lognormal variance with pedigree 0.1286, pedigree (1,1,4,1,5)
  properties: carbon content, fossil 0.628, dry mass 1 kg, heating value, net 19.03 MJ, wet mass 1 kg
  note on carbon content, fossil: This dataset is an unweighted average of 20 organic substances (listed in Tab 88.1, ecoinvent v2.2 report 8, part II), being part of the top100 chemicals included in this database. The C-content has also been calculated as an unweighted average of the C content of the substances composing this dataset.
- electricity, low voltage: 0.421 kWh; lognormal variance with pedigree 0.0086, pedigree (1,1,4,1,1)
- extrusion, plastic film: 6.24e-5 kg; lognormal variance with pedigree 0.0086, pedigree (1,1,4,1,1)
  activityLink introduced to establish a direct link to the corresponding regional supply of this product
- heat, district or industrial, natural gas: 0.2881 MJ; lognormal variance with pedigree 0.0092, pedigree (1,1,4,1,2)
  properties: heating value, net 1 MJ
- heat, district or industrial, other than natural gas: 6.932 MJ; lognormal variance with pedigree 0.0086, pedigree (1,1,4,1,1)
  properties: heating value, net 1 MJ
- municipal solid waste: -0.0632 kg; name BP_MSW; source Kägi T. 2017; lognormal variance with pedigree 0.0006, pedigree (1,1,1,1,1)
  production volume; = ABS(BP_MSW/RP_amount*RP_PV)
    Calculated from production volume of reference product using the relative outputs. 40'000 t waste PET recycled per year in Switzerland; 5/8 as amorphous
  properties: carbon content, fossil 0.171549, carbon content, non-fossil 0.261655, dry mass 0.771 kg, heating value, net 11.74 MJ, water content 0.297017, wet mass 1 kg
  note on carbon content, fossil: MSW composition in tab 4.1, ecoinvent v2.2 report 13_I. C content referred to 1 kg DM
  note on heating value, net: Value taken from the general comment of the treatment dataset.
- polypropylene, granulate: 6.24e-5 kg; lognormal variance with pedigree 0.0086, pedigree (1,1,4,1,1)
  properties: carbon content, fossil 0.857143, dry mass 1 kg, heating value, net 32.78 MJ, wet mass 1 kg
  note on heating value, net: Value extracted from "treatment of waste polypropylene, open burning"
- soap: 0.0003 kg; lognormal variance with pedigree 0.0166, pedigree (1,1,4,1,3)
  properties: carbon content, non-fossil 0.692237, dry mass 0.87 kg, heating value, net 17.93 MJ, water content 0.149425, wet mass 1 kg
- sodium hydroxide, without water, in 50% solution state: 0.0025 kg; lognormal variance with pedigree 0.0086, pedigree (1,1,4,1,1)
  properties: dry mass 1 kg, heating value, net 3.03 MJ, wet mass 1 kg
- steel, low-alloyed: 3e-6 kg; lognormal variance with pedigree 0.0086, pedigree (1,1,4,1,1)
  properties: carbon content, fossil 0.005, dry mass 1 kg, wet mass 1 kg
- sulfuric acid: 0.0011 kg; lognormal variance with pedigree 0.0086, pedigree (1,1,4,1,1)
  properties: dry mass 1 kg, wet mass 1 kg
- waste polyethylene terephthalate, for recycling, sorted: 1.215 kg; lognormal variance with pedigree 0.0086, pedigree (1,1,4,1,1)
  properties: carbon content, fossil 0.624, dry mass 0.986 kg, heating value, net 22.95 MJ, water content 0.0141988, wet mass 1 kg
- waste polyethylene, for recycling, sorted: -0.122 kg; name BP_waste_PE_sorted; lognormal variance with pedigree 0.0006, pedigree (1,1,1,1,1)
  production volume; = RP_PV * (BP_waste_PE_sorted / RP_amount)
    (same comment as for municipal solid waste)
  properties: heating value, net 42.47 MJ, price 0.035 EUR2005
- waste preparation facility: 2e-9 unit; lognormal variance with pedigree 0.0566, pedigree (4,1,4,1,4)
  (same comment as for extrusion, plastic film)
  properties: lifetime 50 year, lifetime capacity [kg] 5e8 kg
- wastewater, average: -0.0044 m3; name BP_ww; source Kägi T. 2017; lognormal variance with pedigree 0.0006, pedigree (1,1,1,1,1)
  production volume; = ABS(BP_ww/RP_amount*RP_PV)
    (same comment as for municipal solid waste)
  properties: carbon content, non-fossil 0.194039, dry mass 0.346837 kg, water content 2882.2, wet mass 1000 kg
  note on carbon content, non-fossil: 0.0673 kg TOC/m3 (Tab A.17, ecoinvent v2.2 report 13_I). TOC was considered as Total Carbon.
- wire drawing, steel: 3e-6 kg; lognormal variance with pedigree 0.0086, pedigree (1,1,4,1,1)
  (same comment as for extrusion, plastic film)

## Inputs from nature
- Water, cooling, unspecified natural origin [natural resource, in water]: 0.0044 m3; lognormal variance with pedigree 0.0086, pedigree (1,1,4,1,1)
- Water, unspecified natural origin [natural resource, in water]: 1.09e-6 m3; lognormal variance with pedigree 0.0086, pedigree (1,1,4,1,1)

## Emissions to nature
- Particulate Matter, > 2.5 um and < 10um [air, unspecified]: 3.9e-5 kg; source Franklin Associates 2011; lognormal variance with pedigree 0.0898, pedigree (5,5,5,4,2)
  Not included in the original report. Added based on the US inventory in order to have better consistency.
- VOC, volatile organic compounds [air, unspecified]: 3.7e-5 kg; source Franklin Associates 2011; lognormal variance with pedigree 0.0898, pedigree (5,5,5,4,2)
  (same comment as for Particulate Matter, > 2.5 um and < 10um)

## Sampling procedure
Uncertainty estimation according to the pedigree matrix
