# photovoltaic panel production, a-Si

Dataset: EcoSpold 2, unit process
Geography: RoW
Time period: 1997-01-01 to 2023-12-31
Technology level: current
Classification: EcoSpold01Categories: photovoltaic/production of components
Classification: ISIC rev.4 ecoinvent: 2610:Manufacture of electronic components and boards
Synonyms: Solarmodul; amorphous silicon; PV-module
Tags: ConvertedDataset
Scenario: Business-as-Usual
System model: Allocation, cut-off by classification
Share of production covered: 100 %
Generated by: Niels Jungbluth
Published in: Jungbluth, N. 2007
Database: ecoinvent
isCopyrightProtected: true
accessRestrictedTo: 1

## General comment
Production of photovoltaic thin film modules. Deposition of nine thin-film layers on the triple-junction cell. The modules produced at United Solar have a size of 2.3 m2. The weight is 8.2 kg per m2. The efficiency is 6.45% at the beginning of the life time. Degradation has to be taken into account with achieved yields. The rated nominal power is about 128Wp per module.
[This dataset was already contained in the ecoinvent database version 2. It was not individually updated during the transfer to ecoinvent version 3. Life Cycle Impact Assessment results may still have changed, as they are affected by changes in the supply chain, i.e. in other datasets. This dataset was generated following the ecoinvent quality guidelines for version 2. It may have been subject to central changes described in the ecoinvent version 3 change report (http://www.ecoinvent.org/database/ecoinvent-version-3/reports-of-changes/), and the results of the central updates were reviewed extensively. The changes added e.g. consistent water flows and other information throughout the database. The documentation of this dataset can be found in the ecoinvent reports of version 2, which are still available via the ecoinvent website. The change report linked above covers all central changes that were made during the conversion process.]

## Included activities end
Electricity and heat use, materials, transport of materials, disposal of wastes and the product. Data for direct air and water emissions were not available. It can be expected that small amount of NMVOC will be emitted from the lamination process.

## Geography
Data for United Solar in the United States.

## Technology
Production technology of thin film a-Si cells. The modules contain triple junction cells, which are made in a continuous roll-to-roll deposition on stainless steel. The cell is deposited using a vapour-deposition process at low temperatures.

## Time period
Data refer to 2005. Some are extrapolated from older information.

## Reference product
- photovoltaic panel, a-Si: 1 m2; By-product classification allocatable product; CPC 47150: Diodes, transistors and similar semi-conductor devices; photosensitive semi-conductor devices; light emitting […]; HS2017 854140: Electrical apparatus; photosensitive, including photovoltaic cells, whether or not assembled in modules or [...]
  EcoSpold01Location=US
  production volume 1.12125e6 m2
    128 W/2.3 m2 (from Tab 9.10, ecoinvent v2 report 6_XII). Total production worldwide of panels is 1500MW in 2005. Tab 12.6 (ecoinvent v2 report 6_XII) gives the share of the different types of photovoltaic cells, that was assumed as the share of the different panels.
  property price 285.464 EUR2005
    Calculated based on inputs: The price of the product has been calculated as a sum of the values of the material and energy inputs for this product. This value is therefore a rough estimation. It may underestimate the real price since there are additional expenses when producing any product. These expences can include for example labour costs, treatment of waste materials and profit for the producer. Please consider carefully whether this level of data quality is acceptable for your application.
  properties: carbon allocation 0 kg, carbon content 0

## Inputs from technosphere
- aluminium alloy, AlMg3: 3.3403 kg; lognormal variance with pedigree 0.0446, pedigree (3,3,5,5,1)
  Pacca 2006
  EcoSpold01Location=RER
  Uncertainty: Pacca 2006
  properties: dry mass 1 kg, wet mass 1 kg
- photovoltaic laminate, a-Si: 1 m2; lognormal variance with pedigree 0.0606, pedigree (4,3,5,5,1)
  EcoSpold01Location=US
  Assumption
  Uncertainty: Assumption
- steel, low-alloyed, hot rolled: 2.18 kg; lognormal variance with pedigree 0.0446, pedigree (3,3,5,5,1)
  Pacca 2006
  Uncertainty: Pacca 2006
  properties: carbon content, fossil 0.005, dry mass 1 kg, wet mass 1 kg
  note on carbon content, fossil: Low alloyed steel composition given in Tab. 3.2 ecoinvent v2.2 report 10_partII. Steel assumed to have a C content of 0.5%

## Sampling procedure
Literature data based on producer information.

## Extrapolations
Packaging estimated with data for crystalline modules. This dataset has been copied from an original dataset covering the geography US. The uncertainty has been adjusted accordingly.

## Review by Roberto Dones 2007-08-23
Passed.
none
