# polyethylene production, high density, granulate, recycled

Dataset: EcoSpold 2, unit process
Geography: RoW
Time period: 2010-01-01 to 2023-12-31
Technology level: current
Classification: ISIC rev.4 ecoinvent: 3830:Materials recovery
Scenario: Business-as-Usual
System model: Allocation, cut-off by classification
Generated by: Thomas Kägi
Published in: Kägi T. 2017
Database: ecoinvent
isCopyrightProtected: true
accessRestrictedTo: 1

## General comment
This dataset was built as a weighted average of regional datasets of the same activityName. Weights are based on production volumes.
Europe without Switzerland: production volume = 2e+09 kg/year, weight = 0.7675
US: production volume = 8e+08 kg/year, weight = 0.2302
CH: production volume = 8e+06 kg/year, weight = 0.00231

## Included activities start
Service is starting with the receipt of bales of sorted waste PE

## Included activities end
This module includes all processes of the production of recycled PE granulate, high density, up to the factory gate. Machinery infrastructure is excluded

## Allocation
no allocation involved

## Geography
This dataset is a weighted average built from the following geographies: Europe without Switzerland, US, CH.

## Reference product
- polyethylene, high density, granulate, recycled: 1 kg; By-product classification allocatable product; CPC 34710: Polymers of ethylene, in primary forms; HS2017 390120: Ethylene polymers; in primary forms, polyethylene having a specific gravity of 0.94 or more; CAS 9002-88-4
  production volume 2.52476e8 kg; name APV_RP
    Global production volume (PV) estimated based on WRF (2016) 'The New Plastics Economy - Rethinking the future of plastics': According to figure 4 in WRF (2016), the annual global production of plastic packaging material amounted to 78 milon tonnes in 2013. 14% was collected for recycling, of which 2% entered closed-loop recycling, 8% cascaded recycling, and 4% process losses.
    The global PV in this activity was approximated based on the share of cascaded recycling and half of the closed-loop recycling, assuming equal shares of high-density PE and amorphous PET (i.e., 4.5% of 78 million tonnes each).
    PVs of by-products/waste are scaled according to their relationship with the reference product.
  property price 0.7 EUR2005
    From UN data (http://data.un.org/Data.aspx?q=polyethylene&d=ComTrade&f=_l1Code%3a40%3bcmdCode%3a390120); Polyethylene HDPE has gravity >0.94 from http://www.dynalabcorp.com/technical_info_hd_polyethylene.asp.
  properties: carbon allocation 0.857 kg, carbon content 0.857, carbon content, fossil 0.857, carbon content, non-fossil 0, dry mass 1 kg, heating value, net 42.47 MJ, water content 0, water in wet mass 0 kg, wet mass 1 kg

## Inputs from technosphere
- chemical, inorganic: 0.00292305 kg; lognormal variance with pedigree 0.0986, pedigree (4,5,5,5,4)
  properties: carbon content, fossil 0.003, dry mass 1 kg, wet mass 1 kg
  note on carbon content, fossil: This dataset is an unweighted average of 20 inorganic substances (listed in Tab 88.1, ecoinvent v2.2 report 8, part II), being part of the top100 chemicals included in this database. The C-content has also been calculated as an unweighted average of the C content of the substances composing this dataset.
- electricity, low voltage: 0.00124423, 0.0159818, 0.0195664, 0.406125, 0.0400865, 0.000249691, 0.00692692 kWh (7 suppliers, which the file names only by identifier); sum of these 0.49018 kWh; lognormal variance with pedigree 0.0586, pedigree (4,5,5,5,1)
- heat, district or industrial, natural gas: 0.00448857, 0.273151 MJ (2 suppliers, which the file names only by identifier); sum of these 0.277639 MJ; lognormal variance with pedigree 0.0586, pedigree (4,5,5,5,1)
  properties: heating value, net 1 MJ
- municipal solid waste: -0.000127621, -1.51544e-5, -9.43174e-5, -0.0720037, -1.06045e-5, -3.40385e-6, -7.69363e-6, -0.000320288 kg (8 suppliers, which the file names only by identifier); sum of these -0.0725828 kg; lognormal variance with pedigree 0.0128, pedigree (3,5,2,5,1)
  production volume; = apv_rp* BP_amount_1
    PVs of by-products/waste scaled according to their relationship with the reference product.
  properties: carbon content, fossil 0.171549, carbon content, non-fossil 0.261655, dry mass 0.771 kg, heating value, net 11.74 MJ, water content 0.297017, wet mass 1 kg
  note on carbon content, fossil: MSW composition in tab 4.1, ecoinvent v2.2 report 13_I. C content referred to 1 kg DM
  note on heating value, net: Value taken from the general comment of the treatment dataset.
- propane, burned in building machine: 0.000102163 MJ; lognormal variance with pedigree 0.0986, pedigree (4,5,5,5,4)
  properties: heating value, net 1 MJ
- sodium hydroxide, without water, in 50% solution state: 0.000269376 kg; lognormal variance with pedigree 0.0586, pedigree (4,5,5,5,1)
  properties: dry mass 1 kg, heating value, net 3.03 MJ, wet mass 1 kg
- tap water: 7.27232e-6, 1.1086e-5, 2.0686e-5, 5.57265e-5, 6.70798e-6, 0.000279546, 0.00319899 kg (7 suppliers, which the file names only by identifier); sum of these 0.00358001 kg; lognormal variance with pedigree 0.0826, pedigree (1,1,5,5,4)
  properties: carbon content, fossil 0.00178991, dry mass 0.000337476 kg, water content 2962.17, wet mass 1 kg
  note on carbon content, fossil: Bicarbonate content is 2.93 mol/m3. CO2 content is 0.1 mol/m3 (ecoinvent v2.2 report 8, Tab 93.1).
- waste polyethylene, for recycling, sorted: 1.06322 kg; lognormal variance with pedigree 0.0586, pedigree (4,5,5,5,1)
  properties: carbon content, fossil 0.829, dry mass 0.994 kg, heating value, net 42.47 MJ, water content 0.00603622, wet mass 1 kg
- waste preparation facility: 2e-9 unit; lognormal variance with pedigree 0.2106, pedigree (5,5,5,5,5)
  properties: lifetime 50 year, lifetime capacity [kg] 5e8 kg
- wastewater, average: -0.0004075, -1.45086e-6 m3 (2 suppliers, which the file names only by identifier); sum of these -0.000408951 m3; lognormal variance with pedigree 0.0128, pedigree (3,5,2,5,1)
  production volume; = apv_rp* BP_amount_2
    (same comment as for municipal solid waste)
  properties: carbon content, non-fossil 0.194039, dry mass 0.346837 kg, water content 2882.2, wet mass 1000 kg
  note on carbon content, non-fossil: 0.0673 kg TOC/m3 (Tab A.17, ecoinvent v2.2 report 13_I). TOC was considered as Total Carbon.

## Inputs from nature
- Water, unspecified natural origin [natural resource, in water]: 0.000405371 m3; lognormal variance with pedigree 0.0526, pedigree (3,5,5,5,1)

## Emissions to nature
- Particulate Matter, < 2.5 um [air, unspecified]: 1.5e-5 kg; lognormal variance with pedigree 0.0526, pedigree (3,5,5,5,1)
- Particulate Matter, > 2.5 um and < 10um [air, unspecified]: 2.3e-5 kg; lognormal variance with pedigree 0.0526, pedigree (3,5,5,5,1)

## Sampling procedure
Uncertainty estimation according to the pedigree matrix

## Review by Ivan Muñoz Ortiz 2017-08-10
An offline review in excel has been carried out for all the PE recycling activities, checking mass balances, data sources, etc. Several comments were made to the data provider and improvements have been made to the datasets.
