# protein pea production

Dataset: EcoSpold 2, unit process
Geography: RoW
Time period: 2000-01-01 to 2023-12-31
Technology level: current
Classification: ISIC rev.4 ecoinvent: 0111:Growing of cereals (except rice), leguminous crops and oil seeds
Classification: EcoSpold01Categories: agricultural production/plant production
Scenario: Business-as-Usual
System model: Allocation, cut-off by classification
Share of production covered: 100 %
Generated by: Thomas Nemecek
Published in: Nemecek, T. 2007
Database: ecoinvent
isCopyrightProtected: true
accessRestrictedTo: 1

## General comment
This dataset represents the production of 1 kg of protein peas (fresh matter). The amounts of flows are weighted averages over all existing local crop production datasets available for this specific product. The weights are the annual production volumes of the local datasets relative to the sum of all local annual production volumes. The locations of considered datasets in the averaging prodecure for this global dataset are Germany, Spain and France. For references refer to the respective local datasets.
[This dataset was already contained in the ecoinvent database version 2. It was not individually updated during the transfer to ecoinvent version 3. Life Cycle Impact Assessment results may still have changed, as they are affected by changes in the supply chain, i.e. in other datasets. This dataset was generated following the ecoinvent quality guidelines for version 2. It may have been subject to central changes described in the ecoinvent version 3 change report (http://www.ecoinvent.org/database/ecoinvent-version-3/reports-of-changes/), and the results of the central updates were reviewed extensively. The changes added e.g. consistent water flows and other information throughout the database. The documentation of this dataset can be found in the ecoinvent reports of version 2, which are still available via the ecoinvent website. The change report linked above covers all central changes that were made during the conversion process.]

## Included activities start
This activity starts after the harvest of the previous crop. The inputs of seeds, mineral fertilisers and pesticides are considered. It is assumed that no organic fertilisers are applied.

## Included activities end
The dataset includes all machine operations and corresponding machine infrastructure and sheds. Machine operations are: soil cultivation, sowing, fertilisation, weed control, pest and pathogen control, combine-harvest, grain drying and transport from field to farm. Further, direct field emissions are included. This activity ends after harvest and grain drying at the farm gate.

## Geography
Refers to an average production in the region Barrois (FR).

## Technology
conventional production typical for the region

## Time period
The yield data have been collected for the years 2000-2004.

## Reference product
- protein pea: 1 kg; name REF_PRODUCT; By-product classification allocatable product; CPC 0124: Green leguminous vegetables; HS2017 070810: Vegetables, leguminous; peas (pisum sativum), shelled or unshelled, fresh or chilled
  production volume 9.45721e9 kg
    FAO production data for 'peas, dry'. Global production volume except organic.
  property carbon content, non-fossil 0.469421; name REF_PRODUCT_C_content_non_fossil
    biogene carbon content on a dry matter basis
    Composition data obtained from Peas, split, mature seeds, raw, in (http://www.nal.usda.gov/fnic/foodcomp/search/). First, composition data were refered to 1 kg dry mass. Then, C-contents were calculated considering a C-content/dry mass of 46% in carbohydrates (including fibres), 53% in proteins and 75% in fats. All data from 'Evolutionary and Biochemical Aspects', A.D. Kay and T. Vrede (in Global Ecology, 2010, Elsevier B.V., S.E. Jørgensen Ed.).
  property dry mass 0.87 kg; name REF_PRODUCT_DM
  property energy content 16.0776 MJ; name REF_PRODUCT_energy_content
    See chapter 'Product Properties' in '01_crop production - yields & inputs CH & Europe_v1.0.pdf', section 'AGRICULTURAL PRODUCTION IN SWITZERLAND' - pdf-document on the dedicated talk page of ecoinvent (www.ecoinvent.org/documentation)
  property price 2.11 EUR2005
    Calculated value based on data from United Nations Commodity Trade Statistics Database (comtrade.un.org). UN comtrade category: 210610 Protein concentrates and textures protein substances. Year 2005. Using exchange rate of 1EURO = 1.209 USD. Average of price of import into 5 main markets (EU, US, JP, IN and CN).
  properties: carbon allocation 0.408396 kg, carbon content 0.469421, carbon content, fossil 0, water content 0.149425, water in wet mass 0.13 kg, wet mass 1 kg

## Inputs from technosphere
- [sulfonyl]urea-compound: 1.8267e-5 kg; lognormal variance with pedigree 0.0407, pedigree (2,2,5,1,1)
  Averaged from local datasets. See general comment.
  properties: carbon content, fossil 0.540853, dry mass 1 kg, wet mass 1 kg
  note on carbon content, fossil: Approximated as an unweighted average of the C-content of the [sulfonyl]urea-compounds (Tab 2.25 Sutter, 2010) chlorotoluron, Diuron, Linuron and Isoproturon.
- application of plant protection product, by field sprayer: 0.0017306 ha; lognormal variance with pedigree 0.0406, pedigree (2,1,5,1,1)
  Averaged from local datasets. See general comment.
- benzimidazole-compound: 0.000182042 kg; lognormal variance with pedigree 0.0407, pedigree (2,2,5,1,1)
  Averaged from local datasets. See general comment.
  properties: carbon content, fossil 0.529668, dry mass 1 kg, wet mass 1 kg
  note on carbon content, fossil: C content estimated as an average of that of the pesticides Carbendazim, prochloraz and ethofumesate (Sutter 2010)
- benzo[thia]diazole-compound: 0.000182548 kg; lognormal variance with pedigree 0.0407, pedigree (2,2,5,1,1)
  Averaged from local datasets. See general comment.
  properties: carbon content, fossil 0.499869, dry mass 1 kg, wet mass 1 kg
  note on carbon content, fossil: C content estimated after the herbicide Bentazon (C10H12N2O3S) (Tab 1.5, Sutter 2010), classified in ecoinvent v2.2 report 15a, Tab 10.3 as a benzo[thia]diazole compound
- combine harvesting: 0.000293277 ha; lognormal variance with pedigree 0.0406, pedigree (2,1,5,1,1)
  Averaged from local datasets. See general comment.
- dinitroaniline-compound: 0.000175964 kg; lognormal variance with pedigree 0.0407, pedigree (2,2,5,1,1)
  Averaged from local datasets. See general comment.
  properties: carbon content, fossil 0.55516, dry mass 1 kg, wet mass 1 kg
  note on carbon content, fossil: C content of dinitroaniline-compound was calculated after the C content of the herbicide pendimethalin, classified as dinitroaniline-compound in Tab 2.25 of Sutter 2010
- drying of bread grain, seed and legumes: 0.0039173 l; lognormal variance with pedigree 0.0406, pedigree (2,1,5,1,1)
  Averaged from local datasets. See general comment.
- fertilising, by broadcaster: 3.37321e-5 ha; lognormal variance with pedigree 0.0406, pedigree (2,1,5,1,1)
  Averaged from local datasets. See general comment.
- glyphosate: 3.93215e-5 kg; lognormal variance with pedigree 0.0407, pedigree (2,2,5,1,1)
  Averaged from local datasets. See general comment.
  properties: carbon content, fossil 0.214286, dry mass 1 kg, wet mass 1 kg
- inorganic phosphorus fertiliser, as P2O5: 4.37485e-6, 1.18824e-6, 3.23427e-6, 7.89036e-6, 9.84498e-5, 0.000218524, 2.9999e-5, 3.67175e-6, 4.57328e-5, 2.03118e-6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 kg (60 suppliers, which the file names only by identifier); sum of these 0.0136217 kg; lognormal variance with pedigree 0.0406, pedigree (2,1,5,1,1)
  Averaged from local datasets. See general comment.
  properties: dry mass 1 kg, wet mass 1 kg
- lime: 0.00438931 kg; lognormal variance with pedigree 0.0406, pedigree (2,1,5,1,1)
  Averaged from local datasets. See general comment.
  properties: carbon content, fossil 0.120005, dry mass 1 kg, wet mass 1 kg
- packaging, for fertilisers: 0.0732204 kg; lognormal variance with pedigree 0.0912, pedigree (4,3,5,5,4)
  Total amount of active substance/s of fertilisers needed for the production of 'protein pea' is calculated to be circa 3.66E-02 kg. Fertiliser/s used in this dataset is/are: 'lime', 'phosphate fertiliser, as P2O5', 'potassium chloride, as K2O'. The total amount of active substance/s is doubled in order to account for the packaging of the dilluted product of fertiliser/s that is/are applied. Therefore, 7.32E-02 kg of packaging for fertilisers is justified with this exchange.
  properties: carbon content, fossil 0.825301, dry mass 1 kg, heating value, net 25.01 MJ, price 0.0642 EUR2005, wet mass 1 kg
  note on carbon content, fossil: Considering a chemical formula (C2H4)n for polyethylene, carbon content-fossil is calculated to be 0.856286 kg of Carbon per kg of dry mass.
- packaging, for pesticides: 0.00141876 kg; lognormal variance with pedigree 0.0912, pedigree (4,3,5,5,4)
  Total amount of active substance/s of pesticides needed for the production of protein pea is calculated to be circa 7.09E-04 kg. Pesticide/s used in this dataset is/are: '[sulfonyl]urea-compound', 'benzimidazole-compound', 'benzo[thia]diazole-compound', 'dinitroaniline-compound', 'glyphosate', 'pesticide, unspecified', 'pyrethroid-compound'. The total amount of active substance/s is doubled in order to account for the packaging of the dilluted product of pesticide/s that is/are applied. Therefore, 1.42E-03 kg of packaging for pesticides is justified with this exchange.
  properties: carbon content, fossil 0.85714, dry mass 1 kg, heating value, net 25.97 MJ, price 0.0642 EUR2005, wet mass 1 kg
- pea seed, for sowing: 0.0598159 kg; name SEED; lognormal variance with pedigree 0.0406, pedigree (2,1,5,1,1)
  Averaged from local datasets. See general comment.
  property carbon content, non-fossil 0.469421; name SEED_C_content_non_fossil
  property dry mass 0.87 kg; name SEED_DM
  property energy content 16.0776 MJ; name SEED_energy_content
  properties: water content 0.149425, wet mass 1 kg
  note on carbon content, non-fossil: biogene carbon content on a dry matter basis Composition data obtained from Peas, split, mature seeds, raw, in (http://www.nal.usda.gov/fnic/foodcomp/search/). First, composition data were refered to 1 kg dry mass. Then, C-contents were calculated considering a C-content/dry mass of 46% in carbohydrates (including fibres), 53% in proteins and 75% in fats. All data from 'Evolutionary and Biochemical Aspects', A.D. Kay and T. Vrede (in Global Ecology, 2010, Elsevier B.V., S.E. Jørgensen Ed.).
  note on energy content: See chapter 'Product Properties' in '01_crop production - yields & inputs CH & Europe_v1.0.pdf', section 'AGRICULTURAL PRODUCTION IN SWITZERLAND' - pdf-document on the dedicated talk page of ecoinvent (www.ecoinvent.org/documentation)
- pesticide, unspecified: 0.000109722 kg; lognormal variance with pedigree 0.0407, pedigree (2,2,5,1,1)
  Averaged from local datasets. See general comment.
  properties: carbon content, fossil 0.486978, dry mass 1 kg, wet mass 1 kg
  note on carbon content, fossil: Mean of C content in all pesticides whose formula has been documented in Sutter 2010
- potassium chloride: 0.0294407 kg; lognormal variance with pedigree 0.0406, pedigree (2,1,5,1,1)
  The exchange has been updated from 'potassium chloride, as K2O' into 'potassium chloride' and therefore its amount has been scaled (multiplied) from 0.0186 kg by 1.5829 kg of 'potassium chloride' per kg of 'potassium chloride, as K2O'. Original comment of the exchange is: Averaged from local datasets. See general comment.
  properties: dry mass 1 kg, wet mass 1 kg
- pyrethroid-compound: 1.51535e-6 kg; lognormal variance with pedigree 0.0407, pedigree (2,2,5,1,1)
  Averaged from local datasets. See general comment.
  properties: carbon content, fossil 0.623, dry mass 1 kg, wet mass 1 kg
  note on carbon content, fossil: C content of pyrethroid-compounds was calculated as an unweigthed average of C content of the substances: cypermethrin, alpha-cypermethrin,beta-cyfluthrin, lambdacyhalothrin. Those substances are classified as pyrethroid-compounds in Tab 2.25, Sutter 2010
- sowing: 0.000293277 ha; lognormal variance with pedigree 0.0406, pedigree (2,1,5,1,1)
  Averaged from local datasets. See general comment.
- tillage, cultivating, chiselling: 6.08896e-5 ha; lognormal variance with pedigree 0.0406, pedigree (2,1,5,1,1)
  Averaged from local datasets. See general comment.
- tillage, harrowing, by rotary harrow: 0.000319703 ha; lognormal variance with pedigree 0.0406, pedigree (2,1,5,1,1)
  Averaged from local datasets. See general comment.
- tillage, harrowing, by spring tine harrow: 0.000332054 ha; lognormal variance with pedigree 0.0406, pedigree (2,1,5,1,1)
  Averaged from local datasets. See general comment.
- tillage, ploughing: 0.000174951 ha; lognormal variance with pedigree 0.0406, pedigree (2,1,5,1,1)
  Averaged from local datasets. See general comment.
- transport, tractor and trailer, agricultural: 0.00259176, 1.05393e-5 metric ton*km (2 suppliers, which the file names only by identifier); sum of these 0.0026023 metric ton*km; lognormal variance with pedigree 0.0406, pedigree (2,1,5,1,1)
  Averaged from local datasets. See general comment.

## Inputs from nature
- Carbon dioxide, in air [natural resource, in air]: 1.40788 kg; = 44/12 * (REF_PRODUCT_C_content_non_fossil * REF_PRODUCT * REF_PRODUCT_DM - SEED_C_content_non_fossil * SEED * SEED_DM); lognormal variance with pedigree 0.0406, pedigree (2,1,5,1,1)
  Averaged from local datasets. See general comment.
- Energy, gross calorific value, in biomass [natural resource, biotic]: 14.9529 MJ; lognormal variance with pedigree 0.161189, pedigree (2,1,5,1,5)
  Calculated as a weighted (by production volumes) average of the regional activities. The uncertainty is set up to be the same as in case of the regional activities, only the padigree matrix is adjusted from 2,1,1,1,1 to 2,1,1,1,5.
- Occupation, annual crop, non-irrigated, intensive [natural resource, land]: 2.84008 m2*year; lognormal variance with pedigree 0.0406, pedigree (2,1,5,1,1)
  Averaged from local datasets. See general comment.
- Transformation, from annual crop, non-irrigated, intensive [natural resource, land]: 2.93277 m2; lognormal variance with pedigree 0.0506, pedigree (2,1,5,1,1)
  Averaged from local datasets. See general comment.
- Transformation, to annual crop, non-irrigated, intensive [natural resource, land]: 2.93277 m2; lognormal variance with pedigree 0.0506, pedigree (2,1,5,1,1)
  Averaged from local datasets. See general comment.

## Emissions to nature
- Dinitrogen monoxide [air, non-urban air or from high stacks]: 0.000447904 kg; name N2O; lognormal variance with pedigree 0.0707, pedigree (2,2,5,1,1)
  Averaged from local datasets. See general comment.
- Nitrogen oxides [air, non-urban air or from high stacks]: 9.40598e-5 kg; = 0.21 * N2O; lognormal variance with pedigree 0.0707, pedigree (2,2,5,1,1)
  Averaged from local datasets. See general comment.
- Aclonifen [soil, agricultural]: 0.000109224 kg; lognormal variance with pedigree 0.0507, pedigree (2,2,5,1,1)
  Averaged from local datasets. See general comment.
- Bentazone [soil, agricultural]: 0.000182548 kg; lognormal variance with pedigree 0.0507, pedigree (2,2,5,1,1)
  Averaged from local datasets. See general comment.
- Cadmium II [soil, agricultural]: 1.14194e-6 kg; lognormal variance with pedigree 0.0807, pedigree (2,2,5,1,1)
  Averaged from local datasets. See general comment.
- Chlorothalonil [soil, agricultural]: 0.000182042 kg; lognormal variance with pedigree 0.0507, pedigree (2,2,5,1,1)
  Averaged from local datasets. See general comment.
- Chromium III [soil, agricultural]: 9.74523e-7 kg; lognormal variance with pedigree 0.0807, pedigree (2,2,5,1,1)
  Averaged from local datasets. See general comment.
- Copper ion [soil, agricultural]: -5.72312e-6 kg
  Averaged from local datasets. See general comment.
- Cycloxydim [soil, agricultural]: 7.30679e-6 kg; lognormal variance with pedigree 0.0507, pedigree (2,2,5,1,1)
  Averaged from local datasets. See general comment.
- Glyphosate [soil, agricultural]: 3.93215e-5 kg; lognormal variance with pedigree 0.0507, pedigree (2,2,5,1,1)
  Averaged from local datasets. See general comment.
- Lambda-cyhalothrin [soil, agricultural]: 1.51535e-6 kg; lognormal variance with pedigree 0.0507, pedigree (2,2,5,1,1)
  Averaged from local datasets. See general comment.
- Lead II [soil, agricultural]: 2.60424e-7 kg; lognormal variance with pedigree 0.0807, pedigree (2,2,5,1,1)
  Averaged from local datasets. See general comment.
- Linuron [soil, agricultural]: 1.8267e-5 kg; lognormal variance with pedigree 0.0507, pedigree (2,2,5,1,1)
  Averaged from local datasets. See general comment.
- Mercury II [soil, agricultural]: 1.82901e-11 kg; lognormal variance with pedigree 0.0807, pedigree (2,2,5,1,1)
  Averaged from local datasets. See general comment.
- Metaldehyde [soil, agricultural]: 1.20152e-5 kg; lognormal variance with pedigree 0.0507, pedigree (2,2,5,1,1)
  Averaged from local datasets. See general comment.
- Nickel II [soil, agricultural]: 5.06855e-7 kg; lognormal variance with pedigree 0.0807, pedigree (2,2,5,1,1)
  Averaged from local datasets. See general comment.
- Pendimethalin [soil, agricultural]: 3.02062e-5 kg; lognormal variance with pedigree 0.0507, pedigree (2,2,5,1,1)
  Averaged from local datasets. See general comment.
- Pronamide [soil, agricultural]: 3.64091e-5 kg; lognormal variance with pedigree 0.0507, pedigree (2,2,5,1,1)
  Averaged from local datasets. See general comment.
- Trifluralin [soil, agricultural]: 3.65339e-5 kg; lognormal variance with pedigree 0.0507, pedigree (2,2,5,1,1)
  Averaged from local datasets. See general comment.
- Zinc II [soil, agricultural]: -1.25178e-5 kg
  Averaged from local datasets. See general comment.
- Cadmium II [water, ground-]: 1.03252e-8 kg; lognormal variance with pedigree 0.1307, pedigree (2,2,5,1,1)
  Averaged from local datasets. See general comment.
- Cadmium II [water, surface water]: 6.46084e-9 kg; lognormal variance with pedigree 0.1307, pedigree (2,2,5,1,1)
  Averaged from local datasets. See general comment.
- Chromium III [water, ground-]: 4.354e-6 kg; lognormal variance with pedigree 0.1307, pedigree (2,2,5,1,1)
  Averaged from local datasets. See general comment.
- Chromium III [water, surface water]: 6.45074e-7 kg; lognormal variance with pedigree 0.1307, pedigree (2,2,5,1,1)
  Averaged from local datasets. See general comment.
- Copper ion [water, ground-]: 7.22333e-7 kg; lognormal variance with pedigree 0.1307, pedigree (2,2,5,1,1)
  Averaged from local datasets. See general comment.
- Copper ion [water, surface water]: 5.34186e-7 kg; lognormal variance with pedigree 0.1307, pedigree (2,2,5,1,1)
  Averaged from local datasets. See general comment.
- Lead II [water, ground-]: 9.45841e-9 kg; lognormal variance with pedigree 0.1307, pedigree (2,2,5,1,1)
  Averaged from local datasets. See general comment.
- Lead II [water, surface water]: 4.06854e-8 kg; lognormal variance with pedigree 0.1307, pedigree (2,2,5,1,1)
  Averaged from local datasets. See general comment.
- Mercury II [water, ground-]: 1.12287e-10 kg; lognormal variance with pedigree 0.1307, pedigree (2,2,5,1,1)
  Averaged from local datasets. See general comment.
- Mercury II [water, surface water]: 9.67973e-11 kg; lognormal variance with pedigree 0.1307, pedigree (2,2,5,1,1)
  Averaged from local datasets. See general comment.
- Nickel II [water, surface water]: 3.36144e-7 kg; lognormal variance with pedigree 0.1307, pedigree (2,2,5,1,1)
  Averaged from local datasets. See general comment.
- Nitrate [water, ground-]: 0.0490189 kg; lognormal variance with pedigree 0.0807, pedigree (2,2,5,1,1)
  Averaged from local datasets. See general comment.
- Phosphate [water, ground-]: 6.09246e-5 kg; lognormal variance with pedigree 0.0807, pedigree (2,2,5,1,1)
  Averaged from local datasets. See general comment.
- Phosphate [water, surface water]: 0.000112268 kg; lognormal variance with pedigree 0.0807, pedigree (2,2,5,1,1)
  Averaged from local datasets. See general comment.
- Phosphorus [water, surface water]: 3.72129e-5 kg; lognormal variance with pedigree 0.0807, pedigree (2,2,5,1,1)
  Averaged from local datasets. See general comment.
- Zinc II [water, ground-]: 3.02348e-6 kg; lognormal variance with pedigree 0.1307, pedigree (2,2,5,1,1)
  Averaged from local datasets. See general comment.
- Zinc II [water, surface water]: 5.99384e-7 kg; lognormal variance with pedigree 0.1307, pedigree (2,2,5,1,1)
  Averaged from local datasets. See general comment.

## Review by Hans-Jörg Althaus 2007-11-07
passed

## Review by Bo Weidema 2012-01-19
In general, it is difficult or impossible to check the validity of the exchanges due to the limited documentation of each value, relying on an external model. However, since the dataset is an improvement compared to the previously existing dataset in the ecoinvent database, it is accepted. It is recommended to improve the transparency in the future, by integrating the model into the dataset and report the emissions from fertilisers separate from those of the plant production.
