# fibreboard production, soft, latex bonded

Dataset: EcoSpold 2, unit process
Geography: CH
Time period: 2008-01-01 to 2023-12-31
Technology level: current
Classification: ISIC rev.4 ecoinvent: 1621:Manufacture of veneer sheets and wood-based panels
Tags: ConvertedDataset; Swiss brush-up completed
Scenario: Business-as-Usual
System model: Allocation, cut-off by classification
Share of production covered: 1 %
Generated by: Frank Werner
Published in: Hischier, R. 2009
Database: ecoinvent
isCopyrightProtected: true
accessRestrictedTo: 1

## General comment
240 kg/m3
This dataset has been revised. The input 'heat, district or industrial, other than natural gas' includes 5.33E2 MJ from light fuel oil. This is used as a proxy for heat from animal fat. The old flows related to light fuel oil and carbon corrections have been deleted.
[This dataset was already contained in the ecoinvent database version 2. It was not individually updated during the transfer to ecoinvent version 3. Life Cycle Impact Assessment results may still have changed, as they are affected by changes in the supply chain, i.e. in other datasets. This dataset was generated following the ecoinvent quality guidelines for version 2. It may have been subject to central changes described in the ecoinvent version 3 change report (http://www.ecoinvent.org/database/ecoinvent-version-3/reports-of-changes/), and the results of the central updates were reviewed extensively. The changes added e.g. consistent water flows and other information throughout the database. The documentation of this dataset can be found in the ecoinvent reports of version 2, which are still available via the ecoinvent website. The change report linked above covers all central changes that were made during the conversion process.]

## Included activities end
includes all inputs to the production processes, transport, wastes and emissions to air and water; does not include any packaging material; 100% allocation as a default

## Geography
representative for Swiss production and Swiss consumption

## Technology
wet process, medium enterprise technology (2008)

## Parameters
- fraction, cooling water, cooling pond system, to air: 0.032 dimensionless; name fraction_CW_CP_to_air; lognormal variance with pedigree 0.0413, pedigree (2,3,1,3,1)
  Calculated based on literature value (Scown, C.D., 2011, Water Footprint of U.S. Transportation Fuels and supplying information of the article) (Vionnet, S., Quantis Water Database - Technical Report, 2012).
- fraction, cooling water, once-through system, to air: 0.004 dimensionless; name fraction_CW_OT_to_air; lognormal variance with pedigree 0.0413, pedigree (2,3,1,3,1)
  (same comment as for fraction, cooling water, cooling pond system, to air)
- fraction, cooling water, recirculating system, to air: 0.771 dimensionless; name fraction_CW_R_to_air; lognormal variance with pedigree 0.0413, pedigree (2,3,1,3,1)
  (same comment as for fraction, cooling water, cooling pond system, to air)
- fraction, cooling water, to air: 0.3875 dimensionless; name fraction_CW_to_air; = (0.5*fraction_CW_OT_to_air)+(0.5*fraction_CW_R_to_air); lognormal variance with pedigree 0.092025, pedigree (4,4,3,2,4)
  Calculated value based on literature value (see comments of the other parametres present in this dataset) and expert opinion. In the case when no industry/literature data are available about the type of cooling or directly fraction, cooling water, to air specific for the process a default assumption is applied. It is assumed that the once-through cooling system is used in 50% of all cases and recirculating system is used in another 50% of all cases.
- fraction, process water, to air: 0.43 dimensionless; name fraction_PW_to_air; lognormal variance with pedigree 0.092025, pedigree (4,4,3,2,4)
  Literature value (Statistics Canada, 2007 & Shaffer, K.H., 2008, Consumptive water use in the Great Lakes Basin, USGS) (Vionnet, S., Quantis Water Database - Technical Report, 2012).
- fraction, tap water, to air: 0.43 dimensionless; name fraction_TW_to_air; = fraction_PW_to_air; lognormal variance with pedigree 0.092025, pedigree (4,4,3,2,4)
  Calculated value. See comment in the other parametres present in this dataset. Tap water is considered to be always used as process water, thus process water fractions to air are applied to all tap water input flows to calculate the amount of water consumed in the processes.
- input wood fuel: 211.206 MJ; name wood_fuel; = 0.0655*169*(20.4-1.32)
  input of wood fuel used in production, i.e. internal wood residues from processing wood inputs; expressed in MJ of absolutely dry mass (lower heating value at humidity u=0%). Converted from bulked chips volume x bulk density x (upper heating value for softwood - 1.32 MJ/MJ)

## Reference product
- fibreboard, soft, latex bonded: 1 m3; By-product classification allocatable product; CPC 31449: Other fibreboard; HS2017 441194: Fibreboard (other than MDF) of a density not exceeding 0.5g/cm3, of wood or other ligneous materials, bonde[...]
  production volume 66600 m3; name RP_PV
    FaoStat 2011; PV in m3 assuming 20% of total production. It is considered that in Switzerland, the production of fibreboard, soft happens very specifically in wet processes only (product category Other fibreboard ; Switzerland; production quantity; 2011)
  property carbon content, fossil 0.0370448
    C content calculated as the addition of the C contents in the final product components: 10.872 kg latex, paraffin and vinyl acetate
  property carbon content, non-fossil 0.470055
    The fibreboard is composed of wood and additives. The weight of the wood is assumed to be the DM kg minus 10.872 kg additives. C content of wood is 0.494 kgC/kg dry wood (ecoinvent v2.2 report 9)
  property heating value, net 3407.86 MJ
    LHV is calculated based on the Carbon content of the product. More details can be found on the respective documentation.The property is based on a value of 14.2MJ/kg
  property price 148 EUR2005
    Calculated by 2.O for fibreboard, soft - Export prices for the World+ according to: http://faostat.fao.org/site/626/DesktopDefault.aspx?PageID=626#ancor downloaded 28 April 2009; calculated as export value divided by export volume.
  properties: carbon allocation 113.742 kg, carbon content 0.5071, dry mass 224.299 kg, water content 0.07, water in wet mass 15.7009 kg, wet mass 240 kg

## Inputs from technosphere
- aluminium sulfate, powder: 0.2856 kg
  properties: UVEK_link_1 158, UVEK_link_8 4416, UVEK_relative_amount_1 1, UVEK_relative_amount_8 2.15336, dry mass 1 kg, wet mass 1 kg
  note on UVEK_link_1: to be used only in special submissions in coordination with ecoinvent and the Swiss FOEN
  note on UVEK_link_8: This link has been introduced to model transport specifically for the SAM model; to be used only in special submissions in coordination with ecoinvent and the Swiss FOEN.
  note on UVEK_relative_amount_8: Scaling factor = amount of transport in corresponding KBOB dataset (excluding the transport of wood, assumed to be 95%)/amount of this input from technosphere. Source for transport distance: Werner F. 2009: Ökobilanzinventare für Weichfaserplatten der Firma Pavatex SA. Werner Environment & DevelopmentTo be used only in special submissions in coordination with ecoinvent and the Swiss FOEN
- electricity, medium voltage: 130 kWh
  properties: UVEK_link_1 1770, UVEK_relative_amount_1 1
- furnace, wood chips, with silo, 1000kW: 5.90029e-6 unit; = 2.9333E-08*wood_fuel/1.05; lognormal variance with pedigree 0.59, pedigree (1,1,5,1,1)
  Infrastructure factor from DS 'Heat, district or industrial, other than natural gas {CH}| heat production, wood chips from industry, at furnace 1000kW | Cut-off, U', multiplied by the input of wood fuel (direct wood fuel plus production residues); correction for assumed efficiency as original value refers to heat output
  properties: UVEK_link_1 999999, UVEK_relative_amount_1 1
- heat, district or industrial, natural gas: 316.8 MJ
  properties: UVEK_link_1 2583, UVEK_relative_amount_1 1, heating value, net 1 MJ
- heat, district or industrial, other than natural gas: 272.16 MJ
  heat production with heavy fuel oil
  properties: UVEK_link_1 2546, UVEK_relative_amount_1 1, heating value, net 1 MJ
- inert waste, for final disposal: -0.155 kg; name inert_waste; lognormal variance with pedigree 0.0256, pedigree (2,1,1,1,1)
  production volume; = inert_waste*RP_PV
    Calculated from the production volume of fibreboard, soft, latex bonded, 7% water on dry mass basis in proportion to the respective output amounts.
  properties: UVEK_link_1 969, UVEK_relative_amount_1 -1, dry mass 0.995 kg, water content 0.00502513, wet mass 1 kg
- latex: 5.4 kg
  properties: UVEK_link_1 2771, UVEK_relative_amount_1 1, carbon content, fossil 0.872983, dry mass 1 kg, heating value, net 26.45 MJ, wet mass 1 kg
  note on carbon content, fossil: The Styrene-butadiene dispersion is based on styrene and 1,3-butadiene plus co-monomers like i.e. ac-rylonitrile or (meth-)acrylic acid (ecoinvent v2.2 report 11_III). Following specifications in US Patent 3,875,101 (1971), the dispersion was considered as: 52.5% 1.3-butadiene (0.8571 kg C/kg dry mass); 43% styrene (0.9231 kg C/kg dry mass); 2% acrylic acid (0.5 kg C/kg dry mass); 2.5% acrolein (C3H4O, MW=56; 0.6429 kg C/kg dry mass)
- municipal solid waste: -2.29 kg; name MSW; lognormal variance with pedigree 0.0256, pedigree (2,1,1,1,1)
  production volume; = MSW*RP_PV
    (same comment as for inert waste, for final disposal)
  properties: UVEK_link_1 1004, UVEK_relative_amount_1 -1, carbon content, fossil 0.171549, carbon content, non-fossil 0.261655, dry mass 0.771 kg, heating value, net 11.74 MJ, water content 0.297017, wet mass 1 kg
  note on carbon content, fossil: MSW composition in tab 4.1, ecoinvent v2.2 report 13_I. C content referred to 1 kg DM
  note on heating value, net: Value taken from the general comment of the treatment dataset.
- paraffin: 1.872 kg
  properties: UVEK_link_1 3381, UVEK_relative_amount_1 1, carbon content, fossil 0.847059, dry mass 1 kg, heating value, net 41.5 MJ, wet mass 1 kg
  note on carbon content, fossil: An average composition of C12H26 (molecular weight of 170 g/mol) was assumed for n-parafins, after ecoinvent v2.2 report 8, part II, pg 398
  note on heating value, net: Indicative value. Reference: Fuels - Higher and Lower Calorific Values, available at: https://www.engineeringtoolbox.com/fuels-higher-calorific-values-d_169.html
- pulpwood, softwood, measured as solid wood under bark: 0.0021578 m3
  property basic wood density 387.2; name pulpwood_basic_wood_d
  property heating value, gross 0 MJ; name pulpwood_Gross_Heat_Value
  properties: carbon content, non-fossil 0.494, dry mass 450 kg, heating value, net 4483.78 MJ, water content 1.4, wet mass 1080 kg
  note on carbon content, non-fossil: C content of dry mass is 0.494 kgC/kg dry wood (ecoinvent v2.2 report 9)
  note on heating value, gross: gross (upper) heating (calorific) value; referring to 1 m3 solid wood as the reference flow, excluding bark
  note on heating value, net: Value based on "softwood forestry, mixed species, sustainable forest management"The property is based on a value of 11.58MJ/kg
- raw sewage sludge: -4.62 kg; name sewage_sludge; lognormal variance with pedigree 0.0256, pedigree (2,1,1,1,1)
  production volume; = sewage_sludge*RP_PV
    (same comment as for inert waste, for final disposal)
  properties: UVEK_link_1 1059, UVEK_relative_amount_1 -1, carbon content, non-fossil 0.4096, dry mass 0.05 kg, heating value, net 3.2 MJ, water content 19, wet mass 1 kg
- slab and siding, softwood, wet, measured as dry mass: 21.4002 kg
  properties: carbon content, non-fossil 0.494, dry mass 1 kg, heating value, net 7.79 MJ, water content 0.7, wet mass 1.7 kg
- tap water: 640 kg; name tap_water_input
  properties: UVEK_link_1 4284, UVEK_relative_amount_1 1, carbon content, fossil 0.00178991, dry mass 0.000337476 kg, water content 2962.17, wet mass 1 kg
  note on carbon content, fossil: Bicarbonate content is 2.93 mol/m3. CO2 content is 0.1 mol/m3 (ecoinvent v2.2 report 8, Tab 93.1).
- vinyl acetate: 3.6 kg
  properties: UVEK_link_1 4822, UVEK_relative_amount_1 1, carbon content, fossil 0.55814, dry mass 1 kg, heating value, net 25.35 MJ, wet mass 1 kg
  note on carbon content, fossil: Vinyl acetate (CH3CO2CH=CH2) (ecoinvent v2.2 report 11_II), C4H6O2. MW=86 g/mol
- wastewater from soft fibreboard production: -0.411 m3; name wastewater_output; lognormal variance with pedigree 0.0272, pedigree (1,4,2,1,1)
  production volume; = wastewater_output*RP_PV
    (same comment as for inert waste, for final disposal)
  properties: UVEK_link_1 4596, UVEK_relative_amount_1 -1, carbon content, non-fossil 0.999914, dry mass 43.2938 kg, water content 22.098, wet mass 1000 kg
  note on carbon content, non-fossil: COD= 100 kg/m3 (Tab A.17, ecoinvent v2.2 report 13_I). COD was converted to TOC, using conversion factors in Tab 4.10 (ecoinvent v2.2 report 13_IV). TOC was considered as Total Carbon.
- wood ash mixture, pure: -0.134099 kg; name w_wood_ash; = 0.000666666666666667*wood_fuel/1.05; lognormal variance with pedigree 0.0256, pedigree (2,1,1,1,1)
  Emission factor from DS on heat generation from industrial residual wood mulitplied by the input of wood fuel (direct wood fuel plus production residues), scaled to convert wood input to resulting heat.
  production volume; = w_wood_ash*RP_PV
    Calculated from production volume of reference product using the relative outputs.
  properties: UVEK_link_1 1128, UVEK_link_2 1127, UVEK_link_3 1129, UVEK_relative_amount_3 -1, carbon content, non-fossil 0.012, dry mass 1 kg, wet mass 1 kg
- wood chips, dry, measured as dry mass: 242 kg
  property carbon content, non-fossil 0.494; name C_content_non_fossil
  property dry mass 1 kg; name DM
  property water content 0.4; name water_content
  property water in wet mass 0.4 kg; name WWM
  property wet mass 1.4 kg; name WM
  properties: heating value, net 9.99 MJ
- wooden board factory, organic bonded boards: 6.6667e-9 unit; lognormal variance with pedigree 0.59, pedigree (1,1,5,1,1)
  Linking to specific geographical region where infrastructure is located

## Inputs from nature
- Water, cooling, unspecified natural origin [natural resource, in water]: 0.72 m3; name water_cooling_UNO_input

## Emissions to nature
- Acetaldehyde [air, unspecified]: 1.63601e-5 kg; = 8.13333333333333E-08*wood_fuel/1.05; lognormal variance with pedigree 0.2412, pedigree (2,3,5,1,1)
  Emission factor from DS 'Heat, district or industrial, other than natural gas {CH}| heat production, wood chips from industry, at furnace 1000kW | Cut-off, U' on heat generation from industrial residual wood per MJ, multiplied by the input of wood fuel (direct wood fuel plus production residues ) scaled to reflect wood input per generated heat.
- Ammonia [air, unspecified]: 0.000463983 kg; = 2.30666666666667E-06*wood_fuel/1.05; lognormal variance with pedigree 0.2412, pedigree (2,3,5,1,1)
  (same comment as for Acetaldehyde)
- Arsenic ion [air, unspecified]: 2.68198e-7 kg; = 1.33333333333333E-09*wood_fuel/1.05; lognormal variance with pedigree 0.2412, pedigree (2,3,5,1,1)
  (same comment as for Acetaldehyde)
- Benzene [air, unspecified]: 0.00024406 kg; = 1.21333333333333E-06*wood_fuel/1.05; lognormal variance with pedigree 0.2412, pedigree (2,3,5,1,1)
  (same comment as for Acetaldehyde)
- Benzo(a)pyrene [air, unspecified]: 1.34099e-7 kg; = 6.66666666666667E-10*wood_fuel/1.05; lognormal variance with pedigree 0.5912, pedigree (2,3,5,1,1)
  (same comment as for Acetaldehyde)
- Bromine [air, unspecified]: 1.60919e-5 kg; = 0.00000008*wood_fuel/1.05; lognormal variance with pedigree 0.8412, pedigree (2,3,5,1,1)
  (same comment as for Acetaldehyde)
- Cadmium II [air, unspecified]: 1.87739e-7 kg; = 9.33333333333334E-10*wood_fuel/1.05; lognormal variance with pedigree 0.8412, pedigree (2,3,5,1,1)
  (same comment as for Acetaldehyde)
- Calcium II [air, unspecified]: 0.00156896 kg; = 0.0000078*wood_fuel/1.05; lognormal variance with pedigree 0.2412, pedigree (2,3,5,1,1)
  (same comment as for Acetaldehyde)
- Carbon dioxide, non-fossil [air, unspecified]: 28.6972 kg; = 0.142666666666666*wood_fuel/1.05; lognormal variance with pedigree 0.0662, pedigree (2,3,5,1,1)
  (same comment as for Acetaldehyde)
- Carbon monoxide, non-fossil [air, unspecified]: 0.0804595 kg; = 0.0004*wood_fuel/1.05; lognormal variance with pedigree 0.2412, pedigree (2,3,5,1,1)
  (same comment as for Acetaldehyde)
- Chlorine [air, unspecified]: 4.82757e-5 kg; = 0.00000024*wood_fuel/1.05; lognormal variance with pedigree 0.2412, pedigree (2,3,5,1,1)
  (same comment as for Acetaldehyde)
- Chromium III [air, unspecified]: 1.06206e-6 kg; = 5.28000000000001E-09*wood_fuel/1.05; lognormal variance with pedigree 0.8412, pedigree (2,3,5,1,1)
  (same comment as for Acetaldehyde)
- Chromium VI [air, unspecified]: 1.07279e-8 kg; = 5.33333333333334E-11*wood_fuel/1.05; lognormal variance with pedigree 0.8412, pedigree (2,3,5,1,1)
  (same comment as for Acetaldehyde)
- Copper ion [air, unspecified]: 5.90036e-6 kg; = 2.93333333333334E-08*wood_fuel/1.05; lognormal variance with pedigree 0.2412, pedigree (2,3,5,1,1)
  (same comment as for Acetaldehyde)
- Dinitrogen monoxide [air, unspecified]: 0.000616856 kg; = 3.06666666666667E-06*wood_fuel/1.05; lognormal variance with pedigree 0.2412, pedigree (2,3,5,1,1)
  (same comment as for Acetaldehyde)
- Dioxins, measured as 2,3,7,8-tetrachlorodibenzo-p-dioxin [air, unspecified]: 8.31414e-12 kg; = 4.13333333333333E-14*wood_fuel/1.05; lognormal variance with pedigree 0.5912, pedigree (2,3,5,1,1)
  (same comment as for Acetaldehyde)
- Ethyl benzene [air, unspecified]: 8.04595e-6 kg; = 0.00000004*wood_fuel/1.05; lognormal variance with pedigree 0.2412, pedigree (2,3,5,1,1)
  (same comment as for Acetaldehyde)
- Fluorine [air, unspecified]: 1.34099e-5 kg; = 6.66666666666667E-08*wood_fuel/1.05; lognormal variance with pedigree 0.2412, pedigree (2,3,5,1,1)
  (same comment as for Acetaldehyde)
- Formaldehyde [air, unspecified]: 3.48658e-5 kg; = 1.73333333333334E-07*wood_fuel/1.05; lognormal variance with pedigree 0.2412, pedigree (2,3,5,1,1)
  (same comment as for Acetaldehyde)
- Hexachlorobenzene [air, unspecified]: 1.93103e-12 kg; = 9.60000000000001E-15*wood_fuel/1.05; lognormal variance with pedigree 0.2412, pedigree (2,3,5,1,1)
  (same comment as for Acetaldehyde)
- Hydrocarbons, aliphatic, alkanes, unspecified [air, unspecified]: 0.00024406 kg; = 1.21333333333333E-06*wood_fuel/1.05; lognormal variance with pedigree 0.2412, pedigree (2,3,5,1,1)
  (same comment as for Acetaldehyde)
- Hydrocarbons, aliphatic, unsaturated [air, unspecified]: 0.000831414 kg; = 4.13333333333333E-06*wood_fuel/1.05; lognormal variance with pedigree 0.2412, pedigree (2,3,5,1,1)
  (same comment as for Acetaldehyde)
- Lead II [air, unspecified]: 6.70495e-6 kg; = 3.33333333333333E-08*wood_fuel/1.05; lognormal variance with pedigree 0.8412, pedigree (2,3,5,1,1)
  (same comment as for Acetaldehyde)
- Magnesium [air, unspecified]: 9.65513e-5 kg; name magnesium; = 0.00000048*wood_fuel/1.05; lognormal variance with pedigree 0.2412, pedigree (2,3,5,1,1)
  (same comment as for Acetaldehyde)
- Manganese II [air, unspecified]: 4.55937e-5 kg; name manganese; = 2.26666666666667E-07*wood_fuel/1.05; lognormal variance with pedigree 0.2412, pedigree (2,3,5,1,1)
  (same comment as for Acetaldehyde)
- Mercury II [air, unspecified]: 8.04595e-8 kg; name mercury; = 0.0000000004*wood_fuel/1.05; lognormal variance with pedigree 0.8412, pedigree (2,3,5,1,1)
  (same comment as for Acetaldehyde)
- Methane, non-fossil [air, unspecified]: 0.000804595 kg; = 0.000004*wood_fuel/1.05; lognormal variance with pedigree 0.2412, pedigree (2,3,5,1,1)
  (same comment as for Acetaldehyde)
- NMVOC, non-methane volatile organic compounds [air, unspecified]: 0.0103274 kg; name nmvoc; = 9.33333333333334E-06*wood_fuel/1.05+0.00845; lognormal variance with pedigree 0.2412, pedigree (2,3,5,1,1)
  Emission factor from DS 'Heat, district or industrial, other than natural gas {CH}| heat production, wood chips from industry, at furnace 1000kW | Cut-off, U' on heat generation from industrial residual wood per MJ, multiplied by the input of wood fuel (direct wood fuel plus production residues ) scaled to reflect wood input per generated heat plus estimated emissions from wood and glue drying processes (company specific data).
- Nickel II [air, unspecified]: 1.60919e-6 kg; name nickel; = 0.000000008*wood_fuel/1.05; lognormal variance with pedigree 0.8412, pedigree (2,3,5,1,1)
  (same comment as for Acetaldehyde)
- Nitrogen oxides [air, unspecified]: 0.0603446 kg; = 0.0003*wood_fuel/1.05; lognormal variance with pedigree 0.2412, pedigree (2,3,5,1,1)
  (same comment as for Acetaldehyde)
- PAH, polycyclic aromatic hydrocarbons [air, unspecified]: 2.977e-6 kg; name pah; = 0.0000000148*wood_fuel/1.05; lognormal variance with pedigree 0.5912, pedigree (2,3,5,1,1)
  (same comment as for Acetaldehyde)
- Particulate Matter, < 2.5 um [air, unspecified]: 0.0120689 kg; = 0.0000600000000000001*wood_fuel/1.05; lognormal variance with pedigree 0.5912, pedigree (2,3,5,1,1)
  (same comment as for Acetaldehyde)
- Particulate Matter, > 10 um [air, urban air close to ground]: 0.00929 kg; lognormal variance with pedigree 0.24, pedigree (1,1,5,1,1)
  dust emissions
- Particulate Matter, > 2.5 um and < 10um [air, unspecified]: 0.000670495 kg; = 3.33333333333334E-06*wood_fuel/1.05
  (same comment as for Acetaldehyde)
- Pentachlorophenol [air, unspecified]: 2.17241e-9 kg; = 0.0000000000108*wood_fuel/1.05; lognormal variance with pedigree 0.3912, pedigree (2,3,5,1,1)
  (same comment as for Acetaldehyde)
- Phosphorus [air, unspecified]: 8.04595e-5 kg; = 0.0000004*wood_fuel/1.05; lognormal variance with pedigree 0.2412, pedigree (2,3,5,1,1)
  (same comment as for Acetaldehyde)
- Potassium I [air, unspecified]: 0.00627584 kg; = 0.0000312*wood_fuel/1.05; lognormal variance with pedigree 0.2412, pedigree (2,3,5,1,1)
  (same comment as for Acetaldehyde)
- Sodium I [air, unspecified]: 0.000348658 kg; = 1.73333333333334E-06*wood_fuel/1.05; lognormal variance with pedigree 0.2412, pedigree (2,3,5,1,1)
  (same comment as for Acetaldehyde)
- Sulfur dioxide [air, unspecified]: 0.000670495 kg; = 3.33333333333334E-06*wood_fuel/1.05; lognormal variance with pedigree 0.0662, pedigree (2,3,5,1,1)
  (same comment as for Acetaldehyde)
- Toluene [air, unspecified]: 8.04595e-5 kg; = 0.0000004*wood_fuel/1.05; lognormal variance with pedigree 0.3912, pedigree (2,3,5,1,1)
  (same comment as for Acetaldehyde)
- Water [air, unspecified]: 0.5542 m3; name water_to_air_unspecified; = (tap_water_input/1000*fraction_TW_to_air)+(water_cooling_UNO_input*fraction_CW_to_air); lognormal variance with pedigree 0.2407, pedigree (2,2,5,1,1)
  Calculated value based on literature values and expert opinion. See comments in the parametres' comment field.
  property fraction, origin: fresh water 0.496572; name fraction_origin_fresh_water
  property fraction, origin: salt water 0; name fraction_origin_salt_water
  property fraction, origin: unspecified 0.503428; name fraction_origin_unspecified
- Zinc II [air, unspecified]: 8.04595e-5 kg; = 0.0000004*wood_fuel/1.05; lognormal variance with pedigree 0.8412, pedigree (2,3,5,1,1)
  (same comment as for Acetaldehyde)
- m-Xylene [air, unspecified]: 3.21838e-5 kg; name mxylene; = 0.00000016*wood_fuel/1.05; lognormal variance with pedigree 0.3912, pedigree (2,3,5,1,1)
  (same comment as for Acetaldehyde)
- Water [water, unspecified]: 0.3948 m3; name water_to_water_unspecified; = (tap_water_input/1000)*(1-fraction_TW_to_air)+water_cooling_UNO_input*(1-fraction_CW_to_air)-wastewater_output; lognormal variance with pedigree 0.2407, pedigree (2,2,5,1,1)
  (same comment as for Water)
  property fraction, origin: fresh water 0.452718; name fraction_origin_fresh_water_Ww
  property fraction, origin: salt water 0; name fraction_origin_salt_water_Ww
  property fraction, origin: unspecified 0.547282; name fraction_origin_unspecified_Ww

## Sampling procedure
plant data

## Extrapolations
see Geography and Technology
