# limestone, crushed, washed to generic market for supplementary cementitious materials

Dataset: EcoSpold 2, unit process
Geography: RoW
Time period: 2019-01-01 to 2023-12-31
Technology level: current
Classification: ISIC rev.4 ecoinvent: 2394:Manufacture of cement, lime and plaster
Scenario: Business-as-Usual
System model: Allocation, cut-off by classification
Generated by: Avraam Symeonidis
Database: ecoinvent
isCopyrightProtected: true
accessRestrictedTo: 1

## General comment
This activity is a renaming activity, linking limestone, crushed, washed to the generic market for supplementary cementitious materials (SCM).
Limestone is a mineral widely used as aggregate in concrete. The process of crushing of limestone to produce aggregates generates fines called limestone powder (LP). About 20% of the limestone production is such powder (Sakir et al., 2020). This powder, which cannot be used as aggregate to produce concrete, can serve as partial substitute of cement (Souza et al., 2020). Limestone powder can act as a filler in cement hydration. Replacing part of the Portland cement with limestone increases the effective water to cement ratio, and provides additional surface for precipitation of hydration products, thereby promoting the early age hydration of the Portland cement (Torkaman et al., 2014).
Sources:
Sakir, S., Raman, S. N., Safiuddin, M., Kaish, A. B. M., & Mutalib, A. A. (2020). Utilization of By-Products and Wastes as Supplementary Cementitious Materials in Structural Mortar for Sustainable Construction. Sustainability, 12(9), 3888.
Souza, A. T., Barbosa, T. F., Riccio, L. A., & dos Santos, W. J. (2020). Effect of limestone powder substitution on mechanical properties and durability of slender precast components of structural mortar. Journal of Materials Research and Technology, 9(1), 847-856
Torkaman, J., Ashori, A., & Momtazi, A. S. (2014). Using wood fiber waste, rice husk ash, and limestone powder waste as cement replacement materials for lightweight concrete blocks. Construction and building materials, 50, 432-436.

## Included activities start
The activity starts with the input of limestone, crushed, washed.

## Included activities end
With the provision of a generic kg of supplementary cementitious materials.

## Reference product
- supplementary cementitious materials: 1 kg; name SCM; By-product classification allocatable product; CPC 15200: Gypsum; anhydrite; limestone flux; limestone and other calcareous stone, of a kind used for the manufacture of[…]; HS2017 681099: Cement, concrete or artificial stone; articles (other than prefabricated structural components for building[...]
  production volume 2.82564e10 kg; = 284962347266.881*0.1
    Assumed 10% of the global production volume of limestone, crushed, washed.
  property dry mass 1 kg; name SCM_DM
  property price 0.075 EUR2005
    Price set equal to the price of clay as considered as the product that can answer in increase in demand of supplementary cementitious materials. Calculated value based on data from United Nations Commodity Trade Statistics Database (comtrade.un.org). UN comtrade category: 250810 Bentonite. Year 2005. Using exchange rate of 1EURO = 1.209 USD. Average of price of import into 5 main markets (EU, US, JP, IN and CN).
  property water content 0; name SCM_water_content
  property water in wet mass 0 kg; name SCM_WWM
  property wet mass 1 kg; name SCM_WM
  properties: carbon allocation 0 kg, carbon content 0

## Inputs from technosphere
- limestone, crushed, washed: 1 kg
  This activity is a renaming activity, linking limestone, crushed, washed to the generic market for supplementary cementitious materials (SCM).
  properties: carbon content, fossil 0.117257, dry mass 0.998 kg, water content 0.00200401, wet mass 1 kg
  note on carbon content, fossil: Table 3.1, ecoinvent v2.2 report 7, part VII, pg 3. MW CaCO3=100, MW MgCO3=84. C content of limestone is 0.117257 kg/kg DM
