# treatment of waste polyurethane, inert material landfill

Dataset: EcoSpold 2, unit process
Geography: RoW
Time period: 1995-01-01 to 2023-12-31
Technology level: current
Classification: ISIC rev.4 ecoinvent: 3821:Treatment and disposal of non-hazardous waste
Scenario: Business-as-Usual
System model: Allocation, cut-off by classification
Generated by: Gabor Doka (obsolete)
Published in: Doka G. 2007
Database: ecoinvent
isCopyrightProtected: true
accessRestrictedTo: 1

## General comment
This dataset represents the activity of waste disposal of 'waste polyurethane' in an inert material landfill.

## Included activities start
The activity starts with the waste being available at the gate of the treatment facility. Collection and transportation of the waste to the treatment plant is not included.

## Included activities end
The activity ends with the waste being treated and no direct emissions from inert material landfill (leachate) are inventoried, as they are considered negligible. The dataset contains only exchanges to process-specific burdens (energy, land use) and infrastructure.

## Geography
Modelling parameters affecting the treatment technology are not specific to this geography.

## Technology
Inert material landfill with leachate collection system and renaturation after closure. 50% of the sites is equipped with a base seal.

## Reference product
- waste polyurethane: -1 kg; name waste_PE; By-product classification Waste; CPC 39270: Waste, parings and scrap of plastics; HS2017 391590: Plastics n.e.c. in heading no. 3915; waste, parings and scrap; CAS 9009-54-5
  production volume 2.72238e9 kg; name waste_PE_PV; = (2E6*1000)*(1/0.33059)*0.9*0.5
    Calculated based on literature value and estimates. The amount of polyurethane produced in Europe annually is 2 million tonnes. This value is scaled to global production using GDP. Gross domestic product (GDP) at current prices is GDP at prices of the current reporting period. Also known as nominal GDP (United Nations, http://data.un.org/Glossary.aspx?q=GDP+%28current+US%24%29, accessed 20130726 and 20130312). It is estimated, that 90% of the waste polyurethane end up at landfill (http://unstats.un.org/unsd/environment/wastetreatment.htm), 50% at inert material landfill and 50% at sanitary landfill.
  property carbon content, fossil 0.641283
    C content was calculated for 1 kg DM, using data in Tab A.2, ecoinvent v2.2 report 13_I.
  property heating value, net 30.67 MJ
    Value taken from the general comment of the treatment dataset.
  property price 0 EUR2005
    Waste products are assigned a price of zero as they are assumed to require further treatment.
  properties: carbon allocation 0.64 kg, carbon content 0.641283, carbon content, non-fossil 0, dry mass 0.998 kg, water content 0.00200401, water in wet mass 0.002 kg, wet mass 1 kg

## Inputs from technosphere
- inert material landfill: 1.48e-9 unit; lognormal variance with pedigree 0.042, pedigree (1,1,5,5,1)
  landfill infrastructure per kg waste, uncerteinty heeded in module.
- process-specific burdens, inert material landfill: 1 kg; lognormal variance with pedigree 0.042, pedigree (1,1,5,5,1)
  process-specific burdens per kg waste, uncerteinty heeded in module.

## Extrapolations
This dataset has been copied from an original dataset covering the geography CH. The uncertainty has been adjusted accordingly.

## Review by Niels Jungbluth 2003-05-28
Passed.
