# washing, drying and finishing laundry

Dataset: EcoSpold 2, unit process
Geography: GLO
Time period: 2013-01-01 to 2023-12-31
Technology level: current
Classification: ISIC rev.4 ecoinvent: 9601:Washing and (dry-) cleaning of textile and fur products
Tags: sevice
Scenario: Business-as-Usual
System model: Allocation, cut-off by classification
Generated by: Amir Safaei
Published in: Vítězslav Máša 2013
Database: ecoinvent
isCopyrightProtected: true
accessRestrictedTo: 1

## General comment
This dataset represents the service of washing, drying, and finishing (including ironing) of laundry in low capacity professional laundries—capacity
range of 300–500 kg of laundry per shift (8 h).
The capacity of such laundry services is typically between 8 to 12 kg per batch. Flat linen is ironed employing cylinder-heated ironers, garments were assumed to be ironed using ironing presses. Small-scale laundries iron linen manually.
The dataset includes the infrastructure (washing machine and dryer, building infrastructure) required for the operation of the laundry service, and includes all the inputs (water, electrical and thermal energy, cleaning detergent) required to perform the service of laundry. The dataset is modelled as a service dataset-the input and output of laundry is excluded from the scope.

## Included activities start
From receving the laundry at the laundry service. The activity models the service of washing, drying and finishing 1 kg of laundry, it therefore includes the energy, water, detergent and infrastructure required per reference product. Because the activity is a service, the input of laundry is not included. 1 kg of this service should be used together with 1 kg of laundry (i.e. an input of linen) to be washed.

## Included activities end
This activity includes the cleaning, drying and ironing of laundry.

## Reference product
- washing, drying and finishing laundry: 1 kg; name RP; By-product classification allocatable product; CPC 97110: Coin-operated laundry services
  production volume 1.5514e8 kg; name RP_PV; = 500000*62056*0.5*0.02*0.5
    Estimated value. The production volume of such a service is virtually impossible to estimate. To attempt estimating it the following formula is used: estimated number of hotels world wide 500000 (van Poll 2012) * average guests per year (62056) * assuming half of hotels outsource laundry services (0.5) * kg of laundry per guest per guest night (0.02kg) * assuming not all laundry is washed everyday (0.5). All assumption but the number of hotels in the world, are based on average data from the tourism operation datasets in ecoinvent.
    Van Poll B. 2012. How many hotels are there in the world? Retrieved from: <http://www.spottedbylocals.com/blog/booking-com-and-the-race-towards-offering-all-hotels/>, accessed 7May2018
  property price 0.0875481 EUR2005
    Calculated based on inputs: The price of the product has been calculated as a sum of the values of the material and energy inputs for this product. This value is therefore a rough estimation. It may underestimate the real price since there are additional expenses when producing any product. These expences can include for example labour costs, treatment of waste materials and profit for the producer. Please consider carefully whether this level of data quality is acceptable for your application.
  properties: carbon allocation 0 kg, carbon content 0

## Inputs from technosphere
- building, hall: 1.6e-5 m2; = 100/(50 * 250 * 500); lognormal variance with pedigree 0.44, pedigree (3,5,4,5,5)
  Considering a 100 square meter laundry service station, an average lifetime of 50 years per building hall, 250 working days per year, and 500 kg of laundry daily capacity, the average contribution of building hall per kg washed and dryed laundry is calculated as 100 (m2) / [50 (years) * 250 (days / year) * 500 (kg/day) ] = 1.60E-05
- electricity, low voltage: 0.15 kWh; lognormal variance with pedigree 0.1406, pedigree (3,5,4,5,5)
  According to "Máša, V., Bobák, P., Kuba, P., & Stehlík, P. (2013). Analysis of energy efficient and environmentally friendly technologies in professional laundry service. Clean Technologies and Environmental Policy, 15(3), 445-457", the average electrical energy (kWh) consumption per kg washed, dryed, and ironed laundry is 0.15 kWh. This includes the total electricty consumption during the different stages of the process.
- heat, district or industrial, natural gas: 3.276 MJ; lognormal variance with pedigree 0.1406, pedigree (3,5,4,5,5)
  According to "Máša el at (2013),, the average heat energy consumption (kWh) per kg of laundry is 0.91 kWh. This is equivalent to 3.276 MJ.
  properties: heating value, net 1 MJ
- non-ionic surfactant: 0.0114286 kg; = 40/1000/3.5; lognormal variance with pedigree 0.1406, pedigree (3,5,4,5,5)
  Estimated average amount of washing agent per wash cyle is 40 grams (based on average supplier data). Considering a load of 3.5 kg per wash cycle according to "Pakula, C., & Stamminger, R. (2010). Electricity and water consumption for laundry washing by washing machine worldwide. Energy Efficiency, 3(4), 365-382., Table 1", the amount of washing agent per kg washed laundry is 40/3.5 = 11.42 g/kg washed Laundry or 0.011 kg/kg washed laundry.
- tap water: 13 kg; name water_consumption_per_kg; lognormal variance with pedigree 0.1406, pedigree (3,5,4,5,5)
  According to "Máša, V., Bobák, P., Kuba, P., & Stehlík, P. (2013). Analysis of energy efficient and environmentally friendly technologies in professional laundry service. Clean Technologies and Environmental Policy, 15(3), 445-457", the average waste water production per kg washed and dryed laundry is 12.5 kg, Considering a loss rate of 4% in the form of steam, the average water consumption per kg of laundry is calculated as 13 kg or 13 L.
  properties: carbon content, fossil 0.00178991, dry mass 0.000337476 kg, water content 2962.17, wet mass 1 kg
  note on carbon content, fossil: Bicarbonate content is 2.93 mol/m3. CO2 content is 0.1 mol/m3 (ecoinvent v2.2 report 8, Tab 93.1).
- washing machine: 8e-7 unit; = 1/(10* 250* 500); lognormal variance with pedigree 0.44, pedigree (3,5,4,5,5)
  Considering an average lifetime of 10 years per washing machine, 250 working days per year, and 500 kg of laundry daily capacity, the average contribution of washing machine per kg washed laundry is calculated as 1/ [10 (years) * 250 (days per year) * 500 (kg/day) ] = 8.00E-07
  properties: lifetime 10 year, lifetime capacity [h] 1995 hour, weight 75 kg
  note on lifetime: Based on the estimate from Yuan et al. 2016. Source: Yuan et al. 2016, 2016, Yuan, Z., Zhang, Y., and Liu, X., Life cycle assessment of horizontal-axis washing machines in China, International Journal of Life Cycle Asse, 21, 15-28, 1 - Article
  note on lifetime capacity [h]: Literature source assumed: "10 years lifespan with 133 washing cycles per year". Based on the estimate from Yuan et al. 2016. Source: Yuan et al. 2016, 2016, Yuan, Z., Zhang, Y., and Liu, X., Life cycle assessment of horizontal-axis washing machines in China, International Journal of Life Cycle Asse, 21, 15-28. A cycle is estimated to last 1.5hours.
- wastewater, average: -6.01864e-5, -0.0100153, -0.00239486, -3.56583e-5 m3 (4 suppliers, which the file names only by identifier); sum of these -0.012506 m3; = water_consumption_per_kg/1000*.962; lognormal variance with pedigree 0.1328, pedigree (3,5,2,5,5)
  The amount of waste water generation was considered to be 96% of the water input, according to Máša et al (2013), with 4% of the water lost as steam during the process.
  production volume; = wastewater*RP_PV/RP
    Calculated from production volume of reference product using the relative outputs.
  properties: carbon content, non-fossil 0.194039, dry mass 0.346837 kg, mass concentration, TOC 0.1091 kg/m3, mass concentration, calcium 0.039453 kg/m3, mass concentration, chlorine 0.030031 kg/m3, mass concentration, hydrogen 0.013365 kg/m3, mass concentration, nitrogen 0.031015 kg/m3, mass concentration, oxygen 0.069824 kg/m3, mass concentration, sodium 0.06456 kg/m3, mass concentration, sulfur 0.015602 kg/m3, water content 2882.2, wet mass 1000 kg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
  note on carbon content, non-fossil: 0.0673 kg TOC/m3 (Tab A.17, ecoinvent v2.2 report 13_I). TOC was considered as Total Carbon.

## Emissions to nature
- Water [air, unspecified]: 0.000494 m3; = water_consumption_per_kg/1000* (1-.962); lognormal variance with pedigree 0.1406, pedigree (3,5,4,5,5)
  considering 4% of water loss to air

## Sampling procedure
Data on average water and enegy consumption, as well as the size of wash load per washing cycle has been taken from Máša, V., Bobák, P., Kuba, P., & Stehlík, P. (2013). Analysis of energy efficient and environmentally friendly technologies in professional laundry service. Clean Technologies and Environmental Policy, 15(3), 445-457.
The composition of waste water was assumed as a generic waste water.
Data on average detergent use was estimated based on average supplier data.
