# concrete roof tile production

Dataset: EcoSpold 2, unit process
Geography: RoW
Time period: 2004-01-01 to 2023-12-31
Technology level: current
Classification: EcoSpold01Categories: construction materials/coverings
Classification: ISIC rev.4 ecoinvent: 2395:Manufacture of articles of concrete, cement and plaster
Tags: ConvertedDataset
Scenario: Business-as-Usual
System model: Allocation, cut-off by classification
Generated by: Daniel Kellenberger (obsolete)
Published in: Kellenberger D. 2007
Database: ecoinvent
isCopyrightProtected: true
accessRestrictedTo: 1

## General comment
No losses and no waste water are taken into account.
[This dataset was already contained in the ecoinvent database version 2. It was not individually updated during the transfer to ecoinvent version 3. Life Cycle Impact Assessment results may still have changed, as they are affected by changes in the supply chain, i.e. in other datasets. This dataset was generated following the ecoinvent quality guidelines for version 2. It may have been subject to central changes described in the ecoinvent version 3 change report (http://www.ecoinvent.org/database/ecoinvent-version-3/reports-of-changes/), and the results of the central updates were reviewed extensively. The changes added e.g. consistent water flows and other information throughout the database. The documentation of this dataset can be found in the ecoinvent reports of version 2, which are still available via the ecoinvent website. The change report linked above covers all central changes that were made during the conversion process.]

## Included activities end
includes the raw material normal concrete which is poured into a mould, air-dried and packed. Some transports and infrastructure are also included.

## Geography
For some exchanges CH-, RER-, and GLO-datasets are used as proxy

## Technology
typical technology for Swiss production

## Parameters
- fraction, process water, to air: 0.15 dimensionless; name fraction_PW_to_air; lognormal variance with pedigree 0.092025, pedigree (4,4,3,2,4)
- fraction, tap water, to air: 0.15 dimensionless; name fraction_TW_to_air; lognormal variance with pedigree 0.092025, pedigree (4,4,3,2,4)

## Reference product
- concrete roof tile: 1 kg; By-product classification allocatable product; CPC 37540: Tiles, flagstones, bricks and similar articles, of cement, concrete or artificial stone; HS2017 681019: Cement, concrete or artificial stone; tiles, flagstones and similar, (excluding building blocks and bricks)[...]
  EcoSpold01Location=CH
  production volume 3.96633 kg
    This is a placeholder value that does not reflect real-world production volumes. This dataset does not currently require a real-world production volume to work in the database framework, and no actual data were collected yet. This has no negative effect on the results of the ecoinvent database.
  property carbon content, fossil 0
    Made from normal concrete. Tab 6.8, ecoinvent v2.2 report 7, part III
  property carbon content, non-fossil 0
    Made from normal concrete. Tab 6.8, ecoinvent v2.2 report 7, part III
  property price 0.34 EUR2005
    Calculated value based on data from United Nations Commodity Trade Statistics Database (comtrade.un.org). UN comtrade category: 681019 Tiles & flagstones of cement, concrete, artificial ston. Year 2005. Using exchange rate of 1EURO = 1.209 USD. Average of price of import into 5 main markets (EU, US, JP, IN and CN).
  properties: carbon allocation 0 kg, carbon content 0, dry mass 1 kg, water content 0, water in wet mass 0 kg, wet mass 1 kg

## Inputs from technosphere
- acrylic dispersion, with water, in 58% solution state: 0.015 kg; lognormal variance with pedigree 0.1006, pedigree (2,5,5,5,1)
  EcoSpold01Location=RER
  properties: carbon content, fossil 0.342442, dry mass 0.59 kg, heating value, net 16.66 MJ, water content 0.70041, wet mass 1 kg
  note on carbon content, fossil: The carbon content was calculated from the carbon content of the inputs.
- cement, Portland: 0.173272, 0.00656609, 0.00875997, 0.00960319, 0.00039761, 0.000362509, 0.000353313, 0.00045064, 0.0002346 kg (9 suppliers, which the file names only by identifier); sum of these 0.2 kg; lognormal variance with pedigree 0.1006, pedigree (2,5,5,5,1)
  EcoSpold01Location=CH
  properties: dry mass 1 kg, wet mass 1 kg
- clay pit infrastructure: 1.6667e-10 unit; lognormal variance with pedigree 0.692, pedigree (1,1,5,5,1)
  EcoSpold01Location=CH
  estimation
- diesel, burned in building machine: 0.021571 MJ; lognormal variance with pedigree 0.072, pedigree (3,5,5,5,1)
  EcoSpold01Location=GLO
  properties: heating value, net 1 MJ
- electricity, medium voltage: 5.58671e-5, 0.00111442, 0.000374443, 1.71084e-5, 3.42423e-6, 7.3526e-7, 7.78168e-5, 0.000115082, 0.0002411 kWh (9 suppliers, which the file names only by identifier); sum of these 0.002 kWh; lognormal variance with pedigree 0.692, pedigree (1,1,5,5,1)
  EcoSpold01Location=CH
  estimation
- iron ore concentrate: 0.0048951 kg; lognormal variance with pedigree 0.1006, pedigree (2,5,5,5,1)
  EcoSpold01Location=GLO
  properties: dry mass 1 kg, wet mass 1 kg
- packing, clay product: 1 kg; lognormal variance with pedigree 0.692, pedigree (1,1,5,5,1)
  EcoSpold01Location=CH
  estimation
- sand: 0.0105931, 0.689352, 5.49942e-5 kg (3 suppliers, which the file names only by identifier); sum of these 0.7 kg; lognormal variance with pedigree 0.1006, pedigree (2,5,5,5,1)
  EcoSpold01Location=CH
  properties: dry mass 1 kg, wet mass 1 kg
- tap water: 0.000224372, 0.000342036, 0.000638222, 0.00171932, 0.00020696, 0.0086248, 0.0986979, 0.0735463 kg (8 suppliers, which the file names only by identifier); sum of these 0.184 kg; source Dansk Teknologisk Institut 1995; lognormal variance with pedigree 0.0546, pedigree (3,3,5,5,1)
  EcoSpold01Location=CH
  Calculated based on literature, (Vionnet, S., Quantis Water Database - Technical Report, 2012).
  properties: carbon content, fossil 0.00178991, dry mass 0.000337476 kg, water content 2962.17, wet mass 1 kg
  note on carbon content, fossil: Bicarbonate content is 2.93 mol/m3. CO2 content is 0.1 mol/m3 (ecoinvent v2.2 report 8, Tab 93.1).

## Emissions to nature
- Water [air, unspecified]: 2.76e-5 m3; name water_to_air_unspecified; lognormal variance with pedigree 0.0827, pedigree (2,2,5,5,1)
  Calculated value based on literature values and expert opinion. See comments in the parametres' comment field.
  property fraction, origin: fresh water 1; name fraction_origin_fresh_water
  property fraction, origin: salt water 0; name fraction_origin_salt_water
  property fraction, origin: unspecified 0; name fraction_origin_unspecified
- Water [water, unspecified]: 0.0001564 m3; name water_to_water_unspecified; lognormal variance with pedigree 0.0827, pedigree (2,2,5,5,1)
  (same comment as for Water)
  property carbon content, fossil 0; name C_content_fossil
  property carbon content, non-fossil 0; name C_content_non_fossil
  property dry mass 0 kg; name DM
  property fraction, origin: fresh water 1; name fraction_origin_fresh_water_Ww
  property fraction, origin: salt water 0; name fraction_origin_salt_water_Ww
  property fraction, origin: unspecified 0; name fraction_origin_unspecified_Ww
  property water in wet mass 1000 kg; name WWM
  property wet mass 1000 kg; name WM

## Sampling procedure
Literature

## Extrapolations
See geography This dataset has been copied from an original dataset covering the geography CH. The uncertainty has been adjusted accordingly.

## Review by Rolf Frischknecht 2007-09-13
passed
