# beverage carton converting

Dataset: EcoSpold 2, unit process
Geography: RoW
Time period: 2009-01-01 to 2023-12-31
Technology level: current
Classification: ISIC rev.4 ecoinvent: 1702:Manufacture of corrugated paper and paperboard and of containers of paper a
Scenario: Business-as-Usual
System model: Allocation, cut-off by classification
Share of production covered: 95 %
Generated by: Frank Wellenreuther
Database: ecoinvent
isCopyrightProtected: true
accessRestrictedTo: 1

## General comment
This dataset represents the production of 1000 square meters of beverage carton from liquid packaging board (LPB), LDPE granulate and aluminium foil. Data are based on the average production process of the main European beverage carton producers.
The dataset is broadly applicable for converting of carton based liquid packaging material, and not specific to any particular beverage package format or family.
The inventory does not list preset inputs of liquid packaging board, polyethylene, aluminium or any other raw materials that can be used in beverage carton packaging material. These data should be specified by the user according to the particular package of interest.

## Included activities start
From the reception of LPB, polyethylene granulate and aluminium foil from the factory gate.

## Included activities end
This activity ends with the packaging of the produced beverage cartons before loading the products on lorries. The dataset includes the steps of cutting, laminating, folding and printing and packaging.The dataset does not include production of machinery/infrastructure.

## Geography
Average data from the three main European converters collected from 20 European sites (situated in Spain, Germany, Hungary, France, Serbia, Ukraine, Sweden, Netherlands, Russia, Italy, UK, Denmark and Finland) weighted according to production volumes. European production can be considered as representative for global geography.

## Technology
Production of beverage cartons from liquid packaging board, polyethylene granulate and aluminiuim foil. Process steps include cutting of LPB and aluminium foil, melting of PE granualte, laminating to compund and printing of compaund.
Average of the used technology across Europe

## Parameters
- fraction, process water, to air: 0.15 dimensionless; name fraction_PW_to_air; lognormal variance with pedigree 0.092025, pedigree (4,4,3,2,4)
  Literature value. In case when no industry/process specific data are available, default evaporation fraction value is used. This value is 15% and is based on literature (Statistics Canada, 2007 & Shaffer, K.H., 2008, Consumptive water use in the Great Lakes Basin, USGS & Shiklomanov, 2003, World Water Resources at the Beginning of the 21st Century) and has been approved by an expert.

## Reference product
- beverage carton converting: 1 m2; By-product classification allocatable product; CPC 32153: Cartons, boxes, cases, record sleeves and other packing containers (except bags) of paper, paperboard, cellulo[…]; HS2017 481910: Paper and paperboard; cartons, boxes and cases, of corrugated paper or paperboard
  reference flow
  production volume 4.57284e6 m2
    Estimation based on data from some of the producing sites
  property carbon content, fossil 0.00365437
    C content was calculated as an addition of C content in the raw materials.
  property carbon content, non-fossil 0.450248
    C content was calculated as an addition of C content in the raw materials.
  property price 0.027266 EUR2005
    Calculated based on inputs: The price of the product has been calculated as a sum of the values of the material and energy inputs for this product. This value is therefore a rough estimation. It may underestimate the real price since there are additional expenses when producing any product. These expences can include for example labour costs, treatment of waste materials and profit for the producer. Please consider carefully whether this level of data quality is acceptable for your application.
  properties: carbon allocation 0.00428937 kg, carbon content 0.453902, dry mass 0.00945 kg, water content 0.0582011, water in wet mass 0.00055 kg, wet mass 0.01 kg

## Inputs from technosphere
- corrugated board box: 0.00310591, 0.000115695, 0.00677839 kg (3 suppliers, which the file names only by identifier); sum of these 0.01 kg; lognormal variance with pedigree 0.0432, pedigree (2,4,5,1,1)
  Measured value
  properties: carbon content, fossil 0.00365437, carbon content, non-fossil 0.450248, dry mass 0.945 kg, heating value, net 12.86 MJ, water content 0.0582011, wet mass 1 kg
  note on carbon content, fossil: C content was calculated as an addition of C content in the raw materials.
- electricity, medium voltage: 0.00286606, 0.0571715, 0.0192095, 0.000877687, 0.000175668, 3.77199e-5, 0.00590385 kWh (7 suppliers, which the file names only by identifier); sum of these 0.086242 kWh
  Measured value
- hazardous waste, for underground deposit: -0.00032 kg
  Measured value
  production volume
    Calculated from production volume of reference product using the relative outputs.
  properties: carbon content, fossil 0.554667, dry mass 1 kg, wet mass 1 kg
  note on carbon content, fossil: Tab A.6, ecoinvent v2.2 report 13_I, average hazardous waste composition was used, and referred to 0% water mass. No waste-specific emission are currently inventoried for underground deposits. Accordingly, no waste composition must be specified. For generic, average waste to underground deposit deposition in a 200 liter steel drum without cement solidification is assumed (ecoinvent v2.2 report 13_I).
- light fuel oil: 2.29704e-7, 2.40684e-5, 1.18369e-6, 2.38898e-6, 1.70708e-7, 1.5853e-7 kg (6 suppliers, which the file names only by identifier); sum of these 2.82e-5 kg
  Measured value
  properties: carbon content, fossil 0.862, dry mass 1 kg, heating value, net 42.6 MJ, wet mass 1 kg
- liquefied petroleum gas: 1.76298e-6, 1.69308e-5, 5.31499e-6, 1.18299e-6, 6.01354e-5, 0.000251673 kg (6 suppliers, which the file names only by identifier); sum of these 0.000337 kg
  Measured value
  properties: carbon content, fossil 0.821863, dry mass 1 kg, heating value, net 45.5 MJ, wet mass 1 kg
  note on heating value, net: Indicative value. Reference: Fuels - Higher and Lower Calorific Values, available at: https://www.engineeringtoolbox.com/fuels-higher-calorific-values-d_169.html
- natural gas, high pressure: 2.23926e-5, 3.77735e-5, 8.23955e-5, 2.75743e-5, 6.444e-6, 3.83534e-5, 3.6803e-5, 9.67743e-5, 3.73613e-5, 5.77874e-5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 m3 (37 suppliers, which the file names only by identifier); sum of these 0.0029 m3
  Measured value
  properties: carbon content, fossil 0.602381, dry mass 0.84 kg, heating value, gross 40 MJ, heating value, net 36 MJ, wet mass 0.84 kg
  note on carbon content, fossil: An average C content of 0.506 kg C/ m3 has been assumed (this average has been calculated using data in Tab 3.5, ecoinvent v2.2 report 6_V
  note on heating value, net: Literature value, Source: Christoph Meili;Niels Jungbluth;Maresa Bussa (2021) Life cycle inventories of crude oil and natural gas extraction. ESU-services Ltd. commissioned by BAFU & VSG, Schaffhausen, Switzerland, http://esu-services.ch/data/public-lci-reports/
- packaging film, low density polyethylene: 0.0006 kg; lognormal variance with pedigree 0.0432, pedigree (2,4,5,1,1)
  Measured value
  properties: carbon content, fossil 0.857143, dry mass 1 kg, heating value, net 42.47 MJ, wet mass 1 kg
  note on carbon content, fossil: Polyethylene is formed out of a huge amount of ethylene monomers (C2H4) (ecoinvent v2.2 report 11_II). MW=28 g/mol
- printing ink, offset, without solvent, in 47.5% solution state: 0.0017 kg; lognormal variance with pedigree 0.0432, pedigree (2,4,5,1,1)
  Measured value
  properties: carbon content, fossil 0.455266, carbon content, non-fossil 0.221773, dry mass 1 kg, heating value, net 20.51 MJ, wet mass 1 kg
- solvent, organic: 0.0015381 kg; lognormal variance with pedigree 0.0432, pedigree (2,4,5,1,1)
  Measured value
  properties: carbon content, fossil 0.63072, dry mass 1 kg, heating value, net 19.11 MJ, wet mass 1 kg

## Inputs from nature
- Water, unspecified natural origin [natural resource, in water]: 0.00011 m3; name water_UNO_input; lognormal variance with pedigree 0.04, pedigree (1,1,5,1,1)
  Measured value
  Measured value
  Uncertainty: Set to a deterministic value until true variance is available.

## Emissions to nature
- Acetaldehyde [air, urban air close to ground]: 1.32e-10 kg; lognormal variance with pedigree 0.08, pedigree (1,1,5,1,1)
  calculated value
- Acetic acid [air, urban air close to ground]: 1.97e-8 kg; lognormal variance with pedigree 0.08, pedigree (1,1,5,1,1)
  calculated value
- Ammonia [air, urban air close to ground]: 1.8e-10 kg; lognormal variance with pedigree 0.08, pedigree (1,1,5,1,1)
  calculated value
- Benzene [air, urban air close to ground]: 5.27e-8 kg; lognormal variance with pedigree 0.08, pedigree (1,1,5,1,1)
  calculated value
- Benzo(a)pyrene [air, urban air close to ground]: 1.35e-12 kg; lognormal variance with pedigree 0.08, pedigree (1,1,5,1,1)
  calculated value
- Butane [air, urban air close to ground]: 9.25e-8 kg; lognormal variance with pedigree 0.08, pedigree (1,1,5,1,1)
  calculated value
- Carbon dioxide, fossil [air, unspecified]: 0.0066 kg; lognormal variance with pedigree 0.0406, pedigree (1,1,5,1,1)
  calculated value
- Carbon monoxide, fossil [air, unspecified]: 2.51e-6 kg; lognormal variance with pedigree 0.69, pedigree (1,1,5,1,1)
  calculated value
- Copper ion [air, urban air close to ground]: 8.41e-10 kg; lognormal variance with pedigree 0.08, pedigree (1,1,5,1,1)
  calculated value
- Dinitrogen monoxide [air, urban air close to ground]: 1.39e-8 kg; lognormal variance with pedigree 0.08, pedigree (1,1,5,1,1)
  calculated value
- Dioxins, measured as 2,3,7,8-tetrachlorodibenzo-p-dioxin [air, urban air close to ground]: 4.49e-18 kg; lognormal variance with pedigree 0.08, pedigree (1,1,5,1,1)
  calculated value
- Formaldehyde [air, urban air close to ground]: 1.42e-8 kg; lognormal variance with pedigree 0.08, pedigree (1,1,5,1,1)
  calculated value
- Hydrocarbons, aliphatic, alkanes, unspecified [air, urban air close to ground]: 5.77e-10 kg; lognormal variance with pedigree 0.08, pedigree (1,1,5,1,1)
  calculated valuecalculated value
- Hydrocarbons, aromatic [air, urban air close to ground]: 3.6e-11 kg; lognormal variance with pedigree 0.08, pedigree (1,1,5,1,1)
  calculated value
- Hydrochloric acid [air, urban air close to ground]: 1.13e-10 kg; lognormal variance with pedigree 0.08, pedigree (1,1,5,1,1)
  calculated value
- Hydrogen fluoride [air, urban air close to ground]: 1.08e-11 kg; lognormal variance with pedigree 0.08, pedigree (1,1,5,1,1)
  calculated value
- Mercury II [air, urban air close to ground]: 4.55e-12 kg; lognormal variance with pedigree 0.08, pedigree (1,1,5,1,1)
  calculated value
- Methane, fossil [air, unspecified]: 6.04e-7 kg; lognormal variance with pedigree 0.08, pedigree (1,1,5,1,1)
  calculated value
- NMVOC, non-methane volatile organic compounds [air, unspecified]: 9.8361e-5 kg; lognormal variance with pedigree 0.08, pedigree (1,1,5,1,1)
  calculated value
  property carbon content, fossil 0.427024; name C_content_fossil
  property carbon content, non-fossil 0.427024; name C_content_non_fossil
  property dry mass 1 kg; name DM
  property water content 0; name water_content
  property water in wet mass 0 kg; name WWM
  property wet mass 1 kg; name WM
- Nitrogen oxides [air, unspecified]: 6.77e-6 kg; lognormal variance with pedigree 0.08, pedigree (1,1,5,1,1)
  calculated value
- PAH, polycyclic aromatic hydrocarbons [air, urban air close to ground]: 1.32e-9 kg; lognormal variance with pedigree 0.34, pedigree (1,1,5,1,1)
  calculated value
- Particulate Matter, < 2.5 um [air, urban air close to ground]: 2.65e-8 kg; lognormal variance with pedigree 0.34, pedigree (1,1,5,1,1)
  calculated value
- Pentane [air, urban air close to ground]: 1.58e-7 kg; lognormal variance with pedigree 0.08, pedigree (1,1,5,1,1)
  calculated value
- Propane [air, urban air close to ground]: 2.64e-8 kg; lognormal variance with pedigree 0.08, pedigree (1,1,5,1,1)
  calculated value
- Propionic acid [air, urban air close to ground]: 2.63e-9 kg; lognormal variance with pedigree 0.08, pedigree (1,1,5,1,1)
  calculated value
- Sulfur dioxide [air, unspecified]: 1.47e-7 kg; lognormal variance with pedigree 0.0406, pedigree (1,1,5,1,1)
  calculated value
- Toluene [air, urban air close to ground]: 2.64e-8 kg; lognormal variance with pedigree 0.08, pedigree (1,1,5,1,1)
  calculated value
- Water [air, unspecified]: 1.65e-5 m3; name water_to_air_unspecified; = water_UNO_input*fraction_PW_to_air; lognormal variance with pedigree 0.130025, pedigree (4,4,5,2,4)
  Calculated value based on literature values and expert opinion. See comments in the parametres' comment field.
  property fraction, origin: fresh water 0; name fraction_origin_fresh_water
  property fraction, origin: salt water 0; name fraction_origin_salt_water
  property fraction, origin: unspecified 1; name fraction_origin_unspecified
- Zinc II [air, urban air close to ground]: 8.41e-10 kg; lognormal variance with pedigree 0.69, pedigree (1,1,5,1,1)
  calculated value
- Water [water, unspecified]: 9.35e-5 m3; name water_to_water_unspecified; = water_UNO_input*(1-fraction_PW_to_air); lognormal variance with pedigree 0.130025, pedigree (4,4,5,2,4)
  (same comment as for Water)
  property fraction, origin: fresh water 0; name fraction_origin_fresh_water_Ww
  property fraction, origin: salt water 0; name fraction_origin_salt_water_Ww
  property fraction, origin: unspecified 1; name fraction_origin_unspecified_Ww

## Sampling procedure
weighted average (production volume) from 20 European sites

## Review by Bo Weidema 2011-11-24
This dataset is delivering a service, not a physical product. The physical components of the beverage carton is added in a separate dataset.
The documentation of how the values were obtained, and their plausibility, is somewhat lacking.
