# wood wool production

Dataset: EcoSpold 2, unit process
Geography: RoW
Time period: 2002-01-01 to 2023-12-31
Technology level: current
Classification: ISIC rev.4 ecoinvent: 1610:Sawmilling and planing of wood
Classification: EcoSpold01Categories: wooden materials/extraction
Synonyms: Spruce, packaging material; Fichte, Verpackungsmaterial
Tags: ConvertedDataset
Scenario: Business-as-Usual
System model: Allocation, cut-off by classification
Generated by: Hans-Jörg Althaus
Published in: Werner F. 2007
Database: ecoinvent
isCopyrightProtected: true
accessRestrictedTo: 1

## General comment
This dataset represents the production of one kg wood wool. The dataset covers high quality wood wool without shives. The input of wood is assumed to be from forest industry.
The production data reflects a Swiss wood wool producer from 2000, which is assumed representative for Europe. The dataset is mainly based on plant data from the producer. There might be considerable variations between different wood wool and wood wool board plants. The processes however, are basically the same.
[This dataset was already contained in the ecoinvent database version 2. It was not individually updated during the transfer to ecoinvent version 3. Life Cycle Impact Assessment results may still have changed, as they are affected by changes in the supply chain, i.e. in other datasets. This dataset was generated following the ecoinvent quality guidelines for version 2. It may have been subject to central changes described in the ecoinvent version 3 change report (http://www.ecoinvent.org/database/ecoinvent-version-3/reports-of-changes/), and the results of the central updates were reviewed extensively. The changes added e.g. consistent water flows and other information throughout the database. The documentation of this dataset can be found in the ecoinvent reports of version 2, which are still available via the ecoinvent website. The change report linked above covers all central changes that were made during the conversion process.]

## Included activities start
From reception of industrial wood at the factory gatel.

## Included activities end
This activity ends with wood wool, at plant. The dataset includes all processes of wood wool production from industrial softwood (debarked), including air drying (from u=70 - 20%), external and internal transports, sucktion, air compression and sawmill production. The dataset does not include infrastructure.

## Geography
Data from the only Swiss wood wool production plant used for central Europe

## Technology
Medium enterprise technology (2000)

## Reference product
- residual wood, dry: 1 m3; name residual_wood; By-product classification allocatable product; CPC 39283: Non-agglomerated wood waste and scrap; HS2017 440140: Wood; for fuel, sawdust and wood waste and scrap, not agglomerated
  EcoSpold01Location=RER
  production volume 46543.9 m3; = wood_wool*residual_wood
    Relative to main product (0.0000926 m3 / kg wood wool)
  property carbon content, non-fossil 0.494
    C content of dry mass is 0.494 kgC/kg dry wood (ecoinvent v2.2 report 9)
  property heating value, net 8030.06 MJ
    LHV is calculated based on the Carbon content of the product. More details can be found on the respective documentation.The property is based on a value of 12.7MJ/kg
  property price 26.9 EUR2005
    Temporary price data. Calculated as 90% of purchasers price based on: 2004 prices for World Import/Export (USD/cubicmeter) from FaoStat (http://faostat.fao.org/site/626/default.aspx#ancor, [accessed 10th June 2010]) Commodity: 'Chips and Particles' assuming this is for air-dry chips (10% water on a dry matter basis at 650 kg/m3) and no price difference for water content (i.e. assuming air-drying).
  properties: allocation factor 0.0066162, carbon allocation 271.7 kg, carbon content 0.494, carbon content, fossil 0, dry mass 550 kg, true value 0.00249094, water content 0.15, water in wet mass 82.5 kg, wet mass 632.5 kg

## Inputs from technosphere
- electricity, medium voltage: 0.1419, 2.83059, 0.0708601, 0.0434547, 0.00869741, 0.00186753, 0.292302, 0.840125 kWh (8 suppliers, which the file names only by identifier); sum of these 4.2298 kWh; lognormal variance with pedigree 0.044, pedigree (1,4,5,5,1)
  EcoSpold01Location=UCTE
- residual softwood, wet: 0.151472 m3; lognormal variance with pedigree 0.044, pedigree (1,4,5,5,1)
  EcoSpold01Location=RER
  properties: carbon content, non-fossil 0.494, dry mass 450 kg, heating value, net 5962.7 MJ, water content 0.7, wet mass 765 kg
  note on carbon content, non-fossil: C content of dry mass is 0.494 kgC/kg dry wood (ecoinvent v2.2 report 9)
- sawmill: 6.0589e-8 unit; lognormal variance with pedigree 0.448, pedigree (4,5,5,5,4)
  EcoSpold01Location=RER

## Inputs from nature
- Carbon dioxide, non-fossil, resource correction [natural resource, in air]: 951.335 kg

## Sampling procedure
personal communication

## Extrapolations
see Geography and Technology This dataset has been copied from an original dataset covering the geography RER. The uncertainty has been adjusted accordingly.

## Review by Roberto Dones 2004-02-13
passed

## Review by Bo Weidema 2012-09-28
Obsolete manual allocation correction from previous database version has been removed
