# sunflower production

Dataset: EcoSpold 2, unit process
Geography: RU
Time period: 2009-01-01 to 2023-12-31
Technology level: current
Classification: ISIC rev.4 ecoinvent: 0111:Growing of cereals (except rice), leguminous crops and oil seeds
Tags: WFLDB
Scenario: Business-as-Usual
System model: Allocation, cut-off by classification
Generated by: Eliane Riedener
Published in: Nemecek T. 2015
Database: ecoinvent
isCopyrightProtected: true
accessRestrictedTo: 1

## General comment
This dataset represents the production of 1 kg of sunflower grains, at standard water content required for storage (6%). The average yield from 2009 - 2012 is 1.2 t/ha. The data are representative for sunflower production in Russian Federation based on average data over the country. Mineral NPK fertiliser input is 57-50-21 kg/ha. Organic fertilisers applied amount to 2.76 m3/ha of liquid manure and 2.32 t/ha of solid manure. Total active ingredients (a.i.) applied as pesticides amount to 2.05 kg a.i./ha.
The dataset was modelled within the project 'World Food LCA database (WFLDB)'. The aim of this project was to provide inventories of a broad variety of agricultural products and processes and to cover for each product at least 50% of the global export market. The share of sunflower produced in Russia amounts to 17% of the global production (tonnage produced in 2010). The production system regarded in this dataset aimed at representing sunflower produced in Russia for the export market.
PEF-Quality: data quality rating (DQR) = 3.2 (i.e. fair quality). This dataset refers to an average situation; for specific situations exchanges might differ substantially due to site specific parameters

## Included activities start
This activity starts with soil cultivation after the harvest of the previous crop.

## Included activities end
This activity ends with the harvest of sunflowers and their transport to the farm gate. The dataset includes all machine operations, corresponding infrastructure, fuel use and sheds. Machine operations are: soil cultivation, sowing, pesticide and fertilizer application, harvesting, and on-farm transport. Further, direct field emissions and land use change are included. Heavy metal uptake by the crop is considered. The inputs of seeds, fertilisers and pesticides as well as packaging of fertilisers and pesticides are considered. The dataset doesn't include a)emissions from manure storage because these are within the system boundary of animal production and b) drying due to lack of data.

## Technology
Conventional production

## Parameters
- LUC_crop_specific: 1 dimensionless
  This parameter allows to switch between a 'crop specific' and a 'country specific' approach when calculating the LUC of a crop. By default, the chosen approach is 'crop specific', so the value of the parameter is 1. If you want to apply a 'country specific' approach, turn the parameter to 0.
- heavyMetalUptakeSwitch: 1 dimensionless

## Reference product
- sunflower seed: 1 kg; By-product classification allocatable product; CPC 01445: Sunflower seed; HS2017 120600: Oil seeds; sunflower seeds, whether or not broken
  Reference flow: Yield = 1188.1 kg/ha
  production volume 7.37233e9 kg
    Source: FAOSTAT. Average, 2009-2012
  property price 0.317966 EUR2005
    Calculated based on inputs: The price of the product has been calculated as a sum of the values of the material and energy inputs for this product. This value is therefore a rough estimation. It may underestimate the real price since there are additional expenses when producing any product. These expences can include for example labour costs, treatment of waste materials and profit for the producer. Please consider carefully whether this level of data quality is acceptable for your application.
  properties: carbon allocation 0.53956 kg, carbon content 0.574, carbon content, fossil 0, carbon content, non-fossil 0.574, dry mass 0.94 kg, water content 0.0638298, water in wet mass 0.06 kg, wet mass 1 kg

## Inputs from technosphere
- [sulfonyl]urea-compound: 1.44401e-6 kg; lognormal variance with pedigree 0.0138498, pedigree (2,2,4,1,1)
  Proxy: Source for total amount of pesticides: extrapolated from MEXALCA. Active ingredient is calculated based on Ecoinvent dataset 'Sunflower, conventional, 9% moisture, national average, at farm gate/FR U '. For calculations see supporting documentation 'WFLDB-Documentation.pdf' (https://ecoquery.ecoinvent.org/File/Reports).
  properties: carbon content, fossil 0.540853, dry mass 1 kg, wet mass 1 kg
- [thio]carbamate-compound: 2.84184e-7 kg; lognormal variance with pedigree 0.0138498, pedigree (2,2,4,1,1)
  (same comment as for [sulfonyl]urea-compound)
  properties: carbon content, fossil 0.626349, dry mass 1 kg, wet mass 1 kg
- acetamide-anillide-compound, unspecified: 3.8507e-5 kg; lognormal variance with pedigree 0.0138498, pedigree (2,2,4,1,1)
  (same comment as for [sulfonyl]urea-compound)
  properties: carbon content, fossil 0.659175, dry mass 1 kg, wet mass 1 kg
- aclonifen: 0.000552606 kg; lognormal variance with pedigree 0.0138498, pedigree (2,2,4,1,1)
  (same comment as for [sulfonyl]urea-compound)
  properties: carbon content, fossil 0.541353, dry mass 1 kg, wet mass 1 kg
- ammonia, anhydrous, liquid: 0.000120494, 0.000603493 kg (2 suppliers, which the file names only by identifier); sum of these 0.000723988 kg; source Marinussen M. 2012; lognormal variance with pedigree 0.124177, pedigree (2,1,4,1,1)
  Calculated based on literature values or expert estimation: The total amount of nutrient (Marinussen et al. 2012) multiplied by the country-share of fertiliser type (IFA 2014). See supporting documentation 'WFLDB-Documentation.pdf' chapter 'Fertiliser application' for L3 and L4 data (https://ecoquery.ecoinvent.org/File/Reports). The amount of nutrients is a proxy from East/Central European countries (Albania, Hungary, Croatia and Czech Republic).
  Corresponds to 0.86 kg/ha
  properties: dry mass 1 kg, wet mass 1 kg
- ammonium nitrate: 0.032529, 0.0588638 kg (2 suppliers, which the file names only by identifier); sum of these 0.0913928 kg; source Marinussen M. 2012; lognormal variance with pedigree 0.124177, pedigree (2,1,4,1,1)
  The exchange has been updated from 'ammonium nitrate, as N' into 'ammonium nitrate' and therefore its amount has been scaled (multiplied) from 0.032 kg by 2.8573 kg of 'ammonium nitrate' per kg of 'ammonium nitrate, as N'. Original comment of the exchange is: Calculated based on literature values or expert estimation: The total amount of nutrient (Marinussen et al. 2012) multiplied by the country-share of fertiliser type (IFA 2014). See supporting documentation 'WFLDB-Documentation.pdf' chapter 'Fertiliser application' for L3 and L4 data (https://ecoquery.ecoinvent.org/File/Reports). The amount of nutrients is a proxy from East/Central European countries (Albania, Hungary, Croatia and Czech Republic).
  Corresponds to 38.0 kg/ha
  properties: dry mass 1 kg, wet mass 1 kg
- ammonium sulfate: 0.00160399, 0.000492211 kg (2 suppliers, which the file names only by identifier); sum of these 0.0020962 kg; source Marinussen M. 2012; lognormal variance with pedigree 0.124177, pedigree (2,1,4,1,1)
  Calculated based on literature values or expert estimation: The total amount of nutrient (Marinussen et al. 2012) multiplied by the country-share of fertiliser type (IFA 2014). See supporting documentation 'WFLDB-Documentation.pdf' chapter 'Fertiliser application' for L3 and L4 data (https://ecoquery.ecoinvent.org/File/Reports). The amount of nutrients is a proxy from East/Central European countries (Albania, Hungary, Croatia and Czech Republic).
  Corresponds to 2.49 kg/ha
  properties: dry mass 1 kg, wet mass 1 kg
- application of plant protection product, by field sprayer: 0.000557689 ha; lognormal variance with pedigree 0.124664, pedigree (2,2,4,1,1)
  Proxy: Extrapolated using a modified MEXALCA-approach (Roches et al. 2010; Nemecek et al. 2012). See supporting documentation 'WFLDB-Documentation.pdf' chapter 'Machinery processes' for L1 data (https://ecoquery.ecoinvent.org/File/Reports).
- calcium ammonium nitrate: 0.000399924, 0.000643354 kg (2 suppliers, which the file names only by identifier); sum of these 0.00104328 kg
  The exchange has been updated from 'calcium ammonium nitrate' into 'calcium ammonium nitrate' and therefore its amount has been scaled (multiplied) from 0.0003 kg by 3.7037 kg of 'calcium ammonium nitrate' per kg of 'calcium ammonium nitrate'. Original comment of the exchange is: Calculated based on literature values or expert estimation: The total amount of nutrient (Marinussen et al. 2012) multiplied by the country-share of fertiliser type (IFA 2014). See supporting documentation 'WFLDB-Documentation.pdf' chapter 'Fertiliser application' for L3 and L4 data (https://ecoquery.ecoinvent.org/File/Reports). The amount of nutrients is a proxy from East/Central European countries (Albania, Hungary, Croatia and Czech Republic).
  Corresponds to 1.62 kg/ha
  properties: calcium content 0.333646, dry mass 1 kg, hydrogen content 0.0335628, nitrogen content 0.233209, oxygen content 0.399581, wet mass 1 kg
  note on calcium content: Calcium content (on a dry matter basis) of calcium ammonium nitrate is calculated from the molecular formula of the substance (CH4CaN2O6).
  note on hydrogen content: Hydrogen content (on a dry matter basis) of calcium ammonium nitrate is calculated from the molecular formula of the substance (CH4CaN2O6).
  note on nitrogen content: Nitrogen content (on a dry matter basis) of calcium ammonium nitrate is calculated from the molecular formula of the substance (CH4CaN2O6).
  note on oxygen content: Oxygen content (on a dry matter basis) of calcium ammonium nitrate is calculated from the molecular formula of the substance (CH4CaN2O6).
- combine harvesting: 0.00084168 ha; lognormal variance with pedigree 0.124177, pedigree (2,1,4,1,1)
  Estimation based on a modified MEXALCA-approach (Roches et al. 2010; Nemecek et al. 2012): See supporting documentation 'WFLDB-Documentation.pdf' chapter 'Machinery processes' for L2 data (https://ecoquery.ecoinvent.org/File/Reports).
- cyclic N-compound: 6.27781e-5 kg; lognormal variance with pedigree 0.0138498, pedigree (2,2,4,1,1)
  (same comment as for [sulfonyl]urea-compound)
  properties: carbon content, fossil 0.641962, dry mass 1 kg, wet mass 1 kg
- diazole-compound: 2.88921e-6 kg; lognormal variance with pedigree 0.0138498, pedigree (2,2,4,1,1)
  (same comment as for [sulfonyl]urea-compound)
  properties: carbon content, fossil 0.541859, dry mass 1 kg, wet mass 1 kg
- fertilising, by broadcaster: 0.00168336 ha; lognormal variance with pedigree 0.124177, pedigree (2,1,4,1,1)
  Proxy: Similar crop and country used.
- glyphosate: 0.00022411 kg; lognormal variance with pedigree 0.0138498, pedigree (2,2,4,1,1)
  (same comment as for [sulfonyl]urea-compound)
  properties: carbon content, fossil 0.214286, dry mass 1 kg, wet mass 1 kg
- inorganic nitrogen fertiliser, as N: 0.00257125, 0.00136588, 0.00257125 kg (3 suppliers, which the file names only by identifier); sum of these 0.00650837 kg
  Calculated based on literature values or expert estimation: The total amount of nutrient (Marinussen et al. 2012) multiplied by the country-share of fertiliser type (IFA 2014). See supporting documentation 'WFLDB-Documentation.pdf' chapter 'Fertiliser application' for L3 and L4 data (https://ecoquery.ecoinvent.org/File/Reports). The amount of nutrients is a proxy from East/Central European countries (Albania, Hungary, Croatia and Czech Republic).
  Corresponds to 1.62 kg/ha
  properties: dry mass 1 kg, wet mass 1 kg
- inorganic nitrogen fertiliser, as N: 0.00409763 kg; source Marinussen M. 2012; lognormal variance with pedigree 0.124177, pedigree (2,1,4,1,1)
  (same comment as for inorganic nitrogen fertiliser, as N)
- inorganic phosphorus fertiliser, as P2O5: 0.0182956, 0.00508753, 0.0182956 kg (3 suppliers, which the file names only by identifier); sum of these 0.0416787 kg
  Calculated based on literature values or expert estimation: The total amount of nutrient (Marinussen et al. 2012) multiplied by the country-share of fertiliser type (IFA 2014). See supporting documentation 'WFLDB-Documentation.pdf' chapter 'Fertiliser application' for L3 and L4 data (https://ecoquery.ecoinvent.org/File/Reports). The amount of nutrients is a proxy from East/Central European countries (Albania, Hungary, Croatia and Czech Republic).
  Corresponds to 6.04 kg/ha
  properties: dry mass 1 kg, wet mass 1 kg
- inorganic potassium fertiliser, as K2O: 0.0104419 kg; source Marinussen M. 2012; lognormal variance with pedigree 0.124177, pedigree (2,1,4,1,1)
  Calculated based on literature values or expert estimation: The total amount of nutrient (Marinussen et al. 2012) multiplied by the country-share of fertiliser type (IFA 2014). See supporting documentation 'WFLDB-Documentation.pdf' chapter 'Fertiliser application' for L3 and L4 data (https://ecoquery.ecoinvent.org/File/Reports). The amount of nutrients is a proxy from East/Central European countries (Albania, Hungary, Croatia and Czech Republic).
  Corresponds to 12.4 kg/ha
  properties: dry mass 1 kg, wet mass 1 kg
- land use change, annual crop: 0.00044508 ha; = 0.000445080380439*LUC_crop_specific+0.0*(1-LUC_crop_specific)
  Calculated value. Land use change (LUC) combines land transformation areas calculated with the adapted 'Direct Land Use Change Assessment Tool' version 2014 developed by Blonk Consultants and the carbon losses from soil organic carbon (SOC) and vegetation (VEG) as calculated in ecoinvent v3. See 'WFLDB-Guidelines.pdf', available at https://ecoquery.ecoinvent.org/File/Reports.
- liquid manure spreading, by vacuum tanker: 0.00232329 m3; lognormal variance with pedigree 0.124177, pedigree (2,1,4,1,1)
  This amount corresponds to the input of liquid manure.
- manure, liquid, cattle: 1.96782 kg; lognormal variance with pedigree 0.124177, pedigree (2,1,4,1,1)
  Calculated based on literature values: The total amount of manure multiplied by the country-share of manure per animal category (FAOSTAT 2015). See supporting documentation 'WFLDB-Documentation.pdf' chapter 'Fertiliser application' (https://ecoquery.ecoinvent.org/File/Reports).
  Corresponds to 2.34 m3/ha
  properties: carbon content, non-fossil 0.68, dry mass 0.075 kg, water content 12.333, wet mass 1 kg
- manure, liquid, swine: 0.299704 kg; lognormal variance with pedigree 0.124177, pedigree (2,1,4,1,1)
  Calculated based on literature values: The total amount of manure multiplied by the country-share of manure per animal category (FAOSTAT 2015). See supporting documentation 'WFLDB-Documentation.pdf' chapter 'Fertiliser application' (https://ecoquery.ecoinvent.org/File/Reports).
  Corresponds to 0.356 m3/ha
  properties: carbon content, non-fossil 0.64, dry mass 0.05 kg, water content 19, wet mass 1 kg
- manure, solid, cattle: 1.6436 kg; lognormal variance with pedigree 0.124177, pedigree (2,1,4,1,1)
  Calculated based on literature values: The total amount of manure multiplied by the country-share of manure per animal category (FAOSTAT 2015). See supporting documentation 'WFLDB-Documentation.pdf' chapter 'Fertiliser application' (https://ecoquery.ecoinvent.org/File/Reports).
  Corresponds to 1950.0 kg/ha
  properties: carbon content, non-fossil 0.441, dry mass 0.22 kg, water content 3.5454, wet mass 1 kg
- metaldehyde: 0.000121129 kg; lognormal variance with pedigree 0.0138498, pedigree (2,2,4,1,1)
  (same comment as for [sulfonyl]urea-compound)
  properties: carbon content, fossil 0.545455, dry mass 1 kg, wet mass 1 kg
- metolachlor: 0.000434325 kg; lognormal variance with pedigree 0.0138498, pedigree (2,2,4,1,1)
  (same comment as for [sulfonyl]urea-compound)
  properties: carbon content, fossil 0.633803, dry mass 1 kg, wet mass 1 kg
- packaging, for fertilisers: 0.215726 kg; lognormal variance with pedigree 0.0592, pedigree (4,3,4,5,4)
  Total amount of active substance/s of fertilisers needed for the production of 'sunflower seed' is calculated to be circa 1.08E-01 kg. Fertiliser/s used in this dataset is/are: 'ammonia, liquid', 'ammonium nitrate, as N', 'ammonium sulfate, as N', 'nitrogen fertiliser, as N', 'nitrogen fertiliser, as N', 'nitrogen fertiliser, as N', 'nitrogen fertiliser, as N', 'nitrogen fertiliser, as N', 'nitrogen fertiliser, as N', 'phosphate fertiliser, as P2O5', 'phosphate fertiliser, as P2O5', 'phosphate fertiliser, as P2O5', 'phosphate fertiliser, as P2O5', 'phosphate rock, as P2O5, beneficiated, dry', 'potassium chloride, as K2O', 'potassium fertiliser, as K2O', 'potassium sulfate, as K2O', 'urea, as N'. The total amount of active substance/s is doubled in order to account for the packaging of the dilluted product of fertiliser/s that is/are applied. Therefore, 2.16E-01 kg of packaging for fertilisers is justified with this exchange.
  properties: carbon content, fossil 0.825301, dry mass 1 kg, heating value, net 25.01 MJ, price 0.0642 EUR2005, wet mass 1 kg
  note on carbon content, fossil: Considering a chemical formula (C2H4)n for polyethylene, carbon content-fossil is calculated to be 0.856286 kg of Carbon per kg of dry mass.
- packaging, for pesticides: 0.00345594 kg; lognormal variance with pedigree 0.0592, pedigree (4,3,4,5,4)
  Total amount of active substance/s of pesticides needed for the production of sunflower seed is calculated to be circa 1.73E-03 kg. Pesticide/s used in this dataset is/are: '[sulfonyl]urea-compound', '[thio]carbamate-compound', 'acetamide-anillide-compound, unspecified', 'aclonifen', 'cyclic N-compound', 'diazole-compound', 'glyphosate', 'metaldehyde', 'metolachlor', 'pendimethalin', 'phenoxy-compound', 'pyrethroid-compound'. The total amount of active substance/s is doubled in order to account for the packaging of the dilluted product of pesticide/s that is/are applied. Therefore, 3.46E-03 kg of packaging for pesticides is justified with this exchange.
  properties: carbon content, fossil 0.85714, dry mass 1 kg, heating value, net 25.97 MJ, price 0.0642 EUR2005, wet mass 1 kg
- pendimethalin: 0.000273106 kg; lognormal variance with pedigree 0.0138498, pedigree (2,2,4,1,1)
  (same comment as for [sulfonyl]urea-compound)
  properties: carbon content, fossil 0.55516, dry mass 1 kg, wet mass 1 kg
- phenoxy-compound: 5.61974e-6 kg; lognormal variance with pedigree 0.0138498, pedigree (2,2,4,1,1)
  (same comment as for [sulfonyl]urea-compound)
  properties: carbon content, fossil 0.532559, dry mass 1 kg, wet mass 1 kg
- phosphate rock, beneficiated: 4.03011e-6, 0.000889966 kg (2 suppliers, which the file names only by identifier); sum of these 0.000893996 kg; source Marinussen M. 2012; lognormal variance with pedigree 0.124177, pedigree (2,1,4,1,1)
  The exchange has been updated from 'phosphate rock, as P2O5, beneficiated, dry' into 'phosphate rock, beneficiated' and therefore its amount has been scaled (multiplied) from 0.0003 kg by 3.125 kg of 'phosphate rock, beneficiated' per kg of 'phosphate rock, as P2O5, beneficiated, dry'. Original comment of the exchange is: Calculated based on literature values or expert estimation: The total amount of nutrient (Marinussen et al. 2012) multiplied by the country-share of fertiliser type (IFA 2014). See supporting documentation 'WFLDB-Documentation.pdf' chapter 'Fertiliser application' for L3 and L4 data (https://ecoquery.ecoinvent.org/File/Reports). The amount of nutrients is a proxy from East/Central European countries (Albania, Hungary, Croatia and Czech Republic).
  Corresponds to 0.34 kg/ha
  properties: dry mass 1 kg, wet mass 1 kg
- potassium chloride: 0.000792825, 0.00955989 kg (2 suppliers, which the file names only by identifier); sum of these 0.0103527 kg; source Marinussen M. 2012; lognormal variance with pedigree 0.124177, pedigree (2,1,4,1,1)
  The exchange has been updated from 'potassium chloride, as K2O' into 'potassium chloride' and therefore its amount has been scaled (multiplied) from 0.0065 kg by 1.5829 kg of 'potassium chloride' per kg of 'potassium chloride, as K2O'. Original comment of the exchange is: Calculated based on literature values or expert estimation: The total amount of nutrient (Marinussen et al. 2012) multiplied by the country-share of fertiliser type (IFA 2014). See supporting documentation 'WFLDB-Documentation.pdf' chapter 'Fertiliser application' for L3 and L4 data (https://ecoquery.ecoinvent.org/File/Reports). The amount of nutrients is a proxy from East/Central European countries (Albania, Hungary, Croatia and Czech Republic).
  Corresponds to 7.77 kg/ha
  properties: dry mass 1 kg, wet mass 1 kg
- potassium sulfate: 0.000222977, 0.0010585 kg (2 suppliers, which the file names only by identifier); sum of these 0.00128147 kg; source Marinussen M. 2012; lognormal variance with pedigree 0.124177, pedigree (2,1,4,1,1)
  The exchange has been updated from 'potassium sulfate, as K2O' into 'potassium sulfate' and therefore its amount has been scaled (multiplied) from 0.0007 kg by 1.85 kg of 'potassium sulfate' per kg of 'potassium sulfate, as K2O'. Original comment of the exchange is: Calculated based on literature values or expert estimation: The total amount of nutrient (Marinussen et al. 2012) multiplied by the country-share of fertiliser type (IFA 2014). See supporting documentation 'WFLDB-Documentation.pdf' chapter 'Fertiliser application' for L3 and L4 data (https://ecoquery.ecoinvent.org/File/Reports). The amount of nutrients is a proxy from East/Central European countries (Albania, Hungary, Croatia and Czech Republic).
  Corresponds to 0.823 kg/ha
  properties: dry mass 1 kg, wet mass 1 kg
- poultry manure, dried: 0.313142 kg; lognormal variance with pedigree 0.124177, pedigree (2,1,4,1,1)
  Calculated based on literature values: The total amount of manure multiplied by the country-share of manure per animal category (FAOSTAT 2015). See supporting documentation 'WFLDB-Documentation.pdf' chapter 'Fertiliser application' (https://ecoquery.ecoinvent.org/File/Reports).
  Corresponds to 372.0 kg/ha
  properties: cadmium content 2.92e-7, carbon content, non-fossil 0.33389, copper content 4.38e-5, dry mass 0.865 kg, lead content 2.92e-6, mercury content 2e-7, nickel content 4e-5, nitrogen content 0.532, phosphorus content 0.0167, potassium content 0.024, water content 0.156069, wet mass 1 kg, zinc content 0.000349
- poultry manure, fresh: 0.0278801 kg; lognormal variance with pedigree 0.124177, pedigree (2,1,4,1,1)
  Calculated based on literature values: The total amount of manure multiplied by the country-share of manure per animal category (FAOSTAT 2015). See supporting documentation 'WFLDB-Documentation.pdf' chapter 'Fertiliser application' (https://ecoquery.ecoinvent.org/File/Reports).
  Corresponds to 0.0662 m3/ha
  properties: carbon content, non-fossil 0.33389, dry mass 0.38 kg, water content 1.63158, wet mass 1 kg
- pyrethroid-compound: 1.11714e-5 kg; lognormal variance with pedigree 0.0138498, pedigree (2,2,4,1,1)
  (same comment as for [sulfonyl]urea-compound)
  properties: carbon content, fossil 0.623, dry mass 1 kg, wet mass 1 kg
- single superphosphate: 0.000154078, 0.000416581 kg (2 suppliers, which the file names only by identifier); sum of these 0.000570659 kg
  The exchange has been updated from 'single superphosphate' into 'single superphosphate' and therefore its amount has been scaled (multiplied) from 0.0001 kg by 4.7619 kg of 'single superphosphate' per kg of 'single superphosphate'. Original comment of the exchange is: Calculated based on literature values or expert estimation: The total amount of nutrient (Marinussen et al. 2012) multiplied by the country-share of fertiliser type (IFA 2014). See supporting documentation 'WFLDB-Documentation.pdf' chapter 'Fertiliser application' for L3 and L4 data (https://ecoquery.ecoinvent.org/File/Reports). The amount of nutrients is a proxy from East/Central European countries (Albania, Hungary, Croatia and Czech Republic).
  Corresponds to 6.04 kg/ha
  properties: dry mass 1 kg, phosphorus content 0.0916484, wet mass 1 kg
- solid manure loading and spreading, by hydraulic loader and spreader: 1.95674 kg; lognormal variance with pedigree 0.124177, pedigree (2,1,4,1,1)
  This amount corresponds the input of solid manure.
- sowing: 0.00084168 ha; lognormal variance with pedigree 0.124177, pedigree (2,1,4,1,1)
  (same comment as for combine harvesting)
- sunflower seed, for sowing: 0.0031563 kg; lognormal variance with pedigree 0.124177, pedigree (2,1,4,1,1)
  properties: carbon content, non-fossil 0.7766, dry mass 0.94 kg, water content 0.0638298, wet mass 1 kg
- tillage, cultivating, chiselling: 0.00042084 ha; lognormal variance with pedigree 0.124177, pedigree (2,1,4,1,1)
  (same comment as for combine harvesting)
- tillage, ploughing: 0.00042084 ha; lognormal variance with pedigree 0.124177, pedigree (2,1,4,1,1)
  (same comment as for combine harvesting)
- transport, freight train: 0.0024718, 0.0152584 metric ton*km (2 suppliers, which the file names only by identifier); sum of these 0.0177302 metric ton*km
  This represent the transport of fertilizers that are directly linked to their supplying activities, to better represent the fertilizer mix of the activity. Transport distance based on US BTS Commodity Flow Surveys 1993, 1997, 2002, 2007, US Dep. Of Transportation, Bureau of Transportation Statistics.
- transport, freight, inland waterways, barge: 0.00299792 metric ton*km
  (same comment as for transport, freight train)
- transport, freight, lorry, unspecified: 0.00856524, 0.00098822 metric ton*km (2 suppliers, which the file names only by identifier); sum of these 0.00955346 metric ton*km
  This represent the transport of fertilizers that are directly linked to their supplying activities, to better represent the fertilizer mix of the activity. Transport distance based on US BTS Commodity Flow Surveys 1993, 1997, 2002, 2007, US Dep. Of Transportation, Bureau of Transportation Statistics. Of the total road transport, 6% is assumed to be by delivery van for goods with a large share of retail sale, and 3% for goods that are mainly sold via wholesale.
- transport, tractor and trailer, agricultural: 0.0013525 metric ton*km; lognormal variance with pedigree 0.162439, pedigree (4,1,4,1,1)
  On-farm transport: Yield (in tonnes) multiplied by the average distance from field to farm. The distance was obtained by extrapolation (modified MEXALCA approach). See supporting documentation 'WFLDB-Documentation.pdf' chapter 'Machinery processes' (https://ecoquery.ecoinvent.org/File/Reports). Corresponds to 1.6tkm/ha.
- urea: 0.00223306, 0.000350107 kg (2 suppliers, which the file names only by identifier); sum of these 0.00258317 kg; source Marinussen M. 2012; lognormal variance with pedigree 0.124177, pedigree (2,1,4,1,1)
  The exchange has been updated from 'urea, as N' into 'urea' and therefore its amount has been scaled (multiplied) from 0.0012 kg by 2.1438 kg of 'urea' per kg of 'urea, as N'. Original comment of the exchange is: Calculated based on literature values or expert estimation: The total amount of nutrient (Marinussen et al. 2012) multiplied by the country-share of fertiliser type (IFA 2014). See supporting documentation 'WFLDB-Documentation.pdf' chapter 'Fertiliser application' for L3 and L4 data (https://ecoquery.ecoinvent.org/File/Reports). The amount of nutrients is a proxy from East/Central European countries (Albania, Hungary, Croatia and Czech Republic).
  Corresponds to 1.43 kg/ha
  properties: carbon content, fossil 0.2, dry mass 1 kg, wet mass 1 kg
- urea ammonium nitrate mix: 0.000833862, 0.00318263 kg (2 suppliers, which the file names only by identifier); sum of these 0.0040165 kg
  The exchange has been updated from 'inorganic nitrogen fertiliser, as N' into 'urea ammonium nitrate' and therefore its amount has been scaled (multiplied) from 0.0012 kg by 3.3333 kg of 'urea ammonium nitrate' per kg of 'inorganic nitrogen fertiliser, as N'. Original comment of the exchange is: Calculated based on literature values or expert estimation: The total amount of nutrient (Marinussen et al. 2012) multiplied by the country-share of fertiliser type (IFA 2014). See supporting documentation 'WFLDB-Documentation.pdf' chapter 'Fertiliser application' for L3 and L4 data (https://ecoquery.ecoinvent.org/File/Reports). The amount of nutrients is a proxy from East/Central European countries (Albania, Hungary, Croatia and Czech Republic).
  Corresponds to 1.62 kg/ha
  properties: carbon content, fossil 0.0879977, dry mass 0.75 kg, hydrogen content 0.095042, nitrogen content 0.401231, oxygen content 0.749063, water content 0.333333, wet mass 1 kg
  note on carbon content, fossil: Carbon content, fossil is calculated based on the chemical formula of the substance.
  note on hydrogen content: Hydrogen content (on a dry matter basis) of urea ammonium nitrate mix is calculated from the molecular formula of the substance (CH6N4O4).
  note on nitrogen content: Nitrogen content (on a dry matter basis) of urea ammonium nitrate mix is calculated from the molecular formula of the substance (CH6N4O4).
  note on oxygen content: Oxygen content (on a dry matter basis) of urea ammonium nitrate mix is calculated from the molecular formula of the substance (CH6N4O4).

## Inputs from nature
- Carbon dioxide, in air [natural resource, in air]: 2.88654 kg; lognormal variance with pedigree 0.0138498, pedigree (2,2,4,1,1)
  CO2 uptake by biomass
- Energy, gross calorific value, in biomass [natural resource, biotic]: 39.3267 MJ; lognormal variance with pedigree 0.0138498, pedigree (2,2,4,1,1)
  Gross energy content is related to MJ/kg dry matter of product. Source: ecoinvent data.
- Occupation, annual crop [natural resource, land]: 3.55122 m2*year; lognormal variance with pedigree 0.0200616, pedigree (2,1,4,1,1)
  Related to the duration from harvest date of previous crop to harvest date of main crop: 154 days.
- Transformation, from arable land, unspecified use [natural resource, land]: 8.4168 m2; lognormal variance with pedigree 0.0442144, pedigree (2,1,4,1,1)
  10000 m2 divided by the life time of the crop.
- Transformation, to arable land, unspecified use [natural resource, land]: 8.4168 m2; lognormal variance with pedigree 0.0442144, pedigree (2,1,4,1,1)
  10000 m2 divided by the life time of the crop.

## Emissions to nature
- Ammonia [air, non-urban air or from high stacks]: 0.0109023 kg; source EEA 2013; lognormal variance with pedigree 0.0447216, pedigree (2,2,4,1,1)
  Calculated value - EMEP/EEA (2013). See 'WFLDB-Guidelines.pdf', available at https://ecoquery.ecoinvent.org/File/Reports.
- Carbon dioxide, fossil [air, non-urban air or from high stacks]: 0.00283772 kg; lognormal variance with pedigree 0.0138498, pedigree (2,2,4,1,1)
  Calculated value - CO2 emissions from urea and lime. See 'WFLDB-Guidelines.pdf', available at https://ecoquery.ecoinvent.org/File/Reports.
- Dinitrogen monoxide [air, non-urban air or from high stacks]: 0.00159877 kg; source IPCC 2006; lognormal variance with pedigree 0.124664, pedigree (2,2,4,1,1)
  Calculated value - IPCC (2006). See 'WFLDB-Guidelines.pdf', available at https://ecoquery.ecoinvent.org/File/Reports.
- Nitrogen oxides [air, non-urban air or from high stacks]: 0.00227573 kg; source EEA 2013; lognormal variance with pedigree 0.124664, pedigree (2,2,4,1,1)
  Calculated value - EEA/EMEP (2013). See 'WFLDB-Guidelines.pdf', available at https://ecoquery.ecoinvent.org/File/Reports.
- Aclonifen [soil, agricultural]: 0.000482948 kg; lognormal variance with pedigree 0.0447216, pedigree (2,2,4,1,1)
  Calculated value - 100% emission in soil. See 'WFLDB-Guidelines.pdf', available at https://ecoquery.ecoinvent.org/File/Reports.
- Cadmium II [soil, agricultural]: 2.47951e-6 kg; = 2.5749516034e-06 + ( - 9.54464035014e-08)*heavyMetalUptakeSwitch; source Freiermuth R.  2006
  Comment on mathematicalRelation:
  2.5749516034e-06 from Calculated value - Freiermuth (2006). See 'WFLDB-Guidelines.pdf', available at https://ecoquery.ecoinvent.org/File/Reports.
  -9.54464035014e-08 from Crop, default, heavy metals uptake model
  Heavy metal uptake can be excluded by setting the parameter heavyMetalUptakeSwitch to zero.
- Chromium III [soil, agricultural]: 2.32189e-5 kg; = 2.37311674102e-05 + ( - 5.12293577982e-07)*heavyMetalUptakeSwitch; source Freiermuth R.  2006
  Comment on mathematicalRelation:
  2.37311674102e-05 from Calculated value - Freiermuth (2006). See 'WFLDB-Guidelines.pdf', available at https://ecoquery.ecoinvent.org/File/Reports.
  -5.12293577982e-07 from Crop, default, heavy metals uptake model
  Heavy metal uptake can be excluded by setting the parameter heavyMetalUptakeSwitch to zero.
- Clethodim [soil, agricultural]: 2.80649e-6 kg; lognormal variance with pedigree 0.0447216, pedigree (2,2,4,1,1)
  (same comment as for Aclonifen)
- Copper ion [soil, agricultural]: 1.74919e-5 kg; = 2.37210672502e-05 + ( - 6.22920791179e-06)*heavyMetalUptakeSwitch; source Freiermuth R.  2006
  Comment on mathematicalRelation:
  2.37210672502e-05 from Calculated value - Freiermuth (2006). See 'WFLDB-Guidelines.pdf', available at https://ecoquery.ecoinvent.org/File/Reports.
  -6.22920791179e-06 from Crop, default, heavy metals uptake model
  Heavy metal uptake can be excluded by setting the parameter heavyMetalUptakeSwitch to zero.
- Cypermethrin [soil, agricultural]: 9.54702e-6 kg; lognormal variance with pedigree 0.0447216, pedigree (2,2,4,1,1)
  (same comment as for Aclonifen)
- Deltamethrin [soil, agricultural]: 2.5426e-8 kg; lognormal variance with pedigree 0.0447216, pedigree (2,2,4,1,1)
  (same comment as for Aclonifen)
- Fenpropimorph [soil, agricultural]: 4.64514e-5 kg; lognormal variance with pedigree 0.0447216, pedigree (2,2,4,1,1)
  (same comment as for Aclonifen)
- Fluazifop-P-butyl [soil, agricultural]: 3.50811e-6 kg; lognormal variance with pedigree 0.0447216, pedigree (2,2,4,1,1)
  (same comment as for Aclonifen)
- Flurochloridone [soil, agricultural]: 0.000167225 kg; lognormal variance with pedigree 0.0447216, pedigree (2,2,4,1,1)
  (same comment as for Aclonifen)
- Flurtamone [soil, agricultural]: 4.77863e-5 kg; lognormal variance with pedigree 0.0447216, pedigree (2,2,4,1,1)
  (same comment as for Aclonifen)
- Glyphosate [soil, agricultural]: 0.00019586 kg; lognormal variance with pedigree 0.0447216, pedigree (2,2,4,1,1)
  (same comment as for Aclonifen)
- Imazamox [soil, agricultural]: 2.52501e-6 kg; lognormal variance with pedigree 0.0447216, pedigree (2,2,4,1,1)
  (same comment as for Aclonifen)
- Lambda-cyhalothrin [soil, agricultural]: 5.66575e-8 kg; lognormal variance with pedigree 0.0447216, pedigree (2,2,4,1,1)
  (same comment as for Aclonifen)
- Lead II [soil, agricultural]: 3.70951e-6 kg; = 4.21782678226e-06 + ( - 5.08317427826e-07)*heavyMetalUptakeSwitch; source Freiermuth R.  2006
  Comment on mathematicalRelation:
  4.21782678226e-06 from Calculated value - Freiermuth (2006). See 'WFLDB-Guidelines.pdf', available at https://ecoquery.ecoinvent.org/File/Reports.
  -5.08317427826e-07 from Crop, default, heavy metals uptake model
  Heavy metal uptake can be excluded by setting the parameter heavyMetalUptakeSwitch to zero.
- Mercury II [soil, agricultural]: 2.25846e-7 kg; = 2.63967679488e-07 + ( - 3.81221621076e-08)*heavyMetalUptakeSwitch; source Freiermuth R.  2006
  Comment on mathematicalRelation:
  2.63967679488e-07 from Calculated value - Freiermuth (2006). See 'WFLDB-Guidelines.pdf', available at https://ecoquery.ecoinvent.org/File/Reports.
  Heavy metal uptake can be excluded by setting the parameter heavyMetalUptakeSwitch to zero.
- Metaldehyde [soil, agricultural]: 0.00010586 kg; lognormal variance with pedigree 0.0447216, pedigree (2,2,4,1,1)
  (same comment as for Aclonifen)
- Metazachlor [soil, agricultural]: 3.3653e-5 kg; lognormal variance with pedigree 0.0447216, pedigree (2,2,4,1,1)
  (same comment as for Aclonifen)
- Metolachlor [soil, agricultural]: 0.000379576 kg; lognormal variance with pedigree 0.0447216, pedigree (2,2,4,1,1)
  (same comment as for Aclonifen)
- Nickel II [soil, agricultural]: 8.65532e-6 kg; = 9.6372359229e-06 + ( - 9.81911690935e-07)*heavyMetalUptakeSwitch; source Freiermuth R.  2006
  Comment on mathematicalRelation:
  9.6372359229e-06 from Calculated value - Freiermuth (2006). See 'WFLDB-Guidelines.pdf', available at https://ecoquery.ecoinvent.org/File/Reports.
  -9.81911690935e-07 from Crop, default, heavy metals uptake model
  Heavy metal uptake can be excluded by setting the parameter heavyMetalUptakeSwitch to zero.
- Pendimethalin [soil, agricultural]: 0.00023868 kg; lognormal variance with pedigree 0.0447216, pedigree (2,2,4,1,1)
  (same comment as for Aclonifen)
- Pirimicarb [soil, agricultural]: 2.48362e-7 kg; lognormal variance with pedigree 0.0447216, pedigree (2,2,4,1,1)
  (same comment as for Aclonifen)
- Quinmerac [soil, agricultural]: 8.41325e-6 kg; lognormal variance with pedigree 0.0447216, pedigree (2,2,4,1,1)
  (same comment as for Aclonifen)
- Quizalofop-p-ethyl [soil, agricultural]: 1.40324e-6 kg; lognormal variance with pedigree 0.0447216, pedigree (2,2,4,1,1)
  (same comment as for Aclonifen)
- Tribenuron-methyl [soil, agricultural]: 1.26199e-6 kg; lognormal variance with pedigree 0.0447216, pedigree (2,2,4,1,1)
  (same comment as for Aclonifen)
- Zinc II [soil, agricultural]: 0.00011827 kg; = 0.000148371349213 + ( - 3.01012426563e-05)*heavyMetalUptakeSwitch; source Freiermuth R.  2006
  Comment on mathematicalRelation:
  0.000148371349213 from Calculated value - Freiermuth (2006). See 'WFLDB-Guidelines.pdf', available at https://ecoquery.ecoinvent.org/File/Reports.
  Heavy metal uptake can be excluded by setting the parameter heavyMetalUptakeSwitch to zero.
- tau-Fluvalinate [soil, agricultural]: 1.34115e-7 kg; lognormal variance with pedigree 0.0447216, pedigree (2,2,4,1,1)
  (same comment as for Aclonifen)
- Cadmium II [water, ground-]: 1.44752e-8 kg; source Freiermuth R.  2006; lognormal variance with pedigree 0.356938, pedigree (2,2,4,1,1)
  Calculated value - Freiermuth (2006). See 'WFLDB-Guidelines.pdf', available at https://ecoquery.ecoinvent.org/File/Reports.
- Cadmium II [water, surface water]: 1.01406e-8 kg; source Freiermuth R.  2006; lognormal variance with pedigree 0.356938, pedigree (2,2,4,1,1)
  (same comment as for Cadmium II)
- Chromium III [water, ground-]: 6.86382e-6 kg; source Freiermuth R.  2006; lognormal variance with pedigree 0.356938, pedigree (2,2,4,1,1)
  (same comment as for Cadmium II)
- Chromium III [water, surface water]: 1.13896e-6 kg; source Freiermuth R.  2006; lognormal variance with pedigree 0.356938, pedigree (2,2,4,1,1)
  (same comment as for Cadmium II)
- Copper ion [water, ground-]: 1.18576e-6 kg; source Freiermuth R.  2006; lognormal variance with pedigree 0.356938, pedigree (2,2,4,1,1)
  (same comment as for Cadmium II)
- Copper ion [water, surface water]: 9.66417e-7 kg; source Freiermuth R.  2006; lognormal variance with pedigree 0.356938, pedigree (2,2,4,1,1)
  (same comment as for Cadmium II)
- Lead II [water, ground-]: 4.72746e-8 kg; source Freiermuth R.  2006; lognormal variance with pedigree 0.356938, pedigree (2,2,4,1,1)
  (same comment as for Cadmium II)
- Lead II [water, surface water]: 2.24224e-7 kg; source Freiermuth R.  2006; lognormal variance with pedigree 0.356938, pedigree (2,2,4,1,1)
  (same comment as for Cadmium II)
- Mercury II [water, ground-]: 5.87105e-10 kg; source Freiermuth R.  2006; lognormal variance with pedigree 0.356938, pedigree (2,2,4,1,1)
  (same comment as for Cadmium II)
- Mercury II [water, surface water]: 3.26808e-9 kg; source Freiermuth R.  2006; lognormal variance with pedigree 0.356938, pedigree (2,2,4,1,1)
  (same comment as for Cadmium II)
- Nickel II [water, ground-]: 6.15849e-11 kg; source Freiermuth R.  2006; lognormal variance with pedigree 0.356938, pedigree (2,2,4,1,1)
  (same comment as for Cadmium II)
- Nickel II [water, surface water]: 8.27405e-7 kg; source Freiermuth R.  2006; lognormal variance with pedigree 0.356938, pedigree (2,2,4,1,1)
  (same comment as for Cadmium II)
- Nitrate [water, ground-]: 0.123755 kg; source Faist Emmenegger M. 2009; lognormal variance with pedigree 0.175866, pedigree (2,2,4,1,1)
- Phosphate [water, ground-]: 7.64734e-5 kg; source Prasuhn V.  2006; lognormal variance with pedigree 0.175866, pedigree (2,2,4,1,1)
  Calculated value - Prasuhn (2006). See 'WFLDB-Guidelines.pdf', available at https://ecoquery.ecoinvent.org/File/Reports.
- Phosphate [water, surface water]: 0.00022036 kg; source Prasuhn V.  2006; lognormal variance with pedigree 0.175866, pedigree (2,2,4,1,1)
  (same comment as for Phosphate)
- Phosphorus [water, surface water]: 1.7012e-5 kg; source Prasuhn V.  2006; lognormal variance with pedigree 0.175866, pedigree (2,2,4,1,1)
  Calculated value - Prasuhn (2006) and SQCB-Erosion. See 'WFLDB-Guidelines.pdf', available at https://ecoquery.ecoinvent.org/File/Reports.
- Zinc II [water, ground-]: 7.90725e-6 kg; source Freiermuth R.  2006; lognormal variance with pedigree 0.356938, pedigree (2,2,4,1,1)
  (same comment as for Cadmium II)
- Zinc II [water, surface water]: 1.73799e-6 kg; source Freiermuth R.  2006; lognormal variance with pedigree 0.356938, pedigree (2,2,4,1,1)
  (same comment as for Cadmium II)

## Sampling procedure
WFLDB Methodological Guidelines for the Life Cycle Inventory of Agricultural Products in the latest version, available at: (Report section: https://v30.ecoquery.ecoinvent.org/File/Reports). Data sources: Data were categorised from level 0 (L0) to level (L4) as follows: L0 = estimate, proxy; L1 = statistical data (e.g. FAOSTAT); L2 = L1 adapted to crop and country; L3 = literature data or L1 resp. L2 data approved by experts; medium detailing (i.e. kg of total N-fertiliser); L4 = L3 data of high detailing (i.e. portion N-fertiliser types).In this dataset data were obtained for yield: L1; Fertilisers: L0; Pesticides: L1; Machinery: L1/L2; Irrigation: L2. For information regarding the calculation of individual exchanges see supporting documentation WFLDB-Documentation.pdf.

## Extrapolations
If used, extrapolations are documented on the flow level.

## Review by Assumpció ANTON 2016-05-30
Be aware that the use of statistics in input calculations could provide some specific inputs not common for specific crops, this should be corrected if better information is available and better reflexed in DQR . Currently, I would dissent for some of good marks provided, being a revision of criteria applied advisable.
Pesticides will need to be amended periodically checking for update of pesticides' ban.
