# electricity production, hydro, aluminium industry

Dataset: EcoSpold 2, unit process
Geography: IAI Area, Asia, without China and GCC
Time period: 2015-01-01 to 2023-12-31
Technology level: current
Classification: ISIC rev.4 ecoinvent: 3510:Electric power generation, transmission and distribution
Classification: EcoSpold01Categories: hard coal/power plants
Tags: re-labelling activity; electricity, primary aluminium industry
Scenario: Business-as-Usual
System model: Allocation, cut-off by classification
Generated by: Pascal Lesage
Database: ecoinvent
isCopyrightProtected: true
accessRestrictedTo: 1

## General comment
This is a dataset used to create an aluminium industry specific electricity market for 'aluminium production Area 4/5' (Asia without China). The production volume represents the total amount of hydroelectricity used in the region for aluminium production (electrolysis and ingot casting). The dataset also identifies the technology and country providing the hydroelectricity in the region.
Electricity markets specific to the aluminium-industry are needed in an LCI database because primary aluminium production is very energy intensive, and hence the location of production plants is often determined by access to large amounts of cheap electricity, which often results in an electricity mix that is different from the general grid mix of the countries where the production plants are located.
It is assumed that the production of electricity in general and in aluminium industry specific power plants is identical. Details on actual electricity generation with each technology can be found in the corresponding datasets.
The share of hydroelectricity produced by the different technologies (reservoir, run-of-river, pumped storage) is calculated using both (1) estimates of the share of hydroelectricity coming from each country within Area 4/5 (using country-specific aluminium production volumes, supplied by the International Aluminium Institute, and International Energy Agency data on electricity sources within each country) and (2) ecoinvent v3.2 country-specific split of hydroelectricity into different technologies for IN, ID, JP MY, IR and TR. For countries whose electricity production is not modelled in ecoinvent (AZ, KZ and TJ), hydroelectricity is assumed to be produced in non-alpine reservoir hydroelectric plants.
Calculations are detailed in the report 'Calculating grid mixes for the aluminium industry in ecoinvent v3', available on the ecoinvent website.

## Included activities start
Re-labelling dataset, not representing a real transformation activity. Conceptually, the activity can be said to start with the production of electricity.

## Included activities end
Re-labelling dataset, not representing a real transformation activity. Conceptually, the activity can be said to end with a given amount of high voltage electricity labelled as specifically used for the production of electricity.

## Geography
Aluminium producing Asian countries (without China) (AZ, IN, ID, IR, JP, KZ, MY, TJ, TR)

## Time period
Production volume updated with 2015 data from IAI

## Reference product
- electricity, high voltage, aluminium industry: 1 kWh; = PS_JP+ResA_JP+ResNA_RoW+ResNA_TR+ResTro_ID+RoR_JP+RoR_MY+RoR_IR+RoR_TR; By-product classification allocatable product; CPC 17100: Electrical energy; HS2017 271600: Electrical energy
  Expressed as sum of contributing technologies (inputs) to allow uncertainty analysis: each technology share is uncertain, and in a Monte Carlo analysis will always be normalized by the sum contribution of each technology
  production volume 9.43919e9 kWh
    The production volume, which is ultimately used to determine the share of hydroelectricity in the downstream market for aluminium industry specific high voltage electricity, is calculated by multiplying the following data:
    (1) public estimates of the electricity mix used to produce aluminium in the 'aluminium production region 4/5' (Asia, without China), provided by the International Aluminium Institute (IAI), see http://www.world-aluminium.org/statistics/. These estimates are based on the subset of aluminium producers that provide information to the IAI.
    (2) primary aluminium production volumes of each aluminium producing country in Area 4/5, also provided by IAI.
    (3) global average electricity requirements, per tonne primary aluminium, for both Söderberg and prebake electrolysis technologies, as well as the Area 4/5-specific proportion of aluminium produced by each technology.
    (4) electricity compensating line and transformation losses from production to consumption as medium voltage electricity, Losses estimated using country-level ecoinvent v3.2 data for India, Indonesia, Japan, Malaysia and Turkey and ROW data for other Area 4/5 aluminium producing countries (AZ, KZ and TJ).
    (5) electricity consumed in ingot casting.
  property price 0.0977 EUR2005
    Calculated in temporary price data. 94% of the average price (to account for a 6% loss in transformation and transmission) for electricity for industrial consumersin 2005 (excluded taxes). From IEA.
  properties: carbon allocation 0 kg, carbon content 0

## Inputs from technosphere
All rows: lognormal variance with pedigree 0.0252, pedigree (4,5,4,1,2)
- electricity, high voltage: 0.277573 kWh; name RoR_JP
  Calculated amount (see general comments).
- electricity, high voltage: 0.563555 kWh; name ResNA_RoW
  Calculated amount (see general comments). Activity link to GLO due to the elcetricity production of some aluminium producing countries not being modeled in ecoinvent, see general comments.
- electricity, high voltage: 0.0351777 kWh; name ResTro_ID
  Calculated amount (see general comments).
- electricity, high voltage: 0.0600381 kWh; name RoR_IR
  Calculated amount (see general comments).
- electricity, high voltage: 0.0203526 kWh; name RoR_TR
  Calculated amount (see general comments).
- electricity, high voltage: 0.0010039 kWh; name ResA_JP
  Calculated amount (see general comments).
- electricity, high voltage: 0.0313339 kWh; name RoR_MY
  Calculated amount (see general comments).
- electricity, high voltage: 0.0108926 kWh; name ResNA_TR
  Calculated amount (see general comments).
- electricity, high voltage: 7.2591e-5 kWh; name PS_JP
  Calculated amount (see general comments).

## Sampling procedure
IAI data used for total electricity used in the production of aluminium that is from hydroelectric plants. ecoinvent data used to split hydroelectricity production to the respective technologies (reservoir, run-of-river, pumped storage). The cited 84% representativeness is for IAI data (data based on 84% of regional aluminium production). The percent representativeness of data used to split hydroelectricity production to different types of plants (national grid proxy) is 44% - non alpine reservoir plant is an assumption for 56% of hydroelectricity (that from AZ, KZ, TJ).

## Extrapolations
For the split of hydroelectricity production to the respective technologies (reservoir, run-of-river, pumped storage), shares of different types of hydroelectric plants in the countries, when available, were used as a proxy for the split relevant for the aluminium industry, see general comments.

## Review by Emilia Moreno Ruiz 2017-08-15
The electric mix has been adapted to the database newest developments
