# butadiene purification, extractive distillation of crude butadiene

Dataset: EcoSpold 2, unit process
Geography: RoW
Time period: 2019-01-01 to 2023-12-31
Technology level: current
Classification: ISIC rev.4 ecoinvent: 2011:Manufacture of basic chemicals
Synonyms: extractive distillation
Scenario: Business-as-Usual
System model: Allocation, cut-off by classification
Generated by: Thomas Fröhlich
Published in: IFEU/PlasticsEurope 2021
Database: ecoinvent
isCopyrightProtected: true
accessRestrictedTo: 1

## General comment
This process describes the purification of crude butadiene from steam cracking to 1 kg of pure butadiene by extractive distillation,
This dataset was extrapolated from the European dataset (IFEU/PlasticsEurope, 2021). Therefore the European feedstock mix was applied in the upstream steam cracking activity. The used feedstock is as follows(share by mass): butane (16.2%), ethane (4.5%), naphtha (64%), natural gas liquids (2.2%), propane (7.6%), refinery gas (1.5%) and atmospheric gas oil (4%, proxied by diesel).
Butadiene cannot be separated from this C4 hydrocarbon mixture by simple distillation, because 1,3-butadiene and butane form an azeotrope. The method of choice for the isolation of butadiene from C4 fractions is extractive distillation with selective organic solvents.
References:
Grub, J.; Löser, E. (2011): Butadiene, Ullmann's Encyclopedia of Industrial Chemistry, Wiley-VCH.
IFEU/PlasticsEurope (2021): Eco-profile of Steam Cracker Products: Ethylene, Propylene, Butadiene, Pyrolysis Gasoline, Ethylene Oxide (EO), Ethylene Glycols (MEG, DEG, TEG)

## Included activities start
The activity starts with the raw materials entering the purification process.

## Included activities end
The activity ends with butadiene being ready for further processing or transportation at the production site gate. The dataset includes the input materials, energy uses, infrastructure and emissions.

## Geography
This dataset was extrapolated from the European dataset (IFEU/PlasticsEurope, 2021). Therefore the European feedstock mix was applied in the upstream steam cracking activity. Representativeness estimated for min. 80 % of European (EU + GB, NO, CH) production.

## Technology
This dataset was extrapolated from the European dataset (IFEU/PlasticsEurope, 2021). Therefore the European feedstock mix was applied in the upstream steam cracking activity. The used feedstock is as follows(share by mass): butane (16.2%), ethane (4.5%), naphtha (64%), natural gas liquids (2.2%), propane (7.6%), refinery gas (1.5%) and atmospheric gas oil (4%, proxied by diesel).
Butadiene cannot be separated from the C4 hydrocarbon mixture leaving the steam cracker by simple distillation, since butadiene and butane form an azeotrope. The most applied methods are liquid-liquid extraction and extractive distillation.
The method of choice for this dataset is isolation of butadiene by extractive distillation with N-methylpyrrolidone as a solvent (BASF-NMP).
The process consists of four subprocesses, C3 predistillation, extractive distillation, degassing and butadiene distillation,
In the C3 predistillation, the more unsaturated hydrocarbons, e.g. acetylenes and diolefins, are dissolved in NMP, whilst the butenes/butanes are removed from the top of the washer.
In the extractive distillation step, the C4 acetylenes and part of the 1,2-butadiene are removed from the bottom of the tower. This is possible since these substances are more soluble in NMP than 1,3-butadiene.
The 1,3-butadiene is removed from the top of the tower and is separated from the additional compounds (propyne and C5 hydrocarbons) by degasing
In a final step, the 1,3-butadiene is distilled.
References:
Grub, J.; Löser, E. (2011): Butadiene, Ullmann's Encyclopedia of Industrial Chemistry, Wiley-VCH.
IFEU/PlasticsEurope (2021): Eco-profile of Steam Cracker Products: Ethylene, Propylene, Butadiene, Pyrolysis Gasoline, Ethylene Oxide (EO), Ethylene Glycols (MEG, DEG, TEG)
BASF: BASF Butadiene Extraction Technology, available here: https://www.basf.com/cn/en/products/chemicals/Intermediates/solutions/butadiene-extraction.html#accordion_v2-2f5da26453-item-eb411fc36e, last accessed 03-02-2023.

## Time period
Data collection 2019/2020. The technology is not expected to change within 5 years.

## Reference product
- butadiene: 1 kg; name RP; By-product classification allocatable product; CPC 34720: Polymers of styrene, in primary forms; HS2017 271114: Petroleum gases and other gaseous hydrocarbons; liquefied, ethylene, propylene, butylene and butadiene; CAS 106-99-0
  production volume 1.497e10 kg; name PV_butadiene
    The annual Global production capacity of butadiene in 2020 was 17.12E9 kg.
    Reference:
    Statista (2023): https://www.statista.com/statistics/1067436/global-butadiene-production-capacity/, last accessed 23-05-2023.
  property heating value, net 40.35 MJ
    LHV is calculated based on the elemental composition of the substance. Based on the name of the substance, the chemical formula of the substance is assumed to be: C4H6
  property price 0.985469 EUR2005
    Price average of 2017-2019.
    Based on statista: Price of butadiene worldwide from 2017 to 2019 with estimated figures for 2020 to 2022, available here: https://www.statista.com/statistics/1171063/price-butadiene-forecast-globally/, last accessed 2022-10-28.
    The prices were converted to EUR based on the annual exchange rates published by the European Central Bank (https://sdw.ecb.europa.eu/quickview.do?SERIES_KEY=120.EXR.A.USD.EUR.SP00.A, last accessed on 2022-02-15) and adjusted for inflation relative to 2005 using the producer price index (PPI) of the euro area, published by eurostat (https://ec.europa.eu/eurostat/databrowser/view/STS_INPP_A__custom_6416181/default/table?lang=en, last accessed on 2022-05-04).
  properties: carbon allocation 0.857143 kg, carbon content 0.857143, carbon content, fossil 0.857143, carbon content, non-fossil 0, dry mass 1 kg, water content 0, water in wet mass 0 kg, wet mass 1 kg

## Inputs from technosphere
- N-methyl-2-pyrrolidone: 9e-5 kg; lognormal variance with pedigree 0.0192, pedigree (2,5,1,5,3)
  European average value, based on industrial survey, representative for min. 80 % of European (EU + GB, NO, CH) production.
  IFEU/PlasticsEurope (2021): Eco-profile of Steam Cracker Products: Ethylene, Propylene, Butadiene, Pyrolysis Gasoline, Ethylene Oxide (EO), Ethylene Glycols (MEG, DEG, TEG)
  properties: carbon content, fossil 0.585366, dry mass 1 kg, heating value, net 29.36 MJ, wet mass 1 kg
- butadiene, crude: 1.02041 kg; name butadiene_crude; lognormal variance with pedigree 0.0192, pedigree (2,5,1,5,3)
  (same comment as for N-methyl-2-pyrrolidone)
  property heating value, net 40.35 MJ; name butadiene_crude_Net_Heat_Value
  properties: carbon content, fossil 0.857143, dry mass 1 kg, wet mass 1 kg
  note on heating value, net: Measure of the thermal energy produced during the combustion of a product. Expressed in MJ per unit of product.
- chemical factory, organics: 4e-10 unit; lognormal variance with pedigree 0.3446, pedigree (2,4,1,5,4)
  Calculated based on literature data published by the industry. For this activity, no information was readily available concerning infrastructure and land-use. Therefore, the infrastructure is estimated based on data from two chemical factories, the BASF site of Ludwigshafen and the chemical factory in Gendorf (which are both located in Germany), which produce a wide range of chemical substances. Based on this data, the following assumptions are made: the built area amounts to about 4.2 ha, the plant has an average output of 50'000 t/a and a lifespan of fifty years. The estimated infrastructure amount is therefore 4.00 E-10 units per kg of produced chemical.
  References:
  Althaus H.-J., Chudacoff M., Hischier R., Jungbluth N., Osses M. and Primas A. (2007) Life Cycle Inventories of Chemicals. ecoinvent report No. 8, v2.0. EMPA Dübendorf, Swiss Centre for Life Cycle Inventories, Dübendorf, CH.
  Gendorf (2000) Umwelterklärung 2000, Werk Gendorf. Werk Gendorf, Burgkirchen.
- electricity, medium voltage: 0.00664656, 0.132584, 0.0445478, 0.00203541, 0.000407384, 8.74745e-5, 0.0136914 kWh (7 suppliers, which the file names only by identifier); sum of these 0.2 kWh; lognormal variance with pedigree 0.0192, pedigree (2,5,1,5,3)
  (same comment as for N-methyl-2-pyrrolidone)
- hazardous waste, for incineration: -9e-5 kg; name hazwaste; lognormal variance with pedigree 0.0132, pedigree (2,4,1,5,3)
  European average value, based on industrial survey, representative for min. 80 % of European (EU + GB, NO, CH) production.
  This waste consists of N-methyl-2-pyrrolidone.
  IFEU/PlasticsEurope (2021): Eco-profile of Steam Cracker Products: Ethylene, Propylene, Butadiene, Pyrolysis Gasoline, Ethylene Oxide (EO), Ethylene Glycols (MEG, DEG, TEG)
  production volume; name PV_hazwaste; = hazwaste/RP*PV_butadiene
    Calculated from production volume of reference product using the relative outputs.
  properties: carbon content, fossil 0.554667, dry mass 0.75 kg, heating value, net 17 MJ, water content 0.333333, wet mass 1 kg
  note on carbon content, fossil: Tab A.6, ecoinvent v2.2 report 13_I. C content has been calculated after data in the tables, and then referred to 1 kg DM
  note on heating value, net: Value taken from the general comment of the treatment dataset.
- heat, from steam, in chemical industry: 6.23385 MJ; lognormal variance with pedigree 0.0192, pedigree (2,5,1,5,3)
  (same comment as for N-methyl-2-pyrrolidone)
  properties: heating value, net 1 MJ

## Inputs from nature
- Water, cooling, unspecified natural origin [natural resource, in water]: 0.15 m3; lognormal variance with pedigree 0.0132, pedigree (2,4,1,5,3)
  (same comment as for N-methyl-2-pyrrolidone)

## Emissions to nature
- Water [water, unspecified]: 0.15 m3; lognormal variance with pedigree 0.0526, pedigree (2,4,1,5,3)
  (same comment as for N-methyl-2-pyrrolidone)

## Sampling procedure
Extrapolation from European dataset. Industry survey complemented with literature data and data from the Reference Document on Best Available Techniques in the Large Volume Organic Chemical Industry (2017)

## Extrapolations
Extrapolation from European dataset. Uncertainty has been adjusted accordingly.
