# silicon production, single crystal, Czochralski process, electronics

Dataset: EcoSpold 2, unit process
Geography: RER
Time period: 1992-01-01 to 2023-12-31
Technology level: current
Classification: EcoSpold01Categories: photovoltaic/production of components
Classification: ISIC rev.4 ecoinvent: 2011:Manufacture of basic chemicals
Synonyms: Czochralski process
Tags: ConvertedDataset
Scenario: Business-as-Usual
System model: Allocation, cut-off by classification
Share of production covered: 10 %
Generated by: Niels Jungbluth
Published in: Jungbluth, N. 2007
Database: ecoinvent
isCopyrightProtected: true
accessRestrictedTo: 1

## General comment
Production of a monocrystalline block with a diameter of 130mm and a length of 150cm. Losses of non-recycled material due to block cutting are included.
[This dataset was already contained in the ecoinvent database version 2. It was not individually updated during the transfer to ecoinvent version 3. Life Cycle Impact Assessment results may still have changed, as they are affected by changes in the supply chain, i.e. in other datasets. This dataset was generated following the ecoinvent quality guidelines for version 2. It may have been subject to central changes described in the ecoinvent version 3 change report (http://www.ecoinvent.org/database/ecoinvent-version-3/reports-of-changes/), and the results of the central updates were reviewed extensively. The changes added e.g. consistent water flows and other information throughout the database. The documentation of this dataset can be found in the ecoinvent reports of version 2, which are still available via the ecoinvent website. The change report linked above covers all central changes that were made during the conversion process.]

## Included activities end
Gate to gate inventory for the Czochralski process. Crushing of Si, etching with HNO3, HF and acetic acid. Melting in a silica pot and crystallisation to produce a monocrystalline material. Water emissions roughly estimated. Process emissions to air are not known.

## Geography
Data for a plant in DE and estimation for RER.

## Technology
Czochralski process for production of monocrystalline silicon blocks. Than edges are sliced and blocks are sawn.

## Time period
Most data are published in 2006. Some older data published in 1992.

## Parameters
- fraction, cooling water, cooling pond system, to air: 0.032 dimensionless; name fraction_CW_CP_to_air; lognormal variance with pedigree 0.0413, pedigree (2,3,1,3,1)
  Calculated based on literature value (Scown, C.D., 2011, Water Footprint of U.S. Transportation Fuels and supplying information of the article) (Vionnet, S., Quantis Water Database - Technical Report, 2012).
- fraction, cooling water, once-through system, to air: 0.004 dimensionless; name fraction_CW_OT_to_air; lognormal variance with pedigree 0.0413, pedigree (2,3,1,3,1)
  (same comment as for fraction, cooling water, cooling pond system, to air)
- fraction, cooling water, recirculating system, to air: 0.771 dimensionless; name fraction_CW_R_to_air; lognormal variance with pedigree 0.0413, pedigree (2,3,1,3,1)
  (same comment as for fraction, cooling water, cooling pond system, to air)
- fraction, cooling water, to air: 0.3875 dimensionless; name fraction_CW_to_air; = (0.5*fraction_CW_OT_to_air)+(0.5*fraction_CW_R_to_air); lognormal variance with pedigree 0.092025, pedigree (4,4,3,2,4)
  Calculated value based on literature value (see comments of the other parametres present in this dataset) and expert opinion. In the case when no industry/literature data are available about the type of cooling or directly fraction, cooling water, to air specific for the process a default assumption is applied. It is assumed that the once-through cooling system is used in 50% of all cases and recirculating system is used in another 50% of all cases.
- fraction, process water, to air: 0.15 dimensionless; name fraction_PW_to_air; lognormal variance with pedigree 0.092025, pedigree (4,4,3,2,4)
  Literature value. In case when no industry/process specific data are available, default evaporation fraction value is used. This value is 15% and is based on literature (Statistics Canada, 2007 & Shaffer, K.H., 2008, Consumptive water use in the Great Lakes Basin, USGS & Shiklomanov, 2003, World Water Resources at the Beginning of the 21st Century) and has been approved by an expert.
- fraction, tap water, to air: 0.15 dimensionless; name fraction_TW_to_air; = fraction_PW_to_air; lognormal variance with pedigree 0.092025, pedigree (4,4,3,2,4)
  Calculated value. See comment in the other parametres present in this dataset. Tap water is considered to be always used as process water, thus process water fractions to air are applied to all tap water input flows to calculate the amount of water consumed in the processes.

## Reference product
- silicon, single crystal, Czochralski process, electronics: 1 kg; By-product classification allocatable product; CPC 34250: Salts of oxometallic or peroxometallic acids; colloidal precious metals and compounds thereof; inorganic and o[…]; HS2017 381800: Chemical elements; doped for use in electronics, in the form of discs, wafers or similar forms; chemical co[...]; CAS 7440-21-3
  EcoSpold01Location=RER
  production volume 1.32237 kg
    This is a placeholder value that does not reflect real-world production volumes. This dataset does not currently require a real-world production volume to work in the database framework, and no actual data were collected yet. This has no negative effect on the results of the ecoinvent database. The placeholder value of this activity was scaled according to the nominal GDP of 2005 (source: United Nations, http://data.un.org/Glossary.aspx?q=GDP+%28current+US%24%29, accessed 20130726) to reflect an appropriate share of the global production volume, which is also a placeholder value.
  property carbon content, fossil 0
    The product is Czochralski singlecrystalline silicon (CZ-sc-Silicon). (ecoinvent v2.2 report 6_XII)
  property carbon content, non-fossil 0
    (same comment as for silicon, single crystal, Czochralski process, electronics)
  property price 123.522 EUR2005
    Calculated based on inputs: The price of the product has been calculated as a sum of the values of the material and energy inputs for this product. This value is therefore a rough estimation. It may underestimate the real price since there are additional expenses when producing any product. These expences can include for example labour costs, treatment of waste materials and profit for the producer. Please consider carefully whether this level of data quality is acceptable for your application.
  properties: carbon allocation 0 kg, carbon content 0, dry mass 1 kg, water content 0, water in wet mass 0 kg, wet mass 1 kg

## Inputs from technosphere
- acetic acid, without water, in 98% solution state: 0.10797 kg; lognormal variance with pedigree 0.0721, pedigree (3,4,5,3,3)
  EcoSpold01Location=RER
  For etching, Hagedorn 1992
  Uncertainty: For etching, Hagedorn 1992
  properties: carbon content, fossil 0.400016, dry mass 1 kg, heating value, net 14.6 MJ, wet mass 1 kg
  note on heating value, net: Based on literature, page 10, Althaus H.-J., Chudacoff M., Hischier R., Jungbluth N., Osses M. and Primas A. (2007) Life Cycle Inventories of Chemicals. Final report ecoinvent data v2.0 No. 8. EMPA, Swiss Centre for Life Cycle Inventories, Dübendorf, CH, Online-Version under: www.ecoinvent.org.
- acetone, liquid: 0.049003 kg; lognormal variance with pedigree 0.0721, pedigree (3,4,5,3,3)
  EcoSpold01Location=RER
  For etching, Hagedorn 1992
  Uncertainty: For etching, Hagedorn 1992
  properties: carbon content, fossil 0.62069, dry mass 1 kg, heating value, net 31.32 MJ, wet mass 1 kg
- argon, liquid: 5.7944 kg; lognormal variance with pedigree 0.052025, pedigree (1,4,5,2,1)
  De Wild 2007, protection gas for crystal growing
  EcoSpold01Location=RER
  Uncertainty: de Wild 2007, protection gas for crystal growing
  properties: dry mass 1 kg, wet mass 1 kg
- ceramic tile: 0.33645 kg; lognormal variance with pedigree 0.052025, pedigree (1,4,5,2,1)
  EcoSpold01Location=CH
  De Wild 2007, quartz crucible for melting the silicon
  Uncertainty: de Wild 2007, quartz crucible for melting the silicon
  properties: dry mass 1 kg, wet mass 1 kg
- electricity, medium voltage: 200 kWh; lognormal variance with pedigree 0.052025, pedigree (1,4,5,2,1)
  EcoSpold01Location=UCTE
  Environmental report Wacker 2006
  Uncertainty: Environmental report Wacker 2006
- heat, district or industrial, natural gas: 243 MJ; lognormal variance with pedigree 0.052025, pedigree (1,4,5,2,1)
  Environmental report Wacker 2006
  EcoSpold01Location=RER
  Uncertainty: Environmental report Wacker 2006
  properties: heating value, net 1 MJ
- hydrogen fluoride: 0.050664 kg; lognormal variance with pedigree 0.0721, pedigree (3,4,5,3,3)
  EcoSpold01Location=GLO
  For etching, Hagedorn 1992
  Uncertainty: For etching, Hagedorn 1992
  properties: dry mass 1 kg, heating value, net 6.06 MJ, wet mass 1 kg
- lime, hydrated, packed: 0.19103 kg; lognormal variance with pedigree 0.0721, pedigree (3,4,5,3,3)
  EcoSpold01Location=CH
  Waste water treatment, Hagedorn 1992
  Uncertainty: waste water treatment, Hagedorn 1992
  properties: dry mass 0.997 kg, water content 0.00300903, wet mass 1 kg
- nitric acid, without water, in 50% solution state: 0.094684 kg; lognormal variance with pedigree 0.0721, pedigree (3,4,5,3,3)
  For etching, Hagedorn 1992
  EcoSpold01Location=RER
  Uncertainty: For etching, Hagedorn 1992
  properties: dry mass 1 kg, wet mass 1 kg
- silicon, electronics grade: 1.4286 kg; lognormal variance with pedigree 0.052025, pedigree (1,4,5,2,1)
  Environmental report Wacker 2006
  EcoSpold01Location=DE
  Uncertainty: Environmental report Wacker 2006
  properties: dry mass 1 kg, wet mass 1 kg
- silicone factory: 1e-11 unit; lognormal variance with pedigree 0.3581, pedigree (1,2,5,1,3)
  EcoSpold01Location=RER
  Estimation
  Uncertainty: Estimation
- sodium hydroxide, without water, in 50% solution state: 0.041528 kg; lognormal variance with pedigree 0.0721, pedigree (3,4,5,3,3)
  EcoSpold01Location=RER
  Waste gas neutralization, Hagedorn 1992
  Uncertainty: waste gas neutralization, Hagedorn 1992
  properties: dry mass 1 kg, heating value, net 3.03 MJ, wet mass 1 kg
- tap water: 94.073 kg; name tap_water_input; lognormal variance with pedigree 0.052025, pedigree (1,4,5,2,1)
  (same comment as for heat, district or industrial, natural gas)
  properties: carbon content, fossil 0.00178991, dry mass 0.000337476 kg, water content 2962.17, wet mass 1 kg
  note on carbon content, fossil: Bicarbonate content is 2.93 mol/m3. CO2 content is 0.1 mol/m3 (ecoinvent v2.2 report 8, Tab 93.1).
- waste, from silicon wafer production, inorganic: -0.55965, -3.07675 kg (2 suppliers, which the file names only by identifier); sum of these -3.6364 kg; lognormal variance with pedigree 0.012025, pedigree (1,4,1,2,1)
  EcoSpold01Location=CH
  Environmental report Wacker
  Uncertainty: Environmental report Wacker
  production volume
    Calculated from the production volume of silicon, single crystal, Czochralski process, electronics in proportion to the respective output amounts.
  properties: carbon content, fossil 0.0347572, dry mass 0.906 kg, water content 0.103753, wet mass 1 kg

## Inputs from nature
- Water, cooling, unspecified natural origin [natural resource, in water]: 2.333 m3; name water_cooling_UNO_input; lognormal variance with pedigree 0.052025, pedigree (1,4,5,2,1)
  Environmental report Wacker 2006
  Uncertainty: Environmental report Wacker 2006
- Water, river [natural resource, in water]: 2.0508 m3; name water_river_input; lognormal variance with pedigree 0.052025, pedigree (1,4,5,2,1)
  Environmental report Wacker 2006
  Uncertainty: Environmental report Wacker 2006

## Emissions to nature
- Water [air, unspecified]: 1.22577 m3; name water_to_air_unspecified; = (tap_water_input/1000*fraction_TW_to_air)+(water_cooling_UNO_input*fraction_CW_to_air)+(water_river_input*fraction_PW_to_air); lognormal variance with pedigree 0.0807, pedigree (2,2,5,1,1)
  Calculated value based on literature values and expert opinion. See comments in the parametres' comment field.
  property fraction, origin: fresh water 0.262473; name fraction_origin_fresh_water
  property fraction, origin: salt water 0; name fraction_origin_salt_water
  property fraction, origin: unspecified 0.737527; name fraction_origin_unspecified
- Acetic acid [water, surface water]: 0.053987 kg; lognormal variance with pedigree 0.3541, pedigree (3,4,5,3,1)
  Hagedorn 1992, 50% emission, basic uncertainty = 3
  Uncertainty: Hagedorn 1992, 50% emission, basic uncertainty = 3
- BOD5, Biological Oxygen Demand [water, surface water]: 0.13034 kg; lognormal variance with pedigree 0.388, pedigree (5,5,5,1,1)
  Extrapolation for sum parameter
  Uncertainty: Extrapolation for sum parameter
- COD, Chemical Oxygen Demand [water, surface water]: 0.13034 kg; lognormal variance with pedigree 0.388, pedigree (5,5,5,1,1)
  Extrapolation for sum parameter
  Uncertainty: Extrapolation for sum parameter
- DOC, Dissolved Organic Carbon [water, surface water]: 0.040475 kg; lognormal variance with pedigree 0.388, pedigree (5,5,5,1,1)
  Extrapolation for sum parameter
  Uncertainty: Extrapolation for sum parameter
- Fluoride [water, surface water]: 0.0023713 kg; lognormal variance with pedigree 0.3541, pedigree (3,4,5,3,1)
  Hagedorn 1992, 50% reduction, basic uncertainty = 3
  Uncertainty: Hagedorn 1992, 50% reduction, basic uncertainty = 3
- Hydrocarbons, unspecified [water, surface water]: 0.022841 kg; lognormal variance with pedigree 0.3541, pedigree (3,4,5,3,1)
  (same comment as for Fluoride)
- Hydroxide [water, surface water]: 0.0074169 kg; lognormal variance with pedigree 0.3541, pedigree (3,4,5,3,1)
  (same comment as for Fluoride)
- Nitrogen [water, surface water]: 0.0091039 kg; lognormal variance with pedigree 0.0941, pedigree (3,4,5,3,1)
  Environmental report Wacker 2006, 50% of total emissions
  Uncertainty: Environmental report Wacker 2006, 50% of total emissions
- TOC, Total Organic Carbon [water, surface water]: 0.040475 kg; lognormal variance with pedigree 0.388, pedigree (5,5,5,1,1)
  Extrapolation for sum parameter
  Uncertainty: Extrapolation for sum parameter
- Water [water, unspecified]: 3.2521 m3; name water_to_water_unspecified; = (tap_water_input/1000)*(1-fraction_TW_to_air)+water_cooling_UNO_input*(1-fraction_CW_to_air)+water_river_input*(1-fraction_PW_to_air); lognormal variance with pedigree 0.0807, pedigree (2,2,5,1,1)
  (same comment as for Water)
  property carbon content, fossil 0; name C_content_fossil
  property carbon content, non-fossil 0; name C_content_non_fossil
  property dry mass 0 kg; name DM
  property fraction, origin: fresh water 0.560604; name fraction_origin_fresh_water_Ww
  property fraction, origin: salt water 0; name fraction_origin_salt_water_Ww
  property fraction, origin: unspecified 0.439396; name fraction_origin_unspecified_Ww
  property water in wet mass 1000 kg; name WWM
  property wet mass 1000 kg; name WM

## Sampling procedure
Publication of plant specific (partly aggregated) data.

## Review by Roberto Dones 2007-09-13
Passed.
none
