# light fuel oil, import from Europe

Dataset: EcoSpold 2, unit process
Geography: CH
Time period: 2000-01-01 to 2023-12-31
Technology level: old
Classification: ISIC rev.4 ecoinvent: 1920:Manufacture of refined petroleum products
Scenario: Business-as-Usual
System model: Allocation, cut-off by classification
Generated by: Carl Vadenbo
Published in: Jungbluth, N. 2018
Database: ecoinvent
isCopyrightProtected: true
accessRestrictedTo: 1

## General comment
This dataset represents the import of a refined petroleum product (light fuel oil, LFO) from Europe (without Switzerland) into Switzerland.

## Included activities start
This activity starts with the supply of the finished petroleum product from petroleum refinery operation in Europe without Switzerland.

## Included activities end
This activity covers the transport requirements for import of the finished petroleum product to Switzerland. Only transport of the product to Switzerland is considered here, whereas losses and infrastructure requirements during the import activities are omitted.

## Geography
Switzerland

## Reference product
- light fuel oil: 1 kg; By-product classification allocatable product; CPC 33370: Fuel oils n.e.c.; HS2017 271012: Petroleum oils and oils from bituminous minerals, not containing biodiesel, not crude, not waste oils; prep[...]
  production volume 1.176e9 kg
    From Swiss energy statistics for 2022 (BFE 2023. Schweizerische Gesamtenergiestatistik 2022, table 21. Available from: https://www.bfe.admin.ch/bfe/de/home/versorgung/statistik-und-geodaten/energiestatistiken/gesamtenergiestatistik.html/)
  property calculation property, kg 0 kg
    Mass output. Defined here for use in the combined production calculations.
  property price 0.268 EUR2005
    Temporary price data. Calculated as 90% of purchasers price based on: Source: International Energy Agency (http://wds.iea.org/WDS/TableViewer/tableView.aspx downloaded 4 July 2009) for Germany excl. Taxes, applying fuel oil density of 0.944 kg/litre
  properties: carbon allocation 0.862 kg, carbon content 0.862, carbon content, fossil 0.862, carbon content, non-fossil 0, dry mass 1 kg, heating value, net 42.6 MJ, water content 0, water in wet mass 0 kg, wet mass 1 kg

## Inputs from technosphere
- light fuel oil: 1 kg
  properties: carbon content, fossil 0.862, dry mass 1 kg, heating value, net 42.6 MJ, wet mass 1 kg
- transport, freight train: 0.281 metric ton*km; source Jungbluth, N. 2007; lognormal variance with pedigree 0.1221, pedigree (3,2,1,1,1)
  Amount based on transport requirements for import of mineral oil products from Europe to Switzerland for the year 2016, in Jungbluth & Meili (2018), table 8.1. Reference: Jungbluth, N. & Meili, C. (2018) Life cycle inventories of oil products - final report. ESU-services Ltd. Available from: https://esu-services.ch/data/public-lci-reports/
- transport, freight, inland waterways, barge tanker: 0.263 metric ton*km; source Jungbluth, N. 2007; lognormal variance with pedigree 0.1221, pedigree (3,2,1,1,1)
  (same comment as for transport, freight train)
- transport, freight, lorry, unspecified: 0.044 metric ton*km; source Jungbluth, N. 2007; lognormal variance with pedigree 0.1221, pedigree (3,2,1,1,1)
  (same comment as for transport, freight train)
- transport, pipeline, onshore, petroleum: 0.069 metric ton*km; source Jungbluth, N. 2007; lognormal variance with pedigree 0.1221, pedigree (3,2,1,1,1)
  (same comment as for transport, freight train)

## Sampling procedure
Transport distances were sourced from Jungbluth & Meili (2018) Life cycle inventories of oil products distribution, table 8.1, which where based on estimated distances and modes of transport from the main countries of origin in 2016. The annual gross import (i.e., production volume of the activity) to Switzerland was taken from Swiss energy statistics for 2022 (BFE 2023. Schweizerische Gesamtenergiestatistik 2022, table 21. Available from: https://www.bfe.admin.ch/bfe/de/home/versorgung/statistik-und-geodaten/energiestatistiken/gesamtenergiestatistik.html/)
