# cement production, Portland

Dataset: EcoSpold 2, unit process
Geography: CH
Time period: 2017-01-01 to 2023-12-31
Technology level: current
Classification: ISIC rev.4 ecoinvent: 2394:Manufacture of cement, lime and plaster
Synonyms: Portland cement; CEM I
Scenario: Business-as-Usual
System model: Allocation, cut-off by classification
Share of production covered: 100 %
Generated by: Frank Werner
Published in: Werner F. 2022
Database: ecoinvent
isCopyrightProtected: true
accessRestrictedTo: 1

## General comment
The dataset describes the production of cement Portland (CEM I) in Switzerland and covers the representative production mix of CEM I 42.5 R and N as well as CEM I 52.5 R and N as defined in SN EN 197-1.
In Switzerland, according to the Swiss standard SN EN 197-1:2011, cement CEM I, also known as Portland cement, has 95-100% of clinker in its composition.

## Included activities start
The activity starts with the clinker in the silo to be used for cement production and with the additional ingredients of the cement at the gate of the cement plant. The dataset includes energy use, input of grinding aids and input of infrastructure.

## Included activities end
The activity ends with the cement produced in the cement mill. The dataset does not include particulate emission, packaging and administration.

## Geography
This dataset represents production of cement Portland (CEM I) for Switzerland.

## Technology
In this dataset, the production of CEM I is described, where clinker (91.9%) is ground together with gypsum (4.99%) and mixed with limestone (0.98%). The activity includes also the input of electricity used for the grinding of the clinker and grinding aids (ethylene glycol and iron sulfate).

## Time period
Time period corresponds to data collection (2017-2021).

## Reference product
- cement, Portland: 1 kg; name cement; source Werner F. 2022; By-product classification allocatable product; CPC 37440: Portland cement, aluminous cement, slag cement and similar hydraulic cements, except in the form of clinkers; HS2017 252329: Cement; portland, other than white, whether or not artificially coloured; CAS 65997-15-1
  Value provided by cemsuisse as an average from all cement producing plants in Switzerland.
  production volume 2.38089e8 kg; name APV_cement; = 4177*10^6*0.057
    Total production volume of cement in Switzerland in 2021: 4'177'000 metric ton. Market share of cement, Portland is 5.7%. Source: cemsuisse (2022), Jahresbericht cemsuisse 2022, page 9. Available at: https://www.cemsuisse.ch/jahresberichte/, accessed on 20.06.2023.
  property price 0.0541 EUR2005
    2005 import and export prices (total trades (USD) divided by total weight (kg) in China, India, USA, Japan, Russia and Europe, major producers and consumers (http://www.cementchina.net/freport/showfre.asp?id=749) from UN Commodity Trade Statistics Database (http://data.un.org/Explorer.aspxDatabase [Accessed 2 July 2010]). Commodity: Portland cement, other than white cement
  properties: carbon allocation 0 kg, carbon content 0, carbon content, fossil 0, carbon content, non-fossil 0, dry mass 1 kg, water content 0, water in wet mass 0 kg, wet mass 1 kg

## Inputs from technosphere
All rows: source Werner F. 2022
- cement factory: 5.36e-11 unit; = 5,36E-11*cement; lognormal variance with pedigree 0.3086, pedigree (2,1,4,1,1)
  Value provided by cemsuisse as an average from all cement producing plants in Switzerland.
  This exchange has an activity link directly to the producing activity because the product is primarily consumed in the same geographical area where it is produced.
- clinker: 0.919 kg; = 0.919*cement; lognormal variance with pedigree 0.0086, pedigree (1,1,4,1,1)
  Value provided by cemsuisse as an average from all cement producing plants in Switzerland. An activity-link was added to this exchange to "clinker production / CH", since clinker is produced in the same factory as the cement is produced.
  properties: dry mass 1 kg, wet mass 1 kg
- electricity, medium voltage: 0.0457 kWh; = 0.0457*cement; lognormal variance with pedigree 0.0086, pedigree (1,1,4,1,1)
  Value provided by cemsuisse as an average from all cement producing plants in Switzerland.
- ethylene glycol: 0.000102 kg; = 0.000102*cement; lognormal variance with pedigree 0.0086, pedigree (1,1,4,1,1)
  Ancillary product for grinding; value provided by cemsuisse as an average from all cement producing plants in Switzerland.
  properties: carbon content, fossil 0.387097, dry mass 1 kg, heating value, net 23.44 MJ, wet mass 1 kg
- gypsum, mineral: 0.0499 kg; = 0.0499*cement; lognormal variance with pedigree 0.0086, pedigree (1,1,4,1,1)
  Value provided by cemsuisse as an average from all cement producing plants in Switzerland.
  properties: dry mass 1 kg, wet mass 1 kg
- iron sulfate: 0.00479 kg; = 4.79E-3*cement; lognormal variance with pedigree 0.0086, pedigree (1,1,4,1,1)
  (same comment as for cement factory)
  properties: dry mass 1 kg, wet mass 1 kg
- limestone, crushed, for mill: 0.00976 kg; name limestone; = 0.00976*cement; lognormal variance with pedigree 0.0086, pedigree (1,1,4,1,1)
  Value provided by cemsuisse as an average from all cement producing plants in Switzerland.
  properties: carbon content, fossil 0.117492, dry mass 0.998 kg, water content 0.00200401, wet mass 1 kg
- steel, low-alloyed: 5.26e-5 kg; name steel; = 5.26E-05*cement; lognormal variance with pedigree 0.0086, pedigree (1,1,4,1,1)
  Value provided by cemsuisse as an average from all cement producing plants in Switzerland.
  property carbon content, fossil 0.005; name C_content_fossil
  property carbon content, non-fossil 0; name C_content_non_fossil
  property dry mass 1 kg; name DM
  property water content 0; name water_content
  property water in wet mass 0 kg; name WWM
  property wet mass 1 kg; name WM

## Sampling procedure
Data represents the average Swiss production of the 6 cement plants for the years 2017 to 2021 that were operational in 2021.
