# sheet rolling, copper

Dataset: EcoSpold 2, unit process
Geography: RoW
Time period: 2000-01-01 to 2023-12-31
Technology level: current
Classification: ISIC rev.4 ecoinvent: 2420:Manufacture of basic precious and other non-ferrous metals
Classification: EcoSpold01Categories: metals/processing
Tags: ConvertedDataset
Scenario: Business-as-Usual
System model: Allocation, cut-off by classification
Generated by: Silvio Blaser
Published in: Classen M. 2009
Database: ecoinvent
isCopyrightProtected: true
accessRestrictedTo: 1

## General comment
The process of copper sheet rolling is similar to the process of aluminium sheet rolling. Also the final outputs are similar in shape, even if the material properties and thus the applications are very different
[This dataset was already contained in the ecoinvent database version 2. It was not individually updated during the transfer to ecoinvent version 3. Life Cycle Impact Assessment results may still have changed, as they are affected by changes in the supply chain, i.e. in other datasets. This dataset was generated following the ecoinvent quality guidelines for version 2. It may have been subject to central changes described in the ecoinvent version 3 change report (http://www.ecoinvent.org/database/ecoinvent-version-3/reports-of-changes/), and the results of the central updates were reviewed extensively. The changes added e.g. consistent water flows and other information throughout the database. The documentation of this dataset can be found in the ecoinvent reports of version 2, which are still available via the ecoinvent website. The change report linked above covers all central changes that were made during the conversion process.]

## Included activities start
The activity starts with the semi finished product entering the process. The material on which this activity is applied it is not included as input.

## Included activities end
Includes the process-steps: preheating, hot rolling, cold rolling, annealing and finishing. Does not include the material being rolled, only the amount of scrap lost in waste is balanced as primary copper input . Includes the transport of the materials to the plant, but does not include the transport of the product to the customer.

## Geography
Data-set is representative for European Union

## Technology
Technique describes the avarage of European Union. Data are estimated basing on the data of aluminium sheet rolling, set in relation by mean of the volume of material worked.

## Time period
Data on which assumptions are basing are from 1998

## Parameters
- fraction, cooling water, cooling pond system, to air: 0.032 dimensionless; name fraction_CW_CP_to_air; lognormal variance with pedigree 0.0413, pedigree (2,3,1,3,1)
  Calculated based on literature value (Scown, C.D., 2011, Water Footprint of U.S. Transportation Fuels and supplying information of the article) (Vionnet, S., Quantis Water Database - Technical Report, 2012).
- fraction, cooling water, once-through system, to air: 0.004 dimensionless; name fraction_CW_OT_to_air; lognormal variance with pedigree 0.0413, pedigree (2,3,1,3,1)
  (same comment as for fraction, cooling water, cooling pond system, to air)
- fraction, cooling water, recirculating system, to air: 0.771 dimensionless; name fraction_CW_R_to_air; lognormal variance with pedigree 0.0413, pedigree (2,3,1,3,1)
  (same comment as for fraction, cooling water, cooling pond system, to air)
- fraction, cooling water, to air: 0.3875 dimensionless; name fraction_CW_to_air; = (0.5*fraction_CW_OT_to_air)+(0.5*fraction_CW_R_to_air); lognormal variance with pedigree 0.092025, pedigree (4,4,3,2,4)
  Calculated value based on literature value (see comments of the other parametres present in this dataset) and expert opinion. In the case when no industry/literature data are available about the type of cooling or directly fraction, cooling water, to air specific for the process a default assumption is applied. It is assumed that the once-through cooling system is used in 50% of all cases and recirculating system is used in another 50% of all cases.
- fraction, process water, to air: 0.2 dimensionless; name fraction_PW_to_air; lognormal variance with pedigree 0.092025, pedigree (4,4,3,2,4)

## Reference product
- sheet rolling, copper: 1 kg; By-product classification allocatable product; CPC 88602: Basic precious and other non-ferrous metal manufacturing services
  EcoSpold01Location=RER
  production volume 8.4e8 kg
    Volume of Cu in sheet and strips is estimated to 8% of global Cu consumption, based on global shares reported in Joseph G (1999) Copper: its trade, manufacture, use, and environmental status. Materials Park: ASM International.
  property price 0.198867 EUR2005
    Calculated based on inputs: The price of the product has been calculated as a sum of the values of the material and energy inputs for this product. This value is therefore a rough estimation. It may underestimate the real price since there are additional expenses when producing any product. These expences can include for example labour costs, treatment of waste materials and profit for the producer. Please consider carefully whether this level of data quality is acceptable for your application.
  properties: carbon allocation 0 kg, carbon content 0

## Inputs from technosphere
- copper, cathode: 0.039644 kg; lognormal variance with pedigree 0.096, pedigree (4,5,5,5,3)
  EcoSpold01Location=RER
  properties: dry mass 1 kg, wet mass 1 kg
- corrugated board box: 0.00010261, 3.82223e-6, 0.000223938 kg (3 suppliers, which the file names only by identifier); sum of these 0.00033037 kg; lognormal variance with pedigree 0.096, pedigree (4,5,5,5,3)
  EcoSpold01Location=RER
  properties: carbon content, fossil 0.00365437, carbon content, non-fossil 0.450248, dry mass 0.945 kg, heating value, net 12.86 MJ, water content 0.0582011, wet mass 1 kg
  note on carbon content, fossil: C content was calculated as an addition of C content in the raw materials.
- electricity, medium voltage: 0.00742188, 0.14805, 0.0497443, 0.00227284, 0.000454905, 9.76784e-5, 0.0152884 kWh (7 suppliers, which the file names only by identifier); sum of these 0.22333 kWh; lognormal variance with pedigree 0.096, pedigree (4,5,5,5,3)
  EcoSpold01Location=UCTE
- hazardous waste, for underground deposit: -0.015462 kg; lognormal variance with pedigree 0.0562, pedigree (4,5,2,5,3)
  EcoSpold01Location=DE
  production volume
    Calculated from the production volume of sheet rolling, copper in proportion to the respective output amounts.
  properties: carbon content, fossil 0.554667, dry mass 1 kg, wet mass 1 kg
  note on carbon content, fossil: Tab A.6, ecoinvent v2.2 report 13_I, average hazardous waste composition was used, and referred to 0% water mass. No waste-specific emission are currently inventoried for underground deposits. Accordingly, no waste composition must be specified. For generic, average waste to underground deposit deposition in a 200 liter steel drum without cement solidification is assumed (ecoinvent v2.2 report 13_I).
- heat, district or industrial, natural gas: 0.0116418, 0.708457 MJ (2 suppliers, which the file names only by identifier); sum of these 0.720099 MJ; lognormal variance with pedigree 0.096, pedigree (4,5,5,5,3)
  EcoSpold01Location=RER
  properties: heating value, net 1 MJ
- heat, district or industrial, other than natural gas: 0.759753, 0.000351979 MJ (2 suppliers, which the file names only by identifier); sum of these 0.760104 MJ; lognormal variance with pedigree 0.096, pedigree (4,5,5,5,3)
  EcoSpold01Location=RER
  properties: heating value, net 1 MJ
- lubricating oil: 0.004 kg; lognormal variance with pedigree 0.096, pedigree (4,5,5,5,3)
  EcoSpold01Location=RER
  properties: carbon content, fossil 0.75, dry mass 1 kg, heating value, net 40.2 MJ, wet mass 1 kg
  note on carbon content, fossil: Lubricating oil is produced from diesel. C-content/dry mass of fats and oils considered 75%, from: ecoinvent v2.2 report, n 15a, pg 40
  note on heating value, net: Literature value, Source: IPCC 2006, 2006 IPCC Guidelines for National Greenhouse Gas Inventories, Prepared by the National Greenhouse Gas Inventories Programme, Eggleston H.S., Buendia L., Miwa K., Ngara T. and Tanabe K. (eds). Published: IGES, Japan
- municipal solid waste: -4.07781e-5, -4.84222e-6, -3.01368e-5, -0.023007, -3.3884e-6, -1.08761e-6, -2.45831e-6, -0.00010234 kg (8 suppliers, which the file names only by identifier); sum of these -0.023192 kg; lognormal variance with pedigree 0.0562, pedigree (4,5,2,5,3)
  EcoSpold01Location=CH
  production volume
    (same comment as for hazardous waste, for underground deposit)
  properties: carbon content, fossil 0.171549, carbon content, non-fossil 0.261655, dry mass 0.771 kg, heating value, net 11.74 MJ, water content 0.297017, wet mass 1 kg
  note on carbon content, fossil: MSW composition in tab 4.1, ecoinvent v2.2 report 13_I. C content referred to 1 kg DM
  note on heating value, net: Value taken from the general comment of the treatment dataset.
- packaging film, low density polyethylene: 0.0013215 kg; lognormal variance with pedigree 0.096, pedigree (4,5,5,5,3)
  EcoSpold01Location=RER
  properties: carbon content, fossil 0.857143, dry mass 1 kg, heating value, net 42.47 MJ, wet mass 1 kg
  note on carbon content, fossil: Polyethylene is formed out of a huge amount of ethylene monomers (C2H4) (ecoinvent v2.2 report 11_II). MW=28 g/mol
- rolling mill: 1.4286e-9 unit; lognormal variance with pedigree 0.396, pedigree (4,5,5,5,3)
  EcoSpold01Location=RER
- sawnwood, softwood, raw, dried (u=20%): 6.118e-7 m3; lognormal variance with pedigree 0.096, pedigree (4,5,5,5,3)
  EcoSpold01Location=RER
  properties: carbon content, non-fossil 0.494, dry mass 450 kg, heating value, net 6514.84 MJ, water content 0.2, wet mass 540 kg
  note on carbon content, non-fossil: C content of dry mass is 0.494 kgC/kg dry wood (ecoinvent v2.2 report 9)
- sheet rolling, steel: 0.0016519 kg; lognormal variance with pedigree 0.096, pedigree (4,5,5,5,3)
  EcoSpold01Location=RER
- steel, unalloyed: 0.0016519 kg; lognormal variance with pedigree 0.096, pedigree (4,5,5,5,3)
  EcoSpold01Location=RER
  properties: carbon content, fossil 0.0025, dry mass 1 kg, wet mass 1 kg
  note on carbon content, fossil: Unalloyed steels or carbon steels are those in which the level of an individual element in no case reaches or exceeds the limiting concentration given in Tab. 3.1 ecoinvent v2.2 report 10_partII. Assumed to have a C content of 0.25%
- waste mineral oil: -0.0024 kg; lognormal variance with pedigree 0.0562, pedigree (4,5,2,5,3)
  EcoSpold01Location=CH
  production volume
    (same comment as for hazardous waste, for underground deposit)
  properties: carbon content, fossil 0.864444, dry mass 0.9 kg, heating value, net 34.7 MJ, water content 0.111111, wet mass 1 kg
  note on carbon content, fossil: Tab A.6, ecoinvent v2.2 report 13_I. C content has been calculated after data in the tables, and then referred to 1 kg DM

## Inputs from nature
- Water, cooling, unspecified natural origin [natural resource, in water]: 0.0135834 m3; name water_cooling_UNO_input; source Byers, W. 2003; lognormal variance with pedigree 0.0612, pedigree (2,3,5,5,3)
  Based on literature, (Vionnet, S., Quantis Water Database - Technical Report, 2012). Assumed to have same or very similar water use as "sheet rolling, steel". Water is used for copper conditioning, which basically means it is directly sprayed on the hot metal to cool it down. In this case the water comes into contact with the product, i.e. It is treated as process water, not cooling water. It includes the processes: hot rolling, acid pockling, cold rolling and finishing. The process ends when finished, rolled metal sheets leaves the plant.
- Water, unspecified natural origin [natural resource, in water]: 0.00744898 m3; name water_UNO_input; source Byers, W. 2003; lognormal variance with pedigree 0.0546, pedigree (3,3,5,5,1)
  Calculated based on literature, (Vionnet, S., Quantis Water Database - Technical Report, 2012). Assumed to have same or very similar water use as "sheet rolling, steel". Water is used for copper conditioning, which basically means it is directly sprayed on the hot metal to cool it down. In this case the water comes into contact with the product, i.e. It is treated as process water, not cooling water. It includes the processes: hot rolling, acid pockling, cold rolling and finishing. It is assumed that water use is reported as a sum and that 100% is used as process water (material conditioning = water comes into contact with the product).
  property carbon content, fossil 0.0104329; name C_content_fossil
  property carbon content, non-fossil 0; name C_content_non_fossil
  property dry mass 0.1101 kg; name DM
  property water content 9081.65; name water_content
  property water in wet mass 999.89 kg; name WWM
  property wet mass 1000 kg; name WM

## Emissions to nature
- NMVOC, non-methane volatile organic compounds [air, unspecified]: 0.0004 kg; lognormal variance with pedigree 0.216, pedigree (4,5,5,5,3)
- Water [air, unspecified]: 0.00675338 m3; name water_to_air_unspecified; lognormal variance with pedigree 0.0827, pedigree (2,2,5,5,1)
  Calculated value based on literature values and expert opinion. See comments in the parametres' comment field.
  property fraction, origin: fresh water 0; name fraction_origin_fresh_water
  property fraction, origin: salt water 0; name fraction_origin_salt_water
  property fraction, origin: unspecified 1; name fraction_origin_unspecified
- BOD5, Biological Oxygen Demand [water, unspecified]: 7.9e-5 kg; lognormal variance with pedigree 0.42, pedigree (5,5,5,5,5)
- COD, Chemical Oxygen Demand [water, unspecified]: 7.9e-5 kg; lognormal variance with pedigree 0.136, pedigree (4,5,5,5,3)
- DOC, Dissolved Organic Carbon [water, unspecified]: 2.0551e-5 kg; lognormal variance with pedigree 0.42, pedigree (5,5,5,5,5)
- TOC, Total Organic Carbon [water, unspecified]: 2.0551e-5 kg; lognormal variance with pedigree 0.42, pedigree (5,5,5,5,5)
- Water [water, unspecified]: 0.014279 m3; name water_to_water_unspecified; lognormal variance with pedigree 0.0827, pedigree (2,2,5,5,1)
  (same comment as for Water)
  property fraction, origin: fresh water 0; name fraction_origin_fresh_water_Ww
  property fraction, origin: salt water 0; name fraction_origin_salt_water_Ww
  property fraction, origin: unspecified 1; name fraction_origin_unspecified_Ww

## Sampling procedure
Estimation basing on Aluminium data

## Extrapolations
see technology This dataset has been copied from an original dataset covering the geography RER. The uncertainty has been adjusted accordingly.

## Review by Roland Hischier 2010-02-07
Validated for v1.01
