# heat storage production, 2000l

Dataset: EcoSpold 2, unit process
Geography: RoW
Time period: 2001-01-01 to 2023-12-31
Technology level: current
Classification: EcoSpold01Categories: solar collector systems/production of components
Classification: ISIC rev.4 ecoinvent: 2512:Manufacture of tanks, reservoirs and containers of metal
Tags: ConvertedDataset
Scenario: Business-as-Usual
System model: Allocation, cut-off by classification
Generated by: Niels Jungbluth
Published in: Jungbluth, N. 2007
Database: ecoinvent
isCopyrightProtected: true
accessRestrictedTo: 1

## General comment
Production of a chrome steel tank including heat exchanger and boiler.
[This dataset was already contained in the ecoinvent database version 2. It was not individually updated during the transfer to ecoinvent version 3. Life Cycle Impact Assessment results may still have changed, as they are affected by changes in the supply chain, i.e. in other datasets. This dataset was generated following the ecoinvent quality guidelines for version 2. It may have been subject to central changes described in the ecoinvent version 3 change report (http://www.ecoinvent.org/database/ecoinvent-version-3/reports-of-changes/), and the results of the central updates were reviewed extensively. The changes added e.g. consistent water flows and other information throughout the database. The documentation of this dataset can be found in the ecoinvent reports of version 2, which are still available via the ecoinvent website. The change report linked above covers all central changes that were made during the conversion process.]

## Included activities end
Production and disposal of a heat storage. Including materials and energy use of production.

## Geography
Production in CH.

## Technology
Heat storage with a capacity of 2000l for use in a solar collector heating system.

## Time period
Materials investigated in 2002. Energy use investigated for the year 2001.

## Parameters
- fraction, process water, to air: 0.15 dimensionless; name fraction_PW_to_air; lognormal variance with pedigree 0.092025, pedigree (4,4,3,2,4)
- fraction, tap water, to air: 0.15 dimensionless; name fraction_TW_to_air; lognormal variance with pedigree 0.092025, pedigree (4,4,3,2,4)

## Reference product
- heat storage, 2000l: 1 unit; By-product classification allocatable product; CPC 42220: Containers for compressed or liquefied gas, of iron, steel or aluminium; HS2017 8516: Electric water, space, soil heaters; electro-thermic hair-dressing apparatus; hand dryers, irons; electro-the[...]
  EcoSpold01Location=CH
  production volume 3.96633 unit
    This is a placeholder value that does not reflect real-world production volumes. This dataset does not currently require a real-world production volume to work in the database framework, and no actual data were collected yet. This has no negative effect on the results of the ecoinvent database.
  property price 12929 EUR2005
    EU27 I/O database(in the 'EU & DK Input Output Database' (available in SimaPro)); -79 Building, non-residential EU 27 (calculated to be 38.169 EUR2003/kg). Based on consumption of (_53 Iron basic, virgin, EU27;7.25517782294095E-3 kg/EUR building; 0.45 EUR2003 per kg DS), (_61 Iron, after first processing, EU27;5.8766830719783E-3kg/EUR building; 0.62 EUR2003 per kg DS), (_65 Fabricated metal products, except machinery, EU27; 8.9167022775554E-3 kg/EUR building; 3.63 EUR2003 per kg DS) and (_66 Machinery and equipment n.e.c., EU27;4.15071881936446E-3 kg/EUR building; 5.71 EUR2003 per kg DS) -260 kg
  properties: carbon allocation 0 kg, carbon content 0

## Inputs from technosphere
- alkyd paint, white, without solvent, in 60% solution state: 1.7 kg; lognormal variance with pedigree 0.0546, pedigree (2,4,5,5,1)
  EcoSpold01Location=RER
  Questionnaire
  Uncertainty: Questionnaire
  properties: carbon content, fossil 0.140367, carbon content, non-fossil 0.199629, dry mass 1 kg, heating value, net 10.3 MJ, wet mass 1 kg
  note on carbon content, fossil: C content was calculated as an addition of C content in the raw materials.
- electricity, low voltage: 1.70901, 0.0762875, 1.19967, 24.9007, 2.45783, 0.0153093, 5.64348, 8.57296, 0.42471 kWh (9 suppliers, which the file names only by identifier); sum of these 45 kWh; lognormal variance with pedigree 0.0546, pedigree (2,4,5,5,1)
  Questionnaire for 2000l storage
  EcoSpold01Location=CH
  Uncertainty: Questionnaire for 2000l storage
- electricity, medium voltage: 1.25701, 25.0745, 8.42497, 0.38494, 0.0770453, 0.0165433, 1.75088, 2.58933, 5.42474 kWh (9 suppliers, which the file names only by identifier); sum of these 45 kWh; lognormal variance with pedigree 0.0546, pedigree (2,4,5,5,1)
  (same comment as for electricity, low voltage)
- glass wool mat: 25 kg; lognormal variance with pedigree 0.0546, pedigree (2,4,5,5,1)
  Questionnaire
  EcoSpold01Location=CH
  Uncertainty: Questionnaire
  properties: carbon content, fossil 0.0107327, dry mass 1 kg, wet mass 1 kg
  note on carbon content, fossil: A share of 16 w-% for the binders is taken into account. The binder used in this study is a mixture of phenol, formaldehyde and urea resins (ecoinvent v2.2 report 16_part XIV), and the C content was calculated as a weigthed average of phenol, formaldehyde and urea C content.
- heat, district or industrial, natural gas: 2.11316, 128.596, 47.491 MJ (3 suppliers, which the file names only by identifier); sum of these 178.2 MJ; lognormal variance with pedigree 0.0546, pedigree (2,4,5,5,1)
  Questionnaire for 2000l storage
  EcoSpold01Location=RER
  Uncertainty: Questionnaire for 2000l storage
  properties: heating value, net 1 MJ
- heat, district or industrial, other than natural gas: 116.696, 0.0540633, 2.96956 MJ (3 suppliers, which the file names only by identifier); sum of these 119.72 MJ; lognormal variance with pedigree 0.0546, pedigree (2,4,5,5,1)
  EcoSpold01Location=CH
  Questionnaire for 2000l storage
  Uncertainty: Questionnaire for 2000l storage
  properties: heating value, net 1 MJ
- hot water tank factory: 2e-5 unit; lognormal variance with pedigree 0.3546, pedigree (2,4,5,5,1)
  (same comment as for electricity, low voltage)
- sawnwood, softwood, dried (u=20%), planed: 0.0667 m3; lognormal variance with pedigree 0.0546, pedigree (2,4,5,5,1)
  EcoSpold01Location=RER
  Packaging, information by Wagner
  Uncertainty: Packaging, information by Wagner
  properties: carbon content, non-fossil 0.494, dry mass 450 kg, heating value, net 6514.84 MJ, water content 0.2, wet mass 540 kg
  note on carbon content, non-fossil: C content of dry mass is 0.494 kgC/kg dry wood (ecoinvent v2.2 report 9)
- steel, chromium steel 18/8, hot rolled: 35 kg; lognormal variance with pedigree 0.0546, pedigree (2,4,5,5,1)
  Questionnaire
  EcoSpold01Location=RER
  Uncertainty: Questionnaire
  properties: carbon content, fossil 0.0008, dry mass 1 kg, wet mass 1 kg
  note on carbon content, fossil: Stainless steel model is the grade 304 steel (18/8 stainless, 18% chromium 8% nickel; max. 0.08% C)
- steel, low-alloyed, hot rolled: 305 kg; lognormal variance with pedigree 0.0546, pedigree (2,4,5,5,1)
  Questionnaire
  EcoSpold01Location=RER
  Uncertainty: Questionnaire
  properties: carbon content, fossil 0.005, dry mass 1 kg, wet mass 1 kg
  note on carbon content, fossil: Low alloyed steel composition given in Tab. 3.2 ecoinvent v2.2 report 10_partII. Steel assumed to have a C content of 0.5%
- tap water: 0.97553, 1.48711, 2.77488, 7.47532, 0.899828, 37.4991, 429.121, 319.767 kg (8 suppliers, which the file names only by identifier); sum of these 800 kg; lognormal variance with pedigree 0.0546, pedigree (2,4,5,5,1)
  EcoSpold01Location=RER
  Questionnaire
  Uncertainty: Questionnaire
  properties: carbon content, fossil 0.00178991, dry mass 0.000337476 kg, water content 2962.17, wet mass 1 kg
  note on carbon content, fossil: Bicarbonate content is 2.93 mol/m3. CO2 content is 0.1 mol/m3 (ecoinvent v2.2 report 8, Tab 93.1).
- waste mineral wool: -7.27042, -17.7296 kg (2 suppliers, which the file names only by identifier); sum of these -25 kg; lognormal variance with pedigree 0.0146, pedigree (2,4,1,5,1)
  EcoSpold01Location=CH
  Questionnaire
  Uncertainty: Questionnaire
  production volume
    Calculated from the production volume of heat storage, 2000l in proportion to the respective output amounts.
  properties: dry mass 1 kg, wet mass 1 kg
- waste plastic, mixture: -0.00131445, -0.0012482, -4.90527, -0.0476295, -0.0405825, -0.00318242, -0.000531024, -0.000240681 kg (8 suppliers, which the file names only by identifier); sum of these -5 kg; lognormal variance with pedigree 0.0146, pedigree (2,4,1,5,1)
  EcoSpold01Location=CH
  Questionnaire, packaging wastes
  Uncertainty: Questionnaire, packaging wastes
  production volume
    (same comment as for waste mineral wool)
  properties: carbon content, fossil 0.747344, dry mass 0.847 kg, heating value, net 30.79 MJ, water content 0.180638, wet mass 1 kg
  note on carbon content, fossil: C content in 1 kg DM was calculated using data in Tab A.2, ecoinvent v2.2 report 13_I
  note on heating value, net: Value taken from the general comment of the treatment dataset.
- wastewater, average: -0.643769, -0.153938, -0.00229206 m3 (3 suppliers, which the file names only by identifier); sum of these -0.8 m3; lognormal variance with pedigree 0.0146, pedigree (2,4,1,5,1)
  Questionnaire
  EcoSpold01Location=CH
  Uncertainty: Questionnaire
  production volume
    (same comment as for waste mineral wool)
  properties: carbon content, non-fossil 0.194039, dry mass 0.346837 kg, mass concentration, TOC 0.1091 kg/m3, mass concentration, calcium 0.039453 kg/m3, mass concentration, chlorine 0.030031 kg/m3, mass concentration, hydrogen 0.013365 kg/m3, mass concentration, nitrogen 0.031015 kg/m3, mass concentration, oxygen 0.069824 kg/m3, mass concentration, sodium 0.06456 kg/m3, mass concentration, sulfur 0.015602 kg/m3, water content 2882.2, wet mass 1000 kg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
  note on carbon content, non-fossil: 0.0673 kg TOC/m3 (Tab A.17, ecoinvent v2.2 report 13_I). TOC was considered as Total Carbon.
- welding, gas, steel: 10 m; lognormal variance with pedigree 0.0546, pedigree (2,4,5,5,1)
  Questionnaire
  EcoSpold01Location=RER
  Uncertainty: Questionnaire

## Emissions to nature
- Water [air, unspecified]: 0.12 m3; name water_to_air_unspecified; lognormal variance with pedigree 0.0827, pedigree (2,2,5,5,1)
  Calculated value based on literature values and expert opinion. See comments in the parametres' comment field.
  property fraction, origin: fresh water 1; name fraction_origin_fresh_water
  property fraction, origin: salt water 0; name fraction_origin_salt_water
  property fraction, origin: unspecified 0; name fraction_origin_unspecified

## Sampling procedure
Questionnaires.

## Extrapolations
Data of one factory used for CH. Energy use extrapolated by weight for 2000l storage. This dataset has been copied from an original dataset covering the geography CH. The uncertainty has been adjusted accordingly.

## Review by Sebastiano Meier 2003-07-16
Passed.
