# treatment of used train, passenger, high-speed

Dataset: EcoSpold 2, unit process
Geography: RoW
Time period: 1996-01-01 to 2023-12-31
Technology level: current
Classification: EcoSpold01Categories: transport systems/train
Classification: ISIC rev.4 ecoinvent: 3830:Materials recovery
Tags: ConvertedDataset; Treatment
Scenario: Business-as-Usual
System model: Allocation, cut-off by classification
Generated by: Michael Spielmann (obsolete)
Published in: Spielmann M. 2004
Database: ecoinvent
isCopyrightProtected: true
accessRestrictedTo: 1

## General comment
The data is based on the bulk material composition of an ICE, The life span of the lis assumed to be 25 years resulting in a life time performance of 10 Mio. vkm
[This dataset was already contained in the ecoinvent database version 2. It was not individually updated during the transfer to ecoinvent version 3. Life Cycle Impact Assessment results may still have changed, as they are affected by changes in the supply chain, i.e. in other datasets. This dataset was generated following the ecoinvent quality guidelines for version 2. It may have been subject to central changes described in the ecoinvent version 3 change report (http://www.ecoinvent.org/database/ecoinvent-version-3/reports-of-changes/), and the results of the central updates were reviewed extensively. The changes added e.g. consistent water flows and other information throughout the database. The documentation of this dataset can be found in the ecoinvent reports of version 2, which are still available via the ecoinvent website. The change report linked above covers all central changes that were made during the conversion process.]

## Included activities end
The inventory includes waste treatment processes for non metal components of an ICEtrain composition. For the transport of disposed materials standard distances have been applied.

## Geography
Data represents Swiss disposal conditions

## Technology
no technologies are specified

## Reference product
- used train, passenger, high-speed: -1 unit; By-product classification Waste; CPC 39990: Other wastes n.e.c.; HS2017 8603: Railway or tramway coaches, vans and trucks; self-propelled tenders, other than those of heading no. 8604
  EcoSpold01Location=DE
  production volume 3.75794 unit
    This is a placeholder value that does not reflect real-world production volumes. This dataset does not currently require a real-world production volume to work in the database framework, and no actual data were collected yet. This has no negative effect on the results of the ecoinvent database.
  property carbon content, fossil 0.212575
    Calculated from C content in input materials in the infrastructure
  property carbon content, non-fossil 0.00393143
    Calculated from C content in input materials in the infrastructure
  property price 0 EUR2005
    Waste products are assigned a price of zero as they are assumed to require further treatment.
  properties: carbon allocation 138521 kg, carbon content 0.216507, dry mass 639800 kg, water content 0, water in wet mass 0 kg, wet mass 639800 kg

## Inputs from technosphere
- waste emulsion paint: -12598.8, -1.23038 kg (2 suppliers, which the file names only by identifier); sum of these -12600 kg; lognormal variance with pedigree 0.014, pedigree (3,1,1,5,1)
  EcoSpold01Location=CH
  Derived from the material composition of the modelled ICE (unit process ICE manufacturing)
  Uncertainty: derived from the material composition of the modelled ICE (unit process ICE manufacturing)
  production volume
    Calculated from the production volume of used train, passenger, high-speed in proportion to the respective output amounts.
  properties: carbon content, fossil 0.27, dry mass 1 kg, heating value, net 8.18 MJ, wet mass 1 kg
  note on carbon content, fossil: Tab A.4, ecoinvent v2.2 report 13_I. C content has been calculated after data in the tables, and then referred to 1 kg DM
- waste glass: -47.4865, -2.2645, -8.23499, -0.373464, -0.177096, -0.234767, -0.24759, -0.377579, -24930.1, -0.28853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 kg (42 suppliers, which the file names only by identifier); sum of these -25000 kg; lognormal variance with pedigree 0.014, pedigree (3,1,1,5,1)
  (same comment as for waste emulsion paint)
  production volume
    (same comment as for waste emulsion paint)
  properties: dry mass 1 kg, heating value, net 0.05 MJ, wet mass 1 kg
  note on heating value, net: Value extracted from "treatment of waste glass, open dump, very wet infiltration class (1000mm)"
- waste plastic, mixture: -111.684, -40.6919, -7.17454, -4.23214, -28.0797, -2.53104, -2.61357, -6.77378, -2.42104, -2.92275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 kg (42 suppliers, which the file names only by identifier); sum of these -155000 kg; lognormal variance with pedigree 0.014, pedigree (3,1,1,5,1)
  Derived from the material composition of the modelled ICE (unit process ICE manufacturing)
  EcoSpold01Location=CH
  Uncertainty: derived from the material composition of the modelled ICE (unit process ICE manufacturing)
  production volume
    (same comment as for waste emulsion paint)
  properties: carbon content, fossil 0.747344, dry mass 0.847 kg, heating value, net 30.79 MJ, water content 0.180638, wet mass 1 kg
  note on carbon content, fossil: C content in 1 kg DM was calculated using data in Tab A.2, ecoinvent v2.2 report 13_I
  note on heating value, net: Value taken from the general comment of the treatment dataset.

## Sampling procedure
Data based on the material composition of an ICE.

## Extrapolations
This dataset has been copied from an original dataset covering the geography DE. The uncertainty has been adjusted accordingly.

## Review by Niels Jungbluth 2004-04-01
Passed.
