# catch crop growing, ryegrass-red&Egyptian clover-mixture, September-April, organic fertiliser 60 kg N, one cut

Dataset: EcoSpold 2, unit process
Geography: CH
Time period: 2011-01-01 to 2023-12-31
Technology level: current
Classification: ISIC rev.4 ecoinvent: 0161:Support activities for crop production
Scenario: Business-as-Usual
System model: Allocation, cut-off by classification
Generated by: Thomas Nemecek
Database: ecoinvent
isCopyrightProtected: true
accessRestrictedTo: 1

## General comment
This dataset represents the cultivation of ryegrass-red&Egyptian clover-mixture silage on an area of 1 ha. The dry matter yield is 3274.425 kg/ha. The moisture content of the silage at storage is 65%.

## Included activities start
This activity starts after the harvest of the previous crop. The input of seeds is included. Farm manure as an organic fertiliser - if applied - is only accounted for in terms of direct field emissions; all pre-processes are included in the animal production systems.

## Included activities end
The dataset includes all machine operations and corresponding machine infrastructure and sheds. Machine operations are: soil cultivation, sowing, manuring - if manure is applied -, mowing, haying, swathing, baling, bale loading and transport of silage bales to the farm. Further, direct field emissions are included. This activity ends after the transport of the bales to the farm at the farm gate.

## Technology
Swiss integrated production

## Reference product
- ryegrass-red&Egyptian clover-mixture silage: 1 kg; name REF_PRODUCT; source Lehmann J. 1991; By-product classification allocatable product; CPC 01919: Forage products, n.e.c.; HS2017 060490: Foliage, branches and other parts of plants, without flowers or flower buds, and grasses, mosses and lichen[...]
  Dry matter yield per hectare; calculated based on Lehmann (1991): dry matter yield at 25 kg N/ha; 10% added due to higher fertilisation; 10% of silage loss are subtracted (Agridea 2007). --- Sources: AGRIDEA (2007) Landwirtschaftliches Handbuch Pflanzen und Tiere. Wirz Kalender, 2007. Ed. AGRIDEA, Lindau (Switzerland).
  production volume 1.35e6 kg; = 1800*750
    Area of ryegrass-red&Egyptian clover-mixture (SM210) in Switzerland estimated as 3,000ha (own estimate Agroscope). 25% of it for this inventory (since 4 different inventories for ryegrass-Egyptian&Persian clover-mixture silage in Switzerland).
  property carbon content, non-fossil 0.41906; name REF_PRODUCT_C_content_non_fossil
    Composition data obtained from 'Sonnenblumenganzpflanze, vor Blüte, Silage' in Swiss Feed Database ('Schweizerische Futtermitteldatenbank. V1.0'; http://www.feed-alp.admin.ch/start.php?action=adv_search&cmd=list_feed). First, composition data were refered to 1 kg dry mass. Then, C-contents were calculated considering a C-content/dry mass of 44% in carbohydrates (including fibres), 53% in proteins and 75% in fats. All data from ecoinvent report, n 15a, pg 40, except C-content in protein, that comes from Determination of protein concentration by total organic carbon analysis, Rouwenhorst et al., 1991, J Biochem and Biophys Methods, 22:119-128.
  property dry mass 1 kg; name REF_PRODUCT_DM
  property energy content 18.09 MJ
    Gross calorific value of 'Sonnenblumenganzpflanze, vor Blüte, Silage' in Swiss Feed Database ('Schweizerische Futtermitteldatenbank. V1.0'; http://www.feed-alp.admin.ch/start.php?action=adv_search&cmd=list_feed).
  property price 0.016 EUR2005
    Assumed the same price of alfalfa-grass silage to ryegrass silage, based on data for 2016 in Manitoba (Canada) [https://www.gov.mb.ca/agriculture/business-and-economics/financial-management/pubs/cop_forage_cerealsilage.pdf].
  properties: carbon allocation 0.41906 kg, carbon content 0.41906, wet mass 2.85714 kg

## Inputs from technosphere
- bale loading: 0.00408166 unit; source Nemecek, T. 2007; lognormal variance with pedigree 0.0092, pedigree (2,1,4,1,1)
  Calculated from fresh matter yield (35% dry matter content) and bale weigth of 700 kg (fresh matter; Nemecek 2007).
  This exchange has an activity link directly to the producing activity because the product is primarily consumed in the same geographical area where it is produced.
- baling: 0.00408166 unit; source Nemecek, T. 2007; lognormal variance with pedigree 0.0092, pedigree (2,1,4,1,1)
  (same comment as for bale loading)
- clover seed, Swiss integrated production, for sowing: 0.00421451 kg; name SEED_1; source Lehmann J. 1991; lognormal variance with pedigree 0.0092, pedigree (2,1,4,1,1)
  property carbon content, non-fossil 0.469421; name SEED_1_C_content_non_fossil
  property dry mass 0.9 kg; name SEED_1_DM
  property energy content 16.0776 MJ; name SEED_1_energy_content
  properties: water content 0.111111, wet mass 1 kg
  note on carbon content, non-fossil: biogene carbon content on a dry matter basis peas seeds values are used
  note on energy content: See chapter 'Product Properties' in '01_crop production - yields & inputs CH & Europe_v1.0.pdf', section 'AGRICULTURAL PRODUCTION IN SWITZERLAND' - pdf-document on the dedicated talk page of ecoinvent (www.ecoinvent.org/documentation)
- grass seed, Swiss integrated production, for sowing: 0.00494747 kg; name SEED_2; source Lehmann J. 1991; lognormal variance with pedigree 0.0092, pedigree (2,1,4,1,1)
  property carbon content, non-fossil 0.464601; name SEED_2_C_content_non_fossil
  property dry mass 0.9 kg; name SEED_2_DM
  property energy content 16.299 MJ; name SEED_2_energy_content
  properties: water content 0.111111, wet mass 1 kg
  note on carbon content, non-fossil: biogene carbon content on a dry matter basis wheat grains values are used
  note on energy content: See chapter 'Product Properties' in '01_crop production - yields & inputs CH & Europe_v1.0.pdf', section 'AGRICULTURAL PRODUCTION IN SWITZERLAND' - pdf-document on the dedicated talk page of ecoinvent (www.ecoinvent.org/documentation).
- haying, by rotary tedder: 0.000610799 ha; source Boessinger M. 2004; lognormal variance with pedigree 0.0092, pedigree (2,1,4,1,1)
  Assumption based on the number of cuts and current practice in Switzerland (cf. Boessinger et. al 2004)
  This exchange has an activity link directly to the producing activity because the product is primarily consumed in the same geographical area where it is produced.
- liquid manure spreading, by vacuum tanker: 0.0140954 m3; source Flisch R. 2009; lognormal variance with pedigree 0.0092, pedigree (2,1,4,1,1)
  Calculated based on the amount of applied nitrogen. Data on nutrient content of slurry from Flisch (2009). Slurry represents the only input of nitrogen.
  This exchange has an activity link directly to the producing activity because the product is primarily consumed in the same geographical area where it is produced.
- mowing, by rotary mower: 0.000305399 ha; source Boessinger M. 2004; lognormal variance with pedigree 0.0092, pedigree (2,1,4,1,1)
  (same comment as for haying, by rotary tedder)
- sowing: 0.000305399 ha; source Boessinger M. 2004; lognormal variance with pedigree 0.0092, pedigree (2,1,4,1,1)
  (same comment as for haying, by rotary tedder)
- swath, by rotary windrower: 0.000305399 ha; source Boessinger M. 2004; lognormal variance with pedigree 0.0092, pedigree (2,1,4,1,1)
  (same comment as for haying, by rotary tedder)
- tillage, cultivating, chiselling: 0.000305399 ha; source Boessinger M. 2004; lognormal variance with pedigree 0.0092, pedigree (2,1,4,1,1)
  (same comment as for haying, by rotary tedder)
- tillage, harrowing, by rotary harrow: 0.000305399 ha; source Boessinger M. 2004; lognormal variance with pedigree 0.0092, pedigree (2,1,4,1,1)
  (same comment as for haying, by rotary tedder)
- tillage, rolling: 0.000305399 ha; source Boessinger M. 2004; lognormal variance with pedigree 0.0092, pedigree (2,1,4,1,1)
  (same comment as for haying, by rotary tedder)
- transport, tractor and trailer, agricultural: 0.001 metric ton*km; lognormal variance with pedigree 0.1364, pedigree (4,1,4,1,1)
  Transport of silage bales to farm; distance 1 km.

## Inputs from nature
- Carbon dioxide, in air [natural resource, in air]: 1.52244 kg; = 44/12 * (REF_PRODUCT_C_content_non_fossil * REF_PRODUCT * REF_PRODUCT_DM - (SEED_1_C_content_non_fossil * SEED_1 * SEED_1_DM + SEED_2_C_content_non_fossil * SEED_2 * SEED_2_DM)); lognormal variance with pedigree 0.0498, pedigree (2,2,4,1,1)
  Modelled,see chapter 'CO2 binding' in '01_crop production_direct field emissions and natural resources_v1.0.pdf' - pdf-document on the dedicated talk page of ecoinvent (www.ecoinvent.org/documentation)
- Energy, gross calorific value, in biomass [natural resource, biotic]: 18.09 MJ; lognormal variance with pedigree 0.0499, pedigree (2,3,4,3,4)
  (same comment as for ryegrass-red&Egyptian clover-mixture silage)
- Occupation, annual crop [natural resource, land]: 2.0583 m2*year; lognormal variance with pedigree 0.0109, pedigree (2,1,4,1,1)
  Modelled, see chapter 'Land use' in '01_crop production_direct field emissions and natural resources_v1.0.pdf' - pdf-document on the dedicated talk page of ecoinvent (www.ecoinvent.org/documentation)
- Transformation, from annual crop [natural resource, land]: 3.05399 m2; lognormal variance with pedigree 0.0169, pedigree (2,1,4,1,1)
  (same comment as for Occupation, annual crop)
- Transformation, to annual crop [natural resource, land]: 3.05399 m2; lognormal variance with pedigree 0.0169, pedigree (2,1,4,1,1)
  (same comment as for Occupation, annual crop)

## Emissions to nature
- Ammonia [air, non-urban air or from high stacks]: 0.00882857 kg; lognormal variance with pedigree 0.017, pedigree (2,2,4,1,1)
  Modelled with the 'AGRAMMON model' described in '01_crop production_direct field emissions and natural resources_v1.0.pdf' - pdf-document on the dedicated talk page of ecoinvent (www.ecoinvent.org/documentation)
- Dinitrogen monoxide [air, non-urban air or from high stacks]: 0.000772207 kg; name N2O; lognormal variance with pedigree 0.0498, pedigree (2,2,4,1,1)
  Modelled, see chapter 'Emissions of N2O to the air' in '01_crop production_direct field emissions and natural resources_v1.0.pdf' - pdf-document on the dedicated talk page of ecoinvent (www.ecoinvent.org/documentation)
- Nitrogen oxides [air, non-urban air or from high stacks]: 0.000162164 kg; = 0.21*N2O; lognormal variance with pedigree 0.0498, pedigree (2,2,4,1,1)
  Modelled, see chapter 'Emissions of NOx to the air' in '01_crop production_direct field emissions and natural resources_v1.0.pdf' - pdf-document on the dedicated talk page of ecoinvent (www.ecoinvent.org/documentation)
- Cadmium II [soil, agricultural]: 6.352e-8 kg; lognormal variance with pedigree 0.0498, pedigree (2,2,4,1,1)
  Modelled, see chapter 'Emissions of heavy metals to agricultural soil, surface water and ground water' in '01_crop production_direct field emissions and natural resources_v1.0.pdf' - pdf-document on the dedicated talk page of ecoinvent (www.ecoinvent.org/documentation)
- Chromium III [soil, agricultural]: -2.73757e-6 kg
  (same comment as for Cadmium II)
- Copper ion [soil, agricultural]: 1.42013e-5 kg; lognormal variance with pedigree 0.0498, pedigree (2,2,4,1,1)
  (same comment as for Cadmium II)
- Lead II [soil, agricultural]: 1.99243e-6 kg; lognormal variance with pedigree 0.0498, pedigree (2,2,4,1,1)
  (same comment as for Cadmium II)
- Mercury II [soil, agricultural]: 1.10268e-7 kg; lognormal variance with pedigree 0.0498, pedigree (2,2,4,1,1)
  (same comment as for Cadmium II)
- Nickel II [soil, agricultural]: 1.69874e-6 kg; lognormal variance with pedigree 0.0498, pedigree (2,2,4,1,1)
  (same comment as for Cadmium II)
- Zinc II [soil, agricultural]: 6.37261e-5 kg; lognormal variance with pedigree 0.0498, pedigree (2,2,4,1,1)
  (same comment as for Cadmium II)
- Cadmium II [water, ground-]: 5.25867e-9 kg; lognormal variance with pedigree 0.0951, pedigree (2,2,4,1,1)
  (same comment as for Cadmium II)
- Cadmium II [water, surface water]: 5.39244e-11 kg; lognormal variance with pedigree 0.0951, pedigree (2,2,4,1,1)
  (same comment as for Cadmium II)
- Chromium III [water, ground-]: 4.45121e-6 kg; lognormal variance with pedigree 0.0951, pedigree (2,2,4,1,1)
  (same comment as for Cadmium II)
- Chromium III [water, surface water]: 1.74664e-8 kg; lognormal variance with pedigree 0.0951, pedigree (2,2,4,1,1)
  (same comment as for Cadmium II)
- Copper ion [water, ground-]: 1.06287e-6 kg; lognormal variance with pedigree 0.0951, pedigree (2,2,4,1,1)
  (same comment as for Cadmium II)
- Copper ion [water, surface water]: 3.45926e-9 kg; lognormal variance with pedigree 0.0951, pedigree (2,2,4,1,1)
  (same comment as for Cadmium II)
- Lead II [water, ground-]: 5.40099e-8 kg; lognormal variance with pedigree 0.0951, pedigree (2,2,4,1,1)
  (same comment as for Cadmium II)
- Lead II [water, surface water]: 1.70535e-11 kg; lognormal variance with pedigree 0.0951, pedigree (2,2,4,1,1)
  (same comment as for Cadmium II)
- Mercury II [water, ground-]: 3.23907e-9 kg; lognormal variance with pedigree 0.0951, pedigree (2,2,4,1,1)
  (same comment as for Cadmium II)
- Nickel II [water, surface water]: 2.41366e-10 kg; lognormal variance with pedigree 0.0951, pedigree (2,2,4,1,1)
  (same comment as for Cadmium II)
- Nitrate [water, ground-]: 0.0340248 kg; lognormal variance with pedigree 0.0498, pedigree (2,2,4,1,1)
  Modelled with the 'SALCA-NO3 model' described in '01_crop production_direct field emissions and natural resources_v1.0.pdf' - pdf-document on the dedicated talk page of ecoinvent (www.ecoinvent.org/documentation)
- Phosphate [water, ground-]: 4.87393e-5 kg; lognormal variance with pedigree 0.0498, pedigree (2,2,4,1,1)
  Modelled, see chapter 'Emissions of phosphorous to the water' in '01_crop production_direct field emissions and natural resources_v1.0.pdf' - pdf-document on the dedicated talk page of ecoinvent (www.ecoinvent.org/documentation)
- Phosphate [water, surface water]: 0.000150506 kg; lognormal variance with pedigree 0.0498, pedigree (2,2,4,1,1)
  (same comment as for Phosphate)
- Zinc II [water, ground-]: 7.92429e-6 kg; lognormal variance with pedigree 0.0951, pedigree (2,2,4,1,1)
  (same comment as for Cadmium II)
- Zinc II [water, surface water]: 2.74371e-8 kg; lognormal variance with pedigree 0.0951, pedigree (2,2,4,1,1)
  (same comment as for Cadmium II)

## Sampling procedure
Data collected from literature and expert knowledge; some own estimates.

## Review by Thomas Nemecek 2011-12-16
Passed internally.

## Review by Assumpció ANTON 2012-01-26
Have you answered comments from cross cutting editors?
For further versions it could be advisable to add more information in exchange properties sheet related to days occupation, erosion, c_season, N uptake.

## Review by Stephan Pfister 2012-01-26
The comments of the first data set are also relevant for the others
