# bicycle production

Dataset: EcoSpold 2, unit process
Geography: RoW
Time period: 2000-01-01 to 2023-12-31
Technology level: current
Classification: EcoSpold01Categories: transport systems/road
Classification: ISIC rev.4 ecoinvent: 3092:Manufacture of bicycles and invalid carriages
Synonyms: Citybike
Scenario: Business-as-Usual
System model: Allocation, cut-off by classification
Generated by: Marianne Leuenberger
Published in: M. Leuenberger 2010
Database: ecoinvent
isCopyrightProtected: true
accessRestrictedTo: 1

## General comment
Based on "bicycle production, RER 2009". The data set reflects a bike of 17kg including additionals (e.g. carriers, lights). The frame material is Aluminium. Disposal of bicycle is included.

## Included activities end
This data set includes the material use for the manufacturing of an average bicycle and the disposal of a bicycle. Manufacturing of the bike parts is assumed to take place in China. Transport to Europe included.

## Geography
Extrapolated from "bicycle production, RER 2009". Data cover manufacturing in China and retail in Europe.

## Technology
Citybike

## Parameters
- fraction, process water, to air: 0.15 dimensionless; name fraction_PW_to_air; lognormal variance with pedigree 0.092025, pedigree (4,4,3,2,4)
  Literature value. In case when no industry/process specific data are available, default evaporation fraction value is used. This value is 15% and is based on literature (Statistics Canada, 2007 & Shaffer, K.H., 2008, Consumptive water use in the Great Lakes Basin, USGS & Shiklomanov, 2003, World Water Resources at the Beginning of the 21st Century) and has been approved by an expert.
- fraction, tap water, to air: 0.15 dimensionless; name fraction_TW_to_air; = fraction_PW_to_air; lognormal variance with pedigree 0.092025, pedigree (4,4,3,2,4)
  Calculated value. See comment in the other parametres present in this dataset. Tap water is considered to be always used as process water, thus process water fractions to air are applied to all tap water input flows to calculate the amount of water consumed in the processes.

## Reference product
- bicycle: 1 unit; name RP_amount_1; By-product classification allocatable product; CPC 49921: Bicycles and other cycles, not motorized; HS2017 871200: Bicycles and other cycles; including delivery tricycles, not motorised
  EcoSpold01Location=RER
  production volume 2.67763 unit; name RP_PV_1
    This is a placeholder value that does not reflect real-world production volumes. This dataset does not currently require a real-world production volume to work in the database framework, and no actual data were collected yet. This has no negative effect on the results of the ecoinvent database.
  property price 85.59 EUR2005
    Calculated based on literature value (UN Commodity Trade Statistics Database) using data on trade value and net weight (kg) for 5 reference countries/regions (RER, USA, JP, CN and IN) which average is assumed to be a good approximation of the global price. This is not a purchaser's price.
  properties: carbon allocation 0 kg, carbon content 0, carbon content, fossil 0, carbon content, non-fossil 0, dry mass 0 kg, water content 0, water in wet mass 0 kg, wet mass 0 kg

## Inputs from technosphere
- aluminium, wrought alloy: 7.5325 kg; lognormal variance with pedigree 0.0426, pedigree (2,1,5,5,1)
  Uncertainty: Factsheets Bicycle parts manufacturere: Shimano, DT Swiss
  properties: dry mass 1 kg, wet mass 1 kg
- chromium steel removed by turning, average, conventional: 0.159 kg; lognormal variance with pedigree 0.1301, pedigree (4,2,5,5,4)
  EcoSpold01Location=RER
  Uncertainty: Assumption. Pedigree matrix set according to expert judgment
  properties: carbon content, fossil 0.0008, dry mass 1 kg, wet mass 1 kg
- electricity, medium voltage: 0.228981, 4.56765, 1.53472, 0.0701217, 0.0140348, 0.00301358, 0.471681 kWh (7 suppliers, which the file names only by identifier); sum of these 6.8902 kWh; lognormal variance with pedigree 0.132, pedigree (4,4,5,5,4)
  EcoSpold01Location=CN
  Uncertainty: Extrapolation from passenger car manufacture using weight ratio, thereof 25%
- heat, district or industrial, natural gas: 0.219551, 13.3607 MJ (2 suppliers, which the file names only by identifier); sum of these 13.5802 MJ; lognormal variance with pedigree 0.132, pedigree (4,4,5,5,4)
  EcoSpold01Location=RER
  Uncertainty: Extrapolation from passenger car manufacture; weight ratio
  properties: heating value, net 1 MJ
- heat, district or industrial, other than natural gas: 0.192609, 8.92321e-5 MJ (2 suppliers, which the file names only by identifier); sum of these 0.192698 MJ; lognormal variance with pedigree 0.132, pedigree (4,4,5,5,4)
  EcoSpold01Location=RER
  Uncertainty: Extrapolation from passenger car manufacture using weight ratio, thereof 25%
  properties: heating value, net 1 MJ
- injection moulding: 1.9575 kg; lognormal variance with pedigree 0.1301, pedigree (4,2,5,5,4)
  (same comment as for chromium steel removed by turning, average, conventional)
- municipal solid waste: -0.00791227, -0.000939547, -0.00584751, -4.4641, -0.000657459, -0.000211032, -0.000476991, -0.0198573 kg (8 suppliers, which the file names only by identifier); sum of these -4.5 kg; lognormal variance with pedigree 0.0032, pedigree (2,3,1,5,1)
  EcoSpold01Location=CH
  Uncertainty: Assumption based on: Cherry, C.R. 2009, 4.5 kg solid waste per bicycle
  production volume
    Calculated from the production volume of bicycle in proportion to the respective output amounts.
  properties: carbon content, fossil 0.171549, carbon content, non-fossil 0.261655, dry mass 0.771 kg, heating value, net 11.74 MJ, water content 0.297017, wet mass 1 kg
  note on carbon content, fossil: MSW composition in tab 4.1, ecoinvent v2.2 report 13_I. C content referred to 1 kg DM
  note on heating value, net: Value taken from the general comment of the treatment dataset.
- polyethylene, high density, granulate: 1.9575 kg; lognormal variance with pedigree 0.0512, pedigree (2,1,5,5,3)
  EcoSpold01Location=RER
  Uncertainty: Literature, Shimano/Selle Italia. Pedigree matrix set according to expert judgment and variance of log-transformed data set to default value
  properties: carbon content, fossil 0.857143, dry mass 1 kg, heating value, net 42.47 MJ, wet mass 1 kg
  note on carbon content, fossil: Polyethylene is formed out of a huge amount of ethylene monomers (C2H4) (ecoinvent v2.2 report 11_II). MW=28 g/mol
- polyurethane, flexible foam: 0.03 kg; lognormal variance with pedigree 0.0513, pedigree (2,2,5,5,3)
  EcoSpold01Location=RER
  Uncertainty: Literature, Selle Italia. Pedigree matrix set according to expert judgment and variance of log-transformed data set to default value
  properties: carbon content, fossil 0.633827, dry mass 1 kg, heating value, net 30.67 MJ, wet mass 1 kg
  note on carbon content, fossil: Polyurethanes (PUR) is the collective name for an extensive group of polymers with very different compositions and correspondingly varied property profiles, though their molecule chain contains all a urethane group (-NH-CO-O-). All PURs are built on a common principle : they are produced by the diisocyanate polyaddition process, that links polyols and (di)isocyanates. In this dataset, an example of typical polyurethane mixture is described (Ullmann, Polyurethanes, Dieterich et al. & ecoinvent v2 report 11_II). C content was calculated as an addition of C contents in its components.
- powder coat, aluminium sheet: 0.35 m2; lognormal variance with pedigree 0.13, pedigree (4,1,5,5,4)
  EcoSpold01Location=RER
  Uncertainty: Assumption: pipe diamter: 4cm, pipe length: 3m
- road vehicle factory: 9.3693e-10 unit; lognormal variance with pedigree 0.3426, pedigree (2,1,5,5,1)
  EcoSpold01Location=RER
  Uncertainty: Extrapolation for bicycle plant: 25% of weight ratio
- section bar extrusion, aluminium: 3.7663 kg; lognormal variance with pedigree 0.0907, pedigree (4,2,5,5,4)
  EcoSpold01Location=RER
  Uncertainty: Assumption for pipe drawing. Pedigree matrix set according to expert judgment and variance of log-transformed data set to default value
- steel, chromium steel 18/8, hot rolled: 1.59 kg; lognormal variance with pedigree 0.0426, pedigree (2,1,5,5,1)
  EcoSpold01Location=RER
  Uncertainty: Factsheets Bicycle parts manufacturere: Shimano, DT Swiss
  properties: carbon content, fossil 0.0008, dry mass 1 kg, wet mass 1 kg
  note on carbon content, fossil: Stainless steel model is the grade 304 steel (18/8 stainless, 18% chromium 8% nickel; max. 0.08% C)
- steel, low-alloyed, hot rolled: 4.9025 kg; lognormal variance with pedigree 0.0432, pedigree (2,1,5,5,1)
  EcoSpold01Location=RER
  Uncertainty: Factsheets Bicycle parts manufacturere: Shimano, DT Swiss. Pedigree matrix set according to expert judgment and variance of log-transformed data set to default value
  properties: carbon content, fossil 0.005, dry mass 1 kg, wet mass 1 kg
  note on carbon content, fossil: Low alloyed steel composition given in Tab. 3.2 ecoinvent v2.2 report 10_partII. Steel assumed to have a C content of 0.5%
- synthetic rubber: 0.5625 kg; lognormal variance with pedigree 0.0513, pedigree (2,2,5,5,3)
  EcoSpold01Location=RER
  Uncertainty: Literature, Schwalbe. Pedigree matrix set according to expert judgment and variance of log-transformed data set to default value
  properties: carbon content, fossil 0.871949, dry mass 1 kg, heating value, net 26.42 MJ, wet mass 1 kg
  note on carbon content, fossil: EPDM (Ethylene-propene-diene terpolymer) rubber is a terpolymer of ethylene, propene, and a diene with the residual unsaturated portion of the diene in the side chain (ecoinvent v2.2 report 7-part XX & Ullmann). Chemical formula (deduced from Evidences of Solvent-Induced Miscibility in Polychloroprene-co-Ethylene-Propene Diene Terpolymer Blends, Dubey et al., Journal of Applied Polymer Science, 2009, 111:1884–1891): C20H35
- tap water: 0.00151134, 0.00230391, 0.00429897, 0.0115811, 0.00139406, 0.0580954, 0.664815 kg (7 suppliers, which the file names only by identifier); sum of these 0.744 kg; lognormal variance with pedigree 0.0432, pedigree (2,3,5,5,1)
  EcoSpold01Location=RER
  Uncertainty: Assumption based on: Cherry, C.R. 2009, 1488 liters waste water for all production phases (incl. Battery manufacturing --> 50%)
  properties: carbon content, fossil 0.00178991, dry mass 0.000337476 kg, water content 2962.17, wet mass 1 kg
  note on carbon content, fossil: Bicarbonate content is 2.93 mol/m3. CO2 content is 0.1 mol/m3 (ecoinvent v2.2 report 8, Tab 93.1).
- used bicycle: -1 unit; name BP_amount_1; lognormal variance with pedigree 0.3026, pedigree (2,1,1,5,1)
  Uncertainty: Estimation: Bike 15'000km
  production volume; = RP_PV_1 * (BP_amount_1 / RP_amount_1)
    Calculated from production volume of reference product using the relative outputs.
  property carbon content, fossil 0.130184; name C_content_fossil
  property carbon content, non-fossil 0; name C_content_non_fossil
  property dry mass 17 kg; name DM
  property water content 0; name water_content
  property water in wet mass 0 kg; name WWM
  property wet mass 17 kg; name WM
- wastewater, average: -0.00074136, -2.63953e-6 m3 (2 suppliers, which the file names only by identifier); sum of these -0.000744 m3; lognormal variance with pedigree 0.0032, pedigree (2,3,1,5,1)
  EcoSpold01Location=CH
  Uncertainty: Assumption based on: Cherry, C.R. 2009, 1488 liters waste water for all production phases (incl. Battery manufacturing --> 50%)
  production volume
    (same comment as for municipal solid waste)
  properties: carbon content, non-fossil 0.194039, dry mass 0.346837 kg, water content 2882.2, wet mass 1000 kg
  note on carbon content, non-fossil: 0.0673 kg TOC/m3 (Tab A.17, ecoinvent v2.2 report 13_I). TOC was considered as Total Carbon.
- welding, arc, aluminium: 0.75 m; lognormal variance with pedigree 0.13, pedigree (4,1,5,5,4)
  EcoSpold01Location=RER
  Uncertainty: Assumption: pipe diameter: 4cm --> 0.125 m per joint, 6 joints per bike
- wire drawing, steel: 0.3375 kg; lognormal variance with pedigree 0.13, pedigree (4,1,5,5,4)
  EcoSpold01Location=RER
  Uncertainty: Assumption

## Emissions to nature
- Water [air, unspecified]: 0.0001116 m3; name water_to_air_unspecified; = (tap_water_input/1000)*fraction_TW_to_air; lognormal variance with pedigree 0.130025, pedigree (4,4,5,2,4)
  Calculated value based on literature values and expert opinion. See comments in the parametres' comment field.
  property fraction, origin: fresh water 1; name fraction_origin_fresh_water
  property fraction, origin: salt water 0; name fraction_origin_salt_water
  property fraction, origin: unspecified 0; name fraction_origin_unspecified

## Sampling procedure
Literature

## Extrapolations
Manufacturing plant is extrapolated from passenger car plant, electricity consumption extrapolated according to weight ratio from passenger car (50%) This dataset has been copied from an original dataset covering the geography RER. The uncertainty has been adjusted accordingly.

## Review by Christian Bauer 2010-02-07
26.01.2010
passed
C:\Dokumente und Einstellungen\Marianne\Eigene Dateien\Projekte\277_Mobitool\Review\[Ecospold_Bike-v1.1.xls]X-Process

## Review by Carl Vadenbo 2012-06-28
In preparation for the release of ecoinvent v3.0, exchange for disposal of used bicycle was moved from the dataset 'transport, passenger, bicycle, GLO' to 'bicycle production, GLO' The amounts and the uncertainty information of the exchanges were reviewed and the dataset was accepted for inclusion into the ecoinvent database on 2012.07.04.
