# chlor-alkali electrolysis, membrane cell

Dataset: EcoSpold 2, unit process
Geography: RoW
Time period: 2020-01-01 to 2025-12-31
Technology level: current
Classification: ISIC rev.4 ecoinvent: 2011:Manufacture of basic chemicals
Synonyms: membrane cell; Bertholite; molecular chlorine; Chlor
Scenario: Business-as-Usual
System model: Allocation, cut-off by classification
Generated by: Sabrina Ludmann
Published in: EuroChlor 2022
Database: ecoinvent
isCopyrightProtected: true
accessRestrictedTo: 1

## General comment
This dataset represents the production of chlorine and sodium hydroxide (NaOH) by means of chlor-alkali electrolysis using a membrane cell. The chlor-alkali process is the main technology for the production of chlorine and sodium hydroxide, with the largest share produced with membrane cells in Europe (about 85%).
In the chlor-alkali process, brine (salt solution) is fed to the electrolysis unit where the brine is electrochemically decomposed into chlorine, hydrogen, and sodium hydroxide.
Chlorine is largely used in the synthesis of chlorinated organic compounds. PVC and isocyanates are the main drivers of chlor-alkali production in the EU-27 and EFTA countries (Euro Chlor 2013). These products are used in a wide range of applications, such as construction materials, plastics, clothing and pesticides.
Sodium hydroxide is a white odorless pellet or solid that is very soluble. Sodium hydroxide is used for the synthesis of other chemicals, and is used in the metal industry, the pulp and paper sector, the textile industry and in other various sectors.
This dataset is extrapolated from European data.
References:
EuroChlor (2022): Chlorine (The Chlor-Alkali Process), An Eco-Profile and Environmental Product Declaration of the European Chlor-Alkali Industry.
Brinkmann T., Santonja G. G., Schorcht F., Roudier S., Delgado Sancho L. (2014): Best Available Techniques (BAT) Reference Document for the Production of Chlor-alkali, Joint Research Centre, available here: https://eippcb.jrc.ec.europa.eu/sites/default/files/2019-11/CAK_BREF_102014.pdf, last accessed 19-07-2023.

## Included activities start
The activity starts when the raw materials enter the process.

## Included activities end
This activity ends with the production of gaseous chlorine, sodium hydroxide and further products. Besides the electrolysis process, the following process steps are included in this activity: brine production, brine purification, as well as the final handling of the electrolysis products, without the chlorine liquefaction. Infrastructure is included in the dataset.

## Geography
Extrapolated from the European dataset. Literature data, representative for min. 75 % of European (EU + GB, NO, CH) production capacity, based on installed nameplate capacity.

## Technology
This dataset is extrapolated from the European dataset.
In the chlor-alkali electrolysis, a sodium chloride solution is decomposed electrochemically by direct current.
Chemical processes at the anode: chloride ions are oxidised and gaseous chlorine (Cl2) is formed:
Anode: 2 Cl- --> Cl2 + 2 e-
In membrane cells, water is decomposed at the cathode into hydrogen and hydroxide ions:
2 Na+ + 2 e- + 2 H2O --> 2 NaOH + H2
As a result, the overall reaction in the chlor-alkali unit for all techniques is:
2 NaCl + 2 H2O --> Cl2 + 2 NaOH + H2
Hydrogen leaving the cells is highly concentrated (> 99.9 vol.-%) and usually only a little processing is needed.
Sodium hypochlorite is produced by feeding gaseous chlorine into a dilute solution of sodium hydroxide.
The chlorine reacts with the sodium hydroxide under the formation of sodium hypochlorite, sodium chloride, and water:
Cl2 + 2 NaOH --> NaOCl + NaCl + H2O
When the desired concentration of sodium hypochlorite is reached, the solution is withdrawn from circulation and directed to a cooled storage tank.
References:
EuroChlor (2022): Chlorine (The Chlor-Alkali Process), An Eco-Profile and Environmental Product Declaration of the European Chlor-Alkali Industry.
Brinkmann T., Santonja G. G., Schorcht F., Roudier S., Delgado Sancho L. (2014): Best Available Techniques (BAT) Reference Document for the Production of Chlor-alkali, Joint Research Centre, available here: https://eippcb.jrc.ec.europa.eu/sites/default/files/2019-11/CAK_BREF_102014.pdf, laste accessed 19-07-2023.

## Time period
Data collection 2021. The technology is not expected to change within 4 years.

## Reference product
- chlorine, gaseous: 1 kg; name RP; By-product classification allocatable product; CPC 34231: Chemical elements n.e.c.; inorganic acids except phosphoric, nitric and sulphonitric; inorganic oxygen compoun[…]; HS2017 280110: Chlorine; CAS 7782-50-5
  production volume 7.42013e10 kg; name RP_PV; = 97.33E9*0.85
    Based on statista, the Global market volume of chlorine in 2022 is 97.33 million metric tonnes.
    Based on the World Chlorine Council, about 85% of the Global chlorine is produced by membrane cells in 2019.
    References:
    Statista (2023): Market volume of chlorine worldwide from 2015-2022, with a forecast for 2023 to 2030, available here: https://www.statista.com/statistics/1310477/chlorine-market-volume-worldwide/, last accessed 14-08-2023.
    World Chlorine Council (2021): Chlor-Alkali Manufacturing Processes, available here: https://www.eurochlor.org/wp-content/uploads/2021/09/WCC-CA-Manufacturing-Processes-brochure.pdf, last accessed 14-08-2023.
  property price 0.141 EUR2005
    Global average price for gaseous chlorine derived from the global average price of liquid chlorine by substracting the cost of inputs (0.07 KWh of electricity, medium voltage) needed for the liquefaction (0.007EUR/kg of liquid chlorine at an electricity price of 0.1EUR/kWh). The price for liquid chlorine (0.148 EUR/kg) was calculated as weighted average of the European (238Eur/tonne), US (223EUR/tonne) and the Chinese (84EUR/tonne) (Tecnon OrbiCHem, 2016) price according to the region's market shares (Europe 15%, US 20%, China 45%) scaled to 100% (ruschlor.ru, 2014).
    Reference(s):
    Tecnon OrbiCHem. 2016. Chem-Netfacts, Chemical insight an foresight - on a single page, Chlorine, 1 April 2016, document requested at http://www.orbichem.com/Chem-Netfacts.aspx?P_ID=208, 6 October 2017;
    ruschlor.ru. 2014. International Outlook for the Future of the Chinese Chlor-Alkali Industry retrieved from http://ruschlor.ru/english/images/stories/Pekin%20/Otchet_Engl/_.doc, 6 October 2017
  properties: allocation factor 0.339977, carbon allocation 0 kg, carbon content 0, carbon content, fossil 0, carbon content, non-fossil 0, dry mass 1 kg, true value 0.141, water content 0, water in wet mass 0 kg, wet mass 1 kg

## Inputs from technosphere
- activated carbon, granular: 2.03324e-6 kg; lognormal variance with pedigree 0.0044, pedigree (2,3,1,5,2)
  Literature data, representative for min. 75 % of European (EU + GB, NO, CH) production capacity, based on installed nameplate capacity.
  Based on EuroChlor (2022): Chlorine (The Chlor-Alkali Process), An Eco-Profile and Environmental Product Declaration of the European Chlor-Alkali Industry.
  properties: carbon content, fossil 0.81, dry mass 0.97 kg, heating value, net 30.23 MJ, water content 0.030928, wet mass 1 kg
  note on carbon content, fossil: Literature value. From Biomass and Bioenergy: Processing and Properties (2014) edited by Khalid Rehman Hakeem, Mohammad Jawaid, Umer Rashid (p. 252). Carbon content is in the range of 72-90%, an average value of 81% is taken.
- ammonia, anhydrous, liquid: 2.42038e-9, 4.69845e-9, 5.20793e-8, 2.20143e-9, 4.92448e-10, 1.80984e-8, 1.55577e-9 kg (7 suppliers, which the file names only by identifier); sum of these 8.15462e-8 kg; lognormal variance with pedigree 0.0044, pedigree (2,3,1,5,2)
  (same comment as for activated carbon, granular)
  properties: dry mass 1 kg, wet mass 1 kg
- anionic resin: 3.58446e-6 kg; lognormal variance with pedigree 0.0044, pedigree (2,3,1,5,2)
  (same comment as for activated carbon, granular)
  properties: carbon content, fossil 0.680721, dry mass 0.5 kg, heating value, net 9.09 MJ, water content 1, wet mass 1 kg
  note on carbon content, fossil: Cross-linked polystyrene beads are treated with chloromethyl methyl ether under anhydrous conditions, with either aluminum chloride or tin(IV) chloride as catalyst. Chloromethylated polystyrene is obtained. In a second stage, the chlorine in the chloromethylated group can be replaced by an amine (Anion exchange resins, in Ullmann). In this case, Trimethylamine, C3H9N, is used (ecoinvent v2.2 report 8-part 93). That is, the resine can be formulated as C12H18NCl (after Ullmann, Anion exchange resins). The resine is hydrated (ecoinvent v2.2 report 8, part II, Tab 93.7)
- barium carbonate: 1.6787e-5 kg; lognormal variance with pedigree 0.0044, pedigree (2,3,1,5,2)
  (same comment as for activated carbon, granular)
- calcium chloride: 0.000215185 kg; lognormal variance with pedigree 0.0044, pedigree (2,3,1,5,2)
  (same comment as for activated carbon, granular)
  properties: dry mass 1 kg, wet mass 1 kg
- carbon dioxide, liquid: 0.000324181 kg; lognormal variance with pedigree 0.0044, pedigree (2,3,1,5,2)
  (same comment as for activated carbon, granular)
  properties: carbon content, fossil 0.272727, dry mass 1 kg, heating value, net 8.27 MJ, wet mass 1 kg
- cationic resin: 3.58446e-6 kg; lognormal variance with pedigree 0.0044, pedigree (2,3,1,5,2)
  (same comment as for activated carbon, granular)
  properties: carbon content, fossil 0.521606, dry mass 0.5 kg, heating value, net 6.68 MJ, water content 1, wet mass 1 kg
  note on carbon content, fossil: Chemically inert polystyrene beads are treated with concentrated sulfuric or chlorosulfonic acid to give cross-linked polystyrene 3-sulfonic acid (Cation exchange resins, Ullmann). The resine was approximated as C8H8O3S (from Ullmann, Cation exchange resins). The resine is hydrated (ecoinvent v2.2 report 8, part II, Tab 93.5)
- chemical factory, organics: 1.35991e-10 unit; lognormal variance with pedigree 0.3432, pedigree (2,4,1,4,4)
  Calculated based on literature data published by the industry. For this activity, no information was readily available concerning infrastructure and land-use. Therefore, the infrastructure is estimated based on data from two chemical factories, the BASF site of Ludwigshafen and the chemical factory in Gendorf (which are both located in Germany), which produce a wide range of chemical substances. Based on this data, the following assumptions are made: the built area amounts to about 4.2 ha, the plant has an average output of 50'000 t/a and a lifespan of fifty years. The estimated infrastructure amount is therefore 4.00 E-10 units per kg of produced chemical.
- chemical, inorganic: 0.000193877 kg; lognormal variance with pedigree 0.0044, pedigree (2,3,1,5,2)
  Proxy for magnesium chloride and calcium hydroxide.
  Literature data, representative for min. 75 % of European (EU + GB, NO, CH) production capacity, based on installed nameplate capacity.
  Based on EuroChlor (2022): Chlorine (The Chlor-Alkali Process), An Eco-Profile and Environmental Product Declaration of the European Chlor-Alkali Industry.
  properties: carbon content, fossil 0.003, dry mass 1 kg, wet mass 1 kg
  note on carbon content, fossil: This dataset is an unweighted average of 20 inorganic substances (listed in Tab 88.1, ecoinvent v2.2 report 8, part II), being part of the top100 chemicals included in this database. The C-content has also been calculated as an unweighted average of the C content of the substances composing this dataset.
- chemical, organic: 6.75603e-5 kg; lognormal variance with pedigree 0.0044, pedigree (2,3,1,5,2)
  Proxy for cellulose and anti-foam agents.
  Literature data, representative for min. 75 % of European (EU + GB, NO, CH) production capacity, based on installed nameplate capacity.
  Based on EuroChlor (2022): Chlorine (The Chlor-Alkali Process), An Eco-Profile and Environmental Product Declaration of the European Chlor-Alkali Industry.
  properties: carbon content, fossil 0.628, dry mass 1 kg, heating value, net 19.03 MJ, wet mass 1 kg
  note on carbon content, fossil: This dataset is an unweighted average of 20 organic substances (listed in Tab 88.1, ecoinvent v2.2 report 8, part II), being part of the top100 chemicals included in this database. The C-content has also been calculated as an unweighted average of the C content of the substances composing this dataset.
- compressed air, 600 kPa gauge: 0.0118245 m3; lognormal variance with pedigree 0.0044, pedigree (2,3,1,5,2)
  (same comment as for activated carbon, granular)
- disodium disulphite: 2.8635e-5 kg; lognormal variance with pedigree 0.0044, pedigree (2,3,1,5,2)
  (same comment as for activated carbon, granular)
  properties: dry mass 1 kg, wet mass 1 kg
- electricity, medium voltage: 0.0310428, 0.619234, 0.0155017, 0.00950636, 0.00190269, 0.00040855, 0.0639455, 0.18379 kWh (8 suppliers, which the file names only by identifier); sum of these 0.925331 kWh; lognormal variance with pedigree 0.0044, pedigree (2,3,1,5,2)
  (same comment as for activated carbon, granular)
- ethylene glycol: 5.70371e-8 kg; lognormal variance with pedigree 0.0044, pedigree (2,3,1,5,2)
  (same comment as for activated carbon, granular)
  properties: carbon content, fossil 0.387097, dry mass 1 kg, heating value, net 23.44 MJ, wet mass 1 kg
- hazardous waste, for incineration: -0.000122052 kg; name BP_hazwaste_incin; lognormal variance with pedigree 0.0044, pedigree (2,3,1,5,2)
  (same comment as for activated carbon, granular)
  production volume; name PV_BP_hazwaste_incin; = RP_PV*BP_hazwaste_incin/RP
    Calculated from production volume of reference product using the relative outputs.
  properties: carbon content, fossil 0.554667, dry mass 0.75 kg, heating value, net 17 MJ, water content 0.333333, wet mass 1 kg
  note on carbon content, fossil: Tab A.6, ecoinvent v2.2 report 13_I. C content has been calculated after data in the tables, and then referred to 1 kg DM
  note on heating value, net: Value taken from the general comment of the treatment dataset.
- hazardous waste, for underground deposit: -0.000897541 kg; name BP_hazwaste_dep; lognormal variance with pedigree 0.0044, pedigree (2,3,1,5,2)
  (same comment as for activated carbon, granular)
  production volume; name PV_BP_hazwaste_dep; = RP_PV*BP_hazwaste_dep/RP
    Calculated from production volume of reference product using the relative outputs.
  properties: carbon content, fossil 0.554667, dry mass 1 kg, wet mass 1 kg
  note on carbon content, fossil: Tab A.6, ecoinvent v2.2 report 13_I, average hazardous waste composition was used, and referred to 0% water mass. No waste-specific emission are currently inventoried for underground deposits. Accordingly, no waste composition must be specified. For generic, average waste to underground deposit deposition in a 200 liter steel drum without cement solidification is assumed (ecoinvent v2.2 report 13_I).
- heat, from steam, in chemical industry: 0.778431 MJ; lognormal variance with pedigree 0.0044, pedigree (2,3,1,5,2)
  (same comment as for activated carbon, granular)
  properties: heating value, net 1 MJ
- hydrochloric acid, without water, in 30% solution state: 0.0112314 kg; lognormal variance with pedigree 0.0044, pedigree (2,3,1,5,2)
  (same comment as for activated carbon, granular)
  properties: dry mass 1 kg, heating value, net 3.32 MJ, wet mass 1 kg
- hydrogen peroxide, without water, in 50% solution state: 0.000100711 kg; lognormal variance with pedigree 0.0044, pedigree (2,3,1,5,2)
  (same comment as for activated carbon, granular)
  properties: dry mass 1 kg, heating value, net 7.13 MJ, wet mass 1 kg
- hydrogen, gaseous, low pressure: 1.7372e-6, 1.07422e-6, 7.33947e-6 kg (3 suppliers, which the file names only by identifier); sum of these 1.01509e-5 kg; lognormal variance with pedigree 0.0044, pedigree (2,3,1,5,2)
  (same comment as for activated carbon, granular)
  properties: dry mass 1 kg, heating value, net 120.21 MJ, wet mass 1 kg
- inert waste: -0.00101653 kg; name BP_inertwaste; lognormal variance with pedigree 0.0044, pedigree (2,3,1,5,2)
  (same comment as for activated carbon, granular)
  production volume; name PV_BP_inertwaste; = RP_PV*BP_inertwaste/RP
    Calculated from production volume of reference product using the relative outputs.
  properties: dry mass 1 kg, wet mass 1 kg
- natural gas, high pressure: 2.5216e-6, 4.25363e-6, 9.27846e-6, 3.10511e-6, 7.25651e-7, 4.31893e-6, 4.14434e-6, 1.08976e-5, 4.20721e-6, 6.50737e-6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 m3 (36 suppliers, which the file names only by identifier); sum of these 0.000314033 m3; lognormal variance with pedigree 0.0044, pedigree (2,3,1,5,2)
  (same comment as for activated carbon, granular)
  properties: carbon content, fossil 0.741, dry mass 0.735 kg, heating value, gross 40 MJ, heating value, net 36 MJ, wet mass 0.735 kg
  note on heating value, gross: At standard conditions; based on Meili et al. (2022) section 5.2
- nitrogen, liquid: 0.00440235 kg; lognormal variance with pedigree 0.0044, pedigree (2,3,1,5,2)
  (same comment as for activated carbon, granular)
  properties: dry mass 1 kg, wet mass 1 kg
- oxygen, liquid: 3.21102e-7 kg; lognormal variance with pedigree 0.0044, pedigree (2,3,1,5,2)
  (same comment as for activated carbon, granular)
  properties: dry mass 1 kg, wet mass 1 kg
- perfluoropentane: 4.06601e-8 kg; lognormal variance with pedigree 0.0044, pedigree (2,3,1,5,2)
  (same comment as for activated carbon, granular)
  properties: carbon content, fossil 0.0953262, dry mass 1 kg, heating value, net 6.32 MJ, wet mass 1 kg
- platinum: 1.76847e-9 kg; lognormal variance with pedigree 0.0044, pedigree (2,3,1,5,2)
  Proxy for electrode, assumed to be 0.1 wt% Pt with TiO2.
  Literature data, representative for min. 75 % of European (EU + GB, NO, CH) production capacity, based on installed nameplate capacity.
  Based on EuroChlor (2022): Chlorine (The Chlor-Alkali Process), An Eco-Profile and Environmental Product Declaration of the European Chlor-Alkali Industry.
  properties: dry mass 1 kg, wet mass 1 kg
- potassium carbonate: 1.13426e-5 kg; lognormal variance with pedigree 0.0044, pedigree (2,3,1,5,2)
  (same comment as for activated carbon, granular)
  properties: carbon content, fossil 0.0869565, dry mass 1 kg, heating value, net 2.63 MJ, wet mass 1 kg
- potassium chloride: 0.00192642 kg; lognormal variance with pedigree 0.0044, pedigree (2,3,1,5,2)
  (same comment as for activated carbon, granular)
  properties: dry mass 1 kg, wet mass 1 kg
- refrigerant R134a: 1.70332e-6 kg; lognormal variance with pedigree 0.0044, pedigree (2,3,1,5,2)
  (same comment as for activated carbon, granular)
  properties: carbon content, fossil 0.235294, dry mass 1 kg, heating value, net 9.51 MJ, wet mass 1 kg
- soda ash, dense: 0.00282782 kg; lognormal variance with pedigree 0.0044, pedigree (2,3,1,5,2)
  (same comment as for activated carbon, granular)
  properties: carbon content, fossil 0.11322, dry mass 1 kg, heating value, net 3.43 MJ, wet mass 1 kg
- sodium chloride, powder: 0.63406 kg; lognormal variance with pedigree 0.0044, pedigree (2,3,1,5,2)
  (same comment as for activated carbon, granular)
  properties: dry mass 1 kg, wet mass 1 kg
- sodium hydrogen sulfite: 0.000554894 kg; lognormal variance with pedigree 0.0044, pedigree (2,3,1,5,2)
  (same comment as for activated carbon, granular)
  properties: dry mass 1 kg, wet mass 1 kg
- sodium sulfide: 1.83477e-5 kg; lognormal variance with pedigree 0.0044, pedigree (2,3,1,5,2)
  (same comment as for activated carbon, granular)
  properties: dry mass 1 kg, wet mass 1 kg
- sodium sulfite: 0.000150896 kg; lognormal variance with pedigree 0.0044, pedigree (2,3,1,5,2)
  (same comment as for activated carbon, granular)
  properties: dry mass 1 kg, wet mass 1 kg
- sulfuric acid: 0.00556955 kg; lognormal variance with pedigree 0.0044, pedigree (2,3,1,5,2)
  (same comment as for activated carbon, granular)
  properties: dry mass 1 kg, wet mass 1 kg
- titanium dioxide: 1.7667e-6 kg; lognormal variance with pedigree 0.0044, pedigree (2,3,1,5,2)
  (same comment as for platinum)
  properties: dry mass 1 kg, wet mass 1 kg
- wastewater, average: -0.000889221 m3; name BP_wastewater; lognormal variance with pedigree 0.0044, pedigree (2,3,1,5,2)
  (same comment as for activated carbon, granular)
  production volume; name PV_BP_wastewater; = RP_PV*BP_wastewater/RP
    Calculated from production volume of reference product using the relative outputs.
  properties: carbon content, non-fossil 0.194039, dry mass 0.346837 kg, mass concentration, TOC 0.1091 kg/m3, mass concentration, calcium 0.039453 kg/m3, mass concentration, chlorine 0.030031 kg/m3, mass concentration, hydrogen 0.013365 kg/m3, mass concentration, nitrogen 0.031015 kg/m3, mass concentration, oxygen 0.069824 kg/m3, mass concentration, sodium 0.06456 kg/m3, mass concentration, sulfur 0.015602 kg/m3, water content 2882.2, wet mass 1000 kg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
  note on carbon content, non-fossil: 0.0673 kg TOC/m3 (Tab A.17, ecoinvent v2.2 report 13_I). TOC was considered as Total Carbon.
- water, deionised: 0.632531 kg; lognormal variance with pedigree 0.0044, pedigree (2,3,1,5,2)
  (same comment as for activated carbon, granular)
  properties: wet mass 1 kg

## Inputs from nature
- Water, cooling, unspecified natural origin [natural resource, in water]: 0.0137286 m3; lognormal variance with pedigree 0.0044, pedigree (2,3,1,5,2)
  (same comment as for activated carbon, granular)

## Emissions to nature
- Ammonia [air, unspecified]: 8.91135e-8 kg; lognormal variance with pedigree 0.0438, pedigree (2,3,1,5,2)
  (same comment as for activated carbon, granular)
- Carbon dioxide, fossil [air, unspecified]: 0.000619822 kg; lognormal variance with pedigree 0.0044, pedigree (2,3,1,5,2)
  (same comment as for activated carbon, granular)
- Carbon monoxide, fossil [air, unspecified]: 8.22557e-7 kg; lognormal variance with pedigree 0.6538, pedigree (2,3,1,5,2)
  (same comment as for activated carbon, granular)
- Chlorine [air, unspecified]: 7.99292e-8 kg; lognormal variance with pedigree 0.0438, pedigree (2,3,1,5,2)
  (same comment as for activated carbon, granular)
- Chloro-fluoromethane [air, unspecified]: 2.78409e-8 kg; lognormal variance with pedigree 0.1238, pedigree (2,3,1,5,2)
  (same comment as for activated carbon, granular)
- Difluoromethane [air, unspecified]: 4.13288e-8 kg; lognormal variance with pedigree 0.1238, pedigree (2,3,1,5,2)
  (same comment as for activated carbon, granular)
- Dinitrogen monoxide [air, unspecified]: 3.8966e-9 kg; lognormal variance with pedigree 0.0438, pedigree (2,3,1,5,2)
  (same comment as for activated carbon, granular)
- Hydrochloric acid [air, unspecified]: 1.89993e-7 kg; lognormal variance with pedigree 0.0438, pedigree (2,3,1,5,2)
  (same comment as for activated carbon, granular)
- Hydrogen [air, unspecified]: 0.00103655 kg; lognormal variance with pedigree 0.0438, pedigree (2,3,1,5,2)
  (same comment as for activated carbon, granular)
- Mercury II [air, unspecified]: 8.47086e-12 kg; lognormal variance with pedigree 0.6538, pedigree (2,3,1,5,2)
  (same comment as for activated carbon, granular)
- Methane, fossil [air, unspecified]: 5.47782e-9 kg; lognormal variance with pedigree 0.0438, pedigree (2,3,1,5,2)
  (same comment as for activated carbon, granular)
- Nitrogen oxides [air, unspecified]: 1.69662e-6 kg; lognormal variance with pedigree 0.0438, pedigree (2,3,1,5,2)
  (same comment as for activated carbon, granular)
- Particulate Matter, < 2.5 um [air, unspecified]: 4.74368e-10 kg; lognormal variance with pedigree 0.3038, pedigree (2,3,1,5,2)
  (same comment as for activated carbon, granular)
- Particulate Matter, > 10 um [air, unspecified]: 2.84383e-6 kg; lognormal variance with pedigree 0.0438, pedigree (2,3,1,5,2)
  (same comment as for activated carbon, granular)
- Particulate Matter, > 2.5 um and < 10um [air, unspecified]: 1.66029e-9 kg; lognormal variance with pedigree 0.1238, pedigree (2,3,1,5,2)
  Proxy for PFPE (perfluoropolyether).
  Literature data, representative for min. 75 % of European (EU + GB, NO, CH) production capacity, based on installed nameplate capacity.
  Based on EuroChlor (2022): Chlorine (The Chlor-Alkali Process), An Eco-Profile and Environmental Product Declaration of the European Chlor-Alkali Industry.
- Sulfur oxides [air, unspecified]: 2.82362e-11 kg; lognormal variance with pedigree 0.0438, pedigree (2,3,1,5,2)
  (same comment as for activated carbon, granular)
- 1,1,1-Trichloroethane [water, unspecified]: 9.14853e-10 kg; lognormal variance with pedigree 0.3038, pedigree (2,3,1,5,2)
  Proxy for chloroorganics.
  Literature data, representative for min. 75 % of European (EU + GB, NO, CH) production capacity, based on installed nameplate capacity.
  Based on EuroChlor (2022): Chlorine (The Chlor-Alkali Process), An Eco-Profile and Environmental Product Declaration of the European Chlor-Alkali Industry.
- 2-Chlorophenol [water, unspecified]: 3.38834e-11 kg; lognormal variance with pedigree 0.3038, pedigree (2,3,1,5,2)
  Proxy for pentachlorophenol.
  Literature data, representative for min. 75 % of European (EU + GB, NO, CH) production capacity, based on installed nameplate capacity.
  Based on EuroChlor (2022): Chlorine (The Chlor-Alkali Process), An Eco-Profile and Environmental Product Declaration of the European Chlor-Alkali Industry.
- AOX, Adsorbable Organic Halides [water, unspecified]: 6.19565e-8 kg; lognormal variance with pedigree 0.3038, pedigree (2,3,1,5,2)
  (same comment as for activated carbon, granular)
- Aluminium III [water, unspecified]: 4.15138e-8 kg; lognormal variance with pedigree 0.6538, pedigree (2,3,1,5,2)
  (same comment as for activated carbon, granular)
- Ammonium [water, unspecified]: 2.79016e-8 kg; lognormal variance with pedigree 0.0438, pedigree (2,3,1,5,2)
  (same comment as for activated carbon, granular)
- Arsenic ion [water, unspecified]: 5.37561e-10 kg; lognormal variance with pedigree 0.6538, pedigree (2,3,1,5,2)
  (same comment as for activated carbon, granular)
- BOD5, Biological Oxygen Demand [water, unspecified]: 1.8602e-7 kg; lognormal variance with pedigree 0.0438, pedigree (2,3,1,5,2)
  (same comment as for activated carbon, granular)
- Bromate [water, unspecified]: 9.9903e-9 kg; lognormal variance with pedigree 0.0438, pedigree (2,3,1,5,2)
  (same comment as for activated carbon, granular)
- COD, Chemical Oxygen Demand [water, unspecified]: 4.21559e-6 kg; lognormal variance with pedigree 0.0438, pedigree (2,3,1,5,2)
  (same comment as for activated carbon, granular)
- Cadmium II [water, unspecified]: 1.69417e-13 kg; lognormal variance with pedigree 0.6538, pedigree (2,3,1,5,2)
  (same comment as for activated carbon, granular)
- Chlorate [water, unspecified]: 0.000142047 kg; lognormal variance with pedigree 0.0438, pedigree (2,3,1,5,2)
  (same comment as for activated carbon, granular)
- Chloride [water, unspecified]: 0.0128091 kg; lognormal variance with pedigree 0.0438, pedigree (2,3,1,5,2)
  (same comment as for activated carbon, granular)
- Chlorine [water, unspecified]: 6.42046e-8 kg; lognormal variance with pedigree 0.0438, pedigree (2,3,1,5,2)
  (same comment as for activated carbon, granular)
- Chloroform [water, unspecified]: 2.76981e-8 kg; lognormal variance with pedigree 0.3038, pedigree (2,3,1,5,2)
  Proxy for trichloromethane.
  Literature data, representative for min. 75 % of European (EU + GB, NO, CH) production capacity, based on installed nameplate capacity.
  Based on EuroChlor (2022): Chlorine (The Chlor-Alkali Process), An Eco-Profile and Environmental Product Declaration of the European Chlor-Alkali Industry.
- Chromium III [water, unspecified]: 8.24261e-9 kg; lognormal variance with pedigree 0.6538, pedigree (2,3,1,5,2)
  (same comment as for activated carbon, granular)
- Copper ion [water, unspecified]: 3.08299e-8 kg; lognormal variance with pedigree 0.6538, pedigree (2,3,1,5,2)
  (same comment as for activated carbon, granular)
- Cyanide [water, unspecified]: 2.31192e-9 kg; lognormal variance with pedigree 0.0438, pedigree (2,3,1,5,2)
  (same comment as for activated carbon, granular)
- DOC, Dissolved Organic Carbon [water, unspecified]: 1.39595e-6 kg; lognormal variance with pedigree 0.0438, pedigree (2,3,1,5,2)
  Assumption DOC = TOC.
- Dichloromethane [water, surface water]: 1.08427e-9 kg; lognormal variance with pedigree 0.0438, pedigree (2,3,1,5,2)
  (same comment as for activated carbon, granular)
- Dioxins, measured as 2,3,7,8-tetrachlorodibenzo-p-dioxin [water, unspecified]: 5.73195e-11 kg; lognormal variance with pedigree 0.3038, pedigree (2,3,1,5,2)
  (same comment as for activated carbon, granular)
- Fluoride [water, unspecified]: 1.15351e-7 kg; lognormal variance with pedigree 0.0438, pedigree (2,3,1,5,2)
  (same comment as for activated carbon, granular)
- Hexachlorobenzene [water, unspecified]: 7.85531e-9 kg; lognormal variance with pedigree 0.3038, pedigree (2,3,1,5,2)
  (same comment as for activated carbon, granular)
- Iron ion [water, unspecified]: 3.19327e-7 kg; lognormal variance with pedigree 0.6538, pedigree (2,3,1,5,2)
  (same comment as for activated carbon, granular)
- Lead II [water, unspecified]: 9.61556e-10 kg; lognormal variance with pedigree 0.6538, pedigree (2,3,1,5,2)
  (same comment as for activated carbon, granular)
- Mercury II [water, unspecified]: 3.00711e-9 kg; lognormal variance with pedigree 0.6538, pedigree (2,3,1,5,2)
  (same comment as for activated carbon, granular)
- Nickel II [water, unspecified]: 1.46456e-8 kg; lognormal variance with pedigree 0.6538, pedigree (2,3,1,5,2)
  (same comment as for activated carbon, granular)
- Nitrate [water, unspecified]: 3.70452e-6 kg; lognormal variance with pedigree 0.0438, pedigree (2,3,1,5,2)
  (same comment as for activated carbon, granular)
- Nitrogen [water, unspecified]: 1.2575e-6 kg; lognormal variance with pedigree 0.0438, pedigree (2,3,1,5,2)
  (same comment as for activated carbon, granular)
- Pentachlorobenzene [water, unspecified]: 1.40108e-8 kg; lognormal variance with pedigree 0.0438, pedigree (2,3,1,5,2)
  (same comment as for activated carbon, granular)
- Phosphorus [water, unspecified]: 1.76707e-7 kg; lognormal variance with pedigree 0.0438, pedigree (2,3,1,5,2)
  (same comment as for activated carbon, granular)
- Sodium I [water, unspecified]: 0.00015667 kg; lognormal variance with pedigree 0.6538, pedigree (2,3,1,5,2)
  (same comment as for activated carbon, granular)
- Sulfate [water, unspecified]: 0.000969692 kg; lognormal variance with pedigree 0.0438, pedigree (2,3,1,5,2)
  (same comment as for activated carbon, granular)
- Suspended solids, unspecified [water, unspecified]: 4.43717e-6 kg; lognormal variance with pedigree 0.3038, pedigree (2,3,1,5,2)
  (same comment as for activated carbon, granular)
- TOC, Total Organic Carbon [water, unspecified]: 1.39595e-6 kg; lognormal variance with pedigree 0.0438, pedigree (2,3,1,5,2)
  (same comment as for activated carbon, granular)
- Tetrachloroethylene [water, unspecified]: 5.13899e-11 kg; lognormal variance with pedigree 0.3038, pedigree (2,3,1,5,2)
  (same comment as for activated carbon, granular)
- Tin ion [water, unspecified]: 9.37567e-11 kg; lognormal variance with pedigree 0.6538, pedigree (2,3,1,5,2)
  (same comment as for activated carbon, granular)
- Water [water, ocean]: 0.00121344 m3; lognormal variance with pedigree 0.0044, pedigree (2,3,1,5,2)
  (same comment as for activated carbon, granular)
- Water [water, surface water]: 0.00882034 m3; lognormal variance with pedigree 0.0044, pedigree (2,3,1,5,2)
  (same comment as for activated carbon, granular)
- Water [water, unspecified]: 0.00305112 m3; lognormal variance with pedigree 0.0044, pedigree (2,3,1,5,2)
  (same comment as for activated carbon, granular)
- Zinc II [water, unspecified]: 3.34507e-7 kg; lognormal variance with pedigree 0.6538, pedigree (2,3,1,5,2)
  (same comment as for activated carbon, granular)

## Sampling procedure
Extrapolated from European dataset. Literature data, representative for min. 75 % of European (EU + GB, NO, CH) production capacity, based on installed nameplate capacity.

## Extrapolations
Extrapolated from the European dataset.
