# electricity, high voltage, import from BR-North-eastern grid

Dataset: EcoSpold 2, unit process
Geography: BR-South-eastern/Mid-western grid
Time period: 2021-01-01 to 2023-12-31
Technology level: current
Classification: ISIC rev.4 ecoinvent: 3510:Electric power generation, transmission and distribution
Scenario: Business-as-Usual
System model: Allocation, cut-off by classification
Generated by: Sebastian Kunde
Published in: Suppen, N 2017
Database: ecoinvent
isCopyrightProtected: true
accessRestrictedTo: 1

## General comment
This dataset represents the amount of imported electricity from the Brazilian Southern electricity grid to the Brazilian South-eastern electricity grid. For a discussion of different ways of modeling electricity trade in LCI, please refer to Itten et al. 2014. Itten R., Frischknecht R. and Stucki M. (2014) Life Cycle Inventories of Electricity Mixes and Grid. Version 1.3 Report issued on behalf of Paul Scherrer Institut (PSI). treeze Ltd., Uster, Switzerland, retrieved from: www.lc-inventories.ch

## Included activities start
This activity represents the point of 'handing over' the electricity from one electricity grid to the other at the border.

## Included activities end
This dataset doesn't include any electricity losses or transmission infrastructure as these are accounted for in the market datasets.

## Reference product
- electricity, high voltage: 1 kWh; By-product classification allocatable product; CPC 17100: Electrical energy; HS2017 271600: Electrical energy
  production volume 1.5904e10 kWh
    For structural reasons of the ecoinvent database the annual import volume is set to zero in this dataset. The import volume is considered directly in the respective high voltage electricity market of the importing geography.
  property price 0.0977 EUR2005
    Temporary price data. Calculated as 90% of purchasers price based on: 94% of the average price (to account for a 6% loss in transformation and transmission) for electricity for industrial consumersin 2005 (excluded taxes). From IEA.
  properties: carbon allocation 0 kg, carbon content 0

## Inputs from technosphere
- electricity, high voltage: 1 kWh
  activityLink added to better reflect the reality of the supply chain

## Sampling procedure
Literature data: The total amount of electricity imported to the BR South-eastern grid in 2014 was found in literature. The split of this amount between the supplying grids was done based on the share of the installed transmission capacities between the grids.
