# pig iron production

Dataset: EcoSpold 2, unit process
Geography: RoW
Time period: 2005-01-01 to 2023-12-31
Technology level: current
Classification: ISIC rev.4 ecoinvent: 2410:Manufacture of basic iron and steel
Synonyms: hot metal
Scenario: Business-as-Usual
System model: Allocation, cut-off by classification
Share of production covered: 90 %
Generated by: Johannes Müller
Published in: Classen M. 2009
Database: ecoinvent
isCopyrightProtected: true
accessRestrictedTo: 1

## General comment
Background:
This activity produces hot metal (pig iron) for use in steelmaking and cast iron production. Iron-bearing materials, additives and reducing agents are continuously fed into a charging chamber from a shaft above. A hot, oxygen-rich air blast is injected on the tuyère level and reacts with the reducing agents to produce (inter alia) carbon monoxide that in turn reduces iron oxides to molten, metallic iron. The liquid iron is collected in a hearth, along with the slag, and continually cast prior to transport to the steelmaking plant. The slag is typically processed to produce aggregate, graulate, or pellet for use in cement manufacture. Gases are collected at the top of the furnace and treated through wet scrubbing, with the resultant sludge typically returned to the sinter plant or disposed of in a landfill.
Modelling approach:
Data on were mostly taken from the IPPC Best Available Technology report from the European Commission (Remus et al., 2013); note that where only data ranges were provided, the geometric mean of reported values was used here. Additionally, 33% of dust and sludge by-products were assumed to be recycled internally (i.e. returned as an input to the process after it has been produced) based on measured data from plants worldwide reported by worldsteel (2010).
References:
Remus, R., Aguado-Monsonet, M. A., Roudier, S. & Samcho, L. D. (2013). JRC reference report - Best available techniques (BAT) reference document for iron and steel production. Joint Research Centre - European Commission, Luxemboug.
Worldsteel (2010). Steel industry by-products. World Steel Association: Brussels, Belgium.

## Included activities start
With the charge prepared and ready at the gate of the blast furnace plant.

## Included activities end
At the gate of the blast furnace plant, with pig iron (hot metal) ready for transport to the steelmaking plant.

## Geography
Data are taken from blast furnace plants across Europe and are considered representative of the average situation globally.

## Technology
Typical blast furnace process

## Time period
Data are mostly compiled from reports published between 2005 and 2010 but are considered representative of modern operations.

## Parameters
- fraction, cooling water, once-through system, to air: 0.004 dimensionless; name fraction_CW_OT_to_air; lognormal variance with pedigree 0.0413, pedigree (2,3,1,3,1)
  Calculated based on literature value (Scown, C.D., 2011, Water Footprint of U.S. Transportation Fuels and supplying information of the article) (Vionnet, S., Quantis Water Database - Technical Report, 2012). Calculated based on literature value (Scown, C.D., 2011, Water Footprint of U.S. Transportation Fuels and supplying information of the article) (Vionnet, S., Quantis Water Database - Technical Report, 2012).
- fraction, cooling water, recirculating system, to air: 0.771 dimensionless; name fraction_CW_R_to_air; lognormal variance with pedigree 0.0413, pedigree (2,3,1,3,1)
  (same comment as for fraction, cooling water, once-through system, to air)
- fraction, cooling water, to air: 0.3875 dimensionless; name fraction_CW_to_air; = (0.5*fraction_CW_OT_to_air)+(0.5*fraction_CW_R_to_air); lognormal variance with pedigree 0.092025, pedigree (4,4,3,2,4)
  Calculated value based on literature value (see comments of the other parametres present in this dataset) and expert opinion. In the case when no industry/literature data are available about the type of cooling or directly fraction, cooling water, to air specific for the process a default assumption is applied. It is assumed that the once-through cooling system is used in 50% of all cases and recirculating system is used in another 50% of all cases. Calculated value based on literature value (see comments of the other parametres present in this dataset) and expert opinion. In the case when no industry/literature data are available about the type of cooling or directly fraction, cooling water, to air specific for the process a default assumption is applied. It is assumed that the once-through cooling system is used in 50% of all cases and recirculating system is used in another 50% of all cases.
- fraction, process water, to air: 0.2 dimensionless; name fraction_PW_to_air; lognormal variance with pedigree 0.092025, pedigree (4,4,3,2,4)
  Literature value (Statistics Canada, 2007 & Shaffer, K.H., 2008, Consumptive water use in the Great Lakes Basin, USGS) (Vionnet, S., Quantis Water Database - Technical Report, 2012).

## Reference product
- pig iron: 1 kg; name RP; By-product classification allocatable product; CPC 41111: Pig iron and spiegeleisen in pigs, blocks or other primary forms; HS2017 720110: Iron; non-alloy pig iron containing by weight 0.5% or less of phosphorus, in pigs, blocks or other primary forms
  production volume 1.09969e12 kg; name PV
    Source: worldsteel, 2020; data for 2019.
    References
    worldsteel (2020). Steel Statistical Yearbook 2020 [online].Available from: https://www.worldsteel.org/en/dam/jcr:5001dac8-0083-46f3-aadd-35aa357acbcc/Steel%2520Statistical%2520Yearbook%25202020%2520%2528concise%2520version%2529.pdf (accessed 20.07.2021).
  property carbon content, fossil 0.045
    Pig iron is the iron produced in the blast furnace. It is an alloy of 94% Fe and more than 2% C (world average 4.5%). (ecoinvent v2.2 report 10_partII)
  property heating value, net 0 MJ
    Non combustible products are assumed to have an LHV equal to zero (0).
  property price 0.243 EUR2005
    From Undata http://data.un.org/Data.aspx?q=pig+iron&d=ComTrade&f=_l1Code%3a73%3bcmdCode%3a720120; assumed to be pig iron non-alloy with >0.5% phosphorus because there is no refining process involved in this product. 2003 data includes only EU, China and India - no data from USA and Japan in the UN database for this year.
  properties: carbon allocation 0.045 kg, carbon content 0.045, carbon content, non-fossil 0, dry mass 1 kg, water content 0, water in wet mass 0 kg, wet mass 1 kg

## Inputs from technosphere
- blast furnace: 1.3333e-11 unit; lognormal variance with pedigree 0.5, pedigree (5,5,5,5,5)
  Average value of measured data from plants in Europe. Source: Remus, R., Aguado-Monsonet, M. A., Roudier, S. & Samcho, L. D. (2013). JRC reference report - Best available techniques (BAT) reference document for iron and steel production. Joint Research Centre - European Commission, Luxemboug.
- blast furnace dust: -0.0100574 kg; name BF_dust_amount; lognormal variance with pedigree 0.0439, pedigree (2,3,3,3,2)
  Amount reported by worldsteel (2010) and is representative of the average global situation in 2009. Also based on worldsteel (2010), an internal recovery (recycling) rate of 33% is assumed. Source: Worldsteel (2010). Steel industry by-products. World Steel Association: Brussels, Belgium.
  production volume; = PV * BF_dust_amount / RP
    Calculated from production volume of reference product using the relative outputs.
  properties: aluminium content 0.0112796, calcium content 0.0233333, carbon content, fossil 0.344336, dry mass 0.999 kg, iron content 0.309177, magnesium content 0.00820361, manganese content 0.00213301, oxygen content 0.257407, potassium content 0.00371216, silicon content 0.029133, sulfur content 0.0045155, wet mass 1 kg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
  note on aluminium content: The value of 'aluminium content' is documented in Turner & Symeonidis, 2020. Reference: Turner David & Symeonidis Avraam, 2020, Life cycle inventories of the treatment of iron and steelmaking by-products, ecoinvent association, Zürich, Switzerland
  note on calcium content: The value of 'calcium content' is documented in Turner & Symeonidis, 2020. Reference: Turner David & Symeonidis Avraam, 2020, Life cycle inventories of the treatment of iron and steelmaking by-products, ecoinvent association, Zürich, Switzerland
  note on carbon content, fossil: The value of 'carbon content, fossil' is documented in Turner & Symeonidis, 2020. Reference: Turner David & Symeonidis Avraam, 2020, Life cycle inventories of the treatment of iron and steelmaking by-products, ecoinvent association, Zürich, Switzerland
  note on iron content: The value of 'iron content' is documented in Turner & Symeonidis, 2020. Reference: Turner David & Symeonidis Avraam, 2020, Life cycle inventories of the treatment of iron and steelmaking by-products, ecoinvent association, Zürich, Switzerland
  note on magnesium content: The value of 'magnesium content' is documented in Turner & Symeonidis, 2020. Reference: Turner David & Symeonidis Avraam, 2020, Life cycle inventories of the treatment of iron and steelmaking by-products, ecoinvent association, Zürich, Switzerland
  note on manganese content: The value of 'manganese content' is documented in Turner & Symeonidis, 2020. Reference: Turner David & Symeonidis Avraam, 2020, Life cycle inventories of the treatment of iron and steelmaking by-products, ecoinvent association, Zürich, Switzerland
  note on oxygen content: The value of 'oxygen content' is documented in Turner & Symeonidis, 2020. Reference: Turner David & Symeonidis Avraam, 2020, Life cycle inventories of the treatment of iron and steelmaking by-products, ecoinvent association, Zürich, Switzerland
  note on potassium content: The value of 'potassium content' is documented in Turner & Symeonidis, 2020. Reference: Turner David & Symeonidis Avraam, 2020, Life cycle inventories of the treatment of iron and steelmaking by-products, ecoinvent association, Zürich, Switzerland
  note on silicon content: The value of 'silicon content' is documented in Turner & Symeonidis, 2020. Reference: Turner David & Symeonidis Avraam, 2020, Life cycle inventories of the treatment of iron and steelmaking by-products, ecoinvent association, Zürich, Switzerland
  note on sulfur content: The value of 'sulfur content' is documented in Turner & Symeonidis, 2020. Reference: Turner David & Symeonidis Avraam, 2020, Life cycle inventories of the treatment of iron and steelmaking by-products, ecoinvent association, Zürich, Switzerland
- blast furnace slag: -0.275 kg; name BF_slag_amount; lognormal variance with pedigree 0.0439, pedigree (2,3,3,3,2)
  Amount reported by worldsteel (2010) and is representative of the average global situation in 2009. Also based on worldsteel (2010), an internal recovery (recycling) rate of 0% is assumed. Source: Worldsteel (2010). Steel industry by-products. World Steel Association: Brussels, Belgium.
  production volume; = PV * BF_slag_amount / RP
    Calculated from production volume of reference product using the relative outputs.
  properties: aluminium content 0.0566966, calcium content 0.26003, dry mass 0.995 kg, iron content 0.00562504, magnesium content 0.0737591, manganese content 0.00534032, oxygen content 0.402495, silicon content 0.168354, sulfur content 0.00861246, titanium content 0.00461494, water content 0.00502513, wet mass 1 kg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
  note on titanium content: The value of 'titanium content' is documented in Turner & Symeonidis, 2020. Reference: Turner David & Symeonidis Avraam, 2020, Life cycle inventories of the treatment of iron and steelmaking by-products, ecoinvent association, Zürich, Switzerland
- blast furnace sludge: -0.00350299 kg; name BF_sludge_amount; lognormal variance with pedigree 0.0439, pedigree (2,3,3,3,2)
  (same comment as for blast furnace dust)
  production volume; = PV * BF_sludge_amount / RP
    Calculated from production volume of reference product using the relative outputs.
  properties: aluminium content 0.0110581, calcium content 0.0359238, carbon content, fossil 0.304046, dry mass 0.68 kg, iron content 0.193985, magnesium content 0.0145544, oxygen content 0.159046, silicon content 0.0279247, sulfur content 0.00689046, water content 0.470588, wet mass 1 kg, zinc content 0.0102173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
  note on zinc content: The value of 'zinc content' is documented in Turner & Symeonidis, 2020. Reference: Turner David & Symeonidis Avraam, 2020, Life cycle inventories of the treatment of iron and steelmaking by-products, ecoinvent association, Zürich, Switzerland
- coke: 3.11459, 6.60941 MJ (2 suppliers, which the file names only by identifier); sum of these 9.724 MJ; lognormal variance with pedigree 0.0004, pedigree (1,2,2,3,1)
  (same comment as for blast furnace)
  properties: carbon content, fossil 0.869149, dry mass 0.0328671 kg, heating value, net 28.6 MJ, water content 0.0638298, wet mass 0.034965 kg
  note on carbon content, fossil: 81.7% C and 6% water in wet mass (ecoinvent v2.1 report 6_VI Table 7.1)
- hard coal: 0.0111398, 0.00264339, 0.0788389, 0.0113679, 0.0166081, 0.0245676, 0.00483432 kg (7 suppliers, which the file names only by identifier); sum of these 0.15 kg; lognormal variance with pedigree 0.0004, pedigree (1,2,2,3,1)
  (same comment as for blast furnace)
  properties: carbon content, fossil 0.845, dry mass 0.94 kg, heating value, net 27.91 MJ, water content 0.0638298, wet mass 1 kg
  note on carbon content, fossil: C content 75-94% (specified in Tab 1.1, report 6, part VI). A mean content of 0.845 kg C/ kg dry hard coal was considered
  note on heating value, net: Based on the Characterization factor of Hard coal in the CED method
- inert waste, for final disposal: -0.00133041 kg; name BP_4; lognormal variance with pedigree 0.0034, pedigree (2,3,2,5,1)
  geometric mean of Remus et al. (2013) data range
  production volume; = PV*(BP_4/abs(RP))
    Calculated from the production volume of pig iron in proportion to the respective output amounts.
  properties: dry mass 0.995 kg, water content 0.00502513, wet mass 1 kg
- iron ore concentrate: 0.15 kg; lognormal variance with pedigree 0.0003, pedigree (1,2,2,1,1)
  (same comment as for blast furnace)
  properties: dry mass 1 kg, wet mass 1 kg
- iron pellet: 0.4 kg; lognormal variance with pedigree 0.0003, pedigree (1,2,2,1,1)
  (same comment as for blast furnace)
  properties: dry mass 1 kg, wet mass 1 kg
- iron sinter: 1.05 kg; lognormal variance with pedigree 0.0003, pedigree (1,2,2,1,1)
  (same comment as for blast furnace)
  properties: dry mass 1 kg, wet mass 1 kg
- limestone, unprocessed: 0.01 kg; lognormal variance with pedigree 0.0004, pedigree (1,2,2,3,1)
  (same comment as for blast furnace)
  properties: carbon content, fossil 0.117257, dry mass 0.998 kg, water content 0.00200401, wet mass 1 kg
  note on carbon content, fossil: Table 3.1, ecoinvent v2.2 report 7, part VII, pg 3. MW CaCO3=100, MW MgCO3=84. C content of limestone is 0.117257 kg/kg DM
- natural gas, high pressure: 2.42441e-5, 4.08967e-5, 8.92083e-5, 2.98542e-5, 6.97682e-6, 4.15246e-5, 3.9846e-5, 0.000104776, 4.04505e-5, 6.25655e-5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 m3 (36 suppliers, which the file names only by identifier); sum of these 0.00307692 m3; lognormal variance with pedigree 0.0004, pedigree (1,2,2,3,1)
  (same comment as for blast furnace)
  properties: carbon content, fossil 0.602381, dry mass 0.84 kg, heating value, gross 40 MJ, heating value, net 36 MJ, wet mass 0.84 kg
  note on carbon content, fossil: An average C content of 0.506 kg C/ m3 has been assumed (this average has been calculated using data in Tab 3.5, ecoinvent v2.2 report 6_V
  note on heating value, net: Literature value, Source: Christoph Meili;Niels Jungbluth;Maresa Bussa (2021) Life cycle inventories of crude oil and natural gas extraction. ESU-services Ltd. commissioned by BAFU & VSG, Schaffhausen, Switzerland, http://esu-services.ch/data/public-lci-reports/
- refractory, fireclay, packed: 0.002 kg; lognormal variance with pedigree 0.0004, pedigree (1,2,2,3,1)
  (same comment as for blast furnace)
  properties: dry mass 1 kg, wet mass 1 kg
- wastewater from pig iron production: -0.000121643 m3; name BP_5; lognormal variance with pedigree 0.0434, pedigree (2,3,2,5,1)
  geometric mean of Remus et al. (2013) data range
  production volume; = PV * BP_5/RP
    (same comment as for inert waste, for final disposal)
  properties: carbon content, fossil 1.2149e-5, dry mass 0.337476 kg, water content 2962.17, wet mass 1000 kg

## Inputs from nature
- Water, cooling, unspecified natural origin [natural resource, in water]: 0.00105698 m3; name water_cooling_UNO_input; source Byers, W. 2003; lognormal variance with pedigree 0.014625, pedigree (3,3,3,2,1)
  Calculated based on literature, (Vionnet, S., Quantis Water Database - Technical Report, 2012).
  property carbon content, fossil 0.0104329; name C_content_fossil
  property carbon content, non-fossil 0; name C_content_non_fossil
  property dry mass 0.1101 kg; name DM
  property water in wet mass 999.89 kg; name WWM
  property wet mass 1000 kg; name WM
- Water, unspecified natural origin [natural resource, in water]: 0.000403572 m3; name water_UNO_input; source Byers, W. 2003; lognormal variance with pedigree 0.014625, pedigree (3,3,3,2,1)
  Based on literature, (Vionnet, S., Quantis Water Database - Technical Report, 2012). based on literature, (Vionnet, S., Quantis Water Database - Technical Report, 2012).

## Emissions to nature
- Carbon dioxide, fossil [air, unspecified]: 0.84908 kg; lognormal variance with pedigree 0.0033, pedigree (2,3,3,3,1)
  (same comment as for blast furnace)
- Carbon monoxide, fossil [air, unspecified]: 0.0013404 kg; lognormal variance with pedigree 0.6533, pedigree (2,3,3,3,1)
  (same comment as for blast furnace)
- Dioxins, measured as 2,3,7,8-tetrachlorodibenzo-p-dioxin [air, unspecified]: 2.6596e-15 kg; lognormal variance with pedigree 0.3033, pedigree (2,3,3,3,1)
  (same comment as for blast furnace)
- Hydrogen sulfide [air, unspecified]: 1.0745e-5 kg; lognormal variance with pedigree 0.0433, pedigree (2,3,3,3,1)
  (same comment as for blast furnace)
- Lead II [air, unspecified]: 6.9149e-8 kg; lognormal variance with pedigree 0.6533, pedigree (2,3,3,3,1)
  (same comment as for blast furnace)
- Manganese II [air, unspecified]: 7.4468e-8 kg; lognormal variance with pedigree 0.6533, pedigree (2,3,3,3,1)
  (same comment as for blast furnace)
- Nickel II [air, unspecified]: 1.5957e-8 kg; lognormal variance with pedigree 0.6533, pedigree (2,3,3,3,1)
  (same comment as for blast furnace)
- Nitrogen oxides [air, unspecified]: 7.9787e-5 kg; lognormal variance with pedigree 0.0433, pedigree (2,3,3,3,1)
  (same comment as for blast furnace)
- Particulate Matter, < 2.5 um [air, unspecified]: 2.8723e-5 kg; lognormal variance with pedigree 0.3033, pedigree (2,3,3,3,1)
  (same comment as for blast furnace)
- Particulate Matter, > 10 um [air, unspecified]: 1.5957e-6 kg; lognormal variance with pedigree 0.0433, pedigree (2,3,3,3,1)
  (same comment as for blast furnace)
- Particulate Matter, > 2.5 um and < 10um [air, unspecified]: 1.5957e-6 kg; lognormal variance with pedigree 0.1233, pedigree (2,3,3,3,1)
  (same comment as for blast furnace)
- Sulfur dioxide [air, unspecified]: 0.00013298 kg; lognormal variance with pedigree 0.0033, pedigree (2,3,3,3,1)
  (same comment as for blast furnace)
- Water [air, unspecified]: 0.000490292 m3; name water_to_air_unspecified; = (water_cooling_UNO_input*fraction_CW_to_air)+(water_UNO_input*fraction_PW_to_air); lognormal variance with pedigree 0.0409, pedigree (2,2,2,1,1)
  Calculated value based on literature values and expert opinion. See comments in the parametres' comment field.
  property fraction, origin: fresh water 0; name fraction_origin_fresh_water
  property fraction, origin: salt water 0; name fraction_origin_salt_water
  property fraction, origin: unspecified 1; name fraction_origin_unspecified
- Water [water, unspecified]: 0.000970255 m3; name water_to_water_unspecified; = water_cooling_UNO_input*(1-fraction_CW_to_air)+water_UNO_input*(1-fraction_PW_to_air); lognormal variance with pedigree 0.098025, pedigree (4,4,4,2,4)
  (same comment as for Water)
  property fraction, origin: fresh water 0; name fraction_origin_fresh_water_Ww
  property fraction, origin: salt water 0; name fraction_origin_salt_water_Ww
  property fraction, origin: unspecified 1; name fraction_origin_unspecified_Ww

## Sampling procedure
Data were taken from direct measurements at blast furnace plants across Europe.

## Extrapolations
see Geography
