# tillage, cultivating, chiselling

Dataset: EcoSpold 2, unit process
Geography: US
Time period: 2021-01-01 to 2023-12-31
Technology level: current
Classification: ISIC rev.4 ecoinvent: 0161:Support activities for crop production
Scenario: Business-as-Usual
System model: Allocation, cut-off by classification
Generated by: Juanita Barrera
Database: ecoinvent
isCopyrightProtected: true
accessRestrictedTo: 1

## General comment
This dataset represents the service of tillage with chiselling 1 ha of agricultural land. A working width average of 3.4 m, used in sandy soil at 10 cm work depth, is considered.

## Included activities start
Chiselling process starting from preliminary work at farm, like attaching the adequate machinery to the tractor.

## Included activities end
This activity ends with transfer back to farm and concluding work, like uncoupling the machine. The dataset includes transfer to field; field work for an area of land of 1 ha, including turning, idling and overlapping. The inventory takes into account the diesel fuel consumption and the amount of agricultural machinery and of the shed, which has to be attributed to the tillage cultivating by chiselling. Also taken into consideration is the amount of emissions to the air from combustion and the emission to the soil from tyre abrasion during the work process. The dataset does not include dust other than from combustion and noise.

## Geography
The inventory is extrapolated from the geography of Quebec, Canada. Data quality indicators are adjusted accordingly.

## Technology
Fuel consumption and emissions per kg diesel have been extrapolated to the US, but others inputs were taken from the original values.

## Reference product
- tillage, cultivating, chiselling: 1 ha; By-product classification allocatable product; CPC 86119: Other support services to crop production
  production volume 7.88684e7 ha
    FAOSTAT data year 2020: area of arable land, 0.5 passes/year assumed (own estimation)
  property price 28.5853 EUR2005
    The price is from the year 2020. Price information has been directly provided by the data provider based on the following reference: University of Minnesota, Machinery cost estimates, W.F. Lazarus, 2020. The prices were adjusted for inflation relative to 2005 using the producer price index (PPI) of the euro area, published by eurostat (https://ec.europa.eu/eurostat/databrowser/view/STS_INPP_A__custom_6416181/default/table?lang=en, last accessed on 2023-06-01).
  properties: carbon allocation 0 kg, carbon content 0

## Inputs from technosphere
- agricultural machinery, tillage: 1.48 kg; lognormal variance with pedigree 0.3042, pedigree (1,4,2,5,1)
  proxy from "tillage, cultivating, chiselling, CA-QC"
- diesel: 5.58632 kg; lognormal variance with pedigree 0.0028, pedigree (1,4,2,1,1)
  average of chiseling data - UMN Farm Machinery Economic Cost Estimation Spreadsheet (MACHDATA.XLSM) Lazarus, 2022; 2021 Nebraska Crop budget projections, Robert Klein and Glennis McClure, UNL Extension
  properties: carbon content, fossil 0.865, dry mass 1 kg, heating value, net 42.8 MJ, wet mass 1 kg
- shed: 0.00573 m2; lognormal variance with pedigree 0.3042, pedigree (1,4,2,5,1)
  proxy from "tillage, cultivating, chiselling, CA-QC"
- tractor, 4-wheel, agricultural: 0.883 kg; lognormal variance with pedigree 0.3042, pedigree (1,4,2,5,1)
  proxy from "tillage, cultivating, chiselling, CA-QC"

## Emissions to nature
- Ammonia [air, non-urban air or from high stacks]: 0.000111726 kg; lognormal variance with pedigree 0.058325, pedigree (1,2,2,2,3)
  adapted from "tillage, cultivating, chiselling, CA-QC" to match the diesel consumption
- Benzene [air, non-urban air or from high stacks]: 4.07261e-5 kg; lognormal variance with pedigree 0.058325, pedigree (1,2,2,2,3)
  adapted from "tillage, cultivating, chiselling, CA-QC" to match the diesel consumption
- Benzo(a)pyrene [air, non-urban air or from high stacks]: 1.6795e-7 kg; lognormal variance with pedigree 0.658325, pedigree (1,2,2,2,3)
  adapted from "tillage, cultivating, chiselling, CA-QC" to match the diesel consumption
- Cadmium II [air, non-urban air or from high stacks]: 5.58632e-8 kg; lognormal variance with pedigree 0.658325, pedigree (1,2,2,2,3)
  adapted from "tillage, cultivating, chiselling, CA-QC" to match the diesel consumption
- Carbon dioxide, fossil [air, non-urban air or from high stacks]: 17.4077 kg; lognormal variance with pedigree 0.018325, pedigree (1,2,2,2,3)
  adapted from "tillage, cultivating, chiselling, CA-QC" to match the diesel consumption
- Carbon monoxide, fossil [air, non-urban air or from high stacks]: 0.046853 kg; lognormal variance with pedigree 0.652225, pedigree (1,4,2,2,1)
  adapted from "tillage, cultivating, chiselling, CA-QC" to match the diesel consumption
- Chromium III [air, non-urban air or from high stacks]: 2.79676e-7 kg; lognormal variance with pedigree 0.658325, pedigree (1,2,2,2,3)
  adapted from "tillage, cultivating, chiselling, CA-QC" to match the diesel consumption
- Copper ion [air, non-urban air or from high stacks]: 9.51476e-6 kg; lognormal variance with pedigree 0.658325, pedigree (1,2,2,2,3)
  adapted from "tillage, cultivating, chiselling, CA-QC" to match the diesel consumption
- Dinitrogen monoxide [air, non-urban air or from high stacks]: 0.000670358 kg; lognormal variance with pedigree 0.058325, pedigree (1,2,2,2,3)
  adapted from "tillage, cultivating, chiselling, CA-QC" to match the diesel consumption
- Methane, fossil [air, non-urban air or from high stacks]: 0.000720815 kg; lognormal variance with pedigree 0.058325, pedigree (1,2,2,2,3)
  adapted from "tillage, cultivating, chiselling, CA-QC" to match the diesel consumption
- NMVOC, non-methane volatile organic compounds [air, non-urban air or from high stacks]: 0.0108843 kg; lognormal variance with pedigree 0.042225, pedigree (1,4,2,2,1)
  adapted from "tillage, cultivating, chiselling, CA-QC" to match the diesel consumption
- Nickel II [air, non-urban air or from high stacks]: 3.92844e-7 kg; lognormal variance with pedigree 0.658325, pedigree (1,2,2,2,3)
  adapted from "tillage, cultivating, chiselling, CA-QC" to match the diesel consumption
- Nitrogen oxides [air, non-urban air or from high stacks]: 0.219128 kg; lognormal variance with pedigree 0.042225, pedigree (1,4,2,2,1)
  adapted from "tillage, cultivating, chiselling, CA-QC" to match the diesel consumption
- PAH, polycyclic aromatic hydrocarbons [air, non-urban air or from high stacks]: 1.84168e-5 kg; lognormal variance with pedigree 0.318325, pedigree (1,2,2,2,3)
  adapted from "tillage, cultivating, chiselling, CA-QC" to match the diesel consumption
- Particulate Matter, < 2.5 um [air, non-urban air or from high stacks]: 0.0298418 kg; lognormal variance with pedigree 0.318325, pedigree (1,2,2,2,3)
  adapted from "tillage, cultivating, chiselling, CA-QC" to match the diesel consumption
- Selenium IV [air, non-urban air or from high stacks]: 5.58632e-8 kg; lognormal variance with pedigree 0.058325, pedigree (1,2,2,2,3)
  adapted from "tillage, cultivating, chiselling, CA-QC" to match the diesel consumption
- Sulfur dioxide [air, non-urban air or from high stacks]: 0.00562236 kg; lognormal variance with pedigree 0.018325, pedigree (1,2,2,2,3)
  adapted from "tillage, cultivating, chiselling, CA-QC" to match the diesel consumption
- Zinc II [air, non-urban air or from high stacks]: 5.58632e-6 kg; lognormal variance with pedigree 0.658325, pedigree (1,2,2,2,3)
  adapted from "tillage, cultivating, chiselling, CA-QC" to match the diesel consumption
- Cadmium II [soil, agricultural]: 4.24e-7 kg; lognormal variance with pedigree 0.0442, pedigree (1,4,2,5,1)
  proxy from "tillage, cultivating, chiselling, CA-QC"
- Lead II [soil, agricultural]: 1.85e-6 kg; lognormal variance with pedigree 0.0442, pedigree (1,4,2,5,1)
  proxy from "tillage, cultivating, chiselling, CA-QC"
- Zinc II [soil, agricultural]: 0.00112 kg; lognormal variance with pedigree 0.0442, pedigree (1,4,2,5,1)
  proxy from "tillage, cultivating, chiselling, CA-QC"

## Extrapolations
The dataset is modeled for agricultural production system in US. Data Quality indicators are adjusted accordingly.
