# refractory production, high aluminium oxide, packed

Dataset: EcoSpold 2, unit process
Geography: RoW
Time period: 1999-01-01 to 2023-12-31
Technology level: current
Classification: EcoSpold01Categories: construction materials/bricks
Classification: ISIC rev.4 ecoinvent: 2391:Manufacture of refractory products
Tags: ConvertedDataset
Scenario: Business-as-Usual
System model: Allocation, cut-off by classification
Generated by: Tina Künniger
Published in: Kellenberger D. 2004
Database: ecoinvent
isCopyrightProtected: true
accessRestrictedTo: 1

## General comment
[This dataset was already contained in the ecoinvent database version 2. It was not individually updated during the transfer to ecoinvent version 3. Life Cycle Impact Assessment results may still have changed, as they are affected by changes in the supply chain, i.e. in other datasets. This dataset was generated following the ecoinvent quality guidelines for version 2. It may have been subject to central changes described in the ecoinvent version 3 change report (http://www.ecoinvent.org/database/ecoinvent-version-3/reports-of-changes/), and the results of the central updates were reviewed extensively. The changes added e.g. consistent water flows and other information throughout the database. The documentation of this dataset can be found in the ecoinvent reports of version 2, which are still available via the ecoinvent website. The change report linked above covers all central changes that were made during the conversion process.]

## Included activities end
Includes the whole manufacturing process, internal processes (transport, etc.), packing and infrastructure. No administration is included.

## Geography
German, European and global modules used as proxy. Manufacturing data from Germany for German module. Switzerland is not producing any high alumina refractories.

## Technology
typical technology for German production

## Parameters
- fraction, process water, to air: 0.15 dimensionless; name fraction_PW_to_air; lognormal variance with pedigree 0.092025, pedigree (4,4,3,2,4)

## Reference product
- refractory, high aluminium oxide, packed: 1 kg; By-product classification allocatable product; CPC 373: Refractory products and structural non-refractory clay products; HS2017 690220: Refractory bricks, blocks, tiles and similar refractory ceramic constructional goods; containing by weight [...]
  EcoSpold01Location=DE
  production volume 3.75794 kg
    This is a placeholder value that does not reflect real-world production volumes. This dataset does not currently require a real-world production volume to work in the database framework, and no actual data were collected yet. This has no negative effect on the results of the ecoinvent database.
  property price 0.693 EUR2005
    UN import prices. From UN trade database. Category: 'Refractory bricks etc >50% alumina or silica'.
  properties: carbon allocation 0 kg, carbon content 0, carbon content, fossil 0, carbon content, non-fossil 0, dry mass 1 kg, water content 0, water in wet mass 0 kg, wet mass 1 kg

## Inputs from technosphere
- bauxite: 1.04 kg; lognormal variance with pedigree 0.0546, pedigree (2,4,5,5,1)
  EcoSpold01Location=GLO
  properties: dry mass 1 kg, wet mass 1 kg
- clay: 0.0549916, 8.44104e-6 kg (2 suppliers, which the file names only by identifier); sum of these 0.055 kg; lognormal variance with pedigree 0.0546, pedigree (2,4,5,5,1)
  EcoSpold01Location=CH
  properties: dry mass 0.965 kg, water content 0.0362694, wet mass 1 kg
- clay pit infrastructure: 2e-11 unit; lognormal variance with pedigree 0.4, pedigree (1,5,5,5,4)
  EcoSpold01Location=CH
- diesel, burned in building machine: 2.64 MJ; lognormal variance with pedigree 0.0546, pedigree (2,4,5,5,1)
  EcoSpold01Location=GLO
  properties: heating value, net 1 MJ
- electricity, medium voltage: 4.93109e-5, 7.38132e-5, 2.33183e-5, 0.000434043, 0.000254751, 0.000302031, 0.00366867, 8.7498e-6, 0.0731817, 0.0245888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 kWh (47 suppliers, which the file names only by identifier); sum of these 0.129 kWh; lognormal variance with pedigree 0.0546, pedigree (2,4,5,5,1)
  EcoSpold01Location=DE
- heat, district or industrial, natural gas: 0.082911, 5.04553, 0.00155922 MJ (3 suppliers, which the file names only by identifier); sum of these 5.13 MJ; lognormal variance with pedigree 0.0546, pedigree (2,4,5,5,1)
  EcoSpold01Location=RER
  properties: heating value, net 1 MJ
- industrial machine, heavy, unspecified: 0.000167 kg; lognormal variance with pedigree 0.574, pedigree (5,4,5,5,1)
  EcoSpold01Location=RER
- lime, hydrated, packed: 0.015 kg; lognormal variance with pedigree 0.0546, pedigree (2,4,5,5,1)
  EcoSpold01Location=CH
  properties: dry mass 0.997 kg, water content 0.00300903, wet mass 1 kg
- lubricating oil: 1.31e-5 kg; lognormal variance with pedigree 0.0906, pedigree (1,5,5,5,4)
  EcoSpold01Location=RER
  properties: carbon content, fossil 0.75, dry mass 1 kg, heating value, net 40.2 MJ, wet mass 1 kg
  note on carbon content, fossil: Lubricating oil is produced from diesel. C-content/dry mass of fats and oils considered 75%, from: ecoinvent v2.2 report, n 15a, pg 40
  note on heating value, net: Literature value, Source: IPCC 2006, 2006 IPCC Guidelines for National Greenhouse Gas Inventories, Prepared by the National Greenhouse Gas Inventories Programme, Eggleston H.S., Buendia L., Miwa K., Ngara T. and Tanabe K. (eds). Published: IGES, Japan
- municipal solid waste: -5.16259e-6, -3.18766e-7, -2.09894e-7, -8.52278e-6, -1.01204e-6, -5.65739e-7, -6.43023e-6, -2.4966e-6, -6.2987e-6, -1.62013e-6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 kg (44 suppliers, which the file names only by identifier); sum of these -0.005 kg; lognormal variance with pedigree 0.0146, pedigree (2,4,1,5,1)
  EcoSpold01Location=CH
  production volume
    Calculated from the production volume of refractory, high aluminium oxide, packed in proportion to the respective output amounts.
  properties: carbon content, fossil 0.171549, carbon content, non-fossil 0.261655, dry mass 0.771 kg, heating value, net 11.74 MJ, water content 0.297017, wet mass 1 kg
  note on carbon content, fossil: MSW composition in tab 4.1, ecoinvent v2.2 report 13_I. C content referred to 1 kg DM
  note on heating value, net: Value taken from the general comment of the treatment dataset.
- packing, clay product: 1 kg; lognormal variance with pedigree 0.0526, pedigree (3,5,5,5,1)
  EcoSpold01Location=CH

## Inputs from nature
- Water, unspecified natural origin [natural resource, in water]: 2e-5 m3; name water_UNO_input; source EAA - European Aluminium Association 2008; lognormal variance with pedigree 0.0546, pedigree (2,4,5,5,1)
  Estimation, based on personal communication from one company in Germany for the year 1999.

## Emissions to nature
- Water [air, unspecified]: 3e-6 m3; name water_to_air_unspecified; lognormal variance with pedigree 0.0827, pedigree (2,2,5,5,1)
  Calculated value based on literature values and expert opinion. See comments in the parametres' comment field.
  property fraction, origin: fresh water 0; name fraction_origin_fresh_water
  property fraction, origin: salt water 0; name fraction_origin_salt_water
  property fraction, origin: unspecified 1; name fraction_origin_unspecified
- Water [water, unspecified]: 1.7e-5 m3; name water_to_water_unspecified; lognormal variance with pedigree 0.0827, pedigree (2,2,5,5,1)
  (same comment as for Water)
  property carbon content, fossil 0; name C_content_fossil
  property carbon content, non-fossil 0; name C_content_non_fossil
  property dry mass 0 kg; name DM
  property fraction, origin: fresh water 0; name fraction_origin_fresh_water_Ww
  property fraction, origin: salt water 0; name fraction_origin_salt_water_Ww
  property fraction, origin: unspecified 1; name fraction_origin_unspecified_Ww
  property water in wet mass 1000 kg; name WWM
  property wet mass 1000 kg; name WM

## Sampling procedure
Measured data of one German plant

## Extrapolations
See geography This dataset has been copied from an original dataset covering the geography DE. The uncertainty has been adjusted accordingly.

## Review by Roberto Dones 2004-04-14
passed
