# tetrafluoroethylene film production, on glass

Dataset: EcoSpold 2, unit process
Geography: RoW
Time period: 2002-01-01 to 2023-12-31
Technology level: current
Classification: ISIC rev.4 ecoinvent: 2013:Manufacture of plastics and synthetic rubber in primary forms
Classification: EcoSpold01Categories: chemicals/inorganics
Synonyms: tetrafluoro-; homopolymer; Tetrafluoroethylene Resin; Fluon; Teflon; Ethene; PTFE; Politef
Tags: ConvertedDataset
Scenario: Business-as-Usual
System model: Allocation, cut-off by classification
Generated by: Niels Jungbluth
Published in: Althaus H.-J. 2007
Database: ecoinvent
isCopyrightProtected: true
accessRestrictedTo: 1

## General comment
Inventory for a chemical.
[This dataset was already contained in the ecoinvent database version 2. It was not individually updated during the transfer to ecoinvent version 3. Life Cycle Impact Assessment results may still have changed, as they are affected by changes in the supply chain, i.e. in other datasets. This dataset was generated following the ecoinvent quality guidelines for version 2. It may have been subject to central changes described in the ecoinvent version 3 change report (http://www.ecoinvent.org/database/ecoinvent-version-3/reports-of-changes/), and the results of the central updates were reviewed extensively. The changes added e.g. consistent water flows and other information throughout the database. The documentation of this dataset can be found in the ecoinvent reports of version 2, which are still available via the ecoinvent website. The change report linked above covers all central changes that were made during the conversion process.]

## Included activities end
Gate to gate inventory for the production, estimation for infrastructure.

## Geography
Production plant in RER

## Technology
Chemical processing

## Time period
Publication date

## Reference product
- tetrafluoroethylene film, on glass: 1 kg; By-product classification allocatable product; CPC 34730: Polymers of vinyl chloride or other halogenated olefins, in primary forms; HS2017 390461: Halogenated olefin polymers; fluoro-polymers, polytetrafluoroethylene, in primary forms; CAS 116-14-3
  EcoSpold01Location=RER
  production volume 1.85714e8 kg
    Estimated from the production volume of the tetrafluoroethylene with 1.05 kg TFE/kg polymer
  property heating value, net 7.27 MJ
    LHV is calculated based on the Carbon content of the product. More details can be found on the respective documentation.
  property price 12.5476 EUR2005
    Calculated based on inputs: The price of the product has been calculated as a sum of the values of the material and energy inputs for this product. This value is therefore a rough estimation. It may underestimate the real price since there are additional expenses when producing any product. These expences can include for example labour costs, treatment of waste materials and profit for the producer. Please consider carefully whether this level of data quality is acceptable for your application.
  properties: carbon allocation 0.24 kg, carbon content 0.24, carbon content, fossil 0.24, carbon content, non-fossil 0, dry mass 1 kg, water content 0, water in wet mass 0 kg, wet mass 1 kg

## Inputs from technosphere
- chemical factory, organics: 4e-10 unit; lognormal variance with pedigree 0.63, pedigree (5,5,5,5,5)
  EcoSpold01Location=RER
  Generic data
  Uncertainty: Generic data
- heat, district or industrial, natural gas: 0.0767928, 4.67321 MJ (2 suppliers, which the file names only by identifier); sum of these 4.75 MJ; lognormal variance with pedigree 0.12, pedigree (5,5,5,5,1)
  EcoSpold01Location=RER
  Rough estimation
  Uncertainty: Rough estimation
  properties: heating value, net 1 MJ
- isopropanol: 0.001 kg; lognormal variance with pedigree 0.12, pedigree (5,5,5,5,1)
  EcoSpold01Location=RER
  Rough estimation
  Uncertainty: Rough estimation
  properties: carbon content, fossil 0.6, dry mass 1 kg, heating value, net 34.3 MJ, wet mass 1 kg
- methanol: 0.000320203, 0.000620983, 5.88138e-5 kg (3 suppliers, which the file names only by identifier); sum of these 0.001 kg; lognormal variance with pedigree 0.12, pedigree (5,5,5,5,1)
  EcoSpold01Location=CH
  Rough estimation for alcohol
  Uncertainty: Rough estimation for alcohol
  properties: carbon content, fossil 0.375, dry mass 1 kg, heating value, net 20 MJ, wet mass 1 kg
  note on heating value, net: Based on literature, page 533, Report 17: Jungbluth, N., Chudacoff, M., Dauriat, A., Dinkel, F., Doka, G., Faist Emmenegger, M., Gnansounou, E., Kljun, N., Schleiss, K., Spielmann, M., Stettler, C., Sutter, J. 2007: Life Cycle Inventories of Bioenergy. ecoinvent report No. 17, Swiss Centre for Life Cycle Inventories, Dübendorf, CH.
- silicone product: 2.11e-5 kg; lognormal variance with pedigree 0.12, pedigree (5,5,5,5,1)
  EcoSpold01Location=RER
  Rough estimation
  Uncertainty: Rough estimation
  properties: carbon content, fossil 0.324324, dry mass 1 kg, heating value, net 9.83 MJ, wet mass 1 kg
  note on carbon content, fossil: The term silicones is used for compounds in which silicon atoms are linked via oxygen atoms, each silicon atom bearing one or several organic groups. In industrially important silicones, these groups are usually methyl or phenyl (ecoinvent v2.2 report 8_part71 & Ullmann). The chemical formula was considered to be [Si(CH3)2O]n (Ullmann).
- tetrafluoroethylene: 1.05 kg; lognormal variance with pedigree 0.12, pedigree (5,5,5,5,1)
  EcoSpold01Location=RER
  Stoichiometric calculation, 95% yield
  Uncertainty: Stoichiometric calculation, 95% yield
  properties: carbon content, fossil 0.24, dry mass 1 kg, heating value, net 7.27 MJ, wet mass 1 kg

## Emissions to nature
- Acetone [air, urban air close to ground]: 0.0001 kg; lognormal variance with pedigree 0.23, pedigree (5,5,5,5,1)
  Rough estimation
  Uncertainty: Rough estimation
- Carbon monoxide, fossil [air, urban air close to ground]: 0.0001 kg; lognormal variance with pedigree 0.12, pedigree (5,5,5,5,1)
  Rough estimation
  Uncertainty: Rough estimation
- Hydrogen fluoride [air, urban air close to ground]: 0.0001 kg; lognormal variance with pedigree 0.16, pedigree (5,5,5,5,1)
  Rough estimation
  Uncertainty: Rough estimation

## Sampling procedure
Own assumptions.

## Extrapolations
none This dataset has been copied from an original dataset covering the geography RER. The uncertainty has been adjusted accordingly.

## Review by Roland Hischier 2003-05-28
Passed.
