# electricity, high voltage, aluminium industry, production mix

Dataset: EcoSpold 2, unit process, production mix
Geography: IAI Area, EU27 & EFTA
Time period: 2015-01-01 to 2023-12-31
Scenario: Business-as-Usual
System model: Allocation, cut-off by classification
Generated by: [System]
Database: ecoinvent
isCopyrightProtected: true
accessRestrictedTo: 1

## Reference product
- electricity, high voltage, aluminium industry: 1 kWh; By-product classification allocatable product; CPC 17100: Electrical energy; HS2017 271600: Electrical energy
  production volume 6.22908e10 kWh
  properties: carbon allocation 0 kg, carbon content 0, price 0.0977 EUR2005

## Inputs from technosphere
- electricity, high voltage, aluminium industry: 0.711009, 0.0500007, 0.00400005, 0.0919879, 0.143002 kWh (5 suppliers, which the file names only by identifier); sum of these 1 kWh
  properties: price 0.0977 EUR2005
