# electricity production, natural gas, combined cycle power plant

Dataset: EcoSpold 2, unit process
Geography: AR
Time period: 2012-01-01 to 2023-12-31
Technology level: modern
Classification: EcoSpold01Categories: natural gas/power plants
Classification: ISIC rev.4 ecoinvent: 3510:Electric power generation, transmission and distribution
Synonyms: GuD; CCGT; CCPP; GCC
Tags: natural gas power; fossil fuels
Scenario: Business-as-Usual
System model: Allocation, cut-off by classification
Generated by: Alejandro P Arena
Published in: Suppen, N. 2017
Database: ecoinvent
isCopyrightProtected: true
accessRestrictedTo: 1

## General comment
This dataset represents the production of high voltage electricity in a conventional steam boiler natural gas power plant without CHP (combined heat and power) on Argentina in 2014.
'There is a significant number of combined cycle power plants (CC) in Argentina, in which one or more GasTurbine and SteamTurbine units are operating in cascade. The steam is generated in a HRSG (heat recovery steam generator) with the energy content of the exhaust gases from the GTs. The original dataset (GLO, 2008) refers to a combined cycle power plant of 400MWe class with a gas turbine 260MWe and a steam turbine 140MWe
For electricity production with natural gas, four different datasets relying to different power plant types exist:
- conventional power plant with / without CHP
- combined cycle power plant with / without CHP
At the moment, these datasets differ in nothing but the efficiency. High voltage electricity (at the busbar) is the reference product, whereupon heat is a by-product in CHP plants. Out of all fossile fuels, natural gas holds worldwide the highest share of CHP plants besides peat. Furthermore, natural gas power plants are today often designed with combined cycles. The advantages of a combined cycle power plant are for example:
a higher efficiency (approximately between 50-60% compared to ca. 33% for a conventional power plant)'
- high operating flexibility
- lower emissions due to higher efficiency'
- lower cooling water need.
18 combined cycle power plants dispatched electricity during 2014. Half of them consumed only Natural Gas, and the rest a combination of Natural Gas and Gas Oil. The percentage of Gas Oil consumed in these 9 power plants ranges between 18 and 26 %, with a median value of 24 %. Only one of these 9 power plants consumed also biodiesel, in a very small % (0.05 %).
The efficiency calculations are based on CAMMESA "COMPAÑÍA ADMINISTRADORA DEL MERCADO MAYORISTA ELÉCTRICO SOCIEDAD ANÓNIMA" Informe anual 2014. Retreived from: http://portalweb.cammesa.com/Memnet1/default.aspx and own calculation assumptions. Reducing factors such as contaminations of important plant parts, cooling conditions or part load have been taken into account. Even if efficiencies vary with different surrounding temperatures, temperature adjustments would be related to high uncertainties.
Water is used for wet cooling and as feed water in the steam circuit. In this dataset, 100% wet cooling and no once-through cooling is assumed.
EMISSIONS:
Emissions were taken fron the original database (GLO 2008), and adjusted for Argentina with the factor_MJ_kWh. Different sources served as basis for assumption of average emissions in the original database. Where possible, the most recent sources were taken into account, whereas older sources were taken in order to determine the remaining data gaps. The emissions have been fixed for the former UCTE region* and have been overtaken as such for all countries without value adaptation (adaptation of the uncertainty). See ecoinvent report 'Erdgas' given as main source for details (Tab. 11.15). In the following a short overview:
- Emissions of NOx, CO, CO2, SO2, particles, N2O and CH4 are mainly taken from CORINAIR 2001, EPA, and a variety of other data sources
-\tNOx emissions are a major challenge in natural gas power plants. With rising temperature, emissions also rise; band widths of NOx emissions in literature are correspondingly large. There are several methods to diminish these emissions.
-\tCO is a result of uncomplete burning. For economic and technical reasons, plant combustion is optimized and CO emissions are low.
-\tCO2 and SO2 emissions are dependent on the composition of the used fuel. Due to the low sulfur content of the used natural gas, no desulfurization has to take place.
-\tOrganic compound emissions are estimated on the basis of EPA 1998.
-\tParticles are assumed to be smaller than 2.5 micro-m
'former UCTE: Union for the Coordination of the Transmission of Electricity, since 2009 replaced by ENTSO-E European Network of Transmission System Operators for Electricity.
'Sources:'
'-\tCORINAIR 2001. EMEP/CORINAIR 2001: Joint EMEP/CORINAIR Atmospheric Emission Inventory Guidebook, Third Edition. Copenhagen: European Environment Agency, 2001. http://reports.eea.eu.int/technical_report_2001_3/en.']
['text', '-\tEPA 1998. US Environmental Protection Agency (1998). Compilation of Air Pollutant Emission Factors, AP-42, Fifth Edition, Volume I: Chapter 1: External Combustion Sources, Natural Gas Combustion - Final Section - Supplement D , July 1998. CHIEF (Clearinghouse for Inventories and Emission Factors). Research Triangle Park, North Carolina. http://www.epa.gov/ttn/chief/ap42/.']
'-\tRentz O., Karl U., Peter H. (2002). Ermittlung und Evaluierung von Emissionsfaktoren f\xfcr Feuerungsanlagen in Deutschland f\xfcr die Jahre 1995, 2000 und 2010. Deutsch- Franz\xf6sisches Institut f\xfcr Umweltforschung, Uni Karsruhe. Endbericht. Im Auftrag des Umweltbundesamtes. Forschungsbericht 299 43 142. Umweltbundesamt. Berlin.']

## Included activities start
From the constructed combined cycle natural gas power plant ready to produce electricity.

From reception of natural gas and operating materials at power plant/factory gate.

## Included activities end
This activity ends with 1kWh of high voltage electricity produced at the power plant and arrived at the busbar.

This dataset includes:
- all operation and maintenance activities and materials of the power plants.
- Cooling: It is a assumed that all plants use .once_though cooling systems - Water is used for cooling and as feed water in the steam circuit for losses compensation.
-

This dataset doesn't include
- raw materials extraction, decommissioning and waste treatment as these activities are already included in the infrastructure datasets.
- transformation of the electricity produced.

## Technology
Combined cycle power plant of 400MWe class with a gas turbine 265MWe and a steam turbine 140MWe. The plant is used for middle load with 5000 hours of operation at full capacity per year. The plant is assumed to operate 180000 hours during its lifetime.

## Time period
The Annual Production Volume is valid for the year 2014

## Parameters
- efficiency: 0.509 dimensionless; lognormal variance with pedigree 0.017225, pedigree (4,3,1,2,3)
  Literature value/calculated value/estimation. Net electrical efficiency based on the lower heating value (LHV). This figure represents the weithed average of all combined cycle power plants in Argentina, The calculation of the weighted average efficiency was performed considering the average specific consumption of every generation unit reported by CAMMESA (available from http://portalweb.cammesa.com/memnet1/revistas/estacional/datos_termicos.html. For some generation units in which the specific consumption was not available, their efficiency was calculated based on the amount of electricity production and of fuel consumption for 2014. The fuel consumed in combined cycle power plants in Argentina are natural gas (88.2 %) and GO (11.8 %). Since there are no datasets for Oil fueled combined cycle power plants in Ecoinvent, this dataset was modelled as if the total amount of energy consumed was provided by burning an equivalent volume of natural gas. A further adjustment have been performed in order to take into account the standard LHV for natural gas used in Ecoinvent (39 MJ/m3).
- factor: input of MJ for the production of 1 kWh: 7.07269 MJ/kWh; name factor_MJ_kWh; = 1*3.6/efficiency; lognormal variance with pedigree 0.0532, pedigree (4,4,3,4,4)
  Calculated value based on the average efficiency. nan
- fraction, cooling water, to air: 0.00510204 dimensionless; name fraction_CW_to_air; = (WConsumption_EP_NG_onceT_andCP_CS*once_through_andCP_CS_fractio_from_allCS)/(WWithdrawal_EP_NG_onceT_andCP_CS*once_through_andCP_CS_fractio_from_allCS); lognormal variance with pedigree 0.092025, pedigree (4,4,3,2,4)
  Calculated
  nan
- fraction, process water, to air: 0.15 dimensionless; name fraction_PW_to_air; lognormal variance with pedigree 0.092025, pedigree (4,4,3,2,4)
  Literature value. In case when no industry/process specific data are available, default evaporation fraction value is used. This value is 15% and is based on literature (Statistics Canada, 2007 & Shaffer, K.H., 2008, Consumptive water use in the Great Lakes Basin, USGS & Shiklomanov, 2003, World Water Resources at the Beginning of the 21st Century) and has been approved by an expert.
  nan
- fraction, water, completely softened, to air: 0.15 dimensionless; name fraction_WCS_to_air; = fraction_PW_to_air; lognormal variance with pedigree 0.092025, pedigree (4,4,3,2,4)
  Calculated value. See comment in the other parametres present in this dataset. Water, completely softened is considered to be always used as process water, thus process water fractions to air are applied to all water, completely softened input flows to calculate the amount of water consumed in the processes.
  nan
- gross electricity production: 5.9886e10 kWh; name gross_electricity; lognormal variance with pedigree 0.0033, pedigree (3,2,1,1,2)
  Literature value/statistics, extrapolation. The gross electricity production was calculated from the net electricity production considering the losses due to auxiliary consumption within the power plant (see the comment for the parameter losses from gross electricity production)..
  The net electricity production was obtained from CAMMESA "COMPAÑÍA ADMINISTRADORA DEL MERCADO MAYORISTA ELÉCTRICO SOCIEDAD ANÓNIMA". Supporting documentation available at: <http://portalweb.cammesa.com/Memnet1/default.aspx>
- losses from gross electricity production: 0.07 dimensionless; name losses_gross_net; lognormal variance with pedigree 0.017225, pedigree (4,3,1,2,3)
  Literature value. Own use of electricity plants in this country in 2012. The default loss as described by the IEA in the electricity statistic is applied, which is 0.07 (IEA electricity information 2014: The difference between gross and net electricity production is generally observed to be about 7% for conventional thermal stations, 1% for hydro stations and 6% for nuclear.)
  IEA. 2014. Electricity Information 2014. ISBN 978-92-64-21692-1. International Energy Agency (IEA), Paris Cedex (FR).
  nan
  Uncertainty: generic IEA value used
- once-through and cooling pond cooling systems as a fraction of all cooling syste: 1 dimensionless; name once_through_andCP_CS_fractio_from_allCS; lognormal variance with pedigree 0.092025, pedigree (4,4,3,2,4)
  Water is used for cooling and as feed water in the steam circuit. In this dataset, 100% once-through cooling system is assumed.for these datasets. nan
- water consumption, electricity production from NG, once-T and coolingP CS: 0.0005 m3/kWh; name WConsumption_EP_NG_onceT_andCP_CS; lognormal variance with pedigree 0.092025, pedigree (4,4,3,2,4)
  Estimated based on literature (Scown, 2011, Water Footprint of U.S. Transportation Fuels, SI).
  nan
- water withdrawal, electricity production from NG, once-T and coolingP CS: 0.098 m3/kWh; name WWithdrawal_EP_NG_onceT_andCP_CS; lognormal variance with pedigree 0.092025, pedigree (4,4,3,2,4)
  (same comment as for water consumption, electricity production from NG, once-T and coolingP)

## Reference product
- electricity, high voltage: 1 kWh; name electricity; By-product classification allocatable product; CPC 17100: Electrical energy; HS2017 271600: Electrical energy
  production volume 5.31805e10 kWh; name electricity_apv; = gross_electricity*(1- losses_gross_net)
    Calculated value
  property price 0.0977 EUR2005
    Temporary price data. Calculated as 90% of purchasers price based on: 94% of the average price (to account for a 6% loss in transformation and transmission) for electricity for industrial consumersin 2005 (excluded taxes). From IEA.
  properties: carbon allocation 0 kg, carbon content 0

## Inputs from technosphere
- gas power plant, combined cycle, 400MW electrical: 1.38889e-11 unit; name gas_power_plant; = 1/(400*1000*180000); source COMPAÑÍA ADMINISTRADORA DEL MERCADO MAYO 2014; lognormal variance with pedigree 0.1712, pedigree (3,3,5,4,3)
  Amount of power plant infrastructure input calculated based on expected full load hours during power plant lifetime (180000h) and power plant capacity (400MW). See "gas power plant construction, combined cycle, 400MW electrical" dataset and corresponding documentation.
- natural gas, high pressure: 0.203238 m3; name natural_gas; = factor_MJ_kWh/ natural_gas_Net_Heat_Value; source COMPAÑÍA ADMINISTRADORA DEL MERCADO MAYO 2014; lognormal variance with pedigree 0.004, pedigree (1,1,3,5,1)
  The calculated amount of "equivalent natural gas" (as if all the consumed fuel was NG) is 0.2033 m3/kWh, with a LHV of 8300 kcal/m3. This amount has been scaled to the ecoinvent standard heating value for NG
  property heating value, gross 40 MJ; name natural_gas_Gross_Heat_Value
  property heating value, net 34.8 MJ; name natural_gas_Net_Heat_Value
  properties: carbon content, fossil 0.602381, dry mass 0.84 kg, wet mass 0.84 kg
  note on carbon content, fossil: An average C content of 0.506 kg C/ m3 has been assumed (this average has been calculated using data in Tab 3.5, ecoinvent v2.2 report 6_V
- residue from cooling tower: -7.07269e-6 kg; name cooling_tower_residue; = factor_MJ_kWh*0.000001; source COMPAÑÍA ADMINISTRADORA DEL MERCADO MAYO 2014; lognormal variance with pedigree 1.0747, pedigree (4,3,4,3,3)
  Literature value/calculated value. Mathematical relation taken from the original dataset of natural gas burned in a power plant and adapted for Argentina with local parameters and values.
  production volume; = electricity_apv*cooling_tower_residue
    Calculated from the production volume of electricity produced.
  properties: carbon content, fossil 0.0544233, dry mass 0.7 kg, water content 0.428571, wet mass 1 kg
- water, completely softened: 0.0424361 kg; name water_completely_softened; = factor_MJ_kWh*0.006; source COMPAÑÍA ADMINISTRADORA DEL MERCADO MAYO 2014; lognormal variance with pedigree 0.266625, pedigree (4,3,5,2,3)
  (same comment as for residue from cooling tower)
  properties: wet mass 1 kg

## Inputs from nature
- Water, cooling, unspecified natural origin [natural resource, in water]: 0.0660118 m3; name water_cooling_UNO_input; = ((once_through_andCP_CS_fractio_from_allCS*WWithdrawal_EP_NG_onceT_andCP_CS))/10.5*factor_MJ_kWh; source COMPAÑÍA ADMINISTRADORA DEL MERCADO MAYO 2014; lognormal variance with pedigree 0.130025, pedigree (4,4,5,2,4)
  Calculated based on literature data. Water is used for cooling and as feed water in the steam circuit for compensating losses. Decarbonised water for Nox reduction has not been included in this dataset. Decarbonised water is also used in recirculating cooling systems, but in this dataset, 100% once-through cooling is assumed.

## Emissions to nature
All rows: source COMPAÑÍA ADMINISTRADORA DEL MERCADO MAYO 2014
- Acenaphthene [air, non-urban air or from high stacks]: 5.60864e-12 kg; name acenaphthene; = factor_MJ_kWh*0.000000000000793; lognormal variance with pedigree 0.6807, pedigree (3,3,5,3,3)
  (same comment as for residue from cooling tower)
- Acetaldehyde [air, non-urban air or from high stacks]: 5.65815e-9 kg; name acetaldehyde; = factor_MJ_kWh*0.0000000008; lognormal variance with pedigree 1.1067, pedigree (4,3,5,3,3)
  Literature value/calculated value. Mathematical relation taken from the original dataset of natural gas burned in a power plant and adapted for Argentina with local parameters and values.
  .
- Acetic acid [air, non-urban air or from high stacks]: 8.55796e-7 kg; name acetic_acid; = factor_MJ_kWh*0.000000121; lognormal variance with pedigree 1.1007, pedigree (3,3,5,3,3)
  (same comment as for residue from cooling tower)
- Arsenic ion [air, non-urban air or from high stacks]: 2.90688e-10 kg; name arsenic; = factor_MJ_kWh*0.0000000000411; lognormal variance with pedigree 0.098, pedigree (3,5,5,5,4)
  (same comment as for Acetaldehyde)
- Benzene [air, non-urban air or from high stacks]: 6.37957e-9 kg; name benzene; = factor_MJ_kWh*0.000000000902; lognormal variance with pedigree 0.6807, pedigree (3,3,5,3,3)
  (same comment as for residue from cooling tower)
- Benzo(a)pyrene [air, non-urban air or from high stacks]: 3.74145e-12 kg; name benzo_a_pyrene; = factor_MJ_kWh*0.000000000000529; lognormal variance with pedigree 0.6807, pedigree (3,3,5,3,3)
  (same comment as for residue from cooling tower)
- Beryllium II [air, non-urban air or from high stacks]: 1.74695e-11 kg; name beryllium; = factor_MJ_kWh*0.00000000000247; lognormal variance with pedigree 0.098, pedigree (3,5,5,5,4)
  (same comment as for residue from cooling tower)
- Butane [air, non-urban air or from high stacks]: 6.54931e-6 kg; name butane; = factor_MJ_kWh*0.000000926; lognormal variance with pedigree 0.6807, pedigree (3,3,5,3,3)
  (same comment as for residue from cooling tower)
- Cadmium II [air, non-urban air or from high stacks]: 1.59843e-9 kg; name cadmium; = factor_MJ_kWh*0.000000000226; lognormal variance with pedigree 0.098, pedigree (3,5,5,5,4)
  (same comment as for residue from cooling tower)
- Carbon dioxide, fossil [air, non-urban air or from high stacks]: 0.377682 kg; name carbon_dioxide_fossil; = factor_MJ_kWh*0.0534; lognormal variance with pedigree 0.0513, pedigree (3,3,5,3,3)
  (same comment as for residue from cooling tower)
- Carbon monoxide, fossil [air, non-urban air or from high stacks]: 1.55599e-5 kg; name carbon_monoxide_fossil; = factor_MJ_kWh*0.0000022; lognormal variance with pedigree 0.3412, pedigree (3,3,5,4,3)
  (same comment as for residue from cooling tower)
- Chromium III [air, non-urban air or from high stacks]: 2.02986e-9 kg; name chromium; = factor_MJ_kWh*0.000000000287; lognormal variance with pedigree 0.066, pedigree (3,5,5,5,3)
  (same comment as for residue from cooling tower)
- Cobalt II [air, non-urban air or from high stacks]: 1.2165e-10 kg; name cobalt; = factor_MJ_kWh*0.0000000000172; lognormal variance with pedigree 0.098, pedigree (3,5,5,5,4)
  (same comment as for residue from cooling tower)
- Dinitrogen monoxide [air, non-urban air or from high stacks]: 6.91002e-6 kg; name dinitrogen_monoxide; = factor_MJ_kWh*0.000000977; lognormal variance with pedigree 0.3407, pedigree (3,3,5,3,3)
  (same comment as for residue from cooling tower)
- Dioxins, measured as 2,3,7,8-tetrachlorodibenzo-p-dioxin [air, non-urban air or from high stacks]: 2.05108e-16 kg; name dioxins; = factor_MJ_kWh*2.9E-17; lognormal variance with pedigree 1.1067, pedigree (4,3,5,3,3)
  (same comment as for residue from cooling tower)
- Ethane [air, non-urban air or from high stacks]: 9.68959e-6 kg; name ethane; = factor_MJ_kWh*0.00000137; lognormal variance with pedigree 0.6807, pedigree (3,3,5,3,3)
  (same comment as for residue from cooling tower)
- Formaldehyde [air, non-urban air or from high stacks]: 2.28448e-7 kg; name formaldehyde; = factor_MJ_kWh*0.0000000323; lognormal variance with pedigree 0.6807, pedigree (3,3,5,3,3)
  (same comment as for residue from cooling tower)
- Hexane [air, non-urban air or from high stacks]: 5.60864e-6 kg; name hexane; = factor_MJ_kWh*0.000000793; lognormal variance with pedigree 0.6807, pedigree (3,3,5,3,3)
  (same comment as for residue from cooling tower)
- Lead II [air, non-urban air or from high stacks]: 7.28487e-10 kg; name lead; = factor_MJ_kWh*0.000000000103; lognormal variance with pedigree 0.098, pedigree (3,5,5,5,4)
  (same comment as for residue from cooling tower)
- Manganese II [air, non-urban air or from high stacks]: 5.52377e-10 kg; name manganese; = factor_MJ_kWh*0.0000000000781; lognormal variance with pedigree 0.098, pedigree (3,5,5,5,4)
  (same comment as for residue from cooling tower)
- Mercury II [air, non-urban air or from high stacks]: 4.86601e-10 kg; name mercury; = factor_MJ_kWh*0.0000000000688; lognormal variance with pedigree 0.6807, pedigree (3,3,5,3,3)
  (same comment as for residue from cooling tower)
- Methane, fossil [air, non-urban air or from high stacks]: 6.86758e-6 kg; name methane_fossil; = factor_MJ_kWh*0.000000971; lognormal variance with pedigree 0.6807, pedigree (3,3,5,3,3)
  (same comment as for residue from cooling tower)
- Nickel II [air, non-urban air or from high stacks]: 3.04833e-9 kg; name nickel; = factor_MJ_kWh*0.000000000431; lognormal variance with pedigree 0.098, pedigree (3,5,5,5,4)
  (same comment as for residue from cooling tower)
- Nitrogen oxides [air, non-urban air or from high stacks]: 0.000180354 kg; name nitrogen_oxides; = factor_MJ_kWh*0.0000255; lognormal variance with pedigree 0.3732, pedigree (3,3,5,4,4)
  (same comment as for residue from cooling tower)
- PAH, polycyclic aromatic hydrocarbons [air, non-urban air or from high stacks]: 5.65815e-8 kg; name pah; = factor_MJ_kWh*0.000000008; lognormal variance with pedigree 1.1067, pedigree (4,3,5,3,3)
  (same comment as for residue from cooling tower)
- Particulate Matter, < 2.5 um [air, non-urban air or from high stacks]: 3.47269e-6 kg; name particulates_lt_2_5um; = factor_MJ_kWh*0.000000491; lognormal variance with pedigree 0.3727, pedigree (3,3,5,3,4)
  (same comment as for Acetaldehyde)
- Pentane [air, non-urban air or from high stacks]: 8.1336e-6 kg; name pentane; = factor_MJ_kWh*0.00000115; lognormal variance with pedigree 0.6807, pedigree (3,3,5,3,3)
  (same comment as for residue from cooling tower)
- Propane [air, non-urban air or from high stacks]: 4.98625e-6 kg; name propane; = factor_MJ_kWh*0.000000705; lognormal variance with pedigree 0.6807, pedigree (3,3,5,3,3)
  (same comment as for residue from cooling tower)
- Propionic acid [air, non-urban air or from high stacks]: 1.13163e-7 kg; name propionic_acid; = factor_MJ_kWh*0.000000016; lognormal variance with pedigree 1.1067, pedigree (4,3,5,3,3)
  (same comment as for Acetaldehyde)
- Selenium IV [air, non-urban air or from high stacks]: 3.47269e-11 kg; name selenium; = factor_MJ_kWh*0.00000000000491; lognormal variance with pedigree 0.6807, pedigree (3,3,5,3,3)
  (same comment as for residue from cooling tower)
- Sulfur dioxide [air, non-urban air or from high stacks]: 4.04558e-6 kg; name sulfur_dioxide; = factor_MJ_kWh*0.000000572; lognormal variance with pedigree 0.0517, pedigree (3,3,5,3,3)
  (same comment as for residue from cooling tower)
- Toluene [air, non-urban air or from high stacks]: 1.0609e-8 kg; name toluene; = factor_MJ_kWh*0.0000000015; lognormal variance with pedigree 0.6807, pedigree (3,3,5,3,3)
  (same comment as for residue from cooling tower)
- Water [air, unspecified]: 0.00034316 m3; name water_to_air_unspecified; = (water_completely_softened/1000)*fraction_WCS_to_air+water_cooling_UNO_input*fraction_CW_to_air; lognormal variance with pedigree 0.130025, pedigree (4,4,5,2,4)
  Literature value/calculated value. Value taken from the original dataset of natural gas burned in a power plant and adapted for Argentina with local parameters and values.
  property fraction, origin: fresh water 0.0416136; name fraction_origin_fresh_water
  property fraction, origin: salt water 0; name fraction_origin_salt_water
  property fraction, origin: unspecified 0.958386; name fraction_origin_unspecified
- Water [water, unspecified]: 0.0657111 m3; name water_to_water_unspecified; = (water_completely_softened/1000)*(1-fraction_WCS_to_air)+water_cooling_UNO_input*(1-fraction_CW_to_air); lognormal variance with pedigree 0.130025, pedigree (4,4,5,2,4)
  Calculated value based on literature values and expert opinion, taken from the original dataset of natural gas burned in a power plant and adapted for Argentina with local parameters and values.
  property fraction, origin: fresh water 0.0335624; name fraction_origin_fresh_water_Ww
  property fraction, origin: salt water 0; name fraction_origin_salt_water_Ww
  property fraction, origin: unspecified 0.966438; name fraction_origin_unspecified_Ww

## Sampling procedure
Literature. The net electricity production from combined cycle power plants in Argentina during 2014 was 55.69 TWh. 18 combined cycle power plants dispatched electricity during that year. Half of them consumed only Natural Gas, and the rest a combination of Natural Gas and Gas Oil. The percentage of Gas Oil consumed in these 9 power plants ranges between 18 and 26 %, with a median value of 24 %. Only one of these 9 power plants consumed also biodiesel, in a very small % (0.05 %). The efficiency calculations are based on CAMMESA "COMPAÑÍA ADMINISTRADORA DEL MERCADO MAYORISTA ELÉCTRICO SOCIEDAD ANÓNIMA" Supporting information available from: http://portalweb.cammesa.com/memnet1/revistas/estacional/datos_termicos.html.
Even if some power plants consume Natural Gas and Gas Oil, all of them have been modelled based on the global dataset “electricity production, natural gas, combined cycle power plant, GLO, 2008". The total amount of energy consumed was considered as an equivalent volume of natural gas. A further adjustment have been performed in order to take into account the standard LHV for natural gas used in Ecoinvent (39 MJ/m3).

## Extrapolations
Data have been taken over from the original dataset (GLO 2008) that was valid for the time period 2000-2005, relying on sources of the 90th. No changes were made for the 2008 dataset, but uncertainty was adjusted. Then, all exchange data were extrapolated from that dataset and adjusted for Argentina using local parameters and data.
The efficiency is calculated with own assumptions.
Water is used for cooling and as feed water in the steam circuit for compensating losses. Decarbonised water is used in recirculating cooling systems, but in this dataset, 100% once-through cooling is assumed.
Decarbonised water is also used in WetDeNOx devices, but according to the information provided by the National Electricity Regulatory Board (Spanish acronym ENRE), which monitors the compliance of the electric generators with current environmental legislation, many of the combined cycle power plant have DryLowNOx devices installed. Therefore decarbonised water has not been included in this dataset.
