# petroleum and gas production, onshore

Dataset: EcoSpold 2, unit process
Geography: CA
Time period: 2021-01-01 to 2023-12-31
Technology level: current
Classification: ISIC rev.4 ecoinvent: 06:Extraction of crude petroleum and natural gas
Scenario: Business-as-Usual
System model: Allocation, cut-off by classification
Share of production covered: 100 %
Generated by: Christoph Meili
Published in: Meili, C. 2023
Database: ecoinvent
isCopyrightProtected: true
accessRestrictedTo: 1

## General comment
The multioutput process 'petroleum and gas production, onshore' delivers the co-products crude petroleum oil [kg] and natural gas [m3] via conventional extraction methods. Separate production of crude petroleum oil and natural gas (i.e., non-associated) is considered implicitly within this inventory, which is based on total output by country.
The production of petroleum and/or natural gas in Canada in 2021 is modelled as 7.3 % offshore and 92.7 % onshore production following the approach described in Meili et al. (2023, section 4.1).
The dataset covers the environmental impact of extraction and delivery to coastal plant of petroleum and natural gas. It includes country-specific methane emissions (vented, fugitive, and from flaring), the discharge of produced water, and the direct energy use during oil extraction including drilling and flaring. Flaring is the controlled and intentional burning of natural gas as part of production and processing of crude oil and natural gas. Reasons for flaring include safety, economics (oil vs. gas price), disposal of gas of inferior quality, etc. Furthermore, emissions due to oil spills related with drilling and pumping operations are included in this inventory, but excluding spills related to transportation and refining. Amounts of oil spilled to sea (offshore) and river/soil (onshore) per kg oil-equivalent of production were derived for world regions from three-year averages based on IOGP 2022.
The inventory for this combined crude oil and natural gas production activity is mainly allocated based on the net calorific values and the annual production volumes of the co-products. The allocation of methane emissions from venting and fugative natural gas emissions is based on the country-specific information for 2021 from IEA's Methane Tracker 2022. The IEA factors for oil and gas extraction are used directly to split the total emissions between natural gas and crude oil per country. Freshwater use and water discharge are allocated to crude petroleum oil only. The underlying inventory was created as described in Meili et al. (2023), using generic a gross calorific value (GCV) of 40MJ/m3, a net calorific value (NCV) of 36.0 MJ/m3 and a density of 0.735kg/m3 for natural gas, in line with the global statistics (referring to standard cubic meters, Sm3, measured at 15°C and 1013 mbar). A net calorific value of 43.4 MJ/kg is used for crude petroleum oil and related products like condensates and liquefied natural gas liquids, with the density of crude oil set to 858.1 kg/m3.
Reference(s):
C. Meili, N. Jungbluth, M. Bussa (2023) Life cycle inventories of crude oil and natural gas extraction. ESU-services Ltd. Schaffhausen, Switzerland. Available from: http://esu-services.ch/data/public-lci-reports/
IOGP (2022) Environmental performance indicators - 2021 data. International Association of Oil and Gas Producers (IOGP), retrieved from: https://www.iogp.org/bookstore/product-category/environment/

## Included activities start
From exploration activities (e.g., fuel requirements and emissions from well testing). Onshore production via conventional extraction methods for petroleum and natural gas, considering infrastructure inputs for production and gas processing plants, energy requirements, auxiliary chemicals consumption, and emissions.

## Included activities end
The activity ends with the dried (processed) natural gas and the crude petroleum oil, ready for long-distance transport (transmission) and/or distribution. Neither gas processing activities primarily intended for the production of natural gas liquids nor secondary liquid separation are considered.

## Geography
Canada

## Technology
This dataset represents the onshore extraction of petroleum and gas via conventional extraction methods. This includes the gas lift process and deep-pump pumping (see Meili et al., 2023, chapter 3.1), as well as a default share of 15% enhanced oil recovery (EOR; described in section 4.2 of Meili et al., 2023). For the natural gas production, also the processing of the gas (e.g., drying and desulfurization) is considered.

## Time period
Time of most relevant publications and statistics. Other generic data, e.g. for infrastructure are based on older publications.

## Reference product
- petroleum: 1 kg; By-product classification allocatable product; CPC 12010: Petroleum oils and oils obtained from bituminous minerals, crude; HS2017 270900: Oils; petroleum oils and oils obtained from bituminous minerals, crude; CAS 8002-05-9
  Total production: BP Statistical Review of World Energy 2022; Share on- vs. offshore: Calculation based on onshore-share of Alberta and Saskatchewan. Data from https://www.cer-rec.gc.ca/en/data-analysis/energy-commodities/crude-oil-petroleum-products/statistics/estimated-production-canadian-crude-oil-equivalent.html, cited on https://en.wikipedia.org/wiki/Petroleum_industry_in_Canada#cite_note-NEB_2015-11
  production volume 2.47598e11 kg
    Total production: BP Statistical Review of World Energy 2022; Share on- vs. offshore: Calculation based on onshore-share of Alberta and Saskatchewan. Data from https://www.cer-rec.gc.ca/en/data-analysis/energy-commodities/crude-oil-petroleum-products/statistics/estimated-production-canadian-crude-oil-equivalent.html, cited on https://en.wikipedia.org/wiki/Petroleum_industry_in_Canada#cite_note-NEB_2015-11, as described in Meili et al., 2023
  property price 0.29849 EUR2005
    Calculated value based on data from the United Nations Commodity Trade Statistics Database (http://data.un.org/Data.aspx?q=natural+gas&d=ComTrade&f=_l1Code%3a28%3bcmdCode%3a270900; accessed 12 October 2023). UN comtrade category: 270900 Oils; petroleum oils and oils obtained from bituminous minerals, crude. An average for 2019-2021 was used and adjusted for inflation to the year 2005. The average price of imports and exports into the five main markets (EU, US, JP and CN) was determined. For comparison, the reference crude quality Brent had an average price of US$(2021) 59.9 per barrel according to bp (2022), or EUR2005 0.317 per kg, in the same period.
  properties: amount in multioutput activity_kg 0 kg, carbon allocation 0.84 kg, carbon content 0.84, carbon content, fossil 0.84, carbon content, non-fossil 0, dry mass 1 kg, heating value, net 43.4 MJ, water content 0, water in wet mass 0 kg, wet mass 1 kg

## Inputs from technosphere
- chemical, inorganic: 0.000573365 kg; lognormal variance with pedigree 0.0186951, pedigree (4,4,1,3,3)
  Generic estimate according to Meili et al. 2018
  properties: carbon content, fossil 0.003, dry mass 1 kg, wet mass 1 kg
  note on carbon content, fossil: This dataset is an unweighted average of 20 inorganic substances (listed in Tab 88.1, ecoinvent v2.2 report 8, part II), being part of the top100 chemicals included in this database. The C-content has also been calculated as an unweighted average of the C content of the substances composing this dataset.
- chemical, organic: 0.000437372 kg; lognormal variance with pedigree 0.0186951, pedigree (4,4,1,3,3)
  Generic estimate according to Meili et al. 2018
  properties: carbon content, fossil 0.628, dry mass 1 kg, heating value, net 19.03 MJ, wet mass 1 kg
  note on carbon content, fossil: This dataset is an unweighted average of 20 organic substances (listed in Tab 88.1, ecoinvent v2.2 report 8, part II), being part of the top100 chemicals included in this database. The C-content has also been calculated as an unweighted average of the C content of the substances composing this dataset.
- diesel, burned in diesel-electric generating set, 10MW, for oil and gas extraction: 0.287273 MJ; lognormal variance with pedigree 0.130513, pedigree (3,2,2,3,3)
  Calculation based on data from IOGP 2022, assuming a generic share of 11.7% of onsite combustion + unspecified. Average 2019 to 2021
  properties: heating value, net 1 MJ, price 0.0188 EUR2005
- electricity, medium voltage: 0.048415 kWh; lognormal variance with pedigree 0.130513, pedigree (3,2,2,3,3)
  Purchased energy according to IOGP 2022.
- hazardous waste, for underground deposit: -0.000207318 kg; lognormal variance with pedigree 0.0126951, pedigree (3,4,1,3,3)
  Generic estimate according to Meili et al. 2018
  production volume
    Generic estimate according to Meili et al. 2018, as described in Meili et al., 2023
  properties: carbon content, fossil 0.554667, dry mass 1 kg, wet mass 1 kg
  note on carbon content, fossil: Tab A.6, ecoinvent v2.2 report 13_I, average hazardous waste composition was used, and referred to 0% water mass. No waste-specific emission are currently inventoried for underground deposits. Accordingly, no waste composition must be specified. For generic, average waste to underground deposit deposition in a 200 liter steel drum without cement solidification is assumed (ecoinvent v2.2 report 13_I).
- heavy fuel oil, burned in refinery furnace: 0.053696 MJ; lognormal variance with pedigree 0.130513, pedigree (3,2,2,3,3)
  Calculation based on data from IOGP 2022, assuming a generic share of 2.2% of onsite combustion + unspecified. Average 2019 to 2021
  properties: carbon content, fossil 0.849, dry mass 0.0242718 kg, wet mass 0.0242718 kg
- municipal solid waste: -0.000103659 kg; lognormal variance with pedigree 0.0126951, pedigree (3,4,1,3,3)
  Generic estimate according to Meili et al. 2018
  production volume
    Generic estimate according to Meili et al. 2018, as described in Meili et al., 2023
  properties: carbon content, fossil 0.171549, carbon content, non-fossil 0.261655, dry mass 0.771 kg, heating value, net 11.74 MJ, water content 0.297017, wet mass 1 kg
  note on carbon content, fossil: MSW composition in tab 4.1, ecoinvent v2.2 report 13_I. C content referred to 1 kg DM
  note on heating value, net: Value taken from the general comment of the treatment dataset.
- natural gas, vented: 0.00610554 m3; lognormal variance with pedigree 0.128713, pedigree (2,1,1,1,3)
  Country specific methane emissions according to IEA 2022, includes all methane emissions from upstream production, recalculated using a share of 0.88 Nm3 methane per Nm3 natural gas. Allocation based on country specific emissions for oil and gas.
  properties: heating value, gross 40 MJ, heating value, net 36 MJ
  note on heating value, gross: At standard conditions; based on Meili et al. (2022) section 5.2
- onshore petroleum field infrastructure: 5.31686e-9 unit; lognormal variance with pedigree 0.353837, pedigree (3,4,5,3,3)
  Lodewijkx et al. 2001
- onshore well, oil/gas: 3.55145e-5 m; lognormal variance with pedigree 0.313837, pedigree (3,4,1,3,3)
  Regional estimate for 2021 in combination with country-specific length of oil and gas wells in 2021, according to statista.com
- pipeline, petroleum: 2.06593e-8 km; lognormal variance with pedigree 0.313837, pedigree (3,4,1,3,3)
  Generic estimation based on estimate for Kazakhstan 2016
- sweet gas, burned in gas turbine: 2.10488 MJ; lognormal variance with pedigree 0.130513, pedigree (3,2,2,3,3)
  Calculation based on data from IOGP 2022, assuming a generic share of 85.7% of onsite combustion + unspecified. Average 2019 to 2021, SOx content of sour gas assessed separately in overall emissions.
  properties: heating value, net 1 MJ
- waste natural gas, sweet: -0.0945457 MJ; lognormal variance with pedigree 0.130213, pedigree (3,2,1,1,3)
  Total amount of flared gas per kg OE according to Worldbank 2023, Sox emissions from flared sour gas assessed separately in overall emissions.
  production volume
    Total amount of flared gas per kg OE according to Worldbank 2023, Sox emissions from flared sour gas assessed separately in overall emissions., as described in Meili et al., 2023
  properties: heating value, net 1 MJ
- water discharge from petroleum/natural gas extraction, onshore: -0.0150389 kg; lognormal variance with pedigree 0.0172951, pedigree (4,3,1,3,3)
  Average 2019 to 2021, IOGP 2022
  production volume
    Average 2019 to 2021, IOGP 2022, as described in Meili et al., 2023

## Inputs from nature
- Oil, crude [natural resource, in ground]: 1.00003 kg; lognormal variance with pedigree 0.00059512, pedigree (1,1,1,1,1)
  Total production: BP Statistical Review of World Energy 2022; Share on- vs. offshore: Calculation based on onshore-share of Alberta and Saskatchewan. Data from https://www.cer-rec.gc.ca/en/data-analysis/energy-commodities/crude-oil-petroleum-products/statistics/estimated-production-canadian-crude-oil-equivalent.html, cited on https://en.wikipedia.org/wiki/Petroleum_industry_in_Canada#cite_note-NEB_2015-11, including calculated losses due to oil spills
- Water, unspecified natural origin [natural resource, in water]: 0.000336491 m3; lognormal variance with pedigree 0.00069512, pedigree (1,1,1,3,1)
  Average 2019 to 2021, IOGP 2022

## Emissions to nature
- Nitrogen oxides [air, non-urban air or from high stacks]: 0.000399131 kg; lognormal variance with pedigree 0.0498005, pedigree (2,1,1,3,3)
  Average 2019 to 2021, IOGP 2022
- Sulfur dioxide [air, non-urban air or from high stacks]: 5.61088e-5 kg; lognormal variance with pedigree 0.0498005, pedigree (2,1,1,3,3)
  Average 2019 to 2021, IOGP 2022
- Oils, unspecified [soil, unspecified]: 1.16853e-6 kg; lognormal variance with pedigree 0.0498005, pedigree (2,1,1,3,3)
  Average 2019 to 2021, IOGP 2022
- AOX, Adsorbable Organic Halides [water, surface water]: 1.35421e-10 kg; lognormal variance with pedigree 0.0498005, pedigree (2,1,1,3,3)
  Extrapolation for sum parameter
- BOD5, Biological Oxygen Demand [water, surface water]: 4.14206e-5 kg; lognormal variance with pedigree 0.0498005, pedigree (2,1,1,3,3)
  Extrapolation for sum parameter
- COD, Chemical Oxygen Demand [water, surface water]: 4.14206e-5 kg; lognormal variance with pedigree 0.0498005, pedigree (2,1,1,3,3)
  Extrapolation for sum parameter
- DOC, Dissolved Organic Carbon [water, surface water]: 1.13753e-5 kg; lognormal variance with pedigree 0.0498005, pedigree (2,1,1,3,3)
  Extrapolation for sum parameter
- Nitrogen [water, surface water]: 1.01565e-8 kg; lognormal variance with pedigree 0.0498005, pedigree (2,1,1,3,3)
  Extrapolation for sum parameter
- Oils, unspecified [water, surface water]: 1.31474e-5 kg; lognormal variance with pedigree 0.0498005, pedigree (2,1,1,3,3)
  Average 2019 to 2021, IOGP 2022
- Sulfur [water, surface water]: 3.52093e-8 kg; lognormal variance with pedigree 0.0498005, pedigree (2,1,1,3,3)
  Extrapolation for sum parameter
- TOC, Total Organic Carbon [water, surface water]: 1.13753e-5 kg; lognormal variance with pedigree 0.0498005, pedigree (2,1,1,3,3)
  Extrapolation for sum parameter
- Water [water, surface water]: 1.50389e-5 m3; lognormal variance with pedigree 0.0438005, pedigree (3,3,1,3,1)
  Balancing of freshwater input.

## Sampling procedure
Statistics and use of generic data Data were collected from existing literature, statistics, and environmental reports. Where no country specific data was available, extrapolations or global averages served as proxy. Methane and flaring emissions, consumption of energy, production figures and other key indicators are updated with the latest version of key data sources for petroleum and natural gas extraction (BP 2022, IOGP 2022, Worldbank 2023, IEA 2022). For methane emissions, data are aligned to ensure that the total inventoried methane emissions for petroleum and natural gas match the global total reported in actual studies. The data of flaring are taken from the Global Gas Flaring Reduction Partnership (GGFR), which estimated the country specific amounts of flared gas based on satellite measurements done according to a methodology provided by the National Oceanic and Atmospheric Administration (NOAA), a part of the US department of Defense. These measured flaring data are provided publicly for the reference year 2021 (Worldbank 2023). The country-specific value for flaring can be found inMeili et al., 2023, table 9.1. In general, to assess the overall methane emissions of natural gas, the methane emission rate is divided by a share of 0.585 kg of methane per m3 of natural gas. References: BP 2022 BP Statistical Review of World Energy 2019. BP, London, UK. Retrieved from: https://www.bp.com/en/global/corporate/energy-economics/statistical-review-of-world-energy.html, IEA 2022 Methane Tracker 2022. International Energy Agency, Paris, France. Retrieved from: https://www.iea.org/reports/global-methane-tracker-2022IEA 2022b Global Methane Tracker - Documentation - 2022 Version. International Energy Agency, Paris, France. Retrieved from: https://iea.blob.core.windows.net/assets/b5f6bb13-76ce-48ea-8fdb-3d4f8b58c838/GlobalMethaneTracker_documentation.pdf, Worldbank 2023 World Data Bank for Global Gas Flaring Reduction, retrieved from: https://www.worldbank.org/en/programs/gasflaringreduction/global-flaring-data

## Extrapolations
A part of the data has been estimated with generic assumptions for onshore production. The modules for crude oil and natural gas production are complete in terms of environmental impacts. However, the variation between different oil and gas fields can be extremely high. A part of the data was available for single oil fields, for regional averages or for globally operating companies only. Thus, the derived estimates on a country level come with uncertainty, which is specified for each exchange in the uncertainty pedigree matrix. For the direct energy uses of fuel oil, gas and electricity, region-specific data averaged over three years (2019-2021) per world region is used (IOGP 2022). Consumption of freshwater for enhanced oil recovery (EOR) is based on the reported average over three years (2019-2021) per world region (IOGP 2022).
