# cobalt sulfate production

Dataset: EcoSpold 2, unit process
Geography: RoW
Time period: 2018-01-01 to 2023-12-31
Technology level: current
Classification: ISIC rev.4 ecoinvent: 2011:Manufacture of basic chemicals
Scenario: Business-as-Usual
System model: Allocation, cut-off by classification
Generated by: Eleonora Crenna
Published in: Dai, Q. 2018
Database: ecoinvent
isCopyrightProtected: true
accessRestrictedTo: 1

## General comment
This dataset represents the production of 1 kg cobalt (II) sulfate (CoSO4), battery grade. Cobalt sulfate is used in storage batteries, especially in the production of the precursor of the cathode active material in NMC/NCA families Li-ion batteries. Values for materials and energy demand are estimated from the plant in Tongxiang, Zhejiang province (China) by Dai et al. (2018). The Tongxiang plant produces other cobalt products, such as Co3O4 and CoO, via further processing of refined CoSO4. These further processing steps involve the use of additional material and energy consumption, which were ascribed by the authors of the life cycle inventory (Dai et al., 2018) to battery-grade CoSO4 production because it was not possible to separate the material and energy requirements belonging to battery-grade CoSO4 production from those of the whole plant. Therefore, the data in this dataset represents a conservative estimate. Infrastructure has been included as well. This dataset is a copy of the corresponding regional dataset. Production volume was adjusted.
Reference:
Dai, Q., C., K., & Elgowainy, A. (2018). Cobalt life cycle analysis update for the greet model (Tech. Rep.). Argonne, IL (United States): Argonne National Lab.(ANL).

## Included activities start
The activity starts with cobalt hydroxide and other materials entering the factory.

## Included activities end
The activity ends with the production of cobalt sulfate (CoSO4), battery grade, at factory gate.

## Geography
Values are estimated from the production at the plant in Tongxiang, Zhejiang province (China) and assumed to be representative of the production process in China.

## Technology
The process involves the treatment of cobalt hydroxide (Co(OH)2) with sulfuric acid (H2SO4) and disodium disulphite (Na2S2O5). The leached solution undergoes various precipitation steps to remove impurities. Evaporation and crystallization followed by filtration and drying will produce battery-grade CoSO4 crystals.
Reference:
Dai, Q., C., K., & Elgowainy, A. (2018). Cobalt life cycle analysis update for the greet model (Tech. Rep.). Argonne, IL (United States): Argonne National Lab.(ANL).

## Time period
The time period is from 2018 (year of the publication of data) and 2020 (year of the dataset)

## Reference product
- cobalt sulfate: 1 kg; name RP; By-product classification allocatable product; CPC 34240: Phosphates of triammonium; salts and peroxysalts of inorganic acids and metals n.e.c.; HS2017 283329: Sulphates; n.e.c. in item no. 2833.2; CAS 10124-43-3
  production volume 1.35647e8 kg; name PV_RP
    Approximation, possible overestimation. The PV is expressed in kg. In 2016, the global production of refined cobalt was 96600 tonnes in terms of cobalt content (USGS, 2016. Minerals Yearbook - Cobalt. Table1. Available at: https://prd-wret.s3-us-west-2.amazonaws.com/assets/palladium/production/atoms/files/myb1-2016-cobal.pdf). CoSO4 MW= 154.99 g/mol; Co=58.93 g/mol
  property cobalt content 0.380316; name RefProd_Co_content
    cobalt content on a dry matter basis
  property price 14.4024 EUR2005
    Calculated based on inputs: The price of the product has been calculated as a sum of the values of the material and energy inputs for this product. This value is therefore a rough estimation. It may underestimate the real price since there are additional expenses when producing any product. These expences can include for example labour costs, treatment of waste materials and profit for the producer. Please consider carefully whether this level of data quality is acceptable for your application.
  properties: carbon allocation 0 kg, carbon content 0, carbon content, fossil 0, carbon content, non-fossil 0, dry mass 1 kg, water content 0, water in wet mass 0 kg, wet mass 1 kg

## Inputs from technosphere
- ammonium carbonate: 0.0721511, 0.146097 kg (2 suppliers, which the file names only by identifier); sum of these 0.218248 kg; = 0.574*(58.933/154.996); lognormal variance with pedigree 0.0034, pedigree (2,4,2,1,1)
  Calculated value from Dai et al. (2018). Original value: 0.574 ton/ton Co eq. Co MW = 58.933 g/mol; CoSo4 MW = 154.996 g/mol.
  properties: carbon content, fossil 0.125, dry mass 1 kg, heating value, net 13.88 MJ, wet mass 1 kg
- chemical factory, organics: 4e-10 unit; source Dai, Q. 2018; lognormal variance with pedigree 0.472, pedigree (3,5,5,5,5)
  Calculated based on literature data published by the industry. For this activity, no information was readily available concerning infrastructure and land-use. Therefore, the infrastructure is estimated based on data from two chemical factories, the BASF site of Ludwigshafen and the chemical factory in Gendorf (which are both located in Germany), which produce a wide range of chemical substances. Based on this data, the following assumptions are made: the built area amounts to about 4.2 ha, the plant has an average output of 50'000 t/a and a lifespan of fifty years. The estimated infrastructure amount is therefore 4.00 E-10 units per kg of produced chemical.
  References:
  Althaus H.-J., Chudacoff M., Hischier R., Jungbluth N., Osses M. and Primas A. (2007) Life Cycle Inventories of Chemicals. ecoinvent report No. 8, v2.0. EMPA Dübendorf, Swiss Centre for Life Cycle Inventories, Dübendorf, CH.
  Gendorf (2000) Umwelterklärung 2000, Werk Gendorf. Werk Gendorf, Burgkirchen.om ecoinvent)
- cobalt hydroxide: 0.60032 kg; name cobalt_hydroxide; = 2.86*(58.933/154.996)*(0.35/0.634); source Dai, Q. 2018; lognormal variance with pedigree 0.0054, pedigree (2,4,2,5,1)
  Calculated value from Dai et al. (2018). Original value: 2.86 ton crude Co(OH)2/ton Co eq. Co MW = 58.933 g/mol; CoSo4 MW = 154.996 g/mol. Cobalt hydroxide is used in reaction with sulfuric acid to produce cobalt sulfate.
  Crude Co(OH)2 is considered to have a cobalt content of 35%, pure Co(OH)2 one of 63.4%
  properties: dry mass 1 kg, price 23.76 EUR2005, wet mass 1 kg
- disodium disulphite: 0.0304178 kg; name disodium; = 0.08*(58.933/154.996); source Dai, Q. 2018; lognormal variance with pedigree 0.0054, pedigree (2,4,2,5,1)
  Calculated value from Dai et al. (2018). Original value: 0.08 ton/ton Co eq. Co MW = 58.933 g/mol; CoSo4 MW = 154.996 g/mol.
  property carbon content, fossil 0; name RefProd_C_content_fossil
  property carbon content, non-fossil 0; name RefProd_C_content_non_fossil
  property dry mass 1 kg; name RefProd_DM
  property water content 0; name RefProd_water_content
  property water in wet mass 0 kg; name RefProd_WWM
  property wet mass 1 kg; name RefProd_WM
- electricity, medium voltage: 0.00149933, 0.000133353, 0.0116269, 0.0152359, 0.0161349, 0.00821833, 0.00113508, 0.00718419, 0.000303263, 0.0485539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 kWh (47 suppliers, which the file names only by identifier); sum of these 1.152 kWh; source Dai, Q. 2018; lognormal variance with pedigree 0.0054, pedigree (2,4,2,5,1)
  Calculated value from Dai et al. (2018). Original value: 10.34 mmBTU/ton Co eq. Co MW = 58.933 g/mol; CoSo4 MW = 154.996 g/mol. Conversion factor: 1 mmBTU = 293.071 kWh
- hazardous waste, for incineration: -1.5022, -0.722403, -0.0188832 kg (3 suppliers, which the file names only by identifier); sum of these -2.24349 kg; = (cobalt_hydroxide + limestone + sulfuric_acid + hydrocloric_acid + kerosene + disodium + sodium_hydroxide + ammonium_carbonate + soda_ash) - RP - water_out * WM_water; lognormal variance with pedigree 0.2106, pedigree (5,5,5,5,5)
  Calculated value to obtain mass balance.
  production volume; = abs((BP_waste/RP)*PV_RP)
    Calculated from production volume of reference product using the relative outputs.
  properties: carbon content, fossil 0.0178187, dry mass 1 kg, heating value, net 17 MJ, wet mass 1 kg
  note on carbon content, fossil: Tab A.6, ecoinvent v2.2 report 13_I. C content has been calculated after data in the tables, and then referred to 1 kg DM
  note on heating value, net: Value taken from the general comment of the treatment dataset.
- heat, district or industrial, natural gas: 10.7689 MJ; source Dai, Q. 2018; lognormal variance with pedigree 0.0054, pedigree (2,4,2,5,1)
  Calculated value from Dai et al. (2018). Original value: 26.838 mmBTU/ton Co eq. Co MW = 58.933 g/mol; CoSo4 MW = 154.996 g/mol. Conversion factor: 1 mmBTU = 1,055.055853 MJ
  properties: heating value, net 1 MJ
- hydrochloric acid, without water, in 30% solution state: 0.0962072, 0.439527 kg (2 suppliers, which the file names only by identifier); sum of these 0.535734 kg; = 1.409*(58.933/154.996); source Dai, Q. 2018; lognormal variance with pedigree 0.0054, pedigree (2,4,2,5,1)
  Calculated value from Dai et al. (2018). Original value: 1.409 ton/ton Co eq. Co MW = 58.933 g/mol; CoSo4 MW = 154.996 g/mol. Hydrochloric acid is used to remove impurities from cobalt sulfate.
  properties: dry mass 1 kg, heating value, net 3.32 MJ, wet mass 1 kg
- kerosene: 0.002631, 0.0128559, 9.65019e-5, 7.60025e-5, 0.000123786, 0.0014448, 0.000455407, 0.000187024 kg (8 suppliers, which the file names only by identifier); sum of these 0.0178705 kg; = 0.047*(58.933/154.996); source Dai, Q. 2018; lognormal variance with pedigree 0.0054, pedigree (2,4,2,5,1)
  Calculated value from Dai et al. (2018). Original value: 0.047 ton/ton Co eq. Co MW = 58.933 g/mol; CoSo4 MW = 154.996 g/mol.
  properties: carbon content, fossil 0.85, dry mass 1 kg, heating value, net 43 MJ, wet mass 1 kg
- limestone, crushed, washed: 0.0226205, 0.000192875 kg (2 suppliers, which the file names only by identifier); sum of these 0.0228134 kg; = 0.06*(58.933/154.996); source Dai, Q. 2018; lognormal variance with pedigree 0.0054, pedigree (2,4,2,5,1)
  Calculated value from Dai et al. (2018). Original value: 0.06 ton/ton Co eq. Co MW = 58.933 g/mol; CoSo4 MW = 154.996 g/mol.
  properties: carbon content, fossil 0.117257, dry mass 0.998 kg, water content 0.00200401, wet mass 1 kg
  note on carbon content, fossil: Table 3.1, ecoinvent v2.2 report 7, part VII, pg 3. MW CaCO3=100, MW MgCO3=84. C content of limestone is 0.117257 kg/kg DM
- soda ash, dense: 0.0334596 kg; name soda_ash; = 0.088*(58.933/154.996); lognormal variance with pedigree 0.0034, pedigree (2,4,2,1,1)
  Calculated value from Dai et al. (2018). Original value: 0.088 ton/ton Co eq. Co MW = 58.933 g/mol; CoSo4 MW = 154.996 g/mol.
  properties: carbon content, fossil 0.113208, dry mass 1 kg, heating value, net 3.43 MJ, wet mass 1 kg
- sodium hydroxide, without water, in 50% solution state: 0.0925119, 0.947397 kg (2 suppliers, which the file names only by identifier); sum of these 1.03991 kg; = 2.735*(58.933/154.996); lognormal variance with pedigree 0.0034, pedigree (2,4,2,1,1)
  Calculated value from Dai et al. (2018). Original value: 2.735 ton/ton Co eq. Co MW = 58.933 g/mol; CoSo4 MW = 154.996 g/mol.
  properties: dry mass 1 kg, heating value, net 3.03 MJ, wet mass 1 kg
- sulfuric acid: 0.864145, 0.113027 kg (2 suppliers, which the file names only by identifier); sum of these 0.977172 kg; = 2.57*(58.933/154.996); source Dai, Q. 2018; lognormal variance with pedigree 0.0054, pedigree (2,4,2,5,1)
  Calculated value from Dai et al. (2018). Original value: 2.57 ton/ton Co eq. Co MW = 58.933 g/mol; CoSo4 MW = 154.996 g/mol. Sulfuric acid is used in reaction with cobalt hydroxide to produce cobalt sulfate.
  properties: dry mass 1 kg, wet mass 1 kg
- wastewater, average: -9.06755e-5, -0.0150888, -0.00360805, -5.37219e-5 m3 (4 suppliers, which the file names only by identifier); sum of these -0.0188413 m3; = Water_in; lognormal variance with pedigree 0.2106, pedigree (5,5,5,5,5)
  Calculated value to obtain mass balance.
  production volume; = abs((BP_water/RP)*PV_RP)
    Calculated from production volume of reference product using the relative outputs.
  properties: dry mass 0.346837 kg, water content 2882.2, wet mass 1000 kg

## Inputs from nature
- Water, cooling, unspecified natural origin [natural resource, in water]: 0.0188413 m3; name Water_in; = 13092*(58.933/154.996)*3.785*10^(-6); source Dai, Q. 2018; lognormal variance with pedigree 0.0054, pedigree (2,4,2,5,1)
  Calculated value from Dai et al. (2018). Original value: 13092 gal/ton Co eq. Co MW = 58.933 g/mol; CoSo4 MW = 154.996 g/mol. Conversion factor: 1 gal = 3.785 kg

## Emissions to nature
- Water [water, unspecified]: 0.000232458 m3; name water_out; = ((18.015*2)/154.996)/1000; lognormal variance with pedigree 0.25, pedigree (5,5,5,5,5)
  Calculated value to get mass balance, based on stoichiometry. Water emissions from the reaction of Co(OH)2 + H2SO4 --> CoSO4 + 2H2O. The reaction involves a precipitation step, with separation between solid (cobalt sulfate) and liquid (water). CoSO4 MW = 154.996 g/mol; H2O MW = 18.015 g/mol.
  property wet mass 1000 kg; name WM_water

## Sampling procedure
From Literature.

## Extrapolations
The dataset is extrapolated from CN data; the uncertainty has been adjusted accordingly.
