# malusil production

Dataset: EcoSpold 2, unit process
Geography: RER
Time period: 2000-01-01 to 2023-12-31
Technology level: current
Classification: ISIC rev.4 ecoinvent: 0810:Quarrying of stone, sand and clay
Classification: EcoSpold01Categories: chemicals/inorganics
Tags: ConvertedDataset
Scenario: Business-as-Usual
System model: Allocation, cut-off by classification
Generated by: Roland Hischier
Published in: Hischier R. 2007
Database: ecoinvent
isCopyrightProtected: true
accessRestrictedTo: 1

## General comment
The functional unit represent 1 kg of malusil. Quite a large uncertainty of the process data due to weak data on the production process.
[This dataset was already contained in the ecoinvent database version 2. It was not individually updated during the transfer to ecoinvent version 3. Life Cycle Impact Assessment results may still have changed, as they are affected by changes in the supply chain, i.e. in other datasets. This dataset was generated following the ecoinvent quality guidelines for version 2. It may have been subject to central changes described in the ecoinvent version 3 change report (http://www.ecoinvent.org/database/ecoinvent-version-3/reports-of-changes/), and the results of the central updates were reviewed extensively. The changes added e.g. consistent water flows and other information throughout the database. The documentation of this dataset can be found in the ecoinvent reports of version 2, which are still available via the ecoinvent website. The change report linked above covers all central changes that were made during the conversion process.]

## Included activities end
Raw materials, machineries and energy consumption for production, estimated emissions to air from production and infrastructure of the site (approximation). No water emissions.

## Geography
Data are used here as European average.

## Technology
Data approximated with data from lime mining, crushing and milling.

## Parameters
- fraction, process water, to air: 0.205 dimensionless; name fraction_PW_to_air; lognormal variance with pedigree 0.092025, pedigree (4,4,3,2,4)
  Literature value (Statistics Canada, 2007 & Shaffer, K.H., 2008, Consumptive water use in the Great Lakes Basin, USGS) (Vionnet, S., Quantis Water Database - Technical Report, 2012).

## Reference product
- malusil: 1 kg; By-product classification allocatable product; CPC 16390: Other minerals n.e.c.; HS2017 2837: Cyanides, cyanide oxides and complex cyanides; CAS 14807-96-6
  EcoSpold01Location=RER
  production volume 1.32237 kg
    This is a placeholder value that does not reflect real-world production volumes. This dataset does not currently require a real-world production volume to work in the database framework, and no actual data were collected yet. This has no negative effect on the results of the ecoinvent database. The placeholder value of this activity was scaled according to the nominal GDP of 2005 (source: United Nations, http://data.un.org/Glossary.aspx?q=GDP+%28current+US%24%29, accessed 20130726) to reflect an appropriate share of the global production volume, which is also a placeholder value.
  property price 0.00479154 EUR2005
    Calculated based on inputs: The price of the product has been calculated as a sum of the values of the material and energy inputs for this product. This value is therefore a rough estimation. It may underestimate the real price since there are additional expenses when producing any product. These expences can include for example labour costs, treatment of waste materials and profit for the producer. Please consider carefully whether this level of data quality is acceptable for your application.
  properties: carbon allocation 0 kg, carbon content 0, carbon content, fossil 0, carbon content, non-fossil 0, dry mass 1 kg, water content 0, water in wet mass 0 kg, wet mass 1 kg

## Inputs from technosphere
- blasting: 7.73e-5 kg; lognormal variance with pedigree 0.0767, pedigree (4,3,5,3,3)
  Approximation with data from lime production
  EcoSpold01Location=RER
  Uncertainty: approximation with data from lime production
- conveyor belt: 2.78e-8 m; lognormal variance with pedigree 0.3667, pedigree (4,3,5,3,3)
  (same comment as for blasting)
- diesel, burned in building machine: 0.018 MJ; lognormal variance with pedigree 0.0767, pedigree (4,3,5,3,3)
  EcoSpold01Location=GLO
  Approximation with data from lime production
  Uncertainty: approximation with data from lime production
  properties: heating value, net 1 MJ
- electricity, medium voltage: 0.0325 kWh; lognormal variance with pedigree 0.0767, pedigree (4,3,5,3,3)
  EcoSpold01Location=UCTE
  Approximation with data from lime production
  Uncertainty: approximation with data from lime production
- heat, central or small-scale, other than natural gas: 0.0033746 MJ; lognormal variance with pedigree 0.0767, pedigree (4,3,5,3,3)
  Approximation with data from lime production
  EcoSpold01Location=CH
  Uncertainty: approximation with data from lime production
  properties: heating value, net 1 MJ
- heat, district or industrial, other than natural gas: 0.0898 MJ; lognormal variance with pedigree 0.0767, pedigree (4,3,5,3,3)
  EcoSpold01Location=RER
  Approximation with data from lime production
  Uncertainty: approximation with data from lime production
  properties: heating value, net 1 MJ
- industrial machine, heavy, unspecified: 0.000231 kg; lognormal variance with pedigree 0.3667, pedigree (4,3,5,3,3)
  (same comment as for heat, district or industrial, other than natural gas)
- limestone quarry infrastructure: 5.25e-11 unit; lognormal variance with pedigree 0.3667, pedigree (4,3,5,3,3)
  (same comment as for heat, central or small-scale, other than natural gas)
- recultivation, limestone mine: 6.52e-6 m2; lognormal variance with pedigree 0.3667, pedigree (4,3,5,3,3)
  EcoSpold01Location=CH
  Approximation with data from lime production
  Uncertainty: approximation with data from lime production

## Inputs from nature
- Occupation, mineral extraction site [natural resource, land]: 8.48e-5 m2*year; lognormal variance with pedigree 0.1267, pedigree (4,3,5,3,3)
  Approximation with data from lime production
  Uncertainty: approximation with data from lime production
- Talc [natural resource, in ground]: 1.11 kg; lognormal variance with pedigree 0.0767, pedigree (4,3,5,3,3)
  (same comment as for Occupation, mineral extraction site)
- Transformation, from forest, unspecified [natural resource, land]: 6.52e-6 m2; lognormal variance with pedigree 0.2067, pedigree (4,3,5,3,3)
  (same comment as for Occupation, mineral extraction site)
- Transformation, to mineral extraction site [natural resource, land]: 6.52e-6 m2; lognormal variance with pedigree 0.2067, pedigree (4,3,5,3,3)
  (same comment as for Occupation, mineral extraction site)
- Water, well, in ground [natural resource, in water]: 2.93e-5 m3; name water_well_in_ground_input; lognormal variance with pedigree 0.0767, pedigree (4,3,5,3,3)
  (same comment as for Occupation, mineral extraction site)

## Emissions to nature
- Particulate Matter, < 2.5 um [air, urban air close to ground]: 8e-6 kg; lognormal variance with pedigree 0.3667, pedigree (4,3,5,3,3)
  (same comment as for Occupation, mineral extraction site)
- Particulate Matter, > 10 um [air, urban air close to ground]: 0.000112 kg; lognormal variance with pedigree 0.1267, pedigree (4,3,5,3,3)
  (same comment as for Occupation, mineral extraction site)
- Particulate Matter, > 2.5 um and < 10um [air, urban air close to ground]: 4e-5 kg; lognormal variance with pedigree 0.2067, pedigree (4,3,5,3,3)
  (same comment as for Occupation, mineral extraction site)
- Water [air, unspecified]: 6.0065e-6 m3; name water_to_air_unspecified; = (water_well_in_ground_input*fraction_PW_to_air); lognormal variance with pedigree 0.0807, pedigree (2,2,5,1,1)
  Calculated value based on literature values and expert opinion. See comments in the parametres' comment field.
  property fraction, origin: fresh water 1; name fraction_origin_fresh_water
  property fraction, origin: salt water 0; name fraction_origin_salt_water
  property fraction, origin: unspecified 0; name fraction_origin_unspecified
- Water [water, unspecified]: 2.32935e-5 m3; name water_to_water_unspecified; = water_well_in_ground_input*(1-fraction_PW_to_air); lognormal variance with pedigree 0.0807, pedigree (2,2,5,1,1)
  (same comment as for Water)
  property carbon content, fossil 0; name C_content_fossil
  property carbon content, non-fossil 0; name C_content_non_fossil
  property dry mass 0 kg; name DM
  property fraction, origin: fresh water 1; name fraction_origin_fresh_water_Ww
  property fraction, origin: salt water 0; name fraction_origin_salt_water_Ww
  property fraction, origin: unspecified 0; name fraction_origin_unspecified_Ww
  property water in wet mass 1000 kg; name WWM
  property wet mass 1000 kg; name WM

## Extrapolations
see technology

## Review by Hans-Jörg Althaus 2007-11-09
passed
