# battery production, Li-ion, LiMn2O4, rechargeable, prismatic

Dataset: EcoSpold 2, unit process
Geography: GLO
Time period: 2009-01-01 to 2023-12-31
Technology level: current
Classification: EcoSpold01Categories: electronics/module
Classification: ISIC rev.4 ecoinvent: 2720:Manufacture of batteries and accumulators
Tags: infrastructure
Scenario: Business-as-Usual
System model: Allocation, cut-off by classification
Generated by: Dominic Notter
Published in: Hischier, R. 2009
Database: ecoinvent
isCopyrightProtected: true
accessRestrictedTo: 1

## General comment
The dataset can be used for a lithium-ion battery, e.g. for mechanical drive of an electrical vehicle. The modelled battery has a mass of 280 kg, contains 216 cells and holds a capacity of 32 kWh and thus an energy density of 0.114 kWh/kg. Data are based on measurements and scaled to 1kg of battery. For infrastructure, the ecoinvent dataset "electronic component production plant" is accounted.
For more information refer to:
- Notter D. A., Gauch M., Widmer R., Wäger P., Stamp A., Zah R. and Althaus H.-J. (2010) Contribution of Li-ion batteries to the environmental impact of electric vehicles. In: Environmental Science & Technology.
- Technical Specifications: https://www.protoscar.com/pdf/LAMPO2_Technical_Specifications.pdf

## Included activities end
This dataset incudes the production of 1kg of a lithium ion battery pack, a steel box, a battery management system and cables are taken into account. Further, the dataset includes the electric current for battery activating and testing. For infrastructure, the ecoinvent dataset "electronic component production plant" is accounted. Transportation: the single cells are transported by ship from Beijing to Amsterdam and by lorry within Europe (1000 km).
The end of life of the used battery is not considered.

## Geography
Some European datasets are used for global processes.

## Technology
This dataset includes a method of producing a lithium ion battery. During the charge process, lithium ion move from the cathode (LiMn2O4) into the electrolyte (LiPF6 in ethylenecarbonate) through the micropores of the separator into the anode (lithium ion intercalation). During the discharge of the battery the Li+-ions move back into the cathode. The modelled battery has a mass of 280 kg, contains 216 cells and holds a capacity of 32 kWh. Data are based measurements and scaled to 1kg of battery. The battery pack contains a battery management system.

## Reference product
- battery, Li-ion, LiMn2O4, rechargeable, prismatic: 1 kg; name RP_amount_1; By-product classification allocatable product; CPC 46420: Electric accumulators; HS2017 850650: Cells and batteries; primary, lithium
  EcoSpold01Location=GLO
  production volume 1 kg; name RP_PV_1
    Unknown
    Dummy value to be replaced by measured, estimated or calculated value
  property carbon content, fossil 0.328011
    Calculated as the addition of C contents in the product composition
  property carbon content, non-fossil 0
    Calculated as the addition of C contents in the product composition
  property price 32 EUR2005
    Calculated based on literature values. The price for a battery is 420 euro/kWh (DuLeep, 2011, Impact of Electric Vehicles - Deliverable 2, Assessment of electric vehicle and battery technology, CE Delft). The capacity of the battery is 20kWh and the weight of the battery is 262kg.
  properties: carbon allocation 0.328011 kg, carbon content 0.328011, dry mass 1 kg, water content 0, water in wet mass 0 kg, wet mass 1 kg

## Inputs from technosphere
- battery cell, Li-ion, LiMn2O4: 0.79937 kg; lognormal variance with pedigree 0.0421, pedigree (1,4,5,3,1)
  EcoSpold01Location=CN
  properties: carbon content, fossil 0.380721, dry mass 1 kg, wet mass 1 kg
  note on carbon content, fossil: C content calculated as the addition of the C contents in the final product components
- cable, data cable in infrastructure: 0.3729 m; lognormal variance with pedigree 0.0541, pedigree (3,4,5,3,1)
  EcoSpold01Location=GLO
  properties: carbon content, fossil 0.371067, dry mass 0.079 kg, wet mass 0.079 kg
  note on carbon content, fossil: Calculated as the addition of C contents in the product composition. Then referred to 1 kg DM
- cable, three-conductor cable: 0.024955 m; lognormal variance with pedigree 0.0541, pedigree (3,4,5,3,1)
  EcoSpold01Location=GLO
  properties: carbon content, fossil 0.451335, dry mass 1.04 kg, wet mass 1.04 kg
- electricity, low voltage: 0.10755 kWh; lognormal variance with pedigree 0.096, pedigree (4,5,5,5,3)
  EcoSpold01Location=UCTE
- metal working factory: 4.58e-10 unit; lognormal variance with pedigree 0.4461, pedigree (5,5,5,3,3)
  EcoSpold01Location=RER
- printed wiring board, surface mounted, unspecified, Pb containing: 0.00101529 kg; = 0.0033843*0.3; lognormal variance with pedigree 0.0421, pedigree (1,4,5,3,1)
  This original value from production mix has been replaced by 2 flows. Pb-containing has a share of 0.3, Pb-free has a share of 0.7.
  property carbon content, fossil 0.132522; name C_content_fossil
  property carbon content, non-fossil 0; name C_content_non_fossil
  property dry mass 1 kg; name DM
  property water content 0; name water_content
  property water in wet mass 0 kg; name WWM
  property wet mass 1 kg; name WM
- printed wiring board, surface mounted, unspecified, Pb free: 0.00236901 kg; = 0.0033843*0.7; lognormal variance with pedigree 0.0421, pedigree (1,4,5,3,1)
  (same comment as for printed wiring board, surface mounted, unspecified, Pb containing)
  properties: carbon content, fossil 0.132522, dry mass 1 kg, wet mass 1 kg
- reinforcing steel: 0.14534 kg; lognormal variance with pedigree 0.0607, pedigree (2,4,5,3,3)
  EcoSpold01Location=RER
  properties: carbon content, fossil 0.004, dry mass 1 kg, wet mass 1 kg
- sheet rolling, steel: 0.14534 kg; lognormal variance with pedigree 0.0607, pedigree (2,4,5,3,3)
  EcoSpold01Location=RER

## Sampling procedure
measurements, patent, ecoinvent

## Extrapolations
see Geography

## Review by Christian Bauer 2010-02-08
passed
