# treatment of waste mineral wool, inert material landfill

Dataset: EcoSpold 2, unit process
Geography: Europe without Switzerland
Time period: 1995-01-01 to 2023-12-31
Technology level: current
Classification: ISIC rev.4 ecoinvent: 3821:Treatment and disposal of non-hazardous waste
Scenario: Business-as-Usual
System model: Allocation, cut-off by classification
Generated by: Lucia Valsasina
Published in: Doka G. 2007
Database: ecoinvent
isCopyrightProtected: true
accessRestrictedTo: 1

## General comment
This dataset represents the activity of waste disposal of 'waste mineral wool, for final disposal' in an inert material landfill.

## Included activities start
The activity starts with the waste being available at the gate of the treatment facility. Collection and transportation of the waste to the treatment plant is not included.

## Included activities end
The activity ends with the waste being treated and no direct emissions from inert material landfill (leachate) are inventoried, as they are considered negligible. The dataset contains only exchanges to process-specific burdens (energy, land use) and infrastructure.

## Geography
Modelling parameters affecting the treatment technology are not specific to this geography.

## Technology
Inert material landfill with leachate collection system and renaturation after closure. 50% of the sites is equipped with a base seal.

## Reference product
- waste mineral wool, for final disposal: -1 kg; name RP; By-product classification Waste; CPC 39990: Other wastes n.e.c.; HS2017 5103: Waste of wool or of fine or coarse animal hair, including yarn waste but excluding garnetted stock
  Estimated values. Global production volume for mineral fibers is 9 billion kg/year (Buchel at el. 2000, p. 373).
  production volume 1.665e8 kg; name RP_PV; = 9.00E+09/3*0.15*0.37
    Estimated value. According European Commission (2012) global production volume for mineral fibers is 9 billion kg/year. EU produces approximately a third of global production (Buchel at el. 2000, p. 373) and a waste generation of 15% is assumed (taken from the estimated value for gypsum, source: WRAP "International practice in plasterboard recycling: Canada", n.d). Eurostat reports treatment methods for municipal waste for EU 27 in 2010 to be: 23% incineration; 37% landfilling; 25% recycling; 14% compost / digestion. PV for collection for final disposal is assumed to be equal to half the PV of treatment in inert waste landfill as it is the only activity treating waste mineral wool, for final disposal. PV for sorting, as no recycling is assumed, the PV is set equal to half of the PV to landfill, therefore it is assumed that half of the waste that is landfilled undergoes sorting first and the rest goes directly to landfill. References: Buchel, K.H. et al. (2000) Industrial Inorganic Chemistry. Wiley-VCH. European Commision (2012) Recommendation from the Scientific Committee on Occupational Exposure Limits for man made-mineral fibres (MMMF) with no indication for carcinogenicity and not specified elsewhere. Eurostat. Municipal waste generation & treatment, by treatment method. Retrieved from: <http://ec.europa.eu/eurostat/web/waste/municipal-waste-generation-and-treatment-by-treatment-method>, accessed 7th July 2016 WRAP (n.d.) International practice in plasterboard recycling: Canada. Retrieved from: http://www.wrap.org.uk/sites/files/wrap/Case%20study%20-%20Plasterboard%20recycling%20in%20Canada.pdf, accessed 3 May 2016
  property heating value, net 0 MJ
    Non combustible products are assumed to have an LHV equal to zero (0).
  property price 0 EUR2005
    Waste products are assigned a price of zero as they are assumed to require further treatment.
  properties: carbon allocation 0 kg, carbon content 0, carbon content, fossil 0, carbon content, non-fossil 0, dry mass 1 kg, water content 0, water in wet mass 0 kg, wet mass 1 kg

## Inputs from technosphere
- inert material landfill: 1.48e-9 unit; lognormal variance with pedigree 0.042, pedigree (1,1,5,5,1)
  landfill infrastructure per kg waste, uncerteinty heeded in module.
- process-specific burdens, inert material landfill: 1 kg; lognormal variance with pedigree 0.042, pedigree (1,1,5,5,1)
  process-specific burdens per kg waste, uncerteinty heeded in module.

## Extrapolations
This dataset has been copied from an original dataset covering the geography CH. The uncertainty has been adjusted accordingly.
