# selective coating, copper sheet, physical vapour deposition

Dataset: EcoSpold 2, unit process
Geography: CA-QC
Time period: 1997-01-01 to 2023-12-31
Technology level: current
Classification: EcoSpold01Categories: metals/refinement
Classification: ISIC rev.4 ecoinvent: 2592:Treatment and coating of metals; machining
Synonyms: TINOX
Tags: recontextualization
Scenario: Business-as-Usual
System model: Allocation, cut-off by classification
Generated by: Pascal Lesage
Published in: Althaus H.-J. 2000
Database: ecoinvent
isCopyrightProtected: true
accessRestrictedTo: 1

## General comment
Inventory for selective coatings of solar absorbers.
[This dataset was already contained in the ecoinvent database version 2. It was not individually updated during the transfer to ecoinvent version 3. Life Cycle Impact Assessment results may still have changed, as they are affected by changes in the supply chain, i.e. in other datasets. This dataset was generated following the ecoinvent quality guidelines for version 2. It may have been subject to central changes described in the ecoinvent version 3 change report (http://www.ecoinvent.org/database/ecoinvent-version-3/reports-of-changes/), and the results of the central updates were reviewed extensively. The changes added e.g. consistent water flows and other information throughout the database. The documentation of this dataset can be found in the ecoinvent reports of version 2, which are still available via the ecoinvent website. The change report linked above covers all central changes that were made during the conversion process.]
Child dataset exchanges identical to GLO dataset. Created to enable linking to regional markets (e.g. for electricity). Data quality indicators adjusted accordingly.

## Included activities start
The activity starts with the sheet entering the process. The material on which this activity is applied it is not included as input.

## Included activities end
Gate to gate inventory for the process including infrastructure, excluding process specific emissions. Not including eventual pre-treatment of copper sheets by supplier, packages, wastes.

## Geography
Production plant in DE.
Child dataset exchanges identical to GLO dataset. Created to enable linking to regional markets (e.g. for electricity). Data quality indicators adjusted accordingly.

## Technology
TINOX (titanium-nitrite-oxide) PVD process.

## Time period
Environmental report.

## Parameters
- Quebec gross domestic product 2011: 3.11e11 USD(2011); name quebecGDP2011; lognormal variance with pedigree 0.0006, pedigree (1,1,1,1,1)
  Quebec Gross domestic product for 2011, expressed in 2011 USD. Source: Institut de la statistique du Québec. Converted from CAD to USD using a yearly average exchange rate of 0.989 CAD/USD (Source: bank of Canada).
- fraction, process water, to air: 0.15 dimensionless; lognormal variance with pedigree 0.092025, pedigree (4,4,3,2,4)
- world gross domestic product 2011: 7e13 USD(2011); name worldGDP2011; lognormal variance with pedigree 0.0006, pedigree (1,1,1,1,1)
  World Gross domestic product for 2011, expressed in 2011 USD. Source: World Bank.

## Reference product
- selective coat, copper sheet, physical vapour deposition: 1 m2; By-product classification allocatable product; CPC 88731: Metal treatment and coating services
  production volume 2825.66 m2
    Gross approximation of Quebec production volume using relative value of Quebec GDP to world GDP
  property price 0.24986 EUR2005
    Calculated based on inputs: The price of the product has been calculated as a sum of the values of the material and energy inputs for this product. This value is therefore a rough estimation. It may underestimate the real price since there are additional expenses when producing any product. These expences can include for example labour costs, treatment of waste materials and profit for the producer. Please consider carefully whether this level of data quality is acceptable for your application.
  properties: carbon allocation 0 kg, carbon content 0

## Inputs from technosphere
- electricity, medium voltage: 1.2 kWh; lognormal variance with pedigree 0.0427, pedigree (2,2,5,5,1)
  Public information. Electricity use for the process.
  Uncertainty: P
- lubricating oil: 1.68e-5 kg; lognormal variance with pedigree 0.0427, pedigree (2,2,5,5,1)
  Public information.
  Uncertainty: P
  properties: carbon content, fossil 0.75, dry mass 1 kg, heating value, net 40.2 MJ, wet mass 1 kg
  note on carbon content, fossil: Lubricating oil is produced from diesel. C-content/dry mass of fats and oils considered 75%, from: ecoinvent v2.2 report, n 15a, pg 40
  note on heating value, net: Literature value, Source: IPCC 2006, 2006 IPCC Guidelines for National Greenhouse Gas Inventories, Prepared by the National Greenhouse Gas Inventories Programme, Eggleston H.S., Buendia L., Miwa K., Ngara T. and Tanabe K. (eds). Published: IGES, Japan
- metal coating facility: 3.33e-7 unit; lognormal variance with pedigree 0.63, pedigree (5,5,5,5,5)
  Estimation
  Uncertainty: E
- nitrogen, liquid: 0.00182 kg; lognormal variance with pedigree 0.138, pedigree (5,5,5,5,3)
  Estimation
  Uncertainty: E
  properties: dry mass 1 kg, wet mass 1 kg
- oxygen, liquid: 0.000909 kg; lognormal variance with pedigree 0.138, pedigree (5,5,5,5,3)
  Estimation
  Uncertainty: E
  properties: dry mass 1 kg, wet mass 1 kg
- silica sand: 0.00089 kg; lognormal variance with pedigree 0.0427, pedigree (2,2,5,5,1)
  Public information.
  Uncertainty: P
  properties: dry mass 0.99 kg, water content 0.010101, wet mass 1 kg
- titanium dioxide: 0.001 kg; lognormal variance with pedigree 0.0427, pedigree (2,2,5,5,1)
  Titanium nitrite oxide
  Uncertainty: T
  properties: dry mass 1 kg, wet mass 1 kg

## Inputs from nature
- Water, unspecified natural origin [natural resource, in water]: 0.007236 m3; source NREL - National Renewable Energy Laborat 2005; lognormal variance with pedigree 0.0546, pedigree (3,3,5,5,1)
  Calculated based on literature, (Vionnet, S., Quantis Water Database - Technical Report, 2012). The process starts when untreated surface enters the coating plant. It includes the processes: pre-treatment (cleaning) and coating itself. The source presents data on general "Automotive painting, electrocoating, per m2", without specification of what kind of surface is being coated and what kind of coat is used. It is assumed (expert opinion) that this data are more likely to be right then the original - ecoivent values.
  property carbon content, fossil 0.0104329; name C_content_fossil
  property carbon content, non-fossil 0; name C_content_non_fossil
  property dry mass 0.1101 kg; name DM
  property water content 9081.65; name water_content
  property water in wet mass 999.89 kg; name WWM
  property wet mass 1000 kg; name WM

## Emissions to nature
- Water [air, unspecified]: 0.0010854 m3; lognormal variance with pedigree 0.0827, pedigree (2,2,5,5,1)
  Calculated value based on literature values and expert opinion. See comments in the parametres" comment field.
- Water [water, unspecified]: 0.0061506 m3; lognormal variance with pedigree 0.0827, pedigree (2,2,5,5,1)
  (same comment as for Water)

## Sampling procedure
Publication.

## Extrapolations
GLO dataset extrapolated from German (DE) dataset, which in turn was used to create this child dataset. Exchanges identical to GLO dataset. Created to enable linking to regional markets (e.g. for electricity). Data quality indicators adjusted accordingly.
