# nitrotoluenes production, toluene nitration

Dataset: EcoSpold 2, unit process
Geography: RoW
Time period: 2003-01-01 to 2023-12-31
Technology level: current
Classification: ISIC rev.4 ecoinvent: 2011:Manufacture of basic chemicals
Synonyms: nitrotoluenes
Tags: combined production
Scenario: Business-as-Usual
System model: Allocation, cut-off by classification
Generated by: Iasonas Ioannou
Database: ecoinvent
isCopyrightProtected: true
accessRestrictedTo: 1

## General comment
This dataset represents the combined production of 1 kg of nitrotoluene isomers (0.584, 0.380, and 0.036 kg of o-, p-, and m-nitrotoluene, respectively), in a purified form, by the nitration of toluene.
Even though the nitration of toluene is similar to that of benzene, the methyl group on the aromatic ring increases the ease of oxidation, and thus, leading to lower selectivity due to the production of undesirable by-products (Kirk, 2004). Hence, the nitration takes place at lower temperatures compared to that of benzene, such that the rate of the oxidative side reactions is minimized, which reduces the formation of dinitrotoluenes. At the same time, the lower solubility of toluene, compared to benzene, requires vigorous agitation of the reaction mixture to increase the interfacial area between the two phases.
Reaction:
C7H8 + HNO3 → C6H4(CH3)NO2 + H2O
C7H8 + 2HNO3 → C6H3CH3(NO2)2 + 2H2O, (undesirable reaction, reduced rate due to control conditions)
p-Nitrotoluene (C7H7NO2; CAS 99-99-0, 4-nitrotoluene, PNT, 4-nitro-1-methylbenzene) forms colourless to light yellow rhombic – bipyramidal crystals, which are soluble in most organic solvents but only slightly soluble in water (0.044 % at 30 °C). p-Nitrotoluene derivatives are used principally as intermediates for colorants and related products; for example, p-toluidine, 4-nitrobenzoic acid (by oxidation of 4-nitrotoluene with 15 % HNO3 at 175 °C), 4-amino-2-chlorotoluene (by reduction of 2-chloro-4-nitrotoluene), and 4-nitrotoluene-2-sulfonic acid, which is of great importance in forming stilbene intermediates for fluorescent whitening agents.
In this dataset, the raw material inputs, and process-specific material exchanges, are modelled with a generic stoichiometry-based tool, using literature or estimated yields. The emissions are modelled with a default value, which is estimated based on losses, unreacted chemicals, among others. At the same time, the energy consumption is based on data from literature sources. Finally, the auxiliary (i.e., cooling water and infrastructure) exchanges are modelled with a default value based on industry data from literature sources. For more information on the calculations refer to the sampling procedure.
References:
Frischknecht R., Jungbluth N., Althaus H.-J., Doka G., Dones R., Heck T., Hellweg S., Hischier R., Nemecek T., Rebitzer G. and Spielmann M. (2007) Overview and Methodology. Final report ecoinvent v2.0 No. 1. Swiss Centre for Life Cycle Inventories, Dübendorf, CH, retrieved from: www.ecoinvent.org.
Kim 2003: Kim S., Overcash M.: Energy in chemical manufacturing processes: gate-to-gate information for life cycle assessment. In: Journal of Chemical Technology & Biotechnology vol. 78, no. 9: 995-1005(11). 2003
Gerald Booth: Nitro Compounds, Aromatic. Published online: 2003. In: Ullmann's Encyclopedia of Industrial Chemistry, Seventh Edition, 2004 Electronic Release (ed. Fiedler E., Grossmann G., Kersebohm D., Weiss G. and Witte C.). 7 th Electronic Release Edition. Wiley InterScience, New York, Online-Version under: DOI: 10.1002/14356007.a17_411
Kirk, Raymond E., Donald F. Othmer, and Charles A. Mann. "Encyclopedia of Chemical Technology." 2004.

## Included activities start
The activity starts when the raw materials enter the process.

## Included activities end
The activity ends with pure nitrotoluene isomers being ready for further transformation or transportation at the production site gate. Materials entering the process are included as well as energy uses, infrastructure and emissions.

## Geography
The inventory is modelled at the Global level. The main material inputs and outputs of this activity are generated with on a generic stoichiometry-based model, using literature or estimated yields. Furthermore, the source of information for the heat and electricity inputs is literature data for the specific technology. Finally, the main source of information for the values for water (process and cooling), nitrogen, chemical factory is industry data from the GENDORF Chemical Park, which is based in Germany and produced an average of 2462760 tonnes of chemical substances in the years 2015-2019. For more information on the calculations refer to the sampling procedure.
The dataset could also be considered as not geography-specific, and thus, valid for a broader geographical coverage.
References:
Hischier, R. (2005) Establishing Life Cycle Inventories of Chemicals Based on Differing Data Availability (9 pp). The International Journal of Life Cycle Assessment, Volume 10, Issue 1, pp 59-67. 10.1065/lca2004.10.181.7
Chemiepark GENDORF, Umwelterklärung 2016, https://www.gendorf.de/Nachbarn/Umweltschutz/Industrie%20und%20Nachhaltigkeit
Chemiepark GENDORF, Umwelterklärung 2017, https://www.gendorf.de/Nachbarn/Umweltschutz/Industrie%20und%20Nachhaltigkeit
Chemiepark GENDORF, Umwelterklärung 2020, https://www.gendorf.de/Nachbarn/Umweltschutz/Industrie%20und%20Nachhaltigkeit
Kim, Seungdo, and Michael Overcash "Energy in chemical manufacturing processes: gate‐to‐gate information for life cycle assessment." Journal of Chemical Technology & Biotechnology: International Research in Process, Environmental & Clean Technology 78.9 (2003): 995-1005.

## Technology
The nitration of toluene could take place either in a batch or continues mode. In the batch mode, the toluene is fed at around 25°C into the reactor, where the nitric acid is added slowly while the mixture temperature is maintained to 25°C, through cooling, until the entire amount of acid is introduced. Subsequently, the temperature is raised slowly to 35-40°C, at which the nitration takes place while the rate of the oxidative side reactions is minimized. The reaction has a yield of around 96%, obtaining a mixture of mononitrotoluenes. The product mixture is separated, and the spend acid is reconcentrated, while the crude product is washed with dilute caustic and water. The resulting product comprise of mononitrotoluenes mixture of 55-60% wt. o-nitrotoluene, 3-4% wt. m-nitrotoluene, and 35-40% p-nitrotoluene and the separation of the isomers is achieved via combining fractional distillation and crystallization (Kirk, 2004).
Reaction:
C7H8 + HNO3 → C6H4(CH3)NO2 + H2O
C7H8 + 2HNO3 → C6H3CH3(NO2)2 + 2H2O, (undesirable reaction, reduced rate due to control conditions)
In this dataset, a yield of 95% was assumed, where 1 kg of nitrotoluene isomers 0.584, 0.380, and 0.036 kg of o-, p-, and m-nitrotoluene, respectively, in a purified form
References:
Kirk, Raymond E., Donald F. Othmer, and Charles A. Mann. "Encyclopedia of Chemical Technology." 2004.

## Time period
The time period spans from the earliest year from which at least one of the input values was obtained until 2022, but overall form the most realistic picture of the production. Besides, the activity is partly generated, in terms of material inputs and outputs, based on a generic stoichiometry-based model, using literature or estimated yields, which does not expect to change over time.
The source of information for the heat and electricity inputs is literature data (from 2003) for the specific technology. Finally, the main source of information for the values for water (process and cooling), nitrogen, chemical factory is industry data from the GENDORF Chemical Park. The values are a 5-year average of data from 2015 to 2019 published by the GENDORF Chemical Park, which is based in Germany and produced an average of 2462760 tonnes of chemical substances in the years 2015-2019. The end time period is therefore set based on the years from Gendorf reference.
For more information on the calculations refer to the sampling procedure and in the comments of the exchanges.
References:
Hischier, R. (2005) Establishing Life Cycle Inventories of Chemicals Based on Differing Data Availability (9 pp). The International Journal of Life Cycle Assessment, Volume 10, Issue 1, pp 59-67. 10.1065/lca2004.10.181.7
Chemiepark GENDORF, Umwelterklärung 2016, https://www.gendorf.de/Nachbarn/Umweltschutz/Industrie%20und%20Nachhaltigkeit
Chemiepark GENDORF, Umwelterklärung 2017, https://www.gendorf.de/Nachbarn/Umweltschutz/Industrie%20und%20Nachhaltigkeit
Chemiepark GENDORF, Umwelterklärung 2020, https://www.gendorf.de/Nachbarn/Umweltschutz/Industrie%20und%20Nachhaltigkeit
Kim, Seungdo, and Michael Overcash "Energy in chemical manufacturing processes: gate‐to‐gate information for life cycle assessment." Journal of Chemical Technology & Biotechnology: International Research in Process, Environmental & Clean Technology 78.9 (2003): 995-1005.

## Parameters
- annual production: 2.21e8 kg; name PV_GLO
  The 1984 capacity for mononitrotoluene (all isomers) production in the Western world was ca. 200 000 t/a, as per Booth, G. (1991).
  At the same time, Dugal (2005) reports an annual US demand for the mononitrotoluene isomers with the following contribution: 62.0, 35.0, and 3.0% for the ortho-, para-, and meta-isomer, respectively. Notably, the latter values are extremely close to the yields obtained from the nitration, and thus, one may conclude that they are directly correlated.
  Finally, in SIDS Initial Assessment Report For SIAM 17 (2003), the global production volume of p-nitrotoluene was reported to amount 77,200 t/a in 2000. A country specific breakdown was reported, as follows: Western Europe 30,000 t/y, China 26,000 t/y, US 9,000 t/y, Eastern Europe 5,000 t/y, India 4,000 t/a, and South Korea 3,200 t/y.
  Please note that if one re-scale the 77,200 t of p-nitrotoluene, with the 35.0% share mentioned above, could obtain the production volume for all isomers. The obtained value (220,571 t) is close to the production volume reported for 1984, and thus, the capacity increased only marginally within these 18 years period.
  All of the above were used in order to calculate the regional production volume. For more information, see mathematical relation.
  References:
  Booth, G. (1991) Nitro compounds, aromatic. In: Elvers, B., Hawkins, S. & Schulz, G., eds, Ulimann7 s Encyclopedia of Industrial Chemistry, 5th rev. Ed., Vol. A17, New York, VCH Publishers, pp. 411-455.
  Dugal, M. (2005). Nitrobenzene and Nitrotoluenes. In Kirk-Othmer Encyclopedia of Chemical Technology, (Ed.). https://doi.org/10.1002/0471238961.1409201801041109.a01.pub2
  SIDS Initial Assessment Report For SIAM 17 (2003), 4-Nitrotoluene CAS N°: 99-99-0 (Srour R (2002). Mononitrotoluenes and Derivatives. Chapter A. VII.I and A. VII.PNT, Paris.).
  https://hpvchemicals.oecd.org/UI/handler.axd?id=4cdf8442-3ecb-44b8-8d66-411f4a3ce13c
- check_balance: -1.11022e-16 dimensionless; = meta + ortho + para - 1.0
  Check if the yield of meta-, ortho-, and para- is equal to 1.
- nitration_yield_meta: 0.035533 dimensionless; name meta
  According Kirk (2003), the combied production output comprise of mononitrotoluenes mixture of 55-60% wt. o-nitrotoluene, 3-4% wt m-nitrotoluene, and 35-40% p-nitrotoluene. Similar values are reported in Booth (1991).
  References:
  Kirk, Raymond E., Donald F. Othmer, and Charles A. Mann. "Encyclopedia of Chemical Technology." 2004.
  Booth, G. (1991) Nitro compounds, aromatic. In: Elvers, B., Hawkins, S. & Schulz, G., eds, Ulimann7 s Encyclopedia of Industrial Chemistry, 5th rev. Ed., Vol. A17, New York, VCH Publishers, pp. 411-455.
- nitration_yield_ortho: 0.583756 dimensionless; name ortho
  (same comment as for nitration_yield_meta)
- nitration_yield_para: 0.380711 dimensionless; name para
  (same comment as for nitration_yield_meta)

## Reference product
- p-nitrotoluene: 1 kg; name RP_para; = para; By-product classification allocatable product; CPC 34150: Amine-function compounds; oxygen-function amino-compounds, except lysine and its esters and salts thereof and […]; HS2017 292142: Amine-function-compounds; aromatic monoamines and their derivatives, aniline derivatives and their salts; CAS 99-99-0
  (same comment as for nitration_yield_meta)
  production volume 3.48755e6 kg; name RP_para_PV; = PV_GLO*para
    The 1984 capacity for mononitrotoluene (all isomers) production in the Western world was ca. 200 000 t/a, as per Booth, G. (1991).
    At the same time, Dugal (2005) reports an annual US demand for the mononitrotoluene isomers with the following contribution: 62.0, 35.0, and 3.0% for the ortho-, para-, and meta-isomer, respectively. Notably, the latter values are extreamly close to the yields obtained from the nitration, and thus, one may conclude that they are directly correlated.
    Finally, in SIDS Initial Assessment Report For SIAM 17 (2003), the global production volume of p-nitrotoluene was reported to amount 77,200 t/a in 2000. A country specific breakdown was reported, as follows: Western Europe 30,000 t/y, China 26,000 t/y, US 9,000 t/y, Eastern Europe 5,000 t/y, India 4,000 t/a, and South Korea 3,200 t/y.
    Please note that if one re-scales the 77,200 t of p-nitrotoluene, with the 35.0% share mentioned above, could obtain the production volume for all isomers. The obtained value (220,571 t) is close to the production volume reported for 1984, and thus, the capacity increased only marginally within these 18 years period.
    All of the above were used in order to calculate the regional production volume. For more information, see mathematical relation.
    References:
    Booth, G. (1991) Nitro compounds, aromatic. In: Elvers, B., Hawkins, S. & Schulz, G., eds, Ulimann7 s Encyclopedia of Industrial Chemistry, 5th rev. Ed., Vol. A17, New York, VCH Publishers, pp. 411-455.
    Dugal, M. (2005). Nitrobenzene and Nitrotoluenes. In Kirk-Othmer Encyclopedia of Chemical Technology, (Ed.). https://doi.org/10.1002/0471238961.1409201801041109.a01.pub2
    SIDS Initial Assessment Report For SIAM 17 (2003), 4-Nitrotoluene CAS N°: 99-99-0 (Srour R (2002). Mononitrotoluenes and Derivatives. Chapter A. VII.I and A. VII.PNT, Paris.).
    https://hpvchemicals.oecd.org/UI/handler.axd?id=4cdf8442-3ecb-44b8-8d66-411f4a3ce13c
  property carbon content, fossil 0.613083
    Calculated based on molecular structure. See tab "chemicals".
  property heating value, net 24.76 MJ
    LHV is calculated based on the elemental composition of the substance. Based on the name of the substance, the chemical formula of the substance is manually found to be: C7H7NO2.
  property price 3.31386 EUR2005
    The prices of o-, m-, and p-nitrotoluene in bulk fob are $1.15/kg, $2.54/kg, and $3.64/kg, respectively. 1 USD in 1993 amounted for 0.9104 EURO.
    Dugal, M. (2005). Nitrobenzene and Nitrotoluenes. In Kirk-Othmer Encyclopedia of Chemical Technology, (Ed.). https://doi.org/10.1002/0471238961.1409201801041109.a01.pub2
  properties: carbon allocation 0.613083 kg, carbon content 0.613083, carbon content, non-fossil 0, dry mass 1 kg, water content 0, water in wet mass 0 kg, wet mass 1 kg

## Inputs from technosphere
- chemical factory, organics: 4e-10 unit; = 4e-10*(IF(RP_para;para) + IF(RP_meta;meta) + IF(RP_ortho;ortho) ); lognormal variance with pedigree 0.3448, pedigree (2,4,2,5,4)
  Calculated based on literature data published by the industry. For this activity, no information was readily available concerning infrastructure and land-use. Therefore, the infrastructure is estimated based on data from two chemical factories, the BASF site of Ludwigshafen and the chemical factory in Gendorf (which are both located in Germany), which produce a wide range of chemical substances. Based on this data, the following assumptions are made: the built area amounts to about 4.2 ha, the plant has an average output of 50'000 t/a and a lifespan of fifty years. The estimated infrastructure amount is therefore 4.00 E-10 units per kg of produced chemical. References: Althaus H.-J., Chudacoff M., Hischier R., Jungbluth N., Osses M. and Primas A. (2007) Life Cycle Inventories of Chemicals. ecoinvent report No. 8, v2.0. EMPA Dübendorf, Swiss Centre for Life Cycle Inventories, Dübendorf, CH. Gendorf (2000) Umwelterklärung 2000, Werk Gendorf. Werk Gendorf, Burgkirchen.
  Uncertainty: Estimation
- electricity, medium voltage: 7.44197e-5, 6.61902e-6, 0.000577107, 0.000756242, 0.000800864, 0.00040792, 5.634e-5, 0.00035659, 1.50526e-5, 0.00240999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 kWh (44 suppliers, which the file names only by identifier); sum of these 0.024583 kWh; = 0.024583*(IF(RP_para;para) + IF(RP_meta;meta) + IF(RP_ortho;ortho) ); lognormal variance with pedigree 0.0046, pedigree (2,3,2,5,2)
  Value reported by Kim, Seungdo, and Michael Overcash "Energy in chemical manufacturing processes: gate‐to‐gate information for life cycle assessment." Journal of Chemical Technology & Biotechnology: International Research in Process, Environmental & Clean Technology 78.9 (2003): 995-1005.
- heat, from steam, in chemical industry: 8.43 MJ; = 8.43*(IF(RP_para;para) + IF(RP_meta;meta) + IF(RP_ortho;ortho) ); lognormal variance with pedigree 0.0046, pedigree (2,3,2,5,2)
  Value reported by Kim, Seungdo, and Michael Overcash "Energy in chemical manufacturing processes: gate‐to‐gate information for life cycle assessment." Journal of Chemical Technology & Biotechnology: International Research in Process, Environmental & Clean Technology 78.9 (2003): 995-1005. Please note that Kim, Seungdo, and Michael Overcash reported the potential energy recovery of 2.00 MJ per kg of p-nitrotoluene produced.
  properties: heating value, net 1 MJ
- nitric acid, without water, in 50% solution state: 0.0391397, 0.144622, 0.0579402, 0.0581555, 0.188076 kg (5 suppliers, which the file names only by identifier); sum of these 0.487934 kg; = 0.487933717*(IF(RP_para;para) + IF(RP_meta;meta) + IF(RP_ortho;ortho) ); lognormal variance with pedigree 0.0046, pedigree (2,3,2,5,2)
  Calculated value based on stoichiometric calculations and literature data. For more information on the calculations refer to the sampling procedure.
  properties: dry mass 1 kg, wet mass 1 kg
- sodium hydroxide, without water, in 50% solution state: 0.012165 kg; = 0.012165*(IF(RP_para;para) + IF(RP_meta;meta) + IF(RP_ortho;ortho) ); lognormal variance with pedigree 0.0046, pedigree (2,3,2,5,2)
  (same comment as for nitric acid, without water, in 50% solution state)
  properties: dry mass 1 kg, heating value, net 3.03 MJ, wet mass 1 kg
- toluene, liquid: 0.71078 kg; = 0.71077955*(IF(RP_para;para) + IF(RP_meta;meta) + IF(RP_ortho;ortho) ); lognormal variance with pedigree 0.0046, pedigree (2,3,2,5,2)
  (same comment as for nitric acid, without water, in 50% solution state)
  properties: carbon content, fossil 0.913043, dry mass 1 kg, heating value, net 38.17 MJ, wet mass 1 kg
- wastewater, average: -0.000130897, -4.66043e-7 m3 (2 suppliers, which the file names only by identifier); sum of these -0.000131363 m3; = 0.000131363*(IF(RP_para;para) + IF(RP_meta;meta) + IF(RP_ortho;ortho) ); lognormal variance with pedigree 0.0044, pedigree (2,3,1,5,2)
  (same comment as for nitric acid, without water, in 50% solution state)
  production volume; = RP_para_PV * (WW / RP_para)
    Calculated from production volume of reference product using the relative outputs.
  properties: carbon content, non-fossil 0.194039, dry mass 0.346837 kg, mass concentration, TOC 0.1091 kg/m3, mass concentration, calcium 0.039453 kg/m3, mass concentration, chlorine 0.030031 kg/m3, mass concentration, hydrogen 0.013365 kg/m3, mass concentration, nitrogen 0.031015 kg/m3, mass concentration, oxygen 0.069824 kg/m3, mass concentration, sodium 0.06456 kg/m3, mass concentration, sulfur 0.015602 kg/m3, water content 2882.2, wet mass 1000 kg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
  note on carbon content, non-fossil: 0.0673 kg TOC/m3 (Tab A.17, ecoinvent v2.2 report 13_I). TOC was considered as Total Carbon.

## Inputs from nature
- Water, cooling, unspecified natural origin [natural resource, in water]: 0.014707 m3; = 0.01470699*(IF(RP_para;para) + IF(RP_meta;meta) + IF(RP_ortho;ortho) ); lognormal variance with pedigree 0.0454, pedigree (2,4,2,5,4)
  Calculated based on literature data published by the GENDORF Chemical Park. The factory produced an average of 2462760 tonnes of chemical substances (including intermediates) per year in the years 2015-2019. The average amount of cooling water released in the years 2015-2019 was 34408800 t per year. It was assumed that 5% of the cooling water was emitted to air during its use, therefore, to calculate the input of cooling water, the output value reported by GENDORF was scaled up by the factor 1/0.95. This equals 0.014707 m3/kg chemical produced. References: Chemiepark GENDORF, Umwelterklärung 2016, https://www.gendorf.de/Nachbarn/Umweltschutz/Industrie%20und%20Nachhaltigkeit Chemiepark GENDORF, Umwelterklärung 2017, https://www.gendorf.de/Nachbarn/Umweltschutz/Industrie%20und%20Nachhaltigkeit Chemiepark GENDORF, Umwelterklärung 2020, https://www.gendorf.de/Nachbarn/Umweltschutz/Industrie%20und%20Nachhaltigkeit
- Water, river [natural resource, in water]: 0.00096543 m3; = 0.00096543*(IF(RP_para;para) + IF(RP_meta;meta) + IF(RP_ortho;ortho) ); lognormal variance with pedigree 0.0454, pedigree (2,4,2,5,4)
  Calculated based on literature data published by the GENDORF Chemical Park. The factory produced an average of 2462760 tonnes of chemical substances (including intermediates) per year in the years 2015-2019. The average consumption of river water in the years 2015-2019 was 22000820 t per year. However, since the cooling water is modelled as an input, the amount of river water was adjusted to avoid double counting. 55% of the input amount of cooling water was deducted from the amount of river water, as that is the share of river water versus well water. This equals 0.00096543 m3/kg chemical produced. References: Chemiepark GENDORF, Umwelterklärung 2016, https://www.gendorf.de/Nachbarn/Umweltschutz/Industrie%20und%20Nachhaltigkeit Chemiepark GENDORF, Umwelterklärung 2017, https://www.gendorf.de/Nachbarn/Umweltschutz/Industrie%20und%20Nachhaltigkeit Chemiepark GENDORF, Umwelterklärung 2020, https://www.gendorf.de/Nachbarn/Umweltschutz/Industrie%20und%20Nachhaltigkeit
- Water, well, in ground [natural resource, in water]: 0.00081652 m3; = 0.00081652*(IF(RP_para;para) + IF(RP_meta;meta) + IF(RP_ortho;ortho) ); lognormal variance with pedigree 0.0454, pedigree (2,4,2,5,4)
  Calculated based on literature data published by the GENDORF Chemical Park. The factory produced an average of 2462760 tonnes of chemical substances (including intermediates) per year in the years 2015-2019. The average consumption of well water in the years 2015-2019 was 18607480 t per year. However, since the cooling water is modelled as an input, the amount of well water was adjusted to avoid double counting. 45% of the input amount of cooling water was deducted from the amount of well water, as that is the share of well water versus river water. This equals 0.00081652 m3/kg chemical produced. References: Chemiepark GENDORF, Umwelterklärung 2016, https://www.gendorf.de/Nachbarn/Umweltschutz/Industrie%20und%20Nachhaltigkeit Chemiepark GENDORF, Umwelterklärung 2017, https://www.gendorf.de/Nachbarn/Umweltschutz/Industrie%20und%20Nachhaltigkeit Chemiepark GENDORF, Umwelterklärung 2020, https://www.gendorf.de/Nachbarn/Umweltschutz/Industrie%20und%20Nachhaltigkeit

## Emissions to nature
- Carbon dioxide, fossil [air, urban air close to ground]: 0.123553 kg; = 0.123552613*(IF(RP_para;para) + IF(RP_meta;meta) + IF(RP_ortho;ortho) ); lognormal variance with pedigree 0.0046, pedigree (2,3,2,5,2)
  Calculated losses, based on the boiling point of a chemical, to water or to air. In addition, unreacted chemicals are assumed to go to wastewater treatment, which has a conversion rate in biological treatment of 95% of carbon into carbon dioxide. The remaining 5% are released as emissions to water.
  Uncertainty: Estimation
- Nitric acid [air, unspecified]: 0.00184718 kg; = 0.001847178*(IF(RP_para;para) + IF(RP_meta;meta) + IF(RP_ortho;ortho) ); lognormal variance with pedigree 0.006, pedigree (3,3,2,5,2)
  Calculated losses, based on the boiling point of a chemical, to water or to air. In addition, unreacted chemicals are assumed to go to wastewater treatment, which has a conversion rate in biological treatment of 95% of carbon into carbon dioxide. The remaining 5% are released as emissions to water.
- Water [air, unspecified]: 0.00147008 m3; = 0.00147008*(IF(RP_para;para) + IF(RP_meta;meta) + IF(RP_ortho;ortho) ); lognormal variance with pedigree 0.0848, pedigree (2,4,2,5,4)
  Calculated based on literature data published by the GENDORF Chemical Park. The factory produced an average of 2462760 tonnes of chemical substances (including intermediates) per year in the years 2015-2019. To determine the emissions of water to air, the difference of all water inputs (from river, well, tap water and cooling) and outputs (wastewater, emissions to water) was calculated. The average ouput of water to air in the years 2015-2019 was 3620444 m3 per year. This equals 0.00147 m3/kg chemical produced. For more information on the other water exchanges please consult the respective exchange comment. References: Chemiepark GENDORF, Umwelterklärung 2016, https://www.gendorf.de/Nachbarn/Umweltschutz/Industrie%20und%20Nachhaltigkeit Chemiepark GENDORF, Umwelterklärung 2017, https://www.gendorf.de/Nachbarn/Umweltschutz/Industrie%20und%20Nachhaltigkeit Chemiepark GENDORF, Umwelterklärung 2020, https://www.gendorf.de/Nachbarn/Umweltschutz/Industrie%20und%20Nachhaltigkeit
  property fraction, origin: fresh water 0; name fraction_origin_fresh_water
  property fraction, origin: salt water 0; name fraction_origin_salt_water
  property fraction, origin: unspecified 1; name fraction_origin_unspecified
- BOD5, Biological Oxygen Demand [water, surface water]: 0.00621886 kg; = 0.006218855*(IF(RP_para;para) + IF(RP_meta;meta) + IF(RP_ortho;ortho) ); lognormal variance with pedigree 0.218, pedigree (4,5,5,5,5)
  Calculated value. The BOD, COD, TOC and BOD5 are calculated based on the amount and type of emissions released to water in the same activity.
  Uncertainty: Estimation
- COD, Chemical Oxygen Demand [water, surface water]: 0.00621886 kg; = 0.006218855*(IF(RP_para;para) + IF(RP_meta;meta) + IF(RP_ortho;ortho) ); lognormal variance with pedigree 0.218, pedigree (4,5,5,5,5)
  (same comment as for BOD5, Biological Oxygen Demand)
- DOC, Dissolved Organic Carbon [water, surface water]: 0.00177309 kg; = 0.001773088*(IF(RP_para;para) + IF(RP_meta;meta) + IF(RP_ortho;ortho) ); lognormal variance with pedigree 0.218, pedigree (4,5,5,5,5)
  (same comment as for BOD5, Biological Oxygen Demand)
- Nitrate [water, unspecified]: 0.00119593 kg; = 0.001195927*(IF(RP_para;para) + IF(RP_meta;meta) + IF(RP_ortho;ortho) ); lognormal variance with pedigree 0.006, pedigree (3,3,2,5,2)
  (same comment as for Nitric acid)
- TOC, Total Organic Carbon [water, surface water]: 0.00177309 kg; = 0.001773088*(IF(RP_para;para) + IF(RP_meta;meta) + IF(RP_ortho;ortho) ); lognormal variance with pedigree 0.218, pedigree (4,5,5,5,5)
  (same comment as for BOD5, Biological Oxygen Demand)
- Toluene [water, unspecified]: 0.00177695 kg; = 0.001776949*(IF(RP_para;para) + IF(RP_meta;meta) + IF(RP_ortho;ortho) ); lognormal variance with pedigree 0.006, pedigree (3,3,2,5,2)
  (same comment as for Nitric acid)
- Water [water, unspecified]: 0.0150391 m3; = 0.01503906*(IF(RP_para;para) + IF(RP_meta;meta) + IF(RP_ortho;ortho) ); lognormal variance with pedigree 0.0848, pedigree (2,4,2,5,4)
  Calculated based on literature data published by the GENDORF Chemical Park. The factory produced an average of 2462760 tonnes of chemical substances (including intermediates) per year in the years 2015-2019. The amount of water released back to the environment consists of the sum of the amount of process water treated in the internal WWTP that is then released back to the environment and the amount of cooling water released back to the environment. The average ouput of the internal WWTP in the years 2015-2019 was 2628800 m3 and that of cooling water released back to the environment was 34408800 m3. This gives a yearly average of 37037600 m3 emissions of water to water. This equals 0.01504 m3/kg chemical produced. References: Chemiepark GENDORF, Umwelterklärung 2016, https://www.gendorf.de/Nachbarn/Umweltschutz/Industrie%20und%20Nachhaltigkeit Chemiepark GENDORF, Umwelterklärung 2017, https://www.gendorf.de/Nachbarn/Umweltschutz/Industrie%20und%20Nachhaltigkeit Chemiepark GENDORF, Umwelterklärung 2020, https://www.gendorf.de/Nachbarn/Umweltschutz/Industrie%20und%20Nachhaltigkeit
  property fraction, origin: fresh water 0; name fraction_origin_fresh_water_Ww
  property fraction, origin: salt water 0; name fraction_origin_salt_water_Ww
  property fraction, origin: unspecified 1; name fraction_origin_unspecified_Ww
- m-Nitrotoluene [water, unspecified]: 8.88325e-6 kg; = 8.88324875E-06*(IF(RP_para;para) + IF(RP_meta;meta) + IF(RP_ortho;ortho) ); lognormal variance with pedigree 0.006, pedigree (3,3,2,5,2)
  (same comment as for Nitric acid)
- o-Nitrotoluene [water, unspecified]: 0.000145939 kg; = 0.00014593908625*(IF(RP_para;para) + IF(RP_meta;meta) + IF(RP_ortho;ortho) ); lognormal variance with pedigree 0.006, pedigree (3,3,2,5,2)
  (same comment as for Nitric acid)
- p-Nitrotoluene [water, unspecified]: 9.51777e-5 kg; = 9.5177665E-05*(IF(RP_para;para) + IF(RP_meta;meta) + IF(RP_ortho;ortho) ); lognormal variance with pedigree 0.006, pedigree (3,3,2,5,2)
  (same comment as for Nitric acid)

## Sampling procedure
Literature data and stoichiometric calculation. This inventory is partially based on a generic model of the production of chemicals. The data generated by this model have been improved with compound-specific data when available. The model of the production of chemicals is using specific industry or literature data wherever possible and more generic data on chemical production processes to fill compound-specific data gaps when necessary. The basic principles of the model have been published in literature (Hischier, 2005). The model has been updated and extended with newly available data from the chemical industry. In the model, unreacted fractions are treated in a waste treatment process, and emissions reported are after a waste treatment process that is included in the scope of this dataset. For volatile reactants, a small level of evaporation is assumed. Solvents and catalysts are mostly recycled in closed-loop systems within the scope of the dataset and reported flows are for losses from this system.
The source of information for the heat and electricity inputs is literature data (from 2003) for the specific technology. Finally, the main source of information for the values for water (process and cooling), nitrogen, and chemical factory is industry data from the GENDORF Chemical Park. The values are a 5-year average of data from 2015 to 2019 published by the GENDORF Chemical Park, which is based in Germany and produced an average of 2462760 tonnes of chemical substances in the years 2015-2019. For more information refer to the comments of the exchanges.

References:
Hischier, R. (2005) Establishing Life Cycle Inventories of Chemicals Based on Differing Data Availability (9 pp). The International Journal of Life Cycle Assessment, Volume 10, Issue 1, pp 59-67. 10.1065/lca2004.10.181.7
Chemiepark GENDORF, Umwelterklärung 2016, https://www.gendorf.de/Nachbarn/Umweltschutz/Industrie%20und%20Nachhaltigkeit
Chemiepark GENDORF, Umwelterklärung 2017, https://www.gendorf.de/Nachbarn/Umweltschutz/Industrie%20und%20Nachhaltigkeit
Chemiepark GENDORF, Umwelterklärung 2020, https://www.gendorf.de/Nachbarn/Umweltschutz/Industrie%20und%20Nachhaltigkeit
Kim, Seungdo, and Michael Overcash "Energy in chemical manufacturing processes: gate‐to‐gate information for life cycle assessment." Journal of Chemical Technology & Biotechnology: International Research in Process, Environmental & Clean Technology 78.9 (2003): 995-1005.

## Extrapolations
This dataset has been copied from an original dataset covering the geography RER. The uncertainty has been adjusted accordingly.
