# water works construction, capacity 1.1E10l/year, ultrafiltration treatment

Dataset: EcoSpold 2, unit process
Geography: RoW
Time period: 2009-01-01 to 2023-12-31
Technology level: current
Classification: EcoSpold01Categories: water supply/production
Classification: ISIC rev.4 ecoinvent: 4220:Construction of utility projects
Scenario: Business-as-Usual
System model: Allocation, cut-off by classification
Generated by: Marylène Dussault
Database: ecoinvent
isCopyrightProtected: true
accessRestrictedTo: 1

## General comment
This dataset represents the construction of a medium-sized potable water ultrafiltration treatment plant 30 000m3/d with a lifetime of 60 years. Ultrafiltration treatment includes prefiltration, ultrafiltration and disinfection. Ultrafiltration plant is assumed to have similar infrastructure requirements as nanofiltration plant. This dataset is extrapolated from a small nanofiltration treatment plant in Lebel-sur-Quévillon, Québec (CA): average flow of 2000 m3/d and is assumed to have a 60 years lifetime. Inventory is extrapolated to a medium-size plant based on cost curve. Lifetime is assumed to be 13 years for mechanical equipment (e.g. pumps), 30 years for chemical tanks and 60 years for structural components. Note that a major source of uncertainty in this dataset is the use of cost scaling factors outside their reported range of validity: the cost scaling factors are reported to be valid for capacities of 3785 m3/d to 378540 m3/d, and the actual plant that served as basis for this dataset is has an average flow of 1500 m3/d. This uncertainty is accounted for through the “Further technological correlation” data quality indicator.

## Included activities start
From reception of raw materials and construction equipment. This dataset includes material inputs for equipment of the different water treatment stages: intake pumping, prefiltration, ultrafiltration and chlorination. A potable water reserve build underground (roof of the reserve is the floor of the water plant) is included in the inventory. Metal forming activities and associated losses were excluded. It also excludes the materials for membrane modules as they are considered consumables (having a shorter lifetime and depending on configuration and raw water quality) and are included in the operation of ultrafiltration treatment datasets. However, pressure vessels for membranes are included in this dataset. Energy and equipment needed for construction are excluded due to lack of data.

## Included activities end
This datasets ends with the dismantlement of the plant at the end of its useful life, expected to be 60 years. Input material end-of-life is included, but equipment and energy used for dismantling is excluded due to lack of data.

## Geography
Extrapolated from data from a single plant in Quebec (Canada).

## Technology
Municipal water treatment by ultrafiltration membrane.

## Time period
Time of publication.

## Parameters
- factor A_aluminium: 1210 kg/(m3/d)^2; name A_Al; lognormal variance with pedigree 0.0468, pedigree (3,4,2,5,4)
  Calculated value for constant A in scaling equation Y=A*Q^-B, where Y and Q are respectively the mass of material per unit flow and flow rate and B is a scaling factor to account for economies of scale Calculations based on contruction inventory extrapolated from ecoinvent 2.2 Tap water process, Lebel-sur-Quévillon treatment plant average flow rate and cost scaling factor B (Kawamura, 2008). Note that the calculation of the constant is uncertain as the B value is used outside its reported range of validity (see general comment).
- factor A_concrete: 15.1 m3/(m3/d)^2; name A_concrete; lognormal variance with pedigree 0.0468, pedigree (3,4,2,5,4)
  (same comment as for factor A_aluminium)
- factor A_copper: 603 kg/(m3/d)^2; name A_Cu; lognormal variance with pedigree 0.0468, pedigree (3,4,2,5,4)
  (same comment as for factor A_aluminium)
- factor A_fibre glass: 1930 kg/(m3/d)^2; name A_fglass; lognormal variance with pedigree 0.0468, pedigree (3,4,2,5,4)
  (same comment as for factor A_aluminium)
- factor A_landuse: 6.386 m2/(m3/d)^2; name A_landuse; lognormal variance with pedigree 0.0132, pedigree (4,4,1,5,2)
  Calculated value for constant A in scaling equation Y=A*Q^-B. Based on regression of measurements of surface area Y occupied by 4 Quebec water treatment plants of different technologies in Quebec, each associated with its own daily flow rate Q. R^2 of regression based on this sample was 0.6248.
- factor A_polyurethane: 121 kg/(m3/d)^2; name A_polyurethane; lognormal variance with pedigree 0.0468, pedigree (3,4,2,5,4)
  (same comment as for factor A_aluminium)
- factor A_pvc: 965 kg/(m3/d)^2; name A_pvc; lognormal variance with pedigree 0.0468, pedigree (3,4,2,5,4)
  (same comment as for factor A_aluminium)
- factor A_reinforcing steel: 5430 kg/(m3/d)^2; name A_reinfSteel; lognormal variance with pedigree 0.0468, pedigree (3,4,2,5,4)
  (same comment as for factor A_aluminium)
- factor A_steel: 4460 kg/(m3/d)^2; name A_steel; lognormal variance with pedigree 0.0468, pedigree (3,4,2,5,4)
  (same comment as for factor A_aluminium)
- factorA_fg_reinfplast: 844 kg/(m3/d)^2; name A_fg_reinfp; lognormal variance with pedigree 0.0468, pedigree (3,4,2,5,4)
  (same comment as for factor A_aluminium)
- factorA_pvdc: 3010 kg/(m3/d)^2; name A_pvdc; lognormal variance with pedigree 0.0468, pedigree (3,4,2,5,4)
  (same comment as for factor A_aluminium)
- plant average daily flow rate: 30000 m3/d; name Q_av
  Assumed average size plant to be 30000 m3/d. Can be adapted to extrapolate construction inventory for different plant sizes ranging from 3785 m3/d to 378540 m3/d (representativity of used cost curves). To adapt the entire dataset to a different plant size change this parameter to the average flow rate of the waterworks you wish to model. Than change the amount called for this flow in the "tap water" dataset based on new plant lifetime production.
- scaling factor: 0.8302 dimensionless; name B; lognormal variance with pedigree 0.0468, pedigree (3,4,2,5,4)
  Literature value. Cost-based scaling factor, usually used to account for economies of scale, as reported in Kawamura (2008). Note that the factor is reported to be valid for a capacity range of 3785 m3/d to 378540 m3/d.
  Kawamura, S., McGivney, W. T. 2008. Cost Estimating Manual for Water Treatment Facilities, Willey, 224p.
- scaling factor B_landuse: 0.289 dimensionless; name B_landuse; lognormal variance with pedigree 0.0452, pedigree (5,4,1,5,2)
  Calculated value for constant B in scaling equation Y=A*Q^-B. Estimated scaling factor based on regression of measurements of surface area Y occupied by 4 Quebec water treatment plants, each associated with its own daily flow rate Q. R^2 of regression based on this sample was 0.625.

## Reference product
- water works, capacity 1.1E10l/year: 1 unit; name waterworks; By-product classification allocatable product; CPC 53253: Sewage and water treatment plants
  EcoSpold01Location=CH
  production volume 21.1012 unit; name PV_waterworks
    Rough estimate based on production volume of the Quebec regional dataset and ratio of GDP's between the to region (GDP GLO/GDP Quebec (2012) = 239) of associated tap water production datasets and tap water production volumes.
  property lifetime 60 year; name lifetime
    Literature value. Assumed lifetime of 60 years based on assumed lifetime of 60 years for St-François-Rivière-du-Sud treatment plant based on Bonton, A. (2012).
    Bonton, A., Bouchard, C., Barbeau, B., & Jedrzejak, S. (2012). Comparative life cycle assessment of water treatment plants. Desalination, 284, 42-54.
  property price 1.21373e6 EUR2005
    Calculated based on inputs: The price of the product has been calculated as a sum of the values of the material and energy inputs for this product. This value is therefore a rough estimation. It may underestimate the real price since there are additional expenses when producing any product. These expences can include for example labour costs, treatment of waste materials and profit for the producer. Please consider carefully whether this level of data quality is acceptable for your application.
  properties: carbon allocation 0 kg, carbon content 0

## Inputs from technosphere
- aluminium scrap, post-consumer: -6966.27 kg; name W_al; = al
  Estimation. Based on material input.
  production volume; name PV_w_al; = PV_waterworks*W_al/waterworks
    Calculated from production volume of reference product using the relative outputs.
  properties: dry mass 1 kg, price 0.685 EUR2005, wet mass 1 kg
- aluminium, wrought alloy: 6966.27 kg; name Al; = (A_al* Q_av^- B)* Q_av; lognormal variance with pedigree 0.04, pedigree (1,1,5,1,1)
  Calculated Value.
  EcoSpold01Location=RER
  Uncertainty: Calculated variable. Uncertainty will be determined from propagation of uncertainty factors of underlying variables.
  0
  properties: dry mass 1 kg, wet mass 1 kg
- concrete, normal strength: 1.07344, 0.235722, 0.37258, 0.153324, 1.90834, 2.26224, 80.9289 m3 (7 suppliers, which the file names only by identifier); sum of these 86.9345 m3; = (A_concrete* Q_av^- B)* Q_av; lognormal variance with pedigree 0.04, pedigree (1,1,5,1,1)
  Calculated Value.
  EcoSpold01Location=CH
  Uncertainty: Calculated variable. Uncertainty will be determined from propagation of uncertainty factors of underlying variables.
  properties: dry mass 2190 kg, water content 0.086758, wet mass 2380 kg
- copper scrap, sorted, pressed: -3471.62 kg; name W_cu; = cu
  Estimation. Based on material input.
  production volume; name PV_w_cu; = PV_waterworks*W_cu/waterworks
    Calculated from production volume of reference product using the relative outputs.
  properties: dry mass 1 kg, price 2.84 EUR2005, wet mass 1 kg
- copper, cathode: 3471.62 kg; name Cu; = (A_Cu* Q_av^- B)*Q_av; lognormal variance with pedigree 0.04, pedigree (1,1,5,1,1)
  EcoSpold01Location=RER
  Calculated Value.
  Uncertainty: Calculated variable. Uncertainty will be determined from propagation of uncertainty factors of underlying variables.
  properties: dry mass 1 kg, wet mass 1 kg
- glass fibre: 11111.5 kg; name fiberglass; = ( A_fglass* Q_av^- B)* Q_av; lognormal variance with pedigree 0.04, pedigree (1,1,5,1,1)
  Calculated Value.
  Uncertainty: Calculated variable. Uncertainty will be determined from propagation of uncertainty factors of underlying variables.
  properties: dry mass 1 kg, wet mass 1 kg
- glass fibre reinforced plastic, polyester resin, hand lay-up: 11111.5 kg; name fglass_plast; = (A_fglass* Q_av^- B)* Q_av; lognormal variance with pedigree 0.04, pedigree (1,1,5,1,1)
  (same comment as for glass fibre)
  properties: carbon content, fossil 0.246639, dry mass 1 kg, wet mass 1 kg
- polyurethane, rigid foam: 696.627 kg; name Purethane; = ( A_polyurethane*Q_av^- B)* Q_av; lognormal variance with pedigree 0.04, pedigree (1,1,5,1,1)
  (same comment as for glass fibre)
  properties: carbon content, fossil 0.69089, dry mass 1 kg, heating value, net 30.67 MJ, wet mass 1 kg
- polyvinylchloride, bulk polymerised: 5555.75 kg; name PVC; = ( A_pvc* Q_av^- B)* Q_av; lognormal variance with pedigree 0.04, pedigree (1,1,5,1,1)
  (same comment as for copper, cathode)
  properties: carbon content, fossil 0.387097, dry mass 1 kg, heating value, net 21.5 MJ, wet mass 1 kg
  note on carbon content, fossil: Monomer is vynyl chloride, C2H3Cl (ecoinvent v2.2 report 11_II). MW=62 g/mol
- polyvinylidenchloride, granulate: 17329.3 kg; name pvdc; = ( A_pvdc *Q_av^- B)* Q_av; lognormal variance with pedigree 0.04, pedigree (1,1,5,1,1)
  (same comment as for glass fibre)
  properties: carbon content, fossil 0.387097, dry mass 1 kg, heating value, net 10.01 MJ, wet mass 1 kg
- reinforcing steel: 31261.9 kg; name reinfsteel; = (A_reinfsteel* Q_av^- B)* Q_av; lognormal variance with pedigree 0.04, pedigree (1,1,5,1,1)
  Calculated Value.
  EcoSpold01Location=RER
  Uncertainty: Calculated variable. Uncertainty will be determined from propagation of uncertainty factors of underlying variables.
  properties: carbon content, fossil 0.004, dry mass 1 kg, wet mass 1 kg
- scrap steel: -25661.8, -15.5391 kg (2 suppliers, which the file names only by identifier); sum of these -25677.3 kg; = steel
  Estimation. Based on material input.
  production volume; name PV_w_steel; = PV_waterworks*W_steel/waterworks
    Calculated from production volume of reference product using the relative outputs.
  properties: dry mass 1 kg, wet mass 1 kg
- steel, low-alloyed, hot rolled: 25677.3 kg; name steel; = (A_steel* Q_av^- B)* Q_av; lognormal variance with pedigree 0.04, pedigree (1,1,5,1,1)
  Calculated Value.
  EcoSpold01Location=RER
  Uncertainty: Calculated variable. Uncertainty will be determined from propagation of uncertainty factors of underlying variables. Uncertainty of actual relation between variables not accounted for at this time, although this could be included in a future update.
  properties: carbon content, fossil 0.005, dry mass 1 kg, wet mass 1 kg
  note on carbon content, fossil: Low alloyed steel composition given in Tab. 3.2 ecoinvent v2.2 report 10_partII. Steel assumed to have a C content of 0.5%
- waste glass pane in burnable frame: -187.048, -22035.9 kg (2 suppliers, which the file names only by identifier); sum of these -22223 kg; = fiberglass+fglass_plast
  Estimation. Based on material input.
  EcoSpold01Location=CH
  production volume; name PV_w_fglass; = PV_waterworks*W_fglass/waterworks
    Calculated from the production volume of water works in proportion to the respective output amounts.
  properties: dry mass 1 kg, wet mass 1 kg
- waste plastic, mixture: -0.184123, -0.174842, -687.109, -6.67173, -1.93362, -0.445779, -0.0743835, -0.0337136 kg (8 suppliers, which the file names only by identifier); sum of these -696.627 kg; = purethane
  Estimation. Based on material input.
  production volume; name PV_w_plastics; = PV_waterworks*W_plastics/waterworks
    Calculated from production volume of reference product using the relative outputs.
  properties: carbon content, fossil 0.747344, dry mass 0.847 kg, heating value, net 30.79 MJ, water content 0.180638, wet mass 1 kg
  note on heating value, net: Value taken from the general comment of the treatment dataset.
- waste polyvinylchloride: -35.1023, -6.05338, -2.57531, -1.16723, -15.4338, -230.989, -22587.4, -6.37471 kg (8 suppliers, which the file names only by identifier); sum of these -22885.1 kg; = pvc+pvdc
  Estimation. Based on material input.
  EcoSpold01Location=CH
  production volume; name PV_w_pvc; = PV_waterworks*W_pvc/waterworks
    (same comment as for waste glass pane in burnable frame)
  properties: carbon content, fossil 0.440882, dry mass 0.998 kg, heating value, net 21.51 MJ, water content 0.00200401, wet mass 1 kg
  note on carbon content, fossil: C content in 1 kg DM was calculated using data in Tab A.1, ecoinvent v2.2 report 13_I
- waste reinforced concrete: -0.0644948, -86.87 kg (2 suppliers, which the file names only by identifier); sum of these -86.9345 kg; = concrete
  EcoSpold01Location=CH
  Estimation. Based on material input.
  production volume; name PV_w_reinfconc; = PV_waterworks*W_reinfconc/waterworks
    (same comment as for waste glass pane in burnable frame)
  properties: dry mass 0.99418 kg, water content 0.00585407, wet mass 1 kg
- waste reinforcement steel: -31240.2, -21.6918 kg (2 suppliers, which the file names only by identifier); sum of these -31261.9 kg; = reinfsteel
  Estimation. Based on material input.
  EcoSpold01Location=CH
  production volume; name PV_w_reinfSteel; = PV_waterworks*(W_reinfSteel/waterworks)
    (same comment as for waste glass pane in burnable frame)
  properties: dry mass 1 kg, wet mass 1 kg

## Inputs from nature
- Occupation, industrial area [natural resource, land]: 584270 m2*year; = land*lifetime; lognormal variance with pedigree 0.04, pedigree (1,1,5,1,1)
  (same comment as for glass fibre)
- Transformation, from unspecified [natural resource, land]: 9737.83 m2; = (A_landuse* Q_av^-B_landuse)* Q_av; lognormal variance with pedigree 0.04, pedigree (1,1,5,1,1)
  (same comment as for glass fibre)
- Transformation, to industrial area [natural resource, land]: 9737.83 m2; name land; = (A_landuse* Q_av^-B_landuse)* Q_av; lognormal variance with pedigree 0.04, pedigree (1,1,5,1,1)
  (same comment as for glass fibre)

## Sampling procedure
Based on data collection at plant in 2009 and personal communication with the design engineer in 2013. Most data of these data have been published in Bonton, A., Bouchard, C., Barbeau, B., & Jedrzejak, S. (2012). Comparative life cycle assessment of water treatment plants. Desalination, 284, 42–54. Scaling to average size plant was based on economic scaling curve (Kawamura, S., McGivney, W. T. 2008. Cost Estimating Manual for Water Treatment Facilities, Willey, 224p.).

## Extrapolations
From single small-sized conventional treatment plant to global average middle-sized ultrafiltration treatment plant construction. Extrapolation is based on scaling initial inventory to average size plant using published cost scaling curves from Kawamura (2008). This approach assumes that the economic scaling factor for larger size is applicable to material quantity. Dataset is parameterized based on average flow. The cost curve used for scaling is supposed to be applicable to plant size ranging from 10 to 100 MGD, i.e. it is used here outside the prescribed range of applicability. Uncertainty has been adjusted accordingly.
