# clay roof tile production, glazed

Dataset: EcoSpold 2, unit process
Geography: EC
Time period: 2022-01-01 to 2023-12-31
Technology level: current
Classification: ISIC rev.4 ecoinvent: 2392:Manufacture of clay building materials
Tags: ConvertedDataset
Scenario: Business-as-Usual
System model: Allocation, cut-off by classification
Share of production covered: 70 %
Generated by: K.Flasher;E.Barros;J.Aguirre;S.Martines
Database: ecoinvent
isCopyrightProtected: true
accessRestrictedTo: 1

## General comment
This dataset describes the production of modern clay roof tiles in the area of San José de Balzay in Ecuador. The dataset represents the production of 1 kg of tile, with the following characteristics: average weight of 0.84 kg and average dimensions of (31 x 17 x 6 x 0.82) cm (length x width x curvature arrow x thickness). Data was obtained from measurements and information provided in the factory visited in June 2022 ("El Artesano Fábrica de Tejas"). Some data was calculated using literature values. This dataset was developed by Estefania Barros, Kristi Padrón, Jonnathan Aguirre and Juan Sebastian Martines, under the supervision of Prof. Dolores Sucozhañay and Prof. Paul Vanegas, from the Inclusive Circular Economy and Sustainable Development Research Group of the University of Cuenca (ECI) in the frame of the CEELA (Strengthening capacities for energy efficiency in buildings in Latin America) project with the support of the Swiss Agency for Development and Cooperation (SDC).
The dataset includes the whole manufacturing process of the clay roof tile. It does not include charge of the wastewater nor solid waste from containers and packaging.

## Included activities start
The activity starts with the reception of raw materials at the clay roof tile production site.

## Included activities end
This dataset ends with the storage of the produced glazed tiles. It includes the reception of raw materials, dosing, mixing, forming and cutting, drying, first firing, varnishing, second firing, cooling and storage. The dataset does not include the packaging.

## Geography
Data was obtained in a factory of modern clay roof tile (glazed) located in San José de Balzay and Racar, Cuenca, Ecuador.

## Technology
Current production technology. This dataset corresponds to manufacturing of a clay roof tile, (glazed) factory, which incorporates machinery in their processes.
The manufacturing process includes the reception of raw materials, dosing, mixing, forming by extrusion, drying, first firing, varnishing, second firing, cooling and storage of tiles. For both firing, wood is used. Varnishing and the second process of firing are done in order to produce glazed tiles. These processes make use of two chemicals (lead oxide and silica), and increase the amount of wood used for the oven. The process begins by the mixing of raw materials. The mix is deposited in a mill, then moved an extruder formed by a mixer and a matrix.

## Time period
The time period is from 2022 (year of data collection) to 2023 (year of dataset compilation).

## Parameters
- Carbon dioxide: 1.63 kg; name EF_CO2
  Emission factor in kg emission / kg wood fuel. Reference: Jaya Sucozhañay, J. L., & Gomezcoello Vásquez, J. L. (2012). Análisis comparativo de la contaminación atmosférica producida por la combustión en ladrilleras artesanales utilizando tres tipos de combustibles (Bachelor's thesis).
- Carbon monoxide: 0.0197 kg; name EF_CO
  (same comment as for Carbon dioxide)
- Nitrogen oxides: 0.00118 kg; name EF_NOx
  (same comment as for Carbon dioxide)
- PM10: 0.0157 kg; name EF_PM10
  (same comment as for Carbon dioxide)
- Sulfur dioxide: 0.00018 kg; name EF_SO2
  (same comment as for Carbon dioxide)
- Volatile organic compounds: 0.021 kg; name EF_VOC
  (same comment as for Carbon dioxide)

## Reference product
- clay roof tile: 1 kg; name clay_roof_tile_glazed; By-product classification allocatable product; CPC 37350: Non-refractory ceramic building bricks, flooring blocks, support or filler tiles, roofing tiles, chimney-pots,[…]; HS2017 690510: Ceramic roofing tiles
  The dataset represents 1 kg of clay roof tile. One roof tile has average dimensions (31 x 17 x 6 x 0.82) cm (length x width x curvature arrow x thickness) and measured average mass of 0.84 kg.
  production volume 3.55105e7 kg; name clay_roof_tile_glazed_PV; = 2577423791*4*108108009000/15693403575262.4*0.5
    Estimated value. The production volume is based on the production volume of clay roof tiles in Europe (RER dataset) and the nominal GDP 2019 for EC and Europe. It's assumed the same share between glazed and conventional clay roof tiles.
    According to EuroStat, the production of clay roofing tiles in the European Union in 2019 was 2'577'423'791 units [1]. In Europe the assumed average weight per unit is 4 kg [2]. The nominal (current) GDP of the EU in 2019 was 15'693'403'575'262.4 US$ and in EC was 108'108'009'000 US$ [3].
    Sources:
    [1] "Non-refractory clay roofing tiles", EUROPEAN UNION (28), PRODQNT.
    Industry, trade and services>Statistics on the production of manufactured foods (prom)>Sold production, exports and imports (ds-056120). Retrieved from: https://ec.europa.eu/eurostat/databrowser/view/DS-056120__custom_7772056/default/table?lang=en
    [2] ecoinvent v2 Report 7, Buildings, Part IV, p. 25. Presumed weight per tile: 4 kg.
    [3] https://data.worldbank.org/indicator/NY.GDP.MKTP.CD
  property price 0.0140882 EUR2005
    Sale price. Data provided by the owner of the factory. Price given as 0.0238 USD/kg for 2022. The prices were converted to EUR based on the annual exchange rates published by the European Central Bank (https://sdw.ecb.europa.eu/quickview.do?SERIES_KEY=120.EXR.A.USD.EUR.SP00.A, last accessed on 2023-06-01) and adjusted for inflation relative to 2005 using the producer price index (PPI) of the euro area, published by eurostat (https://ec.europa.eu/eurostat/databrowser/view/STS_INPP_A__custom_6416181/default/table?lang=en, last accessed on 2023-06-01).
  properties: carbon allocation 0 kg, carbon content 0, carbon content, fossil 0, carbon content, non-fossil 0, dry mass 1 kg, water content 0, water in wet mass 0 kg, wet mass 1 kg

## Inputs from technosphere
- chemical, inorganic: 0.00992063 kg; = 50/(6000*0.84); lognormal variance with pedigree 0.0026, pedigree (1,4,1,1,1)
  This exchange is used as a proxy for lead oxide. Calculated value. 50kg of lead oxide per 6000 tiles. Lead oxide is used as a varnish for glazed roof tiles. 0.84kg is the clay roof tile mass.
  properties: carbon content, fossil 0.003, dry mass 1 kg, wet mass 1 kg
- clay: 1.06665 kg; name clay_input; lognormal variance with pedigree 0.0026, pedigree (1,4,1,1,1)
  Calculated value. This value represents the amount of various types of clay used for the production of 1 kg of clay roof tile, according to measurements and the information provided by the owner of the factory. The types of clay used are "tierra cera", "tierra negra", "tierra roja" and "tierra amarilla". "Tierra roja" is also known as "sandy".
  property water in wet mass 0.035 kg; name WWM_clay
  properties: dry mass 0.965 kg, water content 0.0362694, wet mass 1 kg
- damaged clay roof tile, glazed: -0.0416973 kg; name damaged_tiles; = (250*0.84)/5036.3; lognormal variance with pedigree 0.0026, pedigree (1,4,1,1,1)
  Calculated value. The amount of tiles that are damaged in the oven as informed by the owner of the factory is considered (250 * 0.84 kg). This value is divided by the kg of roof tiles produced per firing process, to obtain the kg of damaged bricks per kg of clay roof tile.
  production volume; = damaged_tiles/clay_roof_tile_glazed*clay_roof_tile_glazed_PV
    Calculated from the production volume of the reference product in proportion to the respective output amounts.
  properties: aluminium content 0.073527, calcium content 0.0060637, carbon content, fossil 0.00188025, dry mass 1 kg, iron content 0.038387, lead content 0.00898039, magnesium content 0.00791783, oxygen content 0.497463, potassium content 0.0125962, silicon content 0.349714, sodium content 0.00346803, wet mass 1 kg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
- diesel, burned in building machine: 0.37653 MJ; = 0.0105*35.86; lognormal variance with pedigree 0.0026, pedigree (1,4,1,1,1)
  Calculated value. Multiplying the volume of diesel per kg of brick (0.0105 L/kg) by the heating value of diesel (35.86 MJ/L). Diesel is used in the extruder machine.
  properties: heating value, net 1 MJ
- electricity, medium voltage: 7.92e-5 kWh; = 1.98E-05*4; lognormal variance with pedigree 0.0026, pedigree (1,4,1,1,1)
  Calculated value. Multiplying the bulb power per kg of clay roof tile (1.98E-5 kW/kg) by the working hours that use electricity (4h). One light bulb is used in the firing section when workers have to work early in the morning when it is still dark.
- lubricating oil: 6.3624e-5 kg; name lubricating_oil_input; = 7.23E-08*880; lognormal variance with pedigree 0.0026, pedigree (1,4,1,1,1)
  Calculated value. Volume of lubricating oil per kg of clay roof tile by the density of lubricating oil. Lubricating oil is used for the extrusion machine. Maintenance is usually done every 3 months.
  properties: carbon content, fossil 0.75, dry mass 1 kg, heating value, net 40.2 MJ, wet mass 1 kg
  note on carbon content, fossil: Lubricating oil is produced from diesel. C-content/dry mass of fats and oils considered 75%, from: ecoinvent v2.2 report, n 15a, pg 40
  note on heating value, net: Literature value, Source: IPCC 2006, 2006 IPCC Guidelines for National Greenhouse Gas Inventories, Prepared by the National Greenhouse Gas Inventories Programme, Eggleston H.S., Buendia L., Miwa K., Ngara T. and Tanabe K. (eds). Published: IGES, Japan
- silica sand: 0.00248016 kg; = 12.5/(6000*0.84); lognormal variance with pedigree 0.0032, pedigree (2,4,1,1,1)
  Calculated value. Silica is mixed with lead oxide as a varnish for glazed roof tiles. 12.5kg of the mix per 6000 tiles. 0.84kg is the clay roof tile mass.
  properties: dry mass 0.99 kg, water content 0.010101, wet mass 1 kg
- waste mineral oil: -6.3624e-5 kg; name w_lubricating_oil; = lubricating_oil_input; lognormal variance with pedigree 0.0046, pedigree (3,4,1,1,1)
  It's assumed that the lubricating oil must be disposed of after use (the lubricating oil is used to lube the machinery and does not become part of the product). Therefore, same amount as lubricating oil input is used to model the waste.
  production volume; = w_lubricating_oil/clay_roof_tile_glazed*clay_roof_tile_glazed_PV
    (same comment as for damaged clay roof tile, glazed)
  properties: carbon content, fossil 0.864444, dry mass 0.9 kg, heating value, net 34.7 MJ, water content 0.111111, wet mass 1 kg
  note on carbon content, fossil: Tab A.6, ecoinvent v2.2 report 13_I. C content has been calculated after data in the tables, and then referred to 1 kg DM
  note on heating value, net: Value taken from the general comment of the treatment dataset.
- water, harvested from rainwater: 0.4 kg; name rainwater; = 0.0004*1000; lognormal variance with pedigree 0.0026, pedigree (1,4,1,1,1)
  Calculated value. Water content used for the production process based on measurements and the information provided by the owner of the factory. Water used for the production of clay roof tiles is water obtained from the rain.
  properties: carbon content, fossil 0.0017899, dry mass 0.00034 kg, water content 2940.18, wet mass 1 kg
- wood ash mixture, pure: -0.812546 kg; name wood_ash; = wood_fuel*WM_wood + O - (CO2 + CO + SO2 + NOx + VOC + PM10 + (wood_fuel*WWM_wood)); lognormal variance with pedigree 0.0046, pedigree (3,4,1,1,1)
  Calculated value. Calculated as the difference between the amount of inputs (wood fuel, oxygen) and outputs (CO2, CO, SO2, Nox, VOC and PM10) from the firing process. Wood ash is produced from the combustion of wood during the firing process.
  production volume; = wood_ash/clay_roof_tile_glazed*clay_roof_tile_glazed_PV
    (same comment as for damaged clay roof tile, glazed)
  properties: carbon content, non-fossil 0.012, dry mass 1 kg, wet mass 1 kg
- wood chips, wet, measured as dry mass: 1.29063 kg; name wood_fuel; = (260*25)/5036.3; lognormal variance with pedigree 0.0026, pedigree (1,4,1,1,1)
  Calculated value. The value represents the amount of used (old) pallets that are used as fuel in the firing process for the production of 1 kg of glazed clay roof tiles as informed by the owner of the factory. Wood chips are used as proxy for the used pallets used for the firing process. The number of pallets used per firing process is 260 units. Each unit weights 25kg. Since the wood chips are measured as dry mass, this is divided by the water mass of the wood, which is 2.1kg. This is then divived by the kg of clay roof tiles per firing process (5036.3 kg).
  property water in wet mass 1.1 kg; name WWM_wood
  property wet mass 2.1 kg; name WM_wood
  properties: carbon content, non-fossil 0.494, dry mass 1 kg, heating value, net 10.84 MJ, water content 1.1
  note on heating value, net: Value based on the dataset 'softwood forestry, mixed species, sustainable forest management'

## Inputs from nature
- Occupation, bare area (non-use) [natural resource, land]: 0.000653318 m2*year; = 0.25*10^4/3826620; lognormal variance with pedigree 0.04, pedigree (1,1,1,1,1)
  Estimated for infrastructure. Land occupation calculated as the land occupied by the production facility (0.25 ha) divided by the average annual production volume of the facility (3'826'620 kg clay roof tile/year).
- Oxygen [natural resource, in air]: 1.70019 kg; name O; = 0.494*wood_fuel/12*44*32/44; lognormal variance with pedigree 0.0046, pedigree (3,4,1,1,1)
  Calculated value. Calculated from the total carbon content in the wood chips and the molar mass of oxygen in CO2. It represents the oxygen amount needed

## Emissions to nature
- Carbon dioxide, non-fossil [air, unspecified]: 2.10373 kg; name CO2; = wood_fuel*EF_CO2; lognormal variance with pedigree 0.0032, pedigree (2,4,1,1,1)
  Calculated value. Multiplying the kg of fuel (wood) per kg of clay brick by the emission factor of the pollutant (kg/kg). Since the wood chips are measured as dry mass, this is multiplied by the water mass of the wood, which is 2.1kg. Based on literature calculations and information provided by the owners of the factories. CO2 emission is produced from combustion of wood during the firing process. Reference: Jaya Sucozhañay, J. L., & Gomezcoello Vásquez, J. L. (2012). Análisis comparativo de la contaminación atmosférica producida por la combustión en ladrilleras artesanales utilizando tres tipos de combustibles (Bachelor's thesis).
- Carbon monoxide, non-fossil [air, unspecified]: 0.0254254 kg; name CO; = wood_fuel*EF_CO; lognormal variance with pedigree 0.6526, pedigree (2,4,1,1,1)
  Calculated value. Multiplying the kg of fuel (wood) per kg of clay brick by the emission factor of the pollutant (kg/kg). Based on literature calculations and information provided by the owners of the factories. Carbon monoxide emission is produced from combustion of wood during the firing process. Reference: Jaya Sucozhañay, J. L., & Gomezcoello Vásquez, J. L. (2012). Análisis comparativo de la contaminación atmosférica producida por la combustión en ladrilleras artesanales utilizando tres tipos de combustibles (Bachelor's thesis).
- NMVOC, non-methane volatile organic compounds [air, unspecified]: 0.0271032 kg; name VOC; = wood_fuel*EF_VOC; lognormal variance with pedigree 0.0426, pedigree (2,4,1,1,1)
  Calculated value. Multiplying the kg of fuel (wood) per kg of clay brick by the emission factor of the pollutant (kg/kg). Based on literature calculations and information provided by the owners of the factories. VOC emission is produced from combustion of wood during the firing process. Reference: Jaya Sucozhañay, J. L., & Gomezcoello Vásquez, J. L. (2012). Análisis comparativo de la contaminación atmosférica producida por la combustión en ladrilleras artesanales utilizando tres tipos de combustibles (Bachelor's thesis).
- Nitrogen oxides [air, unspecified]: 0.00152294 kg; name NOx; = wood_fuel*EF_NOx; lognormal variance with pedigree 0.0426, pedigree (2,4,1,1,1)
  Calculated value. Multiplying the kg of fuel (wood) per kg of clay brick by the emission factor of the pollutant (kg/kg). Based on literature calculations and information provided by the owners of the factories. Nitrogen oxides emission is produced from combustion of wood during the firing process. Reference: Jaya Sucozhañay, J. L., & Gomezcoello Vásquez, J. L. (2012). Análisis comparativo de la contaminación atmosférica producida por la combustión en ladrilleras artesanales utilizando tres tipos de combustibles (Bachelor's thesis).
- Particulate Matter, > 2.5 um and < 10um [air, unspecified]: 0.0202629 kg; name PM10; = wood_fuel*EF_PM10; lognormal variance with pedigree 0.1226, pedigree (2,4,1,1,1)
  Calculated value. Multiplying the kg of fuel (wood) per kg of clay brick by the emission factor of the pollutant (kg/kg). Based on literature calculations and information provided by the owners of the factories. Particulate matter emission is produced from combustion of wood during the firing process. PM10 emission is produced from combustion of wood during the firing process. Particulate matter is < 10 um. Reference: Jaya Sucozhañay, J. L., & Gomezcoello Vásquez, J. L. (2012). Análisis comparativo de la contaminación atmosférica producida por la combustión en ladrilleras artesanales utilizando tres tipos de combustibles (Bachelor's thesis).
- Sulfur dioxide [air, unspecified]: 0.000232313 kg; name SO2; = wood_fuel*EF_SO2; lognormal variance with pedigree 0.0032, pedigree (2,4,1,1,1)
  Calculated value. Multiplying the kg of fuel (wood) per kg of clay brick by the emission factor of the pollutant (kg/kg). Based on literature calculations and information provided by the owners of the factories. Sulfur dioxide emission is produced from combustion of wood during the firing process. Reference: Jaya Sucozhañay, J. L., & Gomezcoello Vásquez, J. L. (2012). Análisis comparativo de la contaminación atmosférica producida por la combustión en ladrilleras artesanales utilizando tres tipos de combustibles (Bachelor's thesis).
- Water [air, unspecified]: 0.00169506 m3; name water_to_air; = (wood_fuel*WWM_wood/1000) + ((1.38-1)/1.38)/1000; lognormal variance with pedigree 0.042, pedigree (1,4,1,1,1)
  Calculated value. Evaporated water is produced during two processes: 1) Combustion process, where water in wet mass amount in the wood chips gets evaporated (calculated as wood_fuel*water_in_wet_mass/1000); and 2) Drying process of the roof tiles (weight of a just made tile and a fired tile are considered).
- Water [water, unspecified]: 0.000161971 m3; = (rainwater + clay_input*WWM_clay)/1000 - ((1.38-1)/1.38)/1000; lognormal variance with pedigree 0.044, pedigree (3,4,1,1,1)
  Calculated value. The wastewater was modelled as the water difference between the amount of rainwater used in the process together with the water contained in the clay, and the water evaporated from the brick after the firing process. The water is captured in a hole in the ground, where the mixing takes place. Therefore, the excess water is infiltrated by the soil and follows a natural process, where it eventually reaches groundwater or a water body.

## Sampling procedure
Data gathered in a modern clay roof tile (glazed) factory through a process assessment in a technical visit. Azuay is one of the main producers of clay tile and the production process is similar in Ecuador, according to literature. Land occupation exchange is used as an estimate of infrastructure. Machinery use is accounted for through their fuel / electricity consumption.

## Extrapolations
The exchange "chemical, organic" is used as a proxy for lead oxide.
