# mine construction, bauxite

Dataset: EcoSpold 2, unit process
Geography: GLO
Time period: 1998-01-01 to 2023-12-31
Technology level: current
Classification: ISIC rev.4 ecoinvent: 4290:Construction of other civil engineering projects
Classification: EcoSpold01Categories: metals/extraction
Scenario: Business-as-Usual
System model: Allocation, cut-off by classification
Generated by: Hans-Jörg Althaus
Published in: Althaus H.-J. 2000
Database: ecoinvent
isCopyrightProtected: true
accessRestrictedTo: 1

## General comment
It is assumed that the mine is in use for 20 years and has a yearly output of 1E6 t/a
The dataset is almost completely based on the dasaset found in ecoinvent v2.2, with the exception of some fields being added for ecoinvent v3 compliance (e.g. production volume) and a property "lifetime_capacity" being added.

## Included activities start
Includes the infrastructure and their disposal (buildings with their land use and machines) needed to provide the dried bauxite.

## Included activities end
Ends when the mine is "constructed", Dataset does not include the land use for the mine itself nor that for the roads in the mine.

## Technology
Average technology for the aluminium consumed in Europe

## Reference product
- mine infrastructure, bauxite: 1 unit; By-product classification allocatable product; CPC 53261: Mining constructions
  EcoSpold01Location=GLO
  production volume 0.137445 unit; = 8.33E-13*1.65E11
    The GLO production volume of bauxite mines in 2005 was calculated using the demanded amount of mine in the operation activity and the bauxite production volume. According to USGS (http://minerals.usgs.gov/minerals/pubs/commodity/bauxite/bauximcs06.pdf, accessed May 2012), the GLO production of bauxite in 2005 was 1.65E11 kg.
  property lifetime capacity [kg] 2e11 kg; name lifetime_capacity_kg; = 20*10e9
    It is assumed that the mine is in use for 20 years and has a yearly output of 1E6 t/a
  property price 1.56788e6 EUR2005
    Calculated based on inputs: The price of the product has been calculated as a sum of the values of the material and energy inputs for this product. This value is therefore a rough estimation. It may underestimate the real price since there are additional expenses when producing any product. These expences can include for example labour costs, treatment of waste materials and profit for the producer. Please consider carefully whether this level of data quality is acceptable for your application.
  properties: carbon allocation 0 kg, carbon content 0

## Inputs from technosphere
- building, hall: 10000 m2; source Althaus H.-J. 2004; lognormal variance with pedigree 0.5, pedigree (5,5,5,5,5)
  Estimation based on Mori G. and Adelhardt W. (1998) Stoffmengenflüsse und Energiebedarf bei der Gewinnung ausgewählter mineralischer Rohstoffe; Teilstudie Aluminium. In: Geologisches Jahrbuch, Vol. Sonderhefte SH 2. Bundesanstalt für Geowissen-schaften und Rohstoffe, Hannover. ISBN 3-510-95824-1
  EcoSpold01Location=CH
- building, multi-storey: 1500 m3; source Althaus H.-J. 2004; lognormal variance with pedigree 0.5, pedigree (5,5,5,5,5)
  EcoSpold01Location=RER
  Estimation based on Mori G. and Adelhardt W. (1998) Stoffmengenflüsse und Energiebedarf bei der Gewinnung ausgewählter mineralischer Rohstoffe; Teilstudie Aluminium. In: Geologisches Jahrbuch, Vol. Sonderhefte SH 2. Bundesanstalt für Geowissen-schaften und Rohstoffe, Hannover. ISBN 3-510-95824-1
- industrial machine, heavy, unspecified: 3305.92, 6694.08 kg (2 suppliers, which the file names only by identifier); sum of these 10000 kg; source Althaus H.-J. 2004; lognormal variance with pedigree 0.5, pedigree (5,5,5,5,5)
  Estimation based on Mori G. and Adelhardt W. (1998) Stoffmengenflüsse und Energiebedarf bei der Gewinnung ausgewählter mineralischer Rohstoffe; Teilstudie Aluminium. In: Geologisches Jahrbuch, Vol. Sonderhefte SH 2. Bundesanstalt für Geowissen-schaften und Rohstoffe, Hannover. ISBN 3-510-95824-1
  EcoSpold01Location=RER

## Inputs from nature
- Occupation, industrial area [natural resource, land]: 300000 m2*year; source Althaus H.-J. 2004; lognormal variance with pedigree 0.32, pedigree (5,5,5,5,5)
  Based on assumption that mine is in use for 20 years. Amount of occupation estimated from knowledge of other mines.
- Transformation, from annual crop [natural resource, land]: 12300 m2; source Mori 1998; lognormal variance with pedigree 0.32, pedigree (5,5,5,5,5)
  Estimation based on Mori G. and Adelhardt W. (1998) Stoffmengenflüsse und Energiebedarf bei der Gewinnung ausgewählter mineralischer Rohstoffe; Teilstudie Aluminium. In: Geologisches Jahrbuch, Vol. Sonderhefte SH 2. Bundesanstalt für Geowissen-schaften und Rohstoffe, Hannover. ISBN 3-510-95824-1
- Transformation, from forest, extensive [natural resource, land]: 2700 m2; source Mori 1998; lognormal variance with pedigree 0.32, pedigree (5,5,5,5,5)
  (same comment as for Transformation, from annual crop)
- Transformation, to industrial area [natural resource, land]: 15000 m2; source Althaus H.-J. 2004; lognormal variance with pedigree 0.32, pedigree (5,5,5,5,5)
  Estimated from knowledge of other mines.

## Sampling procedure
estimation

## Review by Roland Hischier 2003-08-29
Passed.

## Review by Bo Weidema 2012-03-13
Passed
