# recultivation, bauxite mine

Dataset: EcoSpold 2, unit process
Geography: GLO
Time period: 1998-01-01 to 2023-12-31
Technology level: current
Classification: EcoSpold01Categories: metals/extraction
Classification: ISIC rev.4 ecoinvent: 3900:Remediation activities and other waste management services
Tags: ConvertedDataset
Scenario: Business-as-Usual
System model: Allocation, cut-off by classification
Generated by: Hans-Jörg Althaus
Published in: Althaus H.-J. 2000
Database: ecoinvent
isCopyrightProtected: true
accessRestrictedTo: 1

## General comment
Refers to the recultivation of a mine with bauxite content of about 50% (w/w) in crude ore
[This dataset was already contained in the ecoinvent database version 2. It was not individually updated during the transfer to ecoinvent version 3. Life Cycle Impact Assessment results may still have changed, as they are affected by changes in the supply chain, i.e. in other datasets. This dataset was generated following the ecoinvent quality guidelines for version 2. It may have been subject to central changes described in the ecoinvent version 3 change report (http://www.ecoinvent.org/database/ecoinvent-version-3/reports-of-changes/), and the results of the central updates were reviewed extensively. The changes added e.g. consistent water flows and other information throughout the database. The documentation of this dataset can be found in the ecoinvent reports of version 2, which are still available via the ecoinvent website. The change report linked above covers all central changes that were made during the conversion process.]

## Included activities start
The activity starts with the transformation of mineral extraction site.

## Included activities end
Includes Land transformation and the machines needed. No refill material other than the overburdens from mining are included.

## Technology
Average bauxite mine recultivation world-wide (open mining)

## Reference product
- recultivation, bauxite mine: 1 m2; By-product classification allocatable product; CPC 9441: Site remediation and clean-up services
  EcoSpold01Location=GLO
  production volume 1 m2
    Unknown
    Dummy value to be replaced by measured, estimated or calculated value
  property price 2.4628 EUR2005
    Calculated based on inputs: The price of the product has been calculated as a sum of the values of the material and energy inputs for this product. This value is therefore a rough estimation. It may underestimate the real price since there are additional expenses when producing any product. These expences can include for example labour costs, treatment of waste materials and profit for the producer. Please consider carefully whether this level of data quality is acceptable for your application.
  properties: carbon allocation 0 kg, carbon content 0

## Inputs from technosphere
- diesel, burned in building machine: 131 MJ; lognormal variance with pedigree 0.186, pedigree (4,1,5,1,3)
  EcoSpold01Location=GLO
  properties: heating value, net 1 MJ

## Inputs from nature
All rows: lognormal variance with pedigree 0.1601, pedigree (1,2,5,1,1)
- Transformation, from mineral extraction site [natural resource, land]: 1 m2
- Transformation, to annual crop [natural resource, land]: 0.55 m2
- Transformation, to cropland fallow (non-use) [natural resource, land]: 0.22 m2
- Transformation, to forest, unspecified [natural resource, land]: 0.22 m2
- Transformation, to industrial area [natural resource, land]: 0.01 m2

## Sampling procedure
Literature / Survey

## Review by Roland Hischier 2003-07-16
Passed.
