# treatment of waste polyurethane, municipal incineration FAE

Dataset: EcoSpold 2, unit process
Geography: CH
Time period: 2006-01-01 to 2023-12-31
Technology level: current
Classification: ISIC rev.4 ecoinvent: 3821:Treatment and disposal of non-hazardous waste
Synonyms: PU waste
Scenario: Business-as-Usual
System model: Allocation, cut-off by classification
Generated by: Nikolia Stoikou
Database: ecoinvent
isCopyrightProtected: true
accessRestrictedTo: 1

## General comment
The process represents the treatment of 'waste polyurethane' in a municipal solid waste incinerator (MSWI). Recommended use of this dataset: For PU, which goes to disposal as part of communal waste mixture.Inventoried waste consists of fraction: 100% PU; . Waste composition (wet, in ppmw): gross heating value 30.9 MJ/kg; net heating value 30.67 MJ/kg; H2O 2000; O 178700; H 84276; C 640700; S 203.07; N 60922; P na; B na; Cl 24369; Br 70.934; F 14.896; I na; Ag na; As 1.9253; Ba 188.99; Cd 82.301; Co 32.011; Cr 41.41; Cu 321.89; Hg 0.86045; Mn 80.984; Mo na; Ni 20.874; Pb 473.27; Sb 43.54; Se 2.128; Sn 26.555; V 291.99; Zn 566.54; Be 0.50667; Sc na; Sr 89.68; Ti 1013.3; Tl 0.40534; W na; Si na; Fe 3775.4; Ca na; Al 202.67; K na; Mg na; Na 1485. Share of carbon in initial waste input that is biogenic 0%.Share of metals in waste not oxidised and bulk-recyclable (exclude very small or thin parts) Iron: 0%; Alu: 0%; Copper: 0%.Recovery of metal scrap from bottom ash to recycling: 0g iron scrap, 0g aluminium scrap, 0g copper scrap. From this waste, the FLUWA process in the technology mix recovers 0.00117kg (DM) of a hydroxide sludge to be recycled in zinc furnaces. Net energy production: 3.95MJ/kg electric energy and 7.7MJ/kg thermal energy.

## Included activities start
The activity starts with the waste being available at the gate of the treatment facility. Collection and transportation of the waste to the treatment plant is not included.

## Included activities end
The activity ends with the waste being treated and waste-specific emissions from the incineration process and auxiliary material consumption for flue gas cleaning are released to the environment (air and water). Infrastructure and waste-specific energy demands for Municipal Solid Waste Incineration (MSWI) and net energy generation are included.

## Geography
Modelling parameters affecting the treatment technology are specific to this geography and to the technology mix encountered in Switzerland in 2012.

## Technology
The waste is treated in the incineration plant with flue gas cleaning. Incineration is the controlled combustion of a waste and it includes fly ash extraction (FAE). Auxiliary material consumption for this step of air pollution control (APC) are included in the process. Air polution control includes electrostatic precipitator for fly ash (ESP), wet flue gas scrubber and 25% SNCR , 42.77% SCR-high dust , 32.68% SCR-low dust -DeNOx facilities and 0% without DeNOx (weighted according to mass of burnt waste). Efficiency of iron scrap separation from slag : 58%. Efficiency of aluminium scrap separation from slag : 31%. Efficiency of copper scrap separation from slag : 31%. The technology mix for this dataset includes a filter ash treatment (FLUWA) of a share of 46.22%. Gross electric efficiency technology mix 15.84% and Gross thermal efficiency technology mix 28.51%

## Reference product
- waste polyurethane: -1 kg; By-product classification Waste; CPC 39270: Waste, parings and scrap of plastics; HS2017 391590: Plastics n.e.c. in heading no. 3915; waste, parings and scrap; CAS 9009-54-5
  main reference product of this activity (supply of disposal service).
  production volume 352300 kg
    Estimated value. The EU market for sealants in 2012 was of 533.860 thousand tons of sealants, more than 50% of this is constituted by silicon and polyurethane (ASI 2013). The percentage of polyurethane sealant (14%) and polyurethane foam (13%) are taken from Nerlfi et al. (2013).
    The CH production volume is extrapolated from the EU production volume using the nominal GDP of 2005 (source: United Nations, http://data.un.org/Glossary.aspx?q=GDP+%28current+US%24%29, accessed 20130726 and 20130312). Where EU GDP is 33% of the world and the CH GDP is 0.8% of the world.
    As the main application of this material is in the construction sector, the rate of waste production is assumed to be 15% (taken from the estimated value for gypsum (WRAP, n.d).
    The treatment route is taken from Hincapié et al. (2015) for the category of combustible waste (which includes sealants), where 28% is sent to recycling, 64% incineration, and 8% landfill.
    ASI (2013) Market Trends: Sealant Demand Growing in Europe. The construction industry continues to control the demand for sealants. Retrieved from: <http://www.adhesivesmag.com/articles/92423-market-trends-sealant-demand-growing-in-europe>, accessed 9th May 2016
    Steven Nerlfi, Minesh Kusumgar and Michael Growney (2013) The Global Sealants Industry. Paint and Coatings Industry (PCI) (http://www.pcimag.com/articles/97675-the-global-sealants-market, accessed 20160122)
    WRAP (n.d.) International practice in plasterboard recycling: Canada. Retrieved from: http://www.wrap.org.uk/sites/files/wrap/Case%20study%20-%20Plasterboard%20recycling%20in%20Canada.pdf, accessed 3 May 2016
    Ingrid Hincapié, Alejandro Caballero-Guzmán, Bernd Nowack (2015) Nanomaterials in Landfills Module 3: Nanomaterials in Construction Waste. EMPA, Swiss Federal Laboratories for Materials Science and Technology. St. Gallen, Switzerland
  property price 0 EUR2005
    Waste products are assigned a price of zero as they are assumed to require further treatment.
  properties: aluminium content 0.000203074, antimony content 4.3627e-5, arsenic content 1.9292e-6, barium content 0.000189366, beryllium content 5.07684e-7, bromine content 7.10758e-5, cadmium content 8.24657e-5, carbon allocation 0.640697 kg, carbon content 0.641981, carbon content, fossil 0.641981, carbon content, non-fossil 0, chlorine content 0.0244177, chromium content 4.1493e-5, cobalt content 3.20755e-5, copper content 0.000322534, dry mass 0.998 kg, fluorine content 1.49259e-5, heating value, gross 30.9575 MJ, heating value, net 30.7321 MJ, hydrogen content 0.0844445, iron content 0.00378292, lead content 0.000474222, manganese content 8.11462e-5, mercury content 8.62175e-7, nickel content 2.09156e-5, nitrogen content 0.0610442, oxygen content 0.179063, selenium content 2.13227e-6, sodium content 0.00148802, strontium content 8.98601e-5, sulfur content 0.000203481, thallium content 4.06147e-7, tin content 2.66083e-5, titanium content 0.00101537, vanadium content 0.000292578, water content 0.00200401, water in wet mass 0.002 kg, wet mass 1 kg, zinc content 0.000567671

## Inputs from technosphere
- ammonia, anhydrous, liquid: 0.00739523 kg; lognormal variance with pedigree 0.79576, pedigree (1,1,4,1,1)
  Input to DeNOx stage (100% NH3).
  Uncertainty: uncertainty calculated from uncertainty in average DeNOx input, uncertainty in the share of thermal NOx, uncertainty of nitrogen content in average municipal waste and the uncertainty in nitrogen content in *this* waste.
  properties: dry mass 1 kg, wet mass 1 kg
- bottom ash, MSWI[F], waste polyurethane: -0.0278297 kg; lognormal variance with pedigree 0.035697, pedigree (1,1,1,1,1)
  waste-specific bottom ash from the incineration of this waste
  Uncertainty: uncertainty is calculated from uncertainties in waste composition and transfer coefficients in incinerator
  production volume
    calculated in proportion to incinerated waste input
  properties: carbon content, fossil 0.137692, chlorine content 0.0169776, copper content 0.0134465, dry mass 0.808424 kg, iron content 0.165037, lead content 0.0147811, nitrogen content 0.0269482, oxygen content 0.496464, sodium content 0.0348946, titanium content 0.0398119, water content 0.236974, wet mass 1 kg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
- cationic resin: 4.3609e-6 kg; lognormal variance with pedigree 1.5956, pedigree (1,1,4,1,1)
  auxiliary input for mercury removal in filter ash treatment (FLUWA).
  Uncertainty: uncertainty calculated from uncertainty in of transfer coefficients in the incinerator, and the uncertainty of the waste composition of this waste
  properties: carbon content, fossil 0.521606, dry mass 0.5 kg, heating value, net 6.68 MJ, water content 1, wet mass 1 kg
- chemical, inorganic: 0.000406853 kg; lognormal variance with pedigree 0.2474, pedigree (1,1,4,1,1)
  auxiliary inputs for the wastewater treatment stage of the incinerator plant. Proxy for Polyelectrolyte.
  Uncertainty: uncertainty calculated from uncertainty in average Polyelectrolyte input, of transfer coefficients in the incinerator, and the uncertainty of the waste composition of this waste
  properties: carbon content, fossil 0.003, dry mass 1 kg, wet mass 1 kg
- chromium trioxide, flakes: 9.4557e-6 kg; lognormal variance with pedigree 1.2018, pedigree (1,1,4,1,1)
  Input to DeNOx stage. Active component in SCR catalyst (vanadium pentoxide, V2O5), here approximated with the available chromium trioxide.
  Uncertainty: uncertainty calculated from uncertainty in average DeNOx input, uncertainty in the share of thermal NOx, uncertainty of nitrogen content in average municipal waste and the uncertainty in nitrogen content in *this* waste.
  properties: dry mass 1 kg, wet mass 1 kg
- heat, district or industrial, natural gas: 1.3829 MJ; lognormal variance with pedigree 0.79576, pedigree (1,1,4,1,1)
  Input to DeNOx stage, to heat up flue gas in low-dust SCR.
  Uncertainty: uncertainty calculated from uncertainty in average DeNOx input, uncertainty in the share of thermal NOx, uncertainty of nitrogen content in average municipal waste and the uncertainty in nitrogen content in *this* waste.
  properties: heating value, net 1 MJ
- hydrochloric acid, without water, in 30% solution state: 0.000361726 kg; lognormal variance with pedigree 0.082134, pedigree (1,1,4,1,1)
  auxiliary inputs for the wastewater treatment stage of the incinerator plant.
  Uncertainty: uncertainty calculated from uncertainty in average HCl input, of transfer coefficients in the incinerator, and the uncertainty of the waste composition of this waste
  properties: dry mass 1 kg, heating value, net 3.32 MJ, wet mass 1 kg
- hydrogen peroxide, without water, in 50% solution state: 0.000648478 kg; lognormal variance with pedigree 0.10967, pedigree (1,1,4,1,1)
  auxiliary oxidising agent for filter ash treatment (FLUWA).
  Uncertainty: uncertainty calculated from uncertainty in of transfer coefficients in the incinerator, and the uncertainty of the waste composition of this waste
  properties: dry mass 1 kg, heating value, net 7.13 MJ, wet mass 1 kg
- iron(III) chloride, without water, in 40% solution state: 5.28328e-5 kg; lognormal variance with pedigree 0.24801, pedigree (1,1,4,1,1)
  auxiliary inputs for the wastewater treatment stage of the incinerator plant.
  Uncertainty: uncertainty calculated from uncertainty in average FeCl3 input, of transfer coefficients in the incinerator, and the uncertainty of the waste composition of this waste
  properties: dry mass 1 kg, wet mass 1 kg
- metalliferous hydroxide sludge: -0.00469584 kg; lognormal variance with pedigree 0.059669, pedigree (1,1,1,1,1)
  Metalliferous hydroxide sludge/zinc concentrate from filter ash leaching (FLUWA).
  Uncertainty: uncertainty is calculated from uncertainties in waste composition and transfer coefficients to filter ash in incinerator and the uncertainty of the transfer coefficients of the FLUWA process.
  production volume
    calculated in proportion to incinerated waste input
  properties: cadmium content 0.0238854, calcium content 0.1045, carbon content, fossil 0.0283854, chlorine content 0.500444, dry mass 0.25 kg, oxygen content 0.329078, phosphorus content 0.01557, potassium content 0.0122, sulfur content 0.0106376, water content 3, wet mass 1 kg, zinc content 0.0851122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
  note on calcium content: Calculated as a production volume weighted average of properties of all the metalliferous hydroxide sludge products produced in the database.
- municipal waste incineration facility: 2.5e-10 unit
  Infrastructure demands per kilogram incinerated waste.
- quicklime, milled, packed: 0.0127345 kg; lognormal variance with pedigree 0.28062, pedigree (1,1,4,1,1)
  auxiliary inputs for the flue gas treatment stage of the incinerator plant.
  Uncertainty: uncertainty calculated from uncertainty in average CaO input, of transfer coefficients in the incinerator, and the uncertainty of the waste composition of this waste
  properties: dry mass 0.99 kg, water content 0.010101, wet mass 1 kg
- residues, MSWI[F], waste polyurethane: -0.00952691 kg; lognormal variance with pedigree 0.06824, pedigree (1,1,1,1,1)
  waste-specific incineration residues (fly ash + scrubber sludge) from the incineration of this waste
  Uncertainty: uncertainty is calculated from uncertainties in waste composition and transfer coefficients in incinerator
  production volume
    calculated in proportion to incinerated waste input
  properties: barium content 0.00529661, carbon content, fossil 0.0544747, chlorine content 0.443621, dry mass 1 kg, iron content 0.0064937, lead content 0.0138679, oxygen content 0.362741, sodium content 0.0474952, titanium content 0.0122362, vanadium content 0.00910376, wet mass 1 kg, zinc content 0.0225098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
- sodium hydroxide, without water, in 50% solution state: 0.00275853 kg; lognormal variance with pedigree 0.22861, pedigree (1,1,4,1,1)
  auxiliary inputs for the flue gas treatment stage of the incinerator plant, and partially in the filter ash treatment (FLUWA).
  Uncertainty: uncertainty calculated from uncertainty in average NaOH input, of transfer coefficients in the incinerator, and the uncertainty of the waste composition of this waste
  properties: dry mass 1 kg, heating value, net 3.03 MJ, wet mass 1 kg
- spent activated carbon with mercury: -4.59042e-6 kg; lognormal variance with pedigree 1.5876, pedigree (1,1,1,1,1)
  Spent ion exchanger charged with mercury, from FLUWA filter ash treatment, approximated here with Spent activated carbon with mercury, deposited undergound in a polyethylene Big Bag.
  Uncertainty: uncertainty calculated from uncertainty in of transfer coefficients in the incinerator, and the uncertainty of the waste composition of this waste.
  production volume
    calculated in proportion to incinerated waste input
  properties: carbon content, fossil 0.6, dry mass 1 kg, heating value, net 18.18 MJ, wet mass 1 kg
- titanium dioxide: 0.000463329 kg; lognormal variance with pedigree 1.2018, pedigree (1,1,4,1,1)
  Input to DeNOx stage (TiO2 catalyst carrier)
  Uncertainty: uncertainty calculated from uncertainty in average DeNOx input, uncertainty in the share of thermal NOx, uncertainty of nitrogen content in average municipal waste and the uncertainty in nitrogen content in *this* waste.
  properties: dry mass 1 kg, wet mass 1 kg
- triazine-compound: 1.93117e-5 kg; lognormal variance with pedigree 0.85617, pedigree (1,1,4,1,1)
  auxiliary inputs for the wastewater treatment stage of the incinerator plant. Proxy for (pure) Trisodium-trimercapto-s-triazine (CAS 17766-26-6), used as 15% diluted solution, aka TMT15.
  Uncertainty: uncertainty calculated from uncertainty in average TMT15 input, of transfer coefficients in the incinerator, and the uncertainty of the waste composition of this waste
  properties: carbon content, fossil 0.475616, dry mass 1 kg, wet mass 1 kg
- water, decarbonised: 4.82321 kg; lognormal variance with pedigree 0.24801, pedigree (1,1,4,1,1)
  Incinerator process water used in flue gas scrubber stage.
  Uncertainty: uncertainty calculated from uncertainty in average water input, and the uncertainty of the waste composition of this waste
  properties: wet mass 1 kg

## Inputs from nature
- Oxygen [natural resource, in air]: 4.6953 kg; lognormal variance with pedigree 0.022501, pedigree (1,1,4,1,1)
  oxygen from ambient air needed to combust and oxidise this waste. Net demand, i.e. without O2 leaving the plant in flue gas uncombusted.
  Uncertainty: uncertainty is calculated from uncertainties in waste composition and transfer coefficients to flue gas and solid residues in incinerator

## Emissions to nature
- Aluminium III [air, urban air close to ground]: 1.65238e-10 kg; lognormal variance with pedigree 0.95041, pedigree (1,1,4,1,1)
  Emission to air from waste composition and incinerator transfer coefficients.
  Uncertainty: uncertainty is calculated from uncertainties in waste composition and transfer coefficients in incinerator
- Ammonia [air, urban air close to ground]: 8.69492e-6 kg; lognormal variance with pedigree 0.8596, pedigree (1,1,4,1,1)
  Nitrogen species emitted to air after DeNOx stage.
  Uncertainty: uncertainty calculated from uncertainty in average N-emissions and uncertainty in the share of thermal NOx and the uncertainty in nitrogen content in *this* waste.
- Antimony ion [air, urban air close to ground]: 3.48778e-11 kg; lognormal variance with pedigree 1.1563, pedigree (1,1,4,1,1)
  (same comment as for Aluminium III)
- Arsenic ion [air, urban air close to ground]: 1.50817e-8 kg; lognormal variance with pedigree 1.5056, pedigree (1,1,4,1,1)
  (same comment as for Aluminium III)
- Barium II [air, urban air close to ground]: 7.41788e-7 kg; lognormal variance with pedigree 0.89896, pedigree (1,1,4,1,1)
  (same comment as for Aluminium III)
- Benzene [air, urban air close to ground]: 1.72097e-8 kg; lognormal variance with pedigree 0.090068, pedigree (1,1,4,1,1)
  Incomplete combustion product emitted to air.
  Uncertainty: uncertainty calculated from uncertainty in average operation emissions, and the uncertainty of the flue gas volume from this waste.
- Benzo(a)pyrene [air, urban air close to ground]: 3.8297e-13 kg; lognormal variance with pedigree 0.40875, pedigree (1,1,4,1,1)
  (same comment as for Benzene)
- Bromine [air, urban air close to ground]: 3.54314e-8 kg; lognormal variance with pedigree 1.0387, pedigree (1,1,4,1,1)
  (same comment as for Aluminium III)
- Cadmium II [air, urban air close to ground]: 4.19494e-8 kg; lognormal variance with pedigree 1.0166, pedigree (1,1,4,1,1)
  (same comment as for Aluminium III)
- Carbon dioxide, fossil [air, urban air close to ground]: 2.33504 kg; lognormal variance with pedigree 0.0140033, pedigree (1,1,4,1,1)
  (same comment as for Aluminium III)
- Carbon monoxide, fossil [air, urban air close to ground]: 2.92544e-5 kg; lognormal variance with pedigree 0.79736, pedigree (1,1,4,1,1)
  (same comment as for Benzene)
- Chromium III [air, urban air close to ground]: 3.61597e-8 kg; lognormal variance with pedigree 1.1049, pedigree (1,1,4,1,1)
  (same comment as for Aluminium III)
- Cobalt II [air, urban air close to ground]: 5.82183e-8 kg; lognormal variance with pedigree 1.1416, pedigree (1,1,4,1,1)
  (same comment as for Aluminium III)
- Copper ion [air, urban air close to ground]: 2.9482e-8 kg; lognormal variance with pedigree 0.84759, pedigree (1,1,4,1,1)
  (same comment as for Aluminium III)
- Cyanide [air, urban air close to ground]: 0.000195211 kg; lognormal variance with pedigree 0.94987, pedigree (1,1,4,1,1)
  (same comment as for Ammonia)
- Dinitrogen monoxide [air, urban air close to ground]: 0.000908633 kg; lognormal variance with pedigree 0.94987, pedigree (1,1,4,1,1)
  (same comment as for Ammonia)
- Dioxins, measured as 2,3,7,8-tetrachlorodibenzo-p-dioxin [air, urban air close to ground]: 3.4417e-14 kg; lognormal variance with pedigree 0.40875, pedigree (1,1,4,1,1)
  (same comment as for Benzene)
- Heat, waste [air, urban air close to ground]: 21.929 MJ; lognormal variance with pedigree 0.034657, pedigree (1,1,4,1,1)
  Waste heat generated from heating value of this waste plus any electricity required to process it.
  Uncertainty: uncertainty is calculated from uncertainties in waste composition and uncertainties in energy efficiency and the uncertainty in internal energy demand
- Hexachlorobenzene [air, urban air close to ground]: 3.59845e-11 kg; lognormal variance with pedigree 0.090068, pedigree (1,1,4,1,1)
  (same comment as for Benzene)
- Hydrochloric acid [air, urban air close to ground]: 1.39062e-5 kg; lognormal variance with pedigree 0.29561, pedigree (1,1,4,1,1)
  (same comment as for Aluminium III)
- Hydrogen fluoride [air, urban air close to ground]: 1.00499e-7 kg; lognormal variance with pedigree 1.2343, pedigree (1,1,4,1,1)
  (same comment as for Aluminium III)
- Iron ion [air, urban air close to ground]: 6.76605e-9 kg; lognormal variance with pedigree 0.55847, pedigree (1,1,4,1,1)
  (same comment as for Aluminium III)
- Lead II [air, urban air close to ground]: 3.89907e-8 kg; lognormal variance with pedigree 0.79635, pedigree (1,1,4,1,1)
  (same comment as for Aluminium III)
- Manganese II [air, urban air close to ground]: 1.54661e-8 kg; lognormal variance with pedigree 1.0313, pedigree (1,1,4,1,1)
  (same comment as for Aluminium III)
- Mercury II [air, urban air close to ground]: 2.4397e-8 kg; lognormal variance with pedigree 1.606, pedigree (1,1,4,1,1)
  (same comment as for Aluminium III)
- Methane, fossil [air, urban air close to ground]: 2.58145e-7 kg; lognormal variance with pedigree 0.090068, pedigree (1,1,4,1,1)
  (same comment as for Benzene)
- NMVOC, non-methane volatile organic compounds [air, urban air close to ground]: 7.83207e-7 kg; lognormal variance with pedigree 0.090068, pedigree (1,1,4,1,1)
  (same comment as for Benzene)
- Nickel II [air, urban air close to ground]: 2.62222e-8 kg; lognormal variance with pedigree 1.2003, pedigree (1,1,4,1,1)
  (same comment as for Aluminium III)
- Nitrogen oxides [air, urban air close to ground]: 0.00275339 kg; lognormal variance with pedigree 0.8596, pedigree (1,1,4,1,1)
  sum of fuel-NOx and thermal-NOx emitted to air after DeNOx stage.
  Uncertainty: uncertainty calculated from uncertainty in average N-emissions and uncertainty in the share of thermal NOx and the uncertainty in nitrogen content in *this* waste.
- Particulate Matter, < 2.5 um [air, urban air close to ground]: 2.05469e-6 kg; lognormal variance with pedigree 0.40875, pedigree (1,1,4,1,1)
  (same comment as for Benzene)
- Particulate Matter, > 2.5 um and < 10um [air, urban air close to ground]: 1.03251e-8 kg; lognormal variance with pedigree 0.19317, pedigree (1,1,4,1,1)
  (same comment as for Benzene)
- Pentachlorobenzene [air, urban air close to ground]: 9.09244e-11 kg; lognormal variance with pedigree 0.090068, pedigree (1,1,4,1,1)
  (same comment as for Benzene)
- Pentachlorophenol [air, urban air close to ground]: 7.49457e-12 kg; lognormal variance with pedigree 0.090068, pedigree (1,1,4,1,1)
  (same comment as for Benzene)
- Selenium IV [air, urban air close to ground]: 2.5387e-8 kg; lognormal variance with pedigree 1.4912, pedigree (1,1,4,1,1)
  (same comment as for Aluminium III)
- Sodium I [air, urban air close to ground]: 1.21925e-5 kg; lognormal variance with pedigree 0.6225, pedigree (1,1,4,1,1)
  (same comment as for Aluminium III)
- Strontium II [air, urban air close to ground]: 8.96804e-9 kg; lognormal variance with pedigree 1.0166, pedigree (1,1,4,1,1)
  (same comment as for Aluminium III)
- Sulfur dioxide [air, urban air close to ground]: 2.15959e-6 kg; lognormal variance with pedigree 0.8877, pedigree (1,1,4,1,1)
  (same comment as for Aluminium III)
- Thallium I [air, urban air close to ground]: 4.05335e-10 kg; lognormal variance with pedigree 1.7127, pedigree (1,1,4,1,1)
  (same comment as for Aluminium III)
- Tin ion [air, urban air close to ground]: 1.73459e-11 kg; lognormal variance with pedigree 1.2223, pedigree (1,1,4,1,1)
  (same comment as for Aluminium III)
- Titanium ion [air, urban air close to ground]: 8.40716e-7 kg; lognormal variance with pedigree 0.68727, pedigree (1,1,4,1,1)
  (same comment as for Aluminium III)
- Toluene [air, urban air close to ground]: 3.44193e-8 kg; lognormal variance with pedigree 0.090068, pedigree (1,1,4,1,1)
  (same comment as for Benzene)
- Vanadium V [air, urban air close to ground]: 6.19286e-6 kg; lognormal variance with pedigree 0.83293, pedigree (1,1,4,1,1)
  (same comment as for Aluminium III)
- Water [air, urban air close to ground]: 0.00384383 m3; lognormal variance with pedigree 0.91954, pedigree (1,1,4,1,1)
  water vapour from waste humidity, hydrogen oxidation and part of the process water.
  Uncertainty: Uncertainty calculated from uncertainty in waste composition, process water input and the uncertainty of fraction to air.
- Zinc II [air, urban air close to ground]: 3.79729e-7 kg; lognormal variance with pedigree 0.75986, pedigree (1,1,4,1,1)
  (same comment as for Aluminium III)
- Non-hazardous waste disposed [inventory indicator, waste]: 1 kg
  Inventory indicator for waste mass disposed. To be used in EN15804 "other data" results.
- Aluminium III [water, surface water]: 1.02857e-9 kg; lognormal variance with pedigree 0.78678, pedigree (1,1,4,1,1)
  Emissions to water from waste composition and incinerator transfer coefficients.
  Uncertainty: uncertainty is calculated from uncertainties in waste composition and transfer coefficients in incinerator
- Antimony ion [water, surface water]: 4.7246e-7 kg; lognormal variance with pedigree 1.0585, pedigree (1,1,4,1,1)
  (same comment as for Aluminium III)
- Arsenic ion [water, surface water]: 9.47479e-16 kg; lognormal variance with pedigree 1.4532, pedigree (1,1,4,1,1)
  (same comment as for Aluminium III)
- BOD5, Biological Oxygen Demand [water, surface water]: 0.000471578 kg; lognormal variance with pedigree 0.029518, pedigree (1,1,4,1,1)
  (same comment as for Aluminium III)
- Barium II [water, surface water]: 5.83888e-8 kg; lognormal variance with pedigree 0.54684, pedigree (1,1,4,1,1)
  (same comment as for Aluminium III)
- Beryllium II [water, surface water]: 1.95314e-12 kg; lognormal variance with pedigree 1.3177, pedigree (1,1,4,1,1)
  (same comment as for Aluminium III)
- Bromine [water, surface water]: 3.70666e-5 kg; lognormal variance with pedigree 0.47367, pedigree (1,1,4,1,1)
  (same comment as for Aluminium III)
- COD, Chemical Oxygen Demand [water, surface water]: 0.000471578 kg; lognormal variance with pedigree 0.029518, pedigree (1,1,4,1,1)
  (same comment as for Aluminium III)
- Cadmium II [water, surface water]: 7.51225e-9 kg; lognormal variance with pedigree 0.70982, pedigree (1,1,4,1,1)
  (same comment as for Aluminium III)
- Chloride [water, surface water]: 0.0191595 kg; lognormal variance with pedigree 0.11629, pedigree (1,1,4,1,1)
  (same comment as for Aluminium III)
- Chromium III [water, surface water]: 5.37606e-9 kg; lognormal variance with pedigree 0.70784, pedigree (1,1,4,1,1)
  (same comment as for Aluminium III)
- Cobalt II [water, surface water]: 3.74732e-10 kg; lognormal variance with pedigree 0.64139, pedigree (1,1,4,1,1)
  (same comment as for Aluminium III)
- Copper ion [water, surface water]: 1.61108e-8 kg; lognormal variance with pedigree 0.8315, pedigree (1,1,4,1,1)
  (same comment as for Aluminium III)
- DOC, Dissolved Organic Carbon [water, surface water]: 0.000206315 kg; lognormal variance with pedigree 0.029518, pedigree (1,1,4,1,1)
  (same comment as for Aluminium III)
- Fluoride [water, surface water]: 4.07201e-6 kg; lognormal variance with pedigree 0.90671, pedigree (1,1,4,1,1)
  (same comment as for Aluminium III)
- Heat, waste [water, surface water]: 5.02103 MJ; lognormal variance with pedigree 0.034657, pedigree (1,1,4,1,1)
  (same comment as for Heat, waste)
- Iron ion [water, surface water]: 4.05567e-8 kg; lognormal variance with pedigree 0.46335, pedigree (1,1,4,1,1)
  (same comment as for Aluminium III)
- Lead II [water, surface water]: 2.50132e-8 kg; lognormal variance with pedigree 0.63912, pedigree (1,1,4,1,1)
  (same comment as for Aluminium III)
- Manganese II [water, surface water]: 6.38e-9 kg; lognormal variance with pedigree 0.81768, pedigree (1,1,4,1,1)
  (same comment as for Aluminium III)
- Mercury II [water, surface water]: 2.42061e-10 kg; lognormal variance with pedigree 1.5698, pedigree (1,1,4,1,1)
  (same comment as for Aluminium III)
- Nickel II [water, surface water]: 6.80381e-10 kg; lognormal variance with pedigree 0.91053, pedigree (1,1,4,1,1)
  (same comment as for Aluminium III)
- Nitrate [water, surface water]: 0.00027404 kg; lognormal variance with pedigree 0.102002, pedigree (1,1,4,1,1)
  (same comment as for Aluminium III)
- Selenium IV [water, surface water]: 2.2601e-8 kg; lognormal variance with pedigree 1.156, pedigree (1,1,4,1,1)
  (same comment as for Aluminium III)
- Sodium I [water, surface water]: 0.000223109 kg; lognormal variance with pedigree 0.38987, pedigree (1,1,4,1,1)
  (same comment as for Aluminium III)
- Strontium II [water, surface water]: 2.1657e-9 kg; lognormal variance with pedigree 1.0088, pedigree (1,1,4,1,1)
  (same comment as for Aluminium III)
- Sulfate [water, surface water]: 3.21344e-5 kg; lognormal variance with pedigree 0.69524, pedigree (1,1,4,1,1)
  (same comment as for Aluminium III)
- TOC, Total Organic Carbon [water, surface water]: 0.000206315 kg; lognormal variance with pedigree 0.029518, pedigree (1,1,4,1,1)
  (same comment as for Aluminium III)
- Thallium I [water, surface water]: 3.80724e-11 kg; lognormal variance with pedigree 1.7181, pedigree (1,1,4,1,1)
  (same comment as for Aluminium III)
- Tin ion [water, surface water]: 2.34398e-8 kg; lognormal variance with pedigree 1.1037, pedigree (1,1,4,1,1)
  (same comment as for Aluminium III)
- Titanium ion [water, surface water]: 1.44204e-7 kg; lognormal variance with pedigree 0.6865, pedigree (1,1,4,1,1)
  (same comment as for Aluminium III)
- Vanadium V [water, surface water]: 3.87319e-8 kg; lognormal variance with pedigree 0.48201, pedigree (1,1,4,1,1)
  (same comment as for Aluminium III)
- Water [water, surface water]: 0.00165268 m3; lognormal variance with pedigree 1.0654, pedigree (1,1,4,1,1)
  process water released to surface water.
  Uncertainty: uncertainty calculated from uncertainty in process water input and the uncertainty of fraction to surface water.
- Zinc II [water, surface water]: 2.27243e-8 kg; lognormal variance with pedigree 0.67406, pedigree (1,1,4,1,1)
  (same comment as for Aluminium III)
