# shale brick production

Dataset: EcoSpold 2, unit process
Geography: RoW
Time period: 2012-01-01 to 2023-12-31
Technology level: current
Classification: ISIC rev.4 ecoinvent: 2392:Manufacture of clay building materials
Classification: EcoSpold01Categories: construction materials/bricks
Scenario: Business-as-Usual
System model: Allocation, cut-off by classification
Generated by: Catherine Reid
Database: ecoinvent
isCopyrightProtected: false
accessRestrictedTo: 1

## General comment
This GLO dataset is extrapolated from the Quebec dataset which represents the production of 1 kg of brick from shale in Quebec in 2012.
This dataset represents the production of brick from shale in Quebec in 2012.
Specific data were collected from the only producer of brick in Quebec on the basis of shale extracted annually. The amount of brick produce annually was calculated by data provider in order to report the specific data by kg of brick produce. The annual production volume of the region is of 66'957 tons.
This company also provided data for the datasets ''shale quarry operation, QC, 2012'' and ''brick production facility construction, QC, 2029''.

## Included activities start
This activity starts from the reception of shale.

## Included activities end
The activity ends with the storage of brick.

The dataset includes first ginding process, wet process (includes second ginding, mixing and plastifying), storage, forming (extruding molding method) and cutting, drying, firing, loading and storage.

This dataset doesn't include :
1) Packaging of the brick (should be included in the market) : wood inserted into the pallets of bricks (7.094E-04 kg/kg), high density polyethylene (tethers for pallets) (4.77E-04 kg/kg)
2) Some of the waste (recycling) : tatters and absorbant contaminated with oil and grease (1.531E-05 kg/kg), hydraulic hoses (7.47E-07 kg/kg), batteries (3.062E-06 kg/kg), neons (5.041E-05 linear feet/kg), metals (3.425E-04 kg/kg), plastic bags containing barium (1.355E-04 kg/kg), paper bags/plastics (1.47E-04 l/kg).

## Geography
Extrapolated from the Québec dataset.

## Technology
Current technology

## Time period
The dataset represents the activity in Quebec in 2012

## Parameters
- annual production Quebec: 6.6957e7 kg; name PV_QC
  Measured Value (dataset brick production, Québec 2012)
- fraction, process water, to air: 1 dimensionless; name fraction_water_air; lognormal variance with pedigree 0.0106, pedigree (1,5,1,5,1)

## Reference product
- shale brick: 1 kg; name PV_ref; By-product classification allocatable product; CPC 37310: Bricks, blocks, tiles and other ceramic goods of siliceous earths
  production volume 1.50038e10 kg; name AnnualProduction; = 66957000*7.00e13/3.11e11
    Gross approximation of the production volume based on an estimate of the Quebec production volume (66957000 kg/year, taken from brick production, Québec 2012 dataset) scaled to GLO by the ratio of global and Quebec GDP for 2011 (7e13/3.11e11). It should be replaced as soon as better data is found.
  property carbon content, fossil 0
    fossil carbon content on a dry matter basis.
    Made mainly from shale, sand and other aditives.
  property carbon content, non-fossil 0
    biogene carbon content on a dry matter basis.
    Made mainly from shale, sand and other aditives.
  property price 0.134 EUR2005
    Calculated based on consumer prices. The size of one shale brick is estimated to be 1m*1m*0.03m resulting in 0.03m3 of volume. The density is estimated to be 2500 kg/m3. The price per 1m2 of the shale brick is approximatelly 10 EUR. The calculated price for 1kg of shale brick is than 0.134 EUR.
  properties: carbon allocation 0 kg, carbon content 0, dry mass 1 kg, water content 0, water in wet mass 0 kg, wet mass 1 kg

## Inputs from technosphere
- bentonite: 0.001564 kg; lognormal variance with pedigree 0.0192, pedigree (2,5,4,5,1)
  Calculated Value based on the amount reported by kg of shale extracted.
  properties: dry mass 1 kg, wet mass 1 kg
- brick production facility: 1.99133e-10 unit; = 1/lifetime_capacity; lognormal variance with pedigree 0.008, pedigree (1,1,4,1,1)
  Calculated value based on the real capacity of the facility. See exchanges properties for details.
  Uncertainty: Calculated variable. Uncertainty will be determined from propagation of uncertainty factors of underlying variables.
  property annual production 6.6957e7 kg; name capacity
  property lifetime 75 year; name lifetime
  property lifetime capacity [kg] 5.02178e9 kg; name lifetime_capacity; = capacity*lifetime
  note on annual production: Measured value based on sales of brick for the dataset brick shale production, Québec (source: questionnaire). Represent the real capacity of the facility.
  note on lifetime: Estimated value based on the dataset ''brick production facility construction, Quebec''.
- chemical, inorganic: 7.654e-5 kg; lognormal variance with pedigree 0.0192, pedigree (2,5,4,5,1)
  Calculated Value based on the amount reported by kg of shale extracted.
  Reported as grey pigment (proxy).
  properties: carbon content, fossil 0.003, dry mass 1 kg, wet mass 1 kg
  note on carbon content, fossil: This dataset is an unweighted average of 20 inorganic substances (listed in Tab 88.1, ecoinvent v2.2 report 8, part II), being part of the top100 chemicals included in this database. The C-content has also been calculated as an unweighted average of the C content of the substances composing this dataset.
- chemical, organic: 0.0005689 kg; lognormal variance with pedigree 0.0192, pedigree (2,5,4,5,1)
  Calculated Value based on the amount reported by kg of shale extracted. Stands for sodium lignosulfonate.
  properties: carbon content, fossil 0.628, dry mass 1 kg, heating value, net 19.03 MJ, wet mass 1 kg
  note on carbon content, fossil: This dataset is an unweighted average of 20 organic substances (listed in Tab 88.1, ecoinvent v2.2 report 8, part II), being part of the top100 chemicals included in this database. The C-content has also been calculated as an unweighted average of the C content of the substances composing this dataset.
- diesel, burned in building machine: 0.031023 MJ; = (fuel_input_diesel*density_diesel_buildingmachine*UnitConversion(1, 'm3', 'l'))*Net_heat_value_diesel_buildingmachine*42.8; lognormal variance with pedigree 0.008, pedigree (1,1,4,1,1)
  EcoSpold01Location=GLO
  Calculated Value. See parameters exchanges properties for details.
  Uncertainty: Calculated variable. Uncertainty will be determined from propagation of uncertainty factors of underlying variables.
  property density 0.84 kg/l; name density_diesel_buildingmachine
  property fuel input in physical units, m3 8.629e-7 m3; name fuel_input_diesel
  property heating value, net 1 MJ; name Net_heat_value_diesel_buildingmachine
  note on density: Literature value. Value Taken from Table 5.1 of report "Overview and methodology, Data quality guideline for the ecoinvent database version 3" (ecoinvent report No. 1 (v3), 2011)
  note on fuel input in physical units, m3: Calculated Value based on the amount reported by kg of shale extracted.
  note on heating value, net: Literature value.Net (lower) heating (calorific) value. Value Taken from Table 5.1 of report "Overview and methodology, Data quality guideline for the ecoinvent database version 3" (ecoinvent report No. 1 (v3), 2011)
- electricity, medium voltage: 0.00242067, 0.0482869, 0.0012088, 0.000741291, 0.0104524, 0.000148369, 3.18581e-5, 0.00337173, 0.00498637, 0.0143317 kWh (10 suppliers, which the file names only by identifier); sum of these 0.08598 kWh; lognormal variance with pedigree 0.0192, pedigree (2,5,4,5,1)
  Calculated Value based on the amount reported by kg of shale extracted.
  EcoSpold01Location=UCTE
  Uncertainty: ;
- frit, for ceramic tile: 0.000257 kg; lognormal variance with pedigree 0.0192, pedigree (2,5,4,5,1)
  Calculated Value based on the amount reported by kg of shale extracted.
  properties: dry mass 1 kg, wet mass 1 kg
- heat, district or industrial, natural gas: 0.588923, 1.59335 MJ (2 suppliers, which the file names only by identifier); sum of these 2.18227 MJ; = fuel_input_naturalgas*Net_heat_value_naturalgas*36.3/fuel_use_naturalgas; lognormal variance with pedigree 0.008, pedigree (1,1,4,1,1)
  Calculated value based on reported fuel input (in m³), the Net Heating Value of the fuel and assumed efficiency (1/Fuel_use).
  See parameters exchanges properties for details.
  Uncertainty: Calculated variable. Uncertainty will be determined from propagation of uncertainty factors of underlying variables.
  properties: Corresponding fuel use 1.04645 MJ, fuel input in physical units, m3 0.06291 m3, heating value, net 1 MJ
  note on Corresponding fuel use: Calculated value. Lower heating value of the fuel input related to the heat/electricity output. Calculated with corresponding heat production datasets.
  note on fuel input in physical units, m3: Calculated Value based on the amount reported by kg of shale extracted. Fuel input reported in m³.
- kaolin: 1.274e-5 kg; lognormal variance with pedigree 0.0192, pedigree (2,5,4,5,1)
  Calculated Value based on the amount reported by kg of shale extracted.
  Reported as ball clay (proxy).
  properties: dry mass 1 kg, wet mass 1 kg
- lime, packed: 0.000909129, 2.31464e-5, 0.00181772 kg (3 suppliers, which the file names only by identifier); sum of these 0.00275 kg; lognormal variance with pedigree 0.0192, pedigree (2,5,4,5,1)
  EcoSpold01Location=CH
  Calculated Value based on the amount reported by kg of shale extracted. Reported as barium carbonate (proxy).
  Uncertainty: ;
  properties: carbon content, fossil 0.117492, dry mass 0.998 kg, water content 0.00200401, wet mass 1 kg
  note on carbon content, fossil: Table 3.1, ecoinvent v2.2 report 7, part VII, pg 3. MW CaCO3=100, MW MgCO3=84
- lubricating oil: 1.46769e-5, 6.96731e-5 kg (2 suppliers, which the file names only by identifier); sum of these 8.435e-5 kg; lognormal variance with pedigree 0.0192, pedigree (2,5,4,5,1)
  Calculated Value based on the amount reported by kg of shale extracted.
  EcoSpold01Location=RER
  Uncertainty: ;
  properties: carbon content, fossil 0.75, dry mass 1 kg, heating value, net 40.2 MJ, wet mass 1 kg
  note on carbon content, fossil: Lubricating oil is produced from diesel. C-content/dry mass of fats and oils considered 75%, from: ecoinvent v2.2 report, n 15a, pg 40
  note on heating value, net: Literature value, Source: IPCC 2006, 2006 IPCC Guidelines for National Greenhouse Gas Inventories, Prepared by the National Greenhouse Gas Inventories Programme, Eggleston H.S., Buendia L., Miwa K., Ngara T. and Tanabe K. (eds). Published: IGES, Japan
- manganese: 0.002456 kg; lognormal variance with pedigree 0.0192, pedigree (2,5,4,5,1)
  Calculated Value based on the amount reported by kg of shale extracted.
  properties: dry mass 1 kg, wet mass 1 kg
- propane, burned in building machine: 0.00241901 MJ; = (fuel_input_propane*density_propane*1000)*Net_heat_value_propane*46.46; lognormal variance with pedigree 0.008, pedigree (1,1,4,1,1)
  Calculated Value. See exchanges properties for details.
  Uncertainty: Calculated variable. Uncertainty will be determined from propagation of uncertainty factors of underlying variables.
  property density 0.515 kg/l; name density_propane
  property fuel input in physical units, m3 1.011e-7 m3; name fuel_input_propane
  property heating value, net 1 MJ; name Net_heat_value_propane
  note on density: Literature value. Density for liquid propane (at 15°C), taken from http://www.cfbp.fr/proprietes-des-gpl/caracteristiques-generales-et-physico-chimiques-n305.
  note on heating value, net: Literature value. Net (lower) heating (calorific) value. Taken directly from ecoinvent v3.0 dataset "propane, burned in building machine, GLO 2013".
- sand: 0.000175208, 2.0978e-6, 0.0114018, 9.09596e-7 kg (4 suppliers, which the file names only by identifier); sum of these 0.01158 kg; lognormal variance with pedigree 0.0192, pedigree (2,5,4,5,1)
  Calculated Value based on the amount reported by kg of shale extracted.
  EcoSpold01Location=CH
  Uncertainty: ;
  properties: dry mass 1 kg, wet mass 1 kg
- shale: 1.046 kg; lognormal variance with pedigree 0.0092, pedigree (2,1,4,1,1)
  Calculated Value. The amount consumed correspond to the clay used as feedstock (99,91%) and for additives were clay is used as a proxy (0,0878%) (Gold and red art clay, Brikote).
  Uncertainty: ;
  properties: dry mass 0.965 kg, water content 0.036269, wet mass 1 kg
- sheet rolling, chromium steel: 1.57e-7 kg; lognormal variance with pedigree 0.2106, pedigree (5,5,5,5,5)
  Estimated value. Estimation based on brick production, GLO dataset (ecoinvent v3). Forming of mould used for extruding (forming) the brick.
  EcoSpold01Location=RER
  Uncertainty: Proxy. The uncertainty has been maximized.
- solvent, organic: 1.1472e-5 kg; = Spent_solvent_mixture; lognormal variance with pedigree 0.0586, pedigree (5,5,4,5,1)
  Estimation based on the amount of waste solvent.
  properties: carbon content, fossil 0.63072, dry mass 1 kg, heating value, net 19.11 MJ, wet mass 1 kg
- spent solvent mixture: -7.5019e-8, -3.20205e-6, -8.19493e-6 kg (3 suppliers, which the file names only by identifier); sum of these -1.1472e-5 kg; = Spent_solvent_mixture_output*Spent_solvent_mixture_density
  Calculated value based on measured value and estimation. See parameters exchanges properties for details.
  production volume; = AnnualProduction * (spent_solvent_mixture / PV_ref)
    Calculated from production volume of reference product using the relative outputs.
  properties: carbon content, fossil 0.571257, density 0.8 kg/l, dry mass 0.835 kg, heating value, net 21.7 MJ, input 1.434e-5 l, water content 0.197605, wet mass 1 kg
  note on carbon content, fossil: Tab A.7, ecoinvent v2.2 report 13_I. C content has been calculated after data in the tables, and then referred to 1 kg DM
  note on heating value, net: Value taken from the general comment of the treatment dataset.
- steel, low-alloyed: 1.57e-7 kg; lognormal variance with pedigree 0.2106, pedigree (5,5,5,5,5)
  Estimation based on the dataset brick production, GLO. Mould used for extruding (forming) the brick.
  Uncertainty: Proxy. The uncertainty has been maximized.
  properties: carbon content, fossil 0.005, dry mass 1 kg, wet mass 1 kg
- tap water: 1.81379e-6, 2.76497e-6, 5.1593e-6, 1.38988e-5, 6.97216e-5, 0.00079786, 0.000595782 kg (7 suppliers, which the file names only by identifier); sum of these 0.001487 kg; lognormal variance with pedigree 0.0092, pedigree (2,1,4,1,1)
  Calculated Value based on the amount reported by kg of shale extracted. Assumption : water is supplied from public water supply.
  EcoSpold01Location=RER
  Uncertainty: ;
  properties: carbon content, fossil 0.00178991, dry mass 0.000337476 kg, water content 2962.17, wet mass 1 kg
  note on carbon content, fossil: Bicarbonate content is 2.93 mol/m3. CO2 content is 0.1 mol/m3 (ecoinvent v2.2 report 8, Tab 93.1).
- waste mineral oil: -2.62843e-7, -2.77998e-5, -1.06173e-5 kg (3 suppliers, which the file names only by identifier); sum of these -3.868e-5 kg; lognormal variance with pedigree 0.0012, pedigree (2,1,1,1,1)
  Calculated Value based on the amount reported by kg of shale extracted.
  production volume; = AnnualProduction * (waste_mineral_oil / PV_ref)
    Calculated from production volume of reference product using the relative outputs.
  properties: carbon content, fossil 0.864444, dry mass 0.9 kg, heating value, net 34.7 MJ, water content 0.111111, wet mass 1 kg
  note on carbon content, fossil: Tab A.6, ecoinvent v2.2 report 13_I. C content has been calculated after data in the tables, and then referred to 1 kg DM

## Emissions to nature
- Water [air, unspecified]: 1.487e-6 m3; = (water_input*fraction_water_air/density_water)*UnitConversion(1, 'l', 'm3'); lognormal variance with pedigree 0.0507, pedigree (2,2,4,5,1)
  Calculated value based on literature values and expert opinion. See comments in the parametres' comment field.
  property density 1 kg/l; name density_water

## Sampling procedure
The data relates to only productor of brick in Quebec.

## Extrapolations
GLO dataset extrapolated from Quebec dataset.
In the Quebec dataset, specific data were collected from the only producer of brick in Quebec. Extrapolations were made from brick production, GLO dataset (ecoinvent v3) for the molds. Uncertainty has been adjusted accordingly.
