# metallization paste production, front side

Dataset: EcoSpold 2, unit process
Geography: RoW
Time period: 2006-01-01 to 2023-12-31
Technology level: current
Classification: EcoSpold01Categories: photovoltaic/production of components
Classification: ISIC rev.4 ecoinvent: 2029:Manufacture of other chemical products n.e.c.
Tags: ConvertedDataset
Scenario: Business-as-Usual
System model: Allocation, cut-off by classification
Generated by: Mariska J. de Wild-Scholten
Published in: Jungbluth, N. 2007
Database: ecoinvent
isCopyrightProtected: true
accessRestrictedTo: 1

## General comment
Chemical composition of typical pastes taken from Material Safety Data Sheets. Energy use and infrastructure estimated with data for solder production.
[This dataset was already contained in the ecoinvent database version 2. It was not individually updated during the transfer to ecoinvent version 3. Life Cycle Impact Assessment results may still have changed, as they are affected by changes in the supply chain, i.e. in other datasets. This dataset was generated following the ecoinvent quality guidelines for version 2. It may have been subject to central changes described in the ecoinvent version 3 change report (http://www.ecoinvent.org/database/ecoinvent-version-3/reports-of-changes/), and the results of the central updates were reviewed extensively. The changes added e.g. consistent water flows and other information throughout the database. The documentation of this dataset can be found in the ecoinvent reports of version 2, which are still available via the ecoinvent website. The change report linked above covers all central changes that were made during the conversion process.]

## Included activities end
Production of paste used in production of photovoltaic cells.

## Geography
Data for production in Europe.

## Technology
Assumption that production technology is similar as for solders.

## Time period
Data investigated in 2006.

## Reference product
- metallization paste, front side: 1 kg; By-product classification allocatable product; CPC 35499: Other chemical products n.e.c.; HS2017 321290: Pigments; of a kind used in the manufacture of paints, other than stamping foils
  EcoSpold01Location=RER
  production volume 2.67763 kg
    This is a placeholder value that does not reflect real-world production volumes. This dataset does not currently require a real-world production volume to work in the database framework, and no actual data were collected yet. This has no negative effect on the results of the ecoinvent database.
  property heating value, net 2.31 MJ
    LHV is calculated based on the Carbon content of the product. More details can be found on the respective documentation.
  property price 272.17 EUR2005
    Calculated based on inputs: The price of the product has been calculated as a sum of the values of the material and energy inputs for this product. This value is therefore a rough estimation. It may underestimate the real price since there are additional expenses when producing any product. These expences can include for example labour costs, treatment of waste materials and profit for the producer. Please consider carefully whether this level of data quality is acceptable for your application.
  properties: carbon allocation 0.0761136 kg, carbon content 0.0761136, carbon content, fossil 0.0761136, carbon content, non-fossil 0, dry mass 1 kg, water content 0, water in wet mass 0 kg, wet mass 1 kg

## Inputs from technosphere
- chemical, organic: 0.1212 kg; lognormal variance with pedigree 0.0441, pedigree (3,2,5,5,1)
  De Wild 2007, paste composition, 1% loss
  EcoSpold01Location=GLO
  Uncertainty: de Wild 2007, paste composition, 1% loss
  properties: carbon content, fossil 0.628, dry mass 1 kg, heating value, net 19.03 MJ, wet mass 1 kg
  note on carbon content, fossil: This dataset is an unweighted average of 20 organic substances (listed in Tab 88.1, ecoinvent v2.2 report 8, part II), being part of the top100 chemicals included in this database. The C-content has also been calculated as an unweighted average of the C content of the substances composing this dataset.
- electricity, medium voltage: 0.0083082, 0.16573, 0.0556848, 0.00254426, 0.00050923, 0.000109343, 0.0171142 kWh (7 suppliers, which the file names only by identifier); sum of these 0.25 kWh; lognormal variance with pedigree 0.122, pedigree (3,5,5,5,4)
  EcoSpold01Location=UCTE
  Estimation with data for solder production
  Uncertainty: Estimation with data for solder production
- heat, district or industrial, natural gas: 0.0120476, 0.733152 MJ (2 suppliers, which the file names only by identifier); sum of these 0.7452 MJ; lognormal variance with pedigree 0.122, pedigree (3,5,5,5,4)
  EcoSpold01Location=RER
  Estimation with data for solder production
  Uncertainty: Estimation with data for solder production
  properties: heating value, net 1 MJ
- lead: 0.0505 kg; lognormal variance with pedigree 0.0441, pedigree (3,2,5,5,1)
  EcoSpold01Location=RER
  De Wild 2007, paste composition, 1% loss, bismuth inventoried as lead.
  Uncertainty: de Wild 2007, paste composition, 1% loss, bismuth inventoried as lead.
  properties: dry mass 1 kg, wet mass 1 kg
- silver: 0.8383 kg; lognormal variance with pedigree 0.0441, pedigree (3,2,5,5,1)
  De Wild 2007, paste composition, 1% loss
  EcoSpold01Location=RER
  Uncertainty: de Wild 2007, paste composition, 1% loss
  properties: dry mass 1 kg, wet mass 1 kg
- solder factory: 2e-10 unit; lognormal variance with pedigree 0.448, pedigree (4,5,5,5,5)
  EcoSpold01Location=RER
  Esimation
  Uncertainty: Esimation

## Extrapolations
Other data investigated with information from solder production. This dataset has been copied from an original dataset covering the geography RER. The uncertainty has been adjusted accordingly.

## Review by Roberto Dones 2007-08-23
Passed.
none
