# auxiliary heating unit production, electric, 5kW

Dataset: EcoSpold 2, unit process
Geography: RoW
Time period: 1993-01-01 to 2023-12-31
Technology level: current
Classification: EcoSpold01Categories: solar collector systems/production of components
Classification: ISIC rev.4 ecoinvent: 2815:Manufacture of ovens, furnaces and furnace burners
Tags: ConvertedDataset
Scenario: Business-as-Usual
System model: Allocation, cut-off by classification
Generated by: Niels Jungbluth
Published in: Jungbluth, N. 2007
Database: ecoinvent
isCopyrightProtected: true
accessRestrictedTo: 1

## General comment
Heating with 5kW capacity which can be used as auxiliary heating for hot water in solar collector systems.
[This dataset was already contained in the ecoinvent database version 2. It was not individually updated during the transfer to ecoinvent version 3. Life Cycle Impact Assessment results may still have changed, as they are affected by changes in the supply chain, i.e. in other datasets. This dataset was generated following the ecoinvent quality guidelines for version 2. It may have been subject to central changes described in the ecoinvent version 3 change report (http://www.ecoinvent.org/database/ecoinvent-version-3/reports-of-changes/), and the results of the central updates were reviewed extensively. The changes added e.g. consistent water flows and other information throughout the database. The documentation of this dataset can be found in the ecoinvent reports of version 2, which are still available via the ecoinvent website. The change report linked above covers all central changes that were made during the conversion process.]

## Included activities end
Production and disposal of an electric heating. Including materials and energy use of production. Not including infrastructure for factory.

## Geography
Production in CH.

## Technology
Auxiliary heating used to provide additional heat in a solar collector system.

## Time period
Material data have been investigated for a collector produced in 2002. Data for energy uses during production have been investigated for 2001.

## Reference product
- auxiliary heating unit, electric, 5kW: 1 unit; By-product classification allocatable product; CPC 43430: Parts for the goods of subclasses 43410 and 43420; parts of non-electric bakery ovens; HS2017 841790: Furnaces and ovens; parts of non-electric furnaces and ovens (including incinerators), of industrial or lab[...]
  EcoSpold01Location=CH
  production volume 7244.07 unit
    0.000000065545 units per MJ
  property price 2.09345 EUR2005
    Calculated based on inputs: The price of the product has been calculated as a sum of the values of the material and energy inputs for this product. This value is therefore a rough estimation. It may underestimate the real price since there are additional expenses when producing any product. These expences can include for example labour costs, treatment of waste materials and profit for the producer. Please consider carefully whether this level of data quality is acceptable for your application.
  properties: carbon allocation 0 kg, carbon content 0

## Inputs from technosphere
- brazing solder, cadmium free: 0.03 kg; lognormal variance with pedigree 0.0526, pedigree (2,1,5,5,1)
  EcoSpold01Location=RER
  Questionnaire
  Uncertainty: Questionnaire
  properties: dry mass 1 kg, wet mass 1 kg
- cast iron: 0.3 kg; lognormal variance with pedigree 0.0526, pedigree (2,1,5,5,1)
  Questionnaire
  EcoSpold01Location=RER
  Uncertainty: Questionnaire
  properties: carbon content, fossil 0.04, dry mass 1 kg, wet mass 1 kg
  note on carbon content, fossil: Cast iron is made by remelting pig iron in small furnaces (e.g. cupola furnaces or electric arc furnaces) and poured into moulds to make castings. It usually contains 2% to 6% carbon (ecoinvent v2.2 report 10_partII). An average content of 4% was considered
- electricity, medium voltage: 0.0419003, 0.835818, 0.280832, 0.0128313, 0.00256818, 0.000551445, 0.0583626, 0.0863111, 0.180825 kWh (9 suppliers, which the file names only by identifier); sum of these 1.5 kWh; lognormal variance with pedigree 0.0526, pedigree (2,1,5,5,1)
  EcoSpold01Location=CH
  Questionnaire
  Uncertainty: Questionnaire
- hot water tank factory: 2e-7 unit; lognormal variance with pedigree 0.65, pedigree (5,5,5,5,5)
  EcoSpold01Location=CH
  Rough estimation
  Uncertainty: Rough estimation
- magnesium oxide: 0.2 kg; lognormal variance with pedigree 0.0526, pedigree (2,1,5,5,1)
  EcoSpold01Location=RER
  Questionnaire
  Uncertainty: Questionnaire
  properties: dry mass 1 kg, wet mass 1 kg
- silicone product: 0.012 kg; lognormal variance with pedigree 0.0526, pedigree (2,1,5,5,1)
  Questionnaire
  EcoSpold01Location=RER
  Uncertainty: Questionnaire
  properties: carbon content, fossil 0.324324, dry mass 1 kg, heating value, net 9.83 MJ, wet mass 1 kg
  note on carbon content, fossil: The term silicones is used for compounds in which silicon atoms are linked via oxygen atoms, each silicon atom bearing one or several organic groups. In industrially important silicones, these groups are usually methyl or phenyl (ecoinvent v2.2 report 8_part71 & Ullmann). The chemical formula was considered to be [Si(CH3)2O]n (Ullmann).
- steel, chromium steel 18/8, hot rolled: 1.09 kg; lognormal variance with pedigree 0.0526, pedigree (2,1,5,5,1)
  EcoSpold01Location=RER
  Questionnaire
  Uncertainty: Questionnaire
  properties: carbon content, fossil 0.0008, dry mass 1 kg, wet mass 1 kg
  note on carbon content, fossil: Stainless steel model is the grade 304 steel (18/8 stainless, 18% chromium 8% nickel; max. 0.08% C)
- waste plastic, industrial electronics: -0.212 kg; lognormal variance with pedigree 0.0146, pedigree (2,1,3,5,1)
  EcoSpold01Location=CH
  Questionnaire
  Uncertainty: Questionnaire
  production volume
    Calculated from the production volume of auxiliary heating unit, electric, 5kW in proportion to the respective output amounts.
  properties: carbon content, fossil 0.81386, dry mass 0.847 kg, heating value, net 34.78 MJ, water content 0.180638, wet mass 1 kg
  note on carbon content, fossil: C content in 1 kg DM was calculated using data in Tab A.2, ecoinvent v2.2 report 13_I

## Sampling procedure
Questionnaires.

## Extrapolations
Material uses for a heating with 25kW capacity can be estimated to be three times higher than for the 5kW heating. This dataset has been copied from an original dataset covering the geography CH. The uncertainty has been adjusted accordingly.

## Review by Sebastiano Meier 2003-07-07
Passed.
