# ammonium paratungstate production, solvent extraction

Dataset: EcoSpold 2, unit process
Geography: RoW
Time period: 1979-01-01 to 2023-12-31
Technology level: current
Classification: ISIC rev.4 ecoinvent: 2420:Manufacture of basic precious and other non-ferrous metals
Synonyms: APT
Scenario: Business-as-Usual
System model: Allocation, cut-off by classification
Generated by: Nora Minas
Published in: Furberg A. 2019
Database: ecoinvent
isCopyrightProtected: true
accessRestrictedTo: 1

## General comment
This dataset represents the production of 1 Kg ammonium paratungstate (APT) by hydrometallurgy. ATP has the chemical formula (NH4)10(H2W12O42) 4H2O and is the most important intermediate product for all tungsten products (Lassner et al. 2000). Due to lack of data, this dataset does not include any recycling processes. However, it should be noted that global tungsten recycling rates are between 10-24 % (after use) (Furberg et al. 2019). Considering tungsten scrap as an input will therefore impact this dataset significantly.
The data for this dataset is taken from a LCI provided by Furberg et al. (2019) which was build based on data from literature.
Furberg, A., Arvidsson, R., Molander, S., 2019. Environmental life cycle assessment of cemented carbide (WC-Co) production. J. Clean. Prod. 209, 1126-1138. https://doi.org/10.1016/j.jclepro.2018.10.272
Lassner, E., Schubert, W.-D., Lüderitz, E., Wolf, H.U., 2000. Tungsten, Tungsten Alloys, and Tungsten Compounds. In "Ullmann’s Encyclopedia of Industrial Chemistry". Wiley-VCH Verlag GmbH & Co. KGaA, Weinheim, Germany, pp. 1-53. https://doi.org/10.1002/14356007.a27_229

## Included activities start
The activity starts when the raw material enters the process

## Included activities end
This activity ends with the production of 1 Kg APT.

## Geography
This dataset represents APT production using solvent extraction (liquid ion extraction -LIX), which is the technology used globally with the exception of China where solid ion extraction is used instead (Lassner and Schubert 1999). Thus, this dataset represents global APT production excluding Chinese production.
Lassner, E., Schubert, W.-D., 1999. Tungsten "Ullmann’s Encyclopedia of Industrial Chemistry. Springer US, Boston, MA. https://doi.org/10.1007/978-1-4615-4907-9

## Technology
This dataset represents the production of APT using solvent extraction (liquid ion extraction -LIX). Digestion is performed with NaOH solution in the case of wolframite concnetrate and Na2CO3 solution in the case of scheelite concentrate in order to obtain a sodium tungstate (Na2WO4) solution. The sodium tungstate solution is purified by filtration and precipitation. Precipitation of dissolved silicates is carried out by adding aluminum sulfate solution or magnesium sulfate solution. Molybdenum and other elements forming insoluble sulfides (As, Sb, Bi, Pb, Fe, Ni, and Co) are precipitated by the addition of an excess of sodium hydrosulfide and acidification with sulfuric acid. Finally, the purified Na2WO4 solution is converted to ammonium tungstate solution using solvent extraction and APT is formed by crystallization
Furberg, A., Arvidsson, R., Molander, S., 2019. Environmental life cycle assessment of cemented carbide (WC-Co) production. J. Clean. Prod. 209, 1126-1138. https://doi.org/10.1016/j.jclepro.2018.10.272
Lassner, E., Schubert, W.-D., Lüderitz, E., Wolf, H.U., 2000. Tungsten, Tungsten Alloys, and Tungsten Compounds. In "Ullmann’s Encyclopedia of Industrial Chemistry". Wiley-VCH Verlag GmbH & Co. KGaA, Weinheim, Germany, pp. 1-53. https://doi.org/10.1002/14356007.a27_229

## Time period
Inputs for water used for washing and inputs related to solvent extraction (organic solvent, H2SO4 so-lution, deionized H2O and NH3) are based on a publication from 1979: Yih, S.W.H., Wang, C.T., 1979. Tungsten - Sources, Metallurgy, Properties and Applications.

## Reference product
- ammonium paratungstate: 1 kg; name Amount_APT; source Furberg A.  2019; By-product classification allocatable product; CPC 41601: Tungsten, molybdenum, tantalum, magnesium, cobalt, cadmium, titanium, zirconium, beryllium, gallium, hafnium, […]; HS2017 8101: Tungsten (wolfram); articles thereof, including waste and scrap; CAS 11120-25-5
  production volume 9.41898e6 kg; name PV_APT; = ((65000/0.7018)-62000)*1000
    According to Leal-Ayala et al. (2015) the global APT production in 2010 was 65000 t (metric tonnes of tungsten content). Liedtke and Schmidt (2014) report a Chinese APT production of 62.000 t in 2010. Tungsten content in APT is 70.18 % ( equals 88.5 % WO3)
  property tungsten content 0.718327; = (0.885*0.793)/0.977
    tungsten content on a dry matter basis. According to Ma et al. (2017) APT has a WO3 content of 0.885. The conversion factor from WO3 to W is 0.793
  properties: carbon allocation 0 kg, carbon content 0, carbon content, fossil 0, carbon content, non-fossil 0, dry mass 0.977 kg, price 25.6 EUR2005, water content 0.0235415, water in wet mass 0.023 kg, wet mass 1 kg

## Inputs from technosphere
- aluminium sulfate, powder: 0.036 kg; source Furberg A.  2019; lognormal variance with pedigree 0.0439, pedigree (2,4,5,3,2)
  Used for silica precipitation and removal of other impurities
  properties: dry mass 1 kg, wet mass 1 kg
- ammonia, anhydrous, liquid: 0.0053426, 0.0103711, 0.114957, 0.00485929, 0.001087, 0.0399492, 0.00343411 kg (7 suppliers, which the file names only by identifier); sum of these 0.18 kg; source Furberg A.  2019; lognormal variance with pedigree 0.0453, pedigree (3,4,5,3,2)
  Addition of ammonia for stripping
  properties: dry mass 1 kg, wet mass 1 kg
- chemical, organic: 0.1 kg; source Furberg A.  2019; lognormal variance with pedigree 0.0453, pedigree (3,4,5,3,2)
  Proxy for Alamine 336
  Organic solvent (7.3% alamine 336, 7.4% decanol and 85% kerosene) used for solvent extraction
  properties: carbon content, fossil 0.628, dry mass 1 kg, heating value, net 19.03 MJ, wet mass 1 kg
  note on carbon content, fossil: This dataset is an unweighted average of 20 organic substances (listed in Tab 88.1, ecoinvent v2.2 report 8, part II), being part of the top100 chemicals included in this database. The C-content has also been calculated as an unweighted average of the C content of the substances composing this dataset.
- electricity, medium voltage: 0.000599492, 0.000897376, 0.00028349, 0.00527683, 0.0030971, 0.00367192, 0.0446014, 0.000106375, 0.889698, 0.000495807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 kWh (46 suppliers, which the file names only by identifier); sum of these 1.3 kWh; source Furberg A.  2019; lognormal variance with pedigree 0.0444, pedigree (2,4,5,4,2)
- fatty alcohol: 0.1 kg; source Furberg A.  2019; lognormal variance with pedigree 0.0453, pedigree (3,4,5,3,2)
  Proxy for decanol.
  Organic solvent (7.3% alamine 336, 7.4% decanol and 85% kerosene) used for solvent extraction
  properties: carbon content, fossil 0.0408973, carbon content, non-fossil 0.743434, dry mass 1 kg, heating value, net 41.01 MJ, wet mass 1 kg
- inert waste: -1.02745 kg; name Amount_inert_waste; lognormal variance with pedigree 0.0518, pedigree (4,4,5,4,2)
  Proxy for undissolved gangue, insoluble reactioncompounds, precipitates and lost tungsten.Assuming 70 % input from scheelite concentrate and 30 % input from wolframite concentrate. Value adjusted in order to maintain mass balance.
  production volume; = PV_APT * ( Amount_inert_waste/ Amount_APT)
    Calculated from production volume of reference product using the relative outputs.
  properties: dry mass 1 kg, tungsten content 0.00966351, wet mass 1 kg
  note on tungsten content: tungsten content on a dry matter basis.Calculated value in order to maintain tungsten balance.
- kerosene: 1.01231, 0.00759884, 0.00598466, 0.00974728, 0.113768, 0.03586, 0.0147268 kg (7 suppliers, which the file names only by identifier); sum of these 1.2 kg; source Furberg A.  2019; lognormal variance with pedigree 0.0453, pedigree (3,4,5,3,2)
  Organic solvent (7.3% alamine 336, 7.4% decanol and 85% kerosene) used for solvent extraction
  properties: carbon content, fossil 0.85, dry mass 1 kg, heating value, net 43 MJ, wet mass 1 kg
- magnesium sulfate: 0.013 kg; source Furberg A.  2019; lognormal variance with pedigree 0.0439, pedigree (2,4,5,3,2)
  Used for silica precipitation and removal of other impurities
  properties: dry mass 1 kg, wet mass 1 kg
- non-ferrous metal smelter: 7.54717e-12 unit; = 1/((2650000*1000)*50); source Classen M. 2009; lognormal variance with pedigree 0.398, pedigree (4,5,5,5,4)
  Proxy: "non-ferrous metal smelter" is used as a proxy for unspecified infrastructure for APT production.Assumptions: Output=2650000 t/a, lifetime=50 a
- soda ash, light: 2.14536 kg; = 0.98/0.4568; source Furberg A.  2019; lognormal variance with pedigree 0.0439, pedigree (2,4,5,3,2)
  Assuming 70 % input from scheelite concentrate and 30 % input from wolframite concentrate. 0.98 Kg Sodium carbonate per Kg of APT.
  Used for sodium carbonate digestion: Leaching of sheelite concentrate
  properties: carbon content, fossil 0.0517241, dry mass 1 kg, heating value, net 3.43 MJ, wet mass 1 kg
- sodium hydrosulfide: 0.045533 kg; source Furberg A.  2019; lognormal variance with pedigree 0.0119, pedigree (2,4,4,3,2)
  Assuming 70 % input from scheelite concentrate and 30 % input from wolframite concentrate.
  Used for molybdenum precipitation
  properties: dry mass 1 kg, wet mass 1 kg
- sodium hydroxide, without water, in 50% solution state: 0.048 kg; source Furberg A.  2019; lognormal variance with pedigree 0.0439, pedigree (2,4,5,3,2)
  Used for sodium hydroxide digestion: Leaching of wolframite concentrate
  properties: dry mass 1 kg, heating value, net 3.03 MJ, wet mass 1 kg
- spent solvent mixture: -0.0196756, -2.14932 kg (2 suppliers, which the file names only by identifier); sum of these -2.169 kg; source Furberg A.  2019; lognormal variance with pedigree 0.0453, pedigree (3,4,5,3,2)
  Represents the output of kerosene, decanol and alamine 336 as well as the ouput of 0.769 Kg sodium sulfate formed during solvent extraction and silica and molybdenum precipitation.
  production volume; = PV_APT * ( Amount_spent_solvent_mix / Amount_APT)
    Calculated from production volume of reference product using the relative outputs.
  properties: carbon content, fossil 0.522114, carbon content, non-fossil 0.0342754, dry mass 1 kg, heating value, net 21.7 MJ, wet mass 1 kg
  note on carbon content, non-fossil: Content has been calculated based on the carbon content of the inputs kerosene, fatty alcohol and chemical, organic.
  note on heating value, net: Value taken from the general comment of the treatment dataset.
- sulfuric acid: 0.48253 kg; source Furberg A.  2019; lognormal variance with pedigree 0.0439, pedigree (2,4,5,3,2)
  Assuming 70 % input from scheelite concentrate and 30 % input from wolframite concentrate.
  Used for molybdenum precipitation and solvent extraction
  properties: dry mass 1 kg, wet mass 1 kg
- tungsten concentrate: 1.4 kg; lognormal variance with pedigree 0.0453, pedigree (3,4,5,3,2)
  Assuming 70 % input from scheelite concentrate and 30 % input from wolframite concentrate. Original values from Furberg et al. (2019) were adapted assuming a W content of 51.5 % (corresponds to W content of marketable concentrate)
  properties: carbon content, fossil 0.0146398, dry mass 1 kg, tungsten content 0.515, wet mass 1 kg
- wastewater from ammonium paratungstate production: -0.00398703, -0.020398 m3 (2 suppliers, which the file names only by identifier); sum of these -0.024385 m3; lognormal variance with pedigree 0.0513, pedigree (4,4,5,3,2)
  Effluent resulting from APT production. Value adjusted in order to maintain mass balance.
  production volume; = PV_APT * ( Amount_WW / Amount_APT)
    Calculated from production volume of reference product using the relative outputs.
  properties: carbon content, fossil 0.688834, dry mass 0.33748 kg, tungsten content 1.12599, water content 2962.14, wet mass 1000 kg
  note on carbon content, fossil: fossil carbon content on a dry matter basis. Carbon content fossil was approximated with the TOC value. The TOC value was estimated based on the COD value (0.537 Kg/m3) with a conversion factor of 2.31 as documented in Tab 4.10 of the ecoinvent v2.2 report 13_IV. TOC was considered as Total Carbon.
  note on tungsten content: tungsten content on a dry matter basis. Tungsten content in the wastewater is 0.38 kg/m3 (Cao et al., 2019).
- water, deionised: 0.00664587, 5.99335 kg (2 suppliers, which the file names only by identifier); sum of these 6 kg; source Furberg A.  2019; lognormal variance with pedigree 0.0453, pedigree (3,4,5,3,2)
  Represents deionised water used for washing.
  properties: wet mass 1 kg

## Inputs from nature
- Water, well, in ground [natural resource, in water]: 0.0172401 m3; name water_well_in_ground; source Furberg A.  2019; lognormal variance with pedigree 0.0439, pedigree (2,4,5,3,2)
  Represents water used for washing and water input for sodium carbonate digestion, silica and molybdenum precipitation, and solvent extraction.

## Emissions to nature
- Ammonia [air, non-urban air or from high stacks]: 0.1082 kg; source Furberg A.  2019; lognormal variance with pedigree 0.0833, pedigree (2,4,5,3,2)
  Assuming 70 % input from scheelite concentrate and 30 % input from wolframite concentrate.
  Emissions during solvent extraction
- Carbon dioxide, fossil [air, non-urban air or from high stacks]: 0.294 kg; source Furberg A.  2019; lognormal variance with pedigree 0.0439, pedigree (2,4,5,3,2)
  Emissions from silica and molybdenum precipitation
- Hydrogen sulfide [air, non-urban air or from high stacks]: 0.00308219 kg; source Furberg A.  2019; lognormal variance with pedigree 0.0833, pedigree (2,4,5,3,2)
  Assuming 70 % input from scheelite concentrate and 30 % input from wolframite concentrate.
  Emissions from molybdenum precipitation

## Sampling procedure
Based on literature data:

Furberg, A., Arvidsson, R., Molander, S., 2019. Environmental life cycle assessment of cemented carbide (WC-Co) production. J. Clean. Prod. 209, 1126-1138. https://doi.org/10.1016/j.jclepro.2018.10.272
