# offshore platform production, petroleum

Dataset: EcoSpold 2, unit process
Geography: GLO
Time period: 1990-01-01 to 2023-12-31
Technology level: current
Classification: ISIC rev.4 ecoinvent: 3011:Building of ships and floating structures
Classification: EcoSpold01Categories: oil/production
Tags: ConvertedDataset
Scenario: Business-as-Usual
System model: Allocation, cut-off by classification
Generated by: Niels Jungbluth
Published in: Jungbluth, N. 2007
Database: ecoinvent
isCopyrightProtected: true
accessRestrictedTo: 1

## General comment
Construction and dismantling of an offshore production platform with a weight of 2500t. Life time 15 years.
[This dataset was already contained in the ecoinvent database version 2. It was not individually updated during the transfer to ecoinvent version 3. Life Cycle Impact Assessment results may still have changed, as they are affected by changes in the supply chain, i.e. in other datasets. This dataset was generated following the ecoinvent quality guidelines for version 2. It may have been subject to central changes described in the ecoinvent version 3 change report (http://www.ecoinvent.org/database/ecoinvent-version-3/reports-of-changes/), and the results of the central updates were reviewed extensively. The changes added e.g. consistent water flows and other information throughout the database. The documentation of this dataset can be found in the ecoinvent reports of version 2, which are still available via the ecoinvent website. The change report linked above covers all central changes that were made during the conversion process.]

## Included activities end
Materials for construction, energy use for erection. Land use and transformation. Disposal of the platform after use. Wells are not included and are considered separately. Manufacturing of facilities partly not included.

## Geography
Type of platform used in the North Sea.

## Technology
Mix of 80% steel and 20% concrete platforms.

## Time period
Data for materials based on information from 1990. New data for energy and material uses during construction.

## Parameters
- fraction, process water, to air: 0.15 dimensionless; name fraction_PW_to_air; lognormal variance with pedigree 0.092025, pedigree (4,4,3,2,4)
  Literature value. In case when no industry/process specific data are available, default evaporation fraction value is used. This value is 15% and is based on literature (Statistics Canada, 2007 & Shaffer, K.H., 2008, Consumptive water use in the Great Lakes Basin, USGS & Shiklomanov, 2003, World Water Resources at the Beginning of the 21st Century) and has been approved by an expert.

## Reference product
- offshore platform, petroleum: 1 unit; By-product classification allocatable product; CPC 49320: Floating or submersible drilling or production platforms
  production volume 1 unit
    In 1998 there were 263 production platforms in use in the North Sea.
    Dummy value to be replaced by measured, estimated or calculated value
  property price 2.45609e9 EUR2005
    Calculated based on literature; http://www.osti.gov/energycitations/product.biblio.jsp?osti_id=5423926 report that at 1982 the most expensive offshore platform (Magnus Steel-Template-Jacket Platform) costed roughly 2.6 billion USD (with a weight of 41000 tons). The ecoinvent platform weights roughly 27000 tons, i.e. roughly 65% of that platform. On this basis we calculated the basic price of the offshore platform by (i) adjusting for inflation (for USD between 1982 and 2005 roughly a factor 2), (ii) dividing by exchange rate to Euro (1.35 USD/EURO) and (iii) assuming a linear relationship between price and mass (i.e. multiplying with the factor of 0.65). For triangulation: http://www.offshore-mag.com/articles/print/volume-71/issue-6/subsea/safety-cost-drive-oil-and-gas-production-to-the-seabed.html reports that "it typically costs more than $1 billion to operate a production platform over a 10 to 20-year life cycle". That is, with an average life time of 50 years we are roughly in the correct order of magnitude.
  properties: carbon allocation 0 kg, carbon content 0

## Inputs from technosphere
- aluminium, cast alloy: 136000 kg; lognormal variance with pedigree 1.448, pedigree (5,5,5,1,1)
  Estimation for aluminium anode, basic uncertainity estimated = 10
  Uncertainty: E
  properties: dry mass 1 kg, wet mass 1 kg
- cast iron: 173 kg; lognormal variance with pedigree 1.448, pedigree (5,5,5,1,1)
  Estimation for aluminium anode, basic uncertainity estimated = 10
  Uncertainty: E
  properties: carbon content, fossil 0.04, dry mass 1 kg, wet mass 1 kg
  note on carbon content, fossil: Cast iron is made by remelting pig iron in small furnaces (e.g. cupola furnaces or electric arc furnaces) and poured into moulds to make castings. It usually contains 2% to 6% carbon (ecoinvent v2.2 report 10_partII). An average content of 4% was considered
- concrete, normal strength: 614 m3; lognormal variance with pedigree 0.0427, pedigree (3,3,5,3,1)
  Literature
  Uncertainty: L
  properties: dry mass 2190 kg, water content 0.086758, wet mass 2380 kg
- copper, cathode: 8.64 kg; lognormal variance with pedigree 1.448, pedigree (5,5,5,1,1)
  Estimation for aluminium anode, basic uncertainity estimated = 10
  Uncertainty: E
  properties: dry mass 1 kg, wet mass 1 kg
- diesel, burned in building machine: 1.65e7 MJ; lognormal variance with pedigree 0.16, pedigree (1,1,5,1,1)
  Environmental report, plus 25% for disposal
  properties: heating value, net 1 MJ
- electricity, medium voltage: 9.18e6 kWh; lognormal variance with pedigree 0.34, pedigree (1,1,5,1,1)
  Estimation, plus 25% for disposal
- hazardous waste, for incineration: -31805.2, -15295, -399.802 kg (3 suppliers, which the file names only by identifier); sum of these -47500 kg; lognormal variance with pedigree 0.0007, pedigree (1,3,1,3,1)
  Environmental report
  Uncertainty: E
  production volume
    Calculated from the production volume of offshore platform, petroleum in proportion to the respective output amounts.
  properties: carbon content, fossil 0.554667, dry mass 0.75 kg, heating value, net 17 MJ, water content 0.333333, wet mass 1 kg
  note on carbon content, fossil: Tab A.6, ecoinvent v2.2 report 13_I. C content has been calculated after data in the tables, and then referred to 1 kg DM
  note on heating value, net: Value taken from the general comment of the treatment dataset.
- municipal solid waste: -1735.87, -89.1394, -10.5849, -67.2535, -65.8779, -50292.4, -7.40691, -2.37749, -5.37377, -223.712 kg (10 suppliers, which the file names only by identifier); sum of these -52500 kg; lognormal variance with pedigree 0.0007, pedigree (1,3,1,3,1)
  Environmental report
  Uncertainty: E
  production volume
    (same comment as for hazardous waste, for incineration)
  properties: carbon content, fossil 0.171549, carbon content, non-fossil 0.261655, dry mass 0.771 kg, heating value, net 11.74 MJ, water content 0.297017, wet mass 1 kg
  note on carbon content, fossil: MSW composition in tab 4.1, ecoinvent v2.2 report 13_I. C content referred to 1 kg DM
- silicon, metallurgical grade: 216 kg; lognormal variance with pedigree 1.448, pedigree (5,5,5,1,1)
  Estimation for aluminium anode, basic uncertainity estimated = 10
  Uncertainty: E
  properties: dry mass 1 kg, wet mass 1 kg
- steel, chromium steel 18/8, hot rolled: 7510 kg; lognormal variance with pedigree 0.0427, pedigree (3,3,5,3,1)
  Literature
  Uncertainty: L
  properties: carbon content, fossil 0.0008, dry mass 1 kg, wet mass 1 kg
  note on carbon content, fossil: Stainless steel model is the grade 304 steel (18/8 stainless, 18% chromium 8% nickel; max. 0.08% C)
- steel, low-alloyed, hot rolled: 1.14e6 kg; lognormal variance with pedigree 0.0427, pedigree (3,3,5,3,1)
  Literature
  Uncertainty: L
  properties: carbon content, fossil 0.005, dry mass 1 kg, wet mass 1 kg
  note on carbon content, fossil: Low alloyed steel composition given in Tab. 3.2 ecoinvent v2.2 report 10_partII. Steel assumed to have a C content of 0.5%
- waste concrete: -92242.2, -1.25743e6, -326.132 kg (3 suppliers, which the file names only by identifier); sum of these -1.35e6 kg; lognormal variance with pedigree 0.0029, pedigree (3,3,2,3,1)
  Estimation
  Uncertainty: E
  production volume
    (same comment as for hazardous waste, for incineration)
  properties: dry mass 0.5 kg, water content 1, wet mass 1 kg
- zinc: 7200 kg; lognormal variance with pedigree 1.448, pedigree (5,5,5,1,1)
  Estimation for aluminium anode, basic uncertainity estimated = 10
  Uncertainty: E
  properties: dry mass 1 kg, wet mass 1 kg

## Inputs from nature
- Occupation, industrial area [natural resource, land]: 15000 m2*year; lognormal variance with pedigree 0.2321, pedigree (5,4,5,3,1)
  Life time 15a
  Uncertainty: L
- Occupation, seabed, infrastructure [natural resource, land]: 45000 m2*year; lognormal variance with pedigree 0.1521, pedigree (5,4,5,3,1)
  Life time 15a
  Uncertainty: L
- Transformation, from seabed, unspecified [natural resource, land]: 3000 m2; lognormal variance with pedigree 0.2321, pedigree (5,4,5,3,1)
  Literature
  Uncertainty: L
- Transformation, from unspecified [natural resource, land]: 1000 m2; lognormal variance with pedigree 0.2321, pedigree (5,4,5,3,1)
  Literature
  Uncertainty: L
- Transformation, to industrial area [natural resource, land]: 1000 m2; lognormal variance with pedigree 0.2321, pedigree (5,4,5,3,1)
  Literature
  Uncertainty: L
- Transformation, to seabed, infrastructure [natural resource, land]: 3000 m2; lognormal variance with pedigree 0.2321, pedigree (5,4,5,3,1)
  Literature
  Uncertainty: L
- Water, unspecified natural origin [natural resource, in water]: 111 m3; name water_UNO_input; lognormal variance with pedigree 0.0407, pedigree (1,3,5,3,1)
  Environmental report
  Uncertainty: E

## Emissions to nature
- Water [air, unspecified]: 16.65 m3; name water_to_air_unspecified; = (water_UNO_input*fraction_PW_to_air); lognormal variance with pedigree 0.0807, pedigree (2,2,5,1,1)
  Calculated value based on literature values and expert opinion. See comments in the parametres' comment field.
  property fraction, origin: fresh water 0; name fraction_origin_fresh_water
  property fraction, origin: salt water 0; name fraction_origin_salt_water
  property fraction, origin: unspecified 1; name fraction_origin_unspecified
- Aluminium III [water, ocean]: 116000 kg; lognormal variance with pedigree 1.448, pedigree (5,5,5,1,1)
  Estimation 85% utilisation of anode
  Uncertainty: E
- Copper ion [water, ocean]: 7.34 kg; lognormal variance with pedigree 1.448, pedigree (5,5,5,1,1)
  Estimation 85% utilisation of anode
  Uncertainty: E
- Iron ion [water, ocean]: 147 kg; lognormal variance with pedigree 1.448, pedigree (5,5,5,1,1)
  Estimation 85% utilisation of anode
  Uncertainty: E
- Silicon [water, ocean]: 184 kg; lognormal variance with pedigree 1.448, pedigree (5,5,5,1,1)
  Estimation 85% utilisation of anode
  Uncertainty: E
- Titanium ion [water, ocean]: 30.6 kg; lognormal variance with pedigree 1.448, pedigree (5,5,5,1,1)
  Estimation 85% utilisation of anode
  Uncertainty: E
- Water [water, unspecified]: 94.35 m3; name water_to_water_unspecified; = water_UNO_input*(1-fraction_PW_to_air); lognormal variance with pedigree 0.0807, pedigree (2,2,5,1,1)
  (same comment as for Water)
  property carbon content, fossil 0; name C_content_fossil
  property carbon content, non-fossil 0; name C_content_non_fossil
  property dry mass 0 kg; name DM
  property fraction, origin: fresh water 0; name fraction_origin_fresh_water_Ww
  property fraction, origin: salt water 0; name fraction_origin_salt_water_Ww
  property fraction, origin: unspecified 1; name fraction_origin_unspecified_Ww
  property water in wet mass 1000 kg; name WWM
  property wet mass 1000 kg; name WM
- Zinc II [water, ocean]: 6120 kg; lognormal variance with pedigree 1.448, pedigree (5,5,5,1,1)
  Estimation 85% utilisation of anode
  Uncertainty: E

## Sampling procedure
Publication in environmental reports and other literature.

## Extrapolations
Applied on all offshore operations. There might be differences depending on depth of sea.

## Review by Michael Spielmann (obsolete) 2003-07-30
Passed.
