# soybean production

Dataset: EcoSpold 2, unit process
Geography: IN
Time period: 2015-01-01 to 2023-12-31
Technology level: current
Classification: ISIC rev.4 ecoinvent: 0111:Growing of cereals (except rice), leguminous crops and oil seeds
Scenario: Business-as-Usual
System model: Allocation, cut-off by classification
Generated by: Sanjeevan Bajaj
Database: ecoinvent
isCopyrightProtected: true
accessRestrictedTo: 1

## General comment
This dataset represents the production of 1 kg of Soybean during May-October, 2016 at a farm located in District Indore, Madhya Pradesh State of India. Madhya Pradesh accounts for 57.09% of total soybean production in India during 2015-16. The farm has a yield of 27,500 kg fresh matter per ha for this crop cycle. Sowing date for the crop is 28-May, 2016 and harvesting date is 01-October, 2016. Mineral NPK fertilizer input is 24.6-32.94-24 kg/ha. Organic fertilizer used is solid manure from cattle 12,500 kg/ha. Herbicides used have active ingredients as Imazethapyr 1183.33g/ha (proxy used is Metolachlor), Chlorimuran ethyl 6.25g/ha (proxy used is Alachlor), Quizolofop ethyl 90g/ha, Imazamox 350g/ha. Fungicides used have active ingredients of Carbendazin 945.0g/ha, Mancozeb 409.5g/ha. Insecticides used have active ingredients of Triazophose 275g/ha, Emamectine benzote 12.5g/ha. Machinery is used only for soil cultivation with fuel consumption of 20.8 kg/ha for soil tillage and fuel consumption of 7.8 kg/ha is used for sowing.

## Included activities start
This activity starts about four weeks after the harvest of the previous crop. The soil is prepared for cultivation in first week of May and sowing of seeds started about three weeks after soil preparation. Thereafter the crop is mature for harvesting in about 4 months.

## Included activities end
The activity ends with the harvesting of the mature Soybean from the Soybean plant

## Geography
District -Indore, State-Madhya Pradesh Country-India

## Technology
Cultivation of Soybean follows conventional production standards

## Time period
Soil cultivating date for the main crop: 06-May, 2016; Harvesting date main crop: 01-October, 2016. The soil cultivation, sowing and harvesting dates are taken as the middle date of the week or fortnight told to the data collector by the farmer. Total time from date of sowing to date of harvesting comes to 115 days. The data is collected for one crop cycle. The cycle of one year is considered for entry in ecoeditor.

## Parameters
- LUC_crop_specific: 1 dimensionless
  This parameter allows to switch between a "crop specific" and a "country specific" approach when calculating the LUC of a crop. By default, the chosen approach is "crop specific", so the value of the parameter is 1. If you want to apply a "country specific" approach, turn the parameter to 0.

## Reference product
- soybean: 1 kg; By-product classification allocatable product; CPC 01412: Soya beans, other; HS2017 120110: Soya beans; seed, whether or not broken
  production volume 8.6e9 kg; = 8600*1000*1000
    The value is given in thousand tonnes. 1000 has been multiplied to convert it into Kgs. The data was for state Madhya Pradesh for year 2015-2016.Source: http://agriexchange.apeda.gov.in/India%20Production/India_Productions.aspx?cat=Agri&hscode=1014
  property price 0.239 EUR2005
    Calculated value based on data from United Nations Commodity Trade Statistics Database (comtrade.un.org). UN comtrade category: 1201 Soya beans. Using exchange rate of 1EURO = 1.209 USD. Average of price of import into 5 main markets (EU, US, JP, IN and CN).
  properties: carbon allocation 0 kg, carbon content 0

## Inputs from technosphere
- [sulfonyl]urea-compound: 4.54545e-7 kg; lognormal variance with pedigree 0.0052, pedigree (2,4,3,1,1)
  The data was collected for a hectare area through interview
  properties: carbon content, fossil 0.540853, dry mass 1 kg, wet mass 1 kg
- acetamide-anillide-compound, unspecified: 2.27273e-7 kg; lognormal variance with pedigree 0.0052, pedigree (2,4,3,1,1)
  The data was collected for a hectare area through interview
  properties: carbon content, fossil 0.659175, dry mass 1 kg, wet mass 1 kg
- benzimidazole-compound: 3.43636e-5 kg; lognormal variance with pedigree 0.0052, pedigree (2,4,3,1,1)
  The data was collected for a hectare area through interview
  properties: carbon content, fossil 0.529668, dry mass 1 kg, wet mass 1 kg
- benzoic-compound: 1.27273e-5 kg; lognormal variance with pedigree 0.0052, pedigree (2,4,3,1,1)
  The data was collected for a hectare area through interview
  properties: carbon content, fossil 0.405853, dry mass 1 kg, wet mass 1 kg
- diesel, burned in agricultural machinery: 0.0105523 MJ; lognormal variance with pedigree 0.0052, pedigree (2,4,3,1,1)
  The data was collected for a hectare area through interview
- diphenylether-compound: 3.27273e-6 kg; lognormal variance with pedigree 0.0052, pedigree (2,4,3,1,1)
  The data was collected for a hectare area through interview
  properties: carbon content, fossil 0.560061, dry mass 1 kg, wet mass 1 kg
- inorganic nitrogen fertiliser, as N: 0.0003936 kg; lognormal variance with pedigree 0.0052, pedigree (2,4,3,1,1)
  The data was collected for a hectare area through interview
  properties: dry mass 1 kg, wet mass 1 kg
- inorganic phosphorus fertiliser, as P2O5: 0.00119782 kg; lognormal variance with pedigree 0.0052, pedigree (2,4,3,1,1)
  This exchange is an aggregation of amounts:
  1.9165090909090907E-4. Comment:
  0.0010061672727272725. Comment:
  properties: dry mass 1 kg, wet mass 1 kg
- land use change, annual crop: 1.32447e-5 ha; = (0.3642297012205075 * LUC_crop_specific + 0.03849770732375295 * (1-LUC_crop_specific))/27500
  Calculated Value. This value has been calculated by using the ecoinvent LCI calculation tool for crop production.
- mancozeb: 1.48909e-5 kg; lognormal variance with pedigree 0.0052, pedigree (2,4,3,1,1)
  The data was collected for a hectare area through interview
  properties: carbon content, fossil 0.17759, dry mass 1 kg, wet mass 1 kg
- manure, solid, cattle: 0.454545 kg; lognormal variance with pedigree 0.0052, pedigree (2,4,3,1,1)
  The data was collected for a hectare area through interview
  properties: carbon content, non-fossil 0.441, dry mass 0.22 kg, water content 3.5454, wet mass 1 kg
- metolachlor: 4.30302e-5 kg; lognormal variance with pedigree 0.0052, pedigree (2,4,3,1,1)
  The data was collected for a hectare area through interview
  properties: carbon content, fossil 0.633803, dry mass 1 kg, wet mass 1 kg
- organophosphorus-compound, unspecified: 1e-5 kg; lognormal variance with pedigree 0.0052, pedigree (2,4,3,1,1)
  Home made compos. The data was collected for a hectare area through interview
  properties: carbon content, fossil 0.260898, dry mass 1 kg, wet mass 1 kg
- packaging, for fertilisers: 0.00593018 kg; lognormal variance with pedigree 0.0532, pedigree (4,3,3,5,4)
  Total amount of active substance/s of fertilisers needed for the production of 'soybean' is calculated to be circa 2.97E-03 kg. Fertiliser/s used in this dataset is/are: 'nitrogen fertiliser, as N', 'phosphate fertiliser, as P2O5', 'potassium chloride, as K2O', 'urea, as N'. The total amount of active substance/s is doubled in order to account for the packaging of the dilluted product of fertiliser/s that is/are applied. Therefore, 5.93E-03 kg of packaging for fertilisers is justified with this exchange.
  properties: carbon content, fossil 0.825301, dry mass 1 kg, heating value, net 25.01 MJ, price 0.0642 EUR2005, wet mass 1 kg
  note on carbon content, fossil: Considering a chemical formula (C2H4)n for polyethylene, carbon content-fossil is calculated to be 0.856286 kg of Carbon per kg of dry mass.
- packaging, for pesticides: 0.000517933 kg; lognormal variance with pedigree 0.0532, pedigree (4,3,3,5,4)
  Total amount of active substance/s of pesticides needed for the production of soybean is calculated to be circa 2.59E-04 kg. Pesticide/s used in this dataset is/are: '[sulfonyl]urea-compound', 'acetamide-anillide-compound, unspecified', 'benzimidazole-compound', 'benzoic-compound', 'diphenylether-compound', 'mancozeb', 'metolachlor', 'organophosphorus-compound, unspecified', 'sulfite'. The total amount of active substance/s is doubled in order to account for the packaging of the dilluted product of pesticide/s that is/are applied. Therefore, 5.18E-04 kg of packaging for pesticides is justified with this exchange.
  properties: carbon content, fossil 0.85714, dry mass 1 kg, heating value, net 25.97 MJ, price 0.0642 EUR2005, wet mass 1 kg
- potassium chloride: 0.00138144 kg; lognormal variance with pedigree 0.0052, pedigree (2,4,3,1,1)
  The exchange has been updated from 'potassium chloride, as K2O' into 'potassium chloride' and therefore its amount has been scaled (multiplied) from 0.0009 kg by 1.5829 kg of 'potassium chloride' per kg of 'potassium chloride, as K2O'. Original comment of the exchange is: The data was collected for a hectare area through interview
  properties: dry mass 1 kg, wet mass 1 kg
- sowing: 7.42504e-5 ha; lognormal variance with pedigree 0.0052, pedigree (2,4,3,1,1)
  The data was collected for a hectare area through interview
- soybean seed, for sowing: 0.00227273 kg; lognormal variance with pedigree 0.0052, pedigree (2,4,3,1,1)
  The data was collected for a hectare area through interview
  property carbon content, non-fossil 0.43596; name C_content_non_fossil
  property dry mass 0.89 kg; name DM; = WM- WWM
  property water content 0.123596; name water_content; = WWM/ DM
  property water in wet mass 0.11 kg; name WWM
  property wet mass 1 kg; name WM
- sulfite: 0.00014 kg; lognormal variance with pedigree 0.0052, pedigree (2,4,3,1,1)
  S total of 3.85 kg has been applied as superphosphate
  properties: dry mass 1 kg, wet mass 1 kg
- tillage, ploughing: 1.99958e-5 ha; lognormal variance with pedigree 0.0052, pedigree (2,4,3,1,1)
  The data was collected for a hectare area through interview
- urea: 0.00107393 kg; lognormal variance with pedigree 0.0052, pedigree (2,4,3,1,1)
  The exchange has been updated from 'urea, as N' into 'urea' and therefore its amount has been scaled (multiplied) from 0.0005 kg by 2.1438 kg of 'urea' per kg of 'urea, as N'. Original comment of the exchange is: The data was collected for a hectare area through interview
  properties: carbon content, fossil 0.2, dry mass 1 kg, wet mass 1 kg

## Inputs from nature
- Carbon dioxide, in air [natural resource, in air]: 2.22386 kg; lognormal variance with pedigree 0.0052, pedigree (2,4,3,1,1)
  (same comment as for land use change, annual crop)
- Energy, gross calorific value, in biomass [natural resource, biotic]: 20.4522 MJ; lognormal variance with pedigree 0.0052, pedigree (2,4,3,1,1)
  The data was collected for a hectare area through interview
- Occupation, annual crop, non-irrigated [natural resource, land]: 0.181818 m2*year; lognormal variance with pedigree 0.0066, pedigree (2,4,3,1,1)
  The data was collected for a hectare area through interview
- Transformation, from annual crop, non-irrigated [natural resource, land]: 0.363636 m2; lognormal variance with pedigree 0.0126, pedigree (2,4,3,1,1)
  The data was collected for a hectare area through interview
- Transformation, to annual crop, non-irrigated [natural resource, land]: 0.363636 m2; lognormal variance with pedigree 0.0126, pedigree (2,4,3,1,1)
  The data was collected for a hectare area through interview

## Emissions to nature
- Ammonia [air, non-urban air or from high stacks]: 0.000594836 kg; lognormal variance with pedigree 0.0126, pedigree (2,4,3,1,1)
  (same comment as for land use change, annual crop)
- Carbon dioxide, fossil [air, non-urban air or from high stacks]: 0.000786991 kg; lognormal variance with pedigree 0.0052, pedigree (2,4,3,1,1)
  (same comment as for land use change, annual crop)
- Dinitrogen monoxide [air, non-urban air or from high stacks]: 0.000197552 kg; lognormal variance with pedigree 0.0346, pedigree (2,4,3,1,1)
  (same comment as for land use change, annual crop)
- Nitrogen oxides [air, non-urban air or from high stacks]: 0.000197031 kg; lognormal variance with pedigree 0.0446, pedigree (2,4,3,1,1)
  (same comment as for land use change, annual crop)
- Alachlor [soil, agricultural]: 2.27273e-7 kg; lognormal variance with pedigree 0.0376, pedigree (2,4,3,1,1)
  Alachlor is used as pesticide
- Cadmium II [soil, agricultural]: -4.88973e-8 kg
  (same comment as for land use change, annual crop)
- Carbendazim [soil, agricultural]: 3.43636e-5 kg; lognormal variance with pedigree 0.0376, pedigree (2,4,3,1,1)
  Carbendazim is used as pesticide
- Chlorpyrifos [soil, agricultural]: 1e-5 kg; lognormal variance with pedigree 0.0376, pedigree (2,4,3,1,1)
  Chlorpyrifos is used as pesticide
- Chromium III [soil, agricultural]: -1.25032e-6 kg
  (same comment as for land use change, annual crop)
- Copper ion [soil, agricultural]: -6.55791e-6 kg
  (same comment as for land use change, annual crop)
- Diflubenzuron [soil, agricultural]: 4.54545e-7 kg; lognormal variance with pedigree 0.0376, pedigree (2,4,3,1,1)
  Diflubenzuron is used as pesticide
- Imazamox [soil, agricultural]: 1.27273e-5 kg; lognormal variance with pedigree 0.0376, pedigree (2,4,3,1,1)
  Imazamox is used as pesticide
- Lead II [soil, agricultural]: -7.32973e-7 kg
  (same comment as for land use change, annual crop)
- Mancozeb [soil, agricultural]: 1.48909e-5 kg; lognormal variance with pedigree 0.0376, pedigree (2,4,3,1,1)
  Mancozeb is used as pesticide
- Mercury II [soil, agricultural]: -3.73696e-8 kg
  (same comment as for land use change, annual crop)
- Metolachlor [soil, agricultural]: 4.30302e-5 kg; lognormal variance with pedigree 0.0376, pedigree (2,4,3,1,1)
  Metolachlor is used as pesticide
- Nickel II [soil, agricultural]: -1.47871e-6 kg
  (same comment as for land use change, annual crop)
- Zinc II [soil, agricultural]: -2.85133e-5 kg
  (same comment as for land use change, annual crop)
- Cadmium II [water, ground-]: 7.5442e-10 kg; lognormal variance with pedigree 0.0946, pedigree (2,4,3,1,1)
  (same comment as for land use change, annual crop)
- Cadmium II [water, surface water]: 9.28893e-9 kg; lognormal variance with pedigree 0.0946, pedigree (2,4,3,1,1)
  (same comment as for land use change, annual crop)
- Chromium III [water, ground-]: 3.5063e-7 kg; lognormal variance with pedigree 0.0946, pedigree (2,4,3,1,1)
  (same comment as for land use change, annual crop)
- Chromium III [water, surface water]: 1.02245e-6 kg; lognormal variance with pedigree 0.0946, pedigree (2,4,3,1,1)
  (same comment as for land use change, annual crop)
- Copper ion [water, ground-]: 5.35337e-8 kg; lognormal variance with pedigree 0.0946, pedigree (2,4,3,1,1)
  (same comment as for land use change, annual crop)
- Copper ion [water, surface water]: 7.66711e-7 kg; lognormal variance with pedigree 0.0946, pedigree (2,4,3,1,1)
  (same comment as for land use change, annual crop)
- Lead II [water, ground-]: 3.67108e-9 kg; lognormal variance with pedigree 0.0946, pedigree (2,4,3,1,1)
  (same comment as for land use change, annual crop)
- Lead II [water, surface water]: 3.06047e-7 kg; lognormal variance with pedigree 0.0946, pedigree (2,4,3,1,1)
  (same comment as for land use change, annual crop)
- Mercury II [water, ground-]: 1.26851e-11 kg; lognormal variance with pedigree 0.0946, pedigree (2,4,3,1,1)
  (same comment as for land use change, annual crop)
- Mercury II [water, surface water]: 1.82719e-9 kg; lognormal variance with pedigree 0.0946, pedigree (2,4,3,1,1)
  (same comment as for land use change, annual crop)
- Nickel II [water, surface water]: 6.3409e-7 kg; lognormal variance with pedigree 0.0946, pedigree (2,4,3,1,1)
  (same comment as for land use change, annual crop)
- Nitrate [water, ground-]: 0.00274378 kg; lognormal variance with pedigree 0.0446, pedigree (2,4,3,1,1)
  (same comment as for land use change, annual crop)
- Phosphate [water, ground-]: 3.90242e-6 kg; lognormal variance with pedigree 0.0446, pedigree (2,4,3,1,1)
  (same comment as for land use change, annual crop)
- Phosphate [water, surface water]: 1.22058e-5 kg; lognormal variance with pedigree 0.0446, pedigree (2,4,3,1,1)
  (same comment as for land use change, annual crop)
- Phosphorus [water, surface water]: 9.58266e-5 kg; lognormal variance with pedigree 0.0446, pedigree (2,4,3,1,1)
  (same comment as for land use change, annual crop)
- Zinc II [water, ground-]: 3.82628e-7 kg; lognormal variance with pedigree 0.0946, pedigree (2,4,3,1,1)
  (same comment as for land use change, annual crop)
- Zinc II [water, surface water]: 1.47521e-6 kg; lognormal variance with pedigree 0.0946, pedigree (2,4,3,1,1)
  (same comment as for land use change, annual crop)

## Sampling procedure
The farmer was identified and contacted by agriculture science faculty familiar with the local farmers in the region. Data was collected directly from the farmer through semi-structured interview using a questionnaire based on the input requirements of the ecoinvent LCI calculation tool for crop production. The farmer does not maintain any written records and has provided the data from recent memory. In this region, typically farmers are unable to provide exact name of active ingredient in the pesticide they use and the same was noted from details given on the pesticide packet. Individual farmer is not able to calculate fuel consumption for his own farm alone and this information has been collected from farming community of the area.

## Extrapolations
Ecoinvent LCI calculation tool for crop production was used to calculate field emissions from the cultivation process.
