# electrolyte production, for Li-ion battery

Dataset: EcoSpold 2, unit process
Geography: GLO
Time period: 2019-01-01 to 2023-12-31
Technology level: current
Classification: ISIC rev.4 ecoinvent: 20:Manufacture of chemicals and chemical products
Scenario: Business-as-Usual
System model: Allocation, cut-off by classification
Generated by: Eleonora Crenna
Published in: Dai, Q. 2019
Database: ecoinvent
isCopyrightProtected: false
accessRestrictedTo: 1

## General comment
This dataset represents the production of 1 kg liquid electrolyte, used in Li-ion batteries. The electrolyte is made of a lithium salt dissolved in a liquid solution of organic solvents and additives.
References:
- Dai, Q., Kelly, J. C., Gaines, L., & Wang, M. (2019). Life cycle analysis of lithium-ion batteries for automotive applications. Batteries, 5(2), 48.
- Schmuch, R., Wagner, R., Hörpel, G., Placke, T., & Winter, M. (2018). Performance and cost of materials for lithium-based rechargeable automotive batteries. Nature Energy, 3(4), 267-278.
Solvionic. (2019). Cleaner solvents for sustainable chemistry - Products Retrieved from https://en.solvionic.com/products/1m-lipf6-in-ec-dmc-1-1-vol.-with-2wt.-vc-99.9
Chagnes, A. (2015). Lithium battery technologies: electrolytes. In Lithium Process Chemistry (pp. 167-189): Elsevier.
-
Dai, Q., Kelly, J. C., Gaines, L., & Wang, M. (2019). Life cycle analysis of lithium-ion batteries for automotive applica-tions. Batteries, 5(2), 48.

## Included activities start
The activity starts when chemicals enter the process at the factory.

## Included activities end
The activity ends with the production of liquid electrolyte for Li-ion batteries at factory gate.

## Geography
Geography not specified,

## Technology
Typically the electrolyte in Li-ion batteries is liquid, and made of a mixture of organic solvents such as ethylene carbonate (EC) and dimethyl carbonate (DMC), a lithium salt such as lithium hexafluoro phosphate (LiPF6) and a small amount of additive such as vinyl carbonate (VC) as follows: 1M LiPF6 in 1:1 EC:DMC + 2%wt VC. The use of two solvents with high permittivity, i.e. EC, and low viscosity, i.e. DMC, promote ionic dissociation and ion mobility at the same time. The additives are used to improve the performance of Li-ion batteries, for instance to protect the electrode surface from degradation.
References:
Chagnes, A. (2015). Lithium battery technologies: electrolytes. In Lithium Process Chemistry (pp. 167-189): Elsevier.
Dai, Q., Kelly, J. C., Gaines, L., & Wang, M. (2019). Life cycle analysis of lithium-ion batteries for automotive applica-tions. Batteries, 5(2), 48.

## Time period
The time period is from 2019 (year of the publication of data) and 2020 (year of the dataset)

## Reference product
- electrolyte, for Li-ion battery: 1 kg; By-product classification allocatable product; CPC 35470: Chemical elements and compounds doped for use in electronics; HS2017 850790: Electric accumulators; parts n.e.c. in heading no. 8507
  production volume 2.17e8 kg
    Approximation. UN Comtrade (comtrade.un.org/data/) reports approximately 2.05E+09 kg Li-ion batteries traded worldwide. Electrolyte represents approximately10% of a Li-ion battery.
  property carbon content, fossil 0.359698; = (vinyl_carb*dm_vinyl_carb*ccf_vinyl_carb) + (dimethyl_carb*dm_dimethyl_carb*ccf_dimethyl_carb) + (ethylene_carb*dm_ethylene_carb*ccf_ethylene_carb)
    fossil carbon content on a dry matter basis
  property price 10.9281 EUR2005
    Calculated based on inputs: The price of the product has been calculated as a sum of the values of the material and energy inputs for this product. This value is therefore a rough estimation. It may underestimate the real price since there are additional expenses when producing any product. These expences can include for example labour costs, treatment of waste materials and profit for the producer. Please consider carefully whether this level of data quality is acceptable for your application.
  properties: carbon allocation 0.359698 kg, carbon content 0.359698, carbon content, non-fossil 0, dry mass 1 kg, water content 0, water in wet mass 0 kg, wet mass 1 kg

## Inputs from technosphere
- chemical factory, organics: 4e-10 unit; lognormal variance with pedigree 0.3448, pedigree (2,4,2,5,4)
  Calculated based on literature data published by the industry. For this activity, no information was readily available concerning infrastructure and land-use. Therefore, the infrastructure is estimated based on data from two chemical factories, the BASF site of Ludwigshafen and the chemical factory in Gendorf (which are both located in Germany), which produce a wide range of chemical substances. Based on this data, the following assumptions are made: the built area amounts to about 4.2 ha, the plant has an average output of 50'000 t/a and a lifespan of fifty years. The estimated infrastructure amount is therefore 4.00 E-10 units per kg of produced chemical.
  References:
  Althaus H.-J., Chudacoff M., Hischier R., Jungbluth N., Osses M. and Primas A. (2007) Life Cycle Inventories of Chemicals. ecoinvent report No. 8, v2.0. EMPA Dübendorf, Swiss Centre for Life Cycle Inventories, Dübendorf, CH.
  Gendorf (2000) Umwelterklärung 2000, Werk Gendorf. Werk Gendorf, Burgkirchen.
- dimethyl carbonate: 0.387283 kg; name dimethyl_carb; = (0.05 * 1.071 /(1*0.1*0.151905 + 0.05 * 1.321 + 0.05 * 1.071))-(vinyl_carb / 2); lognormal variance with pedigree 0.0046, pedigree (2,3,2,5,2)
  Calculated value based on literature and on the density of the organic solvents. Ethylene carbonate (EC) and dimethyl carbonate (DMC) are typically used in ratio 1:1. Assuming the volume of the liquid solution equal to 0.1L, the amount of each organic solvent referred to 1 kg of reference product is calculated considering half of the liquid volume (L) multiplied by the solvent density (kg/L) and divided by the sum of the amounts (kg) of the two solvents and the lithium salt. To be able to include the amount of additive, which is known to be 2%wt of the electrolyte formulation, the amount of each solvent is reduced by 0.01 (i.e. half the amount of the additive).
  EC density: 1.321 kg/L
  DMC density: 1.071 kg/L
  property carbon content, fossil 0.4; name ccf_dimethyl_carb
  property dry mass 1 kg; name dm_dimethyl_carb
  properties: heating value, net 20.19 MJ, wet mass 1 kg
- electricity, medium voltage: 0.399063 kWh; lognormal variance with pedigree 0.0454, pedigree (2,4,2,5,4)
  Calculated based on literature data published by the GENDORF Chemical Park. The factory produced an average of 2462760 tonnes of chemical substances (including intermediates) per year in the years 2015-2019. The average consumption of electricity in the years 2015-2019 was 982796751 kWh per year. This equals 0.39906 kWh/kg chemical produced.
  References:
  Chemiepark GENDORF, Umwelterklärung 2016, https://www.gendorf.de/Nachbarn/Umweltschutz/Industrie%20und%20Nachhaltigkeit
  Chemiepark GENDORF, Umwelterklärung 2017, https://www.gendorf.de/Nachbarn/Umweltschutz/Industrie%20und%20Nachhaltigkeit
  Chemiepark GENDORF, Umwelterklärung 2020, https://www.gendorf.de/Nachbarn/Umweltschutz/Industrie%20und%20Nachhaltigkeit
- ethylene carbonate: 0.48002 kg; name ethylene_carb; = (0.05 * 1.321 /(1*0.1*0.151905 + 0.05 * 1.321 + 0.05 * 1.071))-(vinyl_carb / 2); lognormal variance with pedigree 0.0046, pedigree (2,3,2,5,2)
  (same comment as for dimethyl carbonate)
  property carbon content, fossil 0.409173; name ccf_ethylene_carb
  property dry mass 1 kg; name dm_ethylene_carb
  properties: heating value, net 27.53 MJ, wet mass 1 kg
- lithium hexafluorophosphate: 0.112697 kg; = 1*0.1*0.151905/(1*0.1*0.151905 + 0.05 * 1.321 + 0.05 * 1.071); lognormal variance with pedigree 0.0046, pedigree (2,3,2,5,2)
  Calculated value based on the concentration of LiPF6 in the liquid solution (i.e c = 1M = 1 mol/L), the volume of the solution (assumed to be 0.1L for the sake of calculations) and the molecular weight of the salt itself (MW = 151.905 g/mol): mass = c * V * MW . The amount of LiPF6 referred to 1 kg of reference product is obtained by dividing the mass obtained with the equation above by the sum of the amount of the three main components of the electrolyte.
  properties: dry mass 1 kg, wet mass 1 kg
- vinyl carbonate: 0.02 kg; name vinyl_carb; lognormal variance with pedigree 0.0046, pedigree (2,3,2,5,2)
  Calculated value. Vinyl carbonate is used as additive in liquid electrolyte formulations, especially when the Li-ion battery has a graphite anode. Value taken from available industrial formulations (Solvionic, 2019. Cleaner solvents for sustainable chemistry - Products Retrieved from https://en.solvionic.com/products/1m-lipf6-in-ec-dmc-1-1-vol.-with-2wt.-vc-99.9)
  property carbon content, fossil 0.4187; name ccf_vinyl_carb
  property dry mass 1 kg; name dm_vinyl_carb
  properties: wet mass 1 kg
- wastewater, average: -1.09589e-8, -1.82361e-6, -4.36062e-7, -6.49273e-9 m3 (4 suppliers, which the file names only by identifier); sum of these -2.27712e-6 m3; lognormal variance with pedigree 0.0452, pedigree (2,4,1,5,4)
  Calculated based on literature data published by the GENDORF Chemical Park. The factory produced an average of 2462760 tonnes of chemical substances (including intermediates) per year in the years 2015-2019. The average ouput of wastewater going to an external wastewater treatment plant in the years 2015-2019 was 5608 m3 per year. This equals 0.000002277 m3/kg chemical produced.
  References:
  Chemiepark GENDORF, Umwelterklärung 2016, https://www.gendorf.de/Nachbarn/Umweltschutz/Industrie%20und%20Nachhaltigkeit
  Chemiepark GENDORF, Umwelterklärung 2017, https://www.gendorf.de/Nachbarn/Umweltschutz/Industrie%20und%20Nachhaltigkeit
  Chemiepark GENDORF, Umwelterklärung 2020, https://www.gendorf.de/Nachbarn/Umweltschutz/Industrie%20und%20Nachhaltigkeit
  properties: carbon content, non-fossil 0.194039, dry mass 0.346837 kg, mass concentration, TOC 0.1091 kg/m3, mass concentration, calcium 0.039453 kg/m3, mass concentration, chlorine 0.030031 kg/m3, mass concentration, hydrogen 0.013365 kg/m3, mass concentration, nitrogen 0.031015 kg/m3, mass concentration, oxygen 0.069824 kg/m3, mass concentration, sodium 0.06456 kg/m3, mass concentration, sulfur 0.015602 kg/m3, water content 2882.2, wet mass 1000 kg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
  note on carbon content, non-fossil: 0.0673 kg TOC/m3 (Tab A.17, ecoinvent v2.2 report 13_I). TOC was considered as Total Carbon.

## Inputs from nature
- Water, cooling, unspecified natural origin [natural resource, in water]: 0.014707 m3; lognormal variance with pedigree 0.0454, pedigree (2,4,2,5,4)
  Calculated based on literature data published by the GENDORF Chemical Park. The factory produced an average of 2462760 tonnes of chemical substances (including intermediates) per year in the years 2015-2019. The average amount of cooling water released in the years 2015-2019 was 34408800 t per year. It was assumed that 5% of the cooling water was emitted to air during its use, therefore, to calculate the input of cooling water, the output value reported by GENDORF was scaled up by the factor 1/0.95. This equals 0.014707 m3/kg chemical produced.
  References:
  Chemiepark GENDORF, Umwelterklärung 2016, https://www.gendorf.de/Nachbarn/Umweltschutz/Industrie%20und%20Nachhaltigkeit
  Chemiepark GENDORF, Umwelterklärung 2017, https://www.gendorf.de/Nachbarn/Umweltschutz/Industrie%20und%20Nachhaltigkeit
  Chemiepark GENDORF, Umwelterklärung 2020, https://www.gendorf.de/Nachbarn/Umweltschutz/Industrie%20und%20Nachhaltigkeit
- Water, river [natural resource, in water]: 0.000965426 m3; lognormal variance with pedigree 0.0454, pedigree (2,4,2,5,4)
  Calculated based on literature data published by the GENDORF Chemical Park. The factory produced an average of 2462760 tonnes of chemical substances (including intermediates) per year in the years 2015-2019. The average consumption of river water in the years 2015-2019 was 22000820 t per year. However, since the cooling water is modelled as an input, the amount of river water was adjusted to avoid double counting. 55% of the input amount of cooling water was deducted from the amount of river water, as that is the share of river water versus well water. This equals 0.00096543 m3/kg chemical produced.
  References:
  Chemiepark GENDORF, Umwelterklärung 2016, https://www.gendorf.de/Nachbarn/Umweltschutz/Industrie%20und%20Nachhaltigkeit
  Chemiepark GENDORF, Umwelterklärung 2017, https://www.gendorf.de/Nachbarn/Umweltschutz/Industrie%20und%20Nachhaltigkeit
  Chemiepark GENDORF, Umwelterklärung 2020, https://www.gendorf.de/Nachbarn/Umweltschutz/Industrie%20und%20Nachhaltigkeit
- Water, well, in ground [natural resource, in water]: 0.000816522 m3; lognormal variance with pedigree 0.0454, pedigree (2,4,2,5,4)
  Calculated based on literature data published by the GENDORF Chemical Park. The factory produced an average of 2462760 tonnes of chemical substances (including intermediates) per year in the years 2015-2019. The average consumption of well water in the years 2015-2019 was 18607480 t per year. However, since the cooling water is modelled as an input, the amount of well water was adjusted to avoid double counting. 45% of the input amount of cooling water was deducted from the amount of well water, as that is the share of well water versus river water. This equals 0.00081652 m3/kg chemical produced.
  References:
  Chemiepark GENDORF, Umwelterklärung 2016, https://www.gendorf.de/Nachbarn/Umweltschutz/Industrie%20und%20Nachhaltigkeit
  Chemiepark GENDORF, Umwelterklärung 2017, https://www.gendorf.de/Nachbarn/Umweltschutz/Industrie%20und%20Nachhaltigkeit
  Chemiepark GENDORF, Umwelterklärung 2020, https://www.gendorf.de/Nachbarn/Umweltschutz/Industrie%20und%20Nachhaltigkeit

## Emissions to nature
- Water [air, unspecified]: 0.00147008 m3; lognormal variance with pedigree 0.0848, pedigree (2,4,2,5,4)
  Calculated based on literature data published by the GENDORF Chemical Park. The factory produced an average of 2462760 tonnes of chemical substances (including intermediates) per year in the years 2015-2019. To determine the emissions of water to air, the difference of all water inputs (from river, well, tap water and cooling) and outputs (wastewater, emissions to water) was calculated. The average ouput of water to air in the years 2015-2019 was 3620444 m3 per year. This equals 0.00147 m3/kg chemical produced. For more information on the other water exchanges please consult the respective exchange comment.
  References:
  Chemiepark GENDORF, Umwelterklärung 2016, https://www.gendorf.de/Nachbarn/Umweltschutz/Industrie%20und%20Nachhaltigkeit
  Chemiepark GENDORF, Umwelterklärung 2017, https://www.gendorf.de/Nachbarn/Umweltschutz/Industrie%20und%20Nachhaltigkeit
  Chemiepark GENDORF, Umwelterklärung 2020, https://www.gendorf.de/Nachbarn/Umweltschutz/Industrie%20und%20Nachhaltigkeit
- Water [water, unspecified]: 0.0150391 m3; lognormal variance with pedigree 0.0848, pedigree (2,4,2,5,4)
  Calculated based on literature data published by the GENDORF Chemical Park. The factory produced an average of 2462760 tonnes of chemical substances (including intermediates) per year in the years 2015-2019. The amount of water released back to the environment consists of the sum of the amount of process water treated in the internal WWTP that is then released back to the environment and the amount of cooling water released back to the environment. The average ouput of the internal WWTP in the years 2015-2019 was 2628800 m3 and that of cooling water released back to the environment was 34408800 m3. This gives a yearly average of 37037600 m3 emissions of water to water. This equals 0.01504 m3/kg chemical produced.
  References:
  Chemiepark GENDORF, Umwelterklärung 2016, https://www.gendorf.de/Nachbarn/Umweltschutz/Industrie%20und%20Nachhaltigkeit
  Chemiepark GENDORF, Umwelterklärung 2017, https://www.gendorf.de/Nachbarn/Umweltschutz/Industrie%20und%20Nachhaltigkeit
  Chemiepark GENDORF, Umwelterklärung 2020, https://www.gendorf.de/Nachbarn/Umweltschutz/Industrie%20und%20Nachhaltigkeit

## Sampling procedure
From Literature and calculations based on the concentration of the lithium salt in the liquid solution and the density of the organic solvents. The list of substances composing the electrolyte formulation is taken from Dai et al. (2019), and adjusted to include vinyl carbonate as main additive (Schmuch et al., 2018, Solvionic, 2019).

References:
- Dai, Q., Kelly, J. C., Gaines, L., & Wang, M. (2019). Life cycle analysis of lithium-ion batteries for automotive applications. Batteries, 5(2), 48.
- Schmuch, R., Wagner, R., Hörpel, G., Placke, T., & Winter, M. (2018). Performance and cost of materials for lithium-based rechargeable automotive batteries. Nature Energy, 3(4), 267-278.
Solvionic. (2019). Cleaner solvents for sustainable chemistry - Products Retrieved from https://en.solvionic.com/products/1m-lipf6-in-ec-dmc-1-1-vol.-with-2wt.-vc-99.9

## Extrapolations
Bill of material from the electrolyte produced in Chinese companies, assumed to be representative of standard electrolyte formulation at global level. See sampling procedure and comments to exchanges for detailed information on calculations.
