# pentane production

Dataset: EcoSpold 2, unit process
Geography: RER
Time period: 2001-01-01 to 2023-12-31
Technology level: current
Classification: ISIC rev.4 ecoinvent: 1920:Manufacture of refined petroleum products
Classification: EcoSpold01Categories: chemicals/organics
Synonyms: amyl hydride; n-Pentan; n-pentane; skellysolve
Tags: ConvertedDataset
Scenario: Business-as-Usual
System model: Allocation, cut-off by classification
Generated by: Roland Hischier
Published in: Hischier R. 2007
Database: ecoinvent
isCopyrightProtected: true
accessRestrictedTo: 1

## General comment
Data are derived from the Eco-profiles of the European plastics industry (PlasticsEurope). Not included are the values reported for: recyclable wastes, amount of air / N2 / O2 consumed, unspecified metal emission to air and to water, mercaptan emission to air, unspecified CFC/HCFC emission to air, dioxin to water. The amount of "sulphur (bonded)" is assumed to be included into the amount of raw oil.
[This dataset was already contained in the ecoinvent database version 2. It was not individually updated during the transfer to ecoinvent version 3. Life Cycle Impact Assessment results may still have changed, as they are affected by changes in the supply chain, i.e. in other datasets. This dataset was generated following the ecoinvent quality guidelines for version 2. It may have been subject to central changes described in the ecoinvent version 3 change report (http://www.ecoinvent.org/database/ecoinvent-version-3/reports-of-changes/), and the results of the central updates were reviewed extensively. The changes added e.g. consistent water flows and other information throughout the database. The documentation of this dataset can be found in the ecoinvent reports of version 2, which are still available via the ecoinvent website. The change report linked above covers all central changes that were made during the conversion process.]

## Included activities end
Aggregated data for all processes from raw material extraction until delivery at plant

## Geography
different European production sites

## Technology
production 90% by cracking or reforming processes in a refinery out of gasoline or naphtha fractions / 10% as by-product

## Time period
time to which data refer

## Parameters
- fraction, cooling water, cooling pond system, to air: 0.032 dimensionless; name fraction_CW_CP_to_air; lognormal variance with pedigree 0.0413, pedigree (2,3,1,3,1)
  Calculated based on literature value (Scown, C.D., 2011, Water Footprint of U.S. Transportation Fuels and supplying information of the article) (Vionnet, S., Quantis Water Database - Technical Report, 2012).
- fraction, cooling water, once-through system, to air: 0.004 dimensionless; name fraction_CW_OT_to_air; lognormal variance with pedigree 0.0413, pedigree (2,3,1,3,1)
  (same comment as for fraction, cooling water, cooling pond system, to air)
- fraction, cooling water, recirculating system, to air: 0.771 dimensionless; name fraction_CW_R_to_air; lognormal variance with pedigree 0.0413, pedigree (2,3,1,3,1)
  (same comment as for fraction, cooling water, cooling pond system, to air)
- fraction, cooling water, to air: 0.3875 dimensionless; name fraction_CW_to_air; = (0.5*fraction_CW_OT_to_air)+(0.5*fraction_CW_R_to_air); lognormal variance with pedigree 0.092025, pedigree (4,4,3,2,4)
  Calculated value based on literature value (see comments of the other parametres present in this dataset) and expert opinion. In the case when no industry/literature data are available about the type of cooling or directly fraction, cooling water, to air specific for the process a default assumption is applied. It is assumed that the once-through cooling system is used in 50% of all cases and recirculating system is used in another 50% of all cases.
- fraction, process water, to air: 0.205 dimensionless; name fraction_PW_to_air; lognormal variance with pedigree 0.092025, pedigree (4,4,3,2,4)
  Literature value (Statistics Canada, 2007 & Shaffer, K.H., 2008, Consumptive water use in the Great Lakes Basin, USGS) (Vionnet, S., Quantis Water Database - Technical Report, 2012).

## Reference product
- pentane: 1 kg; name pentane_RP; By-product classification allocatable product; CPC 34110: Hydrocarbons and their halogenated, sulphonated, nitrated or nitrosated derivatives; HS2017 290110: Acyclic hydrocarbons; saturated; CAS 109-66-0
  EcoSpold01Location=RER
  production volume 2.18367e10 kg; name pentane_RP_PV; = UnitConversion(11653000, 'barrel oil', 'l')*365*0.8 *0.13*9*0.0345
    Calculated based on the production volume of pentane from natural gas liquids. It is assumed that 90% of pentane is produced from oil refining and 10% from natural gas liquids (Boustead, I. (2005): Eco-profiles of the European Plastics Industry, Pentane, available here: https://plasticseurope.org/sustainability/circularity/life-cycle-thinking/eco-profiles-set/, last accessed 2022-08-12).
    Production in European countries account for 3.45% of the Worlds production (share from natural gas processing, no data of refinery operation) source: https://www.eia.gov/international/data/world/petroleum-and-other-liquids/more-petroleum-and-other-liquids-data?pd=5&p=00000000000000000000000000000000001&u=0&f=A&v=mapbubble&a=-&i=none&vo=value&t=C&g=00000000000000000000000000000000000000000000000001&l=249-ruvvvvvfvtvnvv1vrvvvvfvvvvvvfvvvou20evvvvvvvvvvnvvvs0008&s=94694400000&e=1577836800000&&ev=false.
    Production volume of pentane from natural gas liquids:
    Calculated value from global natural gas liquids production. Assumed that all NGL produced is fractioned into its components.
    The world supply of NGL in 2019 was 11'653 thousand barrels per day (source: EIA - US Energy Information Administration, available here: https://www.eia.gov/international/data/world/petroleum-and-other-liquids/more-petroleum-and-other-liquids-data?pd=5&p=000gfs0000000000000000000000000000vg&u=0&f=A&v=mapbubble&a=-&i=none&vo=value&t=C&g=00000000000000000000000000000000000000000000000001&l=249-ruvvvvvfvtvnvv1vrvvvvfvvvvvvfvvvou20evvvvvvvvvvnvvvs0008&s=94694400000&e=1609459200000&&ev=false).
    Gas condensates have a specific gravity of 0.8 kg/l or less.(Favennec, P.,Petroleum Refining: Refinery operation and management, Band 5, Technip Ed. 1998; pg 26)
    NGL contains 13% of pentane.
  property heating value, net 45.37 MJ
    LHV is calculated based on the elemental composition of the substance. Based on the CAS number of the substance (000109-66-0), the chemical formula of the substance is found to be: C5H12, (PubChem 2020).
    Reference: Kim, S., Chen, J., Cheng, T., Gindulyte, A., He, J., He, S., Li, Q., Shoemaker, B. A., Thiessen, P. A., Yu, B., Zaslavsky, L., Zhang, J., & Bolton, E. E. (2019). PubChem 2019 update: improved access to chemical data. Nucleic acids research, 47(D1), D1102–D1109. https://doi.org/10.1093/nar/gky1033
  properties: carbon allocation 0.833333 kg, carbon content 0.833333, carbon content, fossil 0.833333, carbon content, non-fossil 0, dry mass 1 kg, price 1.1 EUR2005, water content 0, water in wet mass 0 kg, wet mass 1 kg

## Inputs from technosphere
- average incineration residue: -0.0019143 kg; name BP_amount_6
  EcoSpold01Location=CH
  Uncertainty for LCI results cannot be determined
  production volume; = BP_amount_6/pentane_RP*pentane_RP_PV
    Calculated from the production volume of pentane in proportion to the respective output amounts.
  properties: carbon content, fossil 0.0325466, carbon content, non-fossil 0.0511208, dry mass 1 kg, wet mass 1 kg
  note on carbon content, fossil: Tab A.1, ecoinvent v2.2 report 13_I. It is considered that 61.1% of the C has a biogenic origin
- coal slurry: -5.2291e-7 kg; name BP_amount_4
  Uncertainty for LCI results cannot be determined
  EcoSpold01Location=GLO
  production volume; = BP_amount_4/pentane_RP*pentane_RP_PV
    (same comment as for average incineration residue)
  properties: carbon content, fossil 0.124, dry mass 1 kg, wet mass 1 kg
  note on carbon content, fossil: Coal tailings composition in Tab 3.4, (Doka G. (2009) Life Cycle Inventory of the disposal of lignite spoil, coal spoil and coal tailings. Doka Life Cycle Assessments, Zurich. Commissioned by the Swiss Centre for Life Cycle Inventories ecoinvent Centre)
- decommissioned chemical production facilities: -1.7178e-10 kg; name BP_amount_2
  Uncertainty for LCI results cannot be determined
  EcoSpold01Location=RER
  production volume; = BP_amount_2/pentane_RP*pentane_RP_PV
    (same comment as for average incineration residue)
  properties: carbon content, fossil 0.0169382, carbon content, non-fossil 5.78006e-6, dry mass 1 kg, wet mass 1 kg
  note on carbon content, fossil: Calculated from C content in input materials in the infrastructure
- hazardous waste, for incineration: -0.0017751, -4.64e-5 kg (2 suppliers, which the file names only by identifier); sum of these -0.0018215 kg
  EcoSpold01Location=CH
  Uncertainty for LCI results cannot be determined
  production volume; = BP_amount_3/pentane_RP*pentane_RP_PV
    (same comment as for average incineration residue)
  properties: carbon content, fossil 0.554667, dry mass 0.75 kg, heating value, net 17 MJ, water content 0.333333, wet mass 1 kg
  note on carbon content, fossil: Tab A.6, ecoinvent v2.2 report 13_I. C content has been calculated after data in the tables, and then referred to 1 kg DM
  note on heating value, net: Value taken from the general comment of the treatment dataset.
- municipal solid waste: -0.0018129 kg; name BP_amount_5
  EcoSpold01Location=CH
  Uncertainty for LCI results cannot be determined
  production volume; = BP_amount_5/pentane_RP*pentane_RP_PV
    (same comment as for average incineration residue)
  properties: carbon content, fossil 0.171549, carbon content, non-fossil 0.261655, dry mass 0.771 kg, heating value, net 11.74 MJ, water content 0.297017, wet mass 1 kg
  note on carbon content, fossil: MSW composition in tab 4.1, ecoinvent v2.2 report 13_I. C content referred to 1 kg DM
- spoil from hard coal mining: -0.0050086 kg; name BP_amount_1
  Uncertainty for LCI results cannot be determined
  EcoSpold01Location=GLO
  production volume; = BP_amount_1/pentane_RP*pentane_RP_PV
    (same comment as for average incineration residue)
  properties: carbon content, fossil 0.007879, dry mass 1 kg, wet mass 1 kg
  note on carbon content, fossil: Composition of coal spoil is adopted by proxy from lignite spoil (pg 19, Doka G. (2009) Life Cycle Inventory of the disposal of lignite spoil, coal spoil and coal tailings. Doka Life Cycle Assessments, Zurich. Commissioned by the Swiss Centre for Life Cycle Inventories ecoinvent Centre)
- waste plastic, mixture: -1.4977e-6 kg; name BP_amount_8
  Uncertainty for LCI results cannot be determined
  EcoSpold01Location=CH
  production volume; = BP_amount_8/pentane_RP*pentane_RP_PV
    (same comment as for average incineration residue)
  properties: carbon content, fossil 0.747344, dry mass 0.847 kg, heating value, net 30.79 MJ, water content 0.180638, wet mass 1 kg
  note on carbon content, fossil: C content in 1 kg DM was calculated using data in Tab A.2, ecoinvent v2.2 report 13_I
- waste wood, untreated: -1.6436e-7 kg; name BP_amount_7
  Uncertainty for LCI results cannot be determined
  EcoSpold01Location=CH
  production volume; = BP_amount_7/pentane_RP*pentane_RP_PV
    (same comment as for average incineration residue)
  properties: carbon content, non-fossil 0.48632, dry mass 0.8 kg, heating value, net 13.99 MJ, water content 0.25, wet mass 1 kg
  note on carbon content, non-fossil: Tab A.4, ecoinvent v2.2 report 13_I. C content has been referred to 1 kg DM,

## Inputs from nature
- Aluminium [natural resource, in ground]: 3.5746e-8 kg
  24% Al in bauxite; 11% Al in ore; Uncertainty for LCI results cannot be determined
- Anhydrite [natural resource, in ground]: 5.3823e-7 kg
  Uncertainty for LCI results cannot be determined
- Barium [natural resource, in ground]: 5.9115e-8 kg
  15% BaSO4 in ore; Uncertainty for LCI results cannot be determined
- Calcite [natural resource, in ground]: 3.6986e-5 kg
  Uncertainty for LCI results cannot be determined
- Chromium [natural resource, in ground]: 3.0011e-13 kg
  25.5% Cr in chromite; 11.6% in ore; Uncertainty for LCI results cannot be determined
- Clay, bentonite [natural resource, in ground]: 5.4083e-6 kg
  Uncertainty for LCI results cannot be determined
- Clay, unspecified [natural resource, in ground]: 1.0584e-10 kg
  Uncertainty for LCI results cannot be determined
- Coal, brown [natural resource, in ground]: 2.7028e-7 kg
  Uncertainty for LCI results cannot be determined
- Coal, hard [natural resource, in ground]: 0.025713 kg
  Uncertainty for LCI results cannot be determined
- Copper [natural resource, in ground]: 7.9609e-12 kg
  0.99% Cu in sulfide; 0.36% Cu and 82 ppm Mo in ore; Uncertainty for LCI results cannot be determined
- Dolomite [natural resource, in ground]: 4.4495e-7 kg
  Uncertainty for LCI results cannot be determined
- Energy, gross calorific value, in biomass [natural resource, biotic]: 0.077205 MJ
- Energy, potential (in hydropower reservoir), converted [natural resource, in water]: 0.025126 MJ
- Feldspar [natural resource, in ground]: 1.5578e-17 kg
  Uncertainty for LCI results cannot be determined
- Fluorspar [natural resource, in ground]: 2.2558e-8 kg
  92% CaF2 in ore; Uncertainty for LCI results cannot be determined
- Gas, natural [natural resource, in ground]: 0.1423 Sm3
  Uncertainty for LCI results cannot be determined
- Granite [natural resource, in ground]: 1.3019e-15 kg
  Uncertainty for LCI results cannot be determined
- Gravel [natural resource, in ground]: 1.3401e-7 kg
  Uncertainty for LCI results cannot be determined
- Iron [natural resource, in ground]: 3.6321e-5 kg
  46% Fe in siderite; 25% Fe in ore; Uncertainty for LCI results cannot be determined
- Lead [natural resource, in ground]: 1.4577e-7 kg
  5.0% Pb in sulfide; 3.0% Pb in ore; Uncertainty for LCI results cannot be determined
- Magnesite [natural resource, in ground]: 5.2332e-29 kg
  60% Magnesite in ore; Uncertainty for LCI results cannot be determined
- Manganese [natural resource, in ground]: 4.6846e-8 kg
  35.7% Mn in sedimentary deposit; 14.2% Mn in ore; Uncertainty for LCI results cannot be determined
- Mercury [natural resource, in ground]: 2.6527e-9 kg
  Uncertainty for LCI results cannot be determined
- Nickel [natural resource, in ground]: 1.9649e-12 kg
  1.98% Ni in silicates; 1.04% Ni in ore; Uncertainty for LCI results cannot be determined
- Oil, crude [natural resource, in ground]: 1.7403 kg
  Uncertainty for LCI results cannot be determined
- Olivine [natural resource, in ground]: 3.4075e-7 kg
  Uncertainty for LCI results cannot be determined
- Peat [natural resource, biotic]: 2.9277e-5 kg
  Uncertainty for LCI results cannot be determined
- Phosphorus [natural resource, in ground]: 2.9692e-12 kg
  18% P in apatite; 12% in ore; Uncertainty for LCI results cannot be determined
- Sand, unspecified [natural resource, in ground]: 6.5114e-6 kg
  Uncertainty for LCI results cannot be determined
- Shale [natural resource, in ground]: 1.5237e-6 kg
  Uncertainty for LCI results cannot be determined
- Sodium chloride [natural resource, in ground]: 0.0012907 kg
  Uncertainty for LCI results cannot be determined
- Sodium nitrate [natural resource, in ground]: 1.572e-28 kg
  Uncertainty for LCI results cannot be determined
- Sulfur [natural resource, in ground]: 6.361e-6 kg
  Uncertainty for LCI results cannot be determined
- Sylvite [natural resource, in ground]: 4.1143e-8 kg
  25% Sylvite in sylvinite; Uncertainty for LCI results cannot be determined
- Talc [natural resource, in ground]: 1.8326e-28 kg
  Uncertainty for LCI results cannot be determined
- Titanium [natural resource, in ground]: 3.0475e-34 kg
  95% TiO2 in rutile; 0.4% TiO2 in ore; Uncertainty for LCI results cannot be determined
- Uranium [natural resource, in ground]: 1.5591e-6 kg
  Uncertainty for LCI results cannot be determined
- Water, cooling, unspecified natural origin [natural resource, in water]: 0.0038926 m3; name water_cooling_UNO_input; lognormal variance with pedigree 1.21, pedigree (5,5,5,5,5)
  Uncertainty for LCI results cannot be determined
- Water, river [natural resource, in water]: 4.6927e-5 m3; name water_river_input; lognormal variance with pedigree 1.21, pedigree (5,5,5,5,5)
  Uncertainty for LCI results cannot be determined
- Water, salt, ocean [natural resource, in water]: 3.3332e-5 m3; name water_salt_ocean_input; lognormal variance with pedigree 1.21, pedigree (5,5,5,5,5)
  Uncertainty for LCI results cannot be determined
- Water, unspecified natural origin [natural resource, in water]: 0.00078717 m3; name water_UNO_input; lognormal variance with pedigree 1.21, pedigree (5,5,5,5,5)
  Uncertainty for LCI results cannot be determined
- Water, well, in ground [natural resource, in water]: 7.1846e-11 m3; name water_well_in_ground_input; lognormal variance with pedigree 1.21, pedigree (5,5,5,5,5)
  Uncertainty for LCI results cannot be determined
- Wood, unspecified, standing [natural resource, biotic]: 1.2496e-8 m3
  Uncertainty for LCI results cannot be determined
- Zinc [natural resource, in ground]: 5.3383e-9 kg
  9.0% Zn in sulfide; 5.3% Zn in ore; Uncertainty for LCI results cannot be determined

## Emissions to nature
- Aldehydes, unspecified [air, urban air close to ground]: 4.1037e-16 kg
  Uncertainty for LCI results cannot be determined
- Ammonia [air, urban air close to ground]: 3.4982e-10 kg
  Uncertainty for LCI results cannot be determined
- Antimony ion [air, urban air close to ground]: 4.5296e-16 kg
  Uncertainty for LCI results cannot be determined
- Arsenic ion [air, urban air close to ground]: 1.2962e-11 kg
  Uncertainty for LCI results cannot be determined
- Benzene [air, urban air close to ground]: 1.163e-18 kg
  Uncertainty for LCI results cannot be determined
- Cadmium II [air, urban air close to ground]: 4.4361e-12 kg
  Uncertainty for LCI results cannot be determined
- Carbon dioxide, fossil [air, urban air close to ground]: 0.93468 kg
  Uncertainty for LCI results cannot be determined
- Carbon dioxide, non-fossil [air, urban air close to ground]: 0.00066872 kg
  Uncertainty for LCI results cannot be determined
- Carbon disulfide [air, urban air close to ground]: 3.7559e-12 kg
  Uncertainty for LCI results cannot be determined
- Carbon monoxide, fossil [air, urban air close to ground]: 0.0021433 kg
  Uncertainty for LCI results cannot be determined
- Carbon monoxide, non-fossil [air, urban air close to ground]: 1.5334e-6 kg
  Uncertainty for LCI results cannot be determined
- Chlorine [air, urban air close to ground]: 4.8126e-9 kg
  Uncertainty for LCI results cannot be determined
- Chromium III [air, urban air close to ground]: 5.9101e-11 kg
  Uncertainty for LCI results cannot be determined
- Copper ion [air, urban air close to ground]: 2.2628e-14 kg
  Uncertainty for LCI results cannot be determined
- Cyanide [air, urban air close to ground]: 1.2379e-19 kg
  Uncertainty for LCI results cannot be determined
- Dichloromethane [air, urban air close to ground]: 1.2636e-11 kg
  Uncertainty for LCI results cannot be determined
- Dinitrogen monoxide [air, urban air close to ground]: 2.2008e-13 kg
  Uncertainty for LCI results cannot be determined
- Dioxins, measured as 2,3,7,8-tetrachlorodibenzo-p-dioxin [air, urban air close to ground]: 8.6221e-33 kg
  Uncertainty for LCI results cannot be determined
- Ethyl benzene [air, urban air close to ground]: 8.2106e-20 kg
  Uncertainty for LCI results cannot be determined
- Ethylene [air, urban air close to ground]: 2.2252e-7 kg
  Uncertainty for LCI results cannot be determined
- Ethylene dichloride [air, urban air close to ground]: 6.3326e-12 kg
  Uncertainty for LCI results cannot be determined
- Fluorine [air, urban air close to ground]: 2.6346e-12 kg
  Uncertainty for LCI results cannot be determined
- Hydrocarbons, aliphatic, alkanes, cyclic [air, urban air close to ground]: 6.481e-6 kg
  Uncertainty for LCI results cannot be determined
- Hydrocarbons, aromatic [air, urban air close to ground]: 4.0294e-6 kg
  Uncertainty for LCI results cannot be determined
- Hydrocarbons, chlorinated [air, urban air close to ground]: 1.2868e-8 kg
  Uncertainty for LCI results cannot be determined
- Hydrochloric acid [air, urban air close to ground]: 1.3285e-5 kg
  Uncertainty for LCI results cannot be determined
- Hydrogen [air, urban air close to ground]: 2.3909e-5 kg
  Uncertainty for LCI results cannot be determined
- Hydrogen fluoride [air, urban air close to ground]: 4.9893e-7 kg
  Uncertainty for LCI results cannot be determined
- Hydrogen sulfide [air, urban air close to ground]: 1.2185e-9 kg
  Uncertainty for LCI results cannot be determined
- Lead II [air, urban air close to ground]: 1.0081e-10 kg
  Uncertainty for LCI results cannot be determined
- Mercury II [air, urban air close to ground]: 5.5451e-10 kg
  Uncertainty for LCI results cannot be determined
- Methane, fossil [air, urban air close to ground]: 0.0065707 kg
  Uncertainty for LCI results cannot be determined
- Methane, non-fossil [air, urban air close to ground]: 4.701e-6 kg
  Uncertainty for LCI results cannot be determined
- NMVOC, non-methane volatile organic compounds [air, urban air close to ground]: 0.0032044 kg
  Uncertainty for LCI results cannot be determined
- Nickel II [air, urban air close to ground]: 3.984e-14 kg
  Uncertainty for LCI results cannot be determined
- Nitrogen oxides [air, urban air close to ground]: 0.0023816 kg
  Uncertainty for LCI results cannot be determined
- Particulate Matter, < 2.5 um [air, urban air close to ground]: 0.00012756 kg
  Uncertainty for LCI results cannot be determined
- Particulate Matter, > 10 um [air, urban air close to ground]: 0.00016327 kg
  Uncertainty for LCI results cannot be determined
- Particulate Matter, > 2.5 um and < 10um [air, urban air close to ground]: 0.0002194 kg
  Uncertainty for LCI results cannot be determined
- Propylene [air, urban air close to ground]: 1.6483e-7 kg
  Uncertainty for LCI results cannot be determined
- Selenium IV [air, urban air close to ground]: 4.2036e-26 kg
  Uncertainty for LCI results cannot be determined
- Silver I [air, urban air close to ground]: 1.2138e-24 kg
  Uncertainty for LCI results cannot be determined
- Styrene [air, urban air close to ground]: 9.1339e-21 kg
  Uncertainty for LCI results cannot be determined
- Sulfate [air, urban air close to ground]: 2.6488e-14 kg
  Uncertainty for LCI results cannot be determined
- Sulfur dioxide [air, urban air close to ground]: 0.0025545 kg
  Uncertainty for LCI results cannot be determined
- Toluene [air, urban air close to ground]: 2.0289e-19 kg
  Uncertainty for LCI results cannot be determined
- Vinyl chloride [air, urban air close to ground]: 1.4197e-10 kg
  Uncertainty for LCI results cannot be determined
- Water [air, unspecified]: 0.00168621 m3; name water_to_air_unspecified; = (water_cooling_UNO_input*fraction_CW_to_air)+(water_river_input*fraction_PW_to_air)+(water_salt_ocean_input*fraction_PW_to_air)+(water_UNO_input*fraction_PW_to_air)+(water_well_in_ground_input*fraction_PW_to_air); lognormal variance with pedigree 0.0807, pedigree (2,2,5,1,1)
  Calculated value based on literature values and expert opinion. See comments in the parametres' comment field.
  property fraction, origin: fresh water 0.00570515; name fraction_origin_fresh_water
  property fraction, origin: salt water 0.00405233; name fraction_origin_salt_water
  property fraction, origin: unspecified 0.990243; name fraction_origin_unspecified
- Xylenes, unspecified [air, urban air close to ground]: 9.354e-20 kg
  Uncertainty for LCI results cannot be determined
- Zinc II [air, urban air close to ground]: 3.2602e-11 kg
  Uncertainty for LCI results cannot be determined
- AOX, Adsorbable Organic Halides [water, surface water]: 3.5637e-13 kg
  Uncertainty for LCI results cannot be determined
- Acidity, unspecified [water, surface water]: 3.8976e-7 kg
  Uncertainty for LCI results cannot be determined
- Aluminium III [water, surface water]: 6.7894e-8 kg
  Uncertainty for LCI results cannot be determined
- Ammonium [water, surface water]: 3.6254e-6 kg
  Uncertainty for LCI results cannot be determined
- Arsenic ion [water, surface water]: 3.8984e-11 kg
  Uncertainty for LCI results cannot be determined
- BOD5, Biological Oxygen Demand [water, surface water]: 7.3333e-6 kg
  Uncertainty for LCI results cannot be determined
- Benzene [water, surface water]: 8.0334e-21 kg
  Uncertainty for LCI results cannot be determined
- Bromate [water, surface water]: 5.0024e-11 kg
  Uncertainty for LCI results cannot be determined
- COD, Chemical Oxygen Demand [water, surface water]: 4.4773e-5 kg
  Uncertainty for LCI results cannot be determined
- Cadmium II [water, surface water]: 1.2136e-15 kg
  Uncertainty for LCI results cannot be determined
- Calcium II [water, surface water]: 4.3235e-7 kg
  Uncertainty for LCI results cannot be determined
- Carbonate [water, surface water]: 7.5422e-6 kg
  Uncertainty for LCI results cannot be determined
- Chlorate [water, surface water]: 3.6136e-7 kg
  Uncertainty for LCI results cannot be determined
- Chloride [water, surface water]: 6.4422e-5 kg
  Uncertainty for LCI results cannot be determined
- Chlorinated solvents, unspecified [water, surface water]: 2.2423e-8 kg
  Uncertainty for LCI results cannot be determined
- Chlorine [water, surface water]: 1.913e-10 kg
  Uncertainty for LCI results cannot be determined
- Chromium III [water, surface water]: 5.8905e-14 kg
  Uncertainty for LCI results cannot be determined
- Copper ion [water, surface water]: 2.6234e-9 kg
  Uncertainty for LCI results cannot be determined
- Cyanide [water, surface water]: 3.4461e-12 kg
  Uncertainty for LCI results cannot be determined
- DOC, Dissolved Organic Carbon [water, surface water]: 2.0277e-5 kg
  Calculated as equal to TOC.
- Dissolved solids [water, surface water]: 3.29e-5 kg
  Uncertainty for LCI results cannot be determined
- Ethylene dichloride [water, surface water]: 1.4432e-13 kg
  Uncertainty for LCI results cannot be determined
- Fluoride [water, surface water]: 1.5097e-10 kg
  Uncertainty for LCI results cannot be determined
- Hydrocarbons, unspecified [water, surface water]: 4.0202e-5 kg
  Uncertainty for LCI results cannot be determined
- Iron ion [water, surface water]: 1.8809e-9 kg
  Uncertainty for LCI results cannot be determined
- Lead II [water, surface water]: 2.6952e-11 kg
  Uncertainty for LCI results cannot be determined
- Magnesium [water, surface water]: 1.1788e-10 kg
  Uncertainty for LCI results cannot be determined
- Manganese II [water, surface water]: 3.2057e-14 kg
  Uncertainty for LCI results cannot be determined
- Mercury II [water, surface water]: 9.1856e-11 kg
  Uncertainty for LCI results cannot be determined
- Nickel II [water, surface water]: 1.4831e-9 kg
  Uncertainty for LCI results cannot be determined
- Nitrate [water, surface water]: 7.4689e-7 kg
  Uncertainty for LCI results cannot be determined
- Nitrogen [water, surface water]: 2.5685e-7 kg
  Uncertainty for LCI results cannot be determined
- Oils, unspecified [water, surface water]: 2.2695e-6 kg
  Uncertainty for LCI results cannot be determined
- Phenol [water, surface water]: 1.3036e-7 kg
  Uncertainty for LCI results cannot be determined
- Phosphorus [water, surface water]: 7.631e-8 kg
  Uncertainty for LCI results cannot be determined
- Potassium I [water, surface water]: 1.2902e-9 kg
  Uncertainty for LCI results cannot be determined
- Silicon [water, surface water]: 7.6859e-21 kg
  Uncertainty for LCI results cannot be determined
- Sodium I [water, surface water]: 0.00015974 kg
  Uncertainty for LCI results cannot be determined
- Strontium II [water, surface water]: 4.0586e-11 kg
  Uncertainty for LCI results cannot be determined
- Sulfate [water, surface water]: 4.4264e-5 kg
  Uncertainty for LCI results cannot be determined
- Sulfide [water, surface water]: 1.5868e-13 kg
  Uncertainty for LCI results cannot be determined
- Suspended solids, unspecified [water, surface water]: 0.00051763 kg
  Uncertainty for LCI results cannot be determined
- TOC, Total Organic Carbon [water, surface water]: 2.0277e-5 kg
  Uncertainty for LCI results cannot be determined
- Tin ion [water, surface water]: 5.3269e-17 kg
  Uncertainty for LCI results cannot be determined
- Vinyl chloride [water, surface water]: 2.6363e-12 kg
  Uncertainty for LCI results cannot be determined
- Water [water, unspecified]: 0.00307382 m3; name water_to_water_unspecified; = water_cooling_UNO_input*(1-fraction_CW_to_air)+water_river_input*(1-fraction_PW_to_air)+water_salt_ocean_input*(1-fraction_PW_to_air)+water_UNO_input*(1-fraction_PW_to_air)+water_well_in_ground_input*(1-fraction_PW_to_air); lognormal variance with pedigree 0.0807, pedigree (2,2,5,1,1)
  (same comment as for Water)
  property carbon content, fossil 0; name C_content_fossil
  property carbon content, non-fossil 0; name C_content_non_fossil
  property dry mass 0 kg; name DM
  property fraction, origin: fresh water 0.012137; name fraction_origin_fresh_water_Ww
  property fraction, origin: salt water 0.00862084; name fraction_origin_salt_water_Ww
  property fraction, origin: unspecified 0.979242; name fraction_origin_unspecified_Ww
  property water in wet mass 1000 kg; name WWM
  property wet mass 1000 kg; name WM
- Zinc II [water, surface water]: 6.5839e-9 kg
  Uncertainty for LCI results cannot be determined

## Sampling procedure
literature values based on company survey

## Extrapolations
no extrapolation

## Review by Jürgen Sutter 2010-04-06
passed.
