# concrete production, 20MPa, for building construction, with cement, type ICo

Dataset: EcoSpold 2, unit process
Geography: PE
Time period: 2014-01-01 to 2023-12-31
Technology level: current
Classification: ISIC rev.4 ecoinvent: 2395:Manufacture of articles of concrete, cement and plaster
Classification: EcoSpold01Categories: construction materials/concrete
Synonyms: ready-mix concrete; concreto premezclado; ready mixed concrete
Scenario: Business-as-Usual
System model: Allocation, cut-off by classification
Generated by: Simon Gmunder
Published in: Gmünder S. 2017
Database: ecoinvent
isCopyrightProtected: false
accessRestrictedTo: 1

## General comment
This dataset represents the production of 20MPa ready-mix concrete in Peru. Density: 2'358 kg/m³ - w/c: 0.65. Ingredients (for 1 m³): cement type ICo 300 kg, Water 195 kg, Gravel 1116 kg, Sand 744kg, Admixtures (retarder 0.3%cem and superplastisizers 0.7%cem) in total 3kg/m3.

## Included activities start
From reception of raw materials at the ready-mix plant gate.

## Included activities end
This activity ends before the delivery of concrete at the construction site.
The dataset includes the whole manufacturing processes to produce ready-mixed concrete, internal processes (material handling and mixing) and infrastructure.
The dataset does not include:
- the transport of concrete in a mixing truck.

## Geography
Representative production of ready-mix concrete 20 MPa with cement type ICo in Peru. Data based from main cement producers and personal comunications with local experts.

## Technology
Represent the current technology for ready-mix concrete production in Peru.

## Time period
The production volume of 2016 is considered. The data from sustainability reports goes from 2014 to 2016. Data have been reported with the production volume of corresponding year.

## Parameters
- losses: 0.03 dimensionless; lognormal variance with pedigree 0.018, pedigree (4,5,1,5,1)
  Estimated value. Losses due to returned concrete from construction sites.
- total aggregates: 1860 kg/m3; name aggregates_tot; lognormal variance with pedigree 0.0046, pedigree (3,4,1,1,1)
  Estimated value. The mix design contains 1860 kg /m3 of aggregates (Pimentel, 2017).
- water to cement ratio: 0.65 dimensionless; name w_c_ratio; lognormal variance with pedigree 0.0046, pedigree (3,4,1,1,1)
- water withdrawal, per cubic meter of concrete: 307 kg/m3; name water_withdrawal; = w_c_ratio*cement/(1+losses)+60; lognormal variance with pedigree 0.0046, pedigree (3,4,1,1,1)
  Calculated value. The water cement ratio (w/c) is 0.65. In addition, 60kg is assumed for other water uses such as washing, dust treatment, irrigation, etc.

## Reference product
- concrete, 20MPa: 1 m3; name concrete; By-product classification allocatable product; CPC 37510: Non-refractory mortars and concretes; HS2017 6810: Cement, concrete or artificial stone; whether or not reinforced, articles thereof
  reference flow
  production volume 330750 m3; name concrete_PV; = 35000000*0.1*0.45*0.21
    Calculated value. The total amount of ready-mix concrete used in Peru was estimated to 3.5 million m3 in 2014. The estimation is based on the production volume of Unicon (2137394 m3), which represents 59.8% of the market share (UNICON, 2014). The non-industrial process or “self-construction” concrete represent 90% of the market (Ing. Guerra, 2017; UNICON, 2014). About 45% of the ready-mix is concrete 20MPa concrete and 55% is 40MPa concrete. 21% of the ready-mix concrete is assumed to be consumed in the north (type ICo), 57% in the Center (Portland cement) and 22% in the South (type IP).
  property cement content 391.4 kg; = cement
  property dry mass 2243.91 kg; name dry_mass; = (cement+additives)/(1+losses)+ aggregates_tot
  property gravel content 1149.48 kg; = gravel
    calculated
  property price 185 EUR2005
    Estimated to be the same price as in case of concrete, normal (Data are not easily available. Therefore, an average price of products supplied by the activities in the same ISIC 3 code has been applied.This price is obtained as '_49 Concrete, asphalt and other mineral products, EU27 virgin, EU27' in the 'EU & DK Input Output Database' (available in SimaPro). The price is assumed to be valid for both RER2003, RER 2004, world 2003 and world 2004. Multiplied by density.).
  property sand content 766.32 kg; = sand
    calculated
  property water content 0.110076; = water_in_wet_mass/dry_mass
  property water in wet mass 247 kg; name water_in_wet_mass; = wet_mass-dry_mass
  property wet mass 2490.91 kg; name wet_mass; = dry_mass+ (w_c_ratio*cement)/(1+losses)
  properties: carbon allocation 0 kg, carbon content 0, carbon content, fossil 0

## Inputs from technosphere
- cement, type ICo: 391.4 kg; name cement; = 380*(1+losses); lognormal variance with pedigree 0.0126, pedigree (4,3,3,5,1)
  Estimated value. SUPERMIX value as the most produced concrete for 20MPa (Ing. Guerra, 2017)
  Uncertainty: Calculated variable. Uncertainty will be determined from propagation of uncertainty factors of underlying variables.
  property dry mass 1 kg; name cement_DM
  property water content 0; name cement_water_content
  property water in wet mass 0 kg; name cement_WWM
  property wet mass 1 kg; name cement_WM
- chemical, organic: 4.03142 kg; name additives; = cement*1/100*(1+losses); lognormal variance with pedigree 0.0113, pedigree (4,3,3,3,1)
  Calculated value. Local experts estimate as an average that aditives concentrations are: 1%cem additives are added to the recipe as :0.3%cem retarder and 0.7%cem superplasticizer (Ing. Guerra, 2017)
  properties: carbon content, fossil 0.628, dry mass 1 kg, heating value, net 19.03 MJ, wet mass 1 kg
  note on carbon content, fossil: This dataset is an unweighted average of 20 organic substances (listed in Tab 88.1, ecoinvent v2.2 report 8, part II), being part of the top100 chemicals included in this database. The C-content has also been calculated as an unweighted average of the C content of the substances composing this dataset.
- concrete mixing factory: 4.57e-7 unit; source Kellenberger D. 2007; lognormal variance with pedigree 0.3626, pedigree (2,1,5,5,1)
  EcoSpold01Location=CH
  Approximation. The average value of concrete production, 35 MPa (GLO) are used.
- electricity, medium voltage: 3.0797 kWh; = 2.99*(1+losses); lognormal variance with pedigree 0.0133, pedigree (2,3,3,3,1)
  EcoSpold01Location=CH
  Calculated value. The sustainability reports of the cement manufacturers reports the electricity demand for concrete (Cementos Argos S.A, 2017; Cemex, 2017; Holcim, 2015). The data is exprapolated from Colombia.
  Argos 2.38E+00 Colombia value, sustainability report 2016.
  Holcim 3.25E+00 Colombia value, sustainability report 2015.
  Cemex 3.70E+00 Colombia value, sustainability report 2015.
  Values in kWh/m3
  The value presented is calculated considering a weighted average with production volumes.
  Cementos Argos S.A. (2017). Energy and Co-Processing, 1-8.
  Cemex. (2015). Sustainability Report 2015.
  Holcim. (2015). Informe de Desarrollo Sostenible 2015.
  Uncertainty: There is an important variability of energy consumption between plants
- gravel, crushed: 1149.48 kg; name gravel; = 0.6*aggregates_tot*(1+losses); lognormal variance with pedigree 0.0126, pedigree (4,4,3,1,1)
  Estimated value. The mix design contains 1860 kg /m3 of aggregates. The aggregates are composed by a mix of 40% of sand and 60% of gravels (Ing. Pimentel, 2017).
  Uncertainty: Calculated variable. Uncertainty will be determined from propagation of uncertainty factors of underlying variables.
  properties: dry mass 1 kg, wet mass 1 kg
- lubricating oil: 0.0499 kg; name lub_oil; source Kellenberger D. 2007; lognormal variance with pedigree 0.3086, pedigree (2,5,3,5,1)
  Calculated value. Weighted average amount from 34 concrete plants in Brazil is used (Silva 2018).
  Silva, F. B., Oliveira, L. A., Passuello, A. C. B., Moraga, G. L., Silva, V. G., Silva, M. G., Saade, M. R. M., Gmünder, S., Myers, N. , Life Cycle Inventories of cement and concrete production in Latin America, 3 - SeparatePublication
  EcoSpold01Location=RER
  Uncertainty: Variance of logtransformed data calculated based on the sample's coefficient of variation.
  properties: carbon content, fossil 0.75, dry mass 1 kg, heating value, net 40.2 MJ, wet mass 1 kg
  note on carbon content, fossil: Lubricating oil is produced from diesel. C-content/dry mass of fats and oils considered 75%, from: ecoinvent v2.2 report, n 15a, pg 40
  note on heating value, net: Literature value, Source: IPCC 2006, 2006 IPCC Guidelines for National Greenhouse Gas Inventories, Prepared by the National Greenhouse Gas Inventories Programme, Eggleston H.S., Buendia L., Miwa K., Ngara T. and Tanabe K. (eds). Published: IGES, Japan
- sand: 766.32 kg; = 0.4*aggregates_tot*(1+losses); source Manuel Lascarro 2017; lognormal variance with pedigree 0.0108, pedigree (4,2,3,3,1)
  (same comment as for gravel, crushed)
  properties: dry mass 1 kg, wet mass 1 kg
- scrap steel: -0.0238 kg; = steel; lognormal variance with pedigree 0.0113, pedigree (2,3,1,3,1)
  Calculated value.
  production volume; = concrete_PV * steel / concrete
    Calculated from production volume of reference product using the relative outputs.
  properties: dry mass 1 kg, wet mass 1 kg
- steel, low-alloyed, hot rolled: 0.0238 kg; name steel; source Kellenberger D. 2007; lognormal variance with pedigree 0.0606, pedigree (2,5,5,5,1)
  EcoSpold01Location=RER
  Literature value. From ecoinvent dataset "concrete production, normal" (Accessed October 15th 2017)
  Uncertainty: Basic uncertainty from original dataset, completeness score adjusted
  properties: carbon content, fossil 0.005, dry mass 1 kg, wet mass 1 kg
  note on carbon content, fossil: Low alloyed steel composition given in Tab. 3.2 ecoinvent v2.2 report 10_partII. Steel assumed to have a C content of 0.5%
- synthetic rubber: 0.0636 kg; name rub; source Kellenberger D. 2007; lognormal variance with pedigree 0.0526, pedigree (2,1,5,5,1)
  Calculated value. Weighted average amount from 34 concrete plants in Brazil is used (Silva 2018).
  Silva, F. B., Oliveira, L. A., Passuello, A. C. B., Moraga, G. L., Silva, V. G., Silva, M. G., Saade, M. R. M., Gmünder, S., Myers, N. , Life Cycle Inventories of cement and concrete production in Latin America, 3 - SeparatePublication
  EcoSpold01Location=RER
  properties: carbon content, fossil 0.871949, dry mass 1 kg, heating value, net 26.42 MJ, wet mass 1 kg
  note on carbon content, fossil: EPDM (Ethylene-propene-diene terpolymer) rubber is a terpolymer of ethylene, propene, and a diene with the residual unsaturated portion of the diene in the side chain (ecoinvent v2.2 report 7-part XX & Ullmann). Chemical formula (deduced from Evidences of Solvent-Induced Miscibility in Polychloroprene-co-Ethylene-Propene Diene Terpolymer Blends, Dubey et al., Journal of Applied Polymer Science, 2009, 111:1884–1891): C20H35
- tap water: 316.21 kg; = water_withdrawal*(1+losses); lognormal variance with pedigree 0.0193, pedigree (4,3,3,3,3)
  Calculated value.
  EcoSpold01Location=CH
  Uncertainty: Calculated variable. Uncertainty will be determined from propagation of uncertainty factors of underlying variables.
  properties: carbon content, fossil 0.00178991, dry mass 0.000337476 kg, water content 2962.17, wet mass 1 kg
  note on carbon content, fossil: Bicarbonate content is 2.93 mol/m3. CO2 content is 0.1 mol/m3 (ecoinvent v2.2 report 8, Tab 93.1).
- waste concrete: -74.7274 kg; name waste_concrete; = concrete*wet_mass*losses; lognormal variance with pedigree 0.0113, pedigree (2,3,1,3,1)
  Calculated value.
  production volume; = concrete_PV * waste_concrete / concrete
    Calculated from production volume of reference product using the relative outputs.
  properties: dry mass 0.5 kg, water content 1, wet mass 1 kg
- waste mineral oil: -0.0499 kg; = lub_oil; lognormal variance with pedigree 0.0113, pedigree (2,3,1,3,1)
  Calculated value.
  production volume; = concrete_PV * lub_oil/concrete
    Calculated from production volume of reference product using the relative outputs.
  properties: carbon content, fossil 0.864444, dry mass 0.9 kg, heating value, net 34.7 MJ, water content 0.111111, wet mass 1 kg
  note on carbon content, fossil: Tab A.6, ecoinvent v2.2 report 13_I. C content has been calculated after data in the tables, and then referred to 1 kg DM
  note on heating value, net: Value taken from the general comment of the treatment dataset.
- waste rubber, unspecified: -0.0636 kg; = rub; lognormal variance with pedigree 0.0113, pedigree (2,3,1,3,1)
  Calculated value.
  production volume; = concrete_PV * rub / concrete
    Calculated from production volume of reference product using the relative outputs.
  properties: carbon content, fossil 0.853, dry mass 1 kg, heating value, net 27.19 MJ, wet mass 1 kg
- wastewater from concrete production: -0.02472 m3; name Water_to_water; = (water_withdrawal- water_in_wet_mass)*.4/1000*(1+losses); lognormal variance with pedigree 0.0113, pedigree (2,3,1,3,1)
  Calculated value. The water balance is established taking into account the total water input (withdrawal) minus the outputs, which include the water contained in the concrete, the water evaporated and the water infiltrated. In general, no waste water is produced. The water incorporated in the concrete correspond to the cement amount multiplied by w/c ratio. The share of the water evaporated to air and the water infiltrated is calculated based on the sustainability reports from Argos (60% evaporated).
  EcoSpold01Location=CH
  production volume; name waste_water; = concrete_PV*water_to_water/concrete
    Calculated value
  property dry mass 0.449139 kg; name Water_to_water_DM
  property water content 2225.48; name Water_to_water_water_content
  property water in wet mass 999.551 kg; name Water_to_water_WWM
  properties: carbon content, fossil 0.027074, wet mass 1000 kg
  note on carbon content, fossil: TOC =0.01216 kg/m3 (Tab A.20, ecoinvent v2.2 report 13_I). TOC was considered as Total Carbon.

## Emissions to nature
- Water [air, unspecified]: 0.03708 m3; name Water_to_air; = (water_withdrawal- water_in_wet_mass)*.6/1000*(1+losses); lognormal variance with pedigree 0.0039, pedigree (2,3,3,3,1)
  Calculated value. The water balance is established taking into account the total water input (withdrawal) minus the outputs, which include the water contained in the concrete, the water evaporated and the water infiltrated. In general, no waste water is produced. The water incorporated in the concrete correspond to the cement amount multiplied by w/c ratio. The share of the water evaporated to air and the water infiltrated is calculated based on the sustainability reports from Argos (60% evaporated).
  Uncertainty: Calculated variable. Uncertainty will be determined from propagation of uncertainty factors of underlying variables.

## Sampling procedure
Production data provides mostly from personal comunication with local experts and sustainability reports and general information of 2 principle cement and concrete producers of Peru (Paquasmayo and UNACEM). Data has been checked, completed and confirmed by personal communication with local experts.

Unit flows were calculated by dividing the amounts of inputs and outputs by the total concrete production in mass.

## Extrapolations
The main values are considered representative for a typical production of ready mix concrete for building construction in Peru.

The infrastrucutre is included and the main emissions to water and some inputs are taken from the global dataset for ready-mix concrete production.

The auxiliary material (rubber, lube oil) are based on a sampling of 34 concrete plants in Brazil.
