# ethylene carbonate production

Dataset: EcoSpold 2, unit process
Geography: RoW
Time period: 2009-01-01 to 2023-12-31
Technology level: current
Classification: ISIC rev.4 ecoinvent: 2011:Manufacture of basic chemicals
Synonyms: Dioxolone-2; 96-49-1; Ethylene glycol carbonate; 1,3-DIOXOLAN-2-ONE; Glycol carbonate
Scenario: Business-as-Usual
System model: Allocation, cut-off by classification
Generated by: Dominic Notter
Published in: Hischier, R. 2009
Database: ecoinvent
isCopyrightProtected: true
accessRestrictedTo: 1

## General comment
This dataset represents the production of 1 kg of ethylene carbonate. Ethylene carbonate can be used for example as electrolyte for batteries. The data are based on patents.
References:
Notter D. A., Gauch M., Widmer R., Wäger P., Stamp A., Zah R. and Althaus H.-J. (2010) Contribution of Li-ion batteries to the environmental impact of electric vehicles. Supporting Information.

## Included activities start
The activity starts when the raw materials enter the process.

## Included activities end
This activity ends with the production of 1 kg of ethylene carbonate. This dataset includes the reaction of ethylene oxide with carbon dioxide in a reactor with a reaction temperature of 120°C under pressure and with the use of a silver based catalyst. Energy consumption, ethylene oxide and CO2 emissions to air are calculated. After heating, the process runs under adiabatic conditions.

## Geography
Some Swiss or European datasets are used for global processes.

## Technology
This dataset describes a method of producing ethylene carbonate out of ethylene oxide and carbon dioxide under adiabatic conditions (after heating). Temperature in the reactor: 120 - 130 °C; pressure: 16 bar. Ethylene oxide conversion is 99.95%. Assumption: catalyst is silver based.

## Reference product
- ethylene carbonate: 1 kg; name RP; By-product classification allocatable product; CPC 34140: Carboxylic acids and their anhydrides, halides, peroxides and peroxyacids and their halogenated, sulphonated, […]; HS2017 283699: Carbonates; n.e.c. in heading no. 2836 and other than lithium or strontium; CAS 96-49-1
  The organic compund, ethylene carbonate (CH2O)2CO, is the carbonate ester of ethylene glycol and carbonic acid. At room temperature it appears as odorless and colorless crystalline solid. Ethylene carbonate can be used for example as electrolyte for batteries.
  production volume 3.79943e6 kg; name RP_PV
    Estimated value. The global production volume is extrapolated from the European production volume based on reports from Cefic (European Chemical Industry Council), and the American Chemistry Council.
    According to Cefic (2016a) the global sales of chemicals in the year 2015 was 3 534 billion euros. The reported share of sales per region are: EU28 14.7%; Other Europe (Switzerland, Norway, Turkey, Russia and Ukraine) 2.7%; NAFTA (US, Canada and Mexico) 16.5%; Latin America 3.8%; China 39.9%; Japan 3.9%; Republic of Korea 3.2%; India 2.2%; Rest of Asia 11.9%; Rest of the World 1.3%. Cefic also reports the US total sales, which amount to 518.7 billion euros out of the global 3 534 billion euros (14.7%). The same share is reported by the American Chemistry Council (2016), according to which the USA sales account for 15% of global sales for the year 2016.
    European production volume:
    Estimated value. According to the European Chemical Agency, the consumption of Ethylene carbonate for the year of 2016 is estimated to be 1000000 kg. The aforementioned value is the average of the range given in the literature. According to the European Chemical Industry Council (Cefic, 2016a), the total sales of chemicals of the European Union in 2016 amounted to 519 billion euros. Chemical imports were valued at 91 billion euros for the first 11 months of 2016. Based on this, the value for the total imports for the year 2016 was extrapolated, yielding a value of 99.3 billion euros. Furthermore, Cefic (2016b) reports a trade surplus (exports-imports) of 46.4 billion euros (once again extrapolated for the whole year using the value of 42 billion euros for the first 11 months of 2016). Considering all the aforementioned information, the total chemical consumption in the EU is calculated to be 472.6 billion euros (total sales-exports+imports). It is therefore calculated that production is 110% of consumption. This value is used to scale the information on chemical consumption to production. The European production volume is therefore 1100000 kg.
    Since no data were found for the global production this value was scaled accordingly.
    References:
    American Chemistry Council 2016. Outlook: U.S. Chemical Industry Continues to Outpace Industrial Output; Accounts for More Than One-Half of Construction Spending by Manufacturing Sector. Accessible at: https://www.americanchemistry.com/Media/PressReleasesTranscripts/ACC-news-releases/US-Chemical-Industry-Continues-to-Outpace-Industrial-Output.html
    European Chemical Agency, Brief profile of Ethylene carbonate, Accessible at: https://echa.europa.eu/brief-profile/-/briefprofile/100.002.283
    Cefic 2016a. Facts and figures 2016 of the European chemical industry. Accessible at: http://www.cefic.org/Facts-and-Figures/Chemicals-Industry-Profile/
    Cefic 2016b. 2016: EU chemicals output posts positive growth for third year running. Accessible at: http://www.cefic.org/Documents/RESOURCES/Chemical%20Trends%20Report/March-2017-Cefic-Chemicals-Trends-Report.pdf
  property heating value, net 27.53 MJ
    LHV is calculated based on the elemental composition of the substance. Based on the CAS number of the substance (000075-21-8), the chemical formula of the substance is found to be: C2H4O, (PubChem 2020).
    Reference: Kim, S., Chen, J., Cheng, T., Gindulyte, A., He, J., He, S., Li, Q., Shoemaker, B. A., Thiessen, P. A., Yu, B., Zaslavsky, L., Zhang, J., & Bolton, E. E. (2019). PubChem 2019 update: improved access to chemical data. Nucleic acids research, 47(D1), D1102–D1109. https://doi.org/10.1093/nar/gky1033
  property price 1.93 EUR2005
    Calculated value based on data from United Nations Commodity Trade Statistics Database (comtrade.un.org). UN comtrade category: 283699 Carbonates of metals nes. Year 2005. Using exchange rate of 1EURO = 1.209 USD. Average of price of import into 5 main markets (EU, US, JP, IN and CN).
  properties: carbon allocation 0.409173 kg, carbon content 0.409173, carbon content, fossil 0.409173, carbon content, non-fossil 0, dry mass 1 kg, water content 0, water in wet mass 0 kg, wet mass 1 kg

## Inputs from technosphere
- carbon dioxide, liquid: 0.0878128, 0.417157 kg (2 suppliers, which the file names only by identifier); sum of these 0.50497 kg; lognormal variance with pedigree 0.0546, pedigree (2,4,5,5,1)
  Stoichiometrical calculation according to Birnbach (2003). Reference(s): Birnbach, S.; Dockner, T.; Mohr, J.; Benfer, R.; Bieg, W.; Peters, J.; Ruge, B.; Weinle, W.; Zehner, P. Method for the continuous production of 1,3-Dioxolan-Ones. 2003.
  properties: carbon content, fossil 0.272727, dry mass 1 kg, heating value, net 8.27 MJ, wet mass 1 kg
- chemical factory, organics: 4e-10 unit; lognormal variance with pedigree 0.3498, pedigree (2,3,5,4,3)
  Calculated based on literature data published by the industry. For this activity, no information was readily available concerning infrastructure and land-use. Therefore, the infrastructure is estimated based on data from two chemical factories, the BASF site of Ludwigshafen and the chemical factory in Gendorf (which are both located in Germany), which produce a wide range of chemical substances. Based on this data, the following assumptions are made: the built area amounts to about 4.2 ha, the plant has an average output of 50'000 t/a and a lifespan of fifty years. The estimated infrastructure amount is therefore 4.00 E-10 units per kg of produced chemical.
  References:
  Althaus H.-J., Chudacoff M., Hischier R., Jungbluth N., Osses M. and Primas A. (2007) Life Cycle Inventories of Chemicals. ecoinvent report No. 8, v2.0. EMPA Dübendorf, Swiss Centre for Life Cycle Inventories, Dübendorf, CH.
  Gendorf (2000) Umwelterklärung 2000, Werk Gendorf. Werk Gendorf, Burgkirchen.
- electricity, medium voltage: 2.603e-6, 2.31515e-7, 2.01856e-5, 2.64513e-5, 2.8012e-5, 1.42679e-5, 1.97062e-6, 1.24726e-5, 5.26499e-7, 8.4295e-5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 kWh (47 suppliers, which the file names only by identifier); sum of these 0.002 kWh; lognormal variance with pedigree 0.096, pedigree (4,5,5,5,3)
  Estimated value according to Notter D. A., Gauch M., Widmer R., Wäger P., Stamp A., Zah R. and Althaus H.-J. (2010) Contribution of Li-ion batteries to the environmental impact of electric vehicles.
- ethylene oxide: 0.0981039, 0.402426 kg (2 suppliers, which the file names only by identifier); sum of these 0.50053 kg; lognormal variance with pedigree 0.0546, pedigree (2,4,5,5,1)
  (same comment as for carbon dioxide, liquid)
  properties: carbon content, fossil 0.545455, dry mass 1 kg, heating value, net 27.53 MJ, wet mass 1 kg
- heat, district or industrial, natural gas: 0.14333 MJ; lognormal variance with pedigree 0.072, pedigree (4,4,5,5,1)
  Stochiometrical calculation, specific heat and enthalpy of reaction according to Birnbach (2003). Reference(s): Birnbach, S.; Dockner, T.; Mohr, J.; Benfer, R.; Bieg, W.; Peters, J.; Ruge, B.; Weinle, W.; Zehner, P. Method for the continuous production of 1,3-Dioxolan-Ones. 2003.
  properties: heating value, net 1 MJ
- spent catalyst base from ethyleneoxide production: -0.00417952, -0.000820481 kg (2 suppliers, which the file names only by identifier); sum of these -0.005 kg; lognormal variance with pedigree 0.0328, pedigree (2,4,2,5,3)
  production volume; = RP_PV*BP_spent_catalyst_base_from_ethyleneoxid/ABS(RP)
    Calculated from the production volume of ethylene carbonate in proportion to the respective output amounts.
  properties: dry mass 1 kg, wet mass 1 kg

## Emissions to nature
- Carbon dioxide, fossil [air, unspecified]: 0.0053021 kg; lognormal variance with pedigree 0.0546, pedigree (2,4,5,5,1)
  Source: Birnbach, S.; Dockner, T.; Mohr, J.; Benfer, R.; Bieg, W.; Peters, J.; Ruge, B.; Weinle, W.; Zehner, P. Method for the continuous production of 1,3-Dioxolan-Ones. 2003.
- Ethylene oxide [air, unspecified]: 0.00025027 kg; lognormal variance with pedigree 0.1746, pedigree (2,4,5,5,1)
  (same comment as for Carbon dioxide, fossil)

## Sampling procedure
The data is based on patents and estimations based on stoechiometric calculations.

## Extrapolations
This dataset has been copied from an original dataset covering the geography CN. The uncertainty has been adjusted accordingly.

## Review by Emilia Moreno Ruiz 2017-08-08
This dataset was additionally reviewed in a separate review process by Eric Johnson of Atlantic Consulting as well as Emilia Moreno Ruiz and Gregor Wernet of ecoinvent.
