# treatment of waste, pneumatic tyres, open burning

Dataset: EcoSpold 2, unit process
Geography: GH
Time period: 2010-01-01 to 2023-12-31
Technology level: current
Classification: ISIC rev.4 ecoinvent: 3821:Treatment and disposal of non-hazardous waste
Synonyms: open, uncontrolled burning
Scenario: Business-as-Usual
System model: Allocation, cut-off by classification
Generated by: Avraam Symeonidis
Database: ecoinvent
isCopyrightProtected: true
accessRestrictedTo: 1

## General comment
This dataset represents the activity of waste disposal of 'waste, pneumatic tyres' in uncontrolled, open burning. Recommended use of this dataset: uncontrolled disposal of the waste through burning Inventoried waste contains 88.5% end-of-life tyres (ELT); 11.5% Iron in ELTs; . Waste composition (wet, in ppm): upper heating value 31.99 MJ/kg; lower heating value 31.99 MJ/kg; H2O n.a.; O 28492; H 61206; C 688560; S 13982; N 4484.9; P n.a.; B n.a.; Cl n.a.; Br n.a.; F n.a.; I n.a.; Ag n.a.; As n.a.; Ba n.a.; Cd n.a.; Co n.a.; Cr n.a.; Cu n.a.; Hg n.a.; Mn 1134.4; Mo n.a.; Ni n.a.; Pb n.a.; Sb n.a.; Se n.a.; Sn n.a.; V n.a.; Zn 15565; Be n.a.; Sc n.a.; Sr n.a.; Ti n.a.; Tl n.a.; W n.a.; Si 11080; Fe 115000; Ca 1688.4; Al n.a.; K n.a.; Mg n.a.; Na n.a.; .Share of metals in waste not oxidised and bulk-recyclable (exclude very small or thin parts) iron: 100%, . Recycling rates for metallic iron = 95% for metallic aluminium = 0% for metallic copper = 95% . From the burn residues 0.109kg iron, are separated and recycled. A mass of 0.0954kg residues are left on ground.
Reference: Positioning used tyres as a major fuel source. Alianpur, 2009 p 14. Available at: https://www.aliapur.fr/pdf/2_positioning_used_tyres_as_a_major_fuel_source.pdf. Accessed on 30th of September 2017.

## Included activities start
The activity starts with the waste being available at the location (gate) of the uncontrolled disposal. Collection and transportation of the waste to the uncontrolled disposal location is not included.

## Included activities end
The activity ends with the waste being disposed, in an uncontrolled manner and waste-specific emissions from open burning are released to the environment (air and soil).

## Geography
Modelling parameters representing a generic open burning process, not geographical specific.

## Technology
This is an inventory for open burning of solid waste. Informal or uncontrolled burning. No flue gas treatment. Suitable for informal recycling (e.g. burning of e-waste). Based on Municipal waste incineration without any pollution control. Residues (minus any actually recycled metals) are left on site. Assumption of share of thermal NOx to total NOx in average waste burning process is 30%. Contribution from thermal NOx is 810mg per kg waste. Recycling rates for metallic iron = 95% for metallic aluminium = 0% for metallic copper = 95% .

## Time period
This dataset represents a generic open burning without any temporal distinction.

## Reference product
- waste, pneumatic tyres: -1 kg; By-product classification Waste; CPC 39260: Used pneumatic tyres of rubber; HS2017 4004: Waste, parings and scrap of rubber (other than hard rubber) and powders and granules obtained therefrom
  Main reference product of this activity (supply of disposal service).
  production volume 3.91785e7 kg
    According to International Trade Center, 17038 Mg of Retreaded or used pneumatic tyres of rubber (category 401220) are imported in Ghana in year 2016. Additionally, 61319 Mg of new new pneumatic tyres, of rubber (category 4011). It is assumed that 50% of them is driven to open burning. Hence, 39178500 kg of ELTs are calculated to be driven to open burning in Ghana.
    Reference: International Trade Center, accessed on 26.02.2018 at
    https://www.trademap.org/Country_SelProductCountry.aspx?nvpm=1|288||||4012|||4|1|1|1|1||2|1|1
  property calcium content 0.0017939
    Value is a weighted average from ELTs from cars and trucks. More information are found in the product information of the waste.
  property carbon content, fossil 0.51211
    (same comment as for waste, pneumatic tyres)
  property carbon content, non-fossil 0.21947
    (same comment as for waste, pneumatic tyres)
  property heating value, gross 31.99 MJ
    (same comment as for waste, pneumatic tyres)
  property heating value, net 31.99 MJ
    Value taken from the general comment of the treatment dataset.
  property hydrogen content 0.06503
    (same comment as for waste, pneumatic tyres)
  property iron content 0.12219
    (same comment as for waste, pneumatic tyres)
  property manganese content 0.0012053
    (same comment as for waste, pneumatic tyres)
  property nitrogen content 0.0047651
    (same comment as for waste, pneumatic tyres)
  property oxygen content 0.030272
    (same comment as for waste, pneumatic tyres)
  property price 0 EUR2005
    Waste products are assigned a price of zero as they are assumed to require further treatment.
  property silicon content 0.011773
    (same comment as for waste, pneumatic tyres)
  property sulfur content 0.014856
    (same comment as for waste, pneumatic tyres)
  property zinc content 0.016538
    (same comment as for waste, pneumatic tyres)
  properties: carbon allocation 0.73158 kg, carbon content 0.73158, dry mass 1 kg, water content 0, water in wet mass 0 kg, wet mass 1 kg

## Inputs from technosphere
- iron scrap, sorted, pressed: -0.1093 kg; lognormal variance with pedigree 0.10909, pedigree (1,1,1,1,1)
  Metallic iron scrap removed from ash reamains and recycled.
  Uncertainty: uncertainty is calculated from uncertainties in waste composition and transfer coefficients to soild residues
  production volume; = 0.1093*39178500
    Calculated from production volume of reference product using the relative outputs.
  properties: dry mass 1 kg, price 0.175 EUR2005, wet mass 1 kg

## Inputs from nature
- Oxygen [natural resource, in air]: 2.2554 kg; lognormal variance with pedigree 0.013444, pedigree (1,1,3,1,1)
  oxygen from ambient air needed to combust and oxidise this waste. Net demand, i.e. without air O2 leaving the process uncombusted.
  Uncertainty: uncertainty is calculated from uncertainties in waste composition and transfer coefficients to flue gas and soild residues

## Emissions to nature
- Acetaldehyde [air, urban air close to ground]: 0.0004284 kg; lognormal variance with pedigree 0.0431, pedigree (1,1,3,1,1)
  Process-specific (constant) emissions to air from open burning.
  Uncertainty: uncertainty generic estimate
- Benzene [air, urban air close to ground]: 0.00097975 kg; lognormal variance with pedigree 0.0431, pedigree (1,1,3,1,1)
  (same comment as for Acetaldehyde)
- Calcium II [air, urban air close to ground]: 3.9863e-5 kg; lognormal variance with pedigree 0.62629, pedigree (1,1,3,1,1)
  Emissions to air from open burning.
  Uncertainty: Uncertainty calculated depending on waste input and uncertainty of transfer coefficents in incineration model.
- Carbon dioxide, fossil [air, urban air close to ground]: 1.7046 kg; lognormal variance with pedigree 0.0065256, pedigree (1,1,3,1,1)
  Emissions to air from open burning.
  Uncertainty: Uncertainty calculated depending on waste input, uncertainty of transfer coefficents in incineration model,and uncertainty in CO and CH4 emissions.
- Carbon dioxide, non-fossil [air, urban air close to ground]: 0.73056 kg; lognormal variance with pedigree 0.0065256, pedigree (1,1,3,1,1)
  (same comment as for Carbon dioxide, fossil)
- Carbon monoxide, fossil [air, urban air close to ground]: 0.02702 kg; lognormal variance with pedigree 0.64957, pedigree (1,1,3,1,1)
  (same comment as for Acetaldehyde)
- Dinitrogen monoxide [air, urban air close to ground]: 0.00011625 kg; lognormal variance with pedigree 0.0431, pedigree (1,1,3,1,1)
  (same comment as for Calcium II)
- Ethyl benzene [air, urban air close to ground]: 0.00032746 kg; lognormal variance with pedigree 0.0431, pedigree (1,1,3,1,1)
  (same comment as for Acetaldehyde)
- Formaldehyde [air, urban air close to ground]: 0.00044365 kg; lognormal variance with pedigree 0.0431, pedigree (1,1,3,1,1)
  (same comment as for Acetaldehyde)
- Manganese II [air, urban air close to ground]: 9.6562e-6 kg; lognormal variance with pedigree 0.69668, pedigree (1,1,3,1,1)
  (same comment as for Calcium II)
- Methane, fossil [air, urban air close to ground]: 0.00413 kg; lognormal variance with pedigree 0.0431, pedigree (1,1,3,1,1)
  (same comment as for Acetaldehyde)
- Methane, non-fossil [air, urban air close to ground]: 0.00177 kg; lognormal variance with pedigree 0.0431, pedigree (1,1,3,1,1)
  (same comment as for Acetaldehyde)
- Nitrogen oxides [air, urban air close to ground]: 0.0062637 kg; lognormal variance with pedigree 0.38105, pedigree (1,1,3,1,1)
  (same comment as for Calcium II)
- PAH, polycyclic aromatic hydrocarbons [air, urban air close to ground]: 0.0003443 kg; lognormal variance with pedigree 0.30374, pedigree (1,1,3,1,1)
  (same comment as for Acetaldehyde)
- Particulate Matter, < 2.5 um [air, urban air close to ground]: 0.0001105 kg; lognormal variance with pedigree 0.23627, pedigree (1,1,3,1,1)
  (same comment as for Calcium II)
- Particulate Matter, > 10 um [air, urban air close to ground]: 4.2501e-5 kg; lognormal variance with pedigree 0.23627, pedigree (1,1,3,1,1)
  (same comment as for Calcium II)
- Particulate Matter, > 2.5 um and < 10um [air, urban air close to ground]: 5.9501e-5 kg; lognormal variance with pedigree 0.23627, pedigree (1,1,3,1,1)
  (same comment as for Calcium II)
- Phenol [air, urban air close to ground]: 1.4799e-5 kg; lognormal variance with pedigree 0.0431, pedigree (1,1,3,1,1)
  (same comment as for Acetaldehyde)
- Polychlorinated biphenyls [air, urban air close to ground]: 1.1189e-7 kg; lognormal variance with pedigree 0.0431, pedigree (1,1,3,1,1)
  (same comment as for Acetaldehyde)
- Silicon [air, urban air close to ground]: 5.1773e-8 kg; lognormal variance with pedigree 0.62025, pedigree (1,1,3,1,1)
  (same comment as for Calcium II)
- Styrene [air, urban air close to ground]: 0.0005275 kg; lognormal variance with pedigree 0.0431, pedigree (1,1,3,1,1)
  (same comment as for Acetaldehyde)
- Sulfur dioxide [air, urban air close to ground]: 0.0060221 kg; lognormal variance with pedigree 0.33989, pedigree (1,1,3,1,1)
  (same comment as for Calcium II)
- Toluene [air, urban air close to ground]: 0.000372 kg; lognormal variance with pedigree 0.0431, pedigree (1,1,3,1,1)
  (same comment as for Acetaldehyde)
- Water [air, urban air close to ground]: 0.00048964 m3; lognormal variance with pedigree 0.16939, pedigree (1,1,3,1,1)
  water vapour from waste humidity, hydrogen oxidation.
  Uncertainty: Uncertainty calculated from uncertainty in waste composition and the uncertainty of fraction to air.
- Zinc II [air, urban air close to ground]: 0.0001158 kg; lognormal variance with pedigree 0.37349, pedigree (1,1,3,1,1)
  (same comment as for Calcium II)
- Calcium II [soil, industrial]: 0.0016486 kg; lognormal variance with pedigree 0.59166, pedigree (1,1,3,1,1)
  Emissions from open burning to residues left on ground.
  Uncertainty: Uncertainty calculated depending on waste input and uncertainty of transfer coefficents in incineration model.
- Carbon [soil, industrial]: 0.0034532 kg; lognormal variance with pedigree 0.070767, pedigree (1,1,3,1,1)
  (same comment as for Calcium II)
- Iron ion [soil, industrial]: 0.00575 kg; lognormal variance with pedigree 2.2244, pedigree (1,1,3,1,1)
  (same comment as for Calcium II)
- Manganese II [soil, industrial]: 0.0011248 kg; lognormal variance with pedigree 0.64318, pedigree (1,1,3,1,1)
  (same comment as for Calcium II)
- Nitrogen [soil, industrial]: 4.4903e-5 kg; lognormal variance with pedigree 0.51783, pedigree (1,1,3,1,1)
  (same comment as for Calcium II)
- Silicon [soil, industrial]: 0.01108 kg; lognormal variance with pedigree 0.35717, pedigree (1,1,3,1,1)
  (same comment as for Calcium II)
- Sulfur [soil, industrial]: 0.011975 kg; lognormal variance with pedigree 0.32982, pedigree (1,1,3,1,1)
  (same comment as for Calcium II)
- Zinc II [soil, industrial]: 0.015449 kg; lognormal variance with pedigree 0.31726, pedigree (1,1,3,1,1)
  (same comment as for Calcium II)

## Sampling procedure
The waste composition was derived from literature. All information are found in the general comment. The UPR-LCI is created with a model for waste-specific life cycle inventories of open burning of waste.

Reference for the model:
Doka G. (2017) A model for waste-specific life cycle inventories of open burning of waste. Doka Life Cycle
Assessments, Zurich, Switzerland. Available at http://www.doka.ch/publications.htm

## Review by Gabor Doka 2018-01-30
passed.
