# tillage, harrowing, by offset disc harrow

Dataset: EcoSpold 2, unit process
Geography: US
Time period: 2021-01-01 to 2023-12-31
Technology level: current
Classification: ISIC rev.4 ecoinvent: 0161:Support activities for crop production
Scenario: Business-as-Usual
System model: Allocation, cut-off by classification
Generated by: Juanita Barrera
Database: ecoinvent
isCopyrightProtected: true
accessRestrictedTo: 1

## General comment
This dataset represents the harrowing operation, by offset disc harrow in one hectare (ha). This tillage operation is mainly performed to break up the surface of the soil and to incorporate the limestone and gypsum. Functional Unit (FU) is one hectare of tillage harrowing. The operation time is about 1.38 hours per ha (62.5% of this time is effectively worked, discounting time for maintenance, waiting in the field and re-allocations between the plots).

## Included activities start
The activity starts from the agricultural field foreseen to be processed.

## Included activities end
This activity ends with harrowing. The dataset includes the diesel fuel consumption and the amount of agricultural machinery and shed. Also taken into consideration is the amount of emissions to the air from diesel combustion and the emission to the soil from tyre abrasion during the work process.

## Geography
The inventory is extrapolated from the Global geography. Data quality indicators from adjusted accordingly.

## Technology
Fuel consumption and emissions per kg diesel have been extrapolated to the US, but others inputs were taken from the original values.

## Reference product
- tillage, harrowing, by offset disc harrow: 1 ha; By-product classification allocatable product; CPC 86119: Other support services to crop production
  production volume 269486 ha
    Area of sugarcane, arable crops, permanent meadows and pasture, year 2020, according to the FAOSTAT data. This operation is assumed to occur every 5 year in sugarcane and every 7 years in permanent meadows and pasture.
  property price 34.8335 EUR2005
    The price is from the year 2020. Price information has been directly provided by the data provider based on the following reference: University of Minnesota, Machinery cost estimates, W.F. Lazarus, 2020. The prices were adjusted for inflation relative to 2005 using the producer price index (PPI) of the euro area, published by eurostat (https://ec.europa.eu/eurostat/databrowser/view/STS_INPP_A__custom_6416181/default/table?lang=en, last accessed on 2023-06-01).
  properties: carbon allocation 0 kg, carbon content 0

## Inputs from technosphere
- agricultural machinery, tillage: 0.493448 kg; lognormal variance with pedigree 0.3034, pedigree (2,3,2,5,1)
  proxy from "tillage, harrowing, by offset disc harrow, GLO"
- diesel: 5.94762 kg; lognormal variance with pedigree 0.002, pedigree (2,3,2,1,1)
  2021 Nebraska Crop budget projections, Robert Klein and Glennis McClure, UNL Extension
  properties: carbon content, fossil 0.865, dry mass 1 kg, heating value, net 42.8 MJ, wet mass 1 kg
- shed: 0.002 m2; lognormal variance with pedigree 0.3128, pedigree (3,3,2,5,3)
  proxy from "tillage, harrowing, by offset disc harrow, GLO"
- tractor, 4-wheel, agricultural: 0.983735 kg; lognormal variance with pedigree 0.3034, pedigree (2,3,2,5,1)
  adapted from "tillage, harrowing, by offset disc harrow, GLO" to match the diesel consumption

## Emissions to nature
- Ammonia [air, non-urban air or from high stacks]: 0.000118799 kg; lognormal variance with pedigree 0.060325, pedigree (3,2,2,2,3)
  (same comment as for tractor, 4-wheel, agricultural)
- Benzene [air, non-urban air or from high stacks]: 4.35388e-5 kg; lognormal variance with pedigree 0.060325, pedigree (3,2,2,2,3)
  (same comment as for tractor, 4-wheel, agricultural)
- Benzo(a)pyrene [air, non-urban air or from high stacks]: 1.78509e-7 kg; lognormal variance with pedigree 0.660325, pedigree (3,2,2,2,3)
  (same comment as for tractor, 4-wheel, agricultural)
- Cadmium II [air, non-urban air or from high stacks]: 5.93994e-8 kg; lognormal variance with pedigree 0.660325, pedigree (3,2,2,2,3)
  (same comment as for tractor, 4-wheel, agricultural)
- Carbon dioxide, fossil [air, non-urban air or from high stacks]: 18.5662 kg; lognormal variance with pedigree 0.0223, pedigree (3,2,2,5,3)
  (same comment as for tractor, 4-wheel, agricultural)
- Carbon monoxide, fossil [air, non-urban air or from high stacks]: 0.0321161 kg; lognormal variance with pedigree 0.6623, pedigree (3,2,2,5,3)
  (same comment as for tractor, 4-wheel, agricultural)
- Chromium III [air, non-urban air or from high stacks]: 2.97308e-7 kg; lognormal variance with pedigree 0.6623, pedigree (3,2,2,5,3)
  (same comment as for tractor, 4-wheel, agricultural)
- Copper ion [air, non-urban air or from high stacks]: 1.01072e-5 kg; lognormal variance with pedigree 0.6623, pedigree (3,2,2,5,3)
  (same comment as for tractor, 4-wheel, agricultural)
- Dinitrogen monoxide [air, non-urban air or from high stacks]: 0.000712171 kg; lognormal variance with pedigree 0.0623, pedigree (3,2,2,5,3)
  (same comment as for tractor, 4-wheel, agricultural)
- Methane, fossil [air, non-urban air or from high stacks]: 0.000768149 kg; lognormal variance with pedigree 0.060325, pedigree (3,2,2,2,3)
  (same comment as for tractor, 4-wheel, agricultural)
- NMVOC, non-methane volatile organic compounds [air, non-urban air or from high stacks]: 0.0178416 kg; lognormal variance with pedigree 0.060325, pedigree (3,2,2,2,3)
  (same comment as for tractor, 4-wheel, agricultural)
- Nickel II [air, non-urban air or from high stacks]: 4.16729e-7 kg; lognormal variance with pedigree 0.660325, pedigree (3,2,2,2,3)
  (same comment as for tractor, 4-wheel, agricultural)
- Nitrogen oxides [air, non-urban air or from high stacks]: 0.252774 kg; lognormal variance with pedigree 0.050325, pedigree (3,2,2,2,3)
  (same comment as for tractor, 4-wheel, agricultural)
- PAH, polycyclic aromatic hydrocarbons [air, non-urban air or from high stacks]: 1.95614e-5 kg; lognormal variance with pedigree 0.320325, pedigree (3,2,2,2,3)
  (same comment as for tractor, 4-wheel, agricultural)
- Particulate Matter, < 2.5 um [air, non-urban air or from high stacks]: 0.0503869 kg; lognormal variance with pedigree 0.060325, pedigree (3,2,2,2,3)
  (same comment as for tractor, 4-wheel, agricultural)
- Selenium IV [air, non-urban air or from high stacks]: 5.93994e-8 kg; lognormal variance with pedigree 0.060325, pedigree (3,2,2,2,3)
  (same comment as for tractor, 4-wheel, agricultural)
- Sulfur dioxide [air, non-urban air or from high stacks]: 0.00600214 kg; lognormal variance with pedigree 0.020325, pedigree (3,2,2,2,3)
  (same comment as for tractor, 4-wheel, agricultural)
- Zinc II [air, non-urban air or from high stacks]: 5.93994e-6 kg; lognormal variance with pedigree 0.660325, pedigree (3,2,2,2,3)
  (same comment as for tractor, 4-wheel, agricultural)
- Cadmium II [soil, agricultural]: 6.28e-5 kg; lognormal variance with pedigree 0.0462, pedigree (3,4,2,5,1)
  proxy from "tillage, harrowing, by offset disc harrow, GLO"
- Lead II [soil, agricultural]: 0.000272 kg; lognormal variance with pedigree 0.0462, pedigree (3,4,2,5,1)
  proxy from "tillage, harrowing, by offset disc harrow, GLO"
- Zinc II [soil, agricultural]: 0.00167 kg; lognormal variance with pedigree 0.0462, pedigree (3,4,2,5,1)
  proxy from "tillage, harrowing, by offset disc harrow, GLO"

## Extrapolations
The dataset is modeled for agricultural production system in US. Data Quality indicators are adjusted accordingly.
