# particleboard production, uncoated, from virgin wood

Dataset: EcoSpold 2, unit process
Geography: RoW
Time period: 2000-01-01 to 2023-12-31
Technology level: current
Classification: ISIC rev.4 ecoinvent: 1621:Manufacture of veneer sheets and wood-based panels
Classification: EcoSpold01Categories: wooden materials/extraction
Synonyms: Medium density particleboard (MDP) production; Particleboard
Scenario: Business-as-Usual
System model: Allocation, cut-off by classification
Generated by: Diogo Silva
Database: ecoinvent
isCopyrightProtected: true
accessRestrictedTo: 1

## General comment
This dataset represents particleboard production (uncoated), for indoor use (furniture industry), from virgin wood (eucalyptus species). This dataset was extrapolated from the Brazilian dataset of the same name. Default properties of the products are kept.

## Included activities start
From reception of raw materials at the factory gate. Includes the inputs to the production processes and the main process emissions.

## Included activities end
Until and including loading of the product on lorries. Capital goods, such as industrial machinery and infrastructure, as well as personnel activities, for instance, transport of workers to and from the workplace, were not included within the system boundary.

## Geography
Average of data from Germany and Brazil.

## Technology
Particleboard production is characterized by the use of wood coming from dedicated eucalyptus plantations. The main activities included in the industrial production are: reception and storage of wood logs; production, drying and classification of particles; blending; mat forming and pressing; and finishing. Stored wood logs are debarked and chips and flakes are produced using choppers and ring flakers. The wood particles are then dried and classified. The larger particles form the internal layer of the panel, while the smaller ones are incorporated in the external layers. Bark and other wood residues from the manufacturing process as well as heavy fuel oil are burned to produce hot gas for particle drying and hot pressing processes. The dried particles are then blended with the synthetic adhesive and a mat of glued particles is made using feeding machines which form the three layers of the panel. The next steps are the pre-pressing and hot pressing (160-200ºC) of the mat to consolidate the panel. Afterwards, the panel is cut to the final dimensions and sanded.

## Parameters
- fraction, cooling water, cooling pond system, to air: 0.032 dimensionless; lognormal variance with pedigree 0.0413, pedigree (2,3,1,3,1)
- fraction, cooling water, once-through system, to air: 0.004 dimensionless; name fraction_CW_OT_to_air; lognormal variance with pedigree 0.0413, pedigree (2,3,1,3,1)
  Calculated based on literature value (Scown, C.D., 2011, Water Footprint of U.S. Transportation Fuels and supplying information of the article) (Vionnet, S., Quantis Water Database - Technical Report, 2012).
- fraction, cooling water, recirculating system, to air: 0.771 dimensionless; name fraction_CW_R_to_air; lognormal variance with pedigree 0.0413, pedigree (2,3,1,3,1)
  (same comment as for fraction, cooling water, once-through system, to air)
- fraction, cooling water, to air: 0.3875 dimensionless; name fraction_CW_to_air; = (0.5*fraction_CW_OT_to_air)+(0.5*fraction_CW_R_to_air); lognormal variance with pedigree 0.092025, pedigree (4,4,3,2,4)
  Calculated value based on literature value (see comments of the other parametres present in this dataset) and expert opinion. In the case when no industry/literature data are available about the type of cooling or directly fraction, cooling water, to air specific for the process a default assumption is applied. It is assumed that the once-through cooling system is used in 50% of all cases and recirculating system is used in another 50% of all cases.

## Reference product
- particleboard, uncoated: 1 m3; name RP_amount_1; By-product classification allocatable product; CPC 31431: Particle board; HS2017 4410: Particle board, oriented strand board (OSB) and similar board (e.g. waferboard) of wood or other ligneous mat[...]
  production volume 1.49607e7 m3; name RP_PV_1; = 1.6623E+06*(1/0.1)
    Calculated based on literature value and expert judgement.
    1.6623E+06 m3/year is the annual production volume of particle board, for indoor use. It is estimated, that the barzilian production represents 10% of global production.
  property dry mass 638 kg; name RP_dry_mass_1
  property heating value, net 8749.71 MJ
    LHV is calculated based on the Carbon content of the product. More details can be found on the respective documentation.The property is based on a value of 13.74MJ/kg
  property price 217 EUR2005
    Export prices for the World+ according to: http://faostat.fao.org/site/626/DesktopDefault.aspx?PageID=626#ancor downloaded 28 April 2009; calculated as export value divided by export volume.
  property water content 0.0658307; = RP_water_in_wet_mass_1/ RP_dry_mass_1
  property water in wet mass 42 kg; name RP_water_in_wet_mass_1; = RP_wet_mass_1- RP_dry_mass_1
  property wet mass 680 kg; name RP_wet_mass_1
  properties: carbon allocation 314.72 kg, carbon content 0.493291, carbon content, fossil 0.0471697, carbon content, non-fossil 0.446121

## Inputs from technosphere
- ammonium sulfate: 1.05596, 0.324038 kg (2 suppliers, which the file names only by identifier); sum of these 1.38 kg; lognormal variance with pedigree 0.2106, pedigree (5,5,5,5,5)
  Estimate. The value is extrapolated from the particle board production, for indoor use, from virgin wood, BR (Brazil).
  properties: dry mass 1 kg, wet mass 1 kg
- bark chips, wet, measured as dry mass: 3.58256, 0.317535, 15.3008, 0.0491471 kg (4 suppliers, which the file names only by identifier); sum of these 19.25 kg; = 38.5/2; lognormal variance with pedigree 0.2106, pedigree (5,5,5,5,5)
  (same comment as for ammonium sulfate)
  properties: carbon content, non-fossil 0.494, dry mass 1 kg, heating value, net 4.81 MJ, water content 1.4, wet mass 2.4 kg
- diesel: 0.00311551, 1.29153, 0.013242, 0.130794, 0.00916159, 0.272161 kg (6 suppliers, which the file names only by identifier); sum of these 1.72 kg; lognormal variance with pedigree 0.2106, pedigree (5,5,5,5,5)
  (same comment as for ammonium sulfate)
  properties: carbon content, fossil 0.865, dry mass 1 kg, heating value, net 42.8 MJ, wet mass 1 kg
  note on carbon content, fossil: C-content of diesel is 86.5% (ecoinvent v2.2 report 6_IV, Tab 3.14)
- electricity, medium voltage: 0.0978315, 0.00436501, 0.101716, 0.0515698, 0.0631481, 0.0365448, 4.03995, 80.5879, 0.00906257, 27.0773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 kWh (31 suppliers, which the file names only by identifier); sum of these 140.83 kWh; lognormal variance with pedigree 0.21, pedigree (5,5,5,5,5)
  Estimate. The value is extrapolated from the particle board production, for indoor use, from virgin wood, BR (Brazil).
  EcoSpold01Location=UCTE
- heavy fuel oil: 0.154366, 0.0898893, 2.20085, 0.45698, 10.6826, 0.115315 kg (6 suppliers, which the file names only by identifier); sum of these 13.7 kg; lognormal variance with pedigree 0.2106, pedigree (5,5,5,5,5)
  (same comment as for ammonium sulfate)
  properties: carbon content, fossil 0.849, dry mass 1 kg, heating value, net 41.2 MJ, wet mass 1 kg
- lubricating oil: 0.003132, 0.014868 kg (2 suppliers, which the file names only by identifier); sum of these 0.018 kg; lognormal variance with pedigree 0.2106, pedigree (5,5,5,5,5)
  (same comment as for ammonium sulfate)
  properties: carbon content, fossil 0.75, dry mass 1 kg, heating value, net 40.2 MJ, wet mass 1 kg
  note on carbon content, fossil: Lubricating oil is produced from diesel. C-content/dry mass of fats and oils considered 75%, from: ecoinvent v2.2 report, n 15a, pg 40
  note on heating value, net: Literature value, Source: IPCC 2006, 2006 IPCC Guidelines for National Greenhouse Gas Inventories, Prepared by the National Greenhouse Gas Inventories Programme, Eggleston H.S., Buendia L., Miwa K., Ngara T. and Tanabe K. (eds). Published: IGES, Japan
- paraffin: 5.47 kg; lognormal variance with pedigree 0.31, pedigree (5,5,5,5,5)
  EcoSpold01Location=RER
  Estimate. The value is extrapolated from the particle board production, for indoor use, from virgin wood, BR (Brazil).
  properties: carbon content, fossil 0.847059, dry mass 1 kg, heating value, net 41.5 MJ, wet mass 1 kg
  note on carbon content, fossil: An average composition of C12H26 (molecular weight of 170 g/mol) was assumed for n-parafins, after ecoinvent v2.2 report 8, part II, pg 398
  note on heating value, net: Indicative value. Reference: Fuels - Higher and Lower Calorific Values, available at: https://www.engineeringtoolbox.com/fuels-higher-calorific-values-d_169.html
- sawlog and veneer log, eucalyptus ssp., measured as solid wood under bark: 0.00909404, 1.29591 m3 (2 suppliers, which the file names only by identifier); sum of these 1.305 m3; lognormal variance with pedigree 0.2106, pedigree (5,5,5,5,5)
  (same comment as for ammonium sulfate)
  properties: bark 0.1, carbon content, non-fossil 0.494, dry mass 557.647 kg, heating value, net 11336.5 MJ, water content 0.4114, wet mass 787.063 kg
  note on bark: The bark of eucalyptus is app. 10% (68.72kg) of the eucalyptus wood, under bark. This amount represents wood with a dry mass of 1.
- slab and siding, softwood, wet, measured as dry mass: 8.96136, 8.08777, 2.08577, 0.115102 kg (4 suppliers, which the file names only by identifier); sum of these 19.25 kg; = 38.5/2; lognormal variance with pedigree 0.2106, pedigree (5,5,5,5,5)
  (same comment as for ammonium sulfate)
  properties: carbon content, non-fossil 0.494, dry mass 1 kg, heating value, net 7.79 MJ, water content 0.7, wet mass 1.7 kg
- urea formaldehyde resin: 12.4758, 59.2242 kg (2 suppliers, which the file names only by identifier); sum of these 71.7 kg; lognormal variance with pedigree 0.31, pedigree (5,5,5,5,5)
  Estimate. The value is extrapolated from the particle board production, for indoor use, from virgin wood, BR (Brazil).
  EcoSpold01Location=RER
  properties: carbon content, fossil 0.408958, dry mass 1 kg, heating value, net 12.39 MJ, wet mass 1 kg
  note on carbon content, fossil: Chemical formula of the urea formaldehide monomer was assumed to be C3H8N2O
- waste wood, untreated: -3.56064, -0.0926846, -69.0681, -1.26772, -0.537927, -21.8225, -0.850418 kg (7 suppliers, which the file names only by identifier); sum of these -97.2 kg
  (same comment as for ammonium sulfate)
  production volume; = RP_PV_1 * (BP_amount_2 / RP_amount_1)
    Calculated from production volume of reference product using the relative outputs.
  properties: carbon content, non-fossil 0.48632, dry mass 0.8 kg, heating value, net 13.99 MJ, water content 0.25, wet mass 1 kg
  note on heating value, net: Value taken from the general comment of the treatment dataset.
- wastewater from particle board production: -0.00482214, -0.00117786 m3 (2 suppliers, which the file names only by identifier); sum of these -0.006 m3; lognormal variance with pedigree 0.212, pedigree (5,5,5,5,5)
  (same comment as for ammonium sulfate)
  production volume; = wastewater_output/ RP_amount_1* RP_PV_1
    Calculated from production volume of reference product using the relative outputs.
  properties: carbon content, non-fossil 4.4393e-12, dry mass 0.00279718 kg, mass concentration, TOC 0.0015871 kg/m3, mass concentration, hydrogen 0.0010157 kg/m3, mass concentration, oxygen 0.00019441 kg/m3, water content 357502, wet mass 1000 kg
- wood ash mixture, pure: -0.238825, -0.146679, -0.0044956 kg (3 suppliers, which the file names only by identifier); sum of these -0.39 kg; lognormal variance with pedigree 0.2106, pedigree (5,5,5,5,5)
  (same comment as for ammonium sulfate)
  production volume; = RP_PV_1 * (BP_amount_1 / RP_amount_1)
    Calculated from production volume of reference product using the relative outputs.
  properties: carbon content, non-fossil 0.012, dry mass 1 kg, wet mass 1 kg
- wooden board factory, organic bonded boards: 3.33e-8 unit; lognormal variance with pedigree 0.56, pedigree (5,5,5,5,5)
  (same comment as for paraffin)

## Inputs from nature
- Water, cooling, unspecified natural origin [natural resource, in water]: 0.0904 m3; name water_cooling_UNO_input; source Wilson, J.B. 2009; lognormal variance with pedigree 0.22, pedigree (5,5,5,5,5)
  (same comment as for ammonium sulfate)

## Emissions to nature
- Carbon dioxide, fossil [air, unspecified]: 48.088 kg; lognormal variance with pedigree 0.2106, pedigree (5,5,5,5,5)
  (same comment as for ammonium sulfate)
- Carbon dioxide, non-fossil [air, unspecified]: 140.95 kg; lognormal variance with pedigree 0.2106, pedigree (5,5,5,5,5)
  (same comment as for ammonium sulfate)
- Carbon monoxide, fossil [air, unspecified]: 0.009657 kg; lognormal variance with pedigree 0.86, pedigree (5,5,5,5,5)
  (same comment as for ammonium sulfate)
- Carbon monoxide, non-fossil [air, unspecified]: 1.83 kg; lognormal variance with pedigree 0.86, pedigree (5,5,5,5,5)
  (same comment as for ammonium sulfate)
- Formaldehyde [air, unspecified]: 0.15 kg; lognormal variance with pedigree 0.25, pedigree (5,5,5,5,5)
  (same comment as for ammonium sulfate)
- Hydrocarbons, aliphatic, alkanes, unspecified [air, unspecified]: 0.00164 kg; lognormal variance with pedigree 0.25, pedigree (5,5,5,5,5)
  (same comment as for ammonium sulfate)
- Methane, fossil [air, urban air close to ground]: 0.00169 kg; lognormal variance with pedigree 0.25, pedigree (5,5,5,5,5)
  (same comment as for ammonium sulfate)
- NMVOC, non-methane volatile organic compounds [air, unspecified]: 0.36 kg; lognormal variance with pedigree 0.25, pedigree (5,5,5,5,5)
  (same comment as for ammonium sulfate)
- Nitrogen oxides [air, unspecified]: 0.18 kg; lognormal variance with pedigree 0.25, pedigree (5,5,5,5,5)
  (same comment as for ammonium sulfate)
- Particulate Matter, < 2.5 um [air, unspecified]: 0.02 kg; lognormal variance with pedigree 0.51, pedigree (5,5,5,5,5)
  (same comment as for ammonium sulfate)
- Particulate Matter, > 10 um [air, unspecified]: 0.08 kg; lognormal variance with pedigree 0.25, pedigree (5,5,5,5,5)
  (same comment as for ammonium sulfate)
- Particulate Matter, > 2.5 um and < 10um [air, unspecified]: 0.08 kg; lognormal variance with pedigree 0.51, pedigree (5,5,5,5,5)
  (same comment as for ammonium sulfate)
- Sulfur dioxide [air, urban air close to ground]: 1.31 kg; lognormal variance with pedigree 0.2106, pedigree (5,5,5,5,5)
  (same comment as for ammonium sulfate)
- Sulfur trioxide [air, unspecified]: 0.0171 kg; lognormal variance with pedigree 0.2106, pedigree (5,5,5,5,5)
  (same comment as for ammonium sulfate)
- Water [air, unspecified]: 0.340862 m3; name water_to_air_unspecified; = (water_cooling_UNO_input*fraction_CW_to_air)+(slab_input* slab_input_WWM/1000*0.9)+(bark_input* bark_input_WWM/1000*0.9)+(roundwood_eucalyptus_input* WWM_eucalyptus/1000*0.9); lognormal variance with pedigree 0.25, pedigree (5,5,5,5,5)
  (same comment as for ammonium sulfate)
- Oils, unspecified [soil, industrial]: 0.0159 kg; lognormal variance with pedigree 0.25, pedigree (5,5,5,5,5)
  (same comment as for ammonium sulfate)
- Formaldehyde [water, unspecified]: 7.3e-5 kg; lognormal variance with pedigree 0.25, pedigree (5,5,5,5,5)
  (same comment as for ammonium sulfate)
- Suspended solids, unspecified [water, unspecified]: 0.0244 kg; lognormal variance with pedigree 0.25, pedigree (5,5,5,5,5)
  (same comment as for ammonium sulfate)
- Water [water, unspecified]: 0.04937 m3; name water_to_water_unspecified; = water_cooling_UNO_input*(1-fraction_CW_to_air)-wastewater_output; lognormal variance with pedigree 0.25, pedigree (5,5,5,5,5)
  (same comment as for ammonium sulfate)
  property carbon content, fossil 0; name C_content_fossil
  property carbon content, non-fossil 0; name C_content_non_fossil
  property dry mass 0 kg; name DM
  property water in wet mass 1000 kg; name WWM
  property wet mass 1000 kg; name WM

## Sampling procedure
This dataset has been copied from an original dataset covering the geography BR.

## Extrapolations
see Geography and Technology This dataset has been copied from an original dataset covering the geography BR. The uncertainty has been adjusted accordingly.

## Review by Emilia Moreno Ruiz 2014-06-20
wood fuel, softwood, wet, measured as solid wood under bark input replaced
