# tram production

Dataset: EcoSpold 2, unit process
Geography: RER
Time period: 1991-01-01 to 2023-12-31
Technology level: current
Classification: ISIC rev.4 ecoinvent: 3020:Manufacture of railway locomotives and rolling stock
Classification: EcoSpold01Categories: transport systems/road
Scenario: Business-as-Usual
System model: Allocation, cut-off by classification
Generated by: Michael Spielmann (obsolete)
Published in: Spielmann M. 2004
Database: ecoinvent
isCopyrightProtected: true
accessRestrictedTo: 1

## General comment
The dataset represents the production of one tram. Disposal of tram is included.

## Included activities start
The activity starts with the material (steel, aluminium, copper, polyethylene, rubber, glass and paint) for the production of the tram.

## Included activities end
The activity ends with the production of one tram and its disposal. The activity includes the material consumption for the production (steel, aluminium, copper, rubber, glass and paint), the energy consumption (electricity and light fuel oil) and until and including the consumption of lead (battery).

## Geography
Vehicle manufacturing data are taken from one production site in Switzerland.

## Technology
The material composition of a tram is obtained from Maibach et al. (1999). Manufacturing expenditures and interventions for a tram are obtained from Maibach et al. (1999). However, is assumed that 50% of the heating energy is based on natural gas and 50% is based on light fuel oil.
References:
Maibach M., Peter D. and Seiler B. (1999) Ökoinventar Transporte: Grundlagen für den ökologischen Vergleich von Transportsystemen und den Einbezug von Transportsystemen in Ökobilanzen. Technischer Schlussbericht. In: Schweizerischer Nationalfonds zur Förderung der wissenschaftlichen Forschung (ed. SPP Umwelt M.). 2nd Edition. INFRAS, Zürich

## Reference product
- tram: 1 unit; name RP_amount_1; By-product classification allocatable product; CPC 49520: Self-propelled railway or tramway coaches, vans and trucks (except maintenance or service vehicles); HS2017 8603: Railway or tramway coaches, vans and trucks; self-propelled tenders, other than those of heading no. 8604
  EcoSpold01Location=RER
  production volume 1.32237 unit; name RP_PV_1
    This is a placeholder value that does not reflect real-world production volumes. This dataset does not currently require a real-world production volume to work in the database framework, and no actual data were collected yet. This has no negative effect on the results of the ecoinvent database. The placeholder value of this activity was scaled according to the nominal GDP of 2005 (source: United Nations, http://data.un.org/Glossary.aspx?q=GDP+%28current+US%24%29, accessed 20130726) to reflect an appropriate share of the global production volume, which is also a placeholder value.
  property price 29889 EUR2005
    UNData (Average Import/Export prices of EU27; 1.479EUR/kg) Railway cars nes, (http://data.un.org/Data.aspx?q=railway+cars&d=ComTrade&f=_l1Code%3a86%3bcmdCode%3a860699). Total weight of Tram was 21 t (Source: Existing ecoinvent documentation from ecoinvent v.2.2. From information in the dataset tram production.)
  properties: carbon allocation 0 kg, carbon content 0

## Inputs from technosphere
- alkyd paint, white, without solvent, in 60% solution state: 371 kg; source Maibach M. 1999; lognormal variance with pedigree 0.16, pedigree (1,1,5,1,1)
  Literature value. The material composition of a tram is obtained from Maibach et al. (1999).
  EcoSpold01Location=RER
  properties: carbon content, fossil 0.140367, carbon content, non-fossil 0.199629, dry mass 1 kg, heating value, net 10.3 MJ, wet mass 1 kg
  note on carbon content, fossil: C content was calculated as an addition of C content in the raw materials.
- aluminium, cast alloy: 588 kg; source Maibach M. 1999; lognormal variance with pedigree 0.16, pedigree (1,1,5,1,1)
  Literature value. The material composition of a tram is obtained from Maibach et al. (1999).
  properties: dry mass 1 kg, wet mass 1 kg
- copper, cathode: 1460 kg; source Maibach M. 1999; lognormal variance with pedigree 0.16, pedigree (1,1,5,1,1)
  (same comment as for alkyd paint, white, without solvent, in 60% solution state)
  properties: dry mass 1 kg, wet mass 1 kg
- electricity, medium voltage: 24200 kWh; source Maibach M. 1999; lognormal variance with pedigree 0.34, pedigree (1,1,5,1,1)
  EcoSpold01Location=UCTE
  Literature value. Manufacturing expenditures and interventions for a tram are obtained from Maibach et al. (1999). However, we assume that 50% of the heating energy is based on natural gas and 50% is based on light fuel oil.
- flat glass, uncoated: 763 kg; source Maibach M. 1999; lognormal variance with pedigree 0.08, pedigree (1,1,5,1,1)
  EcoSpold01Location=RER
  Literature value. The material composition of a tram is obtained from Maibach et al. (1999).
  properties: dry mass 1 kg, wet mass 1 kg
- heat, district or industrial, other than natural gas: 165300 MJ; source Maibach M. 1999; lognormal variance with pedigree 0.34, pedigree (1,1,5,1,1)
  Literature value. Manufacturing expenditures and interventions for a tram are obtained from Maibach et al. (1999). However, we assume that 50% of the heating energy is based on natural gas and 50% is based on light fuel oil.
  EcoSpold01Location=RER
  properties: heating value, net 1 MJ
- lead: 64.1 kg; source Maibach M. 1999; lognormal variance with pedigree 0.16, pedigree (1,1,5,1,1)
  (same comment as for flat glass, uncoated)
  properties: dry mass 1 kg, wet mass 1 kg
- polyethylene, high density, granulate: 850 kg; source Maibach M. 1999; lognormal variance with pedigree 0.16, pedigree (1,1,5,1,1)
  (same comment as for flat glass, uncoated)
  properties: carbon content, fossil 0.857143, dry mass 1 kg, heating value, net 42.47 MJ, wet mass 1 kg
  note on carbon content, fossil: Polyethylene is formed out of a huge amount of ethylene monomers (C2H4) (ecoinvent v2.2 report 11_II). MW=28 g/mol
- reinforcing steel: 16700 kg; source Maibach M. 1999; lognormal variance with pedigree 0.08, pedigree (1,1,5,1,1)
  (same comment as for flat glass, uncoated)
  properties: carbon content, fossil 0.004, dry mass 1 kg, wet mass 1 kg
- synthetic rubber: 196 kg; source Maibach M. 1999; lognormal variance with pedigree 0.16, pedigree (1,1,5,1,1)
  (same comment as for flat glass, uncoated)
  properties: carbon content, fossil 0.871949, dry mass 1 kg, heating value, net 26.42 MJ, wet mass 1 kg
  note on carbon content, fossil: EPDM (Ethylene-propene-diene terpolymer) rubber is a terpolymer of ethylene, propene, and a diene with the residual unsaturated portion of the diene in the side chain (ecoinvent v2.2 report 7-part XX & Ullmann). Chemical formula (deduced from Evidences of Solvent-Induced Miscibility in Polychloroprene-co-Ethylene-Propene Diene Terpolymer Blends, Dubey et al., Journal of Applied Polymer Science, 2009, 111:1884–1891): C20H35
- used tram: -1 unit; name BP_amount_1; lognormal variance with pedigree 0.002, pedigree (3,1,1,1,1)
  production volume; = RP_PV_1 * (BP_amount_1 / RP_amount_1)
    Calculated from production volume of reference product using the relative outputs.
  property carbon content, fossil 0.0485113; name C_content_fossil
  property carbon content, non-fossil 0.00352812; name C_content_non_fossil
  property dry mass 20992 kg; name DM
  property water content 0; name water_content
  property water in wet mass 0 kg; name WWM
  property wet mass 20992 kg; name WM

## Sampling procedure
Literature studies.

## Extrapolations
Data from one production site in Switzerland is used as an first estimate for Europe

## Review by Rolf Frischknecht 2004-04-02
Passed.

## Review by Emilia Moreno Ruiz 2012-03-01
trainee DS, OK, from liliane Klemann

## Review by Carl Vadenbo 2012-06-29
In preparation for the release of ecoinvent v3.0, exchange for disposal of used tram was moved from the dataset 'transport, tram, CH' to 'tram production, RER 1991-1991'. The amounts and the uncertainty information of the exchanges were reviewed and were found to correspond to the disaggregated datasets, and the dataset was accepted for inclusion into the ecoinvent database on 2012.07.04.
