# methanol production, coal gasification

Dataset: EcoSpold 2, unit process
Geography: RoW
Time period: 2020-01-01 to 2025-12-31
Technology level: current
Classification: ISIC rev.4 ecoinvent: 2011:Manufacture of basic chemicals
Synonyms: Carbinol; Methylol; Wood spirit; Methyl alcohol; Wood alcohol
Scenario: Business-as-Usual
System model: Allocation, cut-off by classification
Generated by: Iasonas Ioannou
Published in: Liu, Yigang 2020
Database: ecoinvent
isCopyrightProtected: true
accessRestrictedTo: 1

## General comment
This dataset represents the production of 1 kg of methanol from coal. Methanol (CH3OH) is a clear, colourless, volatile liquid with a faint alcohol-like odour. Methanol is the simplest of the alcohols, having only one carbon atom, and is completely miscible in water. Methanol easily dissolves in other alcohols and chlorinated hydrocarbons, but has limited solubility in diesel fuel, vegetable oils, and aliphatic hydrocarbons.
As of 2000, more than 70% of the methanol produced worldwide is used in chemical syntheses. In order of importance the produced methanol was used as follows:
- Formaldehyde: 34% of production.
- Methyl tert-butyl ether (MTBE): 28% of production.
- Acetic acid: 10% of production.
- Methyl methacrylate (MMA): 3% of production.
- Dimethyl terephthalate (DMT). 2% of production.
Only a small proportion is used for energy production (2% of production), although this use has great potential for vehicles with internal combustion engines.
Commercial production of methanol is based on synthesis gas mixtures (carbon monoxide and hydrogen) derived primarily from natural gas, followed by coal-based gasification synthesis.
This dataset represents the production of methanol using the coal gasification to syngas to methanol process. Coal gasification is widely applied in the chemical industry to provide syngas, which in turn can be used in the catalytic conversion to chemicals, i.e., methanol). The inventory is based on data from literature data.
Notably, China, as the largest methanol producer, accounted for 57% of the worlds production (IEA, 2022), and generates about two-thirds of its methanol feedstock from coal (eia, 2017).
References:
Althaus H.-J., Chudacoff M., Hischier R., Jungbluth N., Osses M. and Primas A. (2007) Life Cycle Inventories of Chemicals. ecoinvent report No. 8, v2.0. EMPA Dübendorf, Swiss Centre for Life Cycle Inventories, Dübendorf, CH.
Liu, Yigang, Guoxuan Li, Zhengrun Chen, Yuanyuan Shen, Hongru Zhang, Shuai Wang, Jianguang Qi, Zhaoyou Zhu, Yinglong Wang, and Jun Gao. "Comprehensive analysis of environmental impacts and energy consumption of biomass-to-methanol and coal-to-methanol via life cycle assessment." Energy 204 (2020): 117961.
IEA (2022), Chemicals, IEA, Paris https://www.iea.org/reports/chemicals, License: CC BY 4.0
https://www.eia.gov/todayinenergy/detail.php?id=30072#:~:text=About%20two%2Dthirds%20of%20China's,using%20coal%20as%20a%20feedstock.

## Included activities start
The activity starts when the raw materials enter the process.

## Included activities end
The activity ends with the final products being ready for further processing or transportation at the production site gate.

## Geography
This dataset is modelled for the Global level as a recontextualisation of a regional production dataset.
This activity originates from literature data, based on robust process simulation, for coal gasification to syngas to methanol, without a specific geographical region. The material and energy inputs reflect well the production technology and are, therefore, considered to be valid for the chosen geography.
References:
Liu, Yigang, Guoxuan Li, Zhengrun Chen, Yuanyuan Shen, Hongru Zhang, Shuai Wang, Jianguang Qi, Zhaoyou Zhu, Yinglong Wang, and Jun Gao. "Comprehensive analysis of environmental impacts and energy consumption of biomass-to-methanol and coal-to-methanol via life cycle assessment." Energy 204 (2020): 117961.

## Technology
In this dataset, methanol is prepared through the coal gasification technology, using coal, steam, and oxygen as starting materials. The most important stages are the following: the air separation to provide oxygen, the raw material pretreatment, the gasification, the water gas conversion, the acid gas removal, and the methanol synthesis and purification stage.
Gasification is the reaction of a fuel, either solid, liquid, or gaseous, under partial combustion with oxygen (or air), carbon dioxide, or a mixture of the latter gases. Typical temperatures of gasification are greater than 700 °C. Several types of gasifiers do exist, such as the moving bed (fixed-bed dry bottom) gasifier (FBDB), the fluidised bed (FB), and the entrained flow (EF) gasifiers.The most commonly used gasifier worldwide, from which majority of coal-based syngas is produced, is the FBDB gasifiers.
Involved rections:
1) Complete combustion with oxygen (or air)
C + O2 → CO2 (exothermic)
2) Gasification with oxygen or air (partial combustion)
C + 0.5O2 → CO (exothermic)
3) Gasification with carbon dioxide (Boudouard reaction)
C + CO2 → 2CO (endothermic)
4) Gasification with steam (water-gas reaction)
C + H2O → CO + H2 (endothermic)
5) Water-gas shift
CO + H2O → CO2 + H2 (exothermic)
The reactions mentioned above take place simultaneously if oxygen and steam are co-fed into the gasifier. Furthermore, the water-gas shift reaction step is crucial to adjust the quality of the generated crude syngas. Besides, the syngas quality, i.e., the ratio between H2/CO in the mixture, is important for its subsequent catalytic conversion to specific chemicals.
Notably, the production of methanol requires syngas that is rich in carbon monoxide, while also having a high hydrogen proportion. The hydrogen to carbon ratio that is generally applied in the production of methanol is equal to (and slightly above) 2. Unforturently, the generted crude syngas from coal (or crude residues) has a H2/CO molar ratios far below 2, and thus, the water-gas shift reaction aids on adjusting their porportion. The water-gas shift reaction in not significantly influenced by pressure, is slightly exothermic, and reversible. Furthermore, higher operating temperatures yield to lower H2/CO ratios, therefore temperatures below 450-500 °C are generally used.
Subsequently, in a methanol synthesis section, the generated syngas is fed into the methanol synthesis reactor, where it converts catalyticaly to crude methanol, which involved the following reactions:
CO + 2H2 → CH3OH (exothermic)
CO2 + 3H2 → CH3OH + H2O (exothermic)
Finally, the crude methanol is purified via distillation.
Please note that the catalysts mentioned above are not accounted for in this dataset.
References:
Bertau, M., Offermanns, H., Plass, L., Schmidt, F., & Wernicke, H. J. (Eds.). (2014). Methanol: the basic chemical and energy feedstock of the future (Vol. 1). Heidelberg: Springer.
Liu, Yigang, Guoxuan Li, Zhengrun Chen, Yuanyuan Shen, Hongru Zhang, Shuai Wang, Jianguang Qi, Zhaoyou Zhu, Yinglong Wang, and Jun Gao. "Comprehensive analysis of environmental impacts and energy consumption of biomass-to-methanol and coal-to-methanol via life cycle assessment." Energy 204 (2020): 117961.

## Time period
This activity originates from literature data, based on robust process simulation, for coal gasification to syngas to methanol, published in 2020. The material and energy inputs reflect well the production technology and not expected to change significantly over time.
References:
Liu, Yigang, Guoxuan Li, Zhengrun Chen, Yuanyuan Shen, Hongru Zhang, Shuai Wang, Jianguang Qi, Zhaoyou Zhu, Yinglong Wang, and Jun Gao. "Comprehensive analysis of environmental impacts and energy consumption of biomass-to-methanol and coal-to-methanol via life cycle assessment." Energy 204 (2020): 117961.

## Reference product
- methanol: 1 kg; name RP; By-product classification allocatable product; CPC 34139: Other alcohols, phenols, phenol-alcohols, and their halogenated, sulphonated, nitrated or nitrosated derivativ[…]; HS2017 290511: Alcohols; saturated monohydric, methanol (methyl alcohol); CAS 67-56-1
  production volume 2.461e8 kg; name RP_PV; = 107*1e3*1e6*0.35
    According to NETL, "About 55-65% of global methanol production uses natural gas feedstock, about 30-35% uses coal, with the rest using coking gas and other feedstocks. (Alvarado M. Methanol Industry Overview, 35th World Methanol Conference, Berlin, Germany 2017). In 2021, worldwide methanol production reached 107 million metric tons."
    Reference:
    https://www.netl.doe.gov/research/carbon-management/energy-systems/gasification/gasifipedia/methanol#:~:text=About%2055%2D65%25%20of%20global,reached%20107%20million%20metric%20tons., last accessed 28-07-2023.
  property heating value, net 20 MJ
    Based on literature, page 533, Report 17: Jungbluth, N., Chudacoff, M., Dauriat, A., Dinkel, F., Doka, G., Faist Emmenegger, M., Gnansounou, E., Kljun, N., Schleiss, K., Spielmann, M., Stettler, C., Sutter, J. 2007: Life Cycle Inventories of Bioenergy. ecoinvent report No. 17, Swiss Centre for Life Cycle Inventories, Dübendorf, CH.
  property price 0.22 EUR2005
    Calculated value based on data from United Nations Commodity Trade Statistics Database (comtrade.un.org). UN comtrade category: 290511 Methyl alcohol. Using exchange rate of 1EURO = 1.209 USD. Average of price of import into 5 main markets (EU, US, JP, IN and CN).
  properties: carbon allocation 0.375 kg, carbon content 0.375, carbon content, fossil 0.375, carbon content, non-fossil 0, dry mass 1 kg, water content 0, water in wet mass 0 kg, wet mass 1 kg

## Inputs from technosphere
- chemical factory, organics: 4e-10 unit; lognormal variance with pedigree 0.3446, pedigree (2,4,1,5,4)
  Calculated based on literature data published by the industry. For this activity, no information was readily available concerning infrastructure and land-use. Therefore, the infrastructure is estimated based on data from two chemical factories, the BASF site of Ludwigshafen and the chemical factory in Gendorf (which are both located in Germany), which produce a wide range of chemical substances. Based on this data, the following assumptions are made: the built area amounts to about 4.2 ha, the plant has an average output of 50'000 t/a and a lifespan of fifty years. The estimated infrastructure amount is therefore 4.00 E-10 units per kg of produced chemical.
  References:
  Althaus H.-J., Chudacoff M., Hischier R., Jungbluth N., Osses M. and Primas A. (2007) Life Cycle Inventories of Chemicals. ecoinvent report No. 8, v2.0. EMPA Dübendorf, Swiss Centre for Life Cycle Inventories, Dübendorf, CH.
  Gendorf (2000) Umwelterklärung 2000, Werk Gendorf. Werk Gendorf, Burgkirchen.
- electricity, medium voltage: 0.000143165, 1.27333e-5, 0.00111021, 0.00145482, 0.00154066, 0.000784737, 0.000108384, 0.000685991, 2.89574e-5, 0.00463622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 kWh (47 suppliers, which the file names only by identifier); sum of these 0.11 kWh; lognormal variance with pedigree 0.0038, pedigree (2,3,1,5,1)
  Value reported by Liu, Yigang, et al. "Comprehensive analysis of environmental impacts and energy consumption of biomass-to-methanol and coal-to-methanol via life cycle assessment." Energy 204 (2020): 117961" for the production of methanol via coal gasification.
- hard coal: 0.161512, 0.0383257, 0.125752, 0.268447, 0.16482, 0.240796, 0.356198, 0.0700913, 0.0997589 kg (9 suppliers, which the file names only by identifier); sum of these 1.5257 kg; lognormal variance with pedigree 0.0038, pedigree (2,3,1,5,1)
  (same comment as for electricity, medium voltage)
  properties: carbon content, fossil 0.845, dry mass 0.94 kg, heating value, net 27.91 MJ, water content 0.0638298, wet mass 1 kg
  note on carbon content, fossil: C content 75-94% (specified in Tab 1.1, report 6, part VI). A mean content of 0.845 kg C/ kg dry hard coal was considered
  note on heating value, net: Based on the Characterization factor of Hard coal in the CED method
- hard coal ash: -3.26865e-5, -5.15957e-5, -7.25985e-5, -5.10715e-5, -1.08336e-5, -7.6055e-5, -0.00044748, -0.148697, -0.00345341, -0.000303136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 kg (14 suppliers, which the file names only by identifier); sum of these -0.16 kg; lognormal variance with pedigree 0.0432, pedigree (2,3,1,5,1)
  Value reported by Liu, Yigang, et al. "Comprehensive analysis of environmental impacts and energy consumption of biomass-to-methanol and coal-to-methanol via life cycle assessment." Energy 204 (2020): 117961" for the production of methanol via coal gasification.
  The amount of ash output accounts for 10.5% of the input anthracite (hard coal). In general, the chemical composition of anthracite comprise of around 77% carbon, 6-16% ash, and moister. Some trace elements are also present in the chemical composition of anthracite, such as sulfur - 0.23-1.2%, silica oxide - 2.2-5.4%, alumina - 2%, ferric oxide - 0.4%. Reference: Wypych, George. "Fillers-Origin, chemical composition, properties, and morphology." Handbook of Fillers 4 (266) (2016): 13.
  production volume; = RP_PV * ( BP_ash / RP )
    Calculated from production volume of reference product using the relative outputs.
  properties: dry mass 1 kg, wet mass 1 kg
- heat, district or industrial, natural gas: 0.28 MJ; lognormal variance with pedigree 0.0038, pedigree (2,3,1,5,1)
  (same comment as for electricity, medium voltage)
  properties: heating value, net 1 MJ
- heat, from steam, in chemical industry: 1.53871, 0.271293 MJ (2 suppliers, which the file names only by identifier); sum of these 1.81 MJ; lognormal variance with pedigree 0.0038, pedigree (2,3,1,5,1)
  (same comment as for electricity, medium voltage)
  properties: heating value, net 1 MJ
- nitrogen, liquid: 0.447237, 0.122763 kg (2 suppliers, which the file names only by identifier); sum of these 0.57 kg; lognormal variance with pedigree 0.0038, pedigree (2,3,1,5,1)
  (same comment as for electricity, medium voltage)
  properties: dry mass 1 kg, wet mass 1 kg
- oxygen, liquid: 0.288515, 1.05148 kg (2 suppliers, which the file names only by identifier); sum of these 1.34 kg; lognormal variance with pedigree 0.0038, pedigree (2,3,1,5,1)
  (same comment as for electricity, medium voltage)
  properties: dry mass 1 kg, wet mass 1 kg
- tap water: 0.1956 kg; lognormal variance with pedigree 0.0038, pedigree (2,3,1,5,1)
  Water input.
  properties: carbon content, fossil 0.00178991, dry mass 0.000337476 kg, water content 2962.17, wet mass 1 kg
  note on carbon content, fossil: Bicarbonate content is 2.93 mol/m3. CO2 content is 0.1 mol/m3 (ecoinvent v2.2 report 8, Tab 93.1).
- wastewater, average: -3.05119e-7, -5.07732e-5, -1.21409e-5, -1.80772e-7 m3 (4 suppliers, which the file names only by identifier); sum of these -6.34e-5 m3; lognormal variance with pedigree 0.0452, pedigree (2,4,1,5,4)
  (same comment as for electricity, medium voltage)
  production volume; = RP_PV * ( BP_ww / RP )
    Calculated from production volume of reference product using the relative outputs.
  properties: carbon content, non-fossil 0.194039, dry mass 0.346837 kg, mass concentration, TOC 0.1091 kg/m3, mass concentration, calcium 0.039453 kg/m3, mass concentration, chlorine 0.030031 kg/m3, mass concentration, hydrogen 0.013365 kg/m3, mass concentration, nitrogen 0.031015 kg/m3, mass concentration, oxygen 0.069824 kg/m3, mass concentration, sodium 0.06456 kg/m3, mass concentration, sulfur 0.015602 kg/m3, water content 2882.2, wet mass 1000 kg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
  note on carbon content, non-fossil: 0.0673 kg TOC/m3 (Tab A.17, ecoinvent v2.2 report 13_I). TOC was considered as Total Carbon.
- water, deionised: 0.0149179, 5.37009e-5, 0.0484284 kg (3 suppliers, which the file names only by identifier); sum of these 0.0634 kg; lognormal variance with pedigree 0.0038, pedigree (2,3,1,5,1)
  (same comment as for electricity, medium voltage)
  properties: wet mass 1 kg

## Inputs from nature
- Water, cooling, unspecified natural origin [natural resource, in water]: 0.014707 m3; lognormal variance with pedigree 0.0452, pedigree (2,4,1,5,4)
  Calculated based on literature data published by the GENDORF Chemical Park. The factory produced an average of 2462760 tonnes of chemical substances (including intermediates) per year in the years 2015-2019. The average amount of cooling water released in the years 2015-2019 was 34408800 t per year. It was assumed that 5% of the cooling water was emitted to air during its use, therefore, to calculate the input of cooling water, the output value reported by GENDORF was scaled up by the factor 1/0.95. This equals 0.014707 m3/kg chemical produced.
- Water, river [natural resource, in water]: 0.00096543 m3; lognormal variance with pedigree 0.0452, pedigree (2,4,1,5,4)
  Calculated based on literature data published by the GENDORF Chemical Park. The factory produced an average of 2462760 tonnes of chemical substances (including intermediates) per year in the years 2015-2019. The average consumption of river water in the years 2015-2019 was 22000820 t per year. However, since the cooling water is modelled as an input, the amount of river water was adjusted to avoid double counting. 55% of the input amount of cooling water was deducted from the amount of river water, as that is the share of river water versus well water. This equals 0.00096543 m3/kg chemical produced.
  References:
  Chemiepark GENDORF, Umwelterklärung 2016, https://www.gendorf.de/Nachbarn/Umweltschutz/Industrie%20und%20Nachhaltigkeit
  Chemiepark GENDORF, Umwelterklärung 2017, https://www.gendorf.de/Nachbarn/Umweltschutz/Industrie%20und%20Nachhaltigkeit
  Chemiepark GENDORF, Umwelterklärung 2020, https://www.gendorf.de/Nachbarn/Umweltschutz/Industrie%20und%20Nachhaltigkeit
- Water, well, in ground [natural resource, in water]: 0.00081652 m3; lognormal variance with pedigree 0.0452, pedigree (2,4,1,5,4)
  Calculated based on literature data published by the GENDORF Chemical Park. The factory produced an average of 2462760 tonnes of chemical substances (including intermediates) per year in the years 2015-2019. The average consumption of well water in the years 2015-2019 was 18607480 t per year. However, since the cooling water is modelled as an input, the amount of well water was adjusted to avoid double counting. 45% of the input amount of cooling water was deducted from the amount of well water, as that is the share of well water versus river water. This equals 0.00081652 m3/kg chemical produced.
  References:
  Chemiepark GENDORF, Umwelterklärung 2016, https://www.gendorf.de/Nachbarn/Umweltschutz/Industrie%20und%20Nachhaltigkeit
  Chemiepark GENDORF, Umwelterklärung 2017, https://www.gendorf.de/Nachbarn/Umweltschutz/Industrie%20und%20Nachhaltigkeit
  Chemiepark GENDORF, Umwelterklärung 2020, https://www.gendorf.de/Nachbarn/Umweltschutz/Industrie%20und%20Nachhaltigkeit

## Emissions to nature
- Carbon dioxide, fossil [air, unspecified]: 2.15 kg; lognormal variance with pedigree 0.0038, pedigree (2,3,1,5,1)
  (same comment as for electricity, medium voltage)
- Carbon monoxide, fossil [air, unspecified]: 0.000578 kg; lognormal variance with pedigree 0.0038, pedigree (2,3,1,5,1)
  (same comment as for electricity, medium voltage)
- Hydrogen sulfide [air, unspecified]: 0.00923 kg; lognormal variance with pedigree 0.0038, pedigree (2,3,1,5,1)
  (same comment as for electricity, medium voltage)
- Nitrogen [air, unspecified]: 0.57 kg; lognormal variance with pedigree 0.0038, pedigree (2,3,1,5,1)
  (same comment as for electricity, medium voltage)
- VOC, volatile organic compounds [air, unspecified]: 0.00676 kg; lognormal variance with pedigree 0.0432, pedigree (2,3,1,5,1)
  (same comment as for electricity, medium voltage)
- Water [air, unspecified]: 0.00147 m3; lognormal variance with pedigree 0.0846, pedigree (2,4,1,5,4)
  Calculated based on literature data published by the GENDORF Chemical Park. The factory produced an average of 2462760 tonnes of chemical substances (including intermediates) per year in the years 2015-2019. To determine the emissions of water to air, the difference of all water inputs (from river, well, tap water and cooling) and outputs (wastewater, emissions to water) was calculated. The average ouput of water to air in the years 2015-2019 was 3620444 m3 per year. This equals 0.00147 m3/kg chemical produced. For more information on the other water exchanges please consult the respective exchange comment.
  References:
  Chemiepark GENDORF, Umwelterklärung 2016, https://www.gendorf.de/Nachbarn/Umweltschutz/Industrie%20und%20Nachhaltigkeit
  Chemiepark GENDORF, Umwelterklärung 2017, https://www.gendorf.de/Nachbarn/Umweltschutz/Industrie%20und%20Nachhaltigkeit
  Chemiepark GENDORF, Umwelterklärung 2020, https://www.gendorf.de/Nachbarn/Umweltschutz/Industrie%20und%20Nachhaltigkeit
- Water [water, unspecified]: 0.01504 m3; lognormal variance with pedigree 0.0846, pedigree (2,4,1,5,4)
  Calculated based on literature data published by the GENDORF Chemical Park. The factory produced an average of 2462760 tonnes of chemical substances (including intermediates) per year in the years 2015-2019. The amount of water released back to the environment consists of the sum of the amount of process water treated in the internal WWTP that is then released back to the environment and the amount of cooling water released back to the environment. The average ouput of the internal WWTP in the years 2015-2019 was 2628800 m3 and that of cooling water released back to the environment was 34408800 m3. This gives a yearly average of 37037600 m3 emissions of water to water. This equals 0.01504 m3/kg chemical produced.
  References:
  Chemiepark GENDORF, Umwelterklärung 2016, https://www.gendorf.de/Nachbarn/Umweltschutz/Industrie%20und%20Nachhaltigkeit
  Chemiepark GENDORF, Umwelterklärung 2017, https://www.gendorf.de/Nachbarn/Umweltschutz/Industrie%20und%20Nachhaltigkeit
  Chemiepark GENDORF, Umwelterklärung 2020, https://www.gendorf.de/Nachbarn/Umweltschutz/Industrie%20und%20Nachhaltigkeit

## Sampling procedure
Data obtained from the literature, based on robust process simulation, for the methanol production from coal gasification published in 2020. The material and energy inputs reflect well the production technology and not expected to change significantly over time or geography.

References;
Liu, Yigang, et al. "Comprehensive analysis of environmental impacts and energy consumption of biomass-to-methanol and coal-to-methanol via life cycle assessment." Energy 204 (2020): 117961"

## Extrapolations
This dataset has been copied from an original dataset covering the geography China. The uncertainty has been adjusted accordingly.
