# melamine formaldehyde resin production

Dataset: EcoSpold 2, unit process
Geography: RER
Time period: 1995-01-01 to 2023-12-31
Technology level: current
Classification: ISIC rev.4 ecoinvent: 2013:Manufacture of plastics and synthetic rubber in primary forms
Synonyms: Formaldehyde melamine polymer methylated; Methylated melamine formaldehyde polymer; Formaldehyde; 1,3,5-triazine-2,4,6-triamine; Melamine formaldehyde polymer methylated; Cymel 481 resin; melamine formaldehyde
Scenario: Business-as-Usual
System model: Allocation, cut-off by classification
Generated by: Maggie Osses
Published in: Althaus H.-J. 2007
Database: ecoinvent
isCopyrightProtected: true
accessRestrictedTo: 1

## General comment
This dataset represents the production of 1 kg of a typical melamine formaldehyde resin used for the impregnation of paper webs used in the production of decorative laminates. Melamine-formaldehyde resin is a type of amino resin. Amino resins find their major use as adhesives. They are used in the production of plywood, waferboard, strandboard, and particle board. Other types are employed for the production of laminated beams and parquet flooring, and for furniture assembly. Amino resins are also used to strengthen paper, to produce moulding compounds and the flexible backing of carpets, as leather auxiliaries and soil conditioners, and for protective surface coatings. The largest amount of amino resins is consumed by the woodworking industry. This dataset is based on literature data and approximations.
References:
Althaus H.-J., Chudacoff M., Hischier R., Jungbluth N., Osses M. and Primas A. (2007) Life Cycle Inventories of Chemicals. ecoinvent report No. 8, v2.0. EMPA Dübendorf, Swiss Centre for Life Cycle Inventories, Dübendorf, CH.
Diem H. and Matthias G (2000). Amino resins in Ullmann's Encyclopedia of Industrial Chemistry. Wiley-VCH Verlag GmbH & Co.KGaA. Online Version: http://www.mrw.interscience.wiley.com/ueic/articles/a02_115/sect10-fs.html. Retrieved on 07.03.2003.
von Däniken A. and Chudacoff M. (1995) Vergleichende ökologische Bewertung von Anstrichstoffen im Baubereich - Band 2: Daten. Buwal Schriftenreihe Umwelt Nr. 232. BUWAL, Bern.

## Included activities start
The activity starts when the raw materials enter the process.

## Included activities end
This activity ends with the production of melamine formaldehyde resin. The manufacturing process takes into account the consumption of raw materials, energy, infrastructure and land use, as well as the generation of emissions to air. Auxiliaries, solid wastes and emissions to water are not included due to the lack of information. No byproducts or coproducts are considered.

## Geography
Apart from the values for the raw materials, the values in this dataset are approximated based on the manufacturing of alkyl resin. For this alkyl resin, the data is based on information provided by a European manufacturing company. It is not known how representative of the European melamine-formaldehyde resin industry these values are.

## Technology
Amino resin production consists of two stages: hydroxymethylation and condensation.
Hydroxymethylation
Hydroxymethylation can be carried out using either alkaline or acid catalysis, but the former is faster. The hydroxymethylation of urea is slightly exothermic. Industrial processes produce variable mixtures of oligomers with mixed repeat units, so the overall reaction rate is also variable and cannot be defined. Moreover, the important resin properties have not been correlated with the individual reaction rates. In general, the hydroxymethylation rate increases with increased concentration, temperature, and pH. Substituents also have an effect; adjacent electron-withdrawing groups reduce the reaction rate, as do bulky substituents.
Condensation
The condensation is catalysed by acids since the methylene bonds between two urea molecules are very stable and can be hydrolysed only by strong acids at elevated temperatures. The condensation reaction is slightly exothermic. It is impossible to give a single reaction rate for the condensation process because there are many different starting materials (hydroxymethyl compounds) and many end products (methylene compounds). The type of solvent also has an effect on the condensation rate.
Condensation of the resin by means of acid catalysis, i.e., cross-linking to give a substantially infusible product, is not carried out until the resin is put to use. This process is called curing. However, free hydroxymethyl groups are present even in this state. Condensations carried out in an excess of an alcohol, with the addition of acid and removal of water as necessary, produce curable etherified amino resins. These are soluble in nonaqueous solvents and can be mixed with alkyd resins, epoxy resins, etc. They are used as starting materials in the production of surface coatings. Resin glues based on urea have been subjected to partial etherification to stabilise them against further condensation.
Amino resins usually are prepared in 5 – 20 m3 batches. However, continuous processes are employed also, particularly for the production of resin glues. The patent literature describes processes where a particular stage is operated continuously while other stages are operated batchwise. In general, and because the reaction rate and the composition of the end product are influenced by a large number of parameters, the reaction must be controlled carefully. Only the most important processes are described here since there is a large number of reaction parameters and resultant adaptations of the process.
Batchwise Production
The batchwise procedure is the most widely used method for the industrial production of amino resins. Its disadvantage is its relatively small production capacity but on the other hand, this process permits an extensive variety of products and frequent changes of product.
The reactions are carried out in stirred kettles, in two or more stages, at 70 – 100 °C. In the first stage, which is carried out in a slightly acidic to alkaline solution, the principal reaction is hydroxymethylation. In subsequent stages, the condensation is carried out, water is split off, and higher molecular weight products of increasing viscosity are obtained. When the condensation is complete, the product is evaporated in the stirred kettle, or more economically in a tubular vaporiser, with the pressure reduced to protect the resin. The quality of the resin is then compared to its specifications and it is discharged into a storage container.
Continuous Production
The disadvantages of continuous production are that the amount produced per unit time in a particular plant can vary only within relatively narrow limits because prolonged residence under otherwise constant conditions increases the proportion of molecules with high degrees of condensation. Changing product is not simple either. Thus, the continuous production process is employed where the variety of products is restricted to a relatively narrow range. On the other hand, continuous procedures give a very uniform product quality. There are a large number of continuous processes that differ only in process technology for the product flow. In general, the differences include variations in the temperature, pH, concentration, or modifiers. In a typical example, urea and formaldehyde are combined and the solution pumped through a multistage unit. The product is then concentrated in a continuous evaporator to about 60–65% solids.
Reference:
Althaus H.-J., Chudacoff M., Hischier R., Jungbluth N., Osses M. and Primas A. (2007) Life Cycle Inventories of Chemicals. ecoinvent report No. 8, v2.0. EMPA Dübendorf, Swiss Centre for Life Cycle Inventories, Dübendorf, CH.

## Time period
The literature sources are from 1995 and 2000. The time period to which the data presented in the sources corresponds is not known.

## Reference product
- melamine formaldehyde resin: 1 kg; name RP; By-product classification allocatable product; CPC 34790: Other plastics in primary forms; ion exchangers; HS2017 390920: Amino-resins; melamine resins, in primary forms
  Melamine-formaldehyde resin is a type of amino resin. Amino resins find their major use as adhesives. They are used in the production of plywood, waferboard, strandboard, and particle board. Other types are employed for the production of laminated beams and parquet flooring, and for furniture assembly. Amino resins are also used to strengthen paper, to produce moulding compounds and the flexible backing of carpets, as leather auxiliaries and soil conditioners, and for protective surface coatings. The largest amount of amino resins is consumed by the woodworking industry.
  production volume 0.696 kg; name RP_PV
    This is a placeholder value that does not reflect real-world production volumes. This dataset does not currently require a real-world production volume to work in the database framework, and no actual data were collected yet. This has no negative effect on the results of the ecoinvent database. The placeholder value of this activity was estimated by scaling the global production volume (which is also a placeholder value) according to the sales of chemicals products reported by Cefic (European Chemical Industry Council), and the American Chemistry Council.
    According to Cefic (2016) the global sales of chemicals in the year 2015 was 3 534 billion euros. The reported share of sales per region are: EU28 14.7%; Other Europe (Switzerland, Norway, Turkey, Russia and Ukraine) 2.7%; NAFTA (US, Canada and Mexico) 16.5%; Latin America 3.8%; China 39.9%; Japan 3.9%; Republic of Korea 3.2%; India 2.2%; Rest of Asia 11.9%; Rest of the World 1.3%. Cefic also reports the US total sales, which amount to 518.7 billion euros out of the global 3 534 billion euros (14.7%). The same share is reported by the American Chemistry Council (2016), according to which the USA sales account for 15% of global sales for the year 2016.
    References:
    Cefic 2016. Facts and figures 2016 of the European chemical industry. Accessible at: http://www.cefic.org/Facts-and-Figures/Chemicals-Industry-Profile/
    American Chemistry Council 2016. Outlook: U.S. Chemical Industry Continues to Outpace Industrial Output; Accounts for More Than One-Half of Construction Spending by Manufacturing Sector. Accessible at: https://www.americanchemistry.com/Media/PressReleasesTranscripts/ACC-news-releases/US-Chemical-Industry-Continues-to-Outpace-Industrial-Output.html
  property carbon content, fossil 0.311708
    Chemical formula of the melamine formaldehide monomer was assumed to be C4H6N6O
  property heating value, net 9.44 MJ
    LHV is calculated based on the Carbon content of the product. More details can be found on the respective documentation.
  property price 1.55 EUR2005
    Calculated value based on data from United Nations Commodity Trade Statistics Database (comtrade.un.org). UN comtrade category: 390920 Melamine resins, in primary forms. Year 2005. Using exchange rate of 1EURO = 1.209 USD. Average of price of import into 5 main markets (EU, US, JP, IN and CN).
  properties: carbon allocation 0.311708 kg, carbon content 0.311708, carbon content, non-fossil 0, dry mass 1 kg, water content 0, water in wet mass 0 kg, wet mass 1 kg

## Inputs from technosphere
- chemical factory, organics: 4e-10 unit; lognormal variance with pedigree 0.349225, pedigree (2,3,5,2,3)
  Calculated based on literature data published by the industry. For this activity, no information was readily available concerning infrastructure and land-use. Therefore, the infrastructure is estimated based on data from two chemical factories, the BASF site of Ludwigshafen and the chemical factory in Gendorf (which are both located in Germany), which produce a wide range of chemical substances. Based on this data, the following assumptions are made: the built area amounts to about 4.2 ha, the plant has an average output of 50'000 t/a and a lifespan of fifty years. The estimated infrastructure amount is therefore 4.00 E-10 units per kg of produced chemical.
  References:
  Althaus H.-J., Chudacoff M., Hischier R., Jungbluth N., Osses M. and Primas A. (2007) Life Cycle Inventories of Chemicals. ecoinvent report No. 8, v2.0. EMPA Dübendorf, Swiss Centre for Life Cycle Inventories, Dübendorf, CH.
  Gendorf (2000) Umwelterklärung 2000, Werk Gendorf. Werk Gendorf, Burgkirchen.
- electricity, medium voltage: 0.013 kWh; lognormal variance with pedigree 0.0781, pedigree (3,5,5,3,3)
  Data from survey in literature (von Däniken et al. 1995)
  Uncertainty: d
- formaldehyde: 0.31 kg; lognormal variance with pedigree 0.070025, pedigree (3,5,5,2,1)
  Data from survey in literature (Diem 2000)
  Uncertainty: d
  properties: carbon content, fossil 0.4, dry mass 1 kg, heating value, net 20.19 MJ, wet mass 1 kg
- heat, district or industrial, natural gas: 1.349 MJ; lognormal variance with pedigree 0.0781, pedigree (3,5,5,3,3)
  Data from survey in literature (von Däniken et al. 1995)
  Uncertainty: d
  properties: heating value, net 1 MJ
- heat, district or industrial, other than natural gas: 1.445 MJ; lognormal variance with pedigree 0.0781, pedigree (3,5,5,3,3)
  Data from survey in literature (von Däniken et al. 1995)
  Uncertainty: d
  properties: heating value, net 1 MJ
- melamine: 0.77 kg; lognormal variance with pedigree 0.070025, pedigree (3,5,5,2,1)
  Data from survey in literature (Diem 2000)
  Uncertainty: d
  properties: carbon content, fossil 0.285714, dry mass 1 kg, heating value, net 14.42 MJ, wet mass 1 kg

## Emissions to nature
- Formaldehyde [air, urban air close to ground]: 0.001 kg; lognormal variance with pedigree 0.0981, pedigree (3,5,5,3,3)
  Data from survey in literature (von Däniken et al. 1995)
  Uncertainty: d

## Sampling procedure
Literature data.

## Extrapolations
For the raw materials, the data are taken from literature and refer to a typical melamine-formaldehyde resin used for the impregnation of paper webs used in the production of decorative laminates. The other values are approximated based on the manufacturing of alkyl resin.

## Review by Emilia Moreno Ruiz 2017-08-09
This dataset was additionally reviewed in a separate review process by Eric Johnson of Atlantic Consulting as well as Emilia Moreno Ruiz and Gregor Wernet of ecoinvent.
