# nitrobenzene production

Dataset: EcoSpold 2, unit process
Geography: RER
Time period: 1997-01-01 to 2023-12-31
Technology level: current
Classification: ISIC rev.4 ecoinvent: 2011:Manufacture of basic chemicals
Classification: EcoSpold01Categories: chemicals/organics
Synonyms: nitrobenzol; oil of mirbane; oil of bitter almonds
Tags: ConvertedDataset
Scenario: Business-as-Usual
System model: Allocation, cut-off by classification
Generated by: Mike Chudacoff
Published in: Althaus H.-J. 2007
Database: ecoinvent
isCopyrightProtected: true
accessRestrictedTo: 1

## General comment
This data represents the production of 1 kg of nitrobenzene. Raw materials, auxiliaries, energy consumption and emissions are based on literature that is based on actual plant throughputs and measurements. Infrastructure is included with a default value.
[This dataset was already contained in the ecoinvent database version 2. It was not individually updated during the transfer to ecoinvent version 3. Life Cycle Impact Assessment results may still have changed, as they are affected by changes in the supply chain, i.e. in other datasets. This dataset was generated following the ecoinvent quality guidelines for version 2. It may have been subject to central changes described in the ecoinvent version 3 change report (http://www.ecoinvent.org/database/ecoinvent-version-3/reports-of-changes/), and the results of the central updates were reviewed extensively. The changes added e.g. consistent water flows and other information throughout the database. The documentation of this dataset can be found in the ecoinvent reports of version 2, which are still available via the ecoinvent website. The change report linked above covers all central changes that were made during the conversion process.]

## Included activities start
From the reception of benzene at the factory gate.

## Included activities end
This activity ends with 1 kg of nitrobenzene,100% at the factory gate. The dataset includes the input materials, energy uses, infrastructure and emissions.

## Geography
Average European Values

## Technology
European production of nitrobenzene in 1997 was 1.22 million tonnes, according to (IPPC Chemicals, 2002). In the US, slightly over one million tons of nitrobenzene was produced in 2000 according to (Hadley & McKenna, 2001). No figures are available for Asian countries. Major plants are located in Belgium, Germany, Portugal, the UK, the Czeck republic, the US and Japan. US producers are Rubi-con, ChemFirst, BASF Corporation and DuPont; European producers include BASF and Bayer.
A nitrating acid composed of 27-32 wt% nitric acid, 56-60 wt% sulphuric acid and 8-17% water is re-acted with benzene. The reaction is exothermic. On completion, spent acid and nitrobenzene are re-moved from the reactor into a separator. The nitrobenzene is washed and distilled. The heat of reac-tion can be used to evaporate the formed nitrobenzene.
C6H6 + HNO3  C6H5NO2 + H2O
Aqueous waste acid is treated with benzene to extract nitrobenzene and nitric acid. The benzene ex-tract is used in the reactor, whereas the denitrated acid is stored in a waste acid tank for further treat-ment. Benzene is recovered from the waste acid by distillation. The stripped sulphuric acid can be routed to reconcentration or can be sold (EPA L&E Benzene).
References:
Hadley & McKenna 2001 Hadley & McKenna, Attorneys-at-law, .public letter for the US Nitrobenzene As-sociation, 2001
EPA L&E Benzene Benzene L&E (locating 6 estimating) documents, US EPA, www.epa.gov/ttn/chief/le/benzene/benz_c5e.pdf
G. Margaret Wells, “Handbook of Petrochemicals and Processes”, 2nd edition, Ashgate, 1999

## Reference product
- nitrobenzene: 1 kg; source Wells, M. 1991; By-product classification allocatable product; CPC 34110: Hydrocarbons and their halogenated, sulphonated, nitrated or nitrosated derivatives; HS2017 290420: Derivatives of hydrocarbons; containing only nitro or only nitroso groups, whether or not halogenated; CAS 98-95-3
  EcoSpold01Location=RER
  Nitrobenzene is a greenish-yellow crystalline solid or pale yellow oil with a bitter almond odour, hence its nickname. It is miscible with most organic solvents, but only slightly miscible with water. Its molecular weight is 123.1 g/mol Nitrobenzene melts at 5.8 °C, and boils at about 211°C. Nitroben-zene is an eye irritant and is readily absorbed by inhalation and by the skin, which can lead to organ damage and damage to the central nervous system. Nitrobenzene forms explosive mixtures with alu-minium chloride, aniline and glycerin.
  Most of nitrobenzene consumption is used for aniline production. Smaller amounts are used for pharmaceutical intermediates and iron oxide pigments. Nitrobenzene is also used in the production of explosives.
  Additional sources:
  Hadley & McKenna, Attorneys-at-law, .public letter for the US Nitrobenzene Association, 2001
  production volume 1.32237 kg
    This is a placeholder value that does not reflect real-world production volumes. This dataset does not currently require a real-world production volume to work in the database framework, and no actual data were collected yet. This has no negative effect on the results of the ecoinvent database. The placeholder value of this activity was scaled according to the nominal GDP of 2005 (source: United Nations, http://data.un.org/Glossary.aspx?q=GDP+%28current+US%24%29, accessed 20130726) to reflect an appropriate share of the global production volume, which is also a placeholder value.
  property heating value, net 22.66 MJ
    LHV is calculated based on the elemental composition of the substance. Based on the CAS number of the substance (000098-95-3), the chemical formula of the substance is found to be: C6H5NO2, (PubChem 2020).
    Reference: Kim, S., Chen, J., Cheng, T., Gindulyte, A., He, J., He, S., Li, Q., Shoemaker, B. A., Thiessen, P. A., Yu, B., Zaslavsky, L., Zhang, J., & Bolton, E. E. (2019). PubChem 2019 update: improved access to chemical data. Nucleic acids research, 47(D1), D1102–D1109. https://doi.org/10.1093/nar/gky1033
  property price 0.928588 EUR2005
    Calculated based on inputs: The price of the product has been calculated as a sum of the values of the material and energy inputs for this product. This value is therefore a rough estimation. It may underestimate the real price since there are additional expenses when producing any product. These expences can include for example labour costs, treatment of waste materials and profit for the producer. Please consider carefully whether this level of data quality is acceptable for your application. Cross-reference: The consumer price for nitrobenzene is 114.5 EURO for 1kg. (http://www.sigmaaldrich.com/catalog/product/sial/252379?lang=de&region=DE&gclid=CjwKEAjw9OG4BRDJzY3jrMng4iQSJABddor1UI35O1DsdlglMA_6eUQ78Sw2QfdBfVbNc5R0H_lcKhoCHGLw_wcB , accessed 20160421)
  properties: carbon allocation 0.606061 kg, carbon content 0.606061, carbon content, fossil 0.606061, carbon content, non-fossil 0, dry mass 1 kg, water content 0, water in wet mass 0 kg, wet mass 1 kg

## Inputs from technosphere
- benzene: 0.66 kg; source Wells, M. 1991; lognormal variance with pedigree 0.120725, pedigree (2,2,5,2,4)
  EcoSpold01Location=RER
  Literature value. Based on a yield of 95%.
  Uncertainty: literature
  properties: carbon content, fossil 0.923077, dry mass 1 kg, heating value, net 42.5 MJ, wet mass 1 kg
- chemical factory, organics: 4e-10 unit; lognormal variance with pedigree 0.3832, pedigree (2,4,5,4,4)
  Calculated based on literature data published by the industry. For this activity, no information was readily available concerning infrastructure and land-use. Therefore, the infrastructure is estimated based on data from two chemical factories, the BASF site of Ludwigshafen and the chemical factory in Gendorf (which are both located in Germany), which produce a wide range of chemical substances. Based on this data, the following assumptions are made: the built area amounts to about 4.2 ha, the plant has an average output of 50'000 t/a and a lifespan of fifty years. The estimated infrastructure amount is therefore 4.00 E-10 units per kg of produced chemical.
  References:
  Althaus H.-J., Chudacoff M., Hischier R., Jungbluth N., Osses M. and Primas A. (2007) Life Cycle Inventories of Chemicals. ecoinvent report No. 8, v2.0. EMPA Dübendorf, Swiss Centre for Life Cycle Inventories, Dübendorf, CH.
  Gendorf (2000) Umwelterklärung 2000, Werk Gendorf. Werk Gendorf, Burgkirchen.
  EcoSpold01Location=RER
  Uncertainty: infrastructure of a typical plant
- electricity, medium voltage: 0.399063 kWh; source Gendorf 2000; lognormal variance with pedigree 0.0838, pedigree (2,4,5,4,4)
  EcoSpold01Location=UCTE
  Calculated based on literature data published by the GENDORF Chemical Park. The factory produced an average of 2462760 tonnes of chemical substances (including intermediates) per year in the years 2015-2019. The average consumption of electricity in the years 2015-2019 was 982796751 kWh per year. This equals 0.39906 kWh/kg chemical produced.
  References:
  Chemiepark GENDORF, Umwelterklärung 2016, https://www.gendorf.de/Nachbarn/Umweltschutz/Industrie%20und%20Nachhaltigkeit
  Chemiepark GENDORF, Umwelterklärung 2017, https://www.gendorf.de/Nachbarn/Umweltschutz/Industrie%20und%20Nachhaltigkeit
  Chemiepark GENDORF, Umwelterklärung 2020, https://www.gendorf.de/Nachbarn/Umweltschutz/Industrie%20und%20Nachhaltigkeit
  Uncertainty: estimation
- nitric acid, without water, in 50% solution state: 0.54 kg; source Wells, M. 1991; lognormal variance with pedigree 0.120725, pedigree (2,2,5,2,4)
  Literature value. Based on a yield of 95%.
  EcoSpold01Location=RER
  Uncertainty: literature
  properties: dry mass 1 kg, wet mass 1 kg
- sulfuric acid: 0.79 kg; source Wells, M. 1991; lognormal variance with pedigree 0.050725, pedigree (2,2,5,2,1)
  Literature value. Based on a yield of 95%.
  EcoSpold01Location=RER
  Uncertainty: literature
  properties: dry mass 1 kg, wet mass 1 kg
- wastewater, average: -5.58244e-8, -2.2213e-6 m3 (2 suppliers, which the file names only by identifier); sum of these -2.27712e-6 m3; lognormal variance with pedigree 0.0438, pedigree (2,4,1,4,4)
  Calculated based on literature data published by the GENDORF Chemical Park. The factory produced an average of 2462760 tonnes of chemical substances (including intermediates) per year in the years 2015-2019. The average ouput of wastewater going to an external wastewater treatment plant in the years 2015-2019 was 5608 m3 per year. This equals 0.000002277 m3/kg chemical produced.
  References:
  Chemiepark GENDORF, Umwelterklärung 2016, https://www.gendorf.de/Nachbarn/Umweltschutz/Industrie%20und%20Nachhaltigkeit
  Chemiepark GENDORF, Umwelterklärung 2017, https://www.gendorf.de/Nachbarn/Umweltschutz/Industrie%20und%20Nachhaltigkeit
  Chemiepark GENDORF, Umwelterklärung 2020, https://www.gendorf.de/Nachbarn/Umweltschutz/Industrie%20und%20Nachhaltigkeit
  properties: carbon content, non-fossil 0.194039, dry mass 0.346837 kg, mass concentration, TOC 0.1091 kg/m3, mass concentration, calcium 0.039453 kg/m3, mass concentration, chlorine 0.030031 kg/m3, mass concentration, hydrogen 0.013365 kg/m3, mass concentration, nitrogen 0.031015 kg/m3, mass concentration, oxygen 0.069824 kg/m3, mass concentration, sodium 0.06456 kg/m3, mass concentration, sulfur 0.015602 kg/m3, water content 2882.2, wet mass 1000 kg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
  note on carbon content, non-fossil: 0.0673 kg TOC/m3 (Tab A.17, ecoinvent v2.2 report 13_I). TOC was considered as Total Carbon.

## Inputs from nature
- Water, cooling, unspecified natural origin [natural resource, in water]: 0.014707 m3; lognormal variance with pedigree 0.0838, pedigree (2,4,5,4,4)
  Calculated based on literature data published by the GENDORF Chemical Park. The factory produced an average of 2462760 tonnes of chemical substances (including intermediates) per year in the years 2015-2019. The average amount of cooling water released in the years 2015-2019 was 34408800 t per year. It was assumed that 5% of the cooling water was emitted to air during its use, therefore, to calculate the input of cooling water, the output value reported by GENDORF was scaled up by the factor 1/0.95. This equals 0.014707 m3/kg chemical produced.
  References:
  Chemiepark GENDORF, Umwelterklärung 2016, https://www.gendorf.de/Nachbarn/Umweltschutz/Industrie%20und%20Nachhaltigkeit
  Chemiepark GENDORF, Umwelterklärung 2017, https://www.gendorf.de/Nachbarn/Umweltschutz/Industrie%20und%20Nachhaltigkeit
  Chemiepark GENDORF, Umwelterklärung 2020, https://www.gendorf.de/Nachbarn/Umweltschutz/Industrie%20und%20Nachhaltigkeit
- Water, river [natural resource, in water]: 0.000965426 m3; lognormal variance with pedigree 0.0838, pedigree (2,4,5,4,4)
  Calculated based on literature data published by the GENDORF Chemical Park. The factory produced an average of 2462760 tonnes of chemical substances (including intermediates) per year in the years 2015-2019. The average consumption of river water in the years 2015-2019 was 22000820 t per year. However, since the cooling water is modelled as an input, the amount of river water was adjusted to avoid double counting. 55% of the input amount of cooling water was deducted from the amount of river water, as that is the share of river water versus well water. This equals 0.00096543 m3/kg chemical produced.
  References:
  Chemiepark GENDORF, Umwelterklärung 2016, https://www.gendorf.de/Nachbarn/Umweltschutz/Industrie%20und%20Nachhaltigkeit
  Chemiepark GENDORF, Umwelterklärung 2017, https://www.gendorf.de/Nachbarn/Umweltschutz/Industrie%20und%20Nachhaltigkeit
  Chemiepark GENDORF, Umwelterklärung 2020, https://www.gendorf.de/Nachbarn/Umweltschutz/Industrie%20und%20Nachhaltigkeit
- Water, well, in ground [natural resource, in water]: 0.000816522 m3; lognormal variance with pedigree 0.0838, pedigree (2,4,5,4,4)
  Calculated based on literature data published by the GENDORF Chemical Park. The factory produced an average of 2462760 tonnes of chemical substances (including intermediates) per year in the years 2015-2019. The average consumption of well water in the years 2015-2019 was 18607480 t per year. However, since the cooling water is modelled as an input, the amount of well water was adjusted to avoid double counting. 45% of the input amount of cooling water was deducted from the amount of well water, as that is the share of well water versus river water. This equals 0.00081652 m3/kg chemical produced.
  References:
  Chemiepark GENDORF, Umwelterklärung 2016, https://www.gendorf.de/Nachbarn/Umweltschutz/Industrie%20und%20Nachhaltigkeit
  Chemiepark GENDORF, Umwelterklärung 2017, https://www.gendorf.de/Nachbarn/Umweltschutz/Industrie%20und%20Nachhaltigkeit
  Chemiepark GENDORF, Umwelterklärung 2020, https://www.gendorf.de/Nachbarn/Umweltschutz/Industrie%20und%20Nachhaltigkeit

## Emissions to nature
- Benzene [air, urban air close to ground]: 0.00031 kg; lognormal variance with pedigree 0.2081, pedigree (5,5,5,3,4)
  Estimation.
  Uncertainty: emissions, assumed
- Water [air, unspecified]: 0.00147008 m3; lognormal variance with pedigree 0.1232, pedigree (2,4,5,4,4)
  Calculated based on literature data published by the GENDORF Chemical Park. The factory produced an average of 2462760 tonnes of chemical substances (including intermediates) per year in the years 2015-2019. To determine the emissions of water to air, the difference of all water inputs (from river, well, tap water and cooling) and outputs (wastewater, emissions to water) was calculated. The average ouput of water to air in the years 2015-2019 was 3620444 m3 per year. This equals 0.00147 m3/kg chemical produced. For more information on the other water exchanges please consult the respective exchange comment.
  References:
  Chemiepark GENDORF, Umwelterklärung 2016, https://www.gendorf.de/Nachbarn/Umweltschutz/Industrie%20und%20Nachhaltigkeit
  Chemiepark GENDORF, Umwelterklärung 2017, https://www.gendorf.de/Nachbarn/Umweltschutz/Industrie%20und%20Nachhaltigkeit
  Chemiepark GENDORF, Umwelterklärung 2020, https://www.gendorf.de/Nachbarn/Umweltschutz/Industrie%20und%20Nachhaltigkeit
- AOX, Adsorbable Organic Halides [water, surface water]: 2.75e-5 kg; source Wells, M. 1991; lognormal variance with pedigree 0.051225, pedigree (2,3,5,2,1)
  Literature value.
  Uncertainty: literature
- BOD5, Biological Oxygen Demand [water, surface water]: 5e-6 kg; source Wells, M. 1991; lognormal variance with pedigree 0.051225, pedigree (2,3,5,2,1)
  Literature value.
  Uncertainty: literature
- COD, Chemical Oxygen Demand [water, surface water]: 5e-6 kg; source Wells, M. 1991; lognormal variance with pedigree 0.051225, pedigree (2,3,5,2,1)
  Literature value.
  Uncertainty: literature
- DOC, Dissolved Organic Carbon [water, surface water]: 1.85185e-6 kg; lognormal variance with pedigree 0.051225, pedigree (2,3,5,2,1)
  Calculation. Calculated as equal to TOC.
  Uncertainty: literature
- TOC, Total Organic Carbon [water, surface water]: 1.85185e-6 kg; lognormal variance with pedigree 0.051225, pedigree (2,3,5,2,1)
  Calculated by default as TOC (gC) = COD/2.7 (COD measured in g O2). Should more correctly be calculated from the carbon content of the specified emissions to water.
  Uncertainty: literature
- Water [water, unspecified]: 0.0150391 m3; lognormal variance with pedigree 0.1232, pedigree (2,4,5,4,4)
  Calculated based on literature data published by the GENDORF Chemical Park. The factory produced an average of 2462760 tonnes of chemical substances (including intermediates) per year in the years 2015-2019. The amount of water released back to the environment consists of the sum of the amount of process water treated in the internal WWTP that is then released back to the environment and the amount of cooling water released back to the environment. The average ouput of the internal WWTP in the years 2015-2019 was 2628800 m3 and that of cooling water released back to the environment was 34408800 m3. This gives a yearly average of 37037600 m3 emissions of water to water. This equals 0.01504 m3/kg chemical produced.
  References:
  Chemiepark GENDORF, Umwelterklärung 2016, https://www.gendorf.de/Nachbarn/Umweltschutz/Industrie%20und%20Nachhaltigkeit
  Chemiepark GENDORF, Umwelterklärung 2017, https://www.gendorf.de/Nachbarn/Umweltschutz/Industrie%20und%20Nachhaltigkeit
  Chemiepark GENDORF, Umwelterklärung 2020, https://www.gendorf.de/Nachbarn/Umweltschutz/Industrie%20und%20Nachhaltigkeit

## Sampling procedure
see technology

## Extrapolations
see technology and generalComments

## Review by Heiko Kunst 2003-08-29
Passed.

## Review by Emilia Moreno Ruiz 2012-06-01
dataset documented by trainee Helen Hamilton
