# manganese concentrate production

Dataset: EcoSpold 2, unit process
Geography: GLO
Time period: 1994-01-01 to 2023-12-31
Technology level: current
Classification: EcoSpold01Categories: metals/extraction
Classification: ISIC rev.4 ecoinvent: 0729:Mining of other non-ferrous metal ores
Tags: ConvertedDataset
Scenario: Business-as-Usual
System model: Allocation, cut-off by classification
Share of production covered: 55 %
Generated by: [System]
Published in: Althaus H.-J. 2000
Database: ecoinvent
isCopyrightProtected: true
accessRestrictedTo: 1

## General comment
This dataset describes the production of 1 kg of manganese concentrate, at plant, for a world-wide production average in 2003. The dataset is designed for the use of manganese ore as intermediary product in the production of ferromanganese and manganese metal. For the use of this module in the battery manufacture, the data quality may not be sufficient.
[This dataset was already contained in the ecoinvent database version 2. It was not individually updated during the transfer to ecoinvent version 3. Life Cycle Impact Assessment results may still have changed, as they are affected by changes in the supply chain, i.e. in other datasets. This dataset was generated following the ecoinvent quality guidelines for version 2. It may have been subject to central changes described in the ecoinvent version 3 change report (http://www.ecoinvent.org/database/ecoinvent-version-3/reports-of-changes/), and the results of the central updates were reviewed extensively. The changes added e.g. consistent water flows and other information throughout the database. The documentation of this dataset can be found in the ecoinvent reports of version 2, which are still available via the ecoinvent website. The change report linked above covers all central changes that were made during the conversion process.]

## Included activities start
Mining process starting from manganese ore, in ground.

## Included activities end
This activity ends with the feeding of manganese concentrate to on-site metallurgy.

The dataset includes the disposal of overburden, the crushing, grounding and screening of ore, the classification of the material through gravity concentration,

The dataset does not include the flotation step.

## Geography
This module relates to the global situation. Some modules used like lime, blasting and transport originate from data sets valid for Switzerland or Europe

## Technology
Mining is done 70% open pit and 30% underground, followed by a beneficiation of the ore trough classification. Overburden and tailings are non-sulphidic , they are disposed near the mining site.
MINING:
Manganese ores are usually mined in open pits. It's been estimated a share of 70% surface mining activities in the mine production in 1994. The deposits are of various nature and therefore the average manganese concentration differs greatly, from Asia with 24%wt to Australia with 48.5%wt and a world-wide average of 35.7%wt manganese content in the ore.
Emissions and waste: The major emissions are due to mineral born pollutants in the effluents. Open cut mining generates large quantities of dust, which contains elevated contents of metals. Rain percolate through overburden and accounts to metal emissions to groundwater. Overburden is deposed close to the mine.
BENEFICIATION:
After mining, the ore is first crushed in several stages with jaw and / or cone crushers, and then subsequently ground with rod and or ball mills and finally screened for classification. In a second step the classified material it is subjected to gravity concentration to separate the metal-bearing particles from the unwanted minerals. For this drum separators and de-watering screens for lumps are used and cone separators and a high-gradient magnetic separator for fine material. No flotation is done. Recovery of Manganese vary in a range from 65% to 75%.
Emissions and waste: Ore handling and processing produce large amounts of dust, containing PM10 and several metals from the ore itself. Tailings are deposed as piles and in ponds. Since the tailings are not sulphidic, no acid rock drainage (ARD) occurs.
References:
Adelhardt W. and Saiger H. (1999) Stoffmengenflüsse und Energiebedarf bei der Gewinnung ausgewählter mineralischer Rohstoffe; Teilstudie Mangan. In: Geo-logisches Jahrbuch, Vol. Sonderhefte SH 8. Bundesanstalt für Geowissen-schaften und Rohstoffe, Hannover. ISBN 3-510-95830-6.

## Parameters
- fraction, process water, to air: 0.15 dimensionless; name fraction_PW_to_air; lognormal variance with pedigree 0.092025, pedigree (4,4,3,2,4)
  Literature value. In case when no industry/process specific data are available, default evaporation fraction value is used. This value is 15% and is based on literature (Statistics Canada, 2007 & Shaffer, K.H., 2008, Consumptive water use in the Great Lakes Basin, USGS & Shiklomanov, 2003, World Water Resources at the Beginning of the 21st Century) and has been approved by an expert.

## Reference product
- manganese concentrate: 1 kg; source Adelhardt W. 1998; By-product classification allocatable product; CPC 14290: Other non-ferrous metal ores and concentrates (other than uranium or thorium ores and concentrates); HS2017 260200: Manganese ores and concentrates, including ferruginous manganese ores and concentrates with a manganese con[...]
  EcoSpold01Location=GLO
  Typically, only ores containing a minimum of 35 % Mn are regarded as manganese ores.
  Uses: The three most important areas of application of manganese ores and the specific requirements, are as follows (Wellbeloved et al. (1997)):
  1. Metallurgical grade ore for the iron and steel industry, which generally contains 38 - 55 % Mn. The phosphorus content should preferably be below 0.1 %, and the concentrations of Al2O3, SiO2, CaO, MgO, and S are important. The manganese/iron ratio is critical; a 7.5 : 1 ratio, for example, is required for a standard ferromanganese alloy with 78 % Mn.
  2. Battery grade ore, containing 70 - 85 % MnO2 (44 - 54 % Mn). The ore should generally contain less than 0.05 % of metals more electronegative than zinc, such as copper, nickel, cobalt, and arsenic. The suitability of manganese dioxide for use in batteries depends on a number of factors, including the crystal structure, surface area, pore size distribution, particle shape and size, electrical conductivity, surface conditions, chemical composition, and structure defects.
  3. Chemical grade ore whose specifications vary considerably depending on the end use. Included in this category are feed stocks for electrolytic manganese and manganese dioxide, manganese chemicals, colorants and, in the Republic of South Africa, an oxidant in uranium extraction.
  Literature value.
  production volume 1 kg
    23.5 million tonnes in 1995
    Dummy value to be replaced by measured, estimated or calculated value
  property price 0.01 EUR2005
    Source: USGS 2010 Minerals Yearbook. "The USGS estimated the annual U.S. average contract price of metallurgical-grade ore containing 46% to 48% manganese was $9.18 per metric ton unit (mtu)". Manganese concentrate has 61,3% of manganese. Calculation: 9.18*0.613/0.47/1000*0.8 =0.0099 Euro/kg
  properties: carbon allocation 0 kg, carbon content 0, carbon content, fossil 0, carbon content, non-fossil 0, dry mass 1 kg, water content 0, water in wet mass 0 kg, wet mass 1 kg

## Inputs from technosphere
- aluminium hydroxide factory: 1.44e-11 unit; lognormal variance with pedigree 0.438, pedigree (5,5,5,1,1)
  EcoSpold01Location=RER
  Estimation from dataset author.
  Proxy: "aluminium hydroxide factory" is used as a proxy for the infrastructure beneficiation.
- blasting: 0.000452 kg; source Adelhardt W. 1998; lognormal variance with pedigree 0.04, pedigree (1,1,5,1,1)
  Estimation: The specific use of explosives vary between 0.1 kg (South America) and 0.3 kg (Africa) per tonne raw ore with a world-wide average of 0.26 kg / t.
  EcoSpold01Location=RER
- conveyor belt: 1.3e-7 m; lognormal variance with pedigree 0.438, pedigree (5,5,5,1,1)
  Estimation from dataset author: Modelled, based on "ISIC 0729" - pdf-document on the dedicated talk page of ecoinvent (www.ecoinvent.org/documentation).
  See part: Regarding "manganese concentrate production, GLO 2003" dataset.
  EcoSpold01Location=RER
  Uncertainty: rough estimate
- diesel, burned in building machine: 0.0799 MJ; source Adelhardt W. 1998; lognormal variance with pedigree 0.29, pedigree (5,5,5,5,5)
  Calculated value: This value also accounts for the consumption of diesel of the overall mining process (1.2 liters per ton of raw ore), and for the consumption of diesel of machinery such as drilling machines, scoop trams and underground trucks. It includes the infrastructure of these machines.
  EcoSpold01Location=GLO
  Uncertainty: reported values w/ range
  properties: heating value, net 1 MJ
- electricity, high voltage: 0.00453 kWh; source Adelhardt W. 1998; lognormal variance with pedigree 0.0421, pedigree (3,2,5,1,1)
  Estimation: It's assumed a share of 60% hydroelectricity due to the operations high and constant energy demand, as in the case of nickel mining.
  Further references: Hilbrans H. and Hinrichs W. (1999) Stoffmengenflüsse und Energiebedarf bei der Gewinnung ausgewählter mineralischer Rohstoffe; Teilstudie Nickel. In: Geologisches Jahrbuch, Vol. Sonderhefte SH 7. Bundesanstalt für Geowissenschaften und Rohstoffe, Hannover. ISBN 3-510-95829-2.
- electricity, medium voltage: 0.00302 kWh; source Adelhardt W. 1998; lognormal variance with pedigree 0.0421, pedigree (3,2,5,1,1)
  EcoSpold01Location=UCTE
  Estimation: It's assumed a share of 60% hydroelectricity due to the operations high and constant energy demand, as in the case of nickel mining.
  Further references: Hilbrans H. and Hinrichs W. (1999) Stoffmengenflüsse und Energiebedarf bei der Gewinnung ausgewählter mineralischer Rohstoffe; Teilstudie Nickel. In: Geologisches Jahrbuch, Vol. Sonderhefte SH 7. Bundesanstalt für Geowissenschaften und Rohstoffe, Hannover. ISBN 3-510-95829-2.
- mine infrastructure, open cast, non-ferrous metal: 1.94e-11 unit; lognormal variance with pedigree 0.438, pedigree (5,5,5,1,1)
  EcoSpold01Location=GLO
  Estimation from dataset author.
  Uncertainty: rough estimate
- mine infrastructure, underground, non-ferrous metal: 8.3e-12 unit; lognormal variance with pedigree 0.438, pedigree (5,5,5,1,1)
  Estimation from dataset author.
  EcoSpold01Location=GLO
  Uncertainty: rough estimate
- non-sulfidic overburden, off-site: -2.61 kg; source Adelhardt W. 1998; lognormal variance with pedigree 0.0041, pedigree (3,2,3,1,1)
  Estimation: No overburden is refilled.
  EcoSpold01Location=GLO
  production volume
    Calculated from the production volume of manganese concentrate in proportion to the respective output amounts.
  properties: dry mass 1 kg, wet mass 1 kg
- non-sulfidic tailing, off-site: -0.71 kg; source Adelhardt W. 1998; lognormal variance with pedigree 0.0041, pedigree (3,2,3,1,1)
  Estimation: No tailings are refilled.
  EcoSpold01Location=GLO
  Uncertainty: reported values
  production volume
    (same comment as for non-sulfidic overburden, off-site)
  properties: dry mass 0.7 kg, water content 0.428571, wet mass 1 kg
- steel, chromium steel 18/8, hot rolled: 0.000515 kg; source IPPC 2002; lognormal variance with pedigree 0.138, pedigree (5,5,5,1,1)
  Estimation: Steel consumption is deemed similar to that of chromite milling. Since non information on steel consumption in the beneficiation of manganese ore is available and the beneficiation process works analogous to chromite winning. Value corresponds to that of a single Finnish chromite mine (Kemi site), and equals 300 g/t ground ore.
  Proxy: The mill (rods, balls, etc.) consists of special austenitic manganese steel of Hadfield grade, which is then inventoried as chromium steel as a proxy.
  EcoSpold01Location=RER
  properties: carbon content, fossil 0.0008, dry mass 1 kg, wet mass 1 kg
  note on carbon content, fossil: Stainless steel model is the grade 304 steel (18/8 stainless, 18% chromium 8% nickel; max. 0.08% C)

## Inputs from nature
- Manganese [natural resource, in ground]: 0.613 kg; source Adelhardt W. 1998; lognormal variance with pedigree 0.0407, pedigree (2,2,5,1,1)
  35.7% Mn in sedimentary deposit; 14.2% Mn in ore; Estimation: The world average manganese content after beneficiation amounts to 42.4%, a yield from mining and beneficiation of 69.2% can be calculated.
- Occupation, mineral extraction site [natural resource, land]: 9.01e-5 m2*year; source Martens P. N. 2002; lognormal variance with pedigree 0.0821, pedigree (3,2,5,1,1)
  Estimation: No direct land use for underground mining (30%) is inventoried, land use for open pit mining (70%) is assessed with 0.0025m2/t, yielding a 1.75 10-3 m2/t and 52.5 10-3 m2a/t respectively. A lifetime of 30 years is assumed.
  Uncertainty: calculation based on reported value
- Transformation, from unspecified [natural resource, land]: 3e-6 m2; source Martens P. N. 2002; lognormal variance with pedigree 0.1621, pedigree (3,2,5,1,1)
  (same comment as for Occupation, mineral extraction site)
- Transformation, to mineral extraction site [natural resource, land]: 3e-6 m2; source Martens P. N. 2002; lognormal variance with pedigree 0.1621, pedigree (3,2,5,1,1)
  (same comment as for Occupation, mineral extraction site)
- Water, river [natural resource, in water]: 0.00139 m3; name water_river_input; source Adelhardt W. 1998; lognormal variance with pedigree 0.0407, pedigree (2,2,5,1,1)
  Calculated value.
  Modelled, based on "ISIC 0729" - pdf-document on the dedicated talk page of ecoinvent (www.ecoinvent.org/documentation).
  See part: Regarding "manganese concentrate production, GLO 2003" dataset.
  Calculated value.
  Modelled, based on "ISIC 0729" - pdf-document on the dedicated talk page of ecoinvent (www.ecoinvent.org/documentation).
  See part: Regarding "manganese concentrate production, GLO 2003" dataset.

## Emissions to nature
- Aluminium III [air, non-urban air or from high stacks]: 3.95e-9 kg; source Anonymous 1998; lognormal variance with pedigree 0.1601, pedigree (5,2,5,1,1)
  Calculated value.
  Modelled, based on “ISIC 0729” - pdf-document on the dedicated talk page of ecoinvent (www.ecoinvent.org/documentation).
  See part: Regarding “manganese concentrate production, GLO 2003” dataset.
- Chromium III [air, non-urban air or from high stacks]: 2.05e-10 kg; lognormal variance with pedigree 0.7701, pedigree (5,2,5,1,1)
  Estimation from dataset author.
- Iron ion [air, non-urban air or from high stacks]: 5.86e-6 kg; source Anonymous 1998; lognormal variance with pedigree 0.1601, pedigree (5,2,5,1,1)
  Calculated value.
  Modelled, based on "ISIC 0729" - pdf-document on the dedicated talk page of ecoinvent (www.ecoinvent.org/documentation).
  See part: Regarding "manganese concentrate production, GLO 2003" dataset.
- Magnesium [air, non-urban air or from high stacks]: 1.54e-9 kg; source Anonymous 1998; lognormal variance with pedigree 0.1601, pedigree (5,2,5,1,1)
  Calculated value.
  Modelled, based on “ISIC 0729” - pdf-document on the dedicated talk page of ecoinvent (www.ecoinvent.org/documentation).
  See part: Regarding “manganese concentrate production, GLO 2003” dataset.
  Further references:
  Adelhardt W. and Saiger H. (1999) Stoffmengenflüsse und Energiebedarf bei der Gewinnung ausgewählter mineralischer Rohstoffe; Teilstudie Mangan. In: Geologisches Jahrbuch, Vol. Sonderhefte SH 8. Bundesanstalt für Geowissenschaften und Rohstoffe, Hannover. ISBN 3-510-95830-6.
- Particulate Matter, < 2.5 um [air, non-urban air or from high stacks]: 1.18e-8 kg; source Anonymous 1998; lognormal variance with pedigree 0.4201, pedigree (5,2,5,1,1)
  Calculated value.
  Modelled, based on “ISIC 0729” - pdf-document on the dedicated talk page of ecoinvent (www.ecoinvent.org/documentation).
  See part: Regarding “manganese concentrate production, GLO 2003” dataset.
  Further references:
  CEMIP database, available at: http://www.air.sk/tno/cepmeip/em_factors.php, SNAP-code 040616, accessed 01.03.2003
- Particulate Matter, > 10 um [air, non-urban air or from high stacks]: 1.22e-7 kg; source Anonymous 1998; lognormal variance with pedigree 0.1601, pedigree (5,2,5,1,1)
  (same comment as for Particulate Matter, < 2.5 um)
- Particulate Matter, > 2.5 um and < 10um [air, non-urban air or from high stacks]: 1.06e-7 kg; source Anonymous 1998; lognormal variance with pedigree 0.2401, pedigree (5,2,5,1,1)
  (same comment as for Particulate Matter, < 2.5 um)
- Silicon [air, non-urban air or from high stacks]: 1.03e-7 kg; source Anonymous 1998; lognormal variance with pedigree 0.1601, pedigree (5,2,5,1,1)
  (same comment as for Aluminium III)
- Water [air, unspecified]: 0.0002085 m3; name water_to_air_unspecified; = (water_river_input*fraction_PW_to_air); lognormal variance with pedigree 0.0807, pedigree (2,2,5,1,1)
  Calculated value based on literature values and expert opinion. See comments in the parametres' comment field.
  property fraction, origin: fresh water 1; name fraction_origin_fresh_water
  property fraction, origin: salt water 0; name fraction_origin_salt_water
  property fraction, origin: unspecified 0; name fraction_origin_unspecified
- Arsenic ion [water, surface water]: 1.13e-10 kg; source Anonymous 1998; lognormal variance with pedigree 0.328, pedigree (4,5,5,5,5)
  Calculated value.
  Modelled, based on "ISIC 0729" - pdf-document on the dedicated talk page of ecoinvent (www.ecoinvent.org/documentation).
  See part: Regarding "manganese concentrate production, GLO 2003" dataset.
  Uncertainty: unspecific water quality guidelines
- BOD5, Biological Oxygen Demand [water, surface water]: 1.13e-7 kg; lognormal variance with pedigree 0.178, pedigree (5,5,5,1,1)
  Calculated value.
  Modelled, based on "ISIC 0729" - pdf-document on the dedicated talk page of ecoinvent (www.ecoinvent.org/documentation).
  See part: Regarding "manganese concentrate production, GLO 2003" dataset.
  Uncertainty: calculation based on reported value
- COD, Chemical Oxygen Demand [water, surface water]: 1.7e-7 kg; source Anonymous 1998; lognormal variance with pedigree 0.328, pedigree (4,5,5,5,5)
  (same comment as for Arsenic ion)
- Copper ion [water, surface water]: 1.13e-10 kg; source Anonymous 1998; lognormal variance with pedigree 0.938, pedigree (4,5,5,5,5)
  (same comment as for Arsenic ion)
- DOC, Dissolved Organic Carbon [water, surface water]: 6.64e-8 kg; lognormal variance with pedigree 0.178, pedigree (5,5,5,1,1)
  (same comment as for BOD5, Biological Oxygen Demand)
- Dissolved solids [water, surface water]: 5.66e-8 kg; source Anonymous 1998; lognormal variance with pedigree 0.328, pedigree (4,5,5,5,5)
  (same comment as for Arsenic ion)
- Iron ion [water, surface water]: 3.96e-9 kg; source Anonymous 1998; lognormal variance with pedigree 0.938, pedigree (4,5,5,5,5)
  (same comment as for Arsenic ion)
- Lead II [water, surface water]: 1.13e-10 kg; source Anonymous 1998; lognormal variance with pedigree 0.938, pedigree (4,5,5,5,5)
  (same comment as for Arsenic ion)
- Oils, unspecified [water, surface water]: 1.13e-8 kg; source Anonymous 1998; lognormal variance with pedigree 0.588, pedigree (4,5,5,5,5)
  (same comment as for Arsenic ion)
- TOC, Total Organic Carbon [water, surface water]: 6.64e-8 kg; lognormal variance with pedigree 0.178, pedigree (5,5,5,1,1)
  (same comment as for BOD5, Biological Oxygen Demand)
- Water [water, unspecified]: 0.0011815 m3; name water_to_water_unspecified; = water_river_input*(1-fraction_PW_to_air); lognormal variance with pedigree 0.0807, pedigree (2,2,5,1,1)
  (same comment as for Water)
  property carbon content, fossil 0; name C_content_fossil
  property carbon content, non-fossil 0; name C_content_non_fossil
  property dry mass 0 kg; name DM
  property fraction, origin: fresh water 1; name fraction_origin_fresh_water_Ww
  property fraction, origin: salt water 0; name fraction_origin_salt_water_Ww
  property fraction, origin: unspecified 0; name fraction_origin_unspecified_Ww
  property water in wet mass 1000 kg; name WWM
  property wet mass 1000 kg; name WM
- Zinc II [water, surface water]: 1.13e-10 kg; source Anonymous 1998; lognormal variance with pedigree 0.938, pedigree (4,5,5,5,5)
  (same comment as for Arsenic ion)

## Sampling procedure
literature

## Extrapolations
see Geography and Technology

## Review by Roland Hischier 2003-08-14
Passed.

## Review by Roland Hischier 2011-09-19
Transfer of documentation done.

## Review by Bo Weidema 2012-09-28
replaced "electricity, high voltage, hydro, run-of-river" with "electricity, high voltage" + activity link to "electricity production, hydro, run-of-river"
