# tea production, dried

Dataset: EcoSpold 2, unit process
Geography: IN-HP
Time period: 2015-01-01 to 2023-12-31
Technology level: current
Classification: ISIC rev.4 ecoinvent: 0127:Growing of beverage crops
Scenario: Business-as-Usual
System model: Allocation, cut-off by classification
Generated by: Sanjeevan Bajaj
Database: ecoinvent
isCopyrightProtected: true
accessRestrictedTo: 1

## General comment
This dataset represents the production of 1 kg of fresh Tea which is a peripheral crop harvested in the month of October, 2016 at a farm located in village Panchrukhi near Palampur in District- Kangra of Himachal Pradesh State. The farm has a yield of 4375 kg fresh matter per ha for this crop cycle. Harvesting date of the crop for this data set is 15-October, 2016. The tea is sun dried. No fertilisers were used in cultivation.

## Included activities start
As this crop is a perennial crop there is no specific start date for the activity.

## Included activities end
The activity ends with the harvesting of the young tea leaves from the tea plant.

## Geography
Village Panchrukhi near Palampur in District- Kangra of Himachal Pradesh State

## Technology
Cultivation of Tea follows conventional production standards

## Time period
Harvesting date of main crop is 15-October, 2016. The harvesting date is taken as the middle date of the week or fortnight told to the data collector by the farmer. The data is collected for one crop cycle. The cycle of one year is considered for entry in ecoeditor.

## Reference product
- tea, dried: 1 kg; By-product classification allocatable product; CPC 01620: Tea leaves; HS2017 0902: Tea
  production volume 9.8109e8 kg; = 981.09*1000000
    http://www.teaboard.gov.in/pdf/stat/Production_Monthly.pdf (Page 1) Production volume for North India is taken as the data is collected from Himachal Pradesh State which is located in North India. Figure is for the year 2015 given in M. Kgs
  property price 1.9 EUR2005
    Calculated value based on data from United Nations Commodity Trade Statistics Database (comtrade.un.org). UN comtrade category: 902 Tea. Year: 2005. Using exchange rate of 1EURO = 1.209 USD. Average of price of import into 5 main markets (EU, US, JP, IN and CN).
  properties: carbon allocation 0.455299 kg, carbon content 0.490083, carbon content, fossil 0, carbon content, non-fossil 0.490083, dry mass 0.929023 kg, water content 0.0764, water in wet mass 0.0709773 kg, wet mass 1 kg

## Inputs from technosphere
All rows: lognormal variance with pedigree 0.0052, pedigree (2,4,3,1,1)
- establishing orchard: 0.0857143 unit
  Calculated Value. This value has been calculated by using the ecoinvent LCI calculation tool for crop production.
- fruit tree seedling, for planting: 0.0857143 unit
  (same comment as for establishing orchard)
  properties: carbon content, non-fossil 1, dry mass 0.03 kg, wet mass 0.03 kg
- land use change, perennial crop: 6.41394e-5 ha
  (same comment as for establishing orchard)
- planting tree: 0.0857143 unit
  (same comment as for establishing orchard)
- trellis system, wooden poles, soft wood, tar impregnated: 0.000228571 ha
  (same comment as for establishing orchard)

## Inputs from nature
All rows: lognormal variance with pedigree 0.0052, pedigree (2,4,3,1,1)
- Carbon dioxide, in air [natural resource, in air]: 1.60752 kg
  (same comment as for establishing orchard)
- Energy, gross calorific value, in biomass [natural resource, biotic]: 18.4864 MJ
  (same comment as for establishing orchard)
- Occupation, permanent crop, non-irrigated [natural resource, land]: 2.28571 m2*year
  (same comment as for establishing orchard)
- Transformation, from permanent crop, non-irrigated [natural resource, land]: 0.114286 m2
  (same comment as for establishing orchard)
- Transformation, to permanent crop, non-irrigated [natural resource, land]: 0.114286 m2
  (same comment as for establishing orchard)

## Emissions to nature
- Dinitrogen monoxide [air, non-urban air or from high stacks]: 5.32717e-5 kg; lognormal variance with pedigree 0.0346, pedigree (2,4,3,1,1)
  (same comment as for establishing orchard)
- Cadmium II [soil, agricultural]: -8.94353e-8 kg
  (same comment as for establishing orchard)
- Chromium III [soil, agricultural]: -6.50992e-6 kg
  (same comment as for establishing orchard)
- Copper ion [soil, agricultural]: -1.15768e-5 kg
  (same comment as for establishing orchard)
- Lead II [soil, agricultural]: -1.57537e-6 kg
  (same comment as for establishing orchard)
- Mercury II [soil, agricultural]: -1.81439e-8 kg
  (same comment as for establishing orchard)
- Nickel II [soil, agricultural]: -4.57646e-6 kg
  (same comment as for establishing orchard)
- Zinc II [soil, agricultural]: -2.37722e-5 kg
  (same comment as for establishing orchard)
- Cadmium II [water, ground-]: 5.01575e-9 kg; lognormal variance with pedigree 0.0946, pedigree (2,4,3,1,1)
  (same comment as for establishing orchard)
- Cadmium II [water, surface water]: 4.55596e-8 kg; lognormal variance with pedigree 0.0946, pedigree (2,4,3,1,1)
  (same comment as for establishing orchard)
- Chromium III [water, ground-]: 2.19053e-6 kg; lognormal variance with pedigree 0.0946, pedigree (2,4,3,1,1)
  (same comment as for establishing orchard)
- Chromium III [water, surface water]: 4.12718e-6 kg; lognormal variance with pedigree 0.0946, pedigree (2,4,3,1,1)
  (same comment as for establishing orchard)
- Copper ion [water, ground-]: 7.71609e-7 kg; lognormal variance with pedigree 0.0946, pedigree (2,4,3,1,1)
  (same comment as for establishing orchard)
- Copper ion [water, surface water]: 1.24296e-5 kg; lognormal variance with pedigree 0.0946, pedigree (2,4,3,1,1)
  (same comment as for establishing orchard)
- Lead II [water, ground-]: 1.87225e-8 kg; lognormal variance with pedigree 0.0946, pedigree (2,4,3,1,1)
  (same comment as for establishing orchard)
- Lead II [water, surface water]: 1.14944e-6 kg; lognormal variance with pedigree 0.0946, pedigree (2,4,3,1,1)
  (same comment as for establishing orchard)
- Mercury II [water, ground-]: 2.41912e-10 kg; lognormal variance with pedigree 0.0946, pedigree (2,4,3,1,1)
  (same comment as for establishing orchard)
- Mercury II [water, surface water]: 2.11973e-8 kg; lognormal variance with pedigree 0.0946, pedigree (2,4,3,1,1)
  (same comment as for establishing orchard)
- Nickel II [water, surface water]: 4.27517e-6 kg; lognormal variance with pedigree 0.0946, pedigree (2,4,3,1,1)
  (same comment as for establishing orchard)
- Nitrate [water, ground-]: 0.020013 kg; lognormal variance with pedigree 0.0446, pedigree (2,4,3,1,1)
  (same comment as for establishing orchard)
- Phosphate [water, ground-]: 4.9059e-5 kg; lognormal variance with pedigree 0.0446, pedigree (2,4,3,1,1)
  (same comment as for establishing orchard)
- Phosphate [water, surface water]: 0.000122648 kg; lognormal variance with pedigree 0.0446, pedigree (2,4,3,1,1)
  (same comment as for establishing orchard)
- Phosphorus [water, surface water]: 0.000694762 kg; lognormal variance with pedigree 0.0446, pedigree (2,4,3,1,1)
  (same comment as for establishing orchard)
- Zinc II [water, ground-]: 4.97556e-6 kg; lognormal variance with pedigree 0.0946, pedigree (2,4,3,1,1)
  (same comment as for establishing orchard)
- Zinc II [water, surface water]: 1.56359e-5 kg; lognormal variance with pedigree 0.0946, pedigree (2,4,3,1,1)
  (same comment as for establishing orchard)

## Sampling procedure
The farmer was identified and contacted by agriculture science faculty familiar with the local farmers in the region. Data was collected directly from the farmer through semi-structured interview using a questionnaire based on the input requirements of the ecoinvent LCI calculation tool for crop production. The farmer does not maintain any written records and has provided the data from recent memory. In this region, typically farmers are unable to provide exact name of active ingredient in the pesticide they use and the same was noted from details given on the pesticide packet. Individual farmer is not able to calculate fuel consumption for his own farm alone and this information has been collected from farming community of the area.

## Extrapolations
Ecoinvent LCI calculation tool for crop production was used to calculate field emissions from the cultivation process. Number of wet days have been taken for the State capital (Shimla) and rainfall data is average of last 55 years (updated 29-Jan-2016) for the tehsil (Palampur) where the farm is located.
