# graphite production

Dataset: EcoSpold 2, unit process
Geography: RoW
Time period: 2000-01-01 to 2023-12-31
Technology level: current
Classification: ISIC rev.4 ecoinvent: 0899:Other mining and quarrying n.e.c.
Classification: EcoSpold01Categories: chemicals/inorganics
Tags: ConvertedDataset
Scenario: Business-as-Usual
System model: Allocation, cut-off by classification
Generated by: Roland Hischier
Published in: Hischier R. 2007
Database: ecoinvent
isCopyrightProtected: true
accessRestrictedTo: 1

## General comment
The functional unit represent 1 kg of milled graphite. Large uncertainty of the process data due to weak data on the production process.
[This dataset was already contained in the ecoinvent database version 2. It was not individually updated during the transfer to ecoinvent version 3. Life Cycle Impact Assessment results may still have changed, as they are affected by changes in the supply chain, i.e. in other datasets. This dataset was generated following the ecoinvent quality guidelines for version 2. It may have been subject to central changes described in the ecoinvent version 3 change report (http://www.ecoinvent.org/database/ecoinvent-version-3/reports-of-changes/), and the results of the central updates were reviewed extensively. The changes added e.g. consistent water flows and other information throughout the database. The documentation of this dataset can be found in the ecoinvent reports of version 2, which are still available via the ecoinvent website. The change report linked above covers all central changes that were made during the conversion process.]

## Included activities end
Raw materials, machineries and energy consumption for production, estimated emissions to air from production and infrastructure of the site (approximation). No water emissions.

## Geography
Data are used here as European average.

## Technology
Data approximated with data from lime mining, crushing and milling.

## Parameters
- fraction, process water, to air: 0.5 dimensionless; name fraction_PW_to_air; lognormal variance with pedigree 0.092025, pedigree (4,4,3,2,4)

## Reference product
- graphite: 1 kg; By-product classification allocatable product; CPC 16390: Other minerals n.e.c.; HS2017 2504: Graphite; natural; CAS 7782-42-5
  EcoSpold01Location=RER
  production volume 2.67763 kg
    This is a placeholder value that does not reflect real-world production volumes. This dataset does not currently require a real-world production volume to work in the database framework, and no actual data were collected yet. This has no negative effect on the results of the ecoinvent database.
  property heating value, net 30.3 MJ
    LHV is calculated based on the Carbon content of the product. More details can be found on the respective documentation.
  property price 0.43 EUR2005
    Calculated value based on data from United Nations Commodity Trade Statistics Database (comtrade.un.org). UN comtrade category: 250410 Natural graphite in powder or flakes. Year 2005. Using exchange rate of 1EURO = 1.209 USD. Average of price of import into 5 main markets (EU, US, JP, IN and CN).
  properties: carbon allocation 1 kg, carbon content 1, carbon content, fossil 1, carbon content, non-fossil 0, dry mass 1 kg, water content 0, water in wet mass 0 kg, wet mass 1 kg

## Inputs from technosphere
- blasting: 7.73e-5 kg; lognormal variance with pedigree 0.0786, pedigree (4,3,5,5,3)
  EcoSpold01Location=RER
  Approximation with data from lime production
  Uncertainty: approximation with data from lime production
- conveyor belt: 2.78e-8 m; lognormal variance with pedigree 0.3686, pedigree (4,3,5,5,3)
  (same comment as for blasting)
- diesel, burned in building machine: 0.018 MJ; lognormal variance with pedigree 0.0786, pedigree (4,3,5,5,3)
  EcoSpold01Location=GLO
  Approximation with data from lime production
  Uncertainty: approximation with data from lime production
  properties: heating value, net 1 MJ
- electricity, medium voltage: 0.00108007, 0.0215449, 0.00723902, 0.000330753, 6.61999e-5, 1.42146e-5, 0.00222484 kWh (7 suppliers, which the file names only by identifier); sum of these 0.0325 kWh; lognormal variance with pedigree 0.0786, pedigree (4,3,5,5,3)
  EcoSpold01Location=UCTE
  Approximation with data from lime production
  Uncertainty: approximation with data from lime production
- heat, central or small-scale, other than natural gas: 0.0033746 MJ; lognormal variance with pedigree 0.0786, pedigree (4,3,5,5,3)
  Approximation with data from lime production
  EcoSpold01Location=CH
  Uncertainty: approximation with data from lime production
  properties: heating value, net 1 MJ
- heat, district or industrial, other than natural gas: 0.0897584, 4.15834e-5 MJ (2 suppliers, which the file names only by identifier); sum of these 0.0898 MJ; lognormal variance with pedigree 0.0786, pedigree (4,3,5,5,3)
  (same comment as for blasting)
  properties: heating value, net 1 MJ
- industrial machine, heavy, unspecified: 0.000231 kg; lognormal variance with pedigree 0.3686, pedigree (4,3,5,5,3)
  (same comment as for blasting)
- limestone quarry infrastructure: 5.25e-11 unit; lognormal variance with pedigree 0.3686, pedigree (4,3,5,5,3)
  (same comment as for heat, central or small-scale, other than natural gas)
- recultivation, limestone mine: 6.52e-6 m2; lognormal variance with pedigree 0.0786, pedigree (4,3,5,5,3)
  EcoSpold01Location=CH
  Approximation with data from lime production
  Uncertainty: approximation with data from lime production

## Inputs from nature
- Graphite [natural resource, in ground]: 1.0526 kg; lognormal variance with pedigree 0.0786, pedigree (4,3,5,5,3)
  Approximation with data from lime production
  Uncertainty: approximation with data from lime production
- Occupation, mineral extraction site [natural resource, land]: 8.48e-5 m2*year; lognormal variance with pedigree 0.1286, pedigree (4,3,5,5,3)
  (same comment as for Graphite)
- Transformation, from forest, unspecified [natural resource, land]: 6.52e-6 m2; lognormal variance with pedigree 0.0786, pedigree (4,3,5,5,3)
  (same comment as for Graphite)
- Transformation, to mineral extraction site [natural resource, land]: 6.52e-6 m2; lognormal variance with pedigree 0.0786, pedigree (4,3,5,5,3)
  (same comment as for Graphite)
- Water, well, in ground [natural resource, in water]: 2.93e-5 m3; name water_well_in_ground_input; source Kellenberger D. 2007; lognormal variance with pedigree 0.0786, pedigree (4,3,5,5,3)
  Proxy: apporximation with data for limestone production from literature source.
  Uncertainty: approximation with data from lime production

## Emissions to nature
- Particulate Matter, < 2.5 um [air, non-urban air or from high stacks]: 8.87e-6 kg; lognormal variance with pedigree 0.5806, pedigree (4,3,5,5,5)
  (same comment as for Graphite)
- Particulate Matter, > 10 um [air, non-urban air or from high stacks]: 0.000121 kg; lognormal variance with pedigree 0.3106, pedigree (4,3,5,5,5)
  (same comment as for Graphite)
- Particulate Matter, > 2.5 um and < 10um [air, non-urban air or from high stacks]: 4.78e-5 kg; lognormal variance with pedigree 0.4006, pedigree (4,3,5,5,5)
  (same comment as for Graphite)
- Water [air, unspecified]: 1.465e-5 m3; name water_to_air_unspecified; lognormal variance with pedigree 0.0827, pedigree (2,2,5,5,1)
  Calculated value based on literature values and expert opinion. See comments in the parametres' comment field.
  property fraction, origin: fresh water 1; name fraction_origin_fresh_water
  property fraction, origin: salt water 0; name fraction_origin_salt_water
  property fraction, origin: unspecified 0; name fraction_origin_unspecified
- Water [water, unspecified]: 1.465e-5 m3; name water_to_water_unspecified; lognormal variance with pedigree 0.0827, pedigree (2,2,5,5,1)
  (same comment as for Water)
  property carbon content, fossil 0; name C_content_fossil
  property carbon content, non-fossil 0; name C_content_non_fossil
  property dry mass 0 kg; name DM
  property fraction, origin: fresh water 1; name fraction_origin_fresh_water_Ww
  property fraction, origin: salt water 0; name fraction_origin_salt_water_Ww
  property fraction, origin: unspecified 0; name fraction_origin_unspecified_Ww
  property water in wet mass 1000 kg; name WWM
  property wet mass 1000 kg; name WM

## Sampling procedure
approximation with data from literature

## Extrapolations
see technology This dataset has been copied from an original dataset covering the geography RER. The uncertainty has been adjusted accordingly.

## Review by Daniel Kellenberger (obsolete) 2007-11-09
passed
