# mulberry production

Dataset: EcoSpold 2, unit process
Geography: RoW
Time period: 2014-01-01 to 2023-12-31
Technology level: current
Classification: EcoSpold01Categories: agricultural production/plant production
Classification: ISIC rev.4 ecoinvent: 0127:Growing of beverage crops
Scenario: Business-as-Usual
System model: Allocation, cut-off by classification
Generated by: Archana Datta
Database: ecoinvent
isCopyrightProtected: true
accessRestrictedTo: 1

## General comment
This inventory dataset exclusively covers the field activity for the production of 1kg mulberry leaves in India in 2016. The farm has a yield of 30,000 kg Mulberry leaves per ha for this crop cycle. Mineral NPK fertilizer input is 300-125-125 kg/ha. Organic fertilizer applied amounts to 40,000 kg/ha of manure from cattle dung in two doses at first and fifth crop cycle.
In India, Mulberry is a perennial crop and once properly raised in the first year it can come to full yielding capacity during the second year and lasts for over 15 years in the field without any significant detonation in yield of leaves. In order to get good leaf yield, training and pruning is regularly performed. Harvesting is done on regular basis. Picking of leaves should be carried out in time, when the leaves are at correct stage of maturity for harvest. In shoot harvest method, harvesting can be done at an interval of 70 days, in leaf harvest method first harvest is taken 70 days after first pruning, and subsequent harvest at an interval of 55 days. Amongst the various inputs irrigation ranks high in giving quick and good results. Normally, the annual expected yield is 40-50 tonnes of leaves per hectare.
This dataset covers only the field activities for the production of mulberry leaves. That means the technical boundary ends at the harvesting of the mature leaves.

## Included activities start
This activity starts right after the harvest of the previous crop.

## Included activities end
This activity ends with harvest of mulberry leaves as the final product of the cultivation process. The primary purpose of this activity is to generate leaves to feed to the silkworms.

## Geography
This dataset is a copy of Indian dataset

## Technology
Cultivation of mulberry plant from conventional production standards

## Reference product
- mulberry leaves: 1 kg; name RP_amount_1; By-product classification allocatable product; CPC 01353: Raspberries, blackberries, mulberries and loganberries; HS2017 091099: Spices; n.e.c. in heading no. 0910
  production volume 1.545e10 kg; name RP_PV_1; = 724000*30000
    According to FAOSTAT, the global area meant for cultivation of white mulberry tree (used in the silk industry) is 724000 ha. Assuming a similar yield to the one in India the Global production volume is calculated to be 2.172E+10 kg.
    Reference: World distribution and utilization of mulberry and its potential for animal feeding, accessed at: http://www.fao.org/docrep/005/X9895E/x9895e02.htm on 4/4/2018
  property price 7.54245 EUR2005
    Estimated value. The values is highly uncertain as the prices reported onlive vary significantly and most of the prices that can be found refer to the leaves used for tea or extract of leaves. The price is taken from the website everythingsilkworms.com.au (retrieved from: everythingsilkworms.com.au, 2018. Bag of Fresh Mulberry leaves, retrieved from: https://everythingsilkworms.com.au/product/bag-of-fresh-mulberry-leaves/, accessed 1Feb2018). The website reports a value of 9.99USD. The website is considered to be a reliable source for prices for small quantities, bulk prices are most likely quite lower than this.
  properties: carbon allocation 0.05852 kg, carbon content 0.475, carbon content, fossil 0, carbon content, non-fossil 0.475, dry mass 0.1232 kg, water content 7.11688, water in wet mass 0.8768 kg, wet mass 1 kg

## Inputs from technosphere
- ammonia, anhydrous, liquid: 2.25625e-8, 9.69311e-8, 4.85477e-7, 2.05214e-8, 4.59054e-9, 1.68711e-7, 1.45027e-8, 4.47043e-8 kg (8 suppliers, which the file names only by identifier); sum of these 8.58e-7 kg; lognormal variance with pedigree 0.0132, pedigree (3,3,3,5,2)
  Calculated Value. This value has been calculated by using the Ecoinvent LCI calculation tool for crop production.
  properties: dry mass 1 kg, wet mass 1 kg
- ammonium nitrate: 4.99797e-7, 2.66421e-7, 9.04421e-7, 3.46628e-7 kg (4 suppliers, which the file names only by identifier); sum of these 2.01727e-6 kg; lognormal variance with pedigree 0.0132, pedigree (3,3,3,5,2)
  The exchange has been updated from 'ammonium nitrate, as N' into 'ammonium nitrate' and therefore its amount has been scaled (multiplied) from 0 kg by 2.8573 kg of 'ammonium nitrate' per kg of 'ammonium nitrate, as N'. Original comment of the exchange is: Calculated Value. This value has been calculated by using the Ecoinvent LCI calculation tool for crop production.
  properties: dry mass 1 kg, wet mass 1 kg
- ammonium sulfate: 5.0579e-5, 1.5521e-5 kg (2 suppliers, which the file names only by identifier); sum of these 6.61e-5 kg; lognormal variance with pedigree 0.0132, pedigree (3,3,3,5,2)
  (same comment as for ammonia, anhydrous, liquid)
  properties: dry mass 1 kg, wet mass 1 kg
- cyclic N-compound: 9.86667e-5 kg; lognormal variance with pedigree 0.0078, pedigree (3,3,3,5,2)
  (same comment as for ammonia, anhydrous, liquid)
  properties: carbon content, fossil 0.641962, dry mass 1 kg, wet mass 1 kg
- establishing orchard: 0.0230633 unit; lognormal variance with pedigree 0.0078, pedigree (3,3,3,5,2)
  cut stems planted
- fruit tree seedling, for planting: 0.0230633 unit; lognormal variance with pedigree 0.0078, pedigree (3,3,3,5,2)
  cut stems planted
  properties: carbon content, non-fossil 1, dry mass 0.03 kg, wet mass 0.03 kg
- inorganic nitrogen fertiliser, as N: 2.15642e-7, 5.06019e-5, 6.00258e-6, 6.44577e-5, 1.47441e-5, 6.24397e-6, 5.75475e-5, 5.40393e-6, 3.79112e-5, 3.87834e-6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 kg (29 suppliers, which the file names only by identifier); sum of these 0.00596252 kg; lognormal variance with pedigree 0.0132, pedigree (3,3,3,5,2)
  This exchange is an aggregation of amounts:
  0.00397001208843117. Comment:
  6.072361560298029E-4. Comment:
  6.072361560298029E-4. Comment:
  6.157629520522409E-4. Comment:
  1.57406163741649E-5. Comment:
  1.4653261235374302E-4. Comment:
  properties: dry mass 1 kg, wet mass 1 kg
- inorganic phosphorus fertiliser, as P2O5: 3.18065e-5, 7.05992e-5, 0.0006108, 1.97118e-5, 4.84089e-6, 6.85498e-6, 1.71021e-5, 2.24629e-6, 1.10094e-5, 2.62488e-7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 kg (29 suppliers, which the file names only by identifier); sum of these 0.00416289 kg; lognormal variance with pedigree 0.0132, pedigree (3,3,3,5,2)
  This exchange is an aggregation of amounts:
  1.850879334932225E-5. Comment:
  3.401548271713546E-4. Comment:
  0.0015277814944029502. Comment:
  0.0015277814944029502. Comment:
  7.48663037010525E-4. Comment:
  properties: dry mass 1 kg, wet mass 1 kg
- inorganic potassium fertiliser, as K2O: 7.26921e-6, 2.35946e-6, 8.17136e-7, 3.49512e-5, 1.05135e-6, 4.04925e-6, 1.75051e-6, 6.5926e-8, 0.000101543, 5.91599e-6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 kg (29 suppliers, which the file names only by identifier); sum of these 0.00121754 kg; lognormal variance with pedigree 0.0132, pedigree (3,3,3,5,2)
  (same comment as for ammonia, anhydrous, liquid)
  properties: dry mass 1 kg, wet mass 1 kg
- irrigation: 4.87025e-5, 0.000973971, 0.0594343, 0.000750357, 0.00201185, 0.00276546, 0.214401, 0.000438926, 1.12886e-5, 0.0263775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 m3 (16 suppliers, which the file names only by identifier); sum of these 0.329467 m3; lognormal variance with pedigree 0.0132, pedigree (3,3,3,5,2)
  The data was collected for a hectare area through interview
  properties: dry mass 0.11 kg, water content 9089.91, wet mass 1000 kg
- lime: 0.191564, 0.016545 kg (2 suppliers, which the file names only by identifier); sum of these 0.208109 kg; lognormal variance with pedigree 0.0072, pedigree (3,3,3,5,1)
  The data was collected for a hectare area through interview
  properties: carbon content, fossil 0.120005, dry mass 1 kg, wet mass 1 kg
- mancozeb: 3.33333e-5 kg; lognormal variance with pedigree 0.0472, pedigree (3,3,3,5,2)
  The data was collected for a hectare area through interview
  properties: carbon content, fossil 0.17759, dry mass 1 kg, wet mass 1 kg
- manure, solid, cattle: 1.33333 kg; lognormal variance with pedigree 0.0132, pedigree (3,3,3,5,2)
  The data was collected for a hectare area through interview
  properties: carbon content, non-fossil 0.441, dry mass 0.22 kg, water content 3.5454, wet mass 1 kg
- packaging, for fertilisers: 0.452884 kg; lognormal variance with pedigree 0.0532, pedigree (4,3,3,5,4)
  Total amount of active substance/s of fertilisers needed for the production of 'mulberry leaves' is calculated to be circa 2.26E-01 kg. Fertiliser/s used in this dataset is/are: 'ammonia, liquid', 'ammonium nitrate, as N', 'ammonium sulfate, as N', 'lime', 'nitrogen fertiliser, as N', 'phosphate fertiliser, as P2O5', 'phosphate rock, as P2O5, beneficiated, dry', 'potassium chloride, as K2O', 'potassium fertiliser, as K2O', 'potassium sulfate, as K2O', 'urea, as N'. The total amount of active substance/s is doubled in order to account for the packaging of the dilluted product of fertiliser/s that is/are applied. Therefore, 4.53E-01 kg of packaging for fertilisers is justified with this exchange.
  properties: carbon content, fossil 0.825301, dry mass 1 kg, heating value, net 25.01 MJ, price 0.0642 EUR2005, wet mass 1 kg
  note on carbon content, fossil: Considering a chemical formula (C2H4)n for polyethylene, carbon content-fossil is calculated to be 0.856286 kg of Carbon per kg of dry mass.
- packaging, for pesticides: 0.000264 kg; lognormal variance with pedigree 0.0532, pedigree (4,3,3,5,4)
  Total amount of active substance/s of pesticides needed for the production of mulberry leaves is calculated to be circa 1.32E-04 kg. Pesticide/s used in this dataset is/are: 'cyclic N-compound', 'mancozeb'. The total amount of active substance/s is doubled in order to account for the packaging of the dilluted product of pesticide/s that is/are applied. Therefore, 2.64E-04 kg of packaging for pesticides is justified with this exchange.
  properties: carbon content, fossil 0.85714, dry mass 1 kg, heating value, net 25.97 MJ, price 0.0642 EUR2005, wet mass 1 kg
- phosphate rock, beneficiated: 1.51974e-7, 1.51974e-7, 5.18382e-8, 1.14474e-5 kg (4 suppliers, which the file names only by identifier); sum of these 1.18032e-5 kg; lognormal variance with pedigree 0.0078, pedigree (3,3,3,5,2)
  The exchange has been updated from 'phosphate rock, as P2O5, beneficiated, dry' into 'phosphate rock, beneficiated' and therefore its amount has been scaled (multiplied) from 0 kg by 3.125 kg of 'phosphate rock, beneficiated' per kg of 'phosphate rock, as P2O5, beneficiated, dry'. Original comment of the exchange is: The data was collected for a hectare area through interview
  properties: dry mass 1 kg, wet mass 1 kg
- planting tree: 0.0230633 unit; lognormal variance with pedigree 0.0078, pedigree (3,3,3,5,2)
  cut stems planted
- potassium chloride: 0.000355038, 0.00428105 kg (2 suppliers, which the file names only by identifier); sum of these 0.00463609 kg; lognormal variance with pedigree 0.0132, pedigree (3,3,3,5,2)
  The exchange has been updated from 'potassium chloride, as K2O' into 'potassium chloride' and therefore its amount has been scaled (multiplied) from 0.0029 kg by 1.5829 kg of 'potassium chloride' per kg of 'potassium chloride, as K2O'. Original comment of the exchange is: Calculated Value. This value has been calculated by using the Ecoinvent LCI calculation tool for crop production.
  properties: dry mass 1 kg, wet mass 1 kg
- potassium sulfate: 6.53444e-6, 3.10198e-5 kg (2 suppliers, which the file names only by identifier); sum of these 3.75543e-5 kg; lognormal variance with pedigree 0.0132, pedigree (3,3,3,5,2)
  The exchange has been updated from 'potassium sulfate, as K2O' into 'potassium sulfate' and therefore its amount has been scaled (multiplied) from 0 kg by 1.85 kg of 'potassium sulfate' per kg of 'potassium sulfate, as K2O'. Original comment of the exchange is: Calculated Value. This value has been calculated by using the Ecoinvent LCI calculation tool for crop production.
  properties: dry mass 1 kg, wet mass 1 kg
- tillage, harrowing, by rotary harrow: 7.52e-5 ha; lognormal variance with pedigree 0.0132, pedigree (3,3,3,5,2)
  The data was collected for a hectare area through interview. The tillage activity was scaled based on the diesel used for tillage in the ecoinvent dataset and the diesel consumption data collected in the project
- trellis system, wooden poles, soft wood, tar impregnated: 3.33333e-5 ha; lognormal variance with pedigree 0.0078, pedigree (3,3,3,5,2)
  (same comment as for ammonia, anhydrous, liquid)
- urea: 0.0039823, 0.000503649, 0.000624358, 0.0034006 kg (4 suppliers, which the file names only by identifier); sum of these 0.00851091 kg; lognormal variance with pedigree 0.0132, pedigree (3,3,3,5,2)
  The exchange has been updated from 'urea, as N' into 'urea' and therefore its amount has been scaled (multiplied) from 0.004 kg by 2.1438 kg of 'urea' per kg of 'urea, as N'. Original comment of the exchange is: The data was collected for a hectare area through interview
  properties: carbon content, fossil 0.2, dry mass 1 kg, wet mass 1 kg
- waste wood, untreated: -0.000359971, -0.268249, -0.00492361, -0.00208922, -0.084755, -0.00330288, -0.0396538 kg (7 suppliers, which the file names only by identifier); sum of these -0.403333 kg; lognormal variance with pedigree 0.0058, pedigree (3,3,1,5,2)
  Data represents mulberry sticks with calorific value of 4600 cal/kg wood
  production volume; = RP_PV_1* BP_amount_1/ RP_amount_1
    calculated from the production volume of the reference product using relative values
  properties: heating value, net 13.99 MJ
  note on heating value, net: Value taken from the general comment of the treatment dataset.

## Inputs from nature
- Carbon dioxide, in air [natural resource, in air]: 0.76948 kg; lognormal variance with pedigree 0.0078, pedigree (3,3,3,5,2)
  (same comment as for ammonia, anhydrous, liquid)
- Energy, gross calorific value, in biomass [natural resource, biotic]: 5.694 MJ; lognormal variance with pedigree 0.0078, pedigree (3,3,3,5,2)
- Occupation, permanent crop, irrigated [natural resource, land]: 0.333333 m2*year; lognormal variance with pedigree 0.0092, pedigree (3,3,3,5,2)
  (same comment as for ammonia, anhydrous, liquid)
- Transformation, from permanent crop, irrigated [natural resource, land]: 0.0166667 m2; lognormal variance with pedigree 0.008, pedigree (3,3,3,5,2)
  (same comment as for ammonia, anhydrous, liquid)
- Transformation, to permanent crop, irrigated [natural resource, land]: 0.0166667 m2; lognormal variance with pedigree 0.008, pedigree (3,3,3,5,2)
  (same comment as for ammonia, anhydrous, liquid)

## Emissions to nature
- Ammonia [air, non-urban air or from high stacks]: 0.00281498 kg; lognormal variance with pedigree 0.0606, pedigree (4,5,3,5,2)
  (same comment as for ammonia, anhydrous, liquid)
- Carbon dioxide, fossil [air, non-urban air or from high stacks]: 0.100863 kg; lognormal variance with pedigree 0.0606, pedigree (4,5,3,5,2)
  (same comment as for ammonia, anhydrous, liquid)
- Dinitrogen monoxide [air, non-urban air or from high stacks]: 0.000323619 kg; lognormal variance with pedigree 0.0606, pedigree (4,5,3,5,2)
  (same comment as for ammonia, anhydrous, liquid)
- Nitrogen oxides [air, non-urban air or from high stacks]: 0.00103031 kg; lognormal variance with pedigree 0.0606, pedigree (4,5,3,5,2)
  (same comment as for ammonia, anhydrous, liquid)
- Water [air, non-urban air or from high stacks]: 0.168028 m3; lognormal variance with pedigree 0.0606, pedigree (4,5,3,5,2)
  (same comment as for ammonia, anhydrous, liquid)
- Cadmium II [soil, agricultural]: 1.98e-7 kg; lognormal variance with pedigree 0.0606, pedigree (4,5,3,5,2)
  (same comment as for ammonia, anhydrous, liquid)
- Chromium III [soil, agricultural]: 2.63e-5 kg; lognormal variance with pedigree 0.0606, pedigree (4,5,3,5,2)
  (same comment as for ammonia, anhydrous, liquid)
- Copper ion [soil, agricultural]: -7.30398e-7 kg
  (same comment as for ammonia, anhydrous, liquid)
- Imidacloprid [soil, agricultural]: 9.86667e-5 kg; lognormal variance with pedigree 0.0606, pedigree (4,5,3,5,2)
  (same comment as for ammonia, anhydrous, liquid)
- Lead II [soil, agricultural]: -4.89064e-7 kg
  (same comment as for ammonia, anhydrous, liquid)
- Mancozeb [soil, agricultural]: 3.33333e-5 kg; lognormal variance with pedigree 0.0606, pedigree (4,5,3,5,2)
  (same comment as for ammonia, anhydrous, liquid)
- Mercury II [soil, agricultural]: 4.24266e-8 kg; lognormal variance with pedigree 0.0606, pedigree (4,5,3,5,2)
  (same comment as for ammonia, anhydrous, liquid)
- Nickel II [soil, agricultural]: 1.18539e-7 kg; lognormal variance with pedigree 0.0606, pedigree (4,5,3,5,2)
  (same comment as for ammonia, anhydrous, liquid)
- Zinc II [soil, agricultural]: 5.36091e-6 kg; lognormal variance with pedigree 0.0606, pedigree (4,5,3,5,2)
  (same comment as for ammonia, anhydrous, liquid)
- Cadmium II [water, ground-]: 1.53e-9 kg; lognormal variance with pedigree 0.0606, pedigree (4,5,3,5,2)
  (same comment as for ammonia, anhydrous, liquid)
- Cadmium II [water, surface water]: 1.69e-8 kg; lognormal variance with pedigree 0.0606, pedigree (4,5,3,5,2)
  (same comment as for ammonia, anhydrous, liquid)
- Chromium III [water, ground-]: 7.04e-7 kg; lognormal variance with pedigree 0.0606, pedigree (4,5,3,5,2)
  (same comment as for ammonia, anhydrous, liquid)
- Chromium III [water, surface water]: 1.61e-6 kg; lognormal variance with pedigree 0.0606, pedigree (4,5,3,5,2)
  (same comment as for ammonia, anhydrous, liquid)
- Copper ion [water, ground-]: 1.17e-7 kg; lognormal variance with pedigree 0.0606, pedigree (4,5,3,5,2)
  (same comment as for ammonia, anhydrous, liquid)
- Copper ion [water, surface water]: 2.3e-6 kg; lognormal variance with pedigree 0.0606, pedigree (4,5,3,5,2)
  (same comment as for ammonia, anhydrous, liquid)
- Lead II [water, ground-]: 1.22e-8 kg; lognormal variance with pedigree 0.0606, pedigree (4,5,3,5,2)
  (same comment as for ammonia, anhydrous, liquid)
- Lead II [water, surface water]: 9.11e-7 kg; lognormal variance with pedigree 0.0606, pedigree (4,5,3,5,2)
  (same comment as for ammonia, anhydrous, liquid)
- Mercury II [water, ground-]: 4.22e-11 kg; lognormal variance with pedigree 0.0606, pedigree (4,5,3,5,2)
  (same comment as for ammonia, anhydrous, liquid)
- Mercury II [water, surface water]: 4.49e-9 kg; lognormal variance with pedigree 0.0606, pedigree (4,5,3,5,2)
  (same comment as for ammonia, anhydrous, liquid)
- Nickel II [water, surface water]: 1.36e-6 kg; lognormal variance with pedigree 0.0606, pedigree (4,5,3,5,2)
  (same comment as for ammonia, anhydrous, liquid)
- Nitrate [water, ground-]: 0.00689959 kg; lognormal variance with pedigree 0.0606, pedigree (4,5,3,5,2)
  (same comment as for ammonia, anhydrous, liquid)
- Phosphate [water, ground-]: 6.13e-6 kg; lognormal variance with pedigree 0.0606, pedigree (4,5,3,5,2)
  (same comment as for ammonia, anhydrous, liquid)
- Phosphate [water, surface water]: 4.73e-5 kg; lognormal variance with pedigree 0.0606, pedigree (4,5,3,5,2)
  (same comment as for ammonia, anhydrous, liquid)
- Phosphorus [water, surface water]: 0.000123132 kg; lognormal variance with pedigree 0.0606, pedigree (4,5,3,5,2)
  (same comment as for ammonia, anhydrous, liquid)
- Water [water, ground-]: 0.128492 m3; lognormal variance with pedigree 0.0606, pedigree (4,5,3,5,2)
  (same comment as for ammonia, anhydrous, liquid)
- Water [water, surface water]: 0.0329467 m3; lognormal variance with pedigree 0.0606, pedigree (4,5,3,5,2)
  (same comment as for ammonia, anhydrous, liquid)
- Zinc II [water, ground-]: 9.69e-7 kg; lognormal variance with pedigree 0.0606, pedigree (4,5,3,5,2)
  (same comment as for ammonia, anhydrous, liquid)
- Zinc II [water, surface water]: 3.7e-6 kg; lognormal variance with pedigree 0.0606, pedigree (4,5,3,5,2)
  (same comment as for ammonia, anhydrous, liquid)

## Sampling procedure
Focus group discussion, expert interviews, literature data and assumptions. The inventory dataset is based on data collected from farmer and silk worm rearer at Guna district, in the state of Madhya Pradesh (North India). Data has been collected through field visit and interview. Sample was considered representative as they are practicing sericulture as per government operated training programs.The literature data were supported by a total of three focus group discussions among the farmers and experts from the government centers (Resham Kendras - silk growing areas) in India. Standardized questionnaires were developed and adapted to mulberry-specific cultivation and post-harvest situation. The secondary data from literature and the primary data from surveys were compared and matched to obtain highest data quality.

## Extrapolations
The data on inputs to the field activites are collected directly from the farmers and farming experts. However, the emission data were not readily available for India. Hence, Ecoinvent LCI calculation tool for crop production was used to calculate field emissions from the cultivation process.
