# dolomite production

Dataset: EcoSpold 2, unit process
Geography: RoW
Time period: 2007-01-01 to 2023-12-31
Technology level: current
Classification: ISIC rev.4 ecoinvent: 0891:Mining of chemical and fertilizer minerals
Synonyms: Calcium magnesium carbonate
Scenario: Business-as-Usual
System model: Allocation, cut-off by classification
Generated by: Anna Kounina
Database: ecoinvent
isCopyrightProtected: true
accessRestrictedTo: 1

## General comment
This dataset is a weighted average from the respective regional datasets.
This dataset represents the production of 1 kg of dolomite from dolomite in ground, at the mine. Raw material, energy and water consumption, infrastructure for the site and machineries, land use, and emissions to air are a first approximation based on limestone production. The dataset includes raw materials, machineries, energy consumption, emissions to air, and infrastructure of the site. The dataset doesn't include emissions to water. An overall yield of 95% is assumed.
The main data source for this dataset is Althaus et al (2007).
References:
Althaus H.-J., Chudacoff M., Hischier R., Jungbluth N., Osses M. and Primas A. (2007) Life Cycle Inventories of Chemicals. ecoinvent report No. 8, v2.0. EMPA Dübendorf, Swiss Centre for Life Cycle Inventories, Dübendorf, CH.

## Included activities start
The activity starts from dolomite in ground.

## Included activities end
This activites ends with the production of 1 kg of dolomite. The dataset includes raw materials, machineries, energy consumption, emissions to air, and infrastructure of the site. The dataset doesn't include emissions to water.

## Technology
Average techlogy from the regional counterparts as given in the geography comment.

## Time period
Primary data were collected on fertiliser production for the year 2011. These data were based on annual average data for the year 2011.

## Reference product
- dolomite: 1 kg; By-product classification allocatable product; CPC 16330: Chalk and dolomite; HS2017 251810: Dolomite, not calcined or sintered; including dolomite roughly trimmed, or merely cut by sawing or otherwis[...]; CAS 16389-88-1
  production volume 1.44967e11 kg
    Estimated value. Total production of dolomite in the UK in 2004 was 1.22E+10 Kg (British Geological Survey, Mineral Planning Factsheet, Dolomite, 2006). The Global PV was scaled based on the proportion of the nominal GDP of the UK for the global GDP in 2004 (retrieved from: https://unstats.un.org/unsd/snaama/Basic, accessed 20200512). The nominal GDP corresponds to GDP at current price-US Dollars (source: United Nations, http://data.un.org/Glossary.aspx?q=GDP+%28current+US%24%29, accessed 20200512).
  property calcium content 0.217342
    Calcium content (on a dry matter basis) of dolomite is calculated from the molecular formula of the substance (CaMgC2O6).
  property carbon content, fossil 0.130267
    Carbon content, fossil is calculated based on the chemical formula of the substance.
  property heating value, net 3.95 MJ
    LHV is calculated based on the Carbon content of the product. More details can be found on the respective documentation.
  property magnesium content 0.131805
    Magnesium content (on a dry matter basis) of dolomite is calculated from the molecular formula of the substance (CaMgC2O6).
  property oxygen content 0.520586
    Oxygen content (on a dry matter basis) of dolomite is calculated from the molecular formula of the substance (CaMgC2O6).
  property price 0.016 EUR2005
    Calculated value based on data from United Nations Commodity Trade Statistics Database (comtrade.un.org). UN comtrade category: 251810 Dolomite not calcined. Year 2005. Using exchange rate of 1EURO = 1.209 USD. Average of price of import into 5 main markets (EU, US, JP, IN and CN).
  properties: carbon allocation 0.130267 kg, carbon content 0.130267, carbon content, non-fossil 0, dry mass 1 kg, water content 0, water in wet mass 0 kg, wet mass 1 kg

## Inputs from technosphere
- blasting: 7.73e-5 kg; lognormal variance with pedigree 0.0433, pedigree (2,2,5,5,1)
  This flow is weighted averages using the exchanges in the corresponding regional data.
- conveyor belt: 2.78e-8 m; lognormal variance with pedigree 0.3427, pedigree (2,2,5,5,1)
  This flow is weighted averages using the exchanges in the corresponding regional data.
- diesel, burned in building machine: 0.00371504 MJ; lognormal variance with pedigree 0.0433, pedigree (2,2,5,5,1)
  This flow is weighted averages using the exchanges in the corresponding regional data.
  properties: heating value, net 1 MJ
- dolomite quarry infrastructure: 5.25e-11 unit; lognormal variance with pedigree 0.3427, pedigree (2,2,5,5,1)
- electricity, low voltage: 0.000225151, 0.00354066, 0.0734909, 0.00725391, 4.51831e-5, 0.0253018, 0.00125347 kWh (7 suppliers, which the file names only by identifier); sum of these 0.111111 kWh; lognormal variance with pedigree 0.0433, pedigree (2,2,5,5,1)
  This flow is weighted averages using the exchanges in the corresponding regional data.
- industrial machine, heavy, unspecified: 0.000231 kg; lognormal variance with pedigree 0.3427, pedigree (2,2,5,5,1)
  This flow is weighted averages using the exchanges in the corresponding regional data.
- recultivation, dolomite mine: 6.52e-6 m2; lognormal variance with pedigree 0.3427, pedigree (2,2,5,5,1)

## Inputs from nature
- Dolomite [natural resource, in ground]: 1 kg; lognormal variance with pedigree 0.0433, pedigree (2,2,5,5,1)
  This flow is weighted averages using the exchanges in the corresponding regional data.
- Occupation, mineral extraction site [natural resource, land]: 8.48e-5 m2*year; lognormal variance with pedigree 0.0827, pedigree (2,2,5,5,1)
  This flow is weighted averages using the exchanges in the corresponding regional data.
- Transformation, from forest, unspecified [natural resource, land]: 6.52e-6 m2; lognormal variance with pedigree 0.1627, pedigree (2,2,5,5,1)
  This flow is weighted averages using the exchanges in the corresponding regional data.
- Transformation, to mineral extraction site [natural resource, land]: 6.52e-6 m2; lognormal variance with pedigree 0.1627, pedigree (2,2,5,5,1)
  This flow is weighted averages using the exchanges in the corresponding regional data.
- Water, river [natural resource, in water]: 2.93e-5 m3; lognormal variance with pedigree 0.0433, pedigree (2,2,5,5,1)
  This flow is weighted averages using the exchanges in the corresponding regional data.

## Emissions to nature
- Particulate Matter, > 2.5 um and < 10um [air, non-urban air or from high stacks]: 0.0005 kg; lognormal variance with pedigree 0.1627, pedigree (2,2,5,5,1)
  This flow is weighted averages using the exchanges in the corresponding regional data.
- Water [air, non-urban air or from high stacks]: 4.395e-6 m3; lognormal variance with pedigree 0.0827, pedigree (2,2,5,5,1)
  This flow is weighted averages using the exchanges in the corresponding regional data.
- Water [water, unspecified]: 2.4905e-5 m3; lognormal variance with pedigree 0.0827, pedigree (2,2,5,5,1)
  This flow is weighted averages using the exchanges in the corresponding regional data.

## Extrapolations
Deleted extrapolations from Europe.
