# rape seed production, organic, for sowing

Dataset: EcoSpold 2, unit process
Geography: CH
Time period: 2000-01-01 to 2023-12-31
Technology level: current
Classification: EcoSpold01Categories: agricultural means of production/seed
Classification: ISIC rev.4 ecoinvent: 0164:Seed processing for propagation
Tags: ConvertedDataset
Scenario: Business-as-Usual
System model: Allocation, cut-off by classification
Generated by: Fredy Dinkel
Published in: Jungbluth N. 2007
Database: ecoinvent
isCopyrightProtected: true
accessRestrictedTo: 1

## General comment
Refers to 1 kg seed of rape seed (fresh weight), with a maximum water content of 6%
[This dataset was already contained in the ecoinvent database version 2. It was not individually updated during the transfer to ecoinvent version 3. Life Cycle Impact Assessment results may still have changed, as they are affected by changes in the supply chain, i.e. in other datasets. This dataset was generated following the ecoinvent quality guidelines for version 2. It may have been subject to central changes described in the ecoinvent version 3 change report (http://www.ecoinvent.org/database/ecoinvent-version-3/reports-of-changes/), and the results of the central updates were reviewed extensively. The changes added e.g. consistent water flows and other information throughout the database. The documentation of this dataset can be found in the ecoinvent reports of version 2, which are still available via the ecoinvent website. The change report linked above covers all central changes that were made during the conversion process.]

## Included activities start
This activity starts after harvest of the seed.

## Included activities end
The seed is processed in the processing centre, treated (pre-cleaning, cleaning, eventually drying, chemical dressing (for integrated production) and bag filling), stored and afterwards transported to the regional storage centre. No data on wastewater production were available.

## Geography
Refers to a production in the Swiss plateau (lowlands <700m).

## Technology
Intensive organic production.

## Reference product
- rape seed, organic, for sowing: 1 kg; By-product classification allocatable product; CPC 01443: Rape or colza seed; HS2017 120590: Oil seeds; rape or colza seeds, other than low erucic, whether or not broken
  EcoSpold01Location=CH
  production volume 15818 kg
    [This estimate refers to all seed used in Switzerland, including imported seed.] Calculated from the average national production of soybeans ("Soja") of the years 2007-2009 (SBV 2008 & 2010), the required seed input for the production of 1 kg of soybeans (Nemecek et al. 2007) and the shares of Swiss integrated production (incl. conventional) and organic production of 90% to 10% (FAO 1999). --- Sources: SBV (Schweizerischer Bauernverband) (2008) - Statistische Erhebungen und Schätzugen über Landwirtschaft und Ernährung. Schweizerischer Bauernverband. Brugg, Switzerland. 2008. --- SBV (2010) - Statistische Erhebungen und Schätzugen über Landwirtschaft und Ernährung. Schweizerischer Bauernverband. Brugg, Switzerland. 2010. --- FAO - Agriculture and Cosumer Protection Department (online) Spotlight 1999: Organic farming. Published January 1999; retrived November 2011: http://www.fao.org/ag/magazine/9901sp3.htm.
  property carbon content, fossil 0; name C_content_fossil
    fossil carbon content on a dry matter basis
  property carbon content, non-fossil 0.574; name C_content_non_fossil
    biogene carbon content on a dry matter basis
    Composition data obtained from Table 2.1 in Utilization of canola seed fractions in ruminant feeds, Master thesis by Ravindra Guptha Heendeniya, University of Saskatchewan (Canada), 2008 (http://library2.usask.ca/theses/available/etd-06162008-141937/unrestricted/THESES_Ravindra_Heendeniya_17_june_2008.pdf). First, composition data were refered to 1 kg dry mass. Then, C-contents were calculated considering a C-content/dry mass of 46% in carbohydrates (including fibres), 53% in proteins and 75% in fats. All data from "Evolutionary and Biochemical Aspects", A.D. Kay and T. Vrede (in Global Ecology, 2010, Elsevier B.V., S.E. Jørgensen Ed.).
  property dry mass 0.94 kg; name DM
  property energy content 24.8912 MJ; name energy_content
    as gross calorific value (when relevant)
  property price 0.221958 EUR2005
    Calculated based on inputs: The price of the product has been calculated as a sum of the values of the material and energy inputs for this product. This value is therefore a rough estimation. It may underestimate the real price since there are additional expenses when producing any product. These expences can include for example labour costs, treatment of waste materials and profit for the producer. Please consider carefully whether this level of data quality is acceptable for your application.
  property water content 0.0638298; name water_content; = (1-DM)/DM
  property water in wet mass 0.06 kg; name WWM; = 1-DM
  property wet mass 1 kg; name WM
  properties: carbon allocation 0.53956 kg, carbon content 0.574

## Inputs from technosphere
- building, multi-storey: 2e-6 m3; lognormal variance with pedigree 0.3407, pedigree (2,2,5,1,1)
  See "01_crop production - seed production & processing_v1.0.pdf" - pdf-document on the dedicated talk page of ecoinvent (www.ecoinvent.org/documentation)
  EcoSpold01Location=RER
  Uncertainty: As for rape seed IP in Nemecek et al. (2003)
- electricity, low voltage: 0.058 kWh; lognormal variance with pedigree 0.0407, pedigree (2,2,5,1,1)
  EcoSpold01Location=CH
  See "01_crop production - seed production & processing_v1.0.pdf" - pdf-document on the dedicated talk page of ecoinvent (www.ecoinvent.org/documentation)
  Uncertainty: As for rape seed IP in Nemecek et al. (2003)
- rape seed, organic: 1.75 kg; lognormal variance with pedigree 0.0407, pedigree (2,2,5,1,1)
  See "01_crop production - seed production & processing_v1.0.pdf" - pdf-document on the dedicated talk page of ecoinvent (www.ecoinvent.org/documentation)
  EcoSpold01Location=CH
  Uncertainty: As for rape seed IP in Nemecek et al. (2003)
  properties: carbon content, non-fossil 0.574, dry mass 0.94 kg, water content 0.0638298, wet mass 1 kg
  note on carbon content, non-fossil: Composition data obtained from Table 2.1 in Utilization of canola seed fractions in ruminant feeds, Master thesis by Ravindra Guptha Heendeniya, University of Saskatchewan (Canada), 2008 (http://library2.usask.ca/theses/available/etd-06162008-141937/unrestricted/THESES_Ravindra_Heendeniya_17_june_2008.pdf). First, composition data were refered to 1 kg dry mass. Then, C-contents were calculated considering a C-content/dry mass of 46% in carbohydrates (including fibres), 53% in proteins and 75% in fats. All data from "Evolutionary and Biochemical Aspects", A.D. Kay and T. Vrede (in Global Ecology, 2010, Elsevier B.V., S.E. Jørgensen Ed.).

## Inputs from nature
- Occupation, construction site [natural resource, land]: 8e-6 m2*year; lognormal variance with pedigree 0.0807, pedigree (2,2,5,1,1)
  See "01_crop production - seed production & processing_v1.0.pdf" - pdf-document on the dedicated talk page of ecoinvent (www.ecoinvent.org/documentation)
  Uncertainty: As for rape seed IP in Nemecek et al. (2003)
- Occupation, industrial area [natural resource, land]: 0.002 m2*year; lognormal variance with pedigree 0.0807, pedigree (2,2,5,1,1)
  (same comment as for Occupation, construction site)
- Transformation, from unspecified [natural resource, land]: 4e-6 m2; lognormal variance with pedigree 0.1607, pedigree (2,2,5,1,1)
  (same comment as for Occupation, construction site)
- Transformation, to industrial area [natural resource, land]: 4e-6 m2; lognormal variance with pedigree 0.1607, pedigree (2,2,5,1,1)
  (same comment as for Occupation, construction site)

## Sampling procedure
Data were compiled from statistics, fertilising recommendations, documents from extension services and expert knowledge.

## Review by Niels Jungbluth 2005-12-05
Passed.
