# intral production

Dataset: EcoSpold 2, unit process
Geography: RoW
Time period: 2000-01-01 to 2023-12-31
Technology level: current
Classification: EcoSpold01Categories: chemicals/inorganics
Classification: ISIC rev.4 ecoinvent: 0891:Mining of chemical and fertilizer minerals
Tags: ConvertedDataset
Scenario: Business-as-Usual
System model: Allocation, cut-off by classification
Generated by: Roland Hischier
Published in: Hischier R. 2007
Database: ecoinvent
isCopyrightProtected: true
accessRestrictedTo: 1

## General comment
The functional unit represent 1 kg of milled pyrite. Large uncertainty of the process data due to weak data on the production process.
[This dataset was already contained in the ecoinvent database version 2. It was not individually updated during the transfer to ecoinvent version 3. Life Cycle Impact Assessment results may still have changed, as they are affected by changes in the supply chain, i.e. in other datasets. This dataset was generated following the ecoinvent quality guidelines for version 2. It may have been subject to central changes described in the ecoinvent version 3 change report (http://www.ecoinvent.org/database/ecoinvent-version-3/reports-of-changes/), and the results of the central updates were reviewed extensively. The changes added e.g. consistent water flows and other information throughout the database. The documentation of this dataset can be found in the ecoinvent reports of version 2, which are still available via the ecoinvent website. The change report linked above covers all central changes that were made during the conversion process.]

## Included activities end
Raw materials, machineries and energy consumption for production, estimated emissions to air from production and infrastructure of the site (approximation). No water emissions. Overburden and tailing material from process together with losses of product not taken into account.

## Geography
Data are used here as European average.

## Technology
Data approximated with data from iron mining, lime crushing and lime milling.

## Parameters
- fraction, process water, to air: 0.205 dimensionless; name fraction_PW_to_air; lognormal variance with pedigree 0.092025, pedigree (4,4,3,2,4)

## Reference product
- intral: 1 kg; By-product classification allocatable product; CPC 16120: Unroasted iron pyrites; HS2017 250200: Iron pyrites; unroasted; CAS 1309-36-0
  EcoSpold01Location=RER
  production volume 2.67763 kg
    This is a placeholder value that does not reflect real-world production volumes. This dataset does not currently require a real-world production volume to work in the database framework, and no actual data were collected yet. This has no negative effect on the results of the ecoinvent database.
  property price 0.00549081 EUR2005
    Calculated based on inputs: The price of the product has been calculated as a sum of the values of the material and energy inputs for this product. This value is therefore a rough estimation. It may underestimate the real price since there are additional expenses when producing any product. These expences can include for example labour costs, treatment of waste materials and profit for the producer. Please consider carefully whether this level of data quality is acceptable for your application.
  properties: carbon allocation 0 kg, carbon content 0, carbon content, fossil 0, carbon content, non-fossil 0, dry mass 1 kg, water content 0, water in wet mass 0 kg, wet mass 1 kg

## Inputs from technosphere
- blasting: 0.000271 kg; lognormal variance with pedigree 0.2706, pedigree (4,3,5,5,5)
  Approximation with data from iron mining & lime treatment
  EcoSpold01Location=RER
  Uncertainty: approximation with data from iron mining & lime treatment
- conveyor belt: 2.78e-8 m; lognormal variance with pedigree 0.5806, pedigree (4,3,5,5,5)
  (same comment as for blasting)
- diesel, burned in building machine: 0.0255 MJ; lognormal variance with pedigree 0.2706, pedigree (4,3,5,5,5)
  EcoSpold01Location=GLO
  Approximation with data from iron mining & lime treatment
  Uncertainty: approximation with data from iron mining & lime treatment
  properties: heating value, net 1 MJ
- electricity, medium voltage: 0.00112659, 0.022473, 0.00755086, 0.000345001, 6.90516e-5, 1.48269e-5, 0.00232068 kWh (7 suppliers, which the file names only by identifier); sum of these 0.0339 kWh; lognormal variance with pedigree 0.2706, pedigree (4,3,5,5,5)
  Approximation with data from iron mining & lime treatment
  EcoSpold01Location=UCTE
  Uncertainty: approximation with data from iron mining & lime treatment
- heat, central or small-scale, other than natural gas: 0.00282 MJ
  EcoSpold01Location=CH
  properties: heating value, net 1 MJ
- heat, district or industrial, other than natural gas: 0.0897584, 4.15834e-5 MJ (2 suppliers, which the file names only by identifier); sum of these 0.0898 MJ; lognormal variance with pedigree 0.2706, pedigree (4,3,5,5,5)
  (same comment as for blasting)
  properties: heating value, net 1 MJ
- industrial machine, heavy, unspecified: 0.000231 kg; lognormal variance with pedigree 0.5806, pedigree (4,3,5,5,5)
  (same comment as for blasting)
- mine infrastructure, iron: 8.33e-13 unit; lognormal variance with pedigree 0.5806, pedigree (4,3,5,5,5)
  Approximation with data from iron mining & lime treatment
  EcoSpold01Location=GLO
  Uncertainty: approximation with data from iron mining & lime treatment
- recultivation, iron mine: 2.13e-6 m2; lognormal variance with pedigree 0.4006, pedigree (4,3,5,5,5)
  (same comment as for mine infrastructure, iron)

## Inputs from nature
- Occupation, mineral extraction site [natural resource, land]: 0.00012 m2*year; lognormal variance with pedigree 0.3106, pedigree (4,3,5,5,5)
  Approximation with data from iron mining & lime treatment
  Uncertainty: approximation with data from iron mining & lime treatment
- Pyrite [natural resource, in ground]: 1.11 kg; lognormal variance with pedigree 0.2706, pedigree (4,3,5,5,5)
  (same comment as for Occupation, mineral extraction site)
- Transformation, from forest, unspecified [natural resource, land]: 2.13e-6 m2; lognormal variance with pedigree 0.4006, pedigree (4,3,5,5,5)
  (same comment as for Occupation, mineral extraction site)
- Transformation, to mineral extraction site [natural resource, land]: 2.13e-6 m2; lognormal variance with pedigree 0.4006, pedigree (4,3,5,5,5)
  (same comment as for Occupation, mineral extraction site)
- Water, well, in ground [natural resource, in water]: 2.93e-5 m3; name water_well_in_ground_input; lognormal variance with pedigree 0.0786, pedigree (4,3,5,5,3)
  Proxy: approximation with data from lime treatment
  Uncertainty: approximation with data from lime production

## Emissions to nature
- Particulate Matter, < 2.5 um [air, non-urban air or from high stacks]: 0.000145 kg; lognormal variance with pedigree 0.5806, pedigree (4,3,5,5,5)
  (same comment as for Occupation, mineral extraction site)
- Particulate Matter, > 10 um [air, non-urban air or from high stacks]: 0.00145 kg; lognormal variance with pedigree 0.3106, pedigree (4,3,5,5,5)
  (same comment as for Occupation, mineral extraction site)
- Particulate Matter, > 2.5 um and < 10um [air, non-urban air or from high stacks]: 0.00131 kg; lognormal variance with pedigree 0.4006, pedigree (4,3,5,5,5)
  (same comment as for Occupation, mineral extraction site)
- Water [air, unspecified]: 6.0065e-6 m3; name water_to_air_unspecified; lognormal variance with pedigree 0.0827, pedigree (2,2,5,5,1)
  Calculated value based on literature values and expert opinion. See comments in the parametres' comment field.
  property fraction, origin: fresh water 1; name fraction_origin_fresh_water
  property fraction, origin: salt water 0; name fraction_origin_salt_water
  property fraction, origin: unspecified 0; name fraction_origin_unspecified
- Water [water, unspecified]: 2.32935e-5 m3; name water_to_water_unspecified; lognormal variance with pedigree 0.0827, pedigree (2,2,5,5,1)
  (same comment as for Water)
  property carbon content, fossil 0; name C_content_fossil
  property carbon content, non-fossil 0; name C_content_non_fossil
  property dry mass 0 kg; name DM
  property fraction, origin: fresh water 1; name fraction_origin_fresh_water_Ww
  property fraction, origin: salt water 0; name fraction_origin_salt_water_Ww
  property fraction, origin: unspecified 0; name fraction_origin_unspecified_Ww
  property water in wet mass 1000 kg; name WWM
  property wet mass 1000 kg; name WM

## Sampling procedure
approximation with data from literature

## Extrapolations
see technology This dataset has been copied from an original dataset covering the geography RER. The uncertainty has been adjusted accordingly.

## Review by Daniel Kellenberger (obsolete) 2007-11-09
passed
