# uranium production, in yellowcake

Dataset: EcoSpold 2, unit process
Geography: RoW
Time period: 1980-01-01 to 2023-12-31
Technology level: current
Classification: EcoSpold01Categories: nuclear power/production
Classification: ISIC rev.4 ecoinvent: 0721:Mining of uranium and thorium ores
Tags: ConvertedDataset
Scenario: Business-as-Usual
System model: Allocation, cut-off by classification
Generated by: Roberto Dones
Published in: Dones, R. 2007
Database: ecoinvent
isCopyrightProtected: true
accessRestrictedTo: 1

## General comment
All necessary electricity is assumed to be produced on site by diesel generators. Chemical requirements as well as non radioactive emissions to air are averaged over several references describing operation of mills in the early 1980s in North America. Radioactive emissions to air and water as well as non radioactive emissions to water are also averaged values including information from early 1990s. Losses of uranium in milling are arbitrarily assumed 5% of the input uranium. The infrastructure requirement are calculated the production and the lifetime of the model mill.
[This dataset was already contained in the ecoinvent database version 2. It was not individually updated during the transfer to ecoinvent version 3. Life Cycle Impact Assessment results may still have changed, as they are affected by changes in the supply chain, i.e. in other datasets. This dataset was generated following the ecoinvent quality guidelines for version 2. It may have been subject to central changes described in the ecoinvent version 3 change report (http://www.ecoinvent.org/database/ecoinvent-version-3/reports-of-changes/), and the results of the central updates were reviewed extensively. The changes added e.g. consistent water flows and other information throughout the database. The documentation of this dataset can be found in the ecoinvent reports of version 2, which are still available via the ecoinvent website. The change report linked above covers all central changes that were made during the conversion process.]

## Included activities end
The module includes: the land use for the operation (mostly tailings); diesel generators and industrial boilers burning light oil; transport of the chemicals and fuels; radioactive and non-radioactive emissions to air and water during operation; water use (mining water, but attributed to "unspecified natural origin").

## Geography
North American data.

## Technology
Average conditions.

## Parameters
- fraction, process water, to air: 0.15 dimensionless; name fraction_PW_to_air; lognormal variance with pedigree 0.092025, pedigree (4,4,3,2,4)

## Reference product
- uranium, in yellowcake: 1 kg; By-product classification allocatable product; CPC 13000: Uranium and thorium ores and concentrates; HS2017 261210: Uranium ores and concentrates
  EcoSpold01Location=RNA
  production volume 2.76686e7 kg
    Global production (http://www.world-nuclear.org/info/inf23.html), assuming 5% loss in yellowcake production
  property price 39.2668 EUR2005
    Calculated based on inputs: The price of the product has been calculated as a sum of the values of the material and energy inputs for this product. This value is therefore a rough estimation. It may underestimate the real price since there are additional expenses when producing any product. These expences can include for example labour costs, treatment of waste materials and profit for the producer. Please consider carefully whether this level of data quality is acceptable for your application.
  properties: carbon allocation 0 kg, carbon content 0, carbon content, fossil 0, carbon content, non-fossil 0, dry mass 1 kg, water content 0, water in wet mass 0 kg, wet mass 1 kg

## Inputs from technosphere
- ammonia, anhydrous, liquid: 0.0236919, 0.101783, 0.0459909, 0.50978, 0.0215487, 0.00482034, 0.177156, 0.0152287 kg (8 suppliers, which the file names only by identifier); sum of these 0.9 kg; lognormal variance with pedigree 0.082, pedigree (1,1,5,5,1)
  range of data
  EcoSpold01Location=RER
  properties: dry mass 1 kg, wet mass 1 kg
- ammonium sulfate: 0.0811101, 0.0248899 kg (2 suppliers, which the file names only by identifier); sum of these 0.106 kg; lognormal variance with pedigree 0.162, pedigree (1,1,5,5,1)
  own estimation
  EcoSpold01Location=RER
  properties: dry mass 1 kg, wet mass 1 kg
- chemical, inorganic: 0.26 kg; lognormal variance with pedigree 0.162, pedigree (1,1,5,5,1)
  EcoSpold01Location=GLO
  own estimation
  properties: carbon content, fossil 0.003, dry mass 1 kg, wet mass 1 kg
  note on carbon content, fossil: This dataset is an unweighted average of 20 inorganic substances (listed in Tab 88.1, ecoinvent v2.2 report 8, part II), being part of the top100 chemicals included in this database. The C-content has also been calculated as an unweighted average of the C content of the substances composing this dataset.
- chemical, organic: 0.315 kg; lognormal variance with pedigree 0.162, pedigree (1,1,5,5,1)
  EcoSpold01Location=GLO
  range of data
  properties: carbon content, fossil 0.628, dry mass 1 kg, heating value, net 19.03 MJ, wet mass 1 kg
  note on carbon content, fossil: This dataset is an unweighted average of 20 organic substances (listed in Tab 88.1, ecoinvent v2.2 report 8, part II), being part of the top100 chemicals included in this database. The C-content has also been calculated as an unweighted average of the C content of the substances composing this dataset.
- diesel, burned in diesel-electric generating set, 10MW: 176 MJ; lognormal variance with pedigree 0.162, pedigree (1,1,5,5,1)
  own estimation, based on range of data
  EcoSpold01Location=GLO
  properties: heating value, net 1 MJ
- ethylene diamine: 0.002352, 0.009648 kg (2 suppliers, which the file names only by identifier); sum of these 0.012 kg; lognormal variance with pedigree 0.082, pedigree (1,1,5,5,1)
  EcoSpold01Location=RER
  range of data
  properties: carbon content, fossil 0.5, dry mass 1 kg, heating value, net 28.24 MJ, wet mass 1 kg
- heat, district or industrial, other than natural gas: 244.552, 6.248 MJ (2 suppliers, which the file names only by identifier); sum of these 250.8 MJ; lognormal variance with pedigree 0.162, pedigree (1,1,5,5,1)
  own estimation, based on range of data
  EcoSpold01Location=RER
  properties: heating value, net 1 MJ
- soda ash, light: 2.04299, 0.457014 kg (2 suppliers, which the file names only by identifier); sum of these 2.5 kg; lognormal variance with pedigree 0.162, pedigree (1,1,5,5,1)
  EcoSpold01Location=RER
  range of data
  properties: carbon content, fossil 0.0517241, dry mass 1 kg, heating value, net 3.43 MJ, wet mass 1 kg
- sodium chlorate, powder: 0.0885936, 0.911406 kg (2 suppliers, which the file names only by identifier); sum of these 1 kg; lognormal variance with pedigree 0.162, pedigree (1,1,5,5,1)
  EcoSpold01Location=RER
  range of data
  properties: dry mass 1 kg, wet mass 1 kg
- sodium chloride, brine solution: 2.5 kg; lognormal variance with pedigree 0.162, pedigree (1,1,5,5,1)
  EcoSpold01Location=RER
  own estimation
  properties: dry mass 1 kg, wet mass 1 kg
- sodium hydroxide, without water, in 50% solution state: 0.002313, 0.023687 kg (2 suppliers, which the file names only by identifier); sum of these 0.026 kg; lognormal variance with pedigree 0.162, pedigree (1,1,5,5,1)
  own estimation
  EcoSpold01Location=RER
  properties: dry mass 1 kg, heating value, net 3.03 MJ, wet mass 1 kg
- sulfuric acid: 30.9516, 4.04836 kg (2 suppliers, which the file names only by identifier); sum of these 35 kg; lognormal variance with pedigree 0.082, pedigree (1,1,5,5,1)
  range of data
  EcoSpold01Location=RER
  properties: dry mass 1 kg, wet mass 1 kg
- tailing, from uranium milling: -0.25 m3; lognormal variance with pedigree 0.302, pedigree (1,1,1,5,1)
  EcoSpold01Location=GLO
  own estimation, based on the uncertainty of amount and density
  production volume
    Calculated from the production volume of uranium, in yellowcake in proportion to the respective output amounts.
  properties: dry mass 1350 kg, water content 0.333333, wet mass 1800 kg
- uranium mill: 1.35e-7 unit; lognormal variance with pedigree 0.162, pedigree (1,1,5,5,1)
  EcoSpold01Location=US
  depends on lifetime and production
- uranium ore, as U: 1.05 kg; lognormal variance with pedigree 0.042, pedigree (1,1,5,5,1)
  own assumption
  EcoSpold01Location=GLO
  properties: dry mass 1 kg, wet mass 1 kg

## Inputs from nature
- Occupation, dump site [natural resource, land]: 1.96 m2*year; lognormal variance with pedigree 0.842, pedigree (1,1,5,5,1)
  own estimation, based on range of data
- Transformation, from unspecified [natural resource, land]: 0.018 m2; lognormal variance with pedigree 0.692, pedigree (1,1,5,5,1)
  own estimation, based on range of data
- Transformation, to dump site [natural resource, land]: 0.018 m2; lognormal variance with pedigree 0.692, pedigree (1,1,5,5,1)
  own estimation, based on range of data
- Water, unspecified natural origin [natural resource, in water]: 1 m3; name water_UNO_input; lognormal variance with pedigree 0.162, pedigree (1,1,5,5,1)
  own estimation, based on range of data

## Emissions to nature
- Aldehydes, unspecified [air, non-urban air or from high stacks]: 0.00088 kg; lognormal variance with pedigree 0.342, pedigree (1,1,5,5,1)
  own estimation
- Ammonia [air, non-urban air or from high stacks]: 0.0017 kg; lognormal variance with pedigree 0.342, pedigree (1,1,5,5,1)
  own estimation
- Lead-210 [air, non-urban air or from high stacks]: 2 kBq; lognormal variance with pedigree 0.522, pedigree (1,1,5,5,1)
  own estimation, based on range of data
- NMVOC, non-methane volatile organic compounds [air, non-urban air or from high stacks]: 0.11 kg; lognormal variance with pedigree 0.342, pedigree (1,1,5,5,1)
  own estimation
- Nitrogen oxides [air, non-urban air or from high stacks]: 0.017 kg; lognormal variance with pedigree 0.342, pedigree (1,1,5,5,1)
  range of data
- Particulate Matter, > 10 um [air, non-urban air or from high stacks]: 0.22 kg; lognormal variance with pedigree 0.342, pedigree (1,1,5,5,1)
  own estimation
- Particulate Matter, > 2.5 um and < 10um [air, non-urban air or from high stacks]: 0.00088 kg; lognormal variance with pedigree 0.342, pedigree (1,1,5,5,1)
  own estimation
- Polonium-210 [air, non-urban air or from high stacks]: 3 kBq; lognormal variance with pedigree 0.342, pedigree (1,1,5,5,1)
  own estimation, based on range of data
- Radium-226 [air, non-urban air or from high stacks]: 1 kBq; lognormal variance with pedigree 0.692, pedigree (1,1,5,5,1)
  own estimation, based on range of data
- Radon-222 [air, non-urban air or from high stacks]: 150000 kBq; lognormal variance with pedigree 1.872, pedigree (1,1,5,5,1)
  own estimation, based on range of data
- Sulfur dioxide [air, non-urban air or from high stacks]: 0.00023 kg; lognormal variance with pedigree 0.342, pedigree (1,1,5,5,1)
  range of data
- Thorium-230 [air, non-urban air or from high stacks]: 1 kBq; lognormal variance with pedigree 0.692, pedigree (1,1,5,5,1)
  own estimation, based on range of data
- Uranium-234 [air, non-urban air or from high stacks]: 2.9 kBq; lognormal variance with pedigree 0.522, pedigree (1,1,5,5,1)
  own estimation, based on range of data
- Uranium-235 [air, non-urban air or from high stacks]: 0.14 kBq; lognormal variance with pedigree 0.522, pedigree (1,1,5,5,1)
  own estimation, based on range of data
- Uranium-238 [air, non-urban air or from high stacks]: 2.9 kBq; lognormal variance with pedigree 0.522, pedigree (1,1,5,5,1)
  own estimation, based on range of data
- Water [air, unspecified]: 0.15 m3; name water_to_air_unspecified; lognormal variance with pedigree 0.0827, pedigree (2,2,5,5,1)
  Calculated value based on literature values and expert opinion. See comments in the parametres' comment field.
  property fraction, origin: fresh water 0; name fraction_origin_fresh_water
  property fraction, origin: salt water 0; name fraction_origin_salt_water
  property fraction, origin: unspecified 1; name fraction_origin_unspecified
- Aluminium III [water, surface water]: 0.35 kg; lognormal variance with pedigree 0.162, pedigree (1,1,5,5,1)
  range of data
- Ammonium [water, surface water]: 0.072 kg; lognormal variance with pedigree 0.162, pedigree (1,1,5,5,1)
  range of data
- Arsenic ion [water, surface water]: 8.1e-5 kg; lognormal variance with pedigree 0.692, pedigree (1,1,5,5,1)
  range of data
- Barium II [water, surface water]: 0.00011 kg; lognormal variance with pedigree 0.342, pedigree (1,1,5,5,1)
  range of data
- Beryllium II [water, surface water]: 1.4e-5 kg; lognormal variance with pedigree 0.342, pedigree (1,1,5,5,1)
  range of data
- Calcium II [water, surface water]: 0.54 kg; lognormal variance with pedigree 1.372, pedigree (1,1,5,5,1)
  range of data
- Carbonate [water, surface water]: 0.036 kg; lognormal variance with pedigree 0.162, pedigree (1,1,5,5,1)
  range of data
- Chloride [water, surface water]: 0.52 kg; lognormal variance with pedigree 0.692, pedigree (1,1,5,5,1)
  range of data
- Chromium III [water, surface water]: 0.00096 kg; lognormal variance with pedigree 0.342, pedigree (1,1,5,5,1)
  range of data
- Copper ion [water, surface water]: 0.0002 kg; lognormal variance with pedigree 0.162, pedigree (1,1,5,5,1)
  range of data
- Cyanide [water, surface water]: 8.8e-7 kg; lognormal variance with pedigree 0.162, pedigree (1,1,5,5,1)
  range of data
- Fluoride [water, surface water]: 0.00066 kg; lognormal variance with pedigree 0.162, pedigree (1,1,5,5,1)
  range of data
- Hydrocarbons, unspecified [water, surface water]: 0.0035 kg; lognormal variance with pedigree 0.162, pedigree (1,1,5,5,1)
  range of data
- Iron ion [water, surface water]: 0.1 kg; lognormal variance with pedigree 0.522, pedigree (1,1,5,5,1)
  range of data
- Lead II [water, surface water]: 0.0015 kg; lognormal variance with pedigree 0.522, pedigree (1,1,5,5,1)
  range of data
- Magnesium [water, surface water]: 0.01 kg; lognormal variance with pedigree 0.342, pedigree (1,1,5,5,1)
  range of data
- Manganese II [water, surface water]: 0.015 kg; lognormal variance with pedigree 0.162, pedigree (1,1,5,5,1)
  range of data
- Molybdenum VI [water, surface water]: 0.0019 kg; lognormal variance with pedigree 0.342, pedigree (1,1,5,5,1)
  range of data
- Nickel II [water, surface water]: 0.0001 kg; lognormal variance with pedigree 0.342, pedigree (1,1,5,5,1)
  range of data
- Nitrate [water, surface water]: 0.0087 kg; lognormal variance with pedigree 0.162, pedigree (1,1,5,5,1)
  range of data
- Phosphate [water, surface water]: 0.00022 kg; lognormal variance with pedigree 0.162, pedigree (1,1,5,5,1)
  range of data
- Radium-226 [water, surface water]: 1 kBq; lognormal variance with pedigree 1.372, pedigree (1,1,5,5,1)
  own estimation, based on range of data
- Selenium IV [water, surface water]: 0.0016 kg; lognormal variance with pedigree 0.162, pedigree (1,1,5,5,1)
  range of data
- Silver I [water, surface water]: 8.8e-7 kg; lognormal variance with pedigree 0.162, pedigree (1,1,5,5,1)
  range of data
- Sodium I [water, surface water]: 0.04 kg; lognormal variance with pedigree 0.162, pedigree (1,1,5,5,1)
  range of data
- Sulfate [water, surface water]: 1.6 kg; lognormal variance with pedigree 0.342, pedigree (1,1,5,5,1)
  range of data
- Sulfide [water, surface water]: 4.4e-5 kg; lognormal variance with pedigree 0.162, pedigree (1,1,5,5,1)
  range of data
- Thorium-230 [water, surface water]: 150 kBq; lognormal variance with pedigree 1.372, pedigree (1,1,5,5,1)
  own estimation, based on range of data
- Titanium ion [water, surface water]: 0.0012 kg; lognormal variance with pedigree 0.162, pedigree (1,1,5,5,1)
  range of data
- Uranium-234 [water, surface water]: 0.3 kBq; lognormal variance with pedigree 0.342, pedigree (1,1,5,5,1)
  own estimation, based on range of data
- Uranium-235 [water, surface water]: 4.85 kBq; lognormal variance with pedigree 0.342, pedigree (1,1,5,5,1)
  own estimation, based on range of data
- Uranium-238 [water, surface water]: 4.85 kBq; lognormal variance with pedigree 0.342, pedigree (1,1,5,5,1)
  own estimation, based on range of data
- Vanadium V [water, surface water]: 1.8e-5 kg; lognormal variance with pedigree 0.162, pedigree (1,1,5,5,1)
  range of data
- Water [water, unspecified]: 0.85 m3; name water_to_water_unspecified; lognormal variance with pedigree 0.0827, pedigree (2,2,5,5,1)
  (same comment as for Water)
  property carbon content, fossil 0; name C_content_fossil
  property carbon content, non-fossil 0; name C_content_non_fossil
  property dry mass 0 kg; name DM
  property fraction, origin: fresh water 0; name fraction_origin_fresh_water_Ww
  property fraction, origin: salt water 0; name fraction_origin_salt_water_Ww
  property fraction, origin: unspecified 1; name fraction_origin_unspecified_Ww
  property water in wet mass 1000 kg; name WWM
  property wet mass 1000 kg; name WM
- Zinc II [water, surface water]: 0.00052 kg; lognormal variance with pedigree 0.162, pedigree (1,1,5,5,1)
  range of data

## Sampling procedure
Literature

## Extrapolations
none This dataset has been copied from an original dataset covering the geography RNA. The uncertainty has been adjusted accordingly.

## Review by Hans-Jörg Althaus 2005-07-19
passed
