# phosphate rock beneficiation

Dataset: EcoSpold 2, unit process
Geography: RER
Time period: 2011-01-01 to 2023-12-31
Technology level: current
Classification: ISIC rev.4 ecoinvent: 0891:Mining of chemical and fertilizer minerals
Synonyms: Rock phosphate, Phosphorite
Scenario: Business-as-Usual
System model: Allocation, cut-off by classification
Generated by: Anna Kounina
Database: ecoinvent
isCopyrightProtected: true
accessRestrictedTo: 1

## General comment
This dataset represents the production of 1 kg of phosphate rock, with 32% P2O5, at the mine. Rock phosphate has a phosphorus content of 32% P2O5 and is mainly used as a raw material for the production of phosphorous fertilisers. In this dataset, the mining technology is based on magmatic apatite phosphate ore (e.g. from Russia). In order to produce 1 tonne of commercial phosphate rock with a content of 32% P2O5, 5 tonnes of phosphate ore must be mined and beneficiated in open pit or underground mines. Rock phosphate processing is energy intensive due to mining, crushing and grinding of the phosphate ore. The phosphated sludge is assumed to be deposited on a landfill site and treated as an inert substance. Large uncertainties exist for data on particle emissions from transfer and storage. Also data of emissions to water and soil are uncertain due to missing data of uncontrolled run off and water use which were estimated.
The main data source for this dataset is Fertilizers Europe (2014), complemented by Althaus et al (2007).
References:
Fertilizers Europe (2014): Average Emissions Year 2011. Fertilizers Europe Environmental report (internal).
Fertilizers Europe (2016): Average Emissions Year 2014. Fertilizers Europe Environmental report (internal). Used for updated energy and GHG emission in Carbon Footprint Calculator
Althaus H.-J., Chudacoff M., Hischier R., Jungbluth N., Osses M. and Primas A. (2007) Life Cycle Inventories of Chemicals. ecoinvent report No. 8, v2.0. EMPA Dübendorf, Swiss Centre for Life Cycle Inventories, Dübendorf, CH.

## Included activities start
The activity starts from phosphate ore in the ground.

## Included activities end
This activites ends with the production of 1 kg of phosphate rock. Mining process, transport to beneficiation plant, dry processing including crushing, screening or washing and flotation. Drying or calcination of washed rock included. Land use for mining and reclamation.

## Geography
The dataset is representative of phosphate rock mining in Europe, extrapolated from phosphate mines in Russia

## Technology
This datasets corresponds to the technology used in Europe for phosphate rock mining and beneficiation.

## Time period
Primary data were collected on fertiliser production for the year 2011. These data were based on annual average data for the year 2011.

## Reference product
- phosphate rock, beneficiated: 1 kg; name RP; By-product classification allocatable product; CPC 34629: Other phosphatic fertilizers, n.e.c.; HS2017 2510: Natural calcium phosphates; natural aluminium calcium phosphates and phosphatic chalk; CAS 1306-05-4
  production volume 8.652e8 kg; name PVRP
    Kg/y, European annual production Volume of phosphate rock was estimated based on the production capacity of phosphate rock, all grade. European production capacity was 865'200 t in 2014 (Source: International Fertilizers Association (2014))
  property carbon content, fossil 0
    Carbon content, fossil is calculated based on the chemical formula of the substance.
  property oxygen content 0.180345
    Oxygen content (on a dry matter basis) of phosphate rock, beneficiated is calculated from the molecular formula of the substance ().
  property phosphorus content 0.139655
    Phosphorus content (on a dry matter basis) of phosphate rock, beneficiated is calculated from the molecular formula of the substance ().
  property price 0.049 EUR2005
    Calculated value based on data from United Nations Commodity Trade Statistics Database (comtrade.un.org). UN comtrade category: 251010 Natural calcium phosphates, unground. Year 2005. Using exchange rate of 1EURO = 1.209 USD. Average of price of import into 5 main markets (EU, US, JP, IN and CN).
  properties: carbon allocation 0 kg, carbon content 0, carbon content, non-fossil 0, dry mass 1 kg, water content 0, water in wet mass 0 kg, wet mass 1 kg

## Inputs from technosphere
- diesel, burned in building machine: 0.00372 MJ; lognormal variance with pedigree 0.0413, pedigree (2,2,5,1,1)
  Calculation, based on Fertilizer Europe (2014).
  properties: heating value, net 1 MJ
- electricity, low voltage: 0.075 kWh; lognormal variance with pedigree 0.0413, pedigree (2,2,5,1,1)
  Data from Fertilizer Europe (2014).
- ethylene diamine: 0.000896 kg; lognormal variance with pedigree 0.0413, pedigree (2,2,5,1,1)
  Estimation, based on various data sources (Althaus et al. 2007).
  properties: carbon content, fossil 0.5, dry mass 1 kg, heating value, net 28.24 MJ, wet mass 1 kg
- light fuel oil: 0.0033 kg; lognormal variance with pedigree 0.0413, pedigree (2,2,5,1,1)
  Estimation, based on various data sources (Althaus et al. 2007).
  properties: carbon content, fossil 0.862, dry mass 1 kg, heating value, net 42.6 MJ, wet mass 1 kg
- mine infrastructure, phosphate rock: 1.1e-11 unit; lognormal variance with pedigree 0.0413, pedigree (2,2,5,1,1)
  Estimation, based on various data sources (Althaus et al. 2007).
- non-sulfidic overburden, off-site: -4.11 kg; name BP; lognormal variance with pedigree 0.0033, pedigree (2,2,3,1,1)
  Data from Fertilizer Europe (2014).
  production volume; = PVRP*BP/RP
    Calculated based on the production volume of the reference product.
  properties: dry mass 1 kg, wet mass 1 kg
- palm oil, crude: 0.00221 kg; lognormal variance with pedigree 0.0413, pedigree (2,2,5,1,1)
  Estimation, based on various data sources (Althaus et al. 2007).
  properties: carbon content, non-fossil 0.752881, dry mass 1 kg, heating value, net 37 MJ, wet mass 1 kg
  note on heating value, net: Literature value, Source: Biograce, Condensed list of standard values, version 2 - Public. Available at: https://biograce.net/app/webroot/files/file/BioGrace_condensed_list_of_standard_values_-_version_2_-_Public.doc
- soda ash, light: 0.00221 kg; lognormal variance with pedigree 0.0413, pedigree (2,2,5,1,1)
  Estimation, based on various data sources (Althaus et al. 2007).
  properties: carbon content, fossil 0.0517241, dry mass 1 kg, heating value, net 3.43 MJ, wet mass 1 kg
- sodium silicate, spray powder, 80%: 0.000672 kg; lognormal variance with pedigree 0.0413, pedigree (2,2,5,1,1)
  Estimation, based on various data sources (Althaus et al. 2007).
  properties: dry mass 1 kg, wet mass 1 kg
- steam, in chemical industry: 0.229 kg; lognormal variance with pedigree 0.0413, pedigree (2,2,5,1,1)
  Calculation, based on Fertilizer Europe (2014).
  properties: dry mass 1 kg, wet mass 1 kg
- sulfuric acid: 0.0033 kg; lognormal variance with pedigree 0.0413, pedigree (2,2,5,1,1)
  Estimation, based on various data sources (Althaus et al. 2007).
  properties: dry mass 1 kg, wet mass 1 kg

## Inputs from nature
- Fluorine [natural resource, in ground]: 0.0496 kg; lognormal variance with pedigree 0.0413, pedigree (2,2,5,1,1)
  Estimation, based on various data sources (Althaus et al. 2007).
- Gangue [natural resource, in ground]: 4.0496 kg; lognormal variance with pedigree 0.0546, pedigree (3,3,5,5,1)
- Occupation, construction site [natural resource, land]: 0.00349 m2*year; lognormal variance with pedigree 0.0807, pedigree (2,2,5,1,1)
  Estimation, based on various data sources (Althaus et al. 2007).
- Occupation, mineral extraction site [natural resource, land]: 0.0141 m2*year; lognormal variance with pedigree 0.0807, pedigree (2,2,5,1,1)
  Estimation, based on various data sources (Althaus et al. 2007).
- Phosphorus [natural resource, in ground]: 0.139655 kg; lognormal variance with pedigree 0.0413, pedigree (2,2,5,1,1)
  Estimation, based on various data sources (Althaus et al. 2007). 5 kg have to be mined during this process.
- Transformation, from forest, unspecified [natural resource, land]: 0.000211 m2; lognormal variance with pedigree 0.1607, pedigree (2,2,5,1,1)
  Estimation, based on various data sources (Althaus et al. 2007).
- Transformation, from mineral extraction site [natural resource, land]: 0.000707 m2; lognormal variance with pedigree 0.1607, pedigree (2,2,5,1,1)
  Estimation, based on various data sources (Althaus et al. 2007).
- Transformation, from pasture, man made [natural resource, land]: 0.000493 m2; lognormal variance with pedigree 0.1607, pedigree (2,2,5,1,1)
  Estimation, based on various data sources (Althaus et al. 2007).
- Transformation, to forest, unspecified [natural resource, land]: 0.000106 m2; lognormal variance with pedigree 0.1607, pedigree (2,2,5,1,1)
  Estimation, based on various data sources (Althaus et al. 2007).
- Transformation, to mineral extraction site [natural resource, land]: 0.000707 m2; lognormal variance with pedigree 0.1607, pedigree (2,2,5,1,1)
  Estimation, based on various data sources (Althaus et al. 2007).
- Transformation, to pasture, man made [natural resource, land]: 0.000602 m2; lognormal variance with pedigree 0.1607, pedigree (2,2,5,1,1)
  Estimation, based on various data sources (Althaus et al. 2007).
- Water, well, in ground [natural resource, in water]: 0.0032 m3; lognormal variance with pedigree 0.0413, pedigree (2,2,5,1,1)
  Estimation, based on various data sources (Althaus et al. 2007).

## Emissions to nature
- Carbon dioxide, fossil [air, non-urban air or from high stacks]: 0.04 kg; lognormal variance with pedigree 0.0413, pedigree (2,2,5,1,1)
  Data from Fertilizer Europe (2014).
- Lead-210 [air, non-urban air or from high stacks]: 0.000749 kBq; lognormal variance with pedigree 0.0807, pedigree (2,2,5,1,1)
  Estimation, based on various data sources (Althaus et al. 2007).
- Particulate Matter, > 2.5 um and < 10um [air, non-urban air or from high stacks]: 7.2e-5 kg; lognormal variance with pedigree 0.1607, pedigree (2,2,5,1,1)
  Data from Fertilizer Europe (2014).
- Polonium-210 [air, non-urban air or from high stacks]: 0.000749 kBq; lognormal variance with pedigree 0.0807, pedigree (2,2,5,1,1)
  Estimation, based on various data sources (Althaus et al. 2007).
- Radium-226 [air, non-urban air or from high stacks]: 0.00188 kBq; lognormal variance with pedigree 0.0807, pedigree (2,2,5,1,1)
  Estimation, based on various data sources (Althaus et al. 2007).
- Thorium-230 [air, non-urban air or from high stacks]: 0.00188 kBq; lognormal variance with pedigree 0.0807, pedigree (2,2,5,1,1)
  Estimation, based on various data sources (Althaus et al. 2007).
- Thorium-232 [air, non-urban air or from high stacks]: 3.3e-5 kBq; lognormal variance with pedigree 0.0807, pedigree (2,2,5,1,1)
  Estimation, based on various data sources (Althaus et al. 2007).
- Uranium-234 [air, non-urban air or from high stacks]: 0.00188 kBq; lognormal variance with pedigree 0.0807, pedigree (2,2,5,1,1)
  Estimation, based on various data sources (Althaus et al. 2007).
- Uranium-238 [air, non-urban air or from high stacks]: 0.00188 kBq; lognormal variance with pedigree 0.0807, pedigree (2,2,5,1,1)
  Estimation, based on various data sources (Althaus et al. 2007).
- Water [air, non-urban air or from high stacks]: 0.00109 m3; lognormal variance with pedigree 0.0807, pedigree (2,2,5,1,1)
  Estimation, based on various data sources (Althaus et al. 2007).
- Water [air, unspecified]: 5.3e-5 m3; lognormal variance with pedigree 0.0807, pedigree (2,2,5,1,1)
  Data from Fertilizer Europe (2014).
- Oils, unspecified [soil, industrial]: 0.00163 kg; lognormal variance with pedigree 0.0807, pedigree (2,2,5,1,1)
  Estimation, based on various data sources (Althaus et al. 2007).
- BOD5, Biological Oxygen Demand [water, surface water]: 0.000214 kg; lognormal variance with pedigree 0.0807, pedigree (2,2,5,1,1)
  Estimation, based on various data sources (Althaus et al. 2007).
- COD, Chemical Oxygen Demand [water, surface water]: 0.000214 kg; lognormal variance with pedigree 0.0807, pedigree (2,2,5,1,1)
  Estimation, based on various data sources (Althaus et al. 2007).
- DOC, Dissolved Organic Carbon [water, surface water]: 1.58e-7 kg; lognormal variance with pedigree 0.0807, pedigree (2,2,5,1,1)
  Estimation, based on various data sources (Althaus et al. 2007).
- Fluoride [water, surface water]: 1.43e-5 kg; lognormal variance with pedigree 0.6907, pedigree (2,2,5,1,1)
  Estimation, based on various data sources (Althaus et al. 2007).
- Nitrogen [water, surface water]: 1.12e-5 kg; lognormal variance with pedigree 0.0807, pedigree (2,2,5,1,1)
  Estimation, based on various data sources (Althaus et al. 2007).
- Phosphorus [water, surface water]: 2.87e-5 kg; lognormal variance with pedigree 0.0807, pedigree (2,2,5,1,1)
  Estimation, based on various data sources (Althaus et al. 2007).
- Radioactive species, alpha emitters [water, surface water]: 0.00139 kBq; lognormal variance with pedigree 0.6907, pedigree (2,2,5,1,1)
  Estimation, based on various data sources (Althaus et al. 2007).
- Sulfate [water, surface water]: 0.000947 kg; lognormal variance with pedigree 0.0807, pedigree (2,2,5,1,1)
  Estimation, based on various data sources (Althaus et al. 2007).
- Suspended solids, unspecified [water, surface water]: 7.17e-5 kg; lognormal variance with pedigree 0.6907, pedigree (2,2,5,1,1)
  Estimation, based on various data sources (Althaus et al. 2007).
- TOC, Total Organic Carbon [water, surface water]: 5.73e-5 kg; lognormal variance with pedigree 0.0807, pedigree (2,2,5,1,1)
  Estimation, based on various data sources (Althaus et al. 2007).
- Toluene [water, surface water]: 1.72e-7 kg; lognormal variance with pedigree 0.6907, pedigree (2,2,5,1,1)
  Estimation, based on various data sources (Althaus et al. 2007).
- Water [water, unspecified]: 0.00211 m3; lognormal variance with pedigree 0.0807, pedigree (2,2,5,1,1)
  Estimation, based on various data sources (Althaus et al. 2007).
