# sodium sulfide production

Dataset: EcoSpold 2, unit process
Geography: GLO
Time period: 2013-01-01 to 2023-12-31
Technology level: current
Classification: EcoSpold01Categories: chemicals/inorganics
Classification: ISIC rev.4 ecoinvent: 2011:Manufacture of basic chemicals
Synonyms: sodium sulfuret; disodium sulfide; sodium monosulfide
Scenario: Business-as-Usual
System model: Allocation, cut-off by classification
Share of production covered: 100 %
Generated by: Catherine Reid
Database: ecoinvent
isCopyrightProtected: true
accessRestrictedTo: 1

## General comment
This dataset represents the production of sodium sulfide from the carbothermic reduction of sodium sulfate using coal (see http://en.wikipedia.org/wiki/Sodium_sulfide)
The carbon dioxide by-product is assumed to be directly emitted.

## Included activities start
Starts with the delivery of material and energy inputs on site.

## Included activities end
This activity ends with the production of sodium sulphide.
This dataset includes raw materials, energy uses, infrastructure and emissions.

## Technology
Reaction of sodium sulfate with carbon: Na2SO4 (MW 142.042) + 2 C (MW 12.011) => Na2S (MW 78.046) + 2 CO2 (MW 44.009).

## Time period
Arbitrary time period chosen for the proxy.

## Parameters
- C-to-Na2S chemical reaction molar ratio: 2 dimensionless; name C_to_Na2S
  Based on stoichiometry.
- CO2-to-Na2S chemical reaction molar ratio: 2 dimensionless; name CO2_to_Na2S
  Based on stoichiometry.
- Na2SO4-to-Na2S chemical reaction molar ratio: 1 dimensionless; name Na2SO4_to_Na2S
  Based on stoichiometry.
- chemical reaction yield: 1 dimensionless; name yield; lognormal variance with pedigree 0.048, pedigree (5,5,1,1,1)
  Assumption

## Reference product
- sodium sulfide: 1 kg; name RefProd; By-product classification allocatable product; CPC 34220: Zinc oxide; zinc peroxide; chromium oxides and hydroxides; manganese oxides; iron oxides and hydroxides; earth[…]; HS2017 283010: Sulphides; of sodium, whether or not chemically defined; CAS 1313-82-2
  Formula: Na2S
  production volume 2.0935e8 kg; name RP_PV_1; = 34019427 /0.1625
    The production volume is expressed in kg. It is deduced from the US production volume, which was 34019427 kg (average) in 2016 (2016 Chemical Data Reporting Resources , US EPA). The share of the global GDP of the USA was 16.25% in 2016, therefore the production volume is scaled accordingly (https://de.statista.com/statistik/daten/studie/166810/umfrage/anteil-der-usa-am-globalen-bruttoinlandsprodukt-bip/).
  property molecular weight 78.046 g/mol; name Na2S_mol_weight
    Taken from http://chem.sis.nlm.nih.gov/chemidplus/rn/1313-82-2
  property price 0.528 EUR2005
    Calculated value based on data from United Nations Commodity Trade Statistics Database (comtrade.un.org). UN comtrade category: 283010 Sodium sulphides. Using exchange rate of 1EURO = 1.209 USD. Average of price of import into 5 main markets (EU, US, JP, IN and CN).
  properties: carbon allocation 0 kg, carbon content 0, carbon content, fossil 0, carbon content, non-fossil 0, dry mass 1 kg, water content 0, water in wet mass 0 kg, wet mass 1 kg

## Inputs from technosphere
- chemical factory, organics: 4e-10 unit; lognormal variance with pedigree 0.48, pedigree (5,5,5,5,5)
  Default value using the generic chemical factory dataset created within the ecoinvent project, based on a 50'000 t annual production and a 50 year lifetime.
  Uncertainty: The uncertainty could not be determined, it has then been maximized.
- electricity, medium voltage: 0.333 kWh; source Hischier R. 2005; lognormal variance with pedigree 0.2106, pedigree (5,5,5,5,5)
  Estimated value based on literature.
  Uncertainty: The uncertainty could not be determined, it has then been maximized.
- hard coal: 0.0234515, 0.00556486, 0.018259, 0.165972, 0.0389782, 0.0239317, 0.0349634, 0.0517196, 0.0101772, 0.0144849 kg (10 suppliers, which the file names only by identifier); sum of these 0.387502 kg; = RefProd/Na2S_mol_weight*C_to_Na2S*12.011/(coal_DM*coal_C_content)/yield; lognormal variance with pedigree 0.008, pedigree (1,1,4,1,1)
  Based on stoichiometry and assumed chemical reaction yield.
  Uncertainty: Calculated variable. Uncertainty will be determined from propagation of uncertainty factors of underlying variables. Uncertainty of actual relation between variables not accounted for at this time, although this could be included in a future update.
  properties: carbon content, fossil 0.845, dry mass 0.94 kg, heating value, net 27.91 MJ, water content 0.0638298, wet mass 1 kg
  note on carbon content, fossil: C content 75-94% (specified in Tab 1.1, report 6, part VI). A mean content of 0.845 kg C/ kg dry hard coal was considered
  note on heating value, net: Based on the Characterization factor of Hard coal in the CED method
- hard coal ash: -1.62838e-5, -2.57041e-5, -3.61673e-5, -2.54429e-5, -5.39709e-6, -3.78893e-5, -0.000222927, -0.0740782, -0.00172043, -0.000151017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 kg (14 suppliers, which the file names only by identifier); sum of these -0.0797092 kg; = coal_input*(1-coal_DM*coal_C_content)
  Mass balance. Represents the non-carbon, thus unreacted, fraction of the coal input.
  production volume; = RP_PV_1 * (BP_amount_1 / RefProd)
    Calculated from production volume of reference product using the relative outputs.
  properties: dry mass 1 kg, wet mass 1 kg
- heat, from steam, in chemical industry: 1.70023, 0.299772 MJ (2 suppliers, which the file names only by identifier); sum of these 2 MJ; source Hischier R. 2005; lognormal variance with pedigree 0.2106, pedigree (5,5,5,5,5)
  (same comment as for electricity, medium voltage)
  properties: heating value, net 1 MJ
- sodium sulfate, anhydrite: 0.25553, 1.56445 kg (2 suppliers, which the file names only by identifier); sum of these 1.81998 kg; = RefProd/Na2S_mol_weight*Na2SO4_to_Na2S*Na2SO4_mol_weight/yield; lognormal variance with pedigree 0.008, pedigree (1,1,4,1,1)
  (same comment as for hard coal)
  properties: dry mass 1 kg, molecular weight 142.042 g/mol, wet mass 1 kg
  note on molecular weight: Taken from http://chem.sis.nlm.nih.gov/chemidplus/rn/7757-82-6

## Emissions to nature
- Carbon dioxide, fossil [air, unspecified]: 1.12777 kg; = RefProd/Na2S_mol_weight*C_to_Na2S*CO2_mol_weight/yield; lognormal variance with pedigree 0.008, pedigree (1,1,4,1,1)
  (same comment as for hard coal)
  property molecular weight 44.009 g/mol; name CO2_mol_weight

## Sampling procedure
Raw materials are modelled with a stoichiometric calculation and 100% yield assumption. Energy consumptions are modelled with data from literature. The emissions are estimated. Infrastructures are calculated with standard values.
