# furnace production, logs, average storage area, 30kW

Dataset: EcoSpold 2, unit process
Geography: RoW
Time period: 2000-01-01 to 2023-12-31
Technology level: current
Classification: ISIC rev.4 ecoinvent: 2815:Manufacture of ovens, furnaces and furnace burners
Tags: ConvertedDataset
Scenario: Business-as-Usual
System model: Allocation, cut-off by classification
Generated by: Christian Bauer
Published in: Bauer, C. 2007
Database: ecoinvent
isCopyrightProtected: true
accessRestrictedTo: 1

## General comment
Assumed lifetime: furnace 15 years; chimney 80 years. Operation time 1600 h/a.
[This dataset was already contained in the ecoinvent database version 2. It was not individually updated during the transfer to ecoinvent version 3. Life Cycle Impact Assessment results may still have changed, as they are affected by changes in the supply chain, i.e. in other datasets. This dataset was generated following the ecoinvent quality guidelines for version 2. It may have been subject to central changes described in the ecoinvent version 3 change report (http://www.ecoinvent.org/database/ecoinvent-version-3/reports-of-changes/), and the results of the central updates were reviewed extensively. The changes added e.g. consistent water flows and other information throughout the database. The documentation of this dataset can be found in the ecoinvent reports of version 2, which are still available via the ecoinvent website. The change report linked above covers all central changes that were made during the conversion process.]

## Included activities end
Includes the most important materials used for the fabrication of the furnace, the water storage, and the chimney: steel, concrete, rock wool, aluminum, cast iron, plastics, lubricating oil. Also includes the surface for furnace and wood storage, transports and energy used for the construction and the disposal of the furnace.

## Geography
Could be used for central European conditions.

## Technology
Boiler of average technology available on market.

## Time period
Some data used to calculate averages are from the second half of the 1990´s.

## Reference product
- furnace, logs, average storage area, 30kW: 1 unit; name RP_amount_1; By-product classification allocatable product; CPC 43420: Industrial or laboratory furnaces and ovens, except non-electric bakery ovens; other industrial or laboratory […]; HS2017 841780: Furnaces and ovens; including incinerators, non-electric, for industrial or laboratory use, n.e.c. in headi[...]
  production volume 3.96633 unit; name RP_PV_1
    This is a placeholder value that does not reflect real-world production volumes. This dataset does not currently require a real-world production volume to work in the database framework, and no actual data were collected yet. This has no negative effect on the results of the ecoinvent database.
  property price 3401 EUR2005
    UNDATA "Industrial furnace, oven, incinerator non-electric ne" (http://data.un.org/Data.aspx?q=industrial+furnace&d=ComTrade&f=_l1Code%3a84%3bcmdCode%3a841780; EU I/E average price is 6.133EUR/kg). The prices are per kg and converted to per unit by summed weight of material concumption of the process in existing ecoinvent documentation from ecoinvent v.2.2 (about 511kg). For weight of concrete, it is separately added for from price per m3 used of each unit (0.16 m3; 'furnace production, logs, hardwood storage area, 30kW')and apply EU&DK input output database 2003 (0.08 Euro2003/kg DS; density 2380 kg/m3<#concrete production, normal' in ecoinvent).
  properties: carbon allocation 0 kg, carbon content 0

## Inputs from technosphere
- aluminium, wrought alloy: 0.18 kg; lognormal variance with pedigree 0.062, pedigree (1,1,5,5,1)
  own assumption
  properties: dry mass 1 kg, wet mass 1 kg
- cast iron: 13 kg; lognormal variance with pedigree 0.062, pedigree (1,1,5,5,1)
  own assumption
  properties: carbon content, fossil 0.04, dry mass 1 kg, wet mass 1 kg
  note on carbon content, fossil: Cast iron is made by remelting pig iron in small furnaces (e.g. cupola furnaces or electric arc furnaces) and poured into moulds to make castings. It usually contains 2% to 6% carbon (ecoinvent v2.2 report 10_partII). An average content of 4% was considered
- concrete, normal strength: 0.00188091, 0.000413039, 0.000268659, 0.000358746, 0.00796513, 0.00334384, 0.00396396, 0.141806 m3 (8 suppliers, which the file names only by identifier); sum of these 0.16 m3; lognormal variance with pedigree 0.062, pedigree (1,1,5,5,1)
  own assumption
  properties: dry mass 2190 kg, water content 0.086758, wet mass 2380 kg
- copper, cathode: 5.9 kg; lognormal variance with pedigree 0.062, pedigree (1,1,5,5,1)
  own assumption
  property copper content 1; name copper_content_cathode
  properties: dry mass 1 kg, wet mass 1 kg
- drawing of pipe, steel: 228.5 kg; lognormal variance with pedigree 0.162, pedigree (1,1,5,5,1)
  own assumption
- electricity, low voltage: 17.9256, 0.800171, 12.5832, 261.181, 25.7799, 0.160577, 59.1939, 89.9208, 4.45474 kWh (9 suppliers, which the file names only by identifier); sum of these 472 kWh; lognormal variance with pedigree 0.062, pedigree (1,1,5,5,1)
  own assumption
- heat, central or small-scale, other than natural gas: 20.3235, 1479.68 MJ (2 suppliers, which the file names only by identifier); sum of these 1500 MJ; lognormal variance with pedigree 0.062, pedigree (1,1,5,5,1)
  own assumption
  properties: heating value, net 1 MJ
- lubricating oil: 0.6 kg; lognormal variance with pedigree 0.062, pedigree (1,1,5,5,1)
  own assumption
  properties: carbon content, fossil 0.75, dry mass 1 kg, heating value, net 40.2 MJ, wet mass 1 kg
  note on carbon content, fossil: Lubricating oil is produced from diesel. C-content/dry mass of fats and oils considered 75%, from: ecoinvent v2.2 report, n 15a, pg 40
  note on heating value, net: Literature value, Source: IPCC 2006, 2006 IPCC Guidelines for National Greenhouse Gas Inventories, Prepared by the National Greenhouse Gas Inventories Programme, Eggleston H.S., Buendia L., Miwa K., Ngara T. and Tanabe K. (eds). Published: IGES, Japan
- polyethylene, high density, granulate: 1.3 kg; lognormal variance with pedigree 0.062, pedigree (1,1,5,5,1)
  own assumption
  properties: carbon content, fossil 0.857143, dry mass 1 kg, heating value, net 42.47 MJ, wet mass 1 kg
  note on carbon content, fossil: Polyethylene is formed out of a huge amount of ethylene monomers (C2H4) (ecoinvent v2.2 report 11_II). MW=28 g/mol
- polyurethane, rigid foam: 24 kg; lognormal variance with pedigree 0.062, pedigree (1,1,5,5,1)
  own assumption
  properties: carbon content, fossil 0.69089, dry mass 1 kg, heating value, net 30.67 MJ, wet mass 1 kg
  note on carbon content, fossil: Polyurethanes (PUR) is the collective name for an extensive group of polymers with very different compositions and correspondingly varied property profiles, though their molecule chain contains all a urethane group (-NH-CO-O-). All PURs are built on a common principle : they are produced by the diisocyanate polyaddition process, that links polyols and (di)isocyanates. In this dataset, an example of typical polyurethane mixture is described (Ullmann, Polyurethanes, Dieterich et al. & ecoinvent v2 report 11_II). C content was calculated as an addition of C contents in its components.
- sheet rolling, steel: 228.5 kg; lognormal variance with pedigree 0.162, pedigree (1,1,5,5,1)
  own assumption
- steel, low-alloyed, hot rolled: 457 kg; lognormal variance with pedigree 0.062, pedigree (1,1,5,5,1)
  own assumption
  properties: carbon content, fossil 0.005, dry mass 1 kg, wet mass 1 kg
  note on carbon content, fossil: Low alloyed steel composition given in Tab. 3.2 ecoinvent v2.2 report 10_partII. Steel assumed to have a C content of 0.5%
- stone wool: 4.5 kg; lognormal variance with pedigree 0.062, pedigree (1,1,5,5,1)
  own assumption
  properties: carbon content, fossil 0.015401, dry mass 1 kg, wet mass 1 kg
  note on carbon content, fossil: The chemical composition of the glass fibres used in the rock wool production is similar to the composition of naturally cooled volcano basalt and has a composition listed in Tab. 3.1 and 3.2 in ecoinvent v2.2 report 16, part XIV. Rock wool contains: a minimum of 96% mineral fibres,between 0.5 and 3.0 weight percent of phenolic resin depending on the specific product characteristics, and about 0.2 percent mineral oil (ecoinvent v2.2 report 16, part XIV). An average composition of 1.8% phenolic resin, 0.2% mineral oil, and 98% mineral fibres has been assumed and used to calculate C content of the rock wool
- waste concrete: -24.0571, -327.943 kg (2 suppliers, which the file names only by identifier); sum of these -352 kg; lognormal variance with pedigree 0.022, pedigree (1,1,1,5,1)
  own assumption
  production volume; = RP_PV_1*(BP_amount_4/RP_amount_1)
    Calculated from production volume of reference product using the relative outputs.
  properties: dry mass 0.5 kg, water content 1, wet mass 1 kg
- waste mineral oil: -0.434178, -0.165822 kg (2 suppliers, which the file names only by identifier); sum of these -0.6 kg; lognormal variance with pedigree 0.022, pedigree (1,1,1,5,1)
  own assumption
  production volume; = RP_PV_1*(BP_amount_1/RP_amount_1)
    Calculated from production volume of reference product using the relative outputs.
  properties: carbon content, fossil 0.864444, dry mass 0.9 kg, heating value, net 34.7 MJ, water content 0.111111, wet mass 1 kg
  note on carbon content, fossil: Tab A.6, ecoinvent v2.2 report 13_I. C content has been calculated after data in the tables, and then referred to 1 kg DM
  note on heating value, net: Value taken from the general comment of the treatment dataset.
- waste mineral wool, for final disposal: -196.85, -260.15 kg (2 suppliers, which the file names only by identifier); sum of these -457 kg; lognormal variance with pedigree 0.022, pedigree (1,1,1,5,1)
  own assumption
  production volume; = RP_PV_1*(BP_amount_3/RP_amount_1)
    Calculated from production volume of reference product using the relative outputs.
  properties: dry mass 1 kg, wet mass 1 kg
- waste polyethylene: -8.23841e-5, -0.000210048, -8.67572e-5, -1.58856e-5, -1.29375, -0.00267855, -3.50489e-5, -0.00314367 kg (8 suppliers, which the file names only by identifier); sum of these -1.3 kg; lognormal variance with pedigree 0.022, pedigree (1,1,1,5,1)
  own assumption
  production volume; = RP_PV_1*(BP_amount_2/RP_amount_1)
    Calculated from production volume of reference product using the relative outputs.
  properties: carbon content, fossil 0.825301, dry mass 0.996 kg, heating value, net 42.47 MJ, water content 0.00401606, wet mass 1 kg
  note on carbon content, fossil: C content in 1 kg DM was calculated using data in Tab A.1, ecoinvent v2.2 report 13_I
- waste polyurethane: -0.281152, -0.0187855, -0.00313459, -23.4408, -0.00736798, -0.239555, -0.00142072, -0.00775909 kg (8 suppliers, which the file names only by identifier); sum of these -24 kg; lognormal variance with pedigree 0.022, pedigree (1,1,1,5,1)
  own assumption
  production volume; = RP_PV_1*(BP_amount_5/RP_amount_1)
    Calculated from production volume of reference product using the relative outputs.
  properties: carbon content, fossil 0.641283, dry mass 0.998 kg, heating value, net 30.67 MJ, water content 0.00200401, wet mass 1 kg
  note on carbon content, fossil: C content was calculated for 1 kg DM, using data in Tab A.2, ecoinvent v2.2 report 13_I.

## Inputs from nature
- Occupation, industrial area [natural resource, land]: 322 m2*year; lognormal variance with pedigree 0.188, pedigree (4,5,5,5,1)
  Basic uncertainty:2
- Transformation, from unspecified [natural resource, land]: 21.5 m2; lognormal variance with pedigree 0.188, pedigree (4,5,5,5,1)
  Basic uncertainty:2
- Transformation, to industrial area [natural resource, land]: 21.5 m2; lognormal variance with pedigree 0.188, pedigree (4,5,5,5,1)
  Basic uncertainty:2

## Sampling procedure
literature, personal communication

## Extrapolations
none This dataset has been copied from an original dataset covering the geography CH. The uncertainty has been adjusted accordingly.

## Review by Christian Bauer 2003-07-25
self-validation
