# soybean production

Dataset: EcoSpold 2, unit process
Geography: BR-GO
Time period: 2015-01-01 to 2023-12-31
Technology level: current
Classification: ISIC rev.4 ecoinvent: 0111:Growing of cereals (except rice), leguminous crops and oil seeds
Synonyms: soybean cultivation, soya production, soy production
Tags: No
Scenario: Business-as-Usual
System model: Allocation, cut-off by classification
Generated by: Anna Leticia M. T. Pighinelli
Published in: Folegatti Matsuura, M. 2017
Database: ecoinvent
isCopyrightProtected: true
accessRestrictedTo: 1

## General comment
The raw data collected in panels were organized in electronic spreadsheets and checked for completeness and consistency. Agricultural inputs were detailed as to their composition and physical characteristics. Agricultural operations were characterized in terms of machinery (tractor and implement), type of fuel and specific consumption. Precipitation is enought to supply water to the crop, no extra water needed. Emissions from the agricultural process were estimated using the BRCalc/ICVCalc tool, developed by Embrapa Environment, which includes specific climate and soil databases for the 137 Brazilian agricultural mesoregions, in addition to databases of parameters related to agricultural crops, fertilizers and pesticides.
The main emission models adopted by BRCalc/ICVCalc derive from the references: Nemecek et al. (2015), IPCC (2019), Nemecek & Kagi (2007). It was used the model BRLUC (Donke et al., 2020) to estimate the LUC emissions; and the PestLCI Consensus V1.0, parameterized for Brazil, to estimate pesticide emissions.

## Included activities start
This activity starts after the harvest of the previous crop.

## Included activities end
The dataset includes the inputs of seeds, mineral fertilisers and pesticides. It is assumed that no organic fertiliser is applied. The dataset includes all machine operations and corresponding machine infrastructure and sheds for: limestone and gypsum application, application of plant protection product, planting with starter fertiliser, fertilising, combine harvesting and drying of grains. For other agricultural operations, the amount of fuel consumed and their emissions are estimated. The dataset also includes the transportation of products inside the farm: water, soil correctives and fertilisers from sheds to field and grain from field to truck. Furthermore, direct field emissions and land use change emissions are included, with important regionalizations added. The dataset doesn't include: seed treatment and bacterial seed inoculant (Rhyzobium sp. for nitrogen fixation from air), cleaning and storage of harvested grains. The activity ends after harvest at the farm gate.

## Allocation
For the fraction of soybean produced in cropping system, land occupation, liming operation and limestone are allocated among the products of the system, adopting factors that consider the fraction of area and the occupation time.

## Geography
The inventory is modelled for Brazil, Goiás

## Technology
This dataset represents the production of 1 kg of soybeans in the state of Goiás, which is composed of the soybean regions of Entorno de Brasília, Sudoeste de Goiás e Porangatu. In these regions, soybean can be produced as a monoculture or in cropping systems, including other crops such as winter maize and summer maize. When in a cropping system, land occupation, liming operation and limestone are allocated among the products of the system, adopting factors that consider the fraction of area and the occupation time. The average productivity is 3379 kg/ha, at 13% moisture.
Agricultural operation was modelled based on the total diesel consumed to perform the operation and the emissions to air related to diesel burning.

## Time period
Time period of the most of the data collected for this dataset.

## Reference product
- soybean: 1 kg; By-product classification allocatable product; CPC 01412: Soya beans, other; HS2017 120110: Soya beans; seed, whether or not broken
  This dataset represents the production of 1 kg of soybeans in the state of Goiás, which is composed of the soybean regions of Entorno de Brasília, Sudoeste de Goiás e Porangatu. In these regions, soybean can be produced as a monoculture or in cropping systems, including other crops such as winter maize and summer maize. When in a cropping system, land occupation, liming operation and limestone are allocated among the products of the system, adopting factors that consider the fraction of area and the occupation time. The average productivity is 3379 kg/ha, at 13% moisture.
  production volume 1.28371e10 kg
    The covered datasets together represent 95% of national production (PV). Due to the high representativeness and the lack of information regarding the other regions not covered by the inventories, it was assumed that the available data represent 100% of the national production and a new percentage of contribution was attributed to each state.
  property price 0.239 EUR2005
    Calculated value based on data from United Nations Commodity Trade Statistics Database (comtrade.un.org). UN comtrade category: 1201 Soya beans. Using exchange rate of 1EURO = 1.209 USD. Average of price of import into 5 main markets (EU, US, JP, IN and CN).
  properties: carbon allocation 0.466812 kg, carbon content 0.524508, carbon content, fossil 0, carbon content, non-fossil 0.524508, dry mass 0.89 kg, water content 0.123596, water in wet mass 0.11 kg, wet mass 1 kg

## Inputs from technosphere
- 2,4-dichlorophenol: 0.000137 kg; lognormal variance with pedigree 1.0709, pedigree (2,2,2,1,1)
  The amount of pesticide or adjuvant was obtained from interviews with producers and experts. Concentration of the active ingredient was obtained in the Material Safety Data Sheet. The amount of dilution water was 200 L/ha per application.
  properties: carbon content, fossil 0.442116, dry mass 1 kg, heating value, net 16.37 MJ, wet mass 1 kg
- boric acid, anhydrous, powder: 1.29e-5 kg; lognormal variance with pedigree 1.0709, pedigree (2,2,2,1,1)
  No specific inventory was found in ecoinvent with chemical formula corresponding to a fertilizer with micronutients. It was necessary to adapt the amount of micronutrients to a processes (flows) available in this database, based on the molar masse of the micronutrients.
  properties: dry mass 1 kg, wet mass 1 kg
- calcium carbonate, precipitated: 8.24e-5 kg; lognormal variance with pedigree 1.0709, pedigree (2,2,2,1,1)
  (same comment as for boric acid, anhydrous, powder)
- chemical, inorganic: 3.47e-6 kg; lognormal variance with pedigree 1.0709, pedigree (2,2,2,1,1)
  (same comment as for boric acid, anhydrous, powder)
  properties: carbon content, fossil 0.003, dry mass 1 kg, wet mass 1 kg
  note on carbon content, fossil: This dataset is an unweighted average of 20 inorganic substances (listed in Tab 88.1, ecoinvent v2.2 report 8, part II), being part of the top100 chemicals included in this database. The C-content has also been calculated as an unweighted average of the C content of the substances composing this dataset.
- cobalt: 1.53e-7 kg; lognormal variance with pedigree 1.0709, pedigree (2,2,2,1,1)
  (same comment as for boric acid, anhydrous, powder)
  property price 0 EUR2005; name cobalt_price
  properties: dry mass 1 kg, wet mass 1 kg
- copper sulfate: 1.82e-6 kg; lognormal variance with pedigree 1.0709, pedigree (2,2,2,1,1)
  (same comment as for boric acid, anhydrous, powder)
  properties: dry mass 1 kg, wet mass 1 kg
- diesel, low-sulfur: 0.00817 kg; lognormal variance with pedigree 1.2403, pedigree (3,2,2,1,3)
  The amount of diesel fuel (B12 mix in Brazil) used in agricultural operations not found in ecoinvent
  properties: carbon content, fossil 0.865, dry mass 1 kg, heating value, net 42.8 MJ, wet mass 1 kg
- dolomite: 0.024 kg; lognormal variance with pedigree 1.1123, pedigree (3,2,2,1,1)
  The amount of soil corrective was obtained from interviews with producers and experts.
  properties: carbon content, fossil 0.130435, dry mass 1 kg, wet mass 1 kg
- drying of maize grain: 0.0335 l; lognormal variance with pedigree 1.0709, pedigree (2,2,2,1,1)
  Drying of grains
- fatty acid methyl ester: 0.0011898 kg; lognormal variance with pedigree 1.2403, pedigree (3,2,2,1,3)
  The amount of biodiesel fuel (B12 mix in Brazil) used in agricultural operations not found in ecoinvent plus the fatty acids used as pesticide adjuvant
  properties: carbon content, fossil 0.041, carbon content, non-fossil 0.732, dry mass 1 kg, heating value, net 37.2 MJ, wet mass 1 kg
  note on heating value, net: Based on literature, report 17, page 439. Jungbluth, N., Chudacoff, M., Dauriat, A., Dinkel, F., Doka, G., Faist Emmenegger, M., Gnansounou, E., Kljun, N., Schleiss, K., Spielmann, M., Stettler, C., Sutter, J. 2007: Life Cycle Inventories of Bioenergy. ecoinvent report No. 17, Swiss Centre for Life Cycle Inventories, Dübendorf, CH.
- glyphosate: 0.000891 kg; lognormal variance with pedigree 1.0709, pedigree (2,2,2,1,1)
  (same comment as for 2,4-dichlorophenol)
  properties: carbon content, fossil 0.214286, dry mass 1 kg, wet mass 1 kg
- gypsum, mineral: 0.016 kg; lognormal variance with pedigree 1.1123, pedigree (3,2,2,1,1)
  The amount of soil corrective was obtained from interviews with producers and experts.
  properties: dry mass 1 kg, wet mass 1 kg
- inorganic phosphorus fertiliser, as P2O5: 1.8e-5 kg; lognormal variance with pedigree 1.0709, pedigree (2,2,2,1,1)
  The amount of fertiliser was obtained from interviews with producers and experts. The nutrient content in the input was obtained from technical literature and technical regulation documents. The selection of the fertiliser from the ecoinvent database and its ammount was based on the commercial product.
  properties: dry mass 1 kg, wet mass 1 kg
- land use change, annual crop: 9.17431e-5 ha; lognormal variance with pedigree 1.22882, pedigree (2,1,2,2,3)
  LUC modeling implemented in ecoinvent for Brazil is based on Donke et al. (2020). LUC amount was updated, based on yield and crop expansion rate from IBGE (2022). Reference years: average among 2017, 2018, 2019. Equation: (1/yield * % crop expansion). The yield is the average for the years 2017 to 2019. Expansion: difference of the average area of the years 2017 to 2019 (t1=t0+20) for the years 1998 to 2000 (t0), by the formula (1-(t0/t1)).
- lime: 0.132 kg; lognormal variance with pedigree 1.1123, pedigree (3,2,2,1,1)
  The amount of soil corrective was obtained from interviews with producers and experts.
  properties: carbon content, fossil 0.120005, dry mass 1 kg, wet mass 1 kg
- magnesium oxide: 2.16e-6 kg; lognormal variance with pedigree 1.0709, pedigree (2,2,2,1,1)
  (same comment as for boric acid, anhydrous, powder)
  properties: dry mass 1 kg, wet mass 1 kg
- mancozeb: 0.00025 kg; lognormal variance with pedigree 1.0709, pedigree (2,2,2,1,1)
  (same comment as for 2,4-dichlorophenol)
  properties: carbon content, fossil 0.17759, dry mass 1 kg, wet mass 1 kg
- manganese sulfate: 5.45e-5 kg; lognormal variance with pedigree 1.0709, pedigree (2,2,2,1,1)
  (same comment as for boric acid, anhydrous, powder)
  property molecular weight 0 g/mol; name manganese_sulfate_output_MW
  properties: dry mass 1 kg, wet mass 1 kg
- monoammonium phosphate: 0.0533 kg; lognormal variance with pedigree 1.0709, pedigree (2,2,2,1,1)
  (same comment as for inorganic phosphorus fertiliser, as P2O5)
  properties: dry mass 1 kg, nitrogen content 0.084, phosphorus content 0.226939, wet mass 1 kg
  note on nitrogen content: Nitrogen content (on a dry matter basis) of monoammonium phosphate is calculated from the molecular formula of the nutrient present in the substance.
  note on phosphorus content: Phosphorus content (on a dry matter basis) of monoammonium phosphate is calculated from the molecular formula of the nutrient present in the substance.
- packaging, for fertilisers: 0.109 kg; lognormal variance with pedigree 1.6408, pedigree (4,3,2,5,4)
  The HDPE packaging was considered for macronutrient fertilisers. Soil correctives were not considered in the packaging calculation since these are transported in bulk. The amount of packaging for pesticides was also estimated. It was considered twice the value of the active ingredient of fertilisers and pesticides applied in the field to account for the packaging of the diluted products. The production and disposal of the packaging were included in this exchange.
  properties: carbon content, fossil 0.825301, dry mass 1 kg, price 0.0642 EUR2005, wet mass 1 kg
  note on carbon content, fossil: Considering a chemical formula (C2H4)n for polyethylene, carbon content-fossil is calculated to be 0.856286 kg of Carbon per kg of dry mass.
- packaging, for pesticides: 0.00377 kg; lognormal variance with pedigree 1.6408, pedigree (4,3,2,5,4)
  (same comment as for packaging, for fertilisers)
  properties: carbon content, fossil 0.85714, dry mass 1 kg, price 0.0642 EUR2005, wet mass 1 kg
- pesticide, unspecified: 0.000774 kg; lognormal variance with pedigree 1.0709, pedigree (2,2,2,1,1)
  The commercial pesticides not found in the ecoinvent database were summed up and added as “pesticide, unspecified”
  properties: carbon content, fossil 0.486978, dry mass 1 kg, wet mass 1 kg
- potassium chloride: 0.042128 kg; lognormal variance with pedigree 1.0709, pedigree (2,2,2,1,1)
  (same comment as for inorganic phosphorus fertiliser, as P2O5)
  properties: dry mass 1 kg, wet mass 1 kg
- soybean seed, for sowing: 0.0169 kg
  The amount of seeds for sowing
  property carbon content, non-fossil 0.43596; name C_content_non_fossil
  property dry mass 0.89 kg; name DM
  property water content 0.123596; name water_content
  property water in wet mass 0.11 kg; name WWM
  property wet mass 1 kg; name WM
- sulfur: 7.01e-7 kg; lognormal variance with pedigree 1.0709, pedigree (2,2,2,1,1)
  (same comment as for boric acid, anhydrous, powder)
  properties: dry mass 1 kg, wet mass 1 kg
- transport, tractor and trailer, agricultural: 0.00665 metric ton*km; lognormal variance with pedigree 1.1123, pedigree (3,2,2,1,1)
  Average transport of fertilisers, limestone and gypsum from shed to field.. Transport of sugarcane from field to warehouse and transport of tapwater for pesticide spray from source to mixing point. are also included. Calculation based on consultation to experts.
- triple superphosphate: 0.00659 kg; lognormal variance with pedigree 1.0709, pedigree (2,2,2,1,1)
  (same comment as for inorganic phosphorus fertiliser, as P2O5)
  properties: dry mass 1 kg, phosphorus content 0.200754, wet mass 1 kg
  note on phosphorus content: Phosphorus content (on a dry matter basis) of triple superphosphate is calculated from the molecular formula of the nutrient present in the substance.
- urea: 3.56e-5 kg; lognormal variance with pedigree 1.0709, pedigree (2,2,2,1,1)
  (same comment as for inorganic phosphorus fertiliser, as P2O5)
  properties: carbon content, fossil 0.2, dry mass 1 kg, wet mass 1 kg
- zinc oxide: 3.86e-6 kg; lognormal variance with pedigree 1.0709, pedigree (2,2,2,1,1)
  (same comment as for boric acid, anhydrous, powder)
  properties: dry mass 1 kg, wet mass 1 kg

## Inputs from nature
- Carbon dioxide, in air [natural resource, in air]: 1.6317 kg; lognormal variance with pedigree 1.0709, pedigree (2,2,2,1,1)
  Carbon dioxide (CO2) absorption from air during photosynthesis was also included, according to Nemecek and Schnetzer (2012). It considers the carbon content of the reference product based on the ecoinvent database (Jungbluth et al., 2007).
- Occupation, annual crop, non-irrigated, intensive [natural resource, land]: 0.000171 m2*year; lognormal variance with pedigree 1.1022, pedigree (3,1,2,1,1)
  The land occupation was calculated based on crop yield
- Transformation, from annual crop [natural resource, land]: 2.96 m2; lognormal variance with pedigree 1.0608, pedigree (2,1,2,1,1)
  The LUC input comprises the actual data related to land transformation. This land transformation flow is irrelevant to LUC and the amounts are equal in both the 'land transformation from' and 'land transformation to'.
- Transformation, to annual crop [natural resource, land]: 2.96 m2; lognormal variance with pedigree 1.0608, pedigree (2,1,2,1,1)
  (same comment as for Transformation, from annual crop)
- Water, unspecified natural origin [natural resource, in water]: 0.000378 m3; lognormal variance with pedigree 1.0608, pedigree (2,1,2,1,1)
  Water consumed for pesticide dilution. Estimated volume based on interviews with producers and experts

## Emissions to nature
- 2,4-D [air, non-urban air or from high stacks]: 1.37e-5 kg; lognormal variance with pedigree 1.1123, pedigree (3,2,2,1,1)
  Pesticide emissions are calculated using the PestLCI model, adapted to the Brazilian conditions (Embrapa, 2021; PestLCI, 2022).
- Acephate [air, non-urban air or from high stacks]: 2.19e-5 kg; lognormal variance with pedigree 1.1123, pedigree (3,2,2,1,1)
  (same comment as for 2,4-D)
- Ammonia [air, non-urban air or from high stacks]: 0.000311163 kg; lognormal variance with pedigree 1.11033, pedigree (3,2,2,2,3)
  Ammonia releases to air, according to the AGRAMMON model: 'Plant production' (Nemecek & Schnetzer, 2011)
- Azoxystrobin [air, non-urban air or from high stacks]: 1.75e-6 kg; lognormal variance with pedigree 1.1123, pedigree (3,2,2,1,1)
  (same comment as for 2,4-D)
- Benzene [air, non-urban air or from high stacks]: 5.96e-8 kg; lognormal variance with pedigree 1.2403, pedigree (3,2,2,1,3)
  Emissions derived from fuel combustion (diesel 88%, and biodiesel 12%), using emission factors from Nemecek & Kagi (2007)
- Benzo(a)pyrene [air, non-urban air or from high stacks]: 2.45e-10 kg; lognormal variance with pedigree 1.2403, pedigree (3,2,2,1,3)
  (same comment as for Benzene)
- Beta-cyfluthrin [air, non-urban air or from high stacks]: 2.48e-7 kg; lognormal variance with pedigree 1.1123, pedigree (3,2,2,1,1)
  (same comment as for 2,4-D)
- Bifenthrin [air, non-urban air or from high stacks]: 1.35e-7 kg; lognormal variance with pedigree 1.1123, pedigree (3,2,2,1,1)
  (same comment as for 2,4-D)
- Cadmium II [air, non-urban air or from high stacks]: 8.17e-11 kg; lognormal variance with pedigree 1.2403, pedigree (3,2,2,1,3)
  (same comment as for Benzene)
- Carbon dioxide, fossil [air, non-urban air or from high stacks]: 0.0952 kg; lognormal variance with pedigree 1.1089, pedigree (4,3,2,3,1)
  Carbon dioxide releases from urea and limestone application, according to IPCC (2006) plus emissions derived from fuel combustion (diesel 88%, and biodiesel 12%), using emission factors from Nemecek & Kagi (2007)
- Carbon dioxide, non-fossil [air, non-urban air or from high stacks]: 0.00318 kg; lognormal variance with pedigree 1.1089, pedigree (4,3,2,3,1)
  (same comment as for Benzene)
- Carbon monoxide, fossil [air, non-urban air or from high stacks]: 4.36e-5 kg; lognormal variance with pedigree 1.2403, pedigree (3,2,2,1,3)
  (same comment as for Benzene)
- Chlorimuron-ethyl [air, non-urban air or from high stacks]: 1.39e-7 kg; lognormal variance with pedigree 1.1123, pedigree (3,2,2,1,1)
  (same comment as for 2,4-D)
- Chlorpyrifos [air, non-urban air or from high stacks]: 0.00228 kg; lognormal variance with pedigree 1.1123, pedigree (3,2,2,1,1)
  (same comment as for 2,4-D)
- Chromium III [air, non-urban air or from high stacks]: 4.08e-10 kg; lognormal variance with pedigree 1.2403, pedigree (3,2,2,1,3)
  (same comment as for Benzene)
- Clethodim [air, non-urban air or from high stacks]: 0.00114 kg; lognormal variance with pedigree 1.1123, pedigree (3,2,2,1,1)
  (same comment as for 2,4-D)
- Copper ion [air, non-urban air or from high stacks]: 1.39e-8 kg; lognormal variance with pedigree 1.2403, pedigree (3,2,2,1,3)
  (same comment as for Benzene)
- Cyproconazole [air, non-urban air or from high stacks]: 6.97e-7 kg; lognormal variance with pedigree 1.1123, pedigree (3,2,2,1,1)
  (same comment as for 2,4-D)
- Difenoconazole [air, non-urban air or from high stacks]: 2.43e-7 kg; lognormal variance with pedigree 1.1123, pedigree (3,2,2,1,1)
  (same comment as for 2,4-D)
- Diflubenzuron [air, non-urban air or from high stacks]: 2.27e-7 kg; lognormal variance with pedigree 1.1123, pedigree (3,2,2,1,1)
  (same comment as for 2,4-D)
- Dinitrogen monoxide [air, non-urban air or from high stacks]: 0.00049401 kg; lognormal variance with pedigree 1.11033, pedigree (3,2,2,2,3)
  Direct and indirect N2O emissions according to IPCC (2019) plus emissions derived from fuel combustion (diesel 88%, and biodiesel 12%), using emission factors from Nemecek & Kagi (2007)
- Diquat dibromide [air, non-urban air or from high stacks]: 1.54e-5 kg; lognormal variance with pedigree 1.1123, pedigree (3,2,2,1,1)
  (same comment as for 2,4-D)
- Fipronil [air, non-urban air or from high stacks]: 8.54e-7 kg; lognormal variance with pedigree 1.1123, pedigree (3,2,2,1,1)
  (same comment as for 2,4-D)
- Flumioxazin [air, non-urban air or from high stacks]: 2.68e-7 kg; lognormal variance with pedigree 1.1123, pedigree (3,2,2,1,1)
  (same comment as for 2,4-D)
- Glyphosate [air, non-urban air or from high stacks]: 8.91e-5 kg; lognormal variance with pedigree 1.1123, pedigree (3,2,2,1,1)
  (same comment as for 2,4-D)
- Haloxyfop-ethoxyethyl [air, non-urban air or from high stacks]: 1.09e-6 kg; lognormal variance with pedigree 1.1123, pedigree (3,2,2,1,1)
  (same comment as for 2,4-D)
- Hydrocarbons, unspecified [air, non-urban air or from high stacks]: 2.45e-5 kg; lognormal variance with pedigree 1.2403, pedigree (3,2,2,1,3)
  (same comment as for Benzene)
- Imazethapyr [air, non-urban air or from high stacks]: 8.99e-8 kg; lognormal variance with pedigree 1.1123, pedigree (3,2,2,1,1)
  (same comment as for 2,4-D)
- Imidacloprid [air, non-urban air or from high stacks]: 2.66e-6 kg; lognormal variance with pedigree 1.1123, pedigree (3,2,2,1,1)
  (same comment as for 2,4-D)
- Lambda-cyhalothrin [air, non-urban air or from high stacks]: 1.96e-7 kg; lognormal variance with pedigree 1.1123, pedigree (3,2,2,1,1)
  (same comment as for 2,4-D)
- Mancozeb [air, non-urban air or from high stacks]: 2.5e-5 kg; lognormal variance with pedigree 1.1123, pedigree (3,2,2,1,1)
  (same comment as for 2,4-D)
- Methane, fossil [air, non-urban air or from high stacks]: 1.05e-6 kg; lognormal variance with pedigree 1.2403, pedigree (3,2,2,1,3)
  (same comment as for Benzene)
- Methane, non-fossil [air, non-urban air or from high stacks]: 4.34e-7 kg; lognormal variance with pedigree 1.2403, pedigree (3,2,2,1,3)
  (same comment as for Benzene)
- Nickel II [air, non-urban air or from high stacks]: 5.72e-10 kg; lognormal variance with pedigree 1.2403, pedigree (3,2,2,1,3)
  (same comment as for Benzene)
- Nitrogen oxides [air, non-urban air or from high stacks]: 0.0004249 kg; lognormal variance with pedigree 1.11033, pedigree (3,2,2,2,3)
  Emissions of NOx from applied mineral fertilisers, according to WFLDB (2019)
- PAH, polycyclic aromatic hydrocarbons [air, non-urban air or from high stacks]: 2.69e-8 kg; lognormal variance with pedigree 1.2403, pedigree (3,2,2,1,3)
  (same comment as for Benzene)
- Particulate Matter, < 2.5 um [air, non-urban air or from high stacks]: 4.57e-7 kg; lognormal variance with pedigree 1.2403, pedigree (3,2,2,1,3)
  (same comment as for Benzene)
- Propiconazole [air, non-urban air or from high stacks]: 2.43e-7 kg; lognormal variance with pedigree 1.1123, pedigree (3,2,2,1,1)
  (same comment as for 2,4-D)
- Prothioconazole [air, non-urban air or from high stacks]: 1.32e-7 kg; lognormal variance with pedigree 1.1123, pedigree (3,2,2,1,1)
  (same comment as for 2,4-D)
- Pyraclostrobin [air, non-urban air or from high stacks]: 2.58e-6 kg; lognormal variance with pedigree 1.1123, pedigree (3,2,2,1,1)
  (same comment as for 2,4-D)
- Selenium IV [air, non-urban air or from high stacks]: 8.17e-11 kg; lognormal variance with pedigree 1.2403, pedigree (3,2,2,1,3)
  (same comment as for Benzene)
- Sulfur dioxide [air, non-urban air or from high stacks]: 8.25e-6 kg; lognormal variance with pedigree 1.2403, pedigree (3,2,2,1,3)
  (same comment as for Benzene)
- Tebuconazole [air, non-urban air or from high stacks]: 7.88e-7 kg; lognormal variance with pedigree 1.1123, pedigree (3,2,2,1,1)
  (same comment as for 2,4-D)
  property carbon content, fossil 0.624307; name C_content_fossil_Tebuconazole
- Teflubenzuron [air, non-urban air or from high stacks]: 1.11e-6 kg; lognormal variance with pedigree 1.1123, pedigree (3,2,2,1,1)
  (same comment as for 2,4-D)
- Thiamethoxam [air, non-urban air or from high stacks]: 9.35e-7 kg; lognormal variance with pedigree 1.1123, pedigree (3,2,2,1,1)
  (same comment as for 2,4-D)
- Thiophanate-methyl [air, non-urban air or from high stacks]: 7.69e-7 kg; lognormal variance with pedigree 1.1123, pedigree (3,2,2,1,1)
  (same comment as for 2,4-D)
- Trifloxystrobin [air, non-urban air or from high stacks]: 1.13e-7 kg; lognormal variance with pedigree 1.1123, pedigree (3,2,2,1,1)
  (same comment as for 2,4-D)
- Triflumuron [air, non-urban air or from high stacks]: 7.5e-7 kg; lognormal variance with pedigree 1.1123, pedigree (3,2,2,1,1)
  (same comment as for 2,4-D)
- Water [air, unspecified]: 0.000378 m3; lognormal variance with pedigree 0.0034, pedigree (2,1,2,5,1)
- Zinc II [air, non-urban air or from high stacks]: 8.17e-9 kg; lognormal variance with pedigree 1.2403, pedigree (3,2,2,1,3)
  (same comment as for Benzene)
- 2,4-D [soil, agricultural]: 0.00011 kg; lognormal variance with pedigree 1.11233, pedigree (3,2,2,2,1)
  (same comment as for 2,4-D)
- 2,4-D [soil, forestry]: 5.13e-7 kg; lognormal variance with pedigree 1.11233, pedigree (3,2,2,2,1)
  (same comment as for 2,4-D)
- Acephate [soil, agricultural]: 9.92e-5 kg; lognormal variance with pedigree 1.11233, pedigree (3,2,2,2,1)
  (same comment as for 2,4-D)
- Acephate [soil, forestry]: 7.13e-7 kg; lognormal variance with pedigree 1.11233, pedigree (3,2,2,2,1)
  (same comment as for 2,4-D)
- Arsenic ion [soil, agricultural]: 2.24586e-7 kg; normal variance with pedigree 1.21, pedigree (5,5,5,5,5)
  Heavy metals emissions to agricultural soil through erosion are estimated by using the SALCA-heavy metal model (Nemecek et al., 2015).
  Uncertainty: Emissions of heavy metals to soil estimated based on WFLDB adapted to Brazil
- Azoxystrobin [soil, agricultural]: 1.27e-5 kg; lognormal variance with pedigree 1.11233, pedigree (3,2,2,2,1)
  (same comment as for 2,4-D)
- Azoxystrobin [soil, forestry]: 6.36e-8 kg; lognormal variance with pedigree 1.11233, pedigree (3,2,2,2,1)
  (same comment as for 2,4-D)
- Benzovindiflupyr [soil, forestry]: 2.51e-10 kg; lognormal variance with pedigree 1.11233, pedigree (3,2,2,2,1)
  (same comment as for 2,4-D)
- Beta-cyfluthrin [soil, agricultural]: 8.53e-7 kg; lognormal variance with pedigree 1.11233, pedigree (3,2,2,2,1)
  (same comment as for 2,4-D)
- Beta-cyfluthrin [soil, forestry]: 6.68e-9 kg; lognormal variance with pedigree 1.11233, pedigree (3,2,2,2,1)
  (same comment as for 2,4-D)
- Bifenthrin [soil, agricultural]: 1.26e-7 kg; lognormal variance with pedigree 1.11233, pedigree (3,2,2,2,1)
  (same comment as for 2,4-D)
- Bifenthrin [soil, forestry]: 7.76e-9 kg; lognormal variance with pedigree 1.11233, pedigree (3,2,2,2,1)
  (same comment as for 2,4-D)
- Cadmium II [soil, agricultural]: -3.64541e-8 kg; normal variance with pedigree 1.21, pedigree (5,5,5,5,5)
  (same comment as for Arsenic ion)
- Chlorimuron-ethyl [soil, agricultural]: 1.18e-6 kg; lognormal variance with pedigree 1.11233, pedigree (3,2,2,2,1)
  (same comment as for 2,4-D)
- Chlorimuron-ethyl [soil, forestry]: 3.95e-9 kg; lognormal variance with pedigree 1.11233, pedigree (3,2,2,2,1)
  (same comment as for 2,4-D)
- Chlorpyrifos [soil, agricultural]: 0.0202 kg; lognormal variance with pedigree 1.11233, pedigree (3,2,2,2,1)
  (same comment as for 2,4-D)
- Chlorpyrifos [soil, forestry]: 6.17e-5 kg; lognormal variance with pedigree 1.11233, pedigree (3,2,2,2,1)
  (same comment as for 2,4-D)
- Chromium III [soil, agricultural]: 1.33368e-6 kg; normal variance with pedigree 1.21, pedigree (5,5,5,5,5)
  (same comment as for Arsenic ion)
- Clethodim [soil, agricultural]: 0.0102 kg; lognormal variance with pedigree 1.11233, pedigree (3,2,2,2,1)
  (same comment as for 2,4-D)
- Clethodim [soil, forestry]: 3.08e-5 kg; lognormal variance with pedigree 1.11233, pedigree (3,2,2,2,1)
  (same comment as for 2,4-D)
- Copper ion [soil, agricultural]: -1.18449e-5 kg; normal variance with pedigree 1.21, pedigree (5,5,5,5,5)
  (same comment as for Arsenic ion)
- Cyproconazole [soil, agricultural]: 6.6e-7 kg; lognormal variance with pedigree 1.11233, pedigree (3,2,2,2,1)
  (same comment as for 2,4-D)
- Cyproconazole [soil, forestry]: 2.5e-8 kg; lognormal variance with pedigree 1.11233, pedigree (3,2,2,2,1)
  (same comment as for 2,4-D)
- Difenoconazole [soil, agricultural]: 1.15e-6 kg; lognormal variance with pedigree 1.11233, pedigree (3,2,2,2,1)
  (same comment as for 2,4-D)
- Difenoconazole [soil, forestry]: 1.03e-8 kg; lognormal variance with pedigree 1.11233, pedigree (3,2,2,2,1)
  (same comment as for 2,4-D)
- Diflubenzuron [soil, agricultural]: 1.69e-7 kg; lognormal variance with pedigree 1.11233, pedigree (3,2,2,2,1)
  (same comment as for 2,4-D)
- Diflubenzuron [soil, forestry]: 1.25e-8 kg; lognormal variance with pedigree 1.11233, pedigree (3,2,2,2,1)
  (same comment as for 2,4-D)
- Diquat dibromide [soil, agricultural]: 0.000135 kg; lognormal variance with pedigree 1.11233, pedigree (3,2,2,2,1)
  (same comment as for 2,4-D)
- Diquat dibromide [soil, forestry]: 5.24e-7 kg; lognormal variance with pedigree 1.11233, pedigree (3,2,2,2,1)
  (same comment as for 2,4-D)
- Fipronil [soil, agricultural]: 7.59e-6 kg; lognormal variance with pedigree 1.11233, pedigree (3,2,2,2,1)
  (same comment as for 2,4-D)
- Fipronil [soil, forestry]: 3.08e-8 kg; lognormal variance with pedigree 1.11233, pedigree (3,2,2,2,1)
  (same comment as for 2,4-D)
- Flumioxazin [soil, agricultural]: 2.33e-6 kg; lognormal variance with pedigree 1.11233, pedigree (3,2,2,2,1)
  (same comment as for 2,4-D)
- Flumioxazin [soil, forestry]: 8.43e-9 kg; lognormal variance with pedigree 1.11233, pedigree (3,2,2,2,1)
  (same comment as for 2,4-D)
- Glyphosate [soil, agricultural]: 0.000762 kg; lognormal variance with pedigree 1.11233, pedigree (3,2,2,2,1)
  (same comment as for 2,4-D)
- Glyphosate [soil, forestry]: 3.36e-6 kg; lognormal variance with pedigree 1.11233, pedigree (3,2,2,2,1)
  (same comment as for 2,4-D)
- Imazethapyr [soil, agricultural]: 8.03e-7 kg; lognormal variance with pedigree 1.11233, pedigree (3,2,2,2,1)
  (same comment as for 2,4-D)
- Imazethapyr [soil, forestry]: 5.97e-9 kg; lognormal variance with pedigree 1.11233, pedigree (3,2,2,2,1)
  (same comment as for 2,4-D)
- Imidacloprid [soil, agricultural]: 9.8e-6 kg; lognormal variance with pedigree 1.11233, pedigree (3,2,2,2,1)
  (same comment as for 2,4-D)
- Imidacloprid [soil, forestry]: 9.35e-8 kg; lognormal variance with pedigree 1.11233, pedigree (3,2,2,2,1)
  (same comment as for 2,4-D)
- Lambda-cyhalothrin [soil, agricultural]: 1.47e-6 kg; lognormal variance with pedigree 1.11233, pedigree (3,2,2,2,1)
  (same comment as for 2,4-D)
- Lambda-cyhalothrin [soil, forestry]: 9.47e-9 kg; lognormal variance with pedigree 1.11233, pedigree (3,2,2,2,1)
  (same comment as for 2,4-D)
- Lead II [soil, agricultural]: 2.98666e-7 kg; normal variance with pedigree 1.21, pedigree (5,5,5,5,5)
  (same comment as for Arsenic ion)
- Mancozeb [soil, agricultural]: 3.43e-5 kg; lognormal variance with pedigree 1.11233, pedigree (3,2,2,2,1)
  (same comment as for 2,4-D)
- Mancozeb [soil, forestry]: 8.11e-7 kg; lognormal variance with pedigree 1.11233, pedigree (3,2,2,2,1)
  (same comment as for 2,4-D)
- Pesticides, unspecified [soil, agricultural]: 7.05e-6 kg; lognormal variance with pedigree 1.11233, pedigree (3,2,2,2,1)
  (same comment as for 2,4-D)
- Pesticides, unspecified [soil, forestry]: 1.57e-7 kg; lognormal variance with pedigree 1.11233, pedigree (3,2,2,2,1)
  (same comment as for 2,4-D)
- Picoxystrobin [soil, agricultural]: 4.36e-7 kg; lognormal variance with pedigree 1.11233, pedigree (3,2,2,2,1)
  (same comment as for 2,4-D)
- Propiconazole [soil, agricultural]: 1.15e-6 kg; lognormal variance with pedigree 1.11233, pedigree (3,2,2,2,1)
  (same comment as for 2,4-D)
- Propiconazole [soil, forestry]: 1.03e-8 kg; lognormal variance with pedigree 1.11233, pedigree (3,2,2,2,1)
  (same comment as for 2,4-D)
- Prothioconazole [soil, agricultural]: 6.69e-8 kg; lognormal variance with pedigree 1.11233, pedigree (3,2,2,2,1)
  (same comment as for 2,4-D)
- Prothioconazole [soil, forestry]: 8.78e-9 kg; lognormal variance with pedigree 1.11233, pedigree (3,2,2,2,1)
  (same comment as for 2,4-D)
- Pyraclostrobin [soil, agricultural]: 3.12e-6 kg; lognormal variance with pedigree 1.11233, pedigree (3,2,2,2,1)
  (same comment as for 2,4-D)
- Pyraclostrobin [soil, forestry]: 8.48e-8 kg; lognormal variance with pedigree 1.11233, pedigree (3,2,2,2,1)
  (same comment as for 2,4-D)
- Tebuconazole [soil, agricultural]: 7.33e-7 kg; lognormal variance with pedigree 1.11233, pedigree (3,2,2,2,1)
  (same comment as for 2,4-D)
- Tebuconazole [soil, forestry]: 4.36e-8 kg; lognormal variance with pedigree 1.11233, pedigree (3,2,2,2,1)
  (same comment as for 2,4-D)
- Teflubenzuron [soil, agricultural]: 1.19e-6 kg; lognormal variance with pedigree 1.11233, pedigree (3,2,2,2,1)
  (same comment as for 2,4-D)
- Teflubenzuron [soil, forestry]: 5.49e-8 kg; lognormal variance with pedigree 1.11233, pedigree (3,2,2,2,1)
  (same comment as for 2,4-D)
- Thiamethoxam [soil, agricultural]: 7.2e-6 kg; lognormal variance with pedigree 1.11233, pedigree (3,2,2,2,1)
  (same comment as for 2,4-D)
- Thiamethoxam [soil, forestry]: 3.01e-8 kg; lognormal variance with pedigree 1.11233, pedigree (3,2,2,2,1)
  (same comment as for 2,4-D)
- Thiophanate-methyl [soil, agricultural]: 6.2e-6 kg; lognormal variance with pedigree 1.11233, pedigree (3,2,2,2,1)
  (same comment as for 2,4-D)
- Thiophanate-methyl [soil, forestry]: 2.78e-8 kg; lognormal variance with pedigree 1.11233, pedigree (3,2,2,2,1)
  (same comment as for 2,4-D)
- Trifloxystrobin [soil, agricultural]: 1.07e-7 kg; lognormal variance with pedigree 1.11233, pedigree (3,2,2,2,1)
  (same comment as for 2,4-D)
- Trifloxystrobin [soil, forestry]: 7.52e-9 kg; lognormal variance with pedigree 1.11233, pedigree (3,2,2,2,1)
  (same comment as for 2,4-D)
- Triflumuron [soil, agricultural]: 3.46e-6 kg; lognormal variance with pedigree 1.11233, pedigree (3,2,2,2,1)
  (same comment as for 2,4-D)
- Triflumuron [soil, forestry]: 2.88e-8 kg; lognormal variance with pedigree 1.11233, pedigree (3,2,2,2,1)
  (same comment as for 2,4-D)
- 2,4-D [water, ground-]: 7.82e-6 kg; lognormal variance with pedigree 1.11233, pedigree (3,2,2,2,1)
  (same comment as for 2,4-D)
- 2,4-D [water, unspecified]: 2.04e-8 kg; lognormal variance with pedigree 1.11233, pedigree (3,2,2,2,1)
  (same comment as for 2,4-D)
- Acephate [water, ground-]: 8.15e-7 kg; lognormal variance with pedigree 1.11233, pedigree (3,2,2,2,1)
  (same comment as for 2,4-D)
- Acephate [water, unspecified]: 2.88e-8 kg; lognormal variance with pedigree 1.11233, pedigree (3,2,2,2,1)
  (same comment as for 2,4-D)
- Arsenic ion [water, surface water]: 2.24609e-11 kg; lognormal variance with pedigree 1.11233, pedigree (3,2,2,2,1)
  Emissions of heavy metals to surface water are calculated according to Schmidt (2007)
- Azoxystrobin [water, ground-]: 3.32e-8 kg; lognormal variance with pedigree 1.11233, pedigree (3,2,2,2,1)
  (same comment as for 2,4-D)
- Azoxystrobin [water, unspecified]: 2.47e-9 kg; lognormal variance with pedigree 1.11233, pedigree (3,2,2,2,1)
  (same comment as for 2,4-D)
- Beta-cyfluthrin [water, ground-]: 8.75e-12 kg; lognormal variance with pedigree 1.11233, pedigree (3,2,2,2,1)
  (same comment as for 2,4-D)
- Beta-cyfluthrin [water, unspecified]: 3.51e-10 kg; lognormal variance with pedigree 1.11233, pedigree (3,2,2,2,1)
  (same comment as for 2,4-D)
- Bifenthrin [water, ground-]: 2.99e-12 kg; lognormal variance with pedigree 1.11233, pedigree (3,2,2,2,1)
  (same comment as for 2,4-D)
- Bifenthrin [water, unspecified]: 1.96e-10 kg; lognormal variance with pedigree 1.11233, pedigree (3,2,2,2,1)
  (same comment as for 2,4-D)
- Cadmium II [water, surface water]: 1.57475e-12 kg; lognormal variance with pedigree 1.11233, pedigree (3,2,2,2,1)
  Emissions of heavy metals to surface water are calculated according to Schmidt (2007)
- Chlorimuron-ethyl [water, ground-]: 5.06e-8 kg; lognormal variance with pedigree 1.11233, pedigree (3,2,2,2,1)
  (same comment as for 2,4-D)
- Chlorimuron-ethyl [water, unspecified]: 2.06e-10 kg; lognormal variance with pedigree 1.11233, pedigree (3,2,2,2,1)
  (same comment as for 2,4-D)
- Chlorpyrifos [water, ground-]: 3.95e-6 kg; lognormal variance with pedigree 1.11233, pedigree (3,2,2,2,1)
  (same comment as for 2,4-D)
- Chlorpyrifos [water, unspecified]: 3.23e-6 kg; lognormal variance with pedigree 1.11233, pedigree (3,2,2,2,1)
  (same comment as for 2,4-D)
- Chromium III [water, surface water]: 1.78626e-10 kg; lognormal variance with pedigree 1.11233, pedigree (3,2,2,2,1)
  Emissions of heavy metals to surface water are calculated according to Schmidt (2007)
- Clethodim [water, unspecified]: 1.62e-6 kg; lognormal variance with pedigree 1.11233, pedigree (3,2,2,2,1)
  (same comment as for 2,4-D)
- Copper ion [water, surface water]: 1.29225e-10 kg; lognormal variance with pedigree 1.11233, pedigree (3,2,2,2,1)
  Emissions of heavy metals to surface water are calculated according to Schmidt (2007)
- Cyproconazole [water, ground-]: 1e-8 kg; lognormal variance with pedigree 1.11233, pedigree (3,2,2,2,1)
  (same comment as for 2,4-D)
- Cyproconazole [water, unspecified]: 9.72e-10 kg; lognormal variance with pedigree 1.11233, pedigree (3,2,2,2,1)
  (same comment as for 2,4-D)
- Difenoconazole [water, ground-]: 6.1e-10 kg; lognormal variance with pedigree 1.11233, pedigree (3,2,2,2,1)
  (same comment as for 2,4-D)
- Difenoconazole [water, unspecified]: 3.82e-10 kg; lognormal variance with pedigree 1.11233, pedigree (3,2,2,2,1)
  (same comment as for 2,4-D)
- Diflubenzuron [water, ground-]: 2.43e-11 kg; lognormal variance with pedigree 1.11233, pedigree (3,2,2,2,1)
  (same comment as for 2,4-D)
- Diflubenzuron [water, unspecified]: 3.08e-10 kg; lognormal variance with pedigree 1.11233, pedigree (3,2,2,2,1)
  (same comment as for 2,4-D)
- Diquat dibromide [water, ground-]: 1.42e-10 kg; lognormal variance with pedigree 1.11233, pedigree (3,2,2,2,1)
  (same comment as for 2,4-D)
- Diquat dibromide [water, unspecified]: 2.19e-8 kg; lognormal variance with pedigree 1.11233, pedigree (3,2,2,2,1)
  (same comment as for 2,4-D)
- Fipronil [water, ground-]: 7.37e-10 kg; lognormal variance with pedigree 1.11233, pedigree (3,2,2,2,1)
  (same comment as for 2,4-D)
- Fipronil [water, unspecified]: 1.21e-9 kg; lognormal variance with pedigree 1.11233, pedigree (3,2,2,2,1)
  (same comment as for 2,4-D)
- Flumioxazin [water, ground-]: 9.11e-9 kg; lognormal variance with pedigree 1.11233, pedigree (3,2,2,2,1)
  (same comment as for 2,4-D)
- Flumioxazin [water, unspecified]: 3.95e-10 kg; lognormal variance with pedigree 1.11233, pedigree (3,2,2,2,1)
  (same comment as for 2,4-D)
- Glyphosate [water, ground-]: 1.24e-7 kg; lognormal variance with pedigree 1.11233, pedigree (3,2,2,2,1)
  (same comment as for 2,4-D)
- Glyphosate [water, unspecified]: 1.28e-7 kg; lognormal variance with pedigree 1.11233, pedigree (3,2,2,2,1)
  (same comment as for 2,4-D)
- Haloxyfop-ethoxyethyl [water, ground-]: 9.92e-10 kg; lognormal variance with pedigree 1.11233, pedigree (3,2,2,2,1)
  (same comment as for 2,4-D)
- Haloxyfop-ethoxyethyl [water, unspecified]: 1.44e-9 kg; lognormal variance with pedigree 1.11233, pedigree (3,2,2,2,1)
  (same comment as for 2,4-D)
- Imazethapyr [water, unspecified]: 1.63e-10 kg; lognormal variance with pedigree 1.11233, pedigree (3,2,2,2,1)
  (same comment as for 2,4-D)
- Imidacloprid [water, ground-]: 2.72e-7 kg; lognormal variance with pedigree 1.11233, pedigree (3,2,2,2,1)
  (same comment as for 2,4-D)
- Imidacloprid [water, unspecified]: 3.84e-9 kg; lognormal variance with pedigree 1.11233, pedigree (3,2,2,2,1)
  (same comment as for 2,4-D)
- Lambda-cyhalothrin [water, ground-]: 5.78e-11 kg; lognormal variance with pedigree 1.11233, pedigree (3,2,2,2,1)
  (same comment as for 2,4-D)
- Lambda-cyhalothrin [water, unspecified]: 2.68e-10 kg; lognormal variance with pedigree 1.11233, pedigree (3,2,2,2,1)
  (same comment as for 2,4-D)
- Lead II [water, surface water]: 3.68303e-11 kg; lognormal variance with pedigree 1.11233, pedigree (3,2,2,2,1)
  Emissions of heavy metals to surface water are calculated according to Schmidt (2007)
- Mancozeb [water, ground-]: 2.89e-7 kg; lognormal variance with pedigree 1.11233, pedigree (3,2,2,2,1)
  (same comment as for 2,4-D)
- Mancozeb [water, unspecified]: 3.5e-8 kg; lognormal variance with pedigree 1.11233, pedigree (3,2,2,2,1)
  (same comment as for 2,4-D)
- Nitrate [water, ground-]: 0.0397 kg; lognormal variance with pedigree 1.11233, pedigree (3,2,2,2,1)
  The SQCB-NO3 model was used according to Nemecek et al. (2015), considering only the quantity of water from precipitation (no irrigation was applied). Technical parameters are available in the BRCalc/ICVCalc tool (Folegatti-Matsuura et al., 2022).
- Pesticides, unspecified [water, ground-]: 2.8e-9 kg; lognormal variance with pedigree 1.11233, pedigree (3,2,2,2,1)
  (same comment as for 2,4-D)
- Pesticides, unspecified [water, unspecified]: 3.59e-9 kg; lognormal variance with pedigree 1.11233, pedigree (3,2,2,2,1)
  (same comment as for 2,4-D)
- Phosphorus [water, surface water]: 2.15e-5 kg; lognormal variance with pedigree 1.11233, pedigree (3,2,2,2,1)
  Only the phosphorus emission to surface water caused by soil erosion was calculated, according to Nemecek et al., 2015. Required technical parameters are available in the BRCalc/ICVCalc tool (Folegatti-Matsuura et al., 2022).
- Propiconazole [water, ground-]: 4.46e-10 kg; lognormal variance with pedigree 1.11233, pedigree (3,2,2,2,1)
  (same comment as for 2,4-D)
- Propiconazole [water, unspecified]: 3.82e-10 kg; lognormal variance with pedigree 1.11233, pedigree (3,2,2,2,1)
  (same comment as for 2,4-D)
- Prothioconazole [water, ground-]: 8.25e-12 kg; lognormal variance with pedigree 1.11233, pedigree (3,2,2,2,1)
  (same comment as for 2,4-D)
- Prothioconazole [water, unspecified]: 2.39e-10 kg; lognormal variance with pedigree 1.11233, pedigree (3,2,2,2,1)
  (same comment as for 2,4-D)
- Pyraclostrobin [water, ground-]: 2.42e-9 kg; lognormal variance with pedigree 1.11233, pedigree (3,2,2,2,1)
  (same comment as for 2,4-D)
- Pyraclostrobin [water, unspecified]: 3.61e-9 kg; lognormal variance with pedigree 1.11233, pedigree (3,2,2,2,1)
  (same comment as for 2,4-D)
- Tebuconazole [water, ground-]: 1.6e-9 kg; lognormal variance with pedigree 1.11233, pedigree (3,2,2,2,1)
  (same comment as for 2,4-D)
- Tebuconazole [water, unspecified]: 1.07e-9 kg; lognormal variance with pedigree 1.11233, pedigree (3,2,2,2,1)
  (same comment as for 2,4-D)
- Teflubenzuron [water, unspecified]: 1.54e-9 kg; lognormal variance with pedigree 1.11233, pedigree (3,2,2,2,1)
  (same comment as for 2,4-D)
- Thiamethoxam [water, ground-]: 1.57e-7 kg; lognormal variance with pedigree 1.11233, pedigree (3,2,2,2,1)
  (same comment as for 2,4-D)
- Thiamethoxam [water, unspecified]: 1.42e-9 kg; lognormal variance with pedigree 1.11233, pedigree (3,2,2,2,1)
  (same comment as for 2,4-D)
- Thiophanate-methyl [water, ground-]: 3.35e-9 kg; lognormal variance with pedigree 1.11233, pedigree (3,2,2,2,1)
  (same comment as for 2,4-D)
- Thiophanate-methyl [water, unspecified]: 1.09e-9 kg; lognormal variance with pedigree 1.11233, pedigree (3,2,2,2,1)
  (same comment as for 2,4-D)
- Trifloxystrobin [water, ground-]: 1.09e-11 kg; lognormal variance with pedigree 1.11233, pedigree (3,2,2,2,1)
  (same comment as for 2,4-D)
- Trifloxystrobin [water, unspecified]: 2.05e-10 kg; lognormal variance with pedigree 1.11233, pedigree (3,2,2,2,1)
  (same comment as for 2,4-D)
- Triflumuron [water, ground-]: 1.84e-9 kg; lognormal variance with pedigree 1.11233, pedigree (3,2,2,2,1)
  (same comment as for 2,4-D)
- Triflumuron [water, unspecified]: 1.06e-9 kg; lognormal variance with pedigree 1.11233, pedigree (3,2,2,2,1)
  (same comment as for 2,4-D)

## Sampling procedure
The main source of data for agricultural inputs and operations is the ProspecSoy Project, conducted by Embrapa Soja. Data are also provided by relevant experts. Emissions from the agricultural process are estimated using BRCalc/ICVCalc.

## Review by Simone Fazio 2022-07-29
all the review comments have been addressed, solved or better explained
agricultural operations with minor consumption (fertilizer distribution, pesticide application, etc) should be better defined in the future updates, for the sake of precision even if the overall impact don't change significantly
