# coal stove production, 5-15kW

Dataset: EcoSpold 2, unit process
Geography: RoW
Time period: 1988-01-01 to 2023-12-31
Technology level: current
Classification: ISIC rev.4 ecoinvent: 2815:Manufacture of ovens, furnaces and furnace burners
Classification: EcoSpold01Categories: hard coal/heating systems
Tags: ConvertedDataset
Scenario: Business-as-Usual
System model: Allocation, cut-off by classification
Generated by: Christian Bauer
Published in: Röder, A. 2007
Database: ecoinvent
isCopyrightProtected: true
accessRestrictedTo: 1

## General comment
Lifetime is assumed to be 30 years. No specification of type.
[This dataset was already contained in the ecoinvent database version 2. It was not individually updated during the transfer to ecoinvent version 3. Life Cycle Impact Assessment results may still have changed, as they are affected by changes in the supply chain, i.e. in other datasets. This dataset was generated following the ecoinvent quality guidelines for version 2. It may have been subject to central changes described in the ecoinvent version 3 change report (http://www.ecoinvent.org/database/ecoinvent-version-3/reports-of-changes/), and the results of the central updates were reviewed extensively. The changes added e.g. consistent water flows and other information throughout the database. The documentation of this dataset can be found in the ecoinvent reports of version 2, which are still available via the ecoinvent website. The change report linked above covers all central changes that were made during the conversion process.]

## Included activities end
Average stoves installed in the early 1990s. The module includes materials, energy and transport requirements, used for construction of the stove. Also construction of the chimney and the storage is included. Disposal of material is also included.

## Geography
German condition.

## Technology
Average used in early 1990s.

## Reference product
- coal stove, 5-15kW: 1 unit; By-product classification allocatable product; CPC 43410: Furnace burners for liquid fuel, for pulverized solid fuel or for gas; mechanical stokers, mechanical grates, […]; HS2017 7321: Stoves, ranges, grates, cookers (those with subsidiary boilers for central heating), barbecues, braziers, gas[...]
  EcoSpold01Location=RER
  production volume 2.67763 unit
    This is a placeholder value that does not reflect real-world production volumes. This dataset does not currently require a real-world production volume to work in the database framework, and no actual data were collected yet. This has no negative effect on the results of the ecoinvent database.
  property price 272.942 EUR2005
    Calculated based on inputs: The price of the product has been calculated as a sum of the values of the material and energy inputs for this product. This value is therefore a rough estimation. It may underestimate the real price since there are additional expenses when producing any product. These expences can include for example labour costs, treatment of waste materials and profit for the producer. Please consider carefully whether this level of data quality is acceptable for your application.
  properties: carbon allocation 0 kg, carbon content 0

## Inputs from technosphere
- cast iron: 138 kg; lognormal variance with pedigree 0.252, pedigree (1,1,5,5,1)
  own assumption
  EcoSpold01Location=RER
  properties: carbon content, fossil 0.04, dry mass 1 kg, wet mass 1 kg
  note on carbon content, fossil: Cast iron is made by remelting pig iron in small furnaces (e.g. cupola furnaces or electric arc furnaces) and poured into moulds to make castings. It usually contains 2% to 6% carbon (ecoinvent v2.2 report 10_partII). An average content of 4% was considered
- concrete, normal strength: 0.000854203, 0.000187579, 0.00012201, 0.00361731, 0.00151858, 0.0018002, 0.0644001 m3 (7 suppliers, which the file names only by identifier); sum of these 0.0725 m3; lognormal variance with pedigree 0.252, pedigree (1,1,5,5,1)
  own assumption
  EcoSpold01Location=CH
  properties: dry mass 2190 kg, water content 0.086758, wet mass 2380 kg
- diesel, burned in building machine: 864 MJ; lognormal variance with pedigree 0.162, pedigree (1,1,5,5,1)
  EcoSpold01Location=GLO
  own assumption
  properties: heating value, net 1 MJ
- electricity, medium voltage: 1.59517, 31.8202, 10.6915, 0.488497, 0.0977722, 0.0209939, 3.28592 kWh (7 suppliers, which the file names only by identifier); sum of these 48 kWh; lognormal variance with pedigree 0.162, pedigree (1,1,5,5,1)
  EcoSpold01Location=UCTE
  own assumption
- heat, district or industrial, other than natural gas: 863.6, 0.40009 MJ (2 suppliers, which the file names only by identifier); sum of these 864 MJ; lognormal variance with pedigree 0.162, pedigree (1,1,5,5,1)
  EcoSpold01Location=RER
  properties: heating value, net 1 MJ
- reinforcing steel: 138 kg; lognormal variance with pedigree 0.252, pedigree (1,1,5,5,1)
  EcoSpold01Location=RER
  own assumption
  properties: carbon content, fossil 0.004, dry mass 1 kg, wet mass 1 kg
- steel, low-alloyed, hot rolled: 17.3 kg; lognormal variance with pedigree 0.252, pedigree (1,1,5,5,1)
  EcoSpold01Location=RER
  own assumption
  properties: carbon content, fossil 0.005, dry mass 1 kg, wet mass 1 kg
  note on carbon content, fossil: Low alloyed steel composition given in Tab. 3.2 ecoinvent v2.2 report 10_partII. Steel assumed to have a C content of 0.5%
- stone wool: 0.69 kg; lognormal variance with pedigree 0.252, pedigree (1,1,5,5,1)
  EcoSpold01Location=CH
  own assumption
  properties: carbon content, fossil 0.015401, dry mass 1 kg, wet mass 1 kg
  note on carbon content, fossil: The chemical composition of the glass fibres used in the rock wool production is similar to the composition of naturally cooled volcano basalt and has a composition listed in Tab. 3.1 and 3.2 in ecoinvent v2.2 report 16, part XIV. Rock wool contains: a minimum of 96% mineral fibres,between 0.5 and 3.0 weight percent of phenolic resin depending on the specific product characteristics, and about 0.2 percent mineral oil (ecoinvent v2.2 report 16, part XIV). An average composition of 1.8% phenolic resin, 0.2% mineral oil, and 98% mineral fibres has been assumed and used to calculate C content of the rock wool
- waste mineral wool: -0.69 kg; lognormal variance with pedigree 0.212, pedigree (1,1,1,5,1)
  own assumption
  EcoSpold01Location=CH
  production volume
    Calculated from the production volume of coal stove, 5-15 kW in proportion to the respective output amounts.
  properties: dry mass 1 kg, wet mass 1 kg

## Inputs from nature
- Occupation, industrial area [natural resource, land]: 346 m2*year; lognormal variance with pedigree 0.162, pedigree (1,1,5,5,1)
  own assumption
- Transformation, from unspecified [natural resource, land]: 11.5 m2; lognormal variance with pedigree 0.162, pedigree (1,1,5,5,1)
  own assumption
- Transformation, to industrial area [natural resource, land]: 11.5 m2; lognormal variance with pedigree 0.162, pedigree (1,1,5,5,1)
  own assumption

## Sampling procedure
literature

## Extrapolations
see Geography/Text This dataset has been copied from an original dataset covering the geography RER. The uncertainty has been adjusted accordingly.

## Review by Hans-Jörg Althaus 2003-07-04
passed
