# polyether polyols production, short chain

Dataset: EcoSpold 2, unit process
Geography: RoW
Time period: 2020-01-01 to 2026-12-31
Technology level: current
Classification: ISIC rev.4 ecoinvent: 2013:Manufacture of plastics and synthetic rubber in primary forms
Synonyms: Polyether-Polyol; polyether-polyols
Scenario: Business-as-Usual
System model: Allocation, cut-off by classification
Share of production covered: 80 %
Generated by: Iasonas Ioannou
Published in: ISOPA 2021
Database: ecoinvent
isCopyrightProtected: true
accessRestrictedTo: 1

## General comment
This dataset represents the average production of 1 kg of short chain polyether polyol (MW < 1000 g/mol). Polyether polyols are polymeric organic compounds including ether groups (R-O-R) and terminal hydroxyl groups (OH). Polyether polyols are one of the precursors of polyurethane (PUR) foam, whille the wide range of properties of PUR foams is largely determined by the used polyols. This dataset was extrapolated from the European dataset (ISOPA, 2021), and thus the European average production technology was applied.
Two different classes of polyether polyols can be distinguished, i.e., (1) long-chain polyols (mainly used for producing flexible foams, combined with toluene diisocyanate) and (2) short chain polyols (mainly used for producing rigid foams, combined with methylene diphenyl diisocyanate). Long chain polyether polyols (MW > 1000 kg/kmole) are waxy solids, while short chain ones (MW < 1000 kg/kmole) are liquids.
Polyether polyols are produced by the alkoxylation process with propylene oxide and ethylene oxide being the main raw materials. The production take place in batch mode in the presence of an initiator with an OH functional group (e.g., glycerine, saccharose or other carbohydrates, is commonly used), while a potassium hydroxide (KOH) is used as catalyst.
References:
Adam, N., Avar, G., Blankenheim, H., Friederichs, W., Giersig, M., Weigand, E., Halfmann, M., Wittbecker, F.-W., Larimer, D.-R., Maier, U., Meyer-Ahrens, S., Noble, K.-L. and Wussow, H.-G. (2005). Polyurethanes. In Ullmann's Encyclopedia of Industrial Chemistry, (Ed.). https://doi.org/10.1002/14356007.a21_665.pub2
2021, ISOPA , Eco-profile of toluene diisocyanate (TDI) and methylene diphenyl diisocyanate (MDI) , 3 - SeparatePublication
2021, ISOPA , Eco-profile of long and short chain polyether polyols for polyurethane products
[This dataset is meant to replace the following datasets:
- polyol production, GLO, 1995 - 2001]

## Included activities start
The activity starts when the raw materials enter the process.

## Included activities end
This activity ends once the product, i.e., 1 kg of short chain polyether polyol, is at the production site gate. Materials entering the process are included as well as energy uses, infrastructure and emissions.

## Geography
This dataset was extrapolated from the European dataset (ISOPA, 2021). Therefore, the European average production technology was applied. Representative for 80 % of the short chain polyether polyols coverage in terms of production volumes in the EU region.

## Technology
This inventory represents the average production of short chain polyether polyols, provided as a generic dataset.
Polyether polyols are produced by the alkoxylation process, where ethylene oxide and propylene oxide react in the presence of an initiator with an OH functional group (e.g., glycerine, saccharose or other carbohydrates, is commonly used), while a potassium hydroxide (KOH) is used as catalyst. Notably, the amount of alkoxylation species can be varied to achieve different chain lengths and molecular weights.
In more detail, the process takes place in a batch mode, where an initiator and a base (catalyst) are first introduced. The role of the initiator and the catalyst is generate an alcoholate-anion, subsequently the epoxide is introduced and the reaction operates at approximately 100 - 130 °C at a pressure within the following range 2 - 5 bar. The reaction is strongly exothermic, and thus, the cooling of the reactor is important to maintain the temperature level within the latter range.
Finally, the short chain polyether polyol product has to be purified, i.e. separated from the spent catalyst, which takes place through the introduction of an acid which reacts with the base (i.e., catalyst) to form an insoluble salt which is easily removed by filtering.
References:
2021, ISOPA , Eco-profile of long and short chain polyether polyols for polyurethane products

## Time period
Data collection for production was collected as 12-month averages representing the year 2018. The inventory creation and calculation stage was concluded in 2020, while the technology is not expected to change until 2026.

## Reference product
- polyether polyols, short chain: 1 kg; name RP; By-product classification allocatable product; CPC 347: Plastics in primary forms; HS2017 2905: Acyclic alcohols and their halogenated, sulphonated, nitrated or nitrosated derivatives
  production volume 3.7788e9 kg; name RP_PV; = 9.4E9 * 0.5
    The annual Global production capacity of polyether polyols was 9.4E9 kg in 2016, according to the producers capacity. Here, half the polyol production capacity was assumed to represent the short chain production
    References:
    https://www.statista.com/statistics/747099/production-capacity-of-the-leading-polyether-polyol-producers/, accessed 11-09-2023.
  property price 1.38072 EUR2005
    Calculated based on inputs: The price of the product has been calculated as a sum of the values of the material and energy inputs for this product. This value is therefore a rough estimation. It may underestimate the real price since there are additional expenses when producing any product. These expences can include for example labour costs, treatment of waste materials and profit for the producer. Please consider carefully whether this level of data quality is acceptable for your application.
  properties: carbon allocation 0.533605 kg, carbon content 0.533605, carbon content, fossil 0.434199, carbon content, non-fossil 0.0994056, dry mass 1 kg, heating value, net 31.53 MJ, water content 0, water in wet mass 0 kg, wet mass 1 kg

## Inputs from technosphere
- 2,4-dinitrotoluene: 0.00736592 kg; lognormal variance with pedigree 0.0026, pedigree (1,1,1,5,1)
  Proxy value. Stoichiometric amount of 2,4-dinitrotoluene needed to produce 0.00494 kg of toluene diamine (TDA) that is the direct input for the production of short chain polyether polyols.
  Industrial data, representative for 80 % of the short chain polyether polyols coverage in terms of production volumes in the EU region
  properties: carbon content, fossil 0.461617, dry mass 1 kg, heating value, net 17.98 MJ, wet mass 1 kg
- aniline: 0.00368224 kg; lognormal variance with pedigree 0.0026, pedigree (1,1,1,5,1)
  Proxy value. Stoichiometric amount of aniline needed to produce 0.0039 kg of methylendianiline (MDA) that is the direct input for the production of short chain polyether polyols.
  Industrial data, representative for 80 % of the short chain polyether polyols coverage in terms of production volumes in the EU region
  properties: carbon content, fossil 0.774194, dry mass 1 kg, heating value, net 32.56 MJ, wet mass 1 kg
- chemical factory, organics: 4e-10 unit; lognormal variance with pedigree 0.0746, pedigree (2,4,1,5,4)
  Calculated based on literature data published by the industry. For this activity, no information was readily available concerning infrastructure and land-use. Therefore, the infrastructure is estimated based on data from two chemical factories, the BASF site of Ludwigshafen and the chemical factory in Gendorf (which are both located in Germany), which produce a wide range of chemical substances. Based on this data, the following assumptions are made: the built area amounts to about 4.2 ha, the plant has an average output of 50'000 t/a and a lifespan of fifty years. The estimated infrastructure amount is therefore 4.00 E-10 units per kg of produced chemical.
  References:
  Althaus H.-J., Chudacoff M., Hischier R., Jungbluth N., Osses M. and Primas A. (2007) Life Cycle Inventories of Chemicals. ecoinvent report No. 8, v2.0. EMPA Dübendorf, Swiss Centre for Life Cycle Inventories, Dübendorf, CH.
  Gendorf (2000) Umwelterklärung 2000, Werk Gendorf. Werk Gendorf, Burgkirchen.;activityLink introduced to establish a direct link to the corresponding regional supply of this product
- compressed air, 1000 kPa gauge: 0.0186645 m3; lognormal variance with pedigree 0.0026, pedigree (1,1,1,5,1)
  Industrial data, representative for 80 % of the short chain polyether polyols coverage in terms of production volumes in the EU region
- diethanolamine: 0.000418147 kg; lognormal variance with pedigree 0.0026, pedigree (1,1,1,5,1)
  (same comment as for compressed air, 1000 kPa gauge)
  properties: carbon content, fossil 0.457143, dry mass 1 kg, heating value, net 26.52 MJ, wet mass 1 kg
- diethylene glycol: 0.00568638 kg; lognormal variance with pedigree 0.0026, pedigree (1,1,1,5,1)
  (same comment as for compressed air, 1000 kPa gauge)
  properties: carbon content, fossil 0.45283, dry mass 1 kg, heating value, net 25.14 MJ, wet mass 1 kg
- electricity, medium voltage: 0.00365722, 0.0729534, 0.0245121, 0.00111997, 0.00022416, 4.81322e-5, 0.00753357 kWh (7 suppliers, which the file names only by identifier); sum of these 0.110049 kWh; lognormal variance with pedigree 0.0026, pedigree (1,1,1,5,1)
  Average electricity consumption for the production of short chain polyether polyols.
  Industrial data, representative for 80 % of the short chain polyether polyols coverage in terms of production volumes in the EU region
- ethylene oxide: 0.0114298 kg; lognormal variance with pedigree 0.0026, pedigree (1,1,1,5,1)
  (same comment as for compressed air, 1000 kPa gauge)
  properties: carbon content, fossil 0.545455, dry mass 1 kg, heating value, net 27.53 MJ, wet mass 1 kg
- formaldehyde: 0.000593693 kg; lognormal variance with pedigree 0.0026, pedigree (1,1,1,5,1)
  Proxy value. Stoichiometric amount of formaldehyde needed to produce 0.0039 kg of methylendianiline (MDA) that is the direct input for the production of short chain polyether polyols.
  Industrial data, representative for 80 % of the short chain polyether polyols coverage in terms of production volumes in the EU region
  properties: carbon content, fossil 0.4, dry mass 1 kg, heating value, net 20.19 MJ, wet mass 1 kg
- glucose: 0.142213 kg; lognormal variance with pedigree 0.1233, pedigree (2,2,1,5,5)
  Proxy value. Glucose was used as substitute for sorbitol.
  properties: carbon content, non-fossil 0.4, dry mass 1 kg, heating value, net 20.19 MJ, wet mass 1 kg
- glycerine: 0.0359004 kg; lognormal variance with pedigree 0.0026, pedigree (1,1,1,5,1)
  (same comment as for compressed air, 1000 kPa gauge)
  properties: carbon content, non-fossil 0.391304, dry mass 1 kg, heating value, net 18 MJ, wet mass 1 kg
  note on heating value, net: Based on literature, Report 17: Jungbluth, N., Chudacoff, M., Dauriat, A., Dinkel, F., Doka, G., Faist Emmenegger, M., Gnansounou, E., Kljun, N., Schleiss, K., Spielmann, M., Stettler, C., Sutter, J. 2007: Life Cycle Inventories of Bioenergy. ecoinvent report No. 17, Swiss Centre for Life Cycle Inventories, Dübendorf, CH.
- hazardous waste, for incineration: -0.0137438 kg; name HWinc_BP; lognormal variance with pedigree 0.0026, pedigree (1,1,1,5,1)
  (same comment as for compressed air, 1000 kPa gauge)
  production volume; = RP_PV * (HWinc_BP / RP)
    Calculated from production volume of reference product using the relative outputs.
  properties: carbon content, fossil 0.554667, dry mass 0.75 kg, heating value, net 17 MJ, water content 0.333333, wet mass 1 kg
  note on carbon content, fossil: Tab A.6, ecoinvent v2.2 report 13_I. C content has been calculated after data in the tables, and then referred to 1 kg DM
  note on heating value, net: Value taken from the general comment of the treatment dataset.
- hazardous waste, for underground deposit: -0.000107303 kg; name HWdeposit_BP; lognormal variance with pedigree 0.0026, pedigree (1,1,1,5,1)
  (same comment as for compressed air, 1000 kPa gauge)
  production volume; = RP_PV * (HWdeposit_BP / RP)
    Calculated from production volume of reference product using the relative outputs.
  properties: carbon content, fossil 0.554667, dry mass 1 kg, wet mass 1 kg
  note on carbon content, fossil: Tab A.6, ecoinvent v2.2 report 13_I, average hazardous waste composition was used, and referred to 0% water mass. No waste-specific emission are currently inventoried for underground deposits. Accordingly, no waste composition must be specified. For generic, average waste to underground deposit deposition in a 200 liter steel drum without cement solidification is assumed (ecoinvent v2.2 report 13_I).
- heat, from steam, in chemical industry: 1.1935 MJ; name Steam; = 0.434*2.75; lognormal variance with pedigree 0.0026, pedigree (1,1,1,5,1)
  Average, and aggregated, steam consumption for the production of short chain polyether polyols, with the following contribution of steam 0.088 kg at 5 bar and 0.346 kg at 10 bar. Here, an energy content of 2.75 MJ per kg of steam was used.
  Industrial data, representative for 80 % of the short chain polyether polyols coverage in terms of production volumes in the EU region
  properties: heating value, net 1 MJ
- hydrogen, gaseous, low pressure: 8.30543e-5, 5.13577e-5, 0.000350895 kg (3 suppliers, which the file names only by identifier); sum of these 0.000485307 kg; lognormal variance with pedigree 0.0026, pedigree (1,1,1,5,1)
  Proxy value. Stoichiometric amount of hydrogen needed to produce 0.00494 kg of toluene diamine (TDA) that is the direct input for the production of short chain polyether polyols.
  Industrial data, representative for 80 % of the short chain polyether polyols coverage in terms of production volumes in the EU region
  properties: dry mass 1 kg, heating value, net 120.21 MJ, wet mass 1 kg
- imidazole: 0.000879462 kg; lognormal variance with pedigree 0.0026, pedigree (1,1,1,5,1)
  (same comment as for compressed air, 1000 kPa gauge)
  properties: carbon content, fossil 0.529288, dry mass 1 kg, heating value, net 23.16 MJ, wet mass 1 kg
- inert waste, for final disposal: -0.000245036 kg; name IWdeposit_BP; lognormal variance with pedigree 0.0026, pedigree (1,1,1,5,1)
  (same comment as for compressed air, 1000 kPa gauge)
  production volume; = RP_PV * (IWdeposit_BP / RP )
    Calculated from production volume of reference product using the relative outputs.
  properties: dry mass 0.995 kg, water content 0.00502513, wet mass 1 kg
- nitrogen, liquid: 0.0785753 kg; lognormal variance with pedigree 0.0026, pedigree (1,1,1,5,1)
  (same comment as for compressed air, 1000 kPa gauge)
  properties: dry mass 1 kg, wet mass 1 kg
- phenolic resin: 0.0142706 kg; lognormal variance with pedigree 0.0026, pedigree (1,1,1,5,1)
  (same comment as for compressed air, 1000 kPa gauge)
  properties: carbon content, fossil 0.772277, dry mass 1 kg, heating value, net 33.57 MJ, wet mass 1 kg
- phosphoric acid, industrial grade, without water, in 85% solution state: 0.000581783 kg; lognormal variance with pedigree 0.0026, pedigree (1,1,1,5,1)
  (same comment as for compressed air, 1000 kPa gauge)
  properties: dry mass 1 kg, wet mass 1 kg
- potassium hydroxide: 0.000443524 kg; lognormal variance with pedigree 0.0026, pedigree (1,1,1,5,1)
  (same comment as for compressed air, 1000 kPa gauge)
  properties: dry mass 0.856 kg, water content 0.168224, wet mass 1 kg
- propylene oxide, liquid: 0.6922 kg; lognormal variance with pedigree 0.0026, pedigree (1,1,1,5,1)
  (same comment as for compressed air, 1000 kPa gauge)
  properties: carbon content, fossil 0.62069, dry mass 1 kg, heating value, net 31.32 MJ, wet mass 1 kg
- sugar, from sugarcane: 0.0963179 kg; lognormal variance with pedigree 0.0026, pedigree (1,1,1,5,1)
  (same comment as for compressed air, 1000 kPa gauge)
  properties: carbon content, non-fossil 0.44, dry mass 1 kg, wet mass 1 kg
- tap water: 0.000226708, 0.000345597, 0.000644866, 0.00173722, 0.000209115, 0.00871458, 0.0997254 kg (7 suppliers, which the file names only by identifier); sum of these 0.111603 kg; lognormal variance with pedigree 0.0026, pedigree (1,1,1,5,1)
  (same comment as for compressed air, 1000 kPa gauge)
  properties: carbon content, fossil 0.00178991, dry mass 0.000337476 kg, water content 2962.17, wet mass 1 kg
  note on carbon content, fossil: Bicarbonate content is 2.93 mol/m3. CO2 content is 0.1 mol/m3 (ecoinvent v2.2 report 8, Tab 93.1).
- triethanolamine: 0.00200858 kg; lognormal variance with pedigree 0.0026, pedigree (1,1,1,5,1)
  (same comment as for compressed air, 1000 kPa gauge)
  properties: carbon content, fossil 0.483221, dry mass 1 kg, heating value, net 26.82 MJ, wet mass 1 kg
- wastewater, average: -0.000250885, -8.93245e-7 m3 (2 suppliers, which the file names only by identifier); sum of these -0.000251778 m3; lognormal variance with pedigree 0.0026, pedigree (1,1,1,5,1)
  (same comment as for compressed air, 1000 kPa gauge)
  production volume; = RP_PV * (WW_BP / RP)
    Calculated from production volume of reference product using the relative outputs.
  properties: carbon content, non-fossil 0.194039, dry mass 0.346837 kg, mass concentration, TOC 0.1091 kg/m3, mass concentration, calcium 0.039453 kg/m3, mass concentration, chlorine 0.030031 kg/m3, mass concentration, hydrogen 0.013365 kg/m3, mass concentration, nitrogen 0.031015 kg/m3, mass concentration, oxygen 0.069824 kg/m3, mass concentration, sodium 0.06456 kg/m3, mass concentration, sulfur 0.015602 kg/m3, water content 2882.2, wet mass 1000 kg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
  note on carbon content, non-fossil: 0.0673 kg TOC/m3 (Tab A.17, ecoinvent v2.2 report 13_I). TOC was considered as Total Carbon.
- water, deionised: 0.384862 kg; = 0.065555626 + Steam/2.75 - 0.114693434096757; lognormal variance with pedigree 0.0026, pedigree (1,1,1,5,1)
  Calculated value. Amount of deionised water entering the production facility, plus the amount needed to produced steam minus the water returned to the external steam provider.
  Industrial data, representative for 80 % of the short chain polyether polyols coverage in terms of production volumes in the EU region
  properties: wet mass 1 kg

## Inputs from nature
- Water, cooling, unspecified natural origin [natural resource, in water]: 0.0215019 m3; name WaterRelooped; lognormal variance with pedigree 0.0026, pedigree (1,1,1,5,1)
  (same comment as for compressed air, 1000 kPa gauge)
- Water, unspecified natural origin [natural resource, in ground]: 3.99e-6 m3; lognormal variance with pedigree 0.0026, pedigree (1,1,1,5,1)
  (same comment as for compressed air, 1000 kPa gauge)

## Emissions to nature
- Hydrocarbons, unspecified [air, non-urban air or from high stacks]: 5.54273e-6 kg; lognormal variance with pedigree 0.0026, pedigree (1,1,1,5,1)
  (same comment as for compressed air, 1000 kPa gauge)
- NMVOC, non-methane volatile organic compounds [air, unspecified]: 2.9195e-7 kg; lognormal variance with pedigree 0.0026, pedigree (1,1,1,5,1)
  (same comment as for compressed air, 1000 kPa gauge)
- Propylene oxide [air, unspecified]: 2.88395e-8 kg; lognormal variance with pedigree 0.0026, pedigree (1,1,1,5,1)
  (same comment as for compressed air, 1000 kPa gauge)
- Water [air, unspecified]: 0.000104819 m3; lognormal variance with pedigree 0.042, pedigree (1,1,1,5,1)
  (same comment as for compressed air, 1000 kPa gauge)
- Water [water, unspecified]: 0.0215019 m3; = WaterRelooped; lognormal variance with pedigree 0.042, pedigree (1,1,1,5,1)
  (same comment as for compressed air, 1000 kPa gauge)

## Sampling procedure
Industry data, representative for 80 % of the short chain polyether polyols coverage in terms of production volumes in the EU region in 2018.

The industrial data used originate from three different polyether polyols producers with four plants in three different European countries.

## Extrapolations
This dataset has been copied from an original dataset covering the geography RER. The uncertainty has been adjusted accordingly.

Small input quantities of (i) generic stabilizer, (ii) magnesium silicate, and (iii) polyether, with a representation on dry mass input lower than 0.4%, was cut-off. At the same time, glucose was used as proxy substitute for sorbitol.
