# train production, passenger, high speed

Dataset: EcoSpold 2, unit process
Geography: DE
Time period: 1993-01-01 to 2023-12-31
Technology level: current
Classification: ISIC rev.4 ecoinvent: 3020:Manufacture of railway locomotives and rolling stock
Classification: EcoSpold01Categories: transport systems/train
Synonyms: (Inter City Express)
Scenario: Business-as-Usual
System model: Allocation, cut-off by classification
Generated by: Michael Spielmann (obsolete)
Published in: Spielmann M. 2004
Database: ecoinvent
isCopyrightProtected: true
accessRestrictedTo: 1

## General comment
The dataset represents the production of a high speed train.

## Included activities start
Service starts with the material consumption for the production of the high speed train.

## Included activities end
The dataset ends with the production of one high speed train. The dataset includes material consumption, transport, energy and fuel consumption. The disposal of the high speed train is included as well.

## Geography
Manufacturing data represents a train produced in Germany.

## Technology
Train manufacturing data is available from Rozycki (2003) mainly based on (Maibach, 1999).
References:
Maibach M., Peter D. and Seiler B. (1999) Ökoinventar Transporte: Grundlagen für den ökologischen Vergleich von Transportsystemen und den Einbezug von Transportsystemen in Ökobilanzen. Technischer Schlussbericht. In: Schweizerischer Nationalfonds zur Förderung der wissenschaftlichen Forschung (ed. SPP Umwelt M.). 2nd Edition. INFRAS, Zürich
von Rozycki C., Koeser H. and Schwarz H. (2003) Ecology Profile of the German High-speed Rail Passenger Transport System, ICE. In: International Journal of Life Cycle Assessment, 8(2), pp. 83-91.

## Reference product
- train, passenger, high speed: 1 unit; name RP_amount_1; By-product classification allocatable product; CPC 49520: Self-propelled railway or tramway coaches, vans and trucks (except maintenance or service vehicles); HS2017 8603: Railway or tramway coaches, vans and trucks; self-propelled tenders, other than those of heading no. 8604
  EcoSpold01Location=DE
  production volume 0.242058 unit; name RP_PV_1
    This is a placeholder value that does not reflect real-world production volumes. This dataset does not currently require a real-world production volume to work in the database framework, and no actual data were collected yet. This has no negative effect on the results of the ecoinvent database. The placeholder value of this activity was scaled according to the nominal GDP of 2005 (source: United Nations, http://data.un.org/Glossary.aspx?q=GDP+%28current+US%24%29, accessed 20130726) to reflect an appropriate share of the global production volume, which is also a placeholder value.
  property price 758664 EUR2005
    Calculated based on inputs: The price of the product has been calculated as a sum of the values of the material and energy inputs for this product. This value is therefore a rough estimation. It may underestimate the real price since there are additional expenses when producing any product. These expences can include for example labour costs, treatment of waste materials and profit for the producer. Please consider carefully whether this level of data quality is acceptable for your application.
  properties: carbon allocation 0 kg, carbon content 0

## Inputs from technosphere
- alkyd paint, white, without solvent, in 60% solution state: 12600 kg; source von Rozycki C. 2003; lognormal variance with pedigree 0.0586, pedigree (4,3,5,1,1)
  EcoSpold01Location=RER
  Literature value. Train manufacturing data is available from Rozycki (2003) mainly based on (Maibach, 1999).
  Further references:
  Maibach M., Peter D. and Seiler B. (1999) Ökoinventar Transporte: Grundlagen für den ökologischen Vergleich von Transportsystemen und den Einbezug von Transportsystemen in Ökobilanzen. Technischer Schlussbericht. In: Schweizerischer Nationalfonds zur Förderung der wissenschaftlichen Forschung (ed. SPP Umwelt M.). 2nd Edition. INFRAS, Zürich
  Uncertainty: literature studies
  properties: carbon content, fossil 0.140367, carbon content, non-fossil 0.199629, dry mass 1 kg, heating value, net 10.3 MJ, wet mass 1 kg
  note on carbon content, fossil: C content was calculated as an addition of C content in the raw materials.
- aluminium, cast alloy: 28800 kg; = 0.32*90000; source von Rozycki C. 2003; lognormal variance with pedigree 0.0586, pedigree (4,3,5,1,1)
  90000 kg aluminium, production mix. Literature value. Train manufacturing data is available from Rozycki (2003) mainly based on (Maibach, 1999).
  Further references:
  Maibach M., Peter D. and Seiler B. (1999) Ökoinventar Transporte: Grundlagen für den ökologischen Vergleich von Transportsystemen und den Einbezug von Transportsystemen in Ökobilanzen. Technischer Schlussbericht. In: Schweizerischer Nationalfonds zur Förderung der wissenschaftlichen Forschung (ed. SPP Umwelt M.). 2nd Edition. INFRAS, Zürich
  0.32: part of aluminium cast alloy in aluminium, production mix. Based on the aluminium, production mix in ecoinvent v2.2.
  Uncertainty: literature studies
  property carbon content, fossil 0; name C_content_fossil
  property carbon content, non-fossil 0; name C_content_non_fossil
  property dry mass 1 kg; name DM
  property water content 0; name water_content
  property water in wet mass 0 kg; name WWM
  property wet mass 1 kg; name WM
- aluminium, wrought alloy: 61200 kg; = 0.68*90000; source von Rozycki C. 2003; lognormal variance with pedigree 0.0586, pedigree (4,3,5,1,1)
  90000 kg aluminium, production mix. Literature value. Train manufacturing data is available from Rozycki (2003) mainly based on (Maibach, 1999).
  Further references:
  Maibach M., Peter D. and Seiler B. (1999) Ökoinventar Transporte: Grundlagen für den ökologischen Vergleich von Transportsystemen und den Einbezug von Transportsystemen in Ökobilanzen. Technischer Schlussbericht. In: Schweizerischer Nationalfonds zur Förderung der wissenschaftlichen Forschung (ed. SPP Umwelt M.). 2nd Edition. INFRAS, Zürich
  0.68: part of aluminium, wrought alloy in aluminium, production mix. Based on the aluminium, production mix in ecoinvent v2.2.
  Uncertainty: literature studies
  properties: dry mass 1 kg, wet mass 1 kg
- copper, cathode: 34400 kg; source von Rozycki C. 2003; lognormal variance with pedigree 0.0586, pedigree (4,3,5,1,1)
  (same comment as for alkyd paint, white, without solvent, in 60% solution state)
  properties: dry mass 1 kg, wet mass 1 kg
- electricity, medium voltage: 611000 kWh; source von Rozycki C. 2003; lognormal variance with pedigree 0.1786, pedigree (4,3,5,1,1)
  Literature value. Train manufacturing data is available from Rozycki (2003) mainly based on (Maibach, 1999).
  Further references:
  Maibach M., Peter D. and Seiler B. (1999) Ökoinventar Transporte: Grundlagen für den ökologischen Vergleich von Transportsystemen und den Einbezug von Transportsystemen in Ökobilanzen. Technischer Schlussbericht. In: Schweizerischer Nationalfonds zur Förderung der wissenschaftlichen Forschung (ed. SPP Umwelt M.). 2nd Edition. INFRAS, Zürich
  EcoSpold01Location=DE
  Uncertainty: literature studies; value represents a rough estimate (basic uncertainty =2)
- flat glass, coated: 25000 kg; source von Rozycki C. 2003; lognormal variance with pedigree 0.0586, pedigree (4,3,5,1,1)
  Literature value. Train manufacturing data is available from Rozycki (2003) mainly based on (Maibach, 1999).
  Further references:
  Maibach M., Peter D. and Seiler B. (1999) Ökoinventar Transporte: Grundlagen für den ökologischen Vergleich von Transportsystemen und den Einbezug von Transportsystemen in Ökobilanzen. Technischer Schlussbericht. In: Schweizerischer Nationalfonds zur Förderung der wissenschaftlichen Forschung (ed. SPP Umwelt M.). 2nd Edition. INFRAS, Zürich
  EcoSpold01Location=RER
  Uncertainty: literature studies
  properties: dry mass 1 kg, wet mass 1 kg
- heat, district or industrial, natural gas: 1.94e6 MJ; lognormal variance with pedigree 0.0512, pedigree (4,3,5,5,1)
  EcoSpold01Location=RER
  Uncertainty: literature studies; value represents a rough estimate (basic uncertainty =2)
  properties: heating value, net 1 MJ
- heat, district or industrial, other than natural gas: 1.94e6 MJ; lognormal variance with pedigree 0.1786, pedigree (4,3,5,1,1)
  (same comment as for heat, district or industrial, natural gas)
  properties: heating value, net 1 MJ
- polyethylene, high density, granulate: 155000 kg; source von Rozycki C. 2003; lognormal variance with pedigree 0.0586, pedigree (4,3,5,1,1)
  (same comment as for flat glass, coated)
  properties: carbon content, fossil 0.857143, dry mass 1 kg, heating value, net 42.47 MJ, wet mass 1 kg
  note on carbon content, fossil: Polyethylene is formed out of a huge amount of ethylene monomers (C2H4) (ecoinvent v2.2 report 11_II). MW=28 g/mol
- reinforcing steel: 234000 kg; source von Rozycki C. 2003; lognormal variance with pedigree 0.0586, pedigree (4,3,5,1,1)
  (same comment as for alkyd paint, white, without solvent, in 60% solution state)
  properties: carbon content, fossil 0.004, dry mass 1 kg, wet mass 1 kg
- steel, low-alloyed, hot rolled: 88800 kg; source von Rozycki C. 2003; lognormal variance with pedigree 0.0586, pedigree (4,3,5,1,1)
  (same comment as for alkyd paint, white, without solvent, in 60% solution state)
  properties: carbon content, fossil 0.005, dry mass 1 kg, wet mass 1 kg
  note on carbon content, fossil: Low alloyed steel composition given in Tab. 3.2 ecoinvent v2.2 report 10_partII. Steel assumed to have a C content of 0.5%
- tempering, flat glass: 25000 kg; source von Rozycki C. 2003; lognormal variance with pedigree 0.0586, pedigree (4,3,5,1,1)
  (same comment as for alkyd paint, white, without solvent, in 60% solution state)
- used train, passenger, high-speed: -1 unit; name BP_amount_1; lognormal variance with pedigree 0.3, pedigree (1,1,1,1,1)
  production volume; = RP_PV_1 * (BP_amount_1 / RP_amount_1)
    Calculated from production volume of reference product using the relative outputs.
  properties: carbon content, fossil 0.212575, carbon content, non-fossil 0.00393143, dry mass 639800 kg, wet mass 639800 kg

## Sampling procedure
The data of the material composition and energy consumption is based on literature studies.

## Review by Michael Spielmann (obsolete) 2004-04-05
passed

## Review by Roland Hischier 2011-09-23
Transfer of documentation done.

## Review by Carl Vadenbo 2012-06-29
In preparation for the release of ecoinvent v3.0, exchange for disposal of used high-speed train was added to 'train production, passenger, high-speed, DE 1993-2000'. The amounts and the uncertainty information of the exchanges were reviewed and were found to correspond to the disaggregated datasets, and the dataset was accepted for inclusion into the ecoinvent database on 2012.07.04.
