# lead concentrate stockpiling

Dataset: EcoSpold 2, unit process
Geography: US
Time period: 2012-01-01 to 2023-12-31
Technology level: current
Classification: EcoSpold01Categories: metals/extraction
Classification: ISIC rev.4 ecoinvent: 2420:Manufacture of basic precious and other non-ferrous metals
Scenario: Business-as-Usual
System model: Allocation, cut-off by classification
Generated by: Emilia Moreno Ruiz
Database: ecoinvent
isCopyrightProtected: true
accessRestrictedTo: 1

## General comment
Stockpiling is a way of assuring provision and control over supplies, and is systematically applied with some commodities by several countries.
The United States has a known and well documented national stockpiling service. Lead can be found as one of the commodities that is stockpiled, as it is considered of strategic importance.
This dataset describes the stockpiling of lead concentrate following its extraction during mining. The stockpiling is considered to happen in the geographical sourroundings of the mine producing the concentrate.
Sources:
-US Department of defense, 2013, Strategic and Critical Materials - Report on Stockpile Requirements.
-Reconfiguration of the National Defense Stockpile Report to Congress, April 2009.

## Included activities start
Activity starts with the arrival of lead concentrate at the stockpile

## Included activities end
The activity ends with the provision of the service of stockpiling lead.

## Technology
The lead concentrate is stockpiled in the surroundings of the mining area

## Reference product
- lead concentrate stockpiling: 1 kg; By-product classification allocatable product; CPC 41441: Lead, unwrought; HS2017 260700: Lead ores and concentrates
  production volume 7.94545e6 kg; = (437000000/0.55)*0.01
    The amount of lead concentrate being stockpiled per year has been estimated as equaling 1% of the total lead concentrate production in 2005 in the US. Lead concentration is assumed to be 0.55.
    The lead concentrate production has been estimated using the information in T13 (World mine production of lead in concentrate) http://minerals.usgs.gov/minerals/pubs/commodity/lead/myb1-2007-lead.xls
  property price 0.376439 EUR2005
    Calculated based on inputs: The price of the product has been calculated as a sum of the values of the material and energy inputs for this product. This value is therefore a rough estimation. It may underestimate the real price since there are additional expenses when producing any product. These expences can include for example labour costs, treatment of waste materials and profit for the producer. Please consider carefully whether this level of data quality is acceptable for your application.
  properties: carbon allocation 0 kg, carbon content 0

## Inputs from technosphere
- gravel, crushed: 0.00267855 kg; = 3.5714E-06*50E-2*1500; lognormal variance with pedigree 0.2106, pedigree (5,5,5,5,5)
  Estimation. It is estimated a ground sealing with 50 cm gravel bed, 3 mm plastic geo-sealing sheet and 20 cm of asphalt cover.
  The density of gravel is 1500 kg/m3 (http://www.substech.com/dokuwiki/doku.php?id=thermoplastic_low_density_polyethylene_ldpe)
  properties: dry mass 1 kg, wet mass 1 kg
- lead concentrate: 1 kg
  properties: dry mass 1 kg, wet mass 1 kg
- mastic asphalt: 0.00142856 kg; = 3.5714E-06*20E-2*2000; lognormal variance with pedigree 0.2106, pedigree (5,5,5,5,5)
  Estimation. It is estimated a ground sealing with 50 cm gravel bed, 3 mm plastic geo-sealing sheet and 20 cm of asphalt cover.
  The density of asphalt concrete is 2000 kg/m3.(http://www.substech.com/dokuwiki/doku.php?id=thermoplastic_low_density_polyethylene_ldpe)
  properties: carbon content, fossil 0.0968869, dry mass 1 kg, heating value, net 2.94 MJ, wet mass 1 kg
- packaging film, low density polyethylene: 9.85706e-6 kg; = 3.5714E-06*3E-3*920; lognormal variance with pedigree 0.2106, pedigree (5,5,5,5,5)
  Estimation. It is estimated a ground sealing with 50 cm gravel bed, 3 mm plastic geo-sealing sheet and 20 cm of asphalt cover.
  The density of low density polyethylene is 920 kg/m3. (http://www.substech.com/dokuwiki/doku.php?id=thermoplastic_low_density_polyethylene_ldpe)
  properties: carbon content, fossil 0.857143, dry mass 1 kg, heating value, net 42.47 MJ, wet mass 1 kg
- steel, unalloyed: 3.45e-6 kg; = (122.5*1*2 + 25*2*2)/100000000; lognormal variance with pedigree 0.2106, pedigree (5,5,5,5,5)
  Adapted from steel use in sulfur storage, due to lack of specific data. The amount of steel is estimated from a picture of a typical sulfur storage area (see link below)
  http://www.kwhconstructors.com/services.bulk.maintenance.php?gallery=pacificcoastterminalssulfurstack-rake
  There are two main parts containing steel:
  - 1 steel structure and conveyor. The estimated dimensions are 25m*2m*2m
  - 1 steel track that has the lenght of the storage area. It is assumed a rectangular storage area with dimension of122.5m*40.8 m. The dimensions of the track are 122.5m*2m*1m
  properties: carbon content, fossil 0.0025, dry mass 1 kg, wet mass 1 kg

## Inputs from nature
- Occupation, dump site [natural resource, land]: 0.00025 m2*year; name occupation_area; = 5*5000*70/(100000000*70); source Keystone Environmental LTD. 2007; lognormal variance with pedigree 0.0526, pedigree (2,4,4,5,1)
  Adapted from storage of sulfur, due to lack of specific data. For sulfur, the data is obtained from a storage project in Port Ridley, Alberta, Canada,
  The planned area for dry bulk sulfur storage is 5,000 m2.
  The max. capacity is 100,000 tonnes.The lifetime of the stockpile is estimated as 70 years.
  It is estimated that the average storage time of 1 kg of lead for stockpiling is 5 years. This is considered a reasonable time period to assure proper storage and retrievability. Thus, after 5 years the stocked material will be retrieved or changed to a new placement, in order to ensure proper access and keep the shafts accessible.
  The occupation is calculated:
  5 (kg*years) *5000 (m2) *70 years /((100000000 (kg) * 70 (years) )
- Transformation, from unspecified [natural resource, land]: 3.57143e-6 m2; = 0.00025/70; source Keystone Environmental LTD. 2007; lognormal variance with pedigree 0.1326, pedigree (2,4,4,5,1)
  Adapted from storage of sulfur, due to lack of specific data. For sulfur, the data is obtained from a storage project in Port Ridley, Alberta, Canada,
  The planned area for dry bulk sulfur storage is 5,000 m2.
  The max. capacity is 100,000 tonnes.The lifetime of the stockpile is estimated as 70 years.
  It is estimated that the average storage time of 1 kg of lead for stockpiling is 5 years. This is considered a reasonable time period to assure proper storage and retrievability. Thus, after 5 years the stocked material will be retrieved or changed to a new placement, in order to ensure proper access and keep the shafts accessible.
  The transformation is calculated as:
  occupation area / lifetime of stockpile
- Transformation, to dump site [natural resource, land]: 3.57143e-6 m2; name transformation_area; = 0.00025/70; source Keystone Environmental LTD. 2007; lognormal variance with pedigree 0.1326, pedigree (2,4,4,5,1)
  Adapted from storage of sulfur, due to lack of specific data. For sulfur, the data is obtained from a storage project in Port Ridley, Alberta, Canada,
  The planned area for dry bulk sulfur storage is 5,000 m2.
  The max. capacity is 100,000 tonnes. The lifetime of the stockpile is estimated as 70 years.
  It is estimated that the average storage time of 1 kg of lead for stockpiling is 5 years. This is considered a reasonable time period to assure proper storage and retrievability. Thus, after 5 years the stocked material will be retrieved or changed to a new placement, in order to ensure proper access and keep the shafts accessible.
  The transformation is calculated as:
  occupation area / lifetime of stockpile

## Extrapolations
land occupation is adapted from sulfur storage
