# heat production, at hard coal industrial furnace 1-10MW

Dataset: EcoSpold 2, unit process
Geography: RoW
Time period: 1988-01-01 to 2023-12-31
Technology level: current
Classification: ISIC rev.4 ecoinvent: 3530:Steam and air conditioning supply
Classification: EcoSpold01Categories: hard coal/heating systems
Tags: ConvertedDataset
Scenario: Business-as-Usual
System model: Allocation, cut-off by classification
Generated by: Christian Bauer
Published in: Röder, A. 2004
Database: ecoinvent
isCopyrightProtected: true
accessRestrictedTo: 1

## General comment
The stoker boiler is assumed to fire egg coal with quality between long-flame coal and fat coal. The heating value (28.9 MJ/kg) and the composition of the coal are average values available from the literature. The emission data are also taken from literature reporting measurements performed at the end of the 1980s in Germany. Size distribution of particles has been estimated on the basis of recent information from EPA. Emissions of trace elements were calculated using the ash content in the coal and average transfer coefficients for coal power plants with ash retention of 98 %, as first approximation. With the assumption that coal is stored in a dry storage, no leaching is considered. Possible emissions to water during operation of the boiler are not included for missing information.
[This dataset was already contained in the ecoinvent database version 2. It was not individually updated during the transfer to ecoinvent version 3. Life Cycle Impact Assessment results may still have changed, as they are affected by changes in the supply chain, i.e. in other datasets. This dataset was generated following the ecoinvent quality guidelines for version 2. It may have been subject to central changes described in the ecoinvent version 3 change report (http://www.ecoinvent.org/database/ecoinvent-version-3/reports-of-changes/), and the results of the central updates were reviewed extensively. The changes added e.g. consistent water flows and other information throughout the database. The documentation of this dataset can be found in the ecoinvent reports of version 2, which are still available via the ecoinvent website. The change report linked above covers all central changes that were made during the conversion process.]

## Included activities end
Industrial heat production. The module describes the combustion process and includes softened water requirement, coal transport, ash disposal and electricity requirement.

## Geography
German conditions.

## Technology
Average used in early 1990s. Stoker boiler used as reference technology.

## Parameters
- fraction, process water, to air: 0.15 dimensionless; name fraction_PW_to_air; lognormal variance with pedigree 0.092025, pedigree (4,4,3,2,4)
- fraction, water, completely softened, to air: 0.15 dimensionless; name fraction_WCS_to_air; lognormal variance with pedigree 0.092025, pedigree (4,4,3,2,4)

## Reference product
- heat, district or industrial, other than natural gas: 1 MJ; By-product classification allocatable product; CPC 17300: Steam and hot water
  EcoSpold01Location=RER
  production volume 1.08751e14 MJ; name heat_apv
    Assumption. The original value from the global dataset was altered in order to model the correct shares of district/industrial heat producing datasets on the market for heat, district or industrial, other than natural gas according to http://www.iea.org/statistics/statisticssearch/report/?country=WORLD&product=electricityandheat&year=2012. See talk pages for further discussion.
    //Original comment and value//
    IEA coal and Peat statistics for 2007 (http://www.iea.org/stats/coaldata.asp?COUNTRY_CODE=29), industry. All bituminous coal in kg converted to MJ heat out by multiplying with 0.76 (conversion efficiency on a gross heating value basis) and dividing by 0.0294 (kg/MJ gross heating value).
    2.19E+13
  property price 0.0106 EUR2005
    Average European district heat price from Ecoheatcool and Euroheat 2005-2006, Ecoheat Work package 1: The European heat market. Final report. 10.6 EUR/GJ i s the price of district heat. http://www.solarthermalworld.org/files/Ecoheatcool%20WP1%20Web.pdf?download
  properties: Corresponding fuel use 1.25 MJ, carbon allocation 0 kg, carbon content 0, heating value, net 1 MJ

## Inputs from technosphere
- electricity, medium voltage: 0.000175273, 4.18027e-7, 0.0034963, 8.75253e-5, 5.36746e-5, 1.07429e-5, 2.30674e-6, 0.000361047, 0.00103771 kWh (9 suppliers, which the file names only by identifier); sum of these 0.005225 kWh; lognormal variance with pedigree 0.0681, pedigree (4,2,5,5,3)
  EcoSpold01Location=UCTE
  Generic electricity consumption
  Uncertainty: generic electricity consumption
- hard coal: 0.00317165, 0.000752609, 0.0224465, 0.00527154, 0.00323659, 0.00699472, 0.0013764 kg (7 suppliers, which the file names only by identifier); sum of these 0.04325 kg; lognormal variance with pedigree 0.0601, pedigree (4,2,5,5,1)
  EcoSpold01Location=UCTE
  Fuel input
  Uncertainty: fuel input
  properties: carbon content, fossil 0.845, dry mass 0.94 kg, heating value, net 28.9 MJ, water content 0.0638298, wet mass 1 kg
  note on carbon content, fossil: C content 75-94% (specified in Tab 1.1, report 6, part VI). A mean content of 0.845 kg C/ kg dry hard coal was considered
  note on heating value, net: The heating value (28.9 MJ/kg) and the composition of the coal are average values available from the literature.
- hard coal ash: -0.00362295, -2.04607e-6 kg (2 suppliers, which the file names only by identifier); sum of these -0.003625 kg; lognormal variance with pedigree 0.0722, pedigree (5,1,2,5,1)
  Assumption: no reuse
  EcoSpold01Location=PL
  Uncertainty: assumption: no reuse
  production volume; = hard_coal_ash*heat_apv
    Calculated from the production volume of hard coal, burned in industrial furnace 1-10MW in proportion to the respective output amounts.
  properties: dry mass 1 kg, wet mass 1 kg
- industrial furnace, coal, 1-10MW: 6.95e-10 unit; lognormal variance with pedigree 0.3532, pedigree (2,3,5,5,1)
  Infrastructure
  EcoSpold01Location=RER
  Uncertainty: infrastructure
- water, completely softened: 0.00401343, 0.00536157 kg (2 suppliers, which the file names only by identifier); sum of these 0.009375 kg; source Kamberger W. 1993; lognormal variance with pedigree 0.0706, pedigree (2,5,5,5,1)
  Estimation. It is assumed that 2% of the feed water is additionally required as decarbonised water (6t per TJin). For wet purification 1.5t per TJin of water is needed. Due to the lack of information the water used for cleaning can not be considered.
  EcoSpold01Location=RER
  Uncertainty: rough estimate
  properties: wet mass 1 kg

## Emissions to nature
- Acetylene [air, urban air close to ground]: 6.25e-7 kg; lognormal variance with pedigree 0.0932, pedigree (2,3,5,5,1)
  Total NMVOC and profile estimate
  Uncertainty: total NMVOC and profile estimate
- Aluminium III [air, urban air close to ground]: 1.3375e-5 kg; lognormal variance with pedigree 0.728, pedigree (4,5,5,5,1)
  From trace element balance; see report for details
  Uncertainty: from trace element balance; see report for details
- Antimony ion [air, urban air close to ground]: 1.975e-9 kg; lognormal variance with pedigree 0.728, pedigree (4,5,5,5,1)
  (same comment as for Aluminium III)
- Arsenic ion [air, urban air close to ground]: 3.1625e-8 kg; lognormal variance with pedigree 0.728, pedigree (4,5,5,5,1)
  (same comment as for Aluminium III)
- Barium II [air, urban air close to ground]: 1.575e-7 kg; lognormal variance with pedigree 0.728, pedigree (4,5,5,5,1)
  (same comment as for Aluminium III)
- Benzene [air, urban air close to ground]: 6.25e-7 kg; lognormal variance with pedigree 0.0932, pedigree (2,3,5,5,1)
  Total NMVOC and profile estimate
  Uncertainty: total NMVOC and profile estimate
- Benzo(a)pyrene [air, urban air close to ground]: 1.25e-11 kg; lognormal variance with pedigree 0.0932, pedigree (2,3,5,5,1)
  Total NMVOC and profile estimate
  Uncertainty: total NMVOC and profile estimate
- Beryllium II [air, urban air close to ground]: 1.575e-9 kg; lognormal variance with pedigree 0.0932, pedigree (2,3,5,5,1)
  Total NMVOC and profile estimate
  Uncertainty: total NMVOC and profile estimate
- Boron [air, urban air close to ground]: 5.925e-7 kg; lognormal variance with pedigree 0.728, pedigree (4,5,5,5,1)
  (same comment as for Aluminium III)
- Bromine [air, urban air close to ground]: 1.185e-8 kg; lognormal variance with pedigree 0.728, pedigree (4,5,5,5,1)
  (same comment as for Aluminium III)
- Cadmium II [air, urban air close to ground]: 1.975e-9 kg; lognormal variance with pedigree 0.728, pedigree (4,5,5,5,1)
  (same comment as for Aluminium III)
- Calcium II [air, urban air close to ground]: 1.575e-6 kg; lognormal variance with pedigree 0.728, pedigree (4,5,5,5,1)
  (same comment as for Aluminium III)
- Carbon dioxide, fossil [air, urban air close to ground]: 0.114375 kg; lognormal variance with pedigree 0.0427, pedigree (2,2,5,5,1)
  From carbon balance
  Uncertainty: from carbon balance
- Carbon monoxide, fossil [air, urban air close to ground]: 0.000125 kg; lognormal variance with pedigree 0.6932, pedigree (2,3,5,5,1)
  Typical value
  Uncertainty: typical value
- Chromium III [air, urban air close to ground]: 2.8125e-8 kg; lognormal variance with pedigree 0.728, pedigree (4,5,5,5,1)
  (same comment as for Aluminium III)
- Chromium VI [air, urban air close to ground]: 3.475e-9 kg; lognormal variance with pedigree 0.522, pedigree (1,1,5,5,1)
  based on range of data
- Cobalt II [air, urban air close to ground]: 3.95e-9 kg; lognormal variance with pedigree 0.728, pedigree (4,5,5,5,1)
  (same comment as for Aluminium III)
- Copper ion [air, urban air close to ground]: 2.075e-8 kg; lognormal variance with pedigree 0.728, pedigree (4,5,5,5,1)
  (same comment as for Aluminium III)
- Dinitrogen monoxide [air, urban air close to ground]: 1.25e-6 kg; lognormal variance with pedigree 0.0932, pedigree (2,3,5,5,1)
  Typical value
  Uncertainty: typical value
- Dioxins, measured as 2,3,7,8-tetrachlorodibenzo-p-dioxin [air, urban air close to ground]: 2.5e-14 kg; lognormal variance with pedigree 0.3532, pedigree (2,3,5,5,1)
- Ethane [air, urban air close to ground]: 1.875e-6 kg; lognormal variance with pedigree 0.0932, pedigree (2,3,5,5,1)
  Total NMVOC and profile estimate
  Uncertainty: total NMVOC and profile estimate
- Ethylene [air, urban air close to ground]: 3.75e-6 kg; lognormal variance with pedigree 0.0932, pedigree (2,3,5,5,1)
  Total NMVOC and profile estimate
  Uncertainty: total NMVOC and profile estimate
- Formaldehyde [air, urban air close to ground]: 1e-7 kg; lognormal variance with pedigree 0.0932, pedigree (2,3,5,5,1)
  Total NMVOC and profile estimate
  Uncertainty: total NMVOC and profile estimate
- Hydrocarbons, aliphatic, alkanes, unspecified [air, urban air close to ground]: 6.25e-7 kg; lognormal variance with pedigree 0.0932, pedigree (2,3,5,5,1)
  Total NMVOC and profile estimate
  Uncertainty: total NMVOC and profile estimate
- Hydrocarbons, aliphatic, unsaturated [air, urban air close to ground]: 6.25e-7 kg; lognormal variance with pedigree 0.0932, pedigree (2,3,5,5,1)
  Total NMVOC and profile estimate
  Uncertainty: total NMVOC and profile estimate
- Hydrochloric acid [air, urban air close to ground]: 5.0625e-5 kg; lognormal variance with pedigree 0.118, pedigree (4,5,5,5,1)
  (same comment as for Aluminium III)
- Hydrogen fluoride [air, urban air close to ground]: 1.575e-6 kg; lognormal variance with pedigree 0.118, pedigree (4,5,5,5,1)
  (same comment as for Aluminium III)
- Iodine [air, urban air close to ground]: 1.425e-8 kg; lognormal variance with pedigree 0.728, pedigree (4,5,5,5,1)
  (same comment as for Aluminium III)
- Iron ion [air, urban air close to ground]: 5.525e-6 kg; lognormal variance with pedigree 0.728, pedigree (4,5,5,5,1)
  (same comment as for Aluminium III)
- Lead II [air, urban air close to ground]: 9.475e-8 kg; lognormal variance with pedigree 0.728, pedigree (4,5,5,5,1)
  (same comment as for Aluminium III)
- Lead-210 [air, urban air close to ground]: 5.8125e-5 kBq; lognormal variance with pedigree 0.728, pedigree (4,5,5,5,1)
  From radioactivity of the elements; see report for details
  Uncertainty: from radioactivity of the elements; see report for details
- Magnesium [air, urban air close to ground]: 4.7375e-6 kg; lognormal variance with pedigree 0.728, pedigree (4,5,5,5,1)
  (same comment as for Aluminium III)
- Manganese II [air, urban air close to ground]: 2.7625e-8 kg; lognormal variance with pedigree 0.728, pedigree (4,5,5,5,1)
  (same comment as for Aluminium III)
- Mercury II [air, urban air close to ground]: 3.55e-9 kg; lognormal variance with pedigree 0.728, pedigree (4,5,5,5,1)
  (same comment as for Aluminium III)
- Methane, fossil [air, urban air close to ground]: 1.25e-5 kg; lognormal variance with pedigree 0.0932, pedigree (2,3,5,5,1)
  Typical value
  Uncertainty: typical value
- Molybdenum VI [air, urban air close to ground]: 5.925e-9 kg; lognormal variance with pedigree 0.728, pedigree (4,5,5,5,1)
  (same comment as for Aluminium III)
- NMVOC, non-methane volatile organic compounds [air, urban air close to ground]: 2.15e-6 kg; lognormal variance with pedigree 0.0932, pedigree (2,3,5,5,1)
  Total NMVOC and profile estimate
  Uncertainty: total NMVOC and profile estimate
- Nickel II [air, urban air close to ground]: 2.375e-8 kg; lognormal variance with pedigree 0.728, pedigree (4,5,5,5,1)
  (same comment as for Aluminium III)
- Nitrogen oxides [air, urban air close to ground]: 0.00025 kg; lognormal variance with pedigree 0.0932, pedigree (2,3,5,5,1)
  Typical value
  Uncertainty: typical value
- Particulate Matter, < 2.5 um [air, urban air close to ground]: 2.5e-5 kg; lognormal variance with pedigree 0.378, pedigree (4,5,5,5,1)
  Total PM and profile estimates
  Uncertainty: total PM and profile estimates
- Particulate Matter, > 10 um [air, urban air close to ground]: 1.25e-5 kg; lognormal variance with pedigree 0.118, pedigree (4,5,5,5,1)
  Total PM and profile estimates
  Uncertainty: total PM and profile estimates
- Particulate Matter, > 2.5 um and < 10um [air, urban air close to ground]: 2.5e-5 kg; lognormal variance with pedigree 0.198, pedigree (4,5,5,5,1)
  Total PM and profile estimates
  Uncertainty: total PM and profile estimates
- Phosphorus [air, urban air close to ground]: 7.9e-8 kg; lognormal variance with pedigree 0.728, pedigree (4,5,5,5,1)
  (same comment as for Aluminium III)
- Polonium-210 [air, urban air close to ground]: 0.00010625 kBq; lognormal variance with pedigree 0.728, pedigree (4,5,5,5,1)
  (same comment as for Lead-210)
- Potassium I [air, urban air close to ground]: 1.575e-6 kg; lognormal variance with pedigree 0.728, pedigree (4,5,5,5,1)
  (same comment as for Aluminium III)
- Potassium-40 [air, urban air close to ground]: 1.6875e-5 kBq; lognormal variance with pedigree 0.728, pedigree (4,5,5,5,1)
  (same comment as for Lead-210)
- Propane [air, urban air close to ground]: 1.25e-6 kg; lognormal variance with pedigree 0.0932, pedigree (2,3,5,5,1)
  Total NMVOC and profile estimate
  Uncertainty: total NMVOC and profile estimate
- Propylene [air, urban air close to ground]: 6.25e-7 kg; lognormal variance with pedigree 0.0932, pedigree (2,3,5,5,1)
  Total NMVOC and profile estimate
  Uncertainty: total NMVOC and profile estimate
- Radium-226 [air, urban air close to ground]: 1.5e-5 kBq; lognormal variance with pedigree 0.728, pedigree (4,5,5,5,1)
  (same comment as for Lead-210)
- Radium-228 [air, urban air close to ground]: 8.125e-5 kBq; lognormal variance with pedigree 0.728, pedigree (4,5,5,5,1)
  (same comment as for Lead-210)
- Radon-220 [air, urban air close to ground]: 1.25e-6 kBq; lognormal variance with pedigree 0.728, pedigree (4,5,5,5,1)
  (same comment as for Lead-210)
- Radon-222 [air, urban air close to ground]: 1.25e-6 kBq; lognormal variance with pedigree 0.728, pedigree (4,5,5,5,1)
  (same comment as for Lead-210)
- Scandium [air, urban air close to ground]: 1.575e-9 kg; lognormal variance with pedigree 0.728, pedigree (4,5,5,5,1)
  (same comment as for Aluminium III)
- Selenium IV [air, urban air close to ground]: 1.185e-8 kg; lognormal variance with pedigree 0.728, pedigree (4,5,5,5,1)
  (same comment as for Aluminium III)
- Silicon [air, urban air close to ground]: 1.975e-5 kg; lognormal variance with pedigree 0.728, pedigree (4,5,5,5,1)
  (same comment as for Aluminium III)
- Sodium I [air, urban air close to ground]: 7.9e-7 kg; lognormal variance with pedigree 0.728, pedigree (4,5,5,5,1)
  (same comment as for Aluminium III)
- Strontium II [air, urban air close to ground]: 2.375e-7 kg; lognormal variance with pedigree 0.728, pedigree (4,5,5,5,1)
  (same comment as for Aluminium III)
- Sulfur dioxide [air, urban air close to ground]: 0.000625 kg; lognormal variance with pedigree 0.078, pedigree (4,5,5,5,1)
  From S-balance
  Uncertainty: from S-balance
- Thallium I [air, urban air close to ground]: 1.975e-9 kg; lognormal variance with pedigree 0.728, pedigree (4,5,5,5,1)
  (same comment as for Aluminium III)
- Thorium [air, urban air close to ground]: 2.375e-9 kg; lognormal variance with pedigree 0.728, pedigree (4,5,5,5,1)
  (same comment as for Aluminium III)
- Thorium-228 [air, urban air close to ground]: 6.875e-6 kBq; lognormal variance with pedigree 0.728, pedigree (4,5,5,5,1)
  (same comment as for Lead-210)
- Thorium-232 [air, urban air close to ground]: 4.375e-6 kBq; lognormal variance with pedigree 0.728, pedigree (4,5,5,5,1)
  (same comment as for Lead-210)
- Tin ion [air, urban air close to ground]: 7.9e-10 kg; lognormal variance with pedigree 0.728, pedigree (4,5,5,5,1)
  (same comment as for Aluminium III)
- Titanium ion [air, urban air close to ground]: 4.7375e-7 kg; lognormal variance with pedigree 0.728, pedigree (4,5,5,5,1)
  (same comment as for Aluminium III)
- Toluene [air, urban air close to ground]: 1.25e-7 kg; lognormal variance with pedigree 0.0932, pedigree (2,3,5,5,1)
  Total NMVOC and profile estimate
  Uncertainty: total NMVOC and profile estimate
- Uranium [air, urban air close to ground]: 3.1625e-9 kg; lognormal variance with pedigree 0.728, pedigree (4,5,5,5,1)
  (same comment as for Aluminium III)
- Uranium-238 [air, urban air close to ground]: 1.25e-5 kBq; lognormal variance with pedigree 0.728, pedigree (4,5,5,5,1)
  (same comment as for Lead-210)
- Vanadium V [air, urban air close to ground]: 4.7375e-8 kg; lognormal variance with pedigree 0.728, pedigree (4,5,5,5,1)
  (same comment as for Aluminium III)
- Water [air, unspecified]: 1.40625e-6 m3; name water_to_air_unspecified; = (water_softened_input/1000)*fraction_WCS_to_air; lognormal variance with pedigree 0.0827, pedigree (2,2,5,5,1)
  Calculated value based on literature values and expert opinion. See comments in the parametres' comment field.
  property fraction, origin: fresh water 1; name fraction_origin_fresh_water
  property fraction, origin: salt water 0; name fraction_origin_salt_water
  property fraction, origin: unspecified 0; name fraction_origin_unspecified
- Xylenes, unspecified [air, urban air close to ground]: 1.25e-7 kg; lognormal variance with pedigree 0.0932, pedigree (2,3,5,5,1)
  Total NMVOC and profile estimate
  Uncertainty: total NMVOC and profile estimate
- Zinc II [air, urban air close to ground]: 3.95e-9 kg; lognormal variance with pedigree 0.728, pedigree (4,5,5,5,1)
  (same comment as for Aluminium III)
- Water [water, unspecified]: 7.96875e-6 m3; name water_to_water_unspecified; = (water_softened_input/1000)*(1-fraction_WCS_to_air); lognormal variance with pedigree 0.0827, pedigree (2,2,5,5,1)
  (same comment as for Water)
  property carbon content, fossil 0; name C_content_fossil
  property carbon content, non-fossil 0; name C_content_non_fossil
  property dry mass 0 kg; name DM
  property fraction, origin: fresh water 1; name fraction_origin_fresh_water_Ww
  property fraction, origin: salt water 0; name fraction_origin_salt_water_Ww
  property fraction, origin: unspecified 0; name fraction_origin_unspecified_Ww
  property water in wet mass 1000 kg; name WWM
  property wet mass 1000 kg; name WM

## Sampling procedure
literature

## Extrapolations
see Geography/Text This dataset has been copied from an original dataset covering the geography RER. The uncertainty has been adjusted accordingly.

## Review by Hans-Jörg Althaus 2005-07-19
passed
