# sugarcane production

Dataset: EcoSpold 2, unit process
Geography: IN
Time period: 2015-01-01 to 2023-12-31
Technology level: current
Classification: ISIC rev.4 ecoinvent: 0114:Growing of sugar cane
Scenario: Business-as-Usual
System model: Allocation, cut-off by classification
Generated by: Sanjeevan Bajaj
Database: ecoinvent
isCopyrightProtected: true
accessRestrictedTo: 1

## General comment
This dataset represents the production of 1 kg of fresh Sugarcane during March, 2016- February, 2017 data being average of two farms, one located in Village-Rattipur, District- Ludhiana of Punjab and the other in Village-Kabulpur, District-Jagadhri of Haryana. In these areas, fields are irrigated with ground water using electric pump and diesel pump for surface irrigation. The farm has a yield of 85,500 kg fresh matter per ha for this crop cycle. Mean sowing date for the crop is 21-March, 2016 and harvesting date is 14-Feburary, 2017. Mineral NP fertilizer input is 160-115 kg/ha.Herbicide used has active ingredient as Attrazine 2000g/ha. Insecticides used have active ingredient of Fipronyl 7500g/ha, Chlorpyriphos 2000 ml/ha, Chlorantraniliprole 75 ml/ha for which Clothianidin has been taken as proxy. Machinery is used only for soil cultivation with fuel consumption of 89.44 kg/ha using plough, rotary cultivator for soil tillage and other planking. For sowing and planting fuel consumption of 29.64 kg/ha using Trench marking. Machines used for fertilization with fuel consumption of 3.12 kg/ha by mixing with soil and for other work process like laser levelling 14.2272 kg/ha of fuel is been put to use.

## Included activities start
This activity starts about two weeks after the harvest of the previous crop. The soil is prepared for cultivation in March and sowing of seeds started about three weeks after soil preparation. Thereafter the crop is mature for harvesting in about 11 months.

## Included activities end
The activity ends with the harvesting of the mature Sugarcane

## Technology
Cultivation of Sugarcane follows conventional production standards

## Time period
Soil cultivating date for the main crop: 01-March, 2016; Harvesting date main crop: 14-Feburary, 2017. The soil cultivation, sowing and harvesting dates are taken as the middle date of the week or fortnight told to the data collector by the farmer. Total time from date of sowing to date of harvesting comes to 330 days. The data is collected for one crop cycle. The cycle of one year is considered for entry in ecoeditor.

## Parameters
- LUC_crop_specific: 1 dimensionless
  This parameter allows to switch between a "crop specific" and a "country specific" approach when calculating the LUC of a crop. By default, the chosen approach is "crop specific", so the value of the parameter is 1. If you want to apply a "country specific" approach, turn the parameter to 0.

## Reference product
- sugarcane: 1 kg; By-product classification allocatable product; CPC 01802: Sugar cane; HS2017 121293: Sugar cane; fit for human consumption, fresh, chilled, frozen or dried, whether or not ground
  production volume 3.6233e11 kg; = 362.33*1000000*1000
    http://agricoop.nic.in/sites/default/files/Annual_rpt_201617_E.pdf (Page 3) Production volume for 2014-15 given in million tonnes
  property price 0.0281 EUR2005
    Average 2005 prices for main producers of sugarcane, namely Brasil, India, China, Thailand, Pakistan and Mexico. from Import/Export data (US$ and tonnes) in FAO Producer prices Statistics Database; Comodity: sugar cane (Producer Prices)
  properties: carbon allocation 0 kg, carbon content 0

## Inputs from technosphere
- atrazine: 2.33918e-5 kg; lognormal variance with pedigree 0.0052, pedigree (2,4,3,1,1)
  Calculated Value. This value has been calculated by using the ecoinvent LCI calculation tool for crop production.
  properties: carbon content, fossil 0.446512, dry mass 1 kg, wet mass 1 kg
- cyclic N-compound: 8.77193e-7 kg; lognormal variance with pedigree 0.0052, pedigree (2,4,3,1,1)
  (same comment as for atrazine)
  properties: carbon content, fossil 0.641962, dry mass 1 kg, wet mass 1 kg
- diesel, burned in agricultural machinery: 0.0275573 MJ; lognormal variance with pedigree 0.0052, pedigree (2,4,3,1,1)
  This exchange is an aggregation of amounts:
  0.0028247035229810526. Comment: Planking
  0.015601560156000002. Comment: Trench making
  0.0016422694901052633. Comment: Mixing with soil
  0.00748874887488. Comment: Laser lavelling
- inorganic nitrogen fertiliser, as N: 0.00108538 kg; lognormal variance with pedigree 0.0052, pedigree (2,4,3,1,1)
  (same comment as for atrazine)
  properties: dry mass 1 kg, wet mass 1 kg
- inorganic phosphorus fertiliser, as P2O5: 0.00134503 kg; lognormal variance with pedigree 0.0052, pedigree (2,4,3,1,1)
  (same comment as for atrazine)
  properties: dry mass 1 kg, wet mass 1 kg
- irrigation: 0.0126316 m3; lognormal variance with pedigree 0.0052, pedigree (2,4,3,1,1)
  The data was collected for a hectare area through interview
  properties: dry mass 0.11 kg, water content 9089.91, wet mass 1000 kg
- land use change, perennial crop: 2.66204e-6 ha; = (0.227604642691691 * LUC_crop_specific + 0.0769954146475059 * (1-LUC_crop_specific))/85500
  (same comment as for atrazine)
- manure, solid, cattle: 0.0584795 kg; lognormal variance with pedigree 0.0052, pedigree (2,4,3,1,1)
  (same comment as for atrazine)
  properties: carbon content, non-fossil 0.441, dry mass 0.22 kg, water content 3.5454, wet mass 1 kg
- naphtha: 0.000116959 kg; lognormal variance with pedigree 0.0052, pedigree (2,4,3,1,1)
  Corazon (10.0)
  properties: carbon content, fossil 0.919743, dry mass 1 kg, heating value, net 45 MJ, wet mass 1 kg
- nitrile-compound: 8.77193e-5 kg; lognormal variance with pedigree 0.0052, pedigree (2,4,3,1,1)
  (same comment as for atrazine)
  properties: carbon content, fossil 0.344995, dry mass 1 kg, wet mass 1 kg
- organophosphorus-compound, unspecified: 2.33918e-5 kg; lognormal variance with pedigree 0.0052, pedigree (2,4,3,1,1)
  (same comment as for atrazine)
  properties: carbon content, fossil 0.260898, dry mass 1 kg, wet mass 1 kg
- packaging, for fertilisers: 0.00643275 kg; lognormal variance with pedigree 0.0532, pedigree (4,3,3,5,4)
  Total amount of active substance/s of fertilisers needed for the production of 'sugarcane' is calculated to be circa 3.22E-03 kg. Fertiliser/s used in this dataset is/are: 'nitrogen fertiliser, as N', 'phosphate fertiliser, as P2O5', 'urea, as N'. The total amount of active substance/s is doubled in order to account for the packaging of the dilluted product of fertiliser/s that is/are applied. Therefore, 6.43E-03 kg of packaging for fertilisers is justified with this exchange.
  properties: carbon content, fossil 0.825301, dry mass 1 kg, heating value, net 25.01 MJ, price 0.0642 EUR2005, wet mass 1 kg
  note on carbon content, fossil: Considering a chemical formula (C2H4)n for polyethylene, carbon content-fossil is calculated to be 0.856286 kg of Carbon per kg of dry mass.
- packaging, for pesticides: 0.00027076 kg; lognormal variance with pedigree 0.0532, pedigree (4,3,3,5,4)
  Total amount of active substance/s of pesticides needed for the production of sugarcane is calculated to be circa 1.35E-04 kg. Pesticide/s used in this dataset is/are: 'atrazine', 'cyclic N-compound', 'nitrile-compound', 'organophosphorus-compound, unspecified'. The total amount of active substance/s is doubled in order to account for the packaging of the dilluted product of pesticide/s that is/are applied. Therefore, 2.71E-04 kg of packaging for pesticides is justified with this exchange.
  properties: carbon content, fossil 0.85714, dry mass 1 kg, heating value, net 25.97 MJ, price 0.0642 EUR2005, wet mass 1 kg
- tillage, ploughing: 1.56311e-5 ha; lognormal variance with pedigree 0.0052, pedigree (2,4,3,1,1)
  (same comment as for atrazine)
- tillage, rotary cultivator: 4.08046e-5 ha; lognormal variance with pedigree 0.0052, pedigree (2,4,3,1,1)
  (same comment as for atrazine)
- trellis system, wooden poles, soft wood, tar impregnated: 1.16959e-5 ha; lognormal variance with pedigree 0.0052, pedigree (2,4,3,1,1)
  (same comment as for atrazine)
- urea: 0.00168495 kg; lognormal variance with pedigree 0.0052, pedigree (2,4,3,1,1)
  The exchange has been updated from 'urea, as N' into 'urea' and therefore its amount has been scaled (multiplied) from 0.0008 kg by 2.1438 kg of 'urea' per kg of 'urea, as N'. Original comment of the exchange is: The data was collected for a hectare area through interview
  properties: carbon content, fossil 0.2, dry mass 1 kg, wet mass 1 kg

## Inputs from nature
- Carbon dioxide, in air [natural resource, in air]: 0.393351 kg; lognormal variance with pedigree 0.0052, pedigree (2,4,3,1,1)
  (same comment as for atrazine)
- Energy, gross calorific value, in biomass [natural resource, biotic]: 4.52354 MJ; lognormal variance with pedigree 0.0052, pedigree (2,4,3,1,1)
  (same comment as for atrazine)
- Occupation, permanent crop, irrigated [natural resource, land]: 0.116959 m2*year; lognormal variance with pedigree 0.0126, pedigree (2,4,3,1,1)
  (same comment as for atrazine)
- Transformation, from permanent crop, irrigated [natural resource, land]: 0.0389864 m2; lognormal variance with pedigree 0.0126, pedigree (2,4,3,1,1)
  (same comment as for atrazine)
- Transformation, to permanent crop, irrigated [natural resource, land]: 0.0389864 m2; lognormal variance with pedigree 0.0126, pedigree (2,4,3,1,1)
  (same comment as for atrazine)

## Emissions to nature
- Ammonia [air, non-urban air or from high stacks]: 0.000315639 kg; lognormal variance with pedigree 0.0126, pedigree (2,4,3,1,1)
  (same comment as for atrazine)
- Carbon dioxide, fossil [air, non-urban air or from high stacks]: 0.00123476 kg; lognormal variance with pedigree 0.0052, pedigree (2,4,3,1,1)
  (same comment as for atrazine)
- Dinitrogen monoxide [air, non-urban air or from high stacks]: 4.35607e-5 kg; lognormal variance with pedigree 0.0346, pedigree (2,4,3,1,1)
  (same comment as for atrazine)
- Nitrogen oxides [air, non-urban air or from high stacks]: 0.000133057 kg; lognormal variance with pedigree 0.0086, pedigree (2,4,3,1,1)
  (same comment as for atrazine)
- Water [air, non-urban air or from high stacks]: 0.00644211 m3; lognormal variance with pedigree 0.0052, pedigree (2,4,3,1,1)
  (same comment as for atrazine)
- Atrazine [soil, agricultural]: 2.33918e-5 kg; lognormal variance with pedigree 0.0376, pedigree (2,4,3,1,1)
  (same comment as for atrazine)
- Cadmium II [soil, agricultural]: 7.34602e-8 kg; lognormal variance with pedigree 0.0446, pedigree (2,4,3,1,1)
  (same comment as for atrazine)
- Chlorpyrifos [soil, agricultural]: 2.33918e-5 kg; lognormal variance with pedigree 0.0376, pedigree (2,4,3,1,1)
  (same comment as for atrazine)
- Chromium III [soil, agricultural]: 2.81847e-7 kg; lognormal variance with pedigree 0.0446, pedigree (2,4,3,1,1)
  (same comment as for atrazine)
- Clothianidin [soil, agricultural]: 8.77193e-7 kg; lognormal variance with pedigree 0.0376, pedigree (2,4,3,1,1)
  (same comment as for atrazine)
- Copper ion [soil, agricultural]: 8.76597e-7 kg; lognormal variance with pedigree 0.0446, pedigree (2,4,3,1,1)
  (same comment as for atrazine)
- Fipronil [soil, agricultural]: 8.77193e-5 kg; lognormal variance with pedigree 0.0376, pedigree (2,4,3,1,1)
  (same comment as for atrazine)
- Lead II [soil, agricultural]: -1.25241e-7 kg
  (same comment as for atrazine)
- Mercury II [soil, agricultural]: 6.00545e-9 kg; lognormal variance with pedigree 0.0446, pedigree (2,4,3,1,1)
  (same comment as for atrazine)
- Mineral oil [soil, agricultural]: 0.000116959 kg; lognormal variance with pedigree 0.0376, pedigree (2,4,3,1,1)
  Corazon (10.0)
- Nickel II [soil, agricultural]: -3.29491e-8 kg
  (same comment as for atrazine)
- Zinc II [soil, agricultural]: 4.27709e-6 kg; lognormal variance with pedigree 0.0446, pedigree (2,4,3,1,1)
  (same comment as for atrazine)
- Cadmium II [water, ground-]: 5.43504e-10 kg; lognormal variance with pedigree 0.0946, pedigree (2,4,3,1,1)
  (same comment as for atrazine)
- Cadmium II [water, surface water]: 3.20339e-9 kg; lognormal variance with pedigree 0.0946, pedigree (2,4,3,1,1)
  (same comment as for atrazine)
- Chromium III [water, ground-]: 2.37956e-7 kg; lognormal variance with pedigree 0.0946, pedigree (2,4,3,1,1)
  (same comment as for atrazine)
- Chromium III [water, surface water]: 3.32157e-7 kg; lognormal variance with pedigree 0.0946, pedigree (2,4,3,1,1)
  (same comment as for atrazine)
- Copper ion [water, ground-]: 4.16767e-8 kg; lognormal variance with pedigree 0.0946, pedigree (2,4,3,1,1)
  (same comment as for atrazine)
- Copper ion [water, surface water]: 2.85728e-7 kg; lognormal variance with pedigree 0.0946, pedigree (2,4,3,1,1)
  (same comment as for atrazine)
- Lead II [water, ground-]: 3.95036e-9 kg; lognormal variance with pedigree 0.0946, pedigree (2,4,3,1,1)
  (same comment as for atrazine)
- Lead II [water, surface water]: 1.57647e-7 kg; lognormal variance with pedigree 0.0946, pedigree (2,4,3,1,1)
  (same comment as for atrazine)
- Mercury II [water, ground-]: 1.46922e-11 kg; lognormal variance with pedigree 0.0946, pedigree (2,4,3,1,1)
  (same comment as for atrazine)
- Mercury II [water, surface water]: 1.01305e-9 kg; lognormal variance with pedigree 0.0946, pedigree (2,4,3,1,1)
  (same comment as for atrazine)
- Nickel II [water, surface water]: 2.96245e-7 kg; lognormal variance with pedigree 0.0946, pedigree (2,4,3,1,1)
  (same comment as for atrazine)
- Nitrate [water, ground-]: 0.00140524 kg; lognormal variance with pedigree 0.0446, pedigree (2,4,3,1,1)
  (same comment as for atrazine)
- Phosphate [water, ground-]: 2.51033e-6 kg; lognormal variance with pedigree 0.0446, pedigree (2,4,3,1,1)
  (same comment as for atrazine)
- Phosphate [water, surface water]: 8.50374e-6 kg; lognormal variance with pedigree 0.0446, pedigree (2,4,3,1,1)
  (same comment as for atrazine)
- Phosphorus [water, surface water]: 2.95079e-5 kg; lognormal variance with pedigree 0.0446, pedigree (2,4,3,1,1)
  (same comment as for atrazine)
- Water [water, ground-]: 0.00492632 m3; lognormal variance with pedigree 0.0052, pedigree (2,4,3,1,1)
  (same comment as for atrazine)
- Water [water, surface water]: 0.00126316 m3; lognormal variance with pedigree 0.0052, pedigree (2,4,3,1,1)
  (same comment as for atrazine)
- Zinc II [water, ground-]: 3.57958e-7 kg; lognormal variance with pedigree 0.0946, pedigree (2,4,3,1,1)
  (same comment as for atrazine)
- Zinc II [water, surface water]: 6.60641e-7 kg; lognormal variance with pedigree 0.0946, pedigree (2,4,3,1,1)
  (same comment as for atrazine)

## Sampling procedure
The farmer was identified and contacted by agriculture science faculty familiar with the local farmers in the region. Data was collected directly from the farmer through semi-structured interview using a questionnaire based on the input requirements of the ecoinvent LCI calculation tool for crop production. The farmer does not maintain any written records and has provided the data from recent memory. In this region, typically farmers are unable to provide exact name of active ingredient in the pesticide they use and the same was noted from details given on the pesticide packet. Individual farmer is not able to calculate fuel consumption for his own farm alone and this information has been collected from farming community of the area.

## Extrapolations
Ecoinvent LCI calculation tool for crop production was used to calculate field emissions from the cultivation process.
