# cement production, Portland

Dataset: EcoSpold 2, unit process
Geography: BR
Time period: 2016-01-01 to 2023-12-31
Technology level: current
Classification: ISIC rev.4 ecoinvent: 2394:Manufacture of cement, lime and plaster
Synonyms: CP V-ARI; Portland cement; CEM I
Scenario: Business-as-Usual
System model: Allocation, cut-off by classification
Share of production covered: 70 %
Generated by: Fernanda Belizario Silva
Published in: Silva, F. B. 2017
Database: ecoinvent
isCopyrightProtected: true
accessRestrictedTo: 1

## General comment
The dataset describes the production of high early strength Portland cement in Brazil (CP-V-ARI), complying with ABNT NBR 5733:1991. CP-V-ARI was chosen to represent Portland cement, since Ordinary Portland Cement (CP I) is not commercialized in Brazil.
According to ABNT NBR 5733:1991, CP-V-ARI is a hydraulic binder that meets the requirements for high early strength (34 MPa after 7 days), produced by the grinding of clinker, to which one or more forms of calcium sulphate (e.g. gypsum) is added, During grinding, it is possible to add carbonaceous materials (filler) to this mixture, in the proportions indicated by this standard (see composition in the table below).
Six main types of Portland and blended cements represent Brazilian production. The table below presents the different cement types and compositions according to Brazilian standards (NBR 11578:1991, NBR 5735:1991, NBR 5736:1991, NBR 5733:1991).
CP V represents 8.5% of the market according to the National Union of the Cement Industry (SNIC, 2013). 50% of it is assumed to be standard high early strength (CP-V-ARI) and the other 50% is assumed to be sulphate resistant (CP-V-RS). Its application include structural reinforced concrete, concrete artifacts, prestressed concrete, and post-tensioned concrete to industrial flooring.
This dataset contains information from clinker stockpile to cement ready to be shipped in bulk. After the clinker is cooled from the rotary kiln, it is ground in ball or roller mills to particles under 75 μm size. Then it goes to silos where it is mixed with calcium sulphate (gypsum) and filler materials, such as milled limestone. The mixed cement goes to a finishing mill and then it is stored in cement silos, ready to be shipped in bulk or packed.
Primary data were gathered from six cement manufacturers in Brazil, who informed the total values of inputs and outputs related to cement production in 2016, considering all their cement production sites. All types of flows were reported, namely: primary and secondary raw materials and fuels, auxiliary materials, electricity and water consumption. It corresponds to 70% market share, considered a good representativeness level. Although particulate emissions may occur, they are not reported due to lack of specific data for the cement grinding step (air emissions are monitored for the integrated clinker-cement plant as a whole and reported in the clinker production process).

## Included activities start
The activity starts with the reception of raw materials in the cement plant. In plants which are integrated with clinker production, clinker is stored in the silo after cooling in the upstream process (clinker production /BR).

## Included activities end
The activity includes the drying of raw materials, the grinding and mixing of raw materials for cement production in the cement mill (with grinding aids) and ends with cement stored in silos, ready to be shipped. Particulate emission is not considered due to the lack of data. The dataset does not include packaging and administration.

## Geography
This dataset represents production of Portland cement for Brazil.

## Technology
Current technology for cement production in Brazil.

## Time period
Time period corresponds to data collection period (2016).

## Reference product
- cement, Portland: 1 kg; name cement; source Werner F. 2014; By-product classification allocatable product; CPC 37440: Portland cement, aluminous cement, slag cement and similar hydraulic cements, except in the form of clinkers; HS2017 252329: Cement; portland, other than white, whether or not artificially coloured; CAS 65997-15-1
  Cement’s bulk density ranges from 2,8 g/cm³ to 3,2 g/cm³.
  production volume 2.312e9 kg; name APV_cement; = 54400*10^6*0.085/2
    Total production volume of hydraulic cement in Brazil in 2019: 54'400'000 ton. Source: USGS (2019). U.S. Geological Survey, Minerals Yearbook Annual Tables, 2019. Available at: https://www.usgs.gov/centers/national-minerals-information-center/cement-statistics-and-information
    The share of CP-V (8,5%) in the market was applied to the total cement production in 2013, divided equally between CP-V-ARI (4,25%), considered here as Portland cement, and CP-V-RS (4,25%). Data provided by SNIC (2016).
  property price 0.0541 EUR2005
    2005 import and export prices (total trades (USD) divided by total weight (kg) in China, India, USA, Japan, Russia and Europe, major producers and consumers (http://www.cementchina.net/freport/showfre.asp?id=749) from UN Commodity Trade Statistics Database (http://data.un.org/Explorer.aspxDatabase [Accessed 2 July 2010]). Commodity: Portland cement, other than white cement
  properties: carbon allocation 0 kg, carbon content 0, carbon content, fossil 0, carbon content, non-fossil 0, dry mass 1 kg, water content 0, water in wet mass 0 kg, wet mass 1 kg

## Inputs from technosphere
- cement factory: 2.73e-11 unit; = 2.73E-11*cement; source Werner F. 2014; lognormal variance with pedigree 0.32, pedigree (3,5,4,5,1)
  Literature value from the dataset cement production, Portland /CH (accessed 20170810)
  Uncertainty: V
- clinker: 0.889 kg; = 0,889* cement; lognormal variance with pedigree 0.0011, pedigree (2,2,2,1,1)
  Measured value. Weighted average of values informed by manufacturers. Raw material for cement production.
  Uncertainty: B
  properties: dry mass 1 kg, wet mass 1 kg
- diethylene glycol: 0.00066 kg; = 6,60e-04*cement; lognormal variance with pedigree 0.2989, pedigree (2,2,2,1,1)
  Measured value. Weighted average of values informed by manufacturers. Grinding aid for cement production.
  Uncertainty: B
  properties: carbon content, fossil 0.45283, dry mass 1 kg, heating value, net 25.14 MJ, wet mass 1 kg
- electricity, medium voltage: 0.051 kWh; = 0,051*cement; lognormal variance with pedigree 0.0219, pedigree (2,2,2,1,1)
  Measured value. Weighted average of values informed by manufacturers. Electricity for grinding and factory operation.
  Uncertainty: B
- gypsum, mineral: 0.065 kg; = (0,062+0,003)* cement; lognormal variance with pedigree 0.0269, pedigree (2,2,2,1,1)
  Measured value. Weighted average of values informed by manufacturers. 0,062 kg is mineral gypsum (primary raw material) and 0,003 kg is phosphogypsum (secondary raw material, by-product of phosphoric acid production); "gypsum, mineral" is used as proxy because phosphogypsum was not available in the ecoinvent database during dataset development.
  Uncertainty: B
  properties: dry mass 1 kg, wet mass 1 kg
- heat, district or industrial, natural gas: 0.00503 MJ; = 5,03e-3*cement; lognormal variance with pedigree 3.0979, pedigree (2,2,2,1,1)
  Measured value. Weighted average of values informed by manufacturers. Heat for drying of raw materials.
  Uncertainty: B
  properties: heating value, net 1 MJ
- heat, district or industrial, other than natural gas: 0.0155 MJ; = 1,55e-2*cement; lognormal variance with pedigree 2.2229, pedigree (2,2,2,1,1)
  (same comment as for heat, district or industrial, natural gas)
  properties: corresponding fuel use, propane, furnace >100kW 1.05263 MJ, heating value, net 1 MJ
  note on corresponding fuel use, propane, furnace >100kW: Lower heating value of the fuel input related to the heat/electricity output, taken directly from ecoinvent v3.0 dataset "heat production, natural gas, at industrial furnace >100kW, GLO 2000".
- limestone, crushed, for mill: 0.046 kg; = 0,046*cement; lognormal variance with pedigree 0.0129, pedigree (2,2,2,1,1)
  (same comment as for clinker)
  properties: carbon content, fossil 0.117492, dry mass 1 kg, wet mass 1 kg
- lubricating oil: 5.46e-6 kg; name oil; = 5,46e-6*cement; lognormal variance with pedigree 0.5019, pedigree (2,2,2,1,1)
  Measured value. Weighted average of values informed by manufacturers. Maintenance of process equipment.
  Uncertainty: B
  properties: carbon content, fossil 0.75, dry mass 1 kg, heating value, net 40.2 MJ, wet mass 1 kg
  note on carbon content, fossil: Lubricating oil is produced from diesel. C-content/dry mass of fats and oils considered 75%, from: ecoinvent v2.2 report, n 15a, pg 40
  note on heating value, net: Literature value, Source: IPCC 2006, 2006 IPCC Guidelines for National Greenhouse Gas Inventories, Prepared by the National Greenhouse Gas Inventories Programme, Eggleston H.S., Buendia L., Miwa K., Ngara T. and Tanabe K. (eds). Published: IGES, Japan
- scrap steel: -7.11e-5 kg; = steel; lognormal variance with pedigree 0.4057, pedigree (2,2,1,1,1)
  Estimation based on corresponding input.
  Uncertainty: B
  production volume; = APV_cement * (steel / cement)
    Calculated from production volume of reference product using the relative outputs.
  properties: carbon content, fossil 0.005, dry mass 1 kg, wet mass 1 kg
- steel, low-alloyed: 7.11e-5 kg; name steel; = 7,11E-05*cement; lognormal variance with pedigree 0.4059, pedigree (2,2,2,1,1)
  Measured value. Weighted average of values informed by manufacturers. Replacement of wearing parts of process equipment.
  Uncertainty: B
  property carbon content, fossil 0.005; name C_content_fossil
  property carbon content, non-fossil 0; name C_content_non_fossil
  property dry mass 1 kg; name DM
  property water content 0; name water_content
  property water in wet mass 0 kg; name WWM
  property wet mass 1 kg; name WM
- synthetic rubber: 8.78e-6 kg; name rubber; = 8,78e-6*cement; lognormal variance with pedigree 0.6669, pedigree (2,2,2,1,1)
  (same comment as for steel, low-alloyed)
  properties: carbon content, fossil 0.871949, dry mass 1 kg, heating value, net 26.42 MJ, wet mass 1 kg
  note on carbon content, fossil: EPDM (Ethylene-propene-diene terpolymer) rubber is a terpolymer of ethylene, propene, and a diene with the residual unsaturated portion of the diene in the side chain (ecoinvent v2.2 report 7-part XX & Ullmann). Chemical formula (deduced from Evidences of Solvent-Induced Miscibility in Polychloroprene-co-Ethylene-Propene Diene Terpolymer Blends, Dubey et al., Journal of Applied Polymer Science, 2009, 111:1884-1891): C20H35
- tap water: 0.00145 kg; name tap_water; = 1,45e-3*cement; lognormal variance with pedigree 0.6789, pedigree (2,2,2,1,1)
  Measured value. Weighted average of values informed by manufacturers. Water for sanitary purposes.
  Uncertainty: B
  properties: carbon content, fossil 0.00178991, dry mass 0.000337476 kg, water content 2962.17, wet mass 1 kg
  note on carbon content, fossil: Bicarbonate content is 2.93 mol/m3. CO2 content is 0.1 mol/m3 (ecoinvent v2.2 report 8, Tab 93.1).
- waste mineral oil: -5.46e-6 kg; = oil; lognormal variance with pedigree 0.5017, pedigree (2,2,1,1,1)
  Estimation based on corresponding input.
  Uncertainty: B
  production volume; = APV_cement * (oil / cement)
    Calculated from production volume of reference product using the relative outputs.
  properties: carbon content, fossil 0.864444, dry mass 0.9 kg, heating value, net 34.7 MJ, water content 0.111111, wet mass 1 kg
  note on carbon content, fossil: Tab A.6, ecoinvent v2.2 report 13_I. C content has been calculated after data in the tables, and then referred to 1 kg DM
  note on heating value, net: Value taken from the general comment of the treatment dataset.
- waste rubber, unspecified: -8.78e-6 kg; = rubber; lognormal variance with pedigree 0.6667, pedigree (2,2,1,1,1)
  Estimation based on corresponding input.
  Uncertainty: B
  production volume; = APV_cement * (rubber / cement)
    Calculated from production volume of reference product using the relative outputs.
  properties: carbon content, fossil 0.853, dry mass 1 kg, heating value, net 27.19 MJ, wet mass 1 kg
- wastewater, average: -1.45e-6 m3; name wastewater; = 1,45e-6*cement; lognormal variance with pedigree 0.6787, pedigree (2,2,1,1,1)
  Estimation. Calculated as: (tap_water/1000)* cement. All tap water was considered to leave the process as an effluent.
  Uncertainty: B
  production volume; = APV_cement * (wastewater / cement)
    Calculated from production volume of reference product using the relative outputs.
  properties: carbon content, non-fossil 0.194039, dry mass 0.346837 kg, water content 2882.2, wet mass 1000 kg
  note on carbon content, non-fossil: 0.0673 kg TOC/m3 (Tab A.17, ecoinvent v2.2 report 13_I). TOC was considered as Total Carbon.
- water, harvested from rainwater: 0.00397 kg; name rainwater_input; = 3,97e-3*cement; lognormal variance with pedigree 1.6299, pedigree (2,2,2,1,1)
  Measured value. Weighted average of values informed by manufacturers. Water for equipment cooling and dust control.
  Uncertainty: B
  properties: carbon content, fossil 0.0017899, dry mass 0.00034 kg, water content 2940.18, wet mass 1 kg

## Inputs from nature
- Water, river [natural resource, in water]: 0.000124 m3; name water_river_input; = 1,24e-4*cement; lognormal variance with pedigree 0.2749, pedigree (2,2,2,1,1)
  (same comment as for water, harvested from rainwater)
- Water, unspecified natural origin [natural resource, in water]: 2.03e-6 m3; name water_unsp_input; = 2,03e-6*cement; lognormal variance with pedigree 1.7169, pedigree (2,2,2,1,1)
  (same comment as for water, harvested from rainwater)
- Water, well, in ground [natural resource, in water]: 5.65e-5 m3; name water_well_input; = 5,65e-5*cement; lognormal variance with pedigree 0.4149, pedigree (2,2,2,1,1)
  (same comment as for water, harvested from rainwater)

## Emissions to nature
- Water [air, unspecified]: 0.000187 m3; = 1,87e-4*cement; lognormal variance with pedigree 0.1069, pedigree (2,2,2,1,1)
  Estimation. Calculated as: ( water_unsp_input+ water_well_input+ water_river_input+ (rainwater_input/1000))*cement. All water input except for tap water was considered to leave the system as evaporated water, as water is used for cooling.
  Uncertainty: B

## Sampling procedure
Data represent circa 70% of the Brazilian cement production in 2016, which is considered a good representativeness level. Raw materials flows are the weighted average of the cement composition informed by each cement manufacturer. The weighing factor used is the total cement production volume, since manufacturers did not report the production volumes of each cement type due to confidentiality. Basic uncertainty was calculated based on the sample"s weighted standard deviation and represents variation of composition between manufacturers/factories. For other input flows (grinding aids, materials for equipment maintenance, fuels, electricity, water consumption), the weighted average of each manufacturer"s unit flows was calculated. Except for the grinding aids, all other flows are not distinguished by cement type, as their consumption is reported for the whole cement plant, which usually produces more than one cement type. Data were provided by six cement manufacturers, via confidential questionnaires, regarding the production of cement during the year of 2016. Water consumption was usually reported for the whole integrated cement plants (clinker + cement production operations). Based on literature and expert opinion, the total water volume was divided equally between the clinker and the cement production processes and then converted into unit flows. Raw materials and fuel inputs were considered to be dry. As water is mainly used for cooling and dust control, it was considered that all water evaporates, except for the "tap water" input, which was considered to be used as drinking water and whose output is modelled as an effluent. Fuel consumption was informed by manufacturers in terms of volume or mass. They were converted into energy using their lower heating values and modelled as a heat input, to simplify the dataset and allow the consideration of corresponding air emissions. Infrastructure input flow (cement factory) was extrapolated from "cement Portland/CH" dataset (accessed 08.10.2017). The amounts of the exchanges were calculated considering the weighted average of the sample. No conversion to the geometric mean of the lognormal distribution was done, for consistency reasons with other ecoinvent datasets.

## Extrapolations
Data represent 70% of Brazilian cement production. This sample is extrapolated to represent the production in the whole country. The main values are considered representative for a typical production of Portland cement in Brazil.
