# train production, passenger, regional

Dataset: EcoSpold 2, unit process
Geography: CH
Time period: 2000-01-01 to 2023-12-31
Technology level: current
Classification: ISIC rev.4 ecoinvent: 3020:Manufacture of railway locomotives and rolling stock
Classification: EcoSpold01Categories: transport systems/train
Scenario: Business-as-Usual
System model: Allocation, cut-off by classification
Generated by: Michael Spielmann (obsolete)
Published in: Spielmann M. 2004
Database: ecoinvent
isCopyrightProtected: true
accessRestrictedTo: 1

## General comment
The dataset represents the production of a regional train in Switzerland with a total weight of 171t and a life span of 40 years.

## Included activities start
Service starts with the material consumption for the production of the regional train.

## Included activities end
The dataset ends with the production of one regional train. The dataset includes material consumption, transport, energy and fuel consumption. The disposal of the regional train is included as well.

## Geography
Manufacturing data represents a train produced in Europe.

## Technology
In this study, a common SBB-regional transport train the “Kolibri” is modelled. The total weight of a Kolibri is 171 t. For a composition of such weight, 271 seats are offered. The average load is 17% (46 passengers). The yearly vehicle kilometre performance is 150’000 vkm. In this project is assumed a life span of 40 years, resulting in a total lifetime kilometric performance of 6’000’000 vkm and a life time transport performance of 276’000’000 pkm. Estimates for energy consumption for manufacturing is taken from Frischknecht (1996) assuming an electricity consumption and light fuel oil consumption of 2.7 MJ/kg material and 3.8 MJ/kg material, respectively.
References:
Frischknecht R., Bollens U., Bosshart S., Ciot M., Ciseri L., Doka G., Dones R., Gantner U. and Hischier R. (1996) Ökoinventare von Energiesystemen: Grundlagen für den ökologischen Vergleich von Energiesystemen und den Einbezug von Energiesystemen in Ökobilanzen für die Schweiz. Auflage No. 3. Gruppe Energie - Stoffe - Umwelt (ESU), Eidgenössische Technische Hochschule Zuerich und Sektion Ganzheitliche Systemanalysen, Paul Scherrer Institut, Villigen, Bundesamt für Energie (Hrsg.), Bern

## Reference product
- train, passenger, regional: 1 unit; name RP_amount_1; By-product classification allocatable product; CPC 49520: Self-propelled railway or tramway coaches, vans and trucks (except maintenance or service vehicles); HS2017 8603: Railway or tramway coaches, vans and trucks; self-propelled tenders, other than those of heading no. 8604
  EcoSpold01Location=CH
  production volume 0.0336675 unit; name RP_PV_1
    This is a placeholder value that does not reflect real-world production volumes. This dataset does not currently require a real-world production volume to work in the database framework, and no actual data were collected yet. This has no negative effect on the results of the ecoinvent database. The placeholder value of this activity was scaled according to the nominal GDP of 2005 (source: United Nations, http://data.un.org/Glossary.aspx?q=GDP+%28current+US%24%29, accessed 20130726) to reflect an appropriate share of the global production volume, which is also a placeholder value.
  property price 196920 EUR2005
    Calculated based on literature value (UN Commodity Trade Statistics Database) using data on trade value and net weight (kg) for 5 reference countries/regions (RER, USA, JP, CN and IN) which average is assumed to be a good approximation of the global price. The weight of the train is assumed to be 171t.
  properties: carbon allocation 0 kg, carbon content 0

## Inputs from technosphere
- alkyd paint, white, without solvent, in 60% solution state: 1280 kg; lognormal variance with pedigree 0.0586, pedigree (4,3,5,1,1)
  Literature studies.
  EcoSpold01Location=RER
  Uncertainty: literature studies
  properties: carbon content, fossil 0.140367, carbon content, non-fossil 0.199629, dry mass 1 kg, heating value, net 10.3 MJ, wet mass 1 kg
  note on carbon content, fossil: C content was calculated as an addition of C content in the raw materials.
- aluminium, cast alloy: 3200 kg; = 0.32*10000; lognormal variance with pedigree 0.0586, pedigree (4,3,5,1,1)
  10000 kg aluminium, production mix. Literature studies.
  0.32: part of aluminium cast alloy in aluminium, production mix. Based on the aluminium, production mix in ecoinvent v2.2.
  Uncertainty: literature studies
  properties: dry mass 1 kg, wet mass 1 kg
- aluminium, wrought alloy: 6800 kg; = 0.68*10000; lognormal variance with pedigree 0.0586, pedigree (4,3,5,1,1)
  10000 kg aluminium, production mix. Literature value. Literature studies.
  0.68: part of aluminium, wrought alloy in aluminium, production mix. Based on the aluminium, production mix in ecoinvent v2.2.
  Uncertainty: literature studies
  properties: dry mass 1 kg, wet mass 1 kg
- copper, cathode: 7000 kg; lognormal variance with pedigree 0.0586, pedigree (4,3,5,1,1)
  Literature studies.
  EcoSpold01Location=RER
  Uncertainty: literature studies
  properties: dry mass 1 kg, wet mass 1 kg
- electricity, medium voltage: 128000 kWh; source Frischknecht R. 1996; lognormal variance with pedigree 0.1786, pedigree (4,3,5,1,1)
  Calculated value. Estimates for energy consumption for manufacturing is taken from Frischknecht (1996) assuming an electricity consumption of 2.7 MJ/kg material.
  EcoSpold01Location=CH
  Uncertainty: literature studies; value represents a rough estimate (basic uncertainty =2)
- flat glass, uncoated: 7230 kg; lognormal variance with pedigree 0.0586, pedigree (4,3,5,1,1)
  EcoSpold01Location=RER
  Literature studies.
  Uncertainty: literature studies
  properties: dry mass 1 kg, wet mass 1 kg
- glued laminated timber, MUF-glue: 4.335 m3; lognormal variance with pedigree 0.0586, pedigree (4,3,5,1,1)
  Literature studies. The split between PUR-glue and MUF-glue glued laminated timber is made based on the Swiss relative production volumes for the products.
  EcoSpold01Location=RER
  Uncertainty: literature studies
  properties: carbon content, fossil 0.01638, carbon content, non-fossil 0.442689, dry mass 403.64 kg, heating value, net 5517.96 MJ, price 298 EUR2005, water content 0.0975126, wet mass 443 kg
- glued laminated timber, PUR-glue: 4.335 m3; lognormal variance with pedigree 0.0586, pedigree (4,3,5,1,1)
  Literature studies. The split between PUR-glue and MUF-glue glued laminated timber is made based on the Swiss relative production volumes for the products.
  properties: carbon content, fossil 0.00801, carbon content, non-fossil 0.446904, dry mass 399.46 kg, heating value, net 5409.08 MJ, price 298 EUR2005, water content 0.0989836, wet mass 439 kg
- heat, district or industrial, other than natural gas: 180000 MJ; lognormal variance with pedigree 0.1786, pedigree (4,3,5,1,1)
  EcoSpold01Location=CH
  Literature studies.
  Uncertainty: literature studies; value represents a rough estimate (basic uncertainty =2)
  properties: heating value, net 1 MJ
- lead: 1450 kg; lognormal variance with pedigree 0.0586, pedigree (4,3,5,1,1)
  EcoSpold01Location=RER
  Uncertainty: literature studies
  properties: dry mass 1 kg, wet mass 1 kg
- polyethylene, high density, granulate: 13000 kg; lognormal variance with pedigree 0.05, pedigree (1,1,5,1,1)
  EcoSpold01Location=RER
  Literature studies.
  properties: carbon content, fossil 0.857143, dry mass 1 kg, heating value, net 42.47 MJ, wet mass 1 kg
  note on carbon content, fossil: Polyethylene is formed out of a huge amount of ethylene monomers (C2H4) (ecoinvent v2.2 report 11_II). MW=28 g/mol
- reinforcing steel: 114000 kg; lognormal variance with pedigree 0.0586, pedigree (4,3,5,1,1)
  EcoSpold01Location=RER
  Literature studies.
  Uncertainty: literature studies
  properties: carbon content, fossil 0.004, dry mass 1 kg, wet mass 1 kg
- stone wool, packed: 1280 kg; lognormal variance with pedigree 0.0586, pedigree (4,3,5,1,1)
  Literature studies.
  EcoSpold01Location=CH
  Uncertainty: literature studies
  properties: carbon content, fossil 0.015401, dry mass 1 kg, wet mass 1 kg
  note on carbon content, fossil: The chemical composition of the glass fibres used in the rock wool production is similar to the composition of naturally cooled volcano basalt and has a composition listed in Tab. 3.1 and 3.2 in ecoinvent v2.2 report 16, part XIV. Rock wool contains: a minimum of 96% mineral fibres,between 0.5 and 3.0 weight percent of phenolic resin depending on the specific product characteristics, and about 0.2 percent mineral oil (ecoinvent v2.2 report 16, part XIV). An average composition of 1.8% phenolic resin, 0.2% mineral oil, and 98% mineral fibres has been assumed and used to calculate C content of the rock wool
- used train, passenger, regional: -1 unit; name BP_amount_1; lognormal variance with pedigree 0.3, pedigree (1,1,1,1,1)
  production volume; = RP_PV_1 * (BP_amount_1 / RP_amount_1)
    Calculated from production volume of reference product using the relative outputs.
  property carbon content, fossil 0.0691852; name C_content_fossil
  property carbon content, non-fossil 0.0107248; name C_content_non_fossil
  property dry mass 171000 kg; name DM
  property water content 0; name water_content
  property water in wet mass 0 kg; name WWM
  property wet mass 171000 kg; name WM

## Sampling procedure
The data of the material composition and energy consumption is based on oral communication with an expert of one company and literature studies.

## Extrapolations
This train type is used as an estimate for the entire regional train fleet.

## Review by Niels Jungbluth 2004-04-01
Passed.

## Review by Roland Hischier 2011-09-23
Transfer of documentation done.
--> Sources of Exchanges partly missing !

## Review by Carl Vadenbo 2012-06-29
In preparation for the release of ecoinvent v3.0, exchange for disposal of used regional train was added to 'train production, passenger, regional, GLO/CH 2000'. The amounts and the uncertainty information of the exchanges were reviewed and were found to correspond to the disaggregated datasets, and the dataset was accepted for inclusion into the ecoinvent database on 2012.07.04.
