# dewatering of ethanol from biomass, from 95% to 99.7% solution state

Dataset: EcoSpold 2, unit process
Geography: CN
Time period: 1992-01-01 to 2023-12-31
Technology level: current
Classification: ISIC rev.4 ecoinvent: 2011:Manufacture of basic chemicals
Classification: EcoSpold01Categories: biomass/fuels
Synonyms: ethyl hydrate; algrain; grain alcohol; Ethyl alcohol; Alkohol; Ethanol absolute; Anhydrol; bioethanol; alcohol dehydrated; fermentation alcohol; Ethanol; ethyl hydroxide; ethanol 200 proof; cologne spirits (alcohol); cologne spirit; Denatured alcohol; bio-ethanol
Tags: ConvertedDataset
Scenario: Business-as-Usual
System model: Allocation, cut-off by classification
Share of production covered: 0 %
Generated by: Edgard Gnansounou
Published in: Jungbluth N. 2007
Database: ecoinvent
isCopyrightProtected: true
accessRestrictedTo: 1

## General comment
Inventory refers to the production of 1 kg anhydrous ethanol 99.7% (dry basis, i.e. 1.003 kg anhydrous ethanol 99.7% wet basis). Dehydration is carried out by molecular sieve technology. Ethanol is produced from sweet sorghum, in the average CN context.
[This dataset was already contained in the ecoinvent database version 2. It was not individually updated during the transfer to ecoinvent version 3. Life Cycle Impact Assessment results may still have changed, as they are affected by changes in the supply chain, i.e. in other datasets. This dataset was generated following the ecoinvent quality guidelines for version 2. It may have been subject to central changes described in the ecoinvent version 3 change report (http://www.ecoinvent.org/database/ecoinvent-version-3/reports-of-changes/), and the results of the central updates were reviewed extensively. The changes added e.g. consistent water flows and other information throughout the database. The documentation of this dataset can be found in the ecoinvent reports of version 2, which are still available via the ecoinvent website. The change report linked above covers all central changes that were made during the conversion process.]

## Included activities end
This dataset includes the dehydration of hydrated ethanol (95%) to anhydrous ethanol (99.7%). Hydrated ethanol input is sorghum-based ethanol, produced in the CN context. Treatment of waste streams is included.

## Geography
Data is from the etha+ project (Alcosuisse, CH) and the ASIATIC project (LASEN, CH), adapted to CN context

## Technology
Dehydration is done by molecular sieve technology.

## Time period
Data from 1992 to 2005, current technology

## Parameters
- fraction, cooling water, cooling pond system, to air: 0.032 dimensionless; name fraction_CW_CP_to_air; lognormal variance with pedigree 0.0413, pedigree (2,3,1,3,1)
  Calculated based on literature value (Scown, C.D., 2011, Water Footprint of U.S. Transportation Fuels and supplying information of the article) (Vionnet, S., Quantis Water Database - Technical Report, 2012).
- fraction, cooling water, once-through system, to air: 0.004 dimensionless; name fraction_CW_OT_to_air; lognormal variance with pedigree 0.0413, pedigree (2,3,1,3,1)
  (same comment as for fraction, cooling water, cooling pond system, to air)
- fraction, cooling water, recirculating system, to air: 0.771 dimensionless; name fraction_CW_R_to_air; lognormal variance with pedigree 0.0413, pedigree (2,3,1,3,1)
  (same comment as for fraction, cooling water, cooling pond system, to air)
- fraction, cooling water, to air: 0.3875 dimensionless; name fraction_CW_to_air; = (0.5*fraction_CW_OT_to_air)+(0.5*fraction_CW_R_to_air); lognormal variance with pedigree 0.092025, pedigree (4,4,3,2,4)
  Calculated value based on literature value (see comments of the other parametres present in this dataset) and expert opinion. In the case when no industry/literature data are available about the type of cooling or directly fraction, cooling water, to air specific for the process a default assumption is applied. It is assumed that the once-through cooling system is used in 50% of all cases and recirculating system is used in another 50% of all cases.
- fraction, water, decarbonised, to air: 0.3875 dimensionless; name fraction_WDC_to_air; = fraction_CW_to_air; lognormal variance with pedigree 0.092025, pedigree (4,4,3,2,4)
  Calculated value. See comments in the other parametres present in this dataset. Decarbonised water is considered to be always used as cooling water, thus cooling water fractions to air are applied to all carbonised water input flows to calculate the amount of water consumed in the processes.

## Reference product
- ethanol, without water, in 99.7% solution state, from fermentation: 1 kg; name RP; By-product classification allocatable product; CPC 35491: Biodiesel; HS2017 290511: Alcohols; saturated monohydric, methanol (methyl alcohol); CAS 64-17-5
  EcoSpold01Location=CN
  production volume 0 kg; name PV_RP
    Production volume of ethanol for use as a fuel was 1'500 Ml in 2004 in CN
    3800 million litres at 0.79 kg/l Source: F. O. Licht World Ethanol and Biofuels Report, vol. 4, no. 17 (9 May 2006), p. 395. However, this is assumed to be from corn and wheat, not from bagasse as used as input in this dataset.
  property heating value, net 28.1 MJ
    Based on literature, page 275, Report 17: Jungbluth, N., Chudacoff, M., Dauriat, A., Dinkel, F., Doka, G., Faist Emmenegger, M., Gnansounou, E., Kljun, N., Schleiss, K., Spielmann, M., Stettler, C., Sutter, J. 2007: Life Cycle Inventories of Bioenergy. ecoinvent report No. 17, Swiss Centre for Life Cycle Inventories, Dübendorf, CH.
  property price 0.436 EUR2005
    Calculated using world prices in FAPRI2007, 2009. Agricultural outlook. The prices in 2003 and 2004 were assumed to be the same as the most recent year (2005). (http://www.fapri.missouri.edu/outreach/publications/ag_outlook.asp?current_page=outreach; accessed 22/06/10). Unit conversion from US gallon to kg - 1 gallon = 3.7856 liter * 0.789 kg/liter (ethanol density) = 2.9868 kg (from http://www.peteducation.com/category.cfm?c=0+1305 and http://en.wikipedia.org/wiki/Ethanol accessed 25/6/10).
  properties: carbon allocation 0.521739 kg, carbon content 0.521739, carbon content, fossil 0, carbon content, non-fossil 0.521739, dry mass 1 kg, water content 0, water in wet mass 0 kg, wet mass 1 kg

## Inputs from technosphere
- ammonia, anhydrous, liquid: 1.1039e-8 kg; lognormal variance with pedigree 0.072, pedigree (4,4,5,5,1)
  EcoSpold01Location=RER
  Adapted from the dataset 'wood chips, in cogen 6400kWth, wood', according to actual water, carbon and energy content of the fuel (pressed sorghum bagasse)
  Uncertainty: Adapted from the dataset 'wood chips, in cogen 6400kWth, wood', according to actual water, carbon and energy content of the fuel (pressed sorghum bagasse)
  properties: dry mass 1 kg, wet mass 1 kg
- bagasse, from sweet sorghum: 0.13129 kg; lognormal variance with pedigree 0.0527, pedigree (2,4,5,3,1)
  Calculation, according to energy requirements for dehydration
  EcoSpold01Location=CN
  Uncertainty: Calculation, according to energy requirements for dehydration
  properties: carbon content, non-fossil 0.443, dry mass 0.702 kg, heating value, net 13.8 MJ, water content 0.424501, wet mass 1 kg
  note on carbon content, non-fossil: C content (dry matter basis) is 44.3% (Tab 16.31, ecoinvent v2.2 report 17)
- chemical, organic: 7.7272e-6 kg; lognormal variance with pedigree 0.072, pedigree (4,4,5,5,1)
  EcoSpold01Location=GLO
  Adapted from the dataset 'wood chips, in cogen 6400kWth, wood', according to actual water, carbon and energy content of the fuel (pressed sorghum bagasse)
  Uncertainty: Adapted from the dataset 'wood chips, in cogen 6400kWth, wood', according to actual water, carbon and energy content of the fuel (pressed sorghum bagasse)
  properties: carbon content, fossil 0.628, dry mass 1 kg, heating value, net 19.03 MJ, wet mass 1 kg
  note on carbon content, fossil: This dataset is an unweighted average of 20 organic substances (listed in Tab 88.1, ecoinvent v2.2 report 8, part II), being part of the top100 chemicals included in this database. The C-content has also been calculated as an unweighted average of the C content of the substances composing this dataset.
- chlorine, liquid: 4.4156e-7 kg; lognormal variance with pedigree 0.072, pedigree (4,4,5,5,1)
  Adapted from the dataset 'wood chips, in cogen 6400kWth, wood', according to actual water, carbon and energy content of the fuel (pressed sorghum bagasse)
  EcoSpold01Location=RER
  Uncertainty: Adapted from the dataset 'wood chips, in cogen 6400kWth, wood', according to actual water, carbon and energy content of the fuel (pressed sorghum bagasse)
  properties: dry mass 1 kg, wet mass 1 kg
- ethanol fermentation plant: 5.67e-11 unit; lognormal variance with pedigree 0.3527, pedigree (2,4,5,3,1)
  EcoSpold01Location=CH
  Calculation, according to feed capacity and lifetime of the plant
  Uncertainty: Calculation, according to feed capacity and lifetime of the plant
- ethanol, without water, in 95% solution state, from fermentation: 1 kg
  ethanol from local market
  properties: carbon content, non-fossil 0.521739, dry mass 1 kg, heating value, net 28.1 MJ, wet mass 1 kg
  note on heating value, net: Based on literature, page 275, Report 17: Jungbluth, N., Chudacoff, M., Dauriat, A., Dinkel, F., Doka, G., Faist Emmenegger, M., Gnansounou, E., Kljun, N., Schleiss, K., Spielmann, M., Stettler, C., Sutter, J. 2007: Life Cycle Inventories of Bioenergy. ecoinvent report No. 17, Swiss Centre for Life Cycle Inventories, Dübendorf, CH.
- heat and power co-generation unit, 6400kW thermal, building: 3.2444e-10 unit; lognormal variance with pedigree 0.372, pedigree (4,4,5,5,1)
  EcoSpold01Location=CH
  Adapted from the dataset 'wood chips, in cogen 6400kWth, wood', according to actual water, carbon and energy content of the fuel (pressed sorghum bagasse)
  Uncertainty: Adapted from the dataset 'wood chips, in cogen 6400kWth, wood', according to actual water, carbon and energy content of the fuel (pressed sorghum bagasse)
- heat and power co-generation unit, 6400kW thermal, common components for heat+electricity: 1.2991e-9 unit; lognormal variance with pedigree 0.372, pedigree (4,4,5,5,1)
  (same comment as for heat and power co-generation unit, 6400kW thermal, building)
- heat and power co-generation unit, 6400kW thermal, components for electricity only: 1.2991e-9 unit; lognormal variance with pedigree 0.372, pedigree (4,4,5,5,1)
  (same comment as for heat and power co-generation unit, 6400kW thermal, building)
- lubricating oil: 4.4156e-6 kg; lognormal variance with pedigree 0.070625, pedigree (2,4,5,2,3)
  Compilation of data from sugarcane and sorghum milling, industrial data
  EcoSpold01Location=RER
  Uncertainty: Compilation of data from sugarcane and sorghum milling, industrial data
  properties: carbon content, fossil 0.75, dry mass 1 kg, heating value, net 40.2 MJ, wet mass 1 kg
  note on carbon content, fossil: Lubricating oil is produced from diesel. C-content/dry mass of fats and oils considered 75%, from: ecoinvent v2.2 report, n 15a, pg 40
  note on heating value, net: Literature value, Source: IPCC 2006, 2006 IPCC Guidelines for National Greenhouse Gas Inventories, Prepared by the National Greenhouse Gas Inventories Programme, Eggleston H.S., Buendia L., Miwa K., Ngara T. and Tanabe K. (eds). Published: IGES, Japan
- municipal solid waste: -4.4156e-6 kg; name MSW; lognormal variance with pedigree 0.0322, pedigree (4,4,2,5,1)
  Adapted from the dataset 'wood chips, in cogen 6400kWth, wood', according to actual water, carbon and energy content of the fuel (pressed sorghum bagasse)
  EcoSpold01Location=CH
  Uncertainty: Adapted from the dataset 'wood chips, in cogen 6400kWth, wood', according to actual water, carbon and energy content of the fuel (pressed sorghum bagasse)
  production volume; = PV_RP*( MSW/ RP)
    Calculated from the production volume of ethanol, without water, in 99.7% solution state, from fermentation in proportion to the respective output amounts.
  properties: carbon content, fossil 0.171549, carbon content, non-fossil 0.261655, dry mass 0.771 kg, heating value, net 11.74 MJ, water content 0.297017, wet mass 1 kg
  note on carbon content, fossil: MSW composition in tab 4.1, ecoinvent v2.2 report 13_I. C content referred to 1 kg DM
  note on heating value, net: Value taken from the general comment of the treatment dataset.
- sodium chloride, powder: 5.5194e-6 kg; lognormal variance with pedigree 0.072, pedigree (4,4,5,5,1)
  (same comment as for ammonia, anhydrous, liquid)
  properties: dry mass 1 kg, wet mass 1 kg
- waste mineral oil: -4.4156e-6 kg; name waste_oil; lognormal variance with pedigree 0.0322, pedigree (4,4,2,5,1)
  (same comment as for municipal solid waste)
  production volume; = PV_RP*( waste_oil/ RP)
    (same comment as for municipal solid waste)
  properties: carbon content, fossil 0.864444, dry mass 0.9 kg, heating value, net 34.7 MJ, water content 0.111111, wet mass 1 kg
  note on carbon content, fossil: Tab A.6, ecoinvent v2.2 report 13_I. C content has been calculated after data in the tables, and then referred to 1 kg DM
- wastewater, average: -5.06825e-5 m3; name wastewater; lognormal variance with pedigree 0.0322, pedigree (4,4,2,5,1)
  EcoSpold01Location=CH
  Adapted from the dataset 'wood chips, in cogen 6400kWth, wood', according to actual water, carbon and energy content of the fuel (pressed sorghum bagasse) and adjusted to close tha mass balance
  Uncertainty: Adapted from the dataset 'wood chips, in cogen 6400kWth, wood', according to actual water, carbon and energy content of the fuel (pressed sorghum bagasse)
  production volume; = PV_RP*( wastewater/ RP)
    (same comment as for municipal solid waste)
  properties: carbon content, non-fossil 0.194039, dry mass 0.346837 kg, water content 2882.2, wet mass 1000 kg
  note on carbon content, non-fossil: 0.0673 kg TOC/m3 (Tab A.17, ecoinvent v2.2 report 13_I). TOC was considered as Total Carbon.
- water, decarbonised: 0.0010595 kg; name water_decarbonised_input; lognormal variance with pedigree 0.072, pedigree (4,4,5,5,1)
  (same comment as for ammonia, anhydrous, liquid)
  properties: wet mass 1 kg
- wood ash mixture, pure: -0.00071214 kg; name wood_ash_mixture; lognormal variance with pedigree 0.0322, pedigree (4,4,2,5,1)
  (same comment as for municipal solid waste)
  production volume; = PV_RP*( wood_ash_mixture/ RP)
    (same comment as for municipal solid waste)
  properties: carbon content, non-fossil 0.012, dry mass 1 kg, wet mass 1 kg

## Emissions to nature
- Acetaldehyde [air, urban air close to ground]: 8.2119e-8 kg; lognormal variance with pedigree 0.112, pedigree (4,4,5,5,1)
  Adapted from the dataset 'wood chips, in cogen 6400kWth, wood', according to actual water, carbon and energy content of the fuel (pressed sorghum bagasse)
  Uncertainty: Adapted from the dataset 'wood chips, in cogen 6400kWth, wood', according to actual water, carbon and energy content of the fuel (pressed sorghum bagasse)
- Ammonia [air, urban air close to ground]: 2.3424e-6 kg; lognormal variance with pedigree 0.082, pedigree (4,4,5,5,1)
  (same comment as for Acetaldehyde)
- Arsenic ion [air, urban air close to ground]: 1.3462e-9 kg; lognormal variance with pedigree 0.722, pedigree (4,4,5,5,1)
  (same comment as for Acetaldehyde)
- Benzene [air, urban air close to ground]: 1.0986e-6 kg; lognormal variance with pedigree 0.112, pedigree (4,4,5,5,1)
  (same comment as for Acetaldehyde)
- Benzo(a)pyrene [air, urban air close to ground]: 6.0361e-10 kg; lognormal variance with pedigree 0.372, pedigree (4,4,5,5,1)
  (same comment as for Acetaldehyde)
- Bromine [air, urban air close to ground]: 8.0772e-8 kg; lognormal variance with pedigree 0.722, pedigree (4,4,5,5,1)
  (same comment as for Acetaldehyde)
- Cadmium II [air, urban air close to ground]: 9.4234e-10 kg; lognormal variance with pedigree 0.722, pedigree (4,4,5,5,1)
  (same comment as for Acetaldehyde)
- Calcium II [air, urban air close to ground]: 7.8753e-6 kg; lognormal variance with pedigree 0.722, pedigree (4,4,5,5,1)
  (same comment as for Acetaldehyde)
- Carbon dioxide, non-fossil [air, urban air close to ground]: 0.14971 kg; lognormal variance with pedigree 0.04, pedigree (1,1,5,1,1)
  Calculation, to close carbon balance (incl. carbon from the combustion of bagasse)
  Uncertainty: Calculation, to close carbon balance (incl. carbon from the combustion of bagasse)
- Carbon monoxide, non-fossil [air, urban air close to ground]: 8.4506e-6 kg; lognormal variance with pedigree 0.722, pedigree (4,4,5,5,1)
  (same comment as for Acetaldehyde)
- Chlorine [air, urban air close to ground]: 2.4232e-7 kg; lognormal variance with pedigree 0.112, pedigree (4,4,5,5,1)
  (same comment as for Acetaldehyde)
- Chromium III [air, urban air close to ground]: 5.331e-9 kg; lognormal variance with pedigree 0.722, pedigree (4,4,5,5,1)
  (same comment as for Acetaldehyde)
- Chromium VI [air, urban air close to ground]: 5.3848e-11 kg; lognormal variance with pedigree 0.722, pedigree (4,4,5,5,1)
  (same comment as for Acetaldehyde)
- Copper ion [air, urban air close to ground]: 2.9617e-8 kg; lognormal variance with pedigree 0.722, pedigree (4,4,5,5,1)
  (same comment as for Acetaldehyde)
- Dinitrogen monoxide [air, urban air close to ground]: 3.0963e-6 kg; lognormal variance with pedigree 0.112, pedigree (4,4,5,5,1)
  (same comment as for Acetaldehyde)
- Dioxins, measured as 2,3,7,8-tetrachlorodibenzo-p-dioxin [air, urban air close to ground]: 3.7424e-14 kg; lognormal variance with pedigree 0.372, pedigree (4,4,5,5,1)
  (same comment as for Acetaldehyde)
- Ethyl benzene [air, urban air close to ground]: 3.6217e-8 kg; lognormal variance with pedigree 0.112, pedigree (4,4,5,5,1)
  (same comment as for Acetaldehyde)
- Fluorine [air, urban air close to ground]: 6.731e-8 kg; lognormal variance with pedigree 0.112, pedigree (4,4,5,5,1)
  (same comment as for Acetaldehyde)
- Formaldehyde [air, urban air close to ground]: 1.5694e-7 kg; lognormal variance with pedigree 0.112, pedigree (4,4,5,5,1)
  (same comment as for Acetaldehyde)
- Hexachlorobenzene [air, urban air close to ground]: 8.692e-15 kg; lognormal variance with pedigree 0.372, pedigree (4,4,5,5,1)
  (same comment as for Acetaldehyde)
- Hydrocarbons, aliphatic, alkanes, unspecified [air, urban air close to ground]: 1.0986e-6 kg; lognormal variance with pedigree 0.112, pedigree (4,4,5,5,1)
  (same comment as for Acetaldehyde)
- Hydrocarbons, aliphatic, unsaturated [air, urban air close to ground]: 3.7424e-6 kg; lognormal variance with pedigree 0.112, pedigree (4,4,5,5,1)
  (same comment as for Acetaldehyde)
- Lead II [air, urban air close to ground]: 3.3521e-8 kg; lognormal variance with pedigree 0.722, pedigree (4,4,5,5,1)
  (same comment as for Acetaldehyde)
- Magnesium [air, urban air close to ground]: 4.8598e-7 kg; lognormal variance with pedigree 0.722, pedigree (4,4,5,5,1)
  (same comment as for Acetaldehyde)
- Manganese II [air, urban air close to ground]: 2.302e-7 kg; lognormal variance with pedigree 0.722, pedigree (4,4,5,5,1)
  (same comment as for Acetaldehyde)
- Mercury II [air, urban air close to ground]: 4.0386e-10 kg; lognormal variance with pedigree 0.722, pedigree (4,4,5,5,1)
  (same comment as for Acetaldehyde)
- Methane, non-fossil [air, urban air close to ground]: 5.2394e-7 kg; lognormal variance with pedigree 0.112, pedigree (4,4,5,5,1)
  (same comment as for Acetaldehyde)
- NMVOC, non-methane volatile organic compounds [air, urban air close to ground]: 7.3641e-7 kg; lognormal variance with pedigree 0.112, pedigree (4,4,5,5,1)
  (same comment as for Acetaldehyde)
- Nickel II [air, urban air close to ground]: 8.0772e-9 kg; lognormal variance with pedigree 0.722, pedigree (4,4,5,5,1)
  (same comment as for Acetaldehyde)
- Nitrogen oxides [air, urban air close to ground]: 0.00011847 kg; lognormal variance with pedigree 0.112, pedigree (4,4,5,5,1)
  (same comment as for Acetaldehyde)
- PAH, polycyclic aromatic hydrocarbons [air, urban air close to ground]: 1.3279e-8 kg; lognormal variance with pedigree 0.372, pedigree (4,4,5,5,1)
  (same comment as for Acetaldehyde)
- Particulate Matter, < 2.5 um [air, urban air close to ground]: 5.4204e-5 kg; lognormal variance with pedigree 0.372, pedigree (4,4,5,5,1)
  (same comment as for Acetaldehyde)
- Pentachlorophenol [air, urban air close to ground]: 9.7785e-12 kg; lognormal variance with pedigree 0.112, pedigree (4,4,5,5,1)
  (same comment as for Acetaldehyde)
- Phosphorus [air, urban air close to ground]: 4.0386e-7 kg; lognormal variance with pedigree 0.112, pedigree (4,4,5,5,1)
  (same comment as for Acetaldehyde)
- Potassium I [air, urban air close to ground]: 3.1501e-5 kg; lognormal variance with pedigree 0.722, pedigree (4,4,5,5,1)
  (same comment as for Acetaldehyde)
- Sodium I [air, urban air close to ground]: 1.7501e-6 kg; lognormal variance with pedigree 0.722, pedigree (4,4,5,5,1)
  (same comment as for Acetaldehyde)
- Sulfur dioxide [air, urban air close to ground]: 3.3521e-6 kg; lognormal variance with pedigree 0.072, pedigree (4,4,5,5,1)
  (same comment as for Acetaldehyde)
- Toluene [air, urban air close to ground]: 3.6217e-7 kg; lognormal variance with pedigree 0.112, pedigree (4,4,5,5,1)
  (same comment as for Acetaldehyde)
- Water [air, unspecified]: 4.10556e-7 m3; name water_to_air_unspecified; = (water_decarbonised_input/1000*fraction_WDC_to_air); lognormal variance with pedigree 0.0807, pedigree (2,2,5,1,1)
  Calculated value based on literature values and expert opinion. See comments in the parametres' comment field.
  property fraction, origin: fresh water 1; name fraction_origin_fresh_water
  property fraction, origin: salt water 0; name fraction_origin_salt_water
  property fraction, origin: unspecified 0; name fraction_origin_unspecified
- Zinc II [air, urban air close to ground]: 4.0386e-7 kg; lognormal variance with pedigree 0.722, pedigree (4,4,5,5,1)
  (same comment as for Acetaldehyde)
- m-Xylene [air, urban air close to ground]: 1.4487e-7 kg; lognormal variance with pedigree 0.112, pedigree (4,4,5,5,1)
  (same comment as for Acetaldehyde)
- Water [water, unspecified]: 6.48944e-7 m3; name water_to_water_unspecified; = (water_decarbonised_input/1000)*(1-fraction_WDC_to_air); lognormal variance with pedigree 0.0807, pedigree (2,2,5,1,1)
  (same comment as for Water)
  property carbon content, fossil 0; name C_content_fossil
  property carbon content, non-fossil 0; name C_content_non_fossil
  property dry mass 0 kg; name DM
  property fraction, origin: fresh water 1; name fraction_origin_fresh_water_Ww
  property fraction, origin: salt water 0; name fraction_origin_salt_water_Ww
  property fraction, origin: unspecified 0; name fraction_origin_unspecified_Ww
  property water in wet mass 1000 kg; name WWM
  property wet mass 1000 kg; name WM

## Sampling procedure
Data is from the etha+ project (Alcosuisse, CH) and the ASIATIC project (LASEN, CH), technology by French ethanol plant supplier, modelling by ENERS (CH)

## Extrapolations
Direct emissions (resulting from the combustion of sorghum bagasse) are based on the the combustion of wood chips (without emission control), according to the corresponding dry matter content, carbon content and energy content.

## Review by Niels Jungbluth 2006-08-15
Passed.
none
