# indium tin oxide powder production, nanoscale, for sputtering target

Dataset: EcoSpold 2, unit process
Geography: RoW
Time period: 2000-01-01 to 2023-12-31
Technology level: current
Classification: ISIC rev.4 ecoinvent: 2029:Manufacture of other chemical products n.e.c.
Classification: EcoSpold01Categories: electronics/module
Synonyms: Indium Zinn Oxid; Indium Tin Oxide
Tags: ConvertedDataset
Scenario: Business-as-Usual
System model: Allocation, cut-off by classification
Generated by: Mischa Classen
Published in: Hischier R. 2007
Database: ecoinvent
isCopyrightProtected: true
accessRestrictedTo: 1

## General comment
This dataset describes the production of nanoscaled ITO powder by coprecipitation for the use in sputtering targets with a density close to the theoretical one. No direct process emissions are considered due to a lack of respective information. The input raw materials are prompt scrap from the sputtering process, amounting to 77% of the raw material, and raw materials won from primary metals, making 23%. 8.5% of the total ITO is lost during scrap processing.
[This dataset was already contained in the ecoinvent database version 2. It was not individually updated during the transfer to ecoinvent version 3. Life Cycle Impact Assessment results may still have changed, as they are affected by changes in the supply chain, i.e. in other datasets. This dataset was generated following the ecoinvent quality guidelines for version 2. It may have been subject to central changes described in the ecoinvent version 3 change report (http://www.ecoinvent.org/database/ecoinvent-version-3/reports-of-changes/), and the results of the central updates were reviewed extensively. The changes added e.g. consistent water flows and other information throughout the database. The documentation of this dataset can be found in the ecoinvent reports of version 2, which are still available via the ecoinvent website. The change report linked above covers all central changes that were made during the conversion process.]

## Included activities end
Electricity and heat demand for precipitation; recovery of spent ITO targets,

## Geography
Water provision and disposal approximated with Swiss conditions

## Technology
Relates to coprecipitation of ITO from a raw aqueous solution and subsequent calcination. The raw solution can be prepared from both pure metals as well as from spent targets.

## Reference product
- indium tin oxide powder, nanoscale, for sputtering target: 1 kg; By-product classification allocatable product; CPC 35499: Other chemical products n.e.c.; HS2017 282590: Inorganic bases, metal oxides, hydroxides and peroxides; n.e.c. in heading no. 2825
  EcoSpold01Location=RER
  production volume 2.67763 kg
    This is a placeholder value that does not reflect real-world production volumes. This dataset does not currently require a real-world production volume to work in the database framework, and no actual data were collected yet. This has no negative effect on the results of the ecoinvent database.
  property carbon content, fossil 0
    Indium-Tin-Oxide (In2O3/SnO2), details in ecoinvent v2.2 report 16_partIII-Annex I)
  property carbon content, non-fossil 0
    Indium-Tin-Oxide (In2O3/SnO2), details in ecoinvent v2.2 report 16_partIII-Annex I)
  property price 85.1024 EUR2005
    Calculated based on inputs: The price of the product has been calculated as a sum of the values of the material and energy inputs for this product. This value is therefore a rough estimation. It may underestimate the real price since there are additional expenses when producing any product. These expences can include for example labour costs, treatment of waste materials and profit for the producer. Please consider carefully whether this level of data quality is acceptable for your application.
  properties: carbon allocation 0 kg, carbon content 0, dry mass 1 kg, water content 0, water in wet mass 0 kg, wet mass 1 kg

## Inputs from technosphere
- ammonia, anhydrous, liquid: 0.00927849, 0.0180114, 0.199645, 0.00843913, 0.00188779, 0.0693798, 0.00596403, 0.018384 kg (8 suppliers, which the file names only by identifier); sum of these 0.33099 kg; lognormal variance with pedigree 0.3326, pedigree (5,3,5,5,5)
  EcoSpold01Location=RER
  properties: dry mass 1 kg, wet mass 1 kg
- chemical factory, organics: 2.35167e-9 unit; lognormal variance with pedigree 0.6326, pedigree (5,3,5,5,5)
  EcoSpold01Location=RER
- electricity, medium voltage: 0.254367, 5.07406, 1.70487, 0.077896, 0.0155908, 0.00334769, 0.523975 kWh (7 suppliers, which the file names only by identifier); sum of these 7.6541 kWh; lognormal variance with pedigree 0.2706, pedigree (4,3,5,5,5)
  EcoSpold01Location=UCTE
- heat, district or industrial, natural gas: 0.0214696, 1.30653 MJ (2 suppliers, which the file names only by identifier); sum of these 1.328 MJ; lognormal variance with pedigree 0.124, pedigree (3,1,5,5,4)
  EcoSpold01Location=RER
  properties: heating value, net 1 MJ
- hydrochloric acid, without water, in 30% solution state: 0.36121 kg; lognormal variance with pedigree 0.2646, pedigree (3,3,5,5,5)
  EcoSpold01Location=RER
  properties: dry mass 1 kg, heating value, net 3.32 MJ, wet mass 1 kg
- indium: 0.097577 kg; lognormal variance with pedigree 0.2646, pedigree (3,3,5,5,5)
  EcoSpold01Location=RER
  properties: dry mass 1 kg, wet mass 1 kg
- methanol: 0.00640406, 0.0124197, 0.00117628 kg (3 suppliers, which the file names only by identifier); sum of these 0.02 kg; lognormal variance with pedigree 0.2706, pedigree (4,3,5,5,5)
  EcoSpold01Location=GLO
  properties: carbon content, fossil 0.375, dry mass 1 kg, heating value, net 20 MJ, wet mass 1 kg
  note on heating value, net: Based on literature, page 533, Report 17: Jungbluth, N., Chudacoff, M., Dauriat, A., Dinkel, F., Doka, G., Faist Emmenegger, M., Gnansounou, E., Kljun, N., Schleiss, K., Spielmann, M., Stettler, C., Sutter, J. 2007: Life Cycle Inventories of Bioenergy. ecoinvent report No. 17, Swiss Centre for Life Cycle Inventories, Dübendorf, CH.
- sodium hydroxide, without water, in 50% solution state: 0.6064 kg; lognormal variance with pedigree 0.2706, pedigree (4,3,5,5,5)
  EcoSpold01Location=RER
  properties: dry mass 1 kg, heating value, net 3.03 MJ, wet mass 1 kg
- tin: 0.0099642 kg; lognormal variance with pedigree 0.2646, pedigree (3,3,5,5,5)
  EcoSpold01Location=RER
  properties: dry mass 1 kg, wet mass 1 kg
- wastewater from ceramic production: -0.044131 m3; lognormal variance with pedigree 0.2926, pedigree (5,3,1,5,5)
  EcoSpold01Location=CH
  production volume
    Calculated from the production volume of indium tim oxide powder, nanoscale, for sputtering target in proportion to the respective output amounts.
  properties: dry mass 0.337476 kg, water content 2962.17, wet mass 1000 kg
- water, deionised: 44.131 kg; name water_deionised_input; lognormal variance with pedigree 0.2646, pedigree (3,3,5,5,5)
  EcoSpold01Location=CH
  Value. The amount of deionised water on the input to the process as provided by the data provider for eiv2 was 39.732kg. This amount is adjusted, so the water balance is achieved.
  properties: wet mass 1 kg

## Emissions to nature
- Ethanol [air, urban air close to ground]: 0.02 kg; lognormal variance with pedigree 0.3106, pedigree (4,3,5,5,5)

## Sampling procedure
Literature

## Extrapolations
see Geography and Technology This dataset has been copied from an original dataset covering the geography RER. The uncertainty has been adjusted accordingly.

## Review by Roberto Dones 2007-08-22
Passed
