# cast iron turning, primarily roughing, computer numerical controlled

Dataset: EcoSpold 2, unit process
Geography: RER
Time period: 2006-01-01 to 2023-12-31
Technology level: current
Classification: ISIC rev.4 ecoinvent: 2592:Treatment and coating of metals; machining
Classification: EcoSpold01Categories: metals/chipping
Tags: ConvertedDataset
Scenario: Business-as-Usual
System model: Allocation, cut-off by classification
Share of production covered: 0 %
Generated by: Roland Steiner
Published in: Steiner, R. 2007
Database: ecoinvent
isCopyrightProtected: true
accessRestrictedTo: 1

## General comment
The reference for turning is 1 kg of metal removed. As there is a large variation from factory to factory with regard to the LCI, it is advised that in case this dataset becomes important in the results, it has to be investigated further if the rough estimations made are applicable or not. If you do not know how much has been removed by turning you can use 0.23kg of this process per kg of final product as an average assumption.
[This dataset was already contained in the ecoinvent database version 2. It was not individually updated during the transfer to ecoinvent version 3. Life Cycle Impact Assessment results may still have changed, as they are affected by changes in the supply chain, i.e. in other datasets. This dataset was generated following the ecoinvent quality guidelines for version 2. It may have been subject to central changes described in the ecoinvent version 3 change report (http://www.ecoinvent.org/database/ecoinvent-version-3/reports-of-changes/), and the results of the central updates were reviewed extensively. The changes added e.g. consistent water flows and other information throughout the database. The documentation of this dataset can be found in the ecoinvent reports of version 2, which are still available via the ecoinvent website. The change report linked above covers all central changes that were made during the conversion process.]

## Included activities start
The activity starts with the workpiece entering the process. The material removed is included in the activity.

## Included activities end
This dataset encompasses the direct electricity consumption of the machine as well as compressed air and lubricant oil. Furthermore, the metal removed is included. Machine as well as factory infrastructure and operation are considered as well. The disposal of the lubricant oil is also included while the metal removed is assumed to be recycled. Degreasing is not included and has to be added if necessary.

## Geography
Geographical coverage encompasses the industrialised countries.

## Technology
Average technology

## Reference product
- cast iron removed by turning, primarily roughing, computer numerical controlled: 1 kg; name RP; By-product classification allocatable product; CPC 39310: Slag, dross, scalings and other waste from the manufacture of iron or steel; HS2017 720410: Ferrous waste and scrap; of cast iron
  EcoSpold01Location=RER
  production volume 1.32237 kg; name PV_RP
    This is a placeholder value that does not reflect real-world production volumes. This dataset does not currently require a real-world production volume to work in the database framework, and no actual data were collected yet. This has no negative effect on the results of the ecoinvent database. The placeholder value of this activity was scaled according to the nominal GDP of 2005 (source: United Nations, http://data.un.org/Glossary.aspx?q=GDP+%28current+US%24%29, accessed 20130726) to reflect an appropriate share of the global production volume, which is also a placeholder value.
  property carbon content, fossil 0.04
    Cast iron is made by remelting pig iron in small furnaces (e.g. cupola furnaces or electric arc furnaces) and poured into moulds to make castings. It usually contains 2% to 6% carbon (ecoinvent v2.2 report 10_partII). An average content of 4% was considered
  property price 1.33803 EUR2005
    Calculated based on inputs: The price of the product has been calculated as a sum of the values of the material and energy inputs for this product. This value is therefore a rough estimation. It may underestimate the real price since there are additional expenses when producing any product. These expences can include for example labour costs, treatment of waste materials and profit for the producer. Please consider carefully whether this level of data quality is acceptable for your application.
  properties: carbon allocation 0.04 kg, carbon content 0.04, carbon content, non-fossil 0, dry mass 1 kg, water content 0, water in wet mass 0 kg, wet mass 1 kg

## Inputs from technosphere
- cast iron: 1 kg; name input_material; lognormal variance with pedigree 0.04, pedigree (1,1,5,1,1)
  EcoSpold01Location=RER
  properties: carbon content, fossil 0.04, dry mass 1 kg, wet mass 1 kg
  note on carbon content, fossil: Cast iron is made by remelting pig iron in small furnaces (e.g. cupola furnaces or electric arc furnaces) and poured into moulds to make castings. It usually contains 2% to 6% carbon (ecoinvent v2.2 report 10_partII). An average content of 4% was considered
- compressed air, 700 kPa gauge: 1.28 m3; lognormal variance with pedigree 0.1386, pedigree (4,3,5,1,4)
  EcoSpold01Location=RER
  Estimated
  Uncertainty: estimated
- electricity, low voltage: 0.228 kWh; lognormal variance with pedigree 0.0586, pedigree (1,3,5,1,3)
  Literature value
  EcoSpold01Location=UCTE
  Uncertainty: literature value
- energy and auxilliary inputs, metal working factory: 4.41 kg; lognormal variance with pedigree 0.1386, pedigree (4,3,5,1,4)
  Estimated
  EcoSpold01Location=RER
  Uncertainty: estimated
- iron scrap, unsorted: -1 kg; name scrap; = input_material; lognormal variance with pedigree 0.002, pedigree (1,1,1,5,1)
  This exchange represent the metal scrap produced during the machining of the component. The mathematical relation bonds the two type of aluminium in input to the ByProduct produced. Iron scrap, unsorted is used as a proxy for the cast iron scrap. Uncertainty set as the one of the input.
  production volume; = (scrap*PV_RP)/RP
    Calculated from production volume of reference product using the relative outputs.
  properties: dry mass 1 kg, price 0.149 EUR2005, wet mass 1 kg
- lubricating oil: 0.00382 kg; lognormal variance with pedigree 0.1386, pedigree (4,3,5,1,4)
  EcoSpold01Location=RER
  Estimated
  Uncertainty: estimated
  properties: carbon content, fossil 0.75, dry mass 1 kg, heating value, net 40.2 MJ, wet mass 1 kg
  note on carbon content, fossil: Lubricating oil is produced from diesel. C-content/dry mass of fats and oils considered 75%, from: ecoinvent v2.2 report, n 15a, pg 40
  note on heating value, net: Literature value, Source: IPCC 2006, 2006 IPCC Guidelines for National Greenhouse Gas Inventories, Prepared by the National Greenhouse Gas Inventories Programme, Eggleston H.S., Buendia L., Miwa K., Ngara T. and Tanabe K. (eds). Published: IGES, Japan
- metal working factory: 2.02e-9 unit; lognormal variance with pedigree 0.4386, pedigree (4,3,5,1,4)
  Estimated
  EcoSpold01Location=RER
  Uncertainty: estimated
- metal working machine, unspecified: 0.000174 kg; lognormal variance with pedigree 0.4386, pedigree (4,3,5,1,4)
  Estimated
  EcoSpold01Location=RER
  Uncertainty: estimated
- waste mineral oil: -9.22834e-5, -0.00372772 kg (2 suppliers, which the file names only by identifier); sum of these -0.00382 kg; lognormal variance with pedigree 0.0988, pedigree (4,3,2,1,4)
  EcoSpold01Location=CH
  Estimated disposal pathway
  Uncertainty: estimated disposal pathway
  production volume
    Calculated from the production volume of cast iron removed by turning, primarily roughing, computer numerical controlled in proportion to the respective output amounts.
  properties: carbon content, fossil 0.864444, dry mass 0.9 kg, heating value, net 34.7 MJ, water content 0.111111, wet mass 1 kg
  note on carbon content, fossil: Tab A.6, ecoinvent v2.2 report 13_I. C content has been calculated after data in the tables, and then referred to 1 kg DM
  note on heating value, net: Value taken from the general comment of the treatment dataset.

## Review by Sébastien Humbert 2007-09-05
passed
none
