# welding, arc, steel

Dataset: EcoSpold 2, unit process
Geography: RoW
Time period: 1997-01-01 to 2023-12-31
Technology level: current
Classification: ISIC rev.4 ecoinvent: 2592:Treatment and coating of metals; machining
Classification: EcoSpold01Categories: metals/processing
Synonyms: MIG; MAG
Tags: ConvertedDataset
Scenario: Business-as-Usual
System model: Allocation, cut-off by classification
Share of production covered: 0 %
Generated by: Silvio Blaser
Published in: Classen M. 2009
Database: ecoinvent
isCopyrightProtected: true
accessRestrictedTo: 1

## General comment
Different arc welding technologies can have very different emissions. Only to be used for the technology describes or as a rough proxy if welding is not important in the system considered.
[This dataset was already contained in the ecoinvent database version 2. It was not individually updated during the transfer to ecoinvent version 3. Life Cycle Impact Assessment results may still have changed, as they are affected by changes in the supply chain, i.e. in other datasets. This dataset was generated following the ecoinvent quality guidelines for version 2. It may have been subject to central changes described in the ecoinvent version 3 change report (http://www.ecoinvent.org/database/ecoinvent-version-3/reports-of-changes/), and the results of the central updates were reviewed extensively. The changes added e.g. consistent water flows and other information throughout the database. The documentation of this dataset can be found in the ecoinvent reports of version 2, which are still available via the ecoinvent website. The change report linked above covers all central changes that were made during the conversion process.]

## Included activities start
The activity starts with the materials entering the process. The material on which this activity is applied it is not included as input.

## Included activities end
Includes the MAG-welding of non alloyed steel and the transports of the filler rod and the protective gas to the place of use.

## Geography
Data-set is representive for Europe

## Technology
MAG-welding of unalloyed steel with 83% Ar, 13% CO2 and 4% O2 protective gas and a wire consumption of 0.0536 kg/m.

## Reference product
- welding, arc, steel: 1 m; By-product classification allocatable product; CPC 88731: Metal treatment and coating services
  EcoSpold01Location=RER
  production volume 2.67763 m
    This is a placeholder value that does not reflect real-world production volumes. This dataset does not currently require a real-world production volume to work in the database framework, and no actual data were collected yet. This has no negative effect on the results of the ecoinvent database.
  property price 0.0343663 EUR2005
    Calculated based on inputs: The price of the product has been calculated as a sum of the values of the material and energy inputs for this product. This value is therefore a rough estimation. It may underestimate the real price since there are additional expenses when producing any product. These expences can include for example labour costs, treatment of waste materials and profit for the producer. Please consider carefully whether this level of data quality is acceptable for your application.
  properties: carbon allocation 0 kg, carbon content 0

## Inputs from technosphere
- argon, liquid: 0.0237 kg; lognormal variance with pedigree 0.078, pedigree (4,5,5,5,1)
  EcoSpold01Location=RER
  properties: dry mass 1 kg, wet mass 1 kg
- carbon dioxide, liquid: 0.00411 kg; lognormal variance with pedigree 0.078, pedigree (4,5,5,5,1)
  EcoSpold01Location=RER
  properties: carbon content, fossil 0.272727, dry mass 1 kg, heating value, net 8.27 MJ, wet mass 1 kg
- electricity, medium voltage: 0.000913902, 0.0182303, 0.00612533, 0.000279868, 5.60153e-5, 1.20277e-5, 0.00188256 kWh (7 suppliers, which the file names only by identifier); sum of these 0.0275 kWh; lognormal variance with pedigree 0.062, pedigree (3,5,5,5,1)
  EcoSpold01Location=UCTE
- electronics, for control units: 1e-5 kg; lognormal variance with pedigree 0.488, pedigree (5,5,5,5,3)
  EcoSpold01Location=RER
  properties: carbon content, fossil 0.337146, carbon content, non-fossil 0.00013442, dry mass 1 kg, wet mass 1 kg
  note on carbon content, fossil: The control unit has a composition of 46% steel (housing), 32% plastics, 14% printed wiring boards and 8% cables (various types).;
- oxygen, liquid: 0.000915 kg; lognormal variance with pedigree 0.078, pedigree (4,5,5,5,1)
  EcoSpold01Location=RER
  properties: dry mass 1 kg, wet mass 1 kg
- steel, low-alloyed, hot rolled: 0.0536 kg; lognormal variance with pedigree 0.078, pedigree (4,5,5,5,1)
  EcoSpold01Location=RER
  properties: carbon content, fossil 0.005, dry mass 1 kg, wet mass 1 kg
  note on carbon content, fossil: Low alloyed steel composition given in Tab. 3.2 ecoinvent v2.2 report 10_partII. Steel assumed to have a C content of 0.5%

## Emissions to nature
- Carbon monoxide, fossil [air, unspecified]: 6.67e-5 kg; lognormal variance with pedigree 0.758, pedigree (1,5,5,5,3)
- Chromium III [air, unspecified]: 2.81e-5 kg; lognormal variance with pedigree 0.758, pedigree (1,5,5,5,3)
- Chromium VI [air, unspecified]: 3e-8 kg; lognormal variance with pedigree 0.758, pedigree (1,5,5,5,3)
- Copper ion [air, unspecified]: 2.1e-7 kg; lognormal variance with pedigree 0.148, pedigree (1,5,5,5,3)
- Iron ion [air, unspecified]: 8.74e-5 kg; lognormal variance with pedigree 0.148, pedigree (1,5,5,5,3)
- Manganese II [air, unspecified]: 1.12e-5 kg; lognormal variance with pedigree 0.758, pedigree (1,5,5,5,3)
- Molybdenum VI [air, unspecified]: 2.16e-6 kg; lognormal variance with pedigree 0.758, pedigree (1,5,5,5,3)
- Nickel II [air, unspecified]: 1.12e-5 kg; lognormal variance with pedigree 0.758, pedigree (1,5,5,5,3)
- Nitrogen oxides [air, unspecified]: 2e-6 kg; lognormal variance with pedigree 0.148, pedigree (1,5,5,5,3)
- Ozone [air, unspecified]: 9.06e-6 kg; lognormal variance with pedigree 0.148, pedigree (1,5,5,5,3)
- Particulate Matter, < 2.5 um [air, unspecified]: 0.000141 kg; lognormal variance with pedigree 0.426, pedigree (4,5,5,5,3)
- Zinc II [air, unspecified]: 4.2e-7 kg; lognormal variance with pedigree 0.758, pedigree (1,5,5,5,3)

## Sampling procedure
Literature

## Extrapolations
none This dataset has been copied from an original dataset covering the geography RER. The uncertainty has been adjusted accordingly.

## Review by Roland Hischier 2003-06-17
Passed.
