# mine construction, underground, non-ferrous metal

Dataset: EcoSpold 2, unit process
Geography: GLO
Time period: 2003-01-01 to 2023-12-31
Technology level: current
Classification: EcoSpold01Categories: metals/extraction
Classification: ISIC rev.4 ecoinvent: 4290:Construction of other civil engineering projects
Tags: ConvertedDataset
Scenario: Business-as-Usual
System model: Allocation, cut-off by classification
Generated by: Mischa Classen
Published in: Althaus H.-J. 2000
Database: ecoinvent
isCopyrightProtected: true
accessRestrictedTo: 1

## General comment
The module is designed for unspecific use. It is based on rough estimations. Lifetime: 50a, output: 400'000 t ore per year
[This dataset was already contained in the ecoinvent database version 2. It was not individually updated during the transfer to ecoinvent version 3. Life Cycle Impact Assessment results may still have changed, as they are affected by changes in the supply chain, i.e. in other datasets. This dataset was generated following the ecoinvent quality guidelines for version 2. It may have been subject to central changes described in the ecoinvent version 3 change report (http://www.ecoinvent.org/database/ecoinvent-version-3/reports-of-changes/), and the results of the central updates were reviewed extensively. The changes added e.g. consistent water flows and other information throughout the database. The documentation of this dataset can be found in the ecoinvent reports of version 2, which are still available via the ecoinvent website. The change report linked above covers all central changes that were made during the conversion process.]

## Included activities start
The activity starts with the occupation and transformation of unspecified land.

## Included activities end
Includes the mine facilities. Does not include the land used for the actual mining operations.

## Geography
No geographical context, inventory based on calculations

## Technology
Assumed technology

## Reference product
- mine infrastructure, underground, non-ferrous metal: 1 unit; By-product classification allocatable product; CPC 53261: Mining constructions
  EcoSpold01Location=GLO
  production volume 1 unit
    NA
    Dummy value to be replaced by measured, estimated or calculated value
  property price 3.22376e7 EUR2005
    Calculated based on inputs: The price of the product has been calculated as a sum of the values of the material and energy inputs for this product. This value is therefore a rough estimation. It may underestimate the real price since there are additional expenses when producing any product. These expences can include for example labour costs, treatment of waste materials and profit for the producer. Please consider carefully whether this level of data quality is acceptable for your application.
  properties: carbon allocation 0 kg, carbon content 0

## Inputs from technosphere
- building, hall: 12500 m2; lognormal variance with pedigree 0.46, pedigree (5,5,5,5,5)
  EcoSpold01Location=CH
- building, multi-storey: 275000 m3; lognormal variance with pedigree 0.46, pedigree (5,5,5,5,5)
  EcoSpold01Location=RER
- conveyor belt: 600 m; lognormal variance with pedigree 0.46, pedigree (5,5,5,5,5)
  EcoSpold01Location=RER
- industrial machine, heavy, unspecified: 281003, 568997 kg (2 suppliers, which the file names only by identifier); sum of these 850000 kg; lognormal variance with pedigree 0.46, pedigree (5,5,5,5,5)
  EcoSpold01Location=RER

## Inputs from nature
- Occupation, industrial area [natural resource, land]: 9.24e6 m2*year; lognormal variance with pedigree 0.28, pedigree (5,5,5,5,5)
- Transformation, from unspecified [natural resource, land]: 185000 m2; lognormal variance with pedigree 0.8, pedigree (5,5,5,5,5)
  Estimate
  Uncertainty: estimate
- Transformation, to industrial area [natural resource, land]: 185000 m2; lognormal variance with pedigree 0.28, pedigree (5,5,5,5,5)

## Sampling procedure
Literature

## Extrapolations
see Geography and Technology

## Review by Roland Hischier 2003-07-02
Passed.
