# tap water production, conventional treatment

Dataset: EcoSpold 2, unit process
Geography: BR
Time period: 2015-01-01 to 2023-12-31
Technology level: current
Classification: EcoSpold01Categories: water supply/production
Classification: ISIC rev.4 ecoinvent: 3600:Water collection, treatment and supply
Synonyms: potable water
Scenario: Business-as-Usual
System model: Allocation, cut-off by classification
Share of production covered: 0.2 %
Generated by: Laura Rubio
Published in: Gmünder S. 2017
Database: ecoinvent
isCopyrightProtected: true
accessRestrictedTo: 1

## General comment
This dataset represents production of 1 kg of tap water under pressure at facility gate, ready for distribution in network. It represents average operation of conventional treatment for production tap water. Conventional treatment includes coagulation and decantation, filtration and disinfection. Other treatment such as oxidation (ultraviolet radiation, ozone) and other adjustment (pH, alkalinity, etc.) can be present in some plant. Inventory was constructed from reported chemicals and energy inputs from a typical conventional treatment plant in Brazil.

## Included activities start
This activity starts from tap water, under pressure, at tap water treatment plant and fed into tap water distribution network.

## Included activities end
This dataset ends with the production of tap water, at facility gate, under pressure. It includes energy for intake pumping and treatment system, as well as the energy of the pump pressurizing water to the beginning of the network. It includes all chemicals and material added to the water during treatment. It excludes energy for pumping stations and water losses within the network as they are included in the tap water market. Emissions to the environment occurring during the treatment and during the distribution were not considered as they are assumed negligible. Main substance in water that would be released in the environment are assumed to be considered in wastewater processes.

## Geography
Extrapolated from data from one conventional treatment plant in Brazil. The uncertainty was adjusted accordingly.

## Technology
Most Frequent technology in tap water production facility in Brazil

## Time period
The time period is set from 2015 to the year 2017 as it is a considering period in which the electricity mix in conventional treatment plants have not passed through drastic changes.

## Parameters
- unit conversion, days in a year: 365.25 d/year; name days_per_year; lognormal variance with pedigree 0.0006, pedigree (1,1,1,1,1)
  Conversion factor.

## Reference product
- tap water: 1 kg; name tapwater; By-product classification allocatable product; CPC 18000: Natural water; CAS 7732-18-5
  production volume 1.00701e13 kg; name PV_tapwater; = 11078255352000*0.909
    Calculated value based on specific reports from Grupo Aguas do Brasil (Brasil, 2015) < http://www.grupoaguasdobrasil.com.br/>. Out of 65 assessed treatment plants (total number of conventional treatment plants for which data was compiled), 59 incorporated conventional treatment. Overall,The production technology shares, present in the ecoinvent database, are calculated to be as follows; tap water production, conventional treatment (90.8 %) followed by tap water production, direct filtration treatment (9.0%) and undergound water with disinfection (0.2%).
  property price 0.000397 EUR2005
    Converted from EU price by using Purchasing Power Parities (0.8458 in 2003 and 0.8426 in 2004)
  properties: carbon allocation 6.08566e-7 kg, carbon content 0.0017899, carbon content, fossil 0.0017899, carbon content, non-fossil 0, dry mass 0.00034 kg, water content 2940.18, water in wet mass 0.99966 kg, wet mass 1 kg

## Inputs from technosphere
- aluminium sulfate, powder: 7.55e-5 kg; lognormal variance with pedigree 0.0072, pedigree (2,4,3,5,1)
  Measured value. Value reprensents average for use of aluminium sulfate in a typical conventional treatment plant in Brazil - according to Guanais, A.L.R.; Cohim, E.B.; Medeiros, D.L report " Avaliação energética de um sistema integrado de abastecimento de água": [ retrieved from ; http://www.scielo.br/pdf/esa/2017nahead/1809-4457-esa-s1413-41522017146180.pdf pg. 1191 ]
  properties: dry mass 1 kg, wet mass 1 kg
- chlorine, liquid: 1.15e-5 kg; lognormal variance with pedigree 0.0072, pedigree (2,4,3,5,1)
  Measured value. Value reprensents average for use of chlorine,gaseous in a typical conventional treatment plant in Brazil - according to Guanais, A.L.R.; Cohim, E.B.; Medeiros, D.L report " Avaliação energética de um sistema integrado de abastecimento de água": [ retrieved from ; http://www.scielo.br/pdf/esa/2017nahead/1809-4457-esa-s1413-41522017146180.pdf pg. 1191 ]
  properties: dry mass 1 kg, wet mass 1 kg
- copper sulfate: 6.81e-7 kg; lognormal variance with pedigree 0.0072, pedigree (2,4,3,5,1)
  Measured value. Value reprensents average for use of copper sulfate in a typical conventional treatment plant in Brazil - according to Guanais, A.L.R.; Cohim, E.B.; Medeiros, D.L report " Avaliação energética de um sistema integrado de abastecimento de água": [ retrieved from ; http://www.scielo.br/pdf/esa/2017nahead/1809-4457-esa-s1413-41522017146180.pdf pg. 1191 ]
  properties: dry mass 1 kg, wet mass 1 kg
- electricity, medium voltage: 0.00028 kWh; lognormal variance with pedigree 0.0027, pedigree (1,2,3,1,1)
  Measured value. Value reprensents average for use of electricity in a typical conventional treatment plant in Brazil - according to Guanais, A.L.R.; Cohim, E.B.; Medeiros, D.L report " Avaliação energética de um sistema integrado de abastecimento de água": [ retrieved from ; http://www.scielo.br/pdf/esa/2017nahead/1809-4457-esa-s1413-41522017146180.pdf pg. 1191 ]
- fluosilicic acid, without water, in 22% solution state: 8.65e-6 kg; lognormal variance with pedigree 0.0072, pedigree (2,4,3,5,1)
  Measured value. Value reprensents average for use of fluosilicic acid in a typical conventional treatment plant in Brazil - according to Guanais, A.L.R.; Cohim, E.B.; Medeiros, D.L report " Avaliação energética de um sistema integrado de abastecimento de água": [ retrieved from ; http://www.scielo.br/pdf/esa/2017nahead/1809-4457-esa-s1413-41522017146180.pdf pg. 1191 ]
  properties: dry mass 1 kg, wet mass 1 kg
- heat, district or industrial, natural gas: 0.000178498 MJ; lognormal variance with pedigree 0.004, pedigree (1,1,3,5,1)
  Calculated value.This mathematical function was taken from the "tap water production, conventional treatment, GLO" dataset (accessed 20170920) as it was considered adequate also for this dataset.
  Uncertainty: C
  property Corresponding fuel use 1.11 MJ; name fuel_use
  property fuel input in physical units, m3 4.43e-6 m3; name fuel_input
  property heating value, net 1 MJ; name heating_value
  note on Corresponding fuel use: Lower heating value of the fuel input related to the heat/electricity output
  note on fuel input in physical units, m3: Measured value. Average natural gas consumption in surveyed conventional treatment plants. Note than only 4 of the 9 conventional plants reported using natural gas. Plants not reporting natural gas were attributed an input value of 0 during the calculation of the weighted average.
- lime, hydrated, loose weight: 1.86e-5 kg; lognormal variance with pedigree 0.0072, pedigree (2,4,3,5,1)
  Measured value. Value reprensents average for use of lime hydrated in a typical conventional treatment plant in Brazil - according to Guanais, A.L.R.; Cohim, E.B.; Medeiros, D.L report " Avaliação energética de um sistema integrado de abastecimento de água": [ retrieved from ; http://www.scielo.br/pdf/esa/2017nahead/1809-4457-esa-s1413-41522017146180.pdf pg. 1191 ]
  properties: dry mass 0.997 kg, water content 0.00300903, wet mass 1 kg
- silica sand: 1.49834e-6 kg; lognormal variance with pedigree 0.0072, pedigree (3,3,3,5,1)
  Calculated value taken from the "tap water production, conventional treatment, GLO" dataset (accessed 20170920) as it was considered adequate also for this dataset. Amount of sand to compensate losses through sand filter washing. Extrapolated to all plant from one reported value. Also includes average use of micro-sand for adjustment for this technology. Note that only 1 of the 9 conventional plants reported using micro-sand. Plants not reporting this consumable were attributed an input value of 0 during the calculation of the weighted average.
  properties: dry mass 0.99 kg, water content 0.010101, wet mass 1 kg
- tap water: 2.1e-5 kg; lognormal variance with pedigree 0.0072, pedigree (3,3,3,5,1)
  Calculated value taken from the "tap water production, conventional treatment, GLO" dataset (accessed 20170920) as it was considered adequate also for this dataset. Water content of hypochlorite solution, prehydrolysed coagulant and aluminium sulfate.
  properties: carbon content, fossil 0.00178991, dry mass 0.000337476 kg, water content 2962.17, wet mass 1 kg
  note on carbon content, fossil: Bicarbonate content is 2.93 mol/m3. CO2 content is 0.1 mol/m3 (ecoinvent v2.2 report 8, Tab 93.1).
- wastewater, unpolluted: -3.2626e-5 m3; name ww; = waterIn_L+ waterIn_R-tapwater/1000; lognormal variance with pedigree 0.0038, pedigree (2,3,1,5,1)
  Measured value. This value was taken from the "tap water production, conventional treatment, GLO" dataset (accessed 20170920) as it was considered adequate also for this dataset. It represents the average amount of wastewater produced during treatment.
  production volume; = PV_tapwater*(ww/tapwater)
    Calculated from the production volume of tap water, at user in proportion to the respective output amounts.
  properties: carbon content, fossil 0.00178991, carbon content, non-fossil 0.00178991, dry mass 0.337476 kg, water content 2962.17, wet mass 1000 kg
  note on carbon content, fossil: Assumed to be like in tap water. Bicarbonate content is 2.93 mol/m3. CO2 content is 0.1 mol/m3 (ecoinvent v2.2 report 8, Tab 93.1).
- water pump operation, diesel: 1.5967e-5 MJ; = diesel_use*density_diesel*NHV; lognormal variance with pedigree 0.004, pedigree (1,1,3,5,1)
  (same comment as for heat, district or industrial, natural gas)
  property density 0.84 kg/l; name density_diesel
  property fuel input in physical units, L 4.40008e-7 l; name diesel_use
  property heating value, net 43.2 MJ; name NHV
  properties: price 0.07 EUR2005
  note on heating value, net: Literature. net (lower) heating (calorific) value for diesel in MJ/kg
- water works, capacity 1.1E10l/year: 1.52103e-12 unit; = 1/(Q_av* days_per_year*lifetime*UnitConversion(1, 'm3', 'l')); lognormal variance with pedigree 0.004, pedigree (1,1,3,5,1)
  Calculated value taken from the "tap water production, conventional treatment, GLO" dataset (accessed 20170920) as it was considered adequate also for this dataset. Amount of water works construction attributed to the production of 1kg of tap water. Value is based on assumed lifetime production of water treatment plant and an assumed typical medium-sized plant of 30,000 m3/day.
  Uncertainty: C
  property lifetime 60 year; name lifetime
  property plant average daily flow rate 30000 m3/d; name Q_av
  note on lifetime: Estimated Value. Expected lifetime of water works as defined in the construction process.
  note on plant average daily flow rate: Fixed values, Flow rate of a conventional water purification plant for a medium-size facility as defined in the water works process.

## Inputs from nature
- Water, lake [natural resource, in water]: 8.83825e-5 m3; name waterIn_L; = tapwater*1.032626* 0.08559 /1000; lognormal variance with pedigree 0.0066, pedigree (3,1,3,5,1)
  Calculated value. It is assumed that the treatment process itselve have 3.3% losses and that 9% of the water is supplied by the lakes and 91% by rivers, similar to the GLO dataset.
- Water, river [natural resource, in water]: 0.000944244 m3; name waterIn_R; = tapwater*1.032626* (1-0.08559) /1000; lognormal variance with pedigree 0.0066, pedigree (3,1,3,5,1)
  (same comment as for Water, lake)

## Sampling procedure
Based on data from 1 local conventional treatment plant, representing 0.2% of the total produced tap water in Brazil. Conventional tap production facilities were regionalized in accordance to this treatment plant, which is located in Feira de Santana a city in Bahia, Brazil ( Guanais, A.L.R.; Cohim, E.B.; Medeiros, D.L., 2017). Data was taken from a particular study: Avaliação energética de um sistema integrado de abastecimento de água. ( Retrieved from: <http://www.scielo.br/pdf/esa/2017nahead/1809-4457-esa-s1413-41522017146180.pdf > pg.1191)

## Extrapolations
From one conventional tap water production facilities in Feira de Santana, a city in Bahia, Brazil, to all conventional facility in Brazil. Conventional treatment accounts for 90.8% of the total produced tap water in Brazil. Data was used for regionalizing the chemiclas and energy consumption, the remaining exchanges were copied from the global dataset.The uncertainty has been changed accordingly.

## Review by Philippe Loubet 2017-11-23
The overall quality of this dataset is good.
In the future it would be desirable to increase the representativness of this dataset by considering several conventional drinking water plants in Brazil.
