# enamelling

Dataset: EcoSpold 2, unit process
Geography: RER
Time period: 1993-01-01 to 2023-12-31
Technology level: current
Classification: EcoSpold01Categories: metals/processing
Classification: ISIC rev.4 ecoinvent: 2592:Treatment and coating of metals; machining
Synonyms: porcelain enamel
Tags: ConvertedDataset
Scenario: Business-as-Usual
System model: Allocation, cut-off by classification
Generated by: Niels Jungbluth
Published in: Althaus H.-J. 2000
Database: ecoinvent
isCopyrightProtected: true
accessRestrictedTo: 1

## General comment
Enamel is a glass of a particular chemical composition and physical nature determined for the surface protection of metal.
[This dataset was already contained in the ecoinvent database version 2. It was not individually updated during the transfer to ecoinvent version 3. Life Cycle Impact Assessment results may still have changed, as they are affected by changes in the supply chain, i.e. in other datasets. This dataset was generated following the ecoinvent quality guidelines for version 2. It may have been subject to central changes described in the ecoinvent version 3 change report (http://www.ecoinvent.org/database/ecoinvent-version-3/reports-of-changes/), and the results of the central updates were reviewed extensively. The changes added e.g. consistent water flows and other information throughout the database. The documentation of this dataset can be found in the ecoinvent reports of version 2, which are still available via the ecoinvent website. The change report linked above covers all central changes that were made during the conversion process.]

## Included activities start
The activity starts with the workpiece entering the process. The material on which this activity is applied it is not included as input.

## Included activities end
The basic inventory is split up into the major process stages degreasing, corroding, cleaning and firing as well as an inventory for the materials used for enamelling. All stages of enamelling are summed up not including the metal sheets treated. Data for infrastructure and land are estimated roughly with data for a metal coating plant.

## Geography
The inventory has been elaborated for the European situation based on data investigated in Germany.

## Technology
Single layer enamelling process. Powder coating technology. 600g enamel per m2 of steel metal sheet. Specifications of steel not known.

## Time period
Time of data collection.

## Parameters
- fraction, process water, to air: 0.15 dimensionless; name fraction_PW_to_air; lognormal variance with pedigree 0.092025, pedigree (4,4,3,2,4)
  Literature value. In case when no industry/process specific data are available, default evaporation fraction value is used. This value is 15% and is based on literature (Statistics Canada, 2007 & Shaffer, K.H., 2008, Consumptive water use in the Great Lakes Basin, USGS & Shiklomanov, 2003, World Water Resources at the Beginning of the 21st Century) and has been approved by an expert.
- fraction, tap water, to air: 0.15 dimensionless; name fraction_TW_to_air; = fraction_PW_to_air; lognormal variance with pedigree 0.092025, pedigree (4,4,3,2,4)
  Calculated value. See comment in the other parametres present in this dataset. Tap water is considered to be always used as process water, thus process water fractions to air are applied to all tap water input flows to calculate the amount of water consumed in the processes.

## Reference product
- enamelling: 1 m2; By-product classification allocatable product; CPC 88731: Metal treatment and coating services
  EcoSpold01Location=RER
  production volume 1.32237 m2
    This is a placeholder value that does not reflect real-world production volumes. This dataset does not currently require a real-world production volume to work in the database framework, and no actual data were collected yet. This has no negative effect on the results of the ecoinvent database. The placeholder value of this activity was scaled according to the nominal GDP of 2005 (source: United Nations, http://data.un.org/Glossary.aspx?q=GDP+%28current+US%24%29, accessed 20130726) to reflect an appropriate share of the global production volume, which is also a placeholder value.
  property price 1.95236 EUR2005
    Calculated based on inputs: The price of the product has been calculated as a sum of the values of the material and energy inputs for this product. This value is therefore a rough estimation. It may underestimate the real price since there are additional expenses when producing any product. These expences can include for example labour costs, treatment of waste materials and profit for the producer. Please consider carefully whether this level of data quality is acceptable for your application.
  properties: carbon allocation 0 kg, carbon content 0

## Inputs from technosphere
- aluminium oxide, non-metallurgical: 0.046 kg; lognormal variance with pedigree 0.0641, pedigree (3,4,5,3,1)
  EcoSpold01Location=RER
  Literature
  Uncertainty: Literature
  properties: dry mass 1 kg, wet mass 1 kg
- borax, anhydrous, powder: 0.289 kg; lognormal variance with pedigree 0.0641, pedigree (3,4,5,3,1)
  Literature
  EcoSpold01Location=RER
  Uncertainty: Literature
  properties: dry mass 1 kg, wet mass 1 kg
- chemical, inorganic: 0.0402 kg; lognormal variance with pedigree 0.0721, pedigree (3,4,5,3,3)
  Literature, special chemicals (corroding agent, nickel sulphate)
  EcoSpold01Location=GLO
  Uncertainty: Literature, special chemicals (corroding agent, nickel sulphate)
  properties: carbon content, fossil 0.003, dry mass 1 kg, wet mass 1 kg
  note on carbon content, fossil: This dataset is an unweighted average of 20 inorganic substances (listed in Tab 88.1, ecoinvent v2.2 report 8, part II), being part of the top100 chemicals included in this database. The C-content has also been calculated as an unweighted average of the C content of the substances composing this dataset.
- chemical, organic: 0.018 kg; lognormal variance with pedigree 0.0721, pedigree (3,4,5,3,3)
  EcoSpold01Location=GLO
  Literature, Organic adsorbers
  Uncertainty: Literature, Organic adsorbers
  properties: carbon content, fossil 0.628, dry mass 1 kg, heating value, net 19.03 MJ, wet mass 1 kg
  note on carbon content, fossil: This dataset is an unweighted average of 20 organic substances (listed in Tab 88.1, ecoinvent v2.2 report 8, part II), being part of the top100 chemicals included in this database. The C-content has also been calculated as an unweighted average of the C content of the substances composing this dataset.
- electricity, medium voltage: 14.4 kWh; lognormal variance with pedigree 0.0721, pedigree (3,4,5,3,3)
  Other energy carriers possible. Some manufacturers use also gas or oil.
  EcoSpold01Location=UCTE
  Uncertainty: Other energy carriers possible. Some manufacturers use also gas or oil.
- fly ash and scrubber sludge: -0.0951449, -0.00285505 kg (2 suppliers, which the file names only by identifier); sum of these -0.098 kg; lognormal variance with pedigree 0.0243, pedigree (3,4,2,3,1)
  EcoSpold01Location=CH
  Literature, Corroding bast
  Uncertainty: Literature, Corroding bast
  production volume
    Calculated from the production volume of enamelling in proportion to the respective output amounts.
  properties: carbon content, fossil 0.167, dry mass 0.1 kg, water content 9, wet mass 1 kg
  note on carbon content, fossil: Tab A.6, ecoinvent v2.2 report 13_I. C content has been calculated after data in the tables, and then referred to 1 kg DM
- lime, packed: 0.0334484, 0.000851597 kg (2 suppliers, which the file names only by identifier); sum of these 0.0343 kg; lognormal variance with pedigree 0.0641, pedigree (3,4,5,3,1)
  Literature
  EcoSpold01Location=CH
  Uncertainty: Literature
  properties: carbon content, fossil 0.117492, dry mass 0.998 kg, water content 0.00200401, wet mass 1 kg
  note on carbon content, fossil: Table 3.1, ecoinvent v2.2 report 7, part VII, pg 3. MW CaCO3=100, MW MgCO3=84
- metal coating facility: 3.33e-7 unit; lognormal variance with pedigree 0.6481, pedigree (5,5,5,3,5)
  EcoSpold01Location=RER
  Rough estimation
  Uncertainty: Rough estimation
- potassium nitrate: 0.0613636 kg; = 0.027*100/44; lognormal variance with pedigree 0.0641, pedigree (3,4,5,3,1)
  Literature
  This flow has been modified for version 3. The original flow "potassium nitrate, as K2O" has been changed to "potassium nitrate". The K2O content is 44% in potassium nitrate
  Uncertainty: Literature
  properties: dry mass 1 kg, wet mass 1 kg
- silica sand: 0.305 kg; lognormal variance with pedigree 0.0641, pedigree (3,4,5,3,1)
  Literature
  EcoSpold01Location=DE
  Uncertainty: Literature
  properties: dry mass 0.99 kg, water content 0.010101, wet mass 1 kg
- soap: 0.005 kg; lognormal variance with pedigree 0.0641, pedigree (3,4,5,3,1)
  Literature, Cleaning agents
  EcoSpold01Location=RER
  Uncertainty: Literature, Cleaning agents
  properties: carbon content, non-fossil 0.692237, dry mass 0.87 kg, heating value, net 17.93 MJ, water content 0.149425, wet mass 1 kg
  note on carbon content, non-fossil: Soap (CnH2n+1 COO Na) is produced by a combined saponification and neutralisation process performed on a blend of oleochemical feedstocks comprised of short chain (C12-14, derived from coconut or palm kernel oil) and long chain (C16-18, from tallow or palm oil) esters.The ratio of short to long fatty acid chains is 20:80 (ecoinvent v2.2 report 12). Short fatty acid has been estimated as C12.5H(2*12.5+1); MW R=176 g/mol. Long fatty acid has been estimated as C16H(2*16+1); MW R=225 g/mol. MW of COONa=67 g/mol
- sulfuric acid: 0.03 kg; lognormal variance with pedigree 0.0641, pedigree (3,4,5,3,1)
  Literature
  EcoSpold01Location=RER
  Uncertainty: Literature
  properties: dry mass 1 kg, wet mass 1 kg
- tap water: 73 kg; name tap_water_input; lognormal variance with pedigree 0.0641, pedigree (3,4,5,3,1)
  Literature
  EcoSpold01Location=RER
  Uncertainty: Literature
  properties: carbon content, fossil 0.00178991, dry mass 0.000337476 kg, water content 2962.17, wet mass 1 kg
  note on carbon content, fossil: Bicarbonate content is 2.93 mol/m3. CO2 content is 0.1 mol/m3 (ecoinvent v2.2 report 8, Tab 93.1).
- wastewater, average: -0.00178962, -0.0712104 m3 (2 suppliers, which the file names only by identifier); sum of these -0.073 m3; lognormal variance with pedigree 0.0843, pedigree (3,4,2,3,4)
  Specific emissions not known
  EcoSpold01Location=CH
  Uncertainty: Specific emissions not known
  production volume
    (same comment as for fly ash and scrubber sludge)
  properties: carbon content, non-fossil 0.194039, dry mass 0.346837 kg, mass concentration, TOC 0.1091 kg/m3, mass concentration, calcium 0.039453 kg/m3, mass concentration, chlorine 0.030031 kg/m3, mass concentration, hydrogen 0.013365 kg/m3, mass concentration, nitrogen 0.031015 kg/m3, mass concentration, oxygen 0.069824 kg/m3, mass concentration, sodium 0.06456 kg/m3, mass concentration, sulfur 0.015602 kg/m3, water content 2882.2, wet mass 1000 kg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
  note on carbon content, non-fossil: 0.0673 kg TOC/m3 (Tab A.17, ecoinvent v2.2 report 13_I). TOC was considered as Total Carbon.

## Emissions to nature
- Particulate Matter, > 2.5 um and < 10um [air, unspecified]: 0.012 kg; lognormal variance with pedigree 0.1801, pedigree (4,4,5,3,1)
  Calculation, emission from combustion.
  Uncertainty: Calculation, emission from combustion.
- Sulfur dioxide [air, unspecified]: 0.002 kg; lognormal variance with pedigree 0.1001, pedigree (4,4,5,3,1)
  Literature
  Uncertainty: Literature
- Water [air, unspecified]: 0.01095 m3; name water_to_air_unspecified; = (tap_water_input/1000*fraction_TW_to_air); lognormal variance with pedigree 0.0807, pedigree (2,2,5,1,1)
  Calculated value based on literature values and expert opinion. See comments in the parametres' comment field.
  property fraction, origin: fresh water 1; name fraction_origin_fresh_water
  property fraction, origin: salt water 0; name fraction_origin_salt_water
  property fraction, origin: unspecified 0; name fraction_origin_unspecified

## Sampling procedure
Literature review, data provided by producers.

## Extrapolations
Study for Germany used as a basis for the assessment of the European average.

## Review by Hans-Jörg Althaus 2003-05-30
passed
