# laterite quarry operation

Dataset: EcoSpold 2, unit process
Geography: RoW
Time period: 2014-05-01 to 2023-12-31
Technology level: current
Classification: EcoSpold01Categories: construction materials/additives
Classification: ISIC rev.4 ecoinvent: 0810:Quarrying of stone, sand and clay
Scenario: Business-as-Usual
System model: Allocation, cut-off by classification
Generated by: Parag Mundada
Published in: Kiran Ananth P. V. 2017
Database: ecoinvent
isCopyrightProtected: true
accessRestrictedTo: 1

## General comment
This dataset is extrapolated from the IN corresponding dataset. The Indian dataset, based on which this GLO dataset is built, is itself built on the bauxite mine operation/GLO (accessed on 20170823) dataset in which some exchanges have been edited to make it specific to extraction of laterite in India.Laterite is a residual ferruginous rock commonly found in tropical regions and has close association in terms of composition with bauxite. Laterite and bauxite show a tendency to occur together. Laterite occurance are widespread in the country. Almost all indian bauxite deposits are associated with laterite, except those in Jammu and Kashmir region. This dataset contain only laterite mining operation there is no coproduction of bauxite. As per the Goverment of India notification dated 10th february 2015, laterite has been declared as "Minor Mineral", hence the production beyond january 2015 is not available. Total laterite consumption by cement plant in India is 5.35 million tonnes.Laterite used in cement unit as an additives for lowering the clinkerisation temperature and supplementing aluminous and iron contents.

## Included activities start
Exploration, Mining, Drilling & Blasting

## Included activities end
This activity ends with mined laterite at the quarry gate. This dataset includes all transport within the quarry (for extraction and recultivation)

## Geography
This dataset represents laterite quarry operation representative for the whole world. It is built on data representative of Madhya Pradesh in India. Uncertainty adjusted accordingly

## Technology
Open Cast Mining

## Time period
The data represent here is for year 2014-15. Since laterite were declared as minor mineral, data onward 2015 is not available. Uncertainty adjusted accordingly.

## Reference product
- laterite, mineral: 1 kg; By-product classification allocatable product; CPC 16390: Other minerals n.e.c.; HS2017 680299: Stone; natural (excluding marble, travertine, alabaster, other calcareous stone or granite), monumental or [...]
  production volume 4.18554e10 kg
    Estimated value. No information regarding global laterite mining was found. Laterite constitutes 1/3 of earth continental land. Laterite can have different concentration of different materials, such as nickel and cobalt, and it can be therefore extracted for different reasons (https://en.wikipedia.org/wiki/Laterite). Laterite is used also in the cement industry (see the general comment for this activity). Laterite is mainly found in tropical regions: Latin America, West Africa, India and Australia. The only information found are the PV of India (4650597000kg*), laterite is also used for projects on sustainable building blocks for countries such as Nigeria and Ghana (Aguwa 2009 and KFH 2012).
    It is here assumed that India represent 10% of the world. This is a very uncertain value. Please do not use this value if this is key in your research.
    References:
    *Production of laterite in year 2014-15. Ref. Indian Minerals Yearbook 2015 (Part III - Mineral Reviews) Laterite. As per government of Indialaterite has declared as "Minor Mineral"hence the production beyond January 2015 is not available.
    Aguwa, J. 2009. Study of Compressive Strengths of Laterite-Cement Mixes as a Building Material. AU J.T. 13(2) 114-120 (Oct. 2009). Retrieved from: <http://www.journal.au.edu/au_techno/2009/oct09/journal132_article07.pdf>, accessed 15th Sept 2017
    KFH 2012. Development of building blocks made of laterite and agricultural residues as an environmentally friendly alternative to cement blocks. Retrieved from: https://www.swissuniversities.ch/fileadmin/swissuniversities/Dokumente/Internationales/DC_office/1110_04_BRUNNER_Ghana_DFT.pdf, accessed 15th Sept 2017
  property price 0.0075477 EUR2005
    The assumed price for laterite is 800 INR per ton based on sale prices from https://dir.indiamart.com/impcat/laterite.html (accessed on the 2020-12-22). Taking into account the average conversion rate for 2020 (84.4 INR per EUR, based on https://www.ecb.europa.eu/stats/policy_and_exchange_rates/euro_reference_exchange_rates/html/eurofxref-graph-inr.en.html), and the inflation rate from 2005 to 2019 in the euro area, (23.6%, based on https://ec.europa.eu/eurostat/statistics-explained/index.php/Inflation_in_the_euro_area), the price of 1 kg of laterite is 800/1016.047/84.4/1.236 = 0.0075477 EUR2005.
  properties: carbon allocation 0 kg, carbon content 0, carbon content, fossil 0, carbon content, non-fossil 0, dry mass 1 kg, water content 0, water in wet mass 0 kg, wet mass 1 kg

## Inputs from technosphere
- blasting: 0.000195 kg; lognormal variance with pedigree 0.0821, pedigree (1,2,5,5,4)
  Data from bauxite mine operation/GLO (accessed 20170823)
- conveyor belt: 2.78e-8 m; lognormal variance with pedigree 0.47, pedigree (1,5,5,5,5)
  Data from ilmenite-magnetite mine operation/GLO (accessed 20170823)
- electricity, medium voltage: 1.61942e-5, 1.44034e-6, 0.000125582, 0.000164563, 0.000174273, 8.87662e-5, 1.226e-5, 7.75965e-5, 3.27554e-6, 0.000524431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 kWh (47 suppliers, which the file names only by identifier); sum of these 0.017782 kWh; lognormal variance with pedigree 0.0152, pedigree (3,3,3,5,3)
  Utility power consumption (Compressor, Water pump etc.) Also fuel requirement of tippers, excavator, road roller converted to equivalant electrical energy
- heat, district or industrial, other than natural gas: 0.00645774 MJ; lognormal variance with pedigree 0.0852, pedigree (2,4,5,5,4)
  Data from bauxite mine operation/GLO (accessed 20170823)
  properties: corresponding fuel use, propane, furnace >100kW 1.05263 MJ, heating value, net 1 MJ
  note on corresponding fuel use, propane, furnace >100kW: Lower heating value of the fuel input related to the heat/electricity output, taken directly from ecoinvent v3.0 dataset "heat production, natural gas, at industrial furnace >100kW, GLO 2000".
- heat, district or industrial, other than natural gas: 0.0113542 MJ; lognormal variance with pedigree 0.0838, pedigree (2,3,5,5,4)
  Data from bauxite mine operation/GLO (accessed 20170823)
- industrial machine, heavy, unspecified: 2.02323e-6, 4.09677e-6 kg (2 suppliers, which the file names only by identifier); sum of these 6.12e-6 kg; lognormal variance with pedigree 0.47, pedigree (1,5,5,5,5)
  Referred ecoinvent dataset ilmenite- magnetite minig operation, GLO
- mine infrastructure, bauxite: 5e-11 unit; lognormal variance with pedigree 0.3846, pedigree (3,3,5,5,4)
  Data from bauxite mine operation/GLO (accessed 20170823)
  properties: lifetime capacity [kg] 2e10 kg
  note on lifetime capacity [kg]: 1E9 kg&year: 20 years lifetime. Source: ecoinvent v2 report 10-part I, Tab 5.1
- recultivation, bauxite mine: 0.000421 m2; lognormal variance with pedigree 0.1346, pedigree (2,4,3,5,3)
  Environment impact assessment report laterite mine operation

## Inputs from nature
- Laterite [natural resource, in ground]: 1 kg; lognormal variance with pedigree 0.098, pedigree (5,4,5,5,3)
  Data represents amount of laterite extracted from ground. Estimated value. No losses considered in the process.
- Occupation, mineral extraction site [natural resource, land]: 0.01136 m2*year; lognormal variance with pedigree 0.3146, pedigree (2,4,3,5,3)
  Environment impact assesment report laterite mine operation
- Transformation, from unspecified [natural resource, land]: 0.000421 m2; lognormal variance with pedigree 0.1346, pedigree (2,4,3,5,3)
  Environment impact assessment report laterite mine operation
- Transformation, to mineral extraction site [natural resource, land]: 0.000421 m2; lognormal variance with pedigree 0.1346, pedigree (2,4,3,5,3)
  Environment impact assessment report laterite mine operation
- Water, unspecified natural origin [natural resource, in water]: 0.0005 m3; name water_input; lognormal variance with pedigree 0.0826, pedigree (1,3,5,5,4)
  Data from bauxite mine operation/GLO (accessed 20170823)

## Emissions to nature
- Particulate Matter, < 2.5 um [air, unspecified]: 8.35627e-6 kg; lognormal variance with pedigree 0.0832, pedigree (2,3,5,5,4)
  Data from bauxite mine operation/GLO (accessed 20170823)
- Particulate Matter, > 10 um [air, unspecified]: 8.64373e-5 kg; lognormal variance with pedigree 0.0832, pedigree (2,3,5,5,4)
  Data from bauxite mine operation/GLO (accessed 20170823)
- Particulate Matter, > 2.5 um and < 10um [air, unspecified]: 7.52064e-5 kg; lognormal variance with pedigree 0.0832, pedigree (2,3,5,5,4)
  Data from bauxite mine operation/GLO (accessed 20170823)
- Water [air, unspecified]: 0.00045 m3; = water_input-water_fresh_output; lognormal variance with pedigree 0.132, pedigree (4,4,5,5,4)
  Calculated value based difference between input water, water emissions to water.
- Water [water, surface water]: 5e-5 m3; name water_fresh_output; lognormal variance with pedigree 0.132, pedigree (4,4,5,5,4)
  Data from bauxite mine operation/GLO (accessed 20170823)

## Sampling procedure
Environment Impact Assessment Report of Makdawan Laterite mine in state of Madhya Pradesh. Report were prepared to take environement clearance to enhance the mining lease area by considering its impact on environement. The report consists of Reserve, Life of mine, Expected production, Resources required, quality of air and water, waste generation and employment creation etc.

## Extrapolations
The Indian dataset, based on which this GLO dataset is built, on the bauxite mine operation/GLO (accessed 20170823) dataset in which some exchanges have been edited to make it specific to extraction of lateritein Madhya Pradesh, India. Uncertainty adjusted accordingly.
