# electricity production, hard coal

Dataset: EcoSpold 2, unit process
Geography: TH
Time period: 1980-01-01 to 2023-12-31
Technology level: modern
Classification: EcoSpold01Categories: hard coal/power plants
Classification: ISIC rev.4 ecoinvent: 3510:Electric power generation, transmission and distribution
Synonyms: coking coal; anthracite; other bituminous coal
Tags: coal power; hard coal power; fossil fuels
Scenario: Business-as-Usual
System model: Allocation, cut-off by classification
Generated by: Karin Treyer
Published in: Röder, A. 2007
Database: ecoinvent
isCopyrightProtected: true
accessRestrictedTo: 1

## General comment
This dataset represents the production of high voltage electricity in an average hard coal power plant in Thailand in 2012. "Hard coal" includes anthracite, coking coal and other bituminous coal according to the definition of the IEA electricity information 2014. (IEA. 2014. Electricity Information 2014. ISBN 978-92-64-21692-1. International Energy Agency (IEA), Paris Cedex (FR).)
All exchanges in this dataset except for emissions of SO2, NOx and particles are production-weighted averages of the figures in the datasets in ecoinvent version two, which are valid for the following 14 countries: AT, BE, ES, FR, IT, NL, PT, DE, CZ, HR, PL, SK, CN, US. The exception values are production-weighted averages of version 2 countries and the new countries in version 3 (AU, CA, CL, ID, IN, KR, MX, MY, PE, RU, TH, TR, TW, TZ, UA, ZA)
Comments on the inventory data of emissions:
- For the assessment of main characteristics (sulphur and ash content of coal, efficiency of the plant) and CO2 a bottom-up approach has been used. It consists in the collection of information about single plants.
- The size distribution of particle emissions has been derived from German data.
- Halogene emissions have been estimated on the basis of the content of the species in the country-specific coal input mix, assuming average retention rates.
- For CO and particle emissions average values for the former UCTE are included (Union for the Coordination of the Transmission of Electricity, since 2009 replaced by ENTSO-E European Network of Transmission System Operators for Electricity).
- The country specific emission depend on the share of DeNOx.
- Emissions of trace elements were calculated by means of a formula (CORINAIR) using the ash content in the country-specific coal input mix and average transfer coefficients for coal power plants, taking into account the share of DeSOx installed.
- Emission of uranium and thorium radioactive isotopes were assumed proportional to the corresponding element emitted with particles; the other non-gaseous radioactive isotopes of the uranium and thorium decay chain were assumed proportional to the emitted U-238 or Th-232.
- The emission of gaseous radon and K-40 are taken from the literature.
IEA. 2009. Coal information, 2009 edition. Documentation for beyond 2020 files. International Energy Agency.
European Environment Agency (1991) CORINAIR Inventory; VOC"s Default Emission Factors
[This dataset is meant to replace the following datasets:]

## Included activities start
From the constructed hard coal power plant ready to produce electricity.
From reception of hard coal and operating materials at power plant gate.

## Included activities end
This activity ends with 1kWh of high voltage electricity produced at the power plant and arrived at the busbar.

This dataset includes:
- all operation and maintenance activities and materials of the power plants.
- Use of fuel oil for startup
- Particle removal (dedusting of the flue gas)

- Desulfurisation and denitrification. These processes are described in separate modules; it can be decided by changing the values of NOx and SOx retained whether and how much DeNOx and DeSOx are installed.
- Cooling: It is assumed that all plants use wet cooling with a cooling tower. No cooling tower is included in this dataset (will be implemented in future versions)
- Loss of feed water

This dataset doesn"t include
- raw materials extraction, decommissioning and waste treatment as these activities are already included in the infrastructure datasets
- transformation of the electricity produced
- The disposal of non-recycled ashes is modelled separately.

## Technology
POWER PLANT:
Hard coal power plant input is a market mix of 100MWe power plants (representing all power plants with a capacity <250MWe and 7% of the installed capacity) and 500MWe power plants (representing all power plants with a capacity >250MWe and 93% of the installed capacity). The plants are used for middle load with 4000 hours of operation at full capacity per year. The plants are assumed to operate 150000 hours during its lifetime.
OTHER DATA:
{{children_only_technology}}
- Average efficiency: {{efficiency}}
- Share of installed capacity with desulfurisation 1% (figure based on IEA 212 )
- Average efficiency of desulfurisation installations: 92% no data
- Share of installed capacity with denitrification (primary and/or secondary installations): 9% (figure based on IEA 212 )
- Average efficiency of denitrification installations: 6% (estimation based on Dones et al. 27, p.128. Valid for primary denitrification systems)
- Share of installed capacity with particle filters: 95% (figure based on IEA 212 )
- Average efficiency of particle filters: no data
- IEA 2012. Coal Power Database. International Energy Agency Clean Coal Centre, London
- IEA/OECD. 2010. Electricity Information 2010. International Energy Agency (IEA), Paris Cedex (FR). Part IV. Detailed OECD Electricity And Heat Data.
- Dones, R., Bauer, C., Röder, A. (2007) Kohle. In: Dones, R. (Ed.) et al., Sachbilanzen von Energiesystemen: Grundlagen für den ökologischen Vergleich von Energiesystemen und den Einbezug von Energiesystemen in Ökobilanzen für die Schweiz. Final report ecoinvent No.

## Time period
The Annual Production Volume is valid for the year 2012.

## Parameters
- efficiency: 0.31 dimensionless; lognormal variance with pedigree 0.003825, pedigree (3,3,1,2,2)
  Literature value/calculated value. Net electrical efficiency based on the lower heating value (LHV).
  For all OECD countries, the IEA Electricity information 2014 provides data for the year 2012 on fuel input (TJ, Net calorific value NCV) and gross electricity production (GWh) as well as heat production (TJ) in tables 8 and 9 for each country for electricity only and Combined Heat and Power (CHP) plants each. Together with the information on own use (see parameter "losses"), the net electrical efficiency based on the NCV is calculated.
  For all non-OECD countries, data from the IEA Energy balances of non-OECD countries 2014 have been used. These tables do not always provide information on how much of the electricity has been produced in electricity only and in CHP plants, but often give the total value only.
  IEA. 2014. Electricity Information 2014. ISBN 978-92-64-21692-1. International Energy Agency (IEA), Paris Cedex (FR).
  IEA/OECD. 2014. Energy balances of non-OECD countries 2014. International Energy Agency (IEA), Paris Cedex (FR).
- factor: input of MJ for the production of 1 kWh: 11.6129 MJ/kWh; name factor_MJ_kWh; = 1*3.6/efficiency; lognormal variance with pedigree 0.0532, pedigree (4,4,3,4,4)
  Calculated value. 3.6 MJ = 1kWh.
  nan
- fraction, cooling water, to air: 0.0299662 dimensionless; name fraction_CW_to_air; = (WConsumption_EP_HC_recirculatingCS*recirculating_CS_fraction_from_allCS+WConsumption_EP_HC_once_through_andCP_CS*once_through_andCP_CS_fractio_from_allCS)/(WWithdrawal_EP_HC_recirculating_CS*recirculating_CS_fraction_from_allCS+WWithdrawal_EP_HC_once_through_andCP_CS*once_through_andCP_CS_fractio_from_allCS); lognormal variance with pedigree 0.092025, pedigree (4,4,3,2,4)
  Calculated
  nan
- fraction, process water, to air: 0.15 dimensionless; name fraction_PW_to_air; lognormal variance with pedigree 0.092025, pedigree (4,4,3,2,4)
  Literature value. In case when no industry/process specific data are available, default evaporation fraction value is used. This value is 15% and is based on literature (Statistics Canada, 2007 & Shaffer, K.H., 2008, Consumptive water use in the Great Lakes Basin, USGS & Shiklomanov, 2003, World Water Resources at the Beginning of the 21st Century) and has been approved by an expert.
  nan
- fraction, water, completely softened, to air: 0.15 dimensionless; name fraction_WCS_to_air; = fraction_PW_to_air; lognormal variance with pedigree 0.092025, pedigree (4,4,3,2,4)
  Calculated value. See comment in the other parametres present in this dataset. Water, completely softened is considered to be always used as process water, thus process water fractions to air are applied to all water, completely softened input flows to calculate the amount of water consumed in the processes.
  nan
- fraction, water, decarbonised, to air: 0.0299662 dimensionless; name fraction_WDC_to_air; = fraction_CW_to_air; lognormal variance with pedigree 0.092025, pedigree (4,4,3,2,4)
  Calculated value. See comments in the other parametres present in this dataset. Decarbonised water is considered to be always used as cooling water, thus cooling water fractions to air are applied to all carbonised water input flows to calculate the amount of water consumed in the processes.
  nan
- gross electricity production: 1.575e10 kWh; name gross_electricity; lognormal variance with pedigree 0.0012, pedigree (2,1,1,1,1)
  Literature value/statistics. Taken from the IEA electricity information 2014, table 1.3.
  IEA. 2014. Electricity Information 2014. ISBN 978-92-64-21692-1. International Energy Agency (IEA), Paris Cedex (FR).
  nan
- losses from gross electricity production: 0.07 dimensionless; name losses_gross_net; lognormal variance with pedigree 0.003525, pedigree (3,2,2,2,2)
  Calculated value. Own use of electricity plants in this country in 2012. For the non-OECD countries, the losses were first calculated for the total electricity sector based on the IEA electricity information 2014, table 1.1 (net electricity = gross electricity minus own use). However, this value can be very low if the share of electricity from fossiles is low in a specific country. Therefore, the default loss as described by the IEA in the electricity statistic is applied, which is 0.07 (IEA electricity information 2014: The difference between gross and net electricity production is generally observed to be about 7% for conventional thermal stations, 1% for hydro stations and 6% for nuclear.)
  IEA. 2014. Electricity Information 2014. ISBN 978-92-64-21692-1. International Energy Agency (IEA), Paris Cedex (FR).
  nan
  Uncertainty: G
- once-through and cooling pond cooling systems as a fraction of all cooling syste: 0.625 dimensionless; name once_through_andCP_CS_fractio_from_allCS; lognormal variance with pedigree 0.092025, pedigree (4,4,3,2,4)
  Calculated as an average of data available for Europe (Floerke, 2008, Future changes of freshwater needs in the electricity production sector) and USA (NERL, 2011, Estimating freshwater needs to meet future thermoelectric generation requirements).
  nan
- recirculating cooling system as a fraction of all cooling systems: 0.375 dimensionless; name recirculating_CS_fraction_from_allCS; lognormal variance with pedigree 0.092025, pedigree (4,4,3,2,4)
  (same comment as for once-through and cooling pond cooling systems as a fraction of all coo)
- water consumption, electricity production from hard coal, once-through and cooli: 0.0014 m3/kWh; name WConsumption_EP_HC_once_through_andCP_CS; lognormal variance with pedigree 0.092025, pedigree (4,4,3,2,4)
  Estimated based on literature (Scown, 2011, Water Footprint of U.S. Transportation Fuels, SI). The amount of water consumed while burning lignite and peat is assumed to be the same as in case of coal.
  nan
- water consumption, electricity production from hard coal, recirculating CS: 0.0018 m3/kWh; name WConsumption_EP_HC_recirculatingCS; lognormal variance with pedigree 0.092025, pedigree (4,4,3,2,4)
  (same comment as for water consumption, electricity production from hard coal, once-through)
- water withdrawal, electricity production from hard coal, once-through and coolin: 0.0815 m3/kWh; name WWithdrawal_EP_HC_once_through_andCP_CS; lognormal variance with pedigree 0.092025, pedigree (4,4,3,2,4)
  Estimated based on literature (Scown, 2011, Water Footprint of U.S. Transportation Fuels, SI). The amount of water withdrawn while burning lignite and peat is assumed to be the same as in case of coal.
  nan
- water withdrawal, electricity production from hard coal, recirculating CS: 0.0021 m3/kWh; name WWithdrawal_EP_HC_recirculating_CS; lognormal variance with pedigree 0.092025, pedigree (4,4,3,2,4)
  (same comment as for water withdrawal, electricity production from hard coal, once-through )

## Reference product
- electricity, high voltage: 1 kWh; name electricity; By-product classification allocatable product; CPC 17100: Electrical energy; HS2017 271600: Electrical energy
  production volume 1.47397e10 kWh; name electricity_apv; = gross_electricity*(1- losses_gross_net)
    Calculated value
  property price 0.0977 EUR2005
    Temporary price data. Calculated as 90% of purchasers price based on: 94% of the average price (to account for a 6% loss in transformation and transmission) for electricity for industrial consumersin 2005 (excluded taxes). From IEA.
  properties: carbon allocation 0 kg, carbon content 0

## Inputs from technosphere
- SOx retained, in hard coal flue gas desulfurisation: 0.03 kg; name sox_retained; source IEA 2012; lognormal variance with pedigree 0.0094, pedigree (2,1,4,1,1)
  Calculated value departing from the installed desulfurisation, its efficiency and the SO2 emitted in the air (see Technology Comment for details).
  properties: dry mass 1 kg, wet mass 1 kg
- hard coal: 0.508645 kg; name hard_coal; = factor_MJ_kWh*0.0438; source IEA 2012; lognormal variance with pedigree 0.0532, pedigree (3,3,5,5,3)
  Calculated value. The quantification of coal input depends on the energy content of the coal burned. This energy content differs for single hard coal qualities from different production regions from 19.4 MJ/kg to 31.5 MJ/kg (MIT 2007). For the US NERC regions, the supply is modeled with three production regions with hard coal of different quality and thus energy content.
  Appalachian coal (in terms of lower heating value = 27.5 MJ/kg) is assumed to be used in the following NERC regions: FRCC, NPCC, and RFC. Western coal (LHV = 20.2 MJ/kg) is assumed to be used in the regions ERCOT, MRO, and WECC. Coal from the Interior (LHV = 24.5 MJ/kg) is assumed to be used in the region SPP; and the SERC region is assumed to be supplied by mix of different qualities, i.e. US average hard coal mix as first approximation (LHV = 24.0 MJ/kg). This modelling appears to be consistent with the coal production per region (Appalachian, West, Interior) (MIT 2007) and the consumption per NERC region in 2004 (eGRID 2006), because the total amounts of coal from the three regions for power plant supply are below the total coal production in these mining regions.
  MIT 2007: Massachusetts Institute of Technology (2007) The Future of Coal. Options for a carbon constrained world. ISBN 978-0-615-14092-6. MIT, Cambridge, US, <http://web.mit.edu/coal/>.
  eGRID 2006: Emissions & Generation Resource Integrated Database (2006) Inventory of US electric power system, excel-file "eGRID2006yr04plant121506.xls" (15.12.2006), <http://www.epa.gov/cleanenergy/egrid/index.htm>.
  properties: carbon content, fossil 0.845, dry mass 0.94 kg, heating value, net 27.91 MJ, water content 0.0638298, wet mass 1 kg
  note on carbon content, fossil: C content 75-94% (specified in Tab 1.1, report 6, part VI). A mean content of 0.845 kg C/ kg dry hard coal was considered
  note on heating value, net: Based on the Characterization factor of Hard coal in the CED method
- hard coal ash: -0.0868645 kg; name amount_ash; = factor_MJ_kWh*0.00748; lognormal variance with pedigree 0.0926, pedigree (5,3,3,5,3)
  Calculated value.
  Hard coal ash can either be used as secondary product ("recycled"), or be disposed of. According to (NREL 2006), the rate of ash production is 0.0915 kg ash per kg burned coal (includes fly ash, bottom ash, and boiler slag). Thereof, 30% is further used; the rest must be disposed of (NREL 2006).
  US National Renewable Energy Laboratory (2006) U.S. Life-Cycle Inventory (LCI) Database, <http://www.nrel.gov/lci/about.html>, last updated in the coal chain as of October 2006, according to http://www.nrel.gov/lci/database/pdf/USLCIDB_ChangeLog.pdf.
  production volume; = amount_ash/electricity*electricity_apv
    Calculated from the production volume of hard coal, burned in power plant in proportion to the respective output amounts.
  properties: dry mass 1 kg, wet mass 1 kg
- hard coal power plant: 1.33333e-11 unit; name hard_coal_power_plant; = 1/ (150000*500*1000); source Röder, A. 2007; lognormal variance with pedigree 0.4006, pedigree (5,3,5,5,3)
  Calculated value. At the moment, the hard coal power plant input consists of a market mix of a 100MWe power plant and a 500MWe power plant
  .
  For this calculation, 4000 load hours per year are assumed. It is assumed that a total of 150"000h is reached during the lifetime. A capacity of 500MW is taken for the calculation.
- light fuel oil: 0.000197419 kg; name light_fuel_oil; = factor_MJ_kWh*0.000017; lognormal variance with pedigree 0.056, pedigree (3,4,5,5,1)
  Literature value/calculated value. Light fuel oil use per 1MJ of hard coal burned, use for start-up of the power plant after shut down. Weighted average with electricity production data (Itten&Frischknecht 2012) and ight fuel oil use values of 14 countries
  (AT, BE, ES, FR, IT, NL, PT, DE, CZ, HR, PL, SK, CN, US) (Röder et al. 2007)
  Country values are typical values for hard coal plants.
  Source:
  Itten R. and Frischknecht R. (2012) Life Cycle Inventories of Electricity Mixes and Grid. ESU-services Ltd., Uster, Switzerland.
  properties: carbon content, fossil 0.862, dry mass 1 kg, heating value, net 42.6 MJ, wet mass 1 kg
- residue from cooling tower: -6.3871e-5 kg; name amount_residue; = factor_MJ_kWh*0.000005*1.1; lognormal variance with pedigree 0.0752, pedigree (5,3,3,5,2)
  Literature value/calculated value. "Use" of cooling tower when producing 1kWh of electricity from hard coal, based on the value for burning 1MJ of hard coal.
  US average, based on (NREL 2006).
  US National Renewable Energy Laboratory (2006) U.S. Life-Cycle Inventory (LCI) Database, <http://www.nrel.gov/lci/about.html>, last updated in the coal chain as of October 2006, according to http://www.nrel.gov/lci/database/pdf/USLCIDB_ChangeLog.pdf.
  production volume; = amount_residue/electricity*electricity_apv
    (same comment as for hard coal ash)
  properties: carbon content, fossil 0.0544233, dry mass 0.7 kg, water content 0.428571, wet mass 1 kg
- water, completely softened: 0.0696774 kg; name water_completely_softened; = factor_MJ_kWh*0.006; lognormal variance with pedigree 0.086, pedigree (4,5,5,5,3)
  Literature value/calculated value. Feed water for the steam circuit lost when producing 1kWh of electricity from hard coal, based on the value for burning 1MJ of hard coal. Röder et al. 2007, Tab. 9.65 and Tab. 9.66, p. 160f.
  properties: wet mass 1 kg
- water, decarbonised: 2.32258 kg; name water_decarbonised_user; = factor_MJ_kWh*0.2; lognormal variance with pedigree 0.086, pedigree (4,5,5,5,3)
  Literature value/calculated value. Cooling water, decarbonised, for the cooling water circuit lost when producing 1kWh of electricity from hard coal, based on the value for burning 1MJ of hard coal. Röder et al. 2007, Tab. 9.65 and Tab. 9.66, p. 160f. These tables give an amount of 0.15 kg/MJ burned, which is valid for the assumption of 75% wet cooling and 25% run-through cooling. However, this revised dataset assumes 100% wet cooling.
  properties: wet mass 1 kg

## Inputs from nature
- Water, cooling, unspecified natural origin [natural resource, in water]: 0.0531103 m3; name water_cooling_UNO_input; = ((recirculating_CS_fraction_from_allCS*WWithdrawal_EP_HC_recirculating_CS)+(once_through_andCP_CS_fractio_from_allCS*WWithdrawal_EP_HC_once_through_andCP_CS))/11.31*factor_MJ_kWh; lognormal variance with pedigree 0.130025, pedigree (4,4,5,2,4)
  Calculated based on literature data.

## Emissions to nature
- 1,1,1-Trichloroethane [air, non-urban air or from high stacks]: 1.91613e-9 kg; name ethane_trichloro; = factor_MJ_kWh*0.000000000165; lognormal variance with pedigree 0.1726, pedigree (3,3,5,5,3)
  Literature value/calculated value. Emissions when producing 1kWh of electricity from hard coal, based on the value for burning 1MJ of hard coal.
  US average, based on (NREL 2006).
  US National Renewable Energy Laboratory (2006) U.S. Life-Cycle Inventory (LCI) Database, <http://www.nrel.gov/lci/about.html>, last updated in the coal chain as of October 2006, according to http://www.nrel.gov/lci/database/pdf/USLCIDB_ChangeLog.pdf.
- Acenaphthene [air, non-urban air or from high stacks]: 4.87742e-11 kg; name acenaphthene; = factor_MJ_kWh*0.0000000000042; lognormal variance with pedigree 0.1726, pedigree (3,3,5,5,3)
  (same comment as for 1,1,1-Trichloroethane)
- Acrolein [air, non-urban air or from high stacks]: 2.77548e-8 kg; name acrolein; = factor_MJ_kWh*0.00000000239; lognormal variance with pedigree 0.3906, pedigree (5,3,5,5,3)
  (same comment as for 1,1,1-Trichloroethane)
- Actinides, radioactive, unspecified [air, non-urban air or from high stacks]: 0.000198581 kBq; name actinides_radioactive_unspecified; = factor_MJ_kWh*0.0000171; lognormal variance with pedigree 0.3526, pedigree (3,3,5,5,3)
  Literature value/calculated value. Emissions when producing 1kWh of electricity from hard coal, based on the value for burning 1MJ of hard coal.
  Average US emissions of radionuclides are based on (USEPA 1998, pg. 9-6). Reported radionuclide species without corresponding elementary flow in ecoinvent are categorized as "Actinides, radioactive, unspecified".
  U. S. Environmental Protection Agency (EPA) (1998) The Study of Hazardous Air Pollutant Emissions from Electric Utility Steam Generating Units - Final Report to Congress. Volumes 1 and 2. EPA-453/R-98-004a and EPA-413/R-98-004b.-98-004b
- Aldehydes, unspecified [air, non-urban air or from high stacks]: 9.0929e-8 kg; name aldehydes_unspecified; = factor_MJ_kWh*0.00000000783; lognormal variance with pedigree 0.1726, pedigree (3,3,5,5,3)
  (same comment as for 1,1,1-Trichloroethane)
- Antimony ion [air, non-urban air or from high stacks]: 1.39355e-8 kg; name antimony; = factor_MJ_kWh*0.0000000012; lognormal variance with pedigree 0.7806, pedigree (5,3,5,5,3)
  (same comment as for 1,1,1-Trichloroethane)
- Arsenic ion [air, non-urban air or from high stacks]: 1.15781e-7 kg; name arsenic; = factor_MJ_kWh*0.00000000997; lognormal variance with pedigree 0.7806, pedigree (5,3,5,5,3)
  (same comment as for 1,1,1-Trichloroethane)
- Barium II [air, non-urban air or from high stacks]: 7.53677e-7 kg; name barium; = factor_MJ_kWh*0.0000000649; lognormal variance with pedigree 0.7806, pedigree (5,3,5,5,3)
  (same comment as for 1,1,1-Trichloroethane)
- Benzene [air, non-urban air or from high stacks]: 1.61419e-6 kg; name benzene; = factor_MJ_kWh*0.000000139; lognormal variance with pedigree 0.12, pedigree (3,5,5,5,3)
  (same comment as for 1,1,1-Trichloroethane)
- Benzo(a)pyrene [air, non-urban air or from high stacks]: 5.00516e-12 kg; name benzo_a_pyrene; = factor_MJ_kWh*0.000000000000431; lognormal variance with pedigree 0.112, pedigree (3,5,5,5,1)
  (same comment as for 1,1,1-Trichloroethane)
- Beryllium II [air, non-urban air or from high stacks]: 2.00903e-9 kg; name beryllium; = factor_MJ_kWh*0.000000000173; lognormal variance with pedigree 0.7026, pedigree (3,3,5,5,3)
  (same comment as for 1,1,1-Trichloroethane)
- Boron [air, non-urban air or from high stacks]: 4.44774e-6 kg; name boron; = factor_MJ_kWh*0.000000383; lognormal variance with pedigree 0.7806, pedigree (5,3,5,5,3)
  (same comment as for 1,1,1-Trichloroethane)
- Bromine [air, non-urban air or from high stacks]: 3.63484e-6 kg; name bromine; = factor_MJ_kWh*0.000000313; lognormal variance with pedigree 0.2126, pedigree (3,3,5,5,3)
  (same comment as for 1,1,1-Trichloroethane)
- Butane [air, non-urban air or from high stacks]: 1.30065e-7 kg; name butane; = factor_MJ_kWh*0.0000000112; lognormal variance with pedigree 0.112, pedigree (3,5,5,5,1)
  (same comment as for 1,1,1-Trichloroethane)
- Cadmium II [air, non-urban air or from high stacks]: 1.20774e-8 kg; name cadmium; = factor_MJ_kWh*0.00000000104; lognormal variance with pedigree 0.7806, pedigree (5,3,5,5,3)
  (same comment as for 1,1,1-Trichloroethane)
- Carbon dioxide, fossil [air, non-urban air or from high stacks]: 1.10903 kg; name carbon_dioxide_fossil; = factor_MJ_kWh*0.0955; lognormal variance with pedigree 0.0526, pedigree (3,3,5,5,3)
  Literature value/calculated value. Amount of CO2 emissions when producing 1kWh of electricity from hard coal, based on the value for burning 1MJ of hard coal.
  Region specific value, based on (NREL 2006). See ecoinvent report "Kohle", chapter 16, Tab. 16.10ff (Röder et al. 2007)
  US National Renewable Energy Laboratory (2006) U.S. Life-Cycle Inventory (LCI) Database, <http://www.nrel.gov/lci/about.html>, last updated in the coal chain as of October 2006, according to http://www.nrel.gov/lci/database/pdf/USLCIDB_ChangeLog.pdf.
- Carbon disulfide [air, non-urban air or from high stacks]: 1.24258e-8 kg; name carbon_disulfide; = factor_MJ_kWh*0.00000000107; lognormal variance with pedigree 0.3526, pedigree (3,3,5,5,3)
  (same comment as for 1,1,1-Trichloroethane)
- Carbon monoxide, fossil [air, non-urban air or from high stacks]: 0.000102426 kg; name carbon_monoxide_fossil; = factor_MJ_kWh*0.00000882; lognormal variance with pedigree 0.706, pedigree (3,4,5,5,1)
  (same comment as for 1,1,1-Trichloroethane)
- Chloroform [air, non-urban air or from high stacks]: 9.38323e-9 kg; name chloroform; = factor_MJ_kWh*0.000000000808; lognormal variance with pedigree 0.1726, pedigree (3,3,5,5,3)
  (same comment as for 1,1,1-Trichloroethane)
- Chromium III [air, non-urban air or from high stacks]: 9.52258e-8 kg; name chromium; = factor_MJ_kWh*0.0000000082; lognormal variance with pedigree 0.7806, pedigree (5,3,5,5,3)
  (same comment as for 1,1,1-Trichloroethane)
- Chromium VI [air, non-urban air or from high stacks]: 1.62581e-8 kg; name chromium_vi; = factor_MJ_kWh*0.0000000014; lognormal variance with pedigree 0.5326, pedigree (3,3,5,5,3)
  (same comment as for 1,1,1-Trichloroethane)
- Cobalt II [air, non-urban air or from high stacks]: 3.87871e-8 kg; name cobalt; = factor_MJ_kWh*0.00000000334; lognormal variance with pedigree 0.7806, pedigree (5,3,5,5,3)
  (same comment as for 1,1,1-Trichloroethane)
- Copper ion [air, non-urban air or from high stacks]: 9.53419e-8 kg; name copper; = factor_MJ_kWh*0.00000000821; lognormal variance with pedigree 0.7806, pedigree (5,3,5,5,3)
  (same comment as for 1,1,1-Trichloroethane)
- Cumene [air, non-urban air or from high stacks]: 5.21419e-10 kg; name cumene; = factor_MJ_kWh*0.0000000000449; lognormal variance with pedigree 0.13, pedigree (1,1,4,5,1)
  (same comment as for 1,1,1-Trichloroethane)
- Cyanide [air, non-urban air or from high stacks]: 2.39226e-7 kg; name cyanide; = factor_MJ_kWh*0.0000000206; lognormal variance with pedigree 0.2106, pedigree (5,3,5,5,3)
  (same comment as for 1,1,1-Trichloroethane)
- Dichloromethane [air, non-urban air or from high stacks]: 2.77548e-8 kg; name methane_dichloro; = factor_MJ_kWh*0.00000000239; lognormal variance with pedigree 0.2106, pedigree (5,3,5,5,3)
  (same comment as for 1,1,1-Trichloroethane)
- Dinitrogen monoxide [air, non-urban air or from high stacks]: 1.5329e-5 kg; name dinitrogen_monoxide; = factor_MJ_kWh*0.00000132; lognormal variance with pedigree 0.106, pedigree (3,4,5,5,1)
  (same comment as for 1,1,1-Trichloroethane)
- Dioxins, measured as 2,3,7,8-tetrachlorodibenzo-p-dioxin [air, non-urban air or from high stacks]: 1.23097e-13 kg; name dioxins; = factor_MJ_kWh*1.06E-14; lognormal variance with pedigree 0.372, pedigree (3,5,5,5,1)
  (same comment as for 1,1,1-Trichloroethane)
- Ethane [air, non-urban air or from high stacks]: 2.82194e-7 kg; name ethane; = factor_MJ_kWh*0.0000000243; lognormal variance with pedigree 0.112, pedigree (3,5,5,5,1)
  (same comment as for 1,1,1-Trichloroethane)
- Ethyl benzene [air, non-urban air or from high stacks]: 9e-9 kg; name benzene_ethyl; = factor_MJ_kWh*0.000000000775; lognormal variance with pedigree 0.1726, pedigree (3,3,5,5,3)
  (same comment as for 1,1,1-Trichloroethane)
- Ethylene dichloride [air, non-urban air or from high stacks]: 3.82065e-9 kg; name ethane_dichloro; = factor_MJ_kWh*0.000000000329; lognormal variance with pedigree 0.2106, pedigree (5,3,5,5,3)
  (same comment as for 1,1,1-Trichloroethane)
- Formaldehyde [air, non-urban air or from high stacks]: 4.21548e-7 kg; name formaldehyde; = factor_MJ_kWh*0.0000000363; lognormal variance with pedigree 0.112, pedigree (3,5,5,5,1)
  (same comment as for 1,1,1-Trichloroethane)
- Furan [air, non-urban air or from high stacks]: 4.78452e-13 kg; name furan; = factor_MJ_kWh*4.12E-14; lognormal variance with pedigree 0.1726, pedigree (3,3,5,5,3)
  (same comment as for 1,1,1-Trichloroethane)
- Hexane [air, non-urban air or from high stacks]: 6.44516e-9 kg; name hexane; = factor_MJ_kWh*0.000000000555; lognormal variance with pedigree 0.2106, pedigree (5,3,5,5,3)
  (same comment as for 1,1,1-Trichloroethane)
- Hydrocarbons, aliphatic, alkanes, cyclic [air, non-urban air or from high stacks]: 5.53935e-8 kg; name hydrocarbons_al_al_cyclic; = factor_MJ_kWh*0.00000000477; lognormal variance with pedigree 0.1726, pedigree (3,3,5,5,3)
  (same comment as for 1,1,1-Trichloroethane)
- Hydrocarbons, aliphatic, alkanes, unspecified [air, non-urban air or from high stacks]: 1.56774e-6 kg; name hydrocarbons_al_al_unspec; = factor_MJ_kWh*0.000000135; lognormal variance with pedigree 0.112, pedigree (3,5,5,5,1)
  (same comment as for 1,1,1-Trichloroethane)
- Hydrocarbons, aliphatic, unsaturated [air, non-urban air or from high stacks]: 1.48645e-6 kg; name hydrocarbons_aliphatic_unsaturated; = factor_MJ_kWh*0.000000128; lognormal variance with pedigree 0.112, pedigree (3,5,5,5,1)
  (same comment as for 1,1,1-Trichloroethane)
- Hydrocarbons, chlorinated [air, non-urban air or from high stacks]: 1.93935e-8 kg; name hydrocarbons_chlorinated; = factor_MJ_kWh*0.00000000167; lognormal variance with pedigree 0.2106, pedigree (5,3,5,5,3)
  (same comment as for 1,1,1-Trichloroethane)
- Hydrochloric acid [air, non-urban air or from high stacks]: 0.000307742 kg; name hydrogen_chloride; = factor_MJ_kWh*0.0000265; lognormal variance with pedigree 0.2506, pedigree (5,3,5,5,3)
  (same comment as for 1,1,1-Trichloroethane)
- Hydrogen fluoride [air, non-urban air or from high stacks]: 3.28645e-5 kg; name hydrogen_fluoride; = factor_MJ_kWh*0.00000283; lognormal variance with pedigree 0.2506, pedigree (5,3,5,5,3)
  (same comment as for 1,1,1-Trichloroethane)
- Iodine [air, non-urban air or from high stacks]: 1.84645e-6 kg; name iodine; = factor_MJ_kWh*0.000000159; lognormal variance with pedigree 0.2506, pedigree (5,3,5,5,3)
  (same comment as for 1,1,1-Trichloroethane)
- Lead II [air, non-urban air or from high stacks]: 4.30839e-7 kg; name lead; = factor_MJ_kWh*0.0000000371; lognormal variance with pedigree 0.7806, pedigree (5,3,5,5,3)
  (same comment as for 1,1,1-Trichloroethane)
- Lead-210 [air, non-urban air or from high stacks]: 0.000804774 kBq; name lead_210; = factor_MJ_kWh*0.0000693; lognormal variance with pedigree 0.4306, pedigree (5,3,5,5,3)
  (same comment as for Actinides, radioactive, unspecified)
- Magnesium [air, non-urban air or from high stacks]: 1.05213e-6 kg; name magnesium; = factor_MJ_kWh*0.0000000906; lognormal variance with pedigree 0.7406, pedigree (5,3,5,5,3)
  (same comment as for 1,1,1-Trichloroethane)
- Manganese II [air, non-urban air or from high stacks]: 4.15742e-7 kg; name manganese; = factor_MJ_kWh*0.0000000358; lognormal variance with pedigree 0.7806, pedigree (5,3,5,5,3)
  (same comment as for 1,1,1-Trichloroethane)
- Mercury II [air, non-urban air or from high stacks]: 3.13548e-8 kg; name mercury; = factor_MJ_kWh*0.0000000027; lognormal variance with pedigree 0.7806, pedigree (5,3,5,5,3)
  Literature value/calculated value. Mercury emissions when producing 1kWh of electricity from hard coal, based on the value for burning 1MJ of hard coal.
  Region specific value, based on (NREL 2006). See ecoinvent report "Kohle", chapter 16, Tab. 16.10ff (Röder et al. 2007)
  US National Renewable Energy Laboratory (2006) U.S. Life-Cycle Inventory (LCI) Database, <http://www.nrel.gov/lci/about.html>, last updated in the coal chain as of October 2006, according to http://www.nrel.gov/lci/database/pdf/USLCIDB_ChangeLog.pdf.
- Methane, fossil [air, non-urban air or from high stacks]: 1.04748e-5 kg; name methane_fossil; = factor_MJ_kWh*0.000000902; lognormal variance with pedigree 0.106, pedigree (3,4,5,5,1)
  (same comment as for 1,1,1-Trichloroethane)
- Methylchloride [air, non-urban air or from high stacks]: 5.07484e-8 kg; name methane_monochloro; = factor_MJ_kWh*0.00000000437; lognormal variance with pedigree 0.1726, pedigree (3,3,5,5,3)
  (same comment as for 1,1,1-Trichloroethane)
- Molybdenum VI [air, non-urban air or from high stacks]: 1.33548e-8 kg; name molybdenum; = factor_MJ_kWh*0.00000000115; lognormal variance with pedigree 0.7806, pedigree (5,3,5,5,3)
  (same comment as for 1,1,1-Trichloroethane)
- NMVOC, non-methane volatile organic compounds [air, non-urban air or from high stacks]: 1.08e-5 kg; name nmvoc; = factor_MJ_kWh*0.00000093; lognormal variance with pedigree 0.1726, pedigree (3,3,5,5,3)
  (same comment as for 1,1,1-Trichloroethane)
- Nickel II [air, non-urban air or from high stacks]: 2.32258e-7 kg; name nickel; = factor_MJ_kWh*0.00000002; lognormal variance with pedigree 0.7806, pedigree (5,3,5,5,3)
  (same comment as for 1,1,1-Trichloroethane)
- Nitrogen oxides [air, non-urban air or from high stacks]: 0.000827 kg; name nitrogen_oxides; source IEA 2012; lognormal variance with pedigree 0.0094, pedigree (2,1,4,1,1)
  Calculated value based on IEA 2012 with extensive information on the amount of NOx in the flue gas (mg/m3) and a factor for the amount of flue gas (m3/GJ burned): 360 m3/GJ burned (EEA 2008)
  EEA. 2008. Air pollution from electricity-generating large combustion plants. An assessment of the theoretical emission reduction of SO2 and Nox through implementation of BAT as set in the BREFs. European Environment Agency, Copenhagen. EEA Technical report No 4/2008, ISSN 1725-2237, ISBN 978-92-9167-355-1. Tab. B.6 p. 38
- PAH, polycyclic aromatic hydrocarbons [air, non-urban air or from high stacks]: 8.69806e-8 kg; name pah; = factor_MJ_kWh*0.00000000749; lognormal variance with pedigree 0.372, pedigree (3,5,5,5,1)
  (same comment as for 1,1,1-Trichloroethane)
- Particulate Matter, < 2.5 um [air, non-urban air or from high stacks]: 0.000226 kg; name particulates_lt2_5; source IEA 2012; lognormal variance with pedigree 0.0987, pedigree (4,2,5,4,4)
  Calculated value. Based on the total particle emissions, global production-weighted average of ecoinvent version 2 countries.
  The shares of the three particulates classes are taken from Dones et al 2007, Tab. 9.39 p. 130 and amount to
  - particulates >10um: 5%
  - particulates 2.5-10 um: 10%
  - particulates < 2.5 um: 85%
  Global total emissions without any particulate filter were calculated to amount to 80 g/kWh and were then figured together with the share of installed particle filter and efficiency of the filter (see technology comment for details).
- Particulate Matter, > 10 um [air, non-urban air or from high stacks]: 1.33e-5 kg; name particulates_gt10; source IEA 2012; lognormal variance with pedigree 0.0987, pedigree (4,2,5,4,4)
  (same comment as for Particulate Matter, < 2.5 um)
- Particulate Matter, > 2.5 um and < 10um [air, non-urban air or from high stacks]: 2.66e-5 kg; name particulates_2_5_to_10; source IEA 2012; lognormal variance with pedigree 0.0987, pedigree (4,2,5,4,4)
  (same comment as for Particulate Matter, < 2.5 um)
- Pentane [air, non-urban air or from high stacks]: 1.01032e-6 kg; name pentane; = factor_MJ_kWh*0.000000087; lognormal variance with pedigree 0.112, pedigree (3,5,5,5,1)
  (same comment as for 1,1,1-Trichloroethane)
- Phenol [air, non-urban air or from high stacks]: 1.5329e-9 kg; name phenol; = factor_MJ_kWh*0.000000000132; lognormal variance with pedigree 0.1726, pedigree (3,3,5,5,3)
  (same comment as for 1,1,1-Trichloroethane)
- Polonium-210 [air, non-urban air or from high stacks]: 0.00142839 kBq; name polonium_210; = factor_MJ_kWh*0.000123; lognormal variance with pedigree 0.4306, pedigree (5,3,5,5,3)
  (same comment as for Actinides, radioactive, unspecified)
- Potassium-40 [air, non-urban air or from high stacks]: 0.000267097 kBq; name potassium_40; = factor_MJ_kWh*0.000023; lognormal variance with pedigree 0.4306, pedigree (5,3,5,5,3)
  (same comment as for Actinides, radioactive, unspecified)
- Propane [air, non-urban air or from high stacks]: 2.40387e-7 kg; name propane; = factor_MJ_kWh*0.0000000207; lognormal variance with pedigree 0.112, pedigree (3,5,5,5,1)
  (same comment as for 1,1,1-Trichloroethane)
- Propylene [air, non-urban air or from high stacks]: 1.09974e-7 kg; name propene; = factor_MJ_kWh*0.00000000947; lognormal variance with pedigree 0.112, pedigree (3,5,5,5,1)
  (same comment as for 1,1,1-Trichloroethane)
- Protactinium-234 [air, non-urban air or from high stacks]: 1.19613e-5 kBq; name protactinium_234; = factor_MJ_kWh*0.00000103; lognormal variance with pedigree 0.3526, pedigree (3,3,5,5,3)
  (same comment as for Actinides, radioactive, unspecified)
- Radium-226 [air, non-urban air or from high stacks]: 0.000212516 kBq; name radium_226; = factor_MJ_kWh*0.0000183; lognormal variance with pedigree 0.3907, pedigree (3,3,5,3,3)
  (same comment as for Actinides, radioactive, unspecified)
- Radium-228 [air, non-urban air or from high stacks]: 6.86323e-5 kBq; name radium_228; = factor_MJ_kWh*0.00000591; lognormal variance with pedigree 0.4306, pedigree (5,3,5,5,3)
  (same comment as for Actinides, radioactive, unspecified)
- Radon-220 [air, non-urban air or from high stacks]: 0.00588774 kBq; name radon_220; = factor_MJ_kWh*0.000507; lognormal variance with pedigree 0.4306, pedigree (5,3,5,5,3)
  (same comment as for Actinides, radioactive, unspecified)
- Radon-222 [air, non-urban air or from high stacks]: 0.00578323 kBq; name radon_222; = factor_MJ_kWh*0.000498; lognormal variance with pedigree 0.4306, pedigree (5,3,5,5,3)
  (same comment as for Actinides, radioactive, unspecified)
- Selenium IV [air, non-urban air or from high stacks]: 1.91613e-7 kg; name selenium; = factor_MJ_kWh*0.0000000165; lognormal variance with pedigree 0.7806, pedigree (5,3,5,5,3)
  (same comment as for 1,1,1-Trichloroethane)
- Strontium II [air, non-urban air or from high stacks]: 6.87484e-7 kg; name strontium; = factor_MJ_kWh*0.0000000592; lognormal variance with pedigree 0.7806, pedigree (5,3,5,5,3)
  (same comment as for 1,1,1-Trichloroethane)
- Styrene [air, non-urban air or from high stacks]: 2.36903e-9 kg; name styrene; = factor_MJ_kWh*0.000000000204; lognormal variance with pedigree 0.1726, pedigree (3,3,5,5,3)
  (same comment as for 1,1,1-Trichloroethane)
- Sulfate [air, non-urban air or from high stacks]: 4.57548e-9 kg; name sulfate; = factor_MJ_kWh*0.000000000394; lognormal variance with pedigree 0.2106, pedigree (5,3,5,5,3)
  (same comment as for 1,1,1-Trichloroethane)
- Sulfur dioxide [air, non-urban air or from high stacks]: 0.00207 kg; name sulfur_dioxide; source IEA 2012; lognormal variance with pedigree 0.0094, pedigree (2,1,4,1,1)
  Calculated value
- Tetrachloroethylene [air, non-urban air or from high stacks]: 4.11097e-9 kg; name ethene_tetrachloro; = factor_MJ_kWh*0.000000000354; lognormal variance with pedigree 0.2106, pedigree (5,3,5,5,3)
  (same comment as for 1,1,1-Trichloroethane)
- Thorium-228 [air, non-urban air or from high stacks]: 3.83226e-5 kBq; name throium_228; = factor_MJ_kWh*0.0000033; lognormal variance with pedigree 0.4306, pedigree (5,3,5,5,3)
  (same comment as for Actinides, radioactive, unspecified)
- Thorium-230 [air, non-urban air or from high stacks]: 1.19613e-5 kBq; name thorium_230; = factor_MJ_kWh*0.00000103; lognormal variance with pedigree 0.3906, pedigree (5,3,5,5,3)
  (same comment as for Actinides, radioactive, unspecified)
- Thorium-232 [air, non-urban air or from high stacks]: 5.60903e-5 kBq; name thorium_232; = factor_MJ_kWh*0.00000483; lognormal variance with pedigree 0.4306, pedigree (5,3,5,5,3)
  (same comment as for Actinides, radioactive, unspecified)
- Thorium-234 [air, non-urban air or from high stacks]: 1.19613e-5 kBq; name thorium_234; = factor_MJ_kWh*0.00000103; lognormal variance with pedigree 0.3526, pedigree (3,3,5,5,3)
  (same comment as for Actinides, radioactive, unspecified)
- Toluene [air, non-urban air or from high stacks]: 7.72258e-7 kg; name toluene; = factor_MJ_kWh*0.0000000665; lognormal variance with pedigree 0.112, pedigree (3,5,5,5,1)
  (same comment as for 1,1,1-Trichloroethane)
- Uranium-234 [air, non-urban air or from high stacks]: 2.34581e-5 kBq; name uranium_234; = factor_MJ_kWh*0.00000202; lognormal variance with pedigree 0.3906, pedigree (5,3,5,5,3)
  (same comment as for Actinides, radioactive, unspecified)
- Uranium-238 [air, non-urban air or from high stacks]: 0.000184645 kBq; name uranium_238; = factor_MJ_kWh*0.0000159; lognormal variance with pedigree 0.4306, pedigree (5,3,5,5,3)
  (same comment as for Actinides, radioactive, unspecified)
- Vanadium V [air, non-urban air or from high stacks]: 1.71871e-7 kg; name vanadium; = factor_MJ_kWh*0.0000000148; lognormal variance with pedigree 0.7806, pedigree (5,3,5,5,3)
  (same comment as for 1,1,1-Trichloroethane)
- Water [air, unspecified]: 0.00167156 m3; name water_to_air_unspecified; = (water_completely_softened/1000)*fraction_WCS_to_air+(water_decarbonised_user/1000)*fraction_WDC_to_air+water_cooling_UNO_input*fraction_CW_to_air; lognormal variance with pedigree 0.130025, pedigree (4,4,5,2,4)
  Calculated value based on literature values and expert opinion. See comments in the parametres" comment field.
  property fraction, origin: fresh water 0.0478814; name fraction_origin_fresh_water
  property fraction, origin: salt water 0; name fraction_origin_salt_water
  property fraction, origin: unspecified 0.952119; name fraction_origin_unspecified
- Xylenes, unspecified [air, non-urban air or from high stacks]: 6.34065e-6 kg; name xylene; = factor_MJ_kWh*0.000000546; lognormal variance with pedigree 0.112, pedigree (3,5,5,5,1)
  (same comment as for 1,1,1-Trichloroethane)
- Zinc II [air, non-urban air or from high stacks]: 4.83097e-7 kg; name zinc; = factor_MJ_kWh*0.0000000416; lognormal variance with pedigree 0.7806, pedigree (5,3,5,5,3)
  (same comment as for 1,1,1-Trichloroethane)
- Water [water, unspecified]: 0.053831 m3; name water_to_water_unspecified; = (water_completely_softened/1000)*(1-fraction_WCS_to_air)+(water_decarbonised_user/1000)*(1-fraction_WDC_to_air)+water_cooling_UNO_input*(1-fraction_CW_to_air); lognormal variance with pedigree 0.130025, pedigree (4,4,5,2,4)
  (same comment as for Water)
  property fraction, origin: fresh water 0.0429457; name fraction_origin_fresh_water_Ww
  property fraction, origin: salt water 0; name fraction_origin_salt_water_Ww
  property fraction, origin: unspecified 0.957054; name fraction_origin_unspecified_Ww

## Sampling procedure
literature and statistics

## Extrapolations
Data from 1993 have been updated for the years 2000 (v1.0), and 2004-2005 (v2.0). Uncertainty was adjusted accordingly.

Most of the exchanges were extrapolated through production-weighted averages of the datasets of the following 14 countries: AT, BE, ES, FR, IT, NL, PT, DE, CZ, HR, PL, SK, CN, US.

The original data were valid for the burning of 1MJ of hard coal. In this dataset, the values are scaled to the net output of 1kWh of electricity, based on the electrical efficiency.

## Review by Carl Vadenbo 2015-07-23
The update of the whole electricity sector for the ecoinvent v3.2 database consist of hundreds of datasets. All these datasets have passed through a streamlined review processes where the underlying modelling of production volumes, technology shares and efficiencies was reviewed in detail prior to the datasets being submitted to the database.
