# clay brick production, moulded

Dataset: EcoSpold 2, unit process
Geography: EC
Time period: 2022-01-01 to 2023-12-31
Technology level: current
Classification: ISIC rev.4 ecoinvent: 2392:Manufacture of clay building materials
Synonyms: Ton; ladrillo; artesanal; arcilla; clay; Ziegel
Scenario: Business-as-Usual
System model: Allocation, cut-off by classification
Share of production covered: 70 %
Generated by: K.Flasher;E.Barros;J.Aguirre;S.Martines
Database: ecoinvent
isCopyrightProtected: true
accessRestrictedTo: 1

## General comment
This dataset describes the production of traditional clay bricks in the area of San José de Balzay in Ecuador. The dataset represents the production of 1 kg of brick, with the following characteristics: average weight of 4.72 kg and average dimensions of (13.5 x 26.5 x 7.75) cm (width x length x height). Data was obtained from measurements and information provided in the two factories visited, therefore the dataset contains weighted average values. Some data was calculated using literature values. The companies visits took place in March, May, and June 2022. This dataset was developed by Estefania Barros, Kristi Padrón, Jonnathan Aguirre and Juan Sebastian Martines, under the supervision of Prof. Dolores Sucozhañay and Prof. Paul Vanegas, from the Inclusive Circular Economy and Sustainable Development Research Group of the University of Cuenca (ECI) in the frame of the CEELA (Strengthening capacities for energy efficiency in buildings in Latin America) project with the support of the Swiss Agency for Development and Cooperation (SDC).

## Included activities start
The activity starts with the reception of raw materials at the clay brick production site.

## Included activities end
This dataset ends with the storage of the produced brick at the production site. This dataset includes the reception of raw materials, dosing, mixing, forming (moulding by hand), drying, firing, cooling, and storage. The dataset does not include the packaging.

## Geography
Data was obtained in two factories of traditional clay bricks located in San José de Balzay and Racar, Cuenca, Ecuador.

## Technology
Current production technology. This dataset corresponds to artisanal manufacturing of two traditional clay bricks factories, which do not incorporate any machinery in their process. The manufacturing process includes the reception of raw materials, dosing, mixing, forming, drying, firing of wood, cooling and storage of bricks. The mixing of raw materials is done with the help of the trampling of a horse, while the forming process is done by hand by the people working in the factory.

## Time period
The time period is from 2022 (year of data collection) to 2023 (year of dataset compilation).

## Parameters
- Carbon dioxide: 1.63 kg; name EF_CO2
  Emission factor in kg emission / kg wood fuel. Reference: Jaya Sucozhañay, J. L., & Gomezcoello Vásquez, J. L. (2012). Análisis comparativo de la contaminación atmosférica producida por la combustión en ladrilleras artesanales utilizando tres tipos de combustibles (Bachelor's thesis).
- Carbon monoxide: 0.0197 kg; name EF_CO
  (same comment as for Carbon dioxide)
- Nitrogen oxides: 0.00118 kg; name EF_NOx
  (same comment as for Carbon dioxide)
- PM10: 0.0157 kg; name EF_PM10
  (same comment as for Carbon dioxide)
- Sulfur dioxide: 0.00018 kg; name EF_SO2
  (same comment as for Carbon dioxide)
- Volatile organic compounds: 0.021 kg; name EF_VOC
  (same comment as for Carbon dioxide)

## Reference product
- clay brick: 1 kg; name clay_brick; By-product classification allocatable product; CPC 37310: Bricks, blocks, tiles and other ceramic goods of siliceous earths; HS2017 6901: Bricks, blocks, tiles and other ceramic goods of siliceous fossil meals (e.g. kieselguhr, tripolite or diatom[...]
  The dataset represents 1 kg of a solid clay brick, with measured average dimensions (13.5 x 26.5 x 7.75) cm (width x length x height) and measured average mass of 4.72 kg.
  production volume 8.4016e9 kg; name clay_brick_PV; = 2000000000*0.89*4.72
    Calculated value. The clay brick mass multiplied by the number of bricks produced per year. Based on a study conducted by Swisscontact in Cuenca in 2016. In which they identified that 2E09 clay bricks are produced per year and that 89% of brick factories are considered artisanal (which produce clay brick moulded) and the rest semi-mechanized. The weight of the moulded brick is 4.72 kg. References: Venegas, O. (2018). Evaluación de la energía contenida, emisiones de CO2 y material particulado en la fabricación del ladrillo semi-mecanizado tochano en cuenca, a través del análisis de ciclo de vida (ACV). [Master degree in Constructions, University of Cuenca]. https://dspace.ucuenca.edu.ec/bitstream/123456789/29319/1/MscArqAndr%C3%A9sVenegas.pdf
  property carbon content, fossil 0
    Made mainly from clay, sand and other aditives. All C contained in raw materials is emitted as CO2 ecoinvent v2.2 report 7, part IV
  property carbon content, non-fossil 0
    (same comment as for clay brick)
  property price 0.0271357 EUR2005
    Data provided by the owner of the factory. Price given as 0.0425 USD/kg clay brick, moulded and 0.068 USD/kg for clay brick, extruded. Both prices are for 2022. Weighted average of the prices based on the production volumes of both types of clay bricks was performed. The prices were converted to EUR based on the annual exchange rates published by the European Central Bank (https://sdw.ecb.europa.eu/quickview.do?SERIES_KEY=120.EXR.A.USD.EUR.SP00.A, last accessed on 2023-06-01) and adjusted for inflation relative to 2005 using the producer price index (PPI) of the euro area, published by eurostat (https://ec.europa.eu/eurostat/databrowser/view/STS_INPP_A__custom_6416181/default/table?lang=en, last accessed on 2023-06-01).
  properties: carbon allocation 0 kg, carbon content 0, dry mass 1 kg, water content 0, water in wet mass 0 kg, wet mass 1 kg

## Inputs from technosphere
- clay: 1.06692 kg; name clay_input; lognormal variance with pedigree 0.0026, pedigree (1,4,1,1,1)
  Calculated value. This value represents the amount of various types of clay used for the production of 1 kg of clay brick, according to measurements and the information provided by the owners of the factories. The types of clay used are "tierra amarilla", "tierra roja" and "tierra negra". Tierra amarilla and tierra roja are more sandy, whereas tierra negra is also known as "tierra fina".
  property water in wet mass 0.035 kg; name WWM_clay
  properties: dry mass 0.965 kg, water content 0.0362694, wet mass 1 kg
- damaged clay material: -0.0295773 kg; name damaged_bricks; = (241.049*4.72)/38467.007; lognormal variance with pedigree 0.0026, pedigree (1,4,1,1,1)
  Calculated value. Multiplying the number of damaged bricks by the brick mass. This value is divided by the kg of bricks produced per firing process, to obtain the kg of damaged bricks per kg of clay brick. About 241 bricks are damaged in the oven, for each firing process, as informed by the owners of the factories is considered. These bricks are used to fill holes in the ground. Therefore, the disposal is modelled as open dumping.
  production volume; = damaged_bricks/clay_brick*clay_brick_PV
    Calculated from the production volume of the reference product in proportion to the respective output amounts.
  properties: aluminium content 0.0743989, calcium content 0.00610902, carbon content, fossil 0.00190327, dry mass 1 kg, iron content 0.0388284, magnesium content 0.00801262, oxygen content 0.501572, potassium content 0.0127433, silicon content 0.352923, sodium content 0.00351, wet mass 1 kg
- water, harvested from rainwater: 0.35997 kg; name rainwater; = 0.00035997*1000; lognormal variance with pedigree 0.0026, pedigree (1,4,1,1,1)
  Calculated value. Water content used for the production process based on measurements and the information provided by the owners of the factories. Water used for the production of clay bricks is water obtained from the rain.
  properties: carbon content, fossil 0.0017899, dry mass 0.00034 kg, water content 2940.18, wet mass 1 kg
- wood ash mixture, pure: -0.0907288 kg; name wood_ash; = wood_fuel*WM_wood + O - (CO2 + CO + SO2 + NOx + VOC + PM10 + (wood_fuel*WWM_wood)); lognormal variance with pedigree 0.0046, pedigree (3,4,1,1,1)
  Calculated value. Calculated as the difference between the amount of inputs (wood fuel and oxygen) and outputs (CO2, CO, SO2, NOx, VOC, PM10 and water) from the firing process. Wood ash is produced from the combustion of wood during the firing process.
  production volume; = wood_ash/clay_brick*clay_brick_PV
    (same comment as for damaged clay material)
  properties: carbon content, non-fossil 0.012, dry mass 1 kg, wet mass 1 kg
- wood chips, wet, measured as dry mass: 0.178266 kg; name wood_fuel; = 0.0002442*730; lognormal variance with pedigree 0.0026, pedigree (1,4,1,1,1)
  Calculated value. The value represents the amount of eucalyptus wood used in the firing process for the production of 1 kg of clay brick as informed by the owners of the factories. Multiplying the volume of wood per kg of bricks (0.000244 m3/kg of clay brick) by wood density (730 kg/m3).
  property water in wet mass 1.1 kg; name WWM_wood
  property wet mass 2.1 kg; name WM_wood
  properties: carbon content, non-fossil 0.494, dry mass 1 kg, heating value, net 10.84 MJ, water content 1.1
  note on heating value, net: Value based on the dataset 'softwood forestry, mixed species, sustainable forest management'

## Inputs from nature
- Occupation, bare area (non-use) [natural resource, land]: 0.00201221 m2*year; = 0.03*10^4/149090; lognormal variance with pedigree 0.04, pedigree (1,1,1,1,1)
  Estimated for infrastructure. Land occupation calculated as the land occupied by the production facility (0.03 ha) divided by the average annual production volume of the facility (149'090 kg clay brick/year).
- Oxygen [natural resource, in air]: 0.213333 kg; name O; = (32/44)*CO2+(16/28)*CO; lognormal variance with pedigree 0.0046, pedigree (3,4,1,1,1)
  Calculated value. Calculated from the total oxygen content of CO2 and CO.

## Emissions to nature
- Carbon dioxide, non-fossil [air, unspecified]: 0.290574 kg; name CO2; = wood_fuel*EF_CO2; lognormal variance with pedigree 0.0032, pedigree (2,4,1,1,1)
  Calculated value. Multiplying the kg of fuel (wood) per kg of clay brick by the emission factor of the pollutant (kg/kg). Based on literature calculations and information provided by the owners of the factories. Carbon dioxide emission is produced from the combustion of the firing process. Reference: Alvear, P., & Palomeque, R. (2017). Análisis del inventario del ciclo de vida del ladrillo utilizado en la ciudad de Cuenca: aspectos energéticos, medio ambientales, sociales, económicos y culturales. University of Cuenca, Cuenca, Ecuador (Bachelor's thesis).
- Carbon monoxide, non-fossil [air, unspecified]: 0.00351184 kg; name CO; = wood_fuel*EF_CO; lognormal variance with pedigree 0.6526, pedigree (2,4,1,1,1)
  Calculated value. Multiplying the kg of fuel (wood) per kg of clay brick by the emission factor of the pollutant (kg/kg). Based on literature calculations and information provided by the owners of the factories. Carbon monoxide emission is produced from combustion of wood during the firing process. Reference: Jaya Sucozhañay, J. L., & Gomezcoello Vásquez, J. L. (2012). Análisis comparativo de la contaminación atmosférica producida por la combustión en ladrilleras artesanales utilizando tres tipos de combustibles (Bachelor's thesis).
- NMVOC, non-methane volatile organic compounds [air, unspecified]: 0.00374359 kg; name VOC; = wood_fuel*EF_VOC; lognormal variance with pedigree 0.0426, pedigree (2,4,1,1,1)
  Calculated value. Multiplying the kg of fuel (wood) per kg of clay brick by the emission factor of the pollutant (kg/kg). Based on literature calculations and information provided by the owners of the factories. VOC emission is produced from combustion of wood during the firing process. Reference: Jaya Sucozhañay, J. L., & Gomezcoello Vásquez, J. L. (2012). Análisis comparativo de la contaminación atmosférica producida por la combustión en ladrilleras artesanales utilizando tres tipos de combustibles (Bachelor's thesis).
- Nitrogen oxides [air, unspecified]: 0.000210354 kg; name NOx; = wood_fuel*EF_NOx; lognormal variance with pedigree 0.0426, pedigree (2,4,1,1,1)
  Calculated value. Multiplying the kg of fuel (wood) per kg of clay brick by the emission factor of the pollutant (kg/kg). Based on literature calculations and information provided by the owners of the factories. Nitrogen oxides emission is produced from combustion of wood during the firing process. Reference: Jaya Sucozhañay, J. L., & Gomezcoello Vásquez, J. L. (2012). Análisis comparativo de la contaminación atmosférica producida por la combustión en ladrilleras artesanales utilizando tres tipos de combustibles (Bachelor's thesis).
- Particulate Matter, > 2.5 um and < 10um [air, unspecified]: 0.00279878 kg; name PM10; = wood_fuel*EF_PM10; lognormal variance with pedigree 0.1226, pedigree (2,4,1,1,1)
  Calculated value. Multiplying the kg of fuel (wood) per kg of clay brick by the emission factor of the pollutant (kg/kg). Based on literature calculations and information provided by the owners of the factories. Particulate matter emission is produced from combustion of wood during the firing process. PM10 emission is produced from combustion of wood during the firing process. Particulate matter is < 10 um. Reference: Jaya Sucozhañay, J. L., & Gomezcoello Vásquez, J. L. (2012). Análisis comparativo de la contaminación atmosférica producida por la combustión en ladrilleras artesanales utilizando tres tipos de combustibles (Bachelor's thesis).
- Sulfur dioxide [air, unspecified]: 3.20879e-5 kg; name SO2; = wood_fuel*EF_SO2; lognormal variance with pedigree 0.0032, pedigree (2,4,1,1,1)
  Calculated value. Multiplying the kg of fuel (wood) per kg of clay brick by the emission factor of the pollutant (kg/kg). Based on literature calculations and information provided by the owners of the factories. Sulfur dioxide emission is produced from combustion of wood during the firing process. Reference: Jaya Sucozhañay, J. L., & Gomezcoello Vásquez, J. L. (2012). Análisis comparativo de la contaminación atmosférica producida por la combustión en ladrilleras artesanales utilizando tres tipos de combustibles (Bachelor's thesis).
- Water [air, unspecified]: 0.000447029 m3; = (wood_fuel*WWM_wood/1000) + ((1.335-1)/1.335)/1000; lognormal variance with pedigree 0.042, pedigree (1,4,1,1,1)
  Calculated value. Evaporated water is produced during two processes: 1) Combustion process, where water in wet mass amount in the wood chips gets evaporated (calculated as wood_fuel*water_in_wet_mass/1000); and 2) Drying process of the bricks (weight of a just made brick and a fired brick are considered).
- Water [water, unspecified]: 0.000146376 m3; = (rainwater + clay_input*WWM_clay)/1000 - ((1.335-1)/1.335)/1000; lognormal variance with pedigree 0.044, pedigree (3,4,1,1,1)
  Calculated value. The wastewater was modelled as the water difference between the amount of rainwater used in the process together with the water contained in the clay, and the water evaporated from the brick after the firing process. The water is captured in a hole in the ground, where the mixing takes place. Therefore, the excess water is infiltrated by the soil and follows a natural process, where it eventually reaches groundwater or a water body.

## Sampling procedure
Data gathered in two clay bricks factories through a process assessment in a technical visit. The production process of this material is artisanal and most of factories in Ecuador have a similar process and raw materials. According to a study conducted by Swisscontact in Cuenca in 2016, 89% of brick factories are considered artisanal (which produce clay brick moulded) and the rest semi-mechanized. Land occupation exchange is used as an estimate of infrastructure.

References: Venegas, O. (2018). Evaluación de la energía contenida, emisiones de CO2 y material particulado en la fabricación del ladrillo semi-mecanizado tochano en cuenca, a través del análisis de ciclo de vida (ACV). [Master degree in Constructions, University of Cuenca]. https://dspace.ucuenca.edu.ec/bitstream/123456789/29319/1/MscArqAndr%C3%A9sVenegas.pdf

## Extrapolations
Data are calculated as a weighted average between the data collected at the two clay brick artisanal production factories. See exchange comments for further details.
