# rice production, basmati

Dataset: EcoSpold 2, unit process
Geography: RoW
Time period: 2015-01-01 to 2023-12-31
Technology level: current
Classification: ISIC rev.4 ecoinvent: 0112:Growing of rice
Scenario: Business-as-Usual
System model: Allocation, cut-off by classification
Generated by: [System]
Database: ecoinvent
isCopyrightProtected: true
accessRestrictedTo: 1

## General comment
This dataset represents the production of 1 kg of Rice Basmati during May- October, 2016 at a farm located in Village-Sawant, District-Kurukshetra of Harayana. In this area, fields are irrigated with ground water using electric pump for surface irrigation. The farm has a yield of 4000 kg fresh matter per ha for this crop cycle. Sowing date for the crop is 29-July, 2016 and harvesting date is 02-October, 2016. Mineral NPK fertilizer input is 137.5-57.5-84 kg/ha. Herbicides used has active ingredient of Butachlor 750g/ha, Insecticides used has active ingredients of Chlorpyrifos 500g/ha, Chlorantraniliprole 4.8g/ha, and Fenpropathrin 775g/ha. Active ingredient proxies used are: Alachlor for Butachlor, Clothianidin for Chlorantraniliprole, and Deltamethrin for Fenpropathrin. Machinery is used only for soil cultivation with fuel consumption of 44.93 kg/ha using plough, rotary cultivator for soil tillage and other activities.

## Included activities start
This activity starts about four weeks after the harvest of the previous crop. The soil is prepared for cultivation in first week of May and sowing of seeds started about eight weeks after soil preparation. Thereafter the crop is mature for harvesting in about 3 months.

## Included activities end
The activity ends with the harvesting of the mature Basmati Rice plant.

## Geography
This dataset is a copy of Indian dataset rice basmati

## Technology
Cultivation of Rice Basmati follows conventional production standards

## Time period
Soil cultivating date for the main crop: 04-May, 2016; Harvesting date main crop: 02-October, 2016. The soil cultivation, sowing and harvesting dates are taken as the middle date of the week or fortnight told to the data collector by the farmer. Total time from date of sowing to date of harvesting comes to 100 days. The data is collected for one crop cycle. The cycle of one year is considered for entry in ecoeditor.

## Reference product
- rice, basmati: 1 kg; By-product classification allocatable product; CPC 0113: Rice; HS2017 1006: Rice
  production volume 3.75e9 kg; = 12.52*1000000*1000
    Value is calculated for basmati rice that is globally produced. The value is scaled from the respective Indian value considering the fact that circa 70% of the global basmati rice production takes place in India. This yields a total of 12.52 million tonnes of basmati rice produced globally.
    Reference: Cultivation and Export of Basmati Rice from India, accessed online at: https://www.gktoday.in/gk/cultivation-and-export-of-basmati-rice-from-india/
  property price 0.37 EUR2005
    Calculated value based on data from United Nations Commodity Trade Statistics Database (comtrade.un.org). UN comtrade category: 1006 Rice. Year 2005. Using exchange rate of 1EURO = 1.209 USD. Average of price of import into 5 main markets (EU, US, JP, IN and CN).
  properties: carbon allocation 0.403784 kg, carbon content 0.46412, carbon content, fossil 0, carbon content, non-fossil 0.46412, dry mass 0.87 kg, water content 0.149425, water in wet mass 0.13 kg, wet mass 1 kg

## Inputs from technosphere
- acetamide-anillide-compound, unspecified: 0.0001875 kg; lognormal variance with pedigree 0.0078, pedigree (3,3,3,5,2)
  The data was collected for a hectare area through interview
  properties: carbon content, fossil 0.659175, dry mass 1 kg, wet mass 1 kg
- cyclic N-compound: 1.2e-6 kg; lognormal variance with pedigree 0.0078, pedigree (3,3,3,5,2)
  The data was collected for a hectare area through interview
  properties: carbon content, fossil 0.641962, dry mass 1 kg, wet mass 1 kg
- diesel, burned in agricultural machinery: 0.171874 MJ; lognormal variance with pedigree 0.0078, pedigree (3,3,3,5,2)
  The data was collected for a hectare area through interview
- inorganic nitrogen fertiliser, as N: 1.98915e-7, 4.66766e-5, 5.53695e-6, 5.94576e-5, 1.36004e-5, 5.75962e-6, 5.30835e-5, 4.98474e-6, 3.49704e-5, 3.57749e-6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 kg (29 suppliers, which the file names only by identifier); sum of these 0.0055 kg; lognormal variance with pedigree 0.0078, pedigree (3,3,3,5,2)
  properties: dry mass 1 kg, wet mass 1 kg
- inorganic phosphorus fertiliser, as P2O5: 0.000109832, 0.000243788, 0.00210917, 6.80676e-5, 1.67162e-5, 2.36711e-5, 5.90558e-5, 7.75674e-6, 3.80167e-5, 9.06406e-7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 kg (29 suppliers, which the file names only by identifier); sum of these 0.014375 kg; lognormal variance with pedigree 0.0078, pedigree (3,3,3,5,2)
  properties: dry mass 1 kg, wet mass 1 kg
- irrigation: 0.000122101, 0.00244182, 0.149007, 0.00188121, 0.00504388, 0.00693322, 0.53752, 0.00110042, 2.83014e-5, 0.0661306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 m3 (16 suppliers, which the file names only by identifier); sum of these 0.826 m3; lognormal variance with pedigree 0.0078, pedigree (3,3,3,5,2)
  The total water (blue + green) used for the production of 1 kg of paddy rice in India is 1.903 m3, where blue water is 0.826 m3 and green water is 1.077 m3. For irrigation only blue water is considered. Therefore, 0.826 m3/kg paddy rice.
  Source: Chapagain, A.K., Hoekstra, A.Y. (2010). The green, blue and grey water footprint of rice from both a production and consumption perspective. Value of Water Research Report Series No. 40. Accessed on 20231020: https://www.waterfootprint.org/resources/Report40-WaterFootprintRice.pdf
  properties: dry mass 0.11 kg, water content 9089.91, wet mass 1000 kg
- manure, solid, cattle: 1.875 kg; lognormal variance with pedigree 0.0078, pedigree (3,3,3,5,2)
  The data was collected for a hectare area through interview
  properties: carbon content, non-fossil 0.441, dry mass 0.22 kg, water content 3.5454, wet mass 1 kg
- organophosphorus-compound, unspecified: 0.000125 kg; lognormal variance with pedigree 0.0078, pedigree (3,3,3,5,2)
  The data was collected for a hectare area through interview
  properties: carbon content, fossil 0.260898, dry mass 1 kg, wet mass 1 kg
- packaging, for fertilisers: 0.1395 kg; lognormal variance with pedigree 0.0532, pedigree (4,3,3,5,4)
  Total amount of active substance/s of fertilisers needed for the production of 'rice' is calculated to be circa 6.98E-02 kg. Fertiliser/s used in this dataset is/are: 'nitrogen fertiliser, as N', 'phosphate fertiliser, as P2O5', 'potassium chloride, as K2O', 'urea, as N'. The total amount of active substance/s is doubled in order to account for the packaging of the dilluted product of fertiliser/s that is/are applied. Therefore, 1.40E-01 kg of packaging for fertilisers is justified with this exchange.
  properties: carbon content, fossil 0.825301, dry mass 1 kg, heating value, net 25.01 MJ, wet mass 1 kg
  note on carbon content, fossil: Considering a chemical formula (C2H4)n for polyethylene, carbon content-fossil is calculated to be 0.856286 kg of Carbon per kg of dry mass.
- packaging, for pesticides: 0.0339742 kg; lognormal variance with pedigree 0.0532, pedigree (4,3,3,5,4)
  Total amount of active substance/s of pesticides needed for the production of rice is calculated to be circa 1.70E-02 kg. Pesticide/s used in this dataset is/are: 'acetamide-anillide-compound, unspecified', 'cyclic N-compound', 'organophosphorus-compound, unspecified', 'pyrethroid-compound', 'zinc monosulfate'. The total amount of active substance/s is doubled in order to account for the packaging of the dilluted product of pesticide/s that is/are applied. Therefore, 3.40E-02 kg of packaging for pesticides is justified with this exchange.
  properties: carbon content, fossil 0.85714, dry mass 1 kg, heating value, net 25.97 MJ, wet mass 1 kg
- potassium chloride: 0.00254563, 0.0306952 kg (2 suppliers, which the file names only by identifier); sum of these 0.0332408 kg; lognormal variance with pedigree 0.0078, pedigree (3,3,3,5,2)
  The exchange has been updated from 'potassium chloride, as K2O' into 'potassium chloride' and therefore its amount has been scaled (multiplied) from 0.021 kg by 1.5829 kg of 'potassium chloride' per kg of 'potassium chloride, as K2O'. Original comment of the exchange is: The data was collected for a hectare area through interview
  properties: dry mass 1 kg, wet mass 1 kg
- pyrethroid-compound: 0.00019375 kg; lognormal variance with pedigree 0.0078, pedigree (3,3,3,5,2)
  The data was collected for a hectare area through interview
  properties: carbon content, fossil 0.623, dry mass 1 kg, wet mass 1 kg
- tillage, ploughing: 0.00014202 ha; lognormal variance with pedigree 0.0078, pedigree (3,3,3,5,2)
  The data was collected for a hectare area through interview
- tillage, rotary cultivator: 0.000262888 ha; lognormal variance with pedigree 0.0078, pedigree (3,3,3,5,2)
  The data was collected for a hectare area through interview
- urea: 0.0289644, 0.00366318, 0.00454113, 0.0247335 kg (4 suppliers, which the file names only by identifier); sum of these 0.0619022 kg; lognormal variance with pedigree 0.0078, pedigree (3,3,3,5,2)
  The exchange has been updated from 'urea, as N' into 'urea' and therefore its amount has been scaled (multiplied) from 0.0289 kg by 2.1438 kg of 'urea' per kg of 'urea, as N'. Original comment of the exchange is: The data was collected for a hectare area through interview
  properties: carbon content, fossil 0.2, dry mass 1 kg, wet mass 1 kg
- wheat seed, for sowing: 0.003125 kg; lognormal variance with pedigree 0.0078, pedigree (3,3,3,5,2)
  The data was collected for a hectare area through interview
  property carbon content, non-fossil 0.464601; name C_content_non_fossil
  property dry mass 0.85 kg; name DM
  property water content 0.176471; name water_content
  property water in wet mass 0.15 kg; name WWM
  property wet mass 1 kg; name WM
  note on carbon content, non-fossil: Composition data obtained from Wheat, soft red winter, in (http://www.nal.usda.gov/fnic/foodcomp/search/). First, composition data were refered to 1 kg dry mass. Then, C-contents were calculated considering a C-content/dry mass of 46% in carbohydrates (including fibres), 53% in proteins and 75% in fats. All data from "Evolutionary and Biochemical Aspects", A.D. Kay and T. Vrede (in Global Ecology, 2010, Elsevier B.V., S.E. Jørgensen Ed.).
- zinc monosulfate: 0.0138566, 0.00262303 kg (2 suppliers, which the file names only by identifier); sum of these 0.0164797 kg; lognormal variance with pedigree 0.0078, pedigree (3,3,3,5,2)
  The data was collected for a hectare area through interview
  properties: dry mass 1 kg, wet mass 1 kg

## Inputs from nature
- Carbon dioxide, in air [natural resource, in air]: 1.3209 kg; lognormal variance with pedigree 0.0438, pedigree (3,3,5,1,2)
  Calculated Value. This value has been calculated by using the ecoinvent LCI calculation tool for crop production.
- Energy, gross calorific value, in biomass [natural resource, biotic]: 15.3935 MJ; lognormal variance with pedigree 0.0078, pedigree (3,3,3,5,2)
  The data was collected for a hectare area through interview
- Occupation, annual crop, irrigated [natural resource, land]: 1.14583 m2*year; lognormal variance with pedigree 0.0092, pedigree (3,3,3,5,2)
  Calculated Value. This value has been calculated by using the ecoinvent LCI calculation tool for crop production
- Transformation, from annual crop, irrigated [natural resource, land]: 2.5 m2; lognormal variance with pedigree 0.0152, pedigree (3,3,3,5,2)
  (same comment as for Occupation, annual crop, irrigated)
- Transformation, to annual crop, irrigated [natural resource, land]: 2.5 m2; lognormal variance with pedigree 0.0152, pedigree (3,3,3,5,2)
  (same comment as for Occupation, annual crop, irrigated)

## Emissions to nature
- Ammonia [air, non-urban air or from high stacks]: 0.00818555 kg; lognormal variance with pedigree 0.0286, pedigree (4,5,3,5,2)
  (same comment as for Carbon dioxide, in air)
- Carbon dioxide, fossil [air, non-urban air or from high stacks]: 0.045363 kg; lognormal variance with pedigree 0.0212, pedigree (4,5,3,5,2)
  (same comment as for Carbon dioxide, in air)
- Dinitrogen monoxide [air, non-urban air or from high stacks]: 0.00131312 kg; lognormal variance with pedigree 0.0506, pedigree (4,5,3,5,2)
  (same comment as for Carbon dioxide, in air)
- Methane, non-fossil [air, urban air close to ground]: 0.0602303 kg; = 240.92133/4000; lognormal variance with pedigree 0.0212, pedigree (4,5,3,5,2)
  Using a cultivation duration of 95 days and values for SFw, SFp and SFo of 0.78, 1.22, 2.05, respectively, according to IPCC 2006
- Nitrogen oxides [air, non-urban air or from high stacks]: 0.00269461 kg; lognormal variance with pedigree 0.0606, pedigree (4,5,3,5,2)
  (same comment as for Carbon dioxide, in air)
- Water [air, non-urban air or from high stacks]: 0.42126 m3; = 0.51*0.826; lognormal variance with pedigree 0.0212, pedigree (4,5,3,5,2)
  (same comment as for Carbon dioxide, in air)
- Alachlor [soil, agricultural]: 0.0001875 kg; lognormal variance with pedigree 0.0536, pedigree (4,5,3,5,2)
  (same comment as for Carbon dioxide, in air)
- Cadmium II [soil, agricultural]: 5.67365e-7 kg; lognormal variance with pedigree 0.0606, pedigree (4,5,3,5,2)
  (same comment as for Carbon dioxide, in air)
- Chlorpyrifos [soil, agricultural]: 0.000125 kg; lognormal variance with pedigree 0.0536, pedigree (4,5,3,5,2)
  Chlorpyrifos is used as pesticides.
- Chromium III [soil, agricultural]: 4.11603e-6 kg; lognormal variance with pedigree 0.0606, pedigree (4,5,3,5,2)
  (same comment as for Carbon dioxide, in air)
- Clothianidin [soil, agricultural]: 1.2e-6 kg; lognormal variance with pedigree 0.0536, pedigree (4,5,3,5,2)
  (same comment as for Carbon dioxide, in air)
- Copper ion [soil, agricultural]: -4.96617e-6 kg
  (same comment as for Carbon dioxide, in air)
- Deltamethrin [soil, agricultural]: 0.00019375 kg; lognormal variance with pedigree 0.0536, pedigree (4,5,3,5,2)
  (same comment as for Carbon dioxide, in air)
- Lead II [soil, agricultural]: -5.451e-7 kg
  (same comment as for Carbon dioxide, in air)
- Mercury II [soil, agricultural]: -1.97029e-8 kg
  (same comment as for Carbon dioxide, in air)
- Nickel II [soil, agricultural]: -6.51331e-7 kg
  (same comment as for Carbon dioxide, in air)
- Zinc II [soil, agricultural]: 0.00622161 kg; lognormal variance with pedigree 0.0606, pedigree (4,5,3,5,2)
  (same comment as for Carbon dioxide, in air)
- Cadmium II [water, ground-]: 5.17204e-9 kg; lognormal variance with pedigree 0.0606, pedigree (4,5,3,5,2)
  (same comment as for Carbon dioxide, in air)
- Cadmium II [water, surface water]: 1.33595e-8 kg; lognormal variance with pedigree 0.0606, pedigree (4,5,3,5,2)
  (same comment as for Carbon dioxide, in air)
- Chromium III [water, ground-]: 2.31792e-6 kg; lognormal variance with pedigree 0.0606, pedigree (4,5,3,5,2)
  (same comment as for Carbon dioxide, in air)
- Chromium III [water, surface water]: 1.41796e-6 kg; lognormal variance with pedigree 0.0606, pedigree (4,5,3,5,2)
  (same comment as for Carbon dioxide, in air)
- Copper ion [water, ground-]: 3.70016e-7 kg; lognormal variance with pedigree 0.0606, pedigree (4,5,3,5,2)
  (same comment as for Carbon dioxide, in air)
- Copper ion [water, surface water]: 1.11173e-6 kg; lognormal variance with pedigree 0.0606, pedigree (4,5,3,5,2)
  (same comment as for Carbon dioxide, in air)
- Lead II [water, ground-]: 2.19234e-8 kg; lognormal variance with pedigree 0.1106, pedigree (4,5,3,5,2)
  (same comment as for Carbon dioxide, in air)
- Lead II [water, surface water]: 3.83422e-7 kg; lognormal variance with pedigree 0.1106, pedigree (4,5,3,5,2)
  (same comment as for Carbon dioxide, in air)
- Mercury II [water, ground-]: 1.19341e-10 kg; lognormal variance with pedigree 0.1106, pedigree (4,5,3,5,2)
  (same comment as for Carbon dioxide, in air)
- Mercury II [water, surface water]: 3.60624e-9 kg; lognormal variance with pedigree 0.1106, pedigree (4,5,3,5,2)
  (same comment as for Carbon dioxide, in air)
- Nickel II [water, surface water]: 1.04238e-6 kg; lognormal variance with pedigree 0.1106, pedigree (4,5,3,5,2)
  (same comment as for Carbon dioxide, in air)
- Nitrate [water, ground-]: 0.129849 kg; lognormal variance with pedigree 0.0606, pedigree (4,5,3,5,2)
  (same comment as for Carbon dioxide, in air)
- Phosphate [water, ground-]: 2.45934e-5 kg; lognormal variance with pedigree 0.0606, pedigree (4,5,3,5,2)
  (same comment as for Carbon dioxide, in air)
- Phosphate [water, surface water]: 7.65469e-5 kg; lognormal variance with pedigree 0.0606, pedigree (4,5,3,5,2)
  (same comment as for Carbon dioxide, in air)
- Phosphorus [water, surface water]: 0.000126691 kg; lognormal variance with pedigree 0.0606, pedigree (4,5,3,5,2)
  (same comment as for Carbon dioxide, in air)
- Water [water, ground-]: 0.0826 m3; = 0.1*0.826; lognormal variance with pedigree 0.0212, pedigree (4,5,3,5,2)
  (same comment as for Carbon dioxide, in air)
- Water [water, surface water]: 0.32214 m3; = 0.39*0.826; lognormal variance with pedigree 0.0212, pedigree (4,5,3,5,2)
  (same comment as for Carbon dioxide, in air)
- Zinc II [water, ground-]: 3.77501e-6 kg; lognormal variance with pedigree 0.1106, pedigree (4,5,3,5,2)
  (same comment as for Carbon dioxide, in air)
- Zinc II [water, surface water]: 3.05331e-6 kg; lognormal variance with pedigree 0.1106, pedigree (4,5,3,5,2)
  (same comment as for Carbon dioxide, in air)

## Sampling procedure
The farmer was identified and contacted by agriculture science faculty familiar with the local farmers in the region. Data was collected directly from the farmer through semi-structured interview using a questionnaire based on the input requirements of the ecoinvent LCI calculation tool for crop production. The farmer does not maintain any written records and has provided the data from recent memory. In this region, typically farmers are unable to provide exact name of active ingredient in the pesticide they use and the same was noted from details given on the pesticide packet. Individual farmer is not able to calculate fuel consumption for his own farm alone and this information has been collected from farming community of the area.

## Extrapolations
Ecoinvent LCI calculation tool for crop production was used to calculate field emissions from the cultivation process. Number of wet days have been taken for neighboring region (New Delhi) and rainfall data is Normal rainfall for Haryana State in India where the farm is located. The data has been approximated using Wheat a proxy since the tool at this stage could not support non existing crops in ecoeditor.
