# treatment of drilling waste, residual material landfill

Dataset: EcoSpold 2, unit process
Geography: CH
Time period: 2010-01-01 to 2023-12-31
Technology level: current
Classification: ISIC rev.4 ecoinvent: 3822:Treatment and disposal of hazardous waste
Scenario: Business-as-Usual
System model: Allocation, cut-off by classification
Generated by: Nikolia Stoikou
Database: ecoinvent
isCopyrightProtected: true
accessRestrictedTo: 1

## General comment
This dataset represents the activity of waste disposal of 'drilling waste' in a residual material landfill (RMLF). Recommended use of this dataset: The waste is the obtained from drilling operations in oil and gas production. Inventoried waste consists of fraction: 100% drilling waste; . Waste composition (wet, in ppmw): gross heating value 0.773 MJ/kg; H2O 714700; O 100000; H 5000; C 30000; S 6000; N na; P 500; B 100; Cl 35000; Br na; F 500; I na; Ag na; As 4; Ba 5000; Cd na; Co na; Cr 50; Cu na; Hg na; Mn 400; Mo na; Ni na; Pb na; Sb na; Se na; Sn na; V na; Zn 150; Be na; Sc na; Sr 100; Ti na; Tl na; W na; Si 1000; Fe 20000; Ca 40000; Al 10000; K 3500; Mg 8000; Na 20000. Share of carbon in initial waste input that is biogenic 0%.

## Included activities start
The activity starts with the waste being available at the gate of the treatment facility. Collection and transportation of the waste to the treatment plant is not included.

## Included activities end
The activity ends with the waste being treated and waste-specific emissions from the landfill are released to the water (short-term emissions to water from leachate and long-term emissions to ground water).

## Geography
This dataset represents a landfill site with mean annual temperature (MAT) of 9.5 degC, mean annual precipitation (MAP) of 1483.00559816076 mm/year, mean annual actual evaporation (EAT) of 528.63778611689 mm/year, and net infiltration of 954.4 mm/year. The leachate percolating through the residual material landfill has an average residence time of 3.67 years.
Reference for climatic parameters:
UN data, 2020. Precipitation, Environment Statistics Database, United Nations Statistics Division Available at: http://data.un.org/Data.aspx?q=precipitation&d=ENV&f=variableID%3a6;
World Bank, 2022. Surface area (sq.km), World Bank Group Available at: https://data.worldbank.org/indicator/AG.SRF.TOTL.K2;
undata, 2020. Actual evapotranspiration, United Nations Statistics Division Available at: http://data.un.org/Data.aspx?d=ENV&f=variableID%3a7
MeteoSwiss, 2023. Swiss federal authorities. Federal Office of Meteorology and Climatology MeteoSwiss Available at:https://www.meteoswiss.admin.ch/

## Technology
Residual material landfill for polluted, inorganic waste (VVEA Type C). With base seal and leachate collection system. Ultimate average landfill height is 10 meters. Operation phase duration is 30 years. Recultivation after closure. No additional solidification with cement requested. Based on average waste composition and climate data the end of carbonate phase in the residual material landfill is estimated to be reached after 60 000 years.

## Reference product
- drilling waste: -1 kg; By-product classification Waste; CPC 39990: Other wastes n.e.c.
  main reference product of this activity
  production volume 0.32 kg
    Swiss production volume is scaled based on the Global GDP and the assumption that Switzerland amounts for circa 0.8% of the global DGP. Original comment: estimated proportion; source: ecoinvent v2; value to be replaced by value to be calculated from the demand for this treatment activity
  property price 0 EUR2005
    Waste products are assigned a price of zero as they are assumed to require further treatment.
  properties: aluminium content 0.0350503, arsenic content 1.40201e-5, barium content 0.0175252, boron content 0.000350503, calcium content 0.140201, carbon allocation 0.03 kg, carbon content 0.105151, carbon content, fossil 0.105151, carbon content, non-fossil 0, chlorine content 0.122676, chromium content 0.000175252, dry mass 0.285304 kg, fluorine content 0.00175252, heating value, gross 0.773 MJ, heating value, net 0 MJ, hydrogen content 0.0175252, iron content 0.0701007, magnesium content 0.0280403, manganese content 0.00140201, oxygen content 0.350503, phosphorus content 0.00175252, potassium content 0.0122676, silicon content 0.00350503, sodium content 0.0701007, strontium content 0.000350503, sulfur content 0.0210302, water content 2.50503, water in wet mass 0.714696 kg, wet mass 1 kg, zinc content 0.000525755

## Inputs from technosphere
- cast iron: 5.0555e-6 kg; lognormal variance with pedigree 0.31529, pedigree (1,1,2,1,1)
  for residual material landfill infrastructure
  properties: carbon content, fossil 0.04, dry mass 1 kg, wet mass 1 kg
- concrete, 25MPa: 4.6937e-7 m3; lognormal variance with pedigree 0.31529, pedigree (1,1,2,1,1)
  for residual material landfill infrastructure
  property cement content 206 kg; name cement
  property fly ash content 69 kg; name fly_ash
  property gravel content 1100 kg; name gravel
  property sand content 910 kg; name sand
  properties: dry mass 2285 kg, water content 0.0538293, wet mass 2408 kg
- diesel, burned in building machine: 0.028614 MJ; lognormal variance with pedigree 0.012675, pedigree (1,1,2,1,1)
  for residual material landfill infrastructure and operation
  properties: heating value, net 1 MJ
- electricity, low voltage: 8.5714e-6 kWh; lognormal variance with pedigree 0.012648, pedigree (1,1,2,1,1)
  for residual material landfill operation
- excavation, hydraulic digger: 0.00030086 m3; lognormal variance with pedigree 0.31529, pedigree (1,1,2,1,1)
  for residual material landfill infrastructure
- excavation, skid-steer loader: 0.00030086 m3; lognormal variance with pedigree 0.31529, pedigree (1,1,2,1,1)
  for residual material landfill infrastructure
- extrusion, plastic pipes: 8.1818e-5 kg; lognormal variance with pedigree 0.31529, pedigree (1,1,2,1,1)
  for residual material landfill infrastructure
- gravel, round: 0.1367 kg; lognormal variance with pedigree 0.31529, pedigree (1,1,2,1,1)
  for residual material landfill infrastructure
  properties: dry mass 1 kg, wet mass 1 kg
- heat, district or industrial, other than natural gas: 0.00092016 MJ; lognormal variance with pedigree 0.012648, pedigree (1,1,2,1,1)
  for residual material landfill operation
  property corresponding fuel use, propane, furnace >100kW 0 MJ; name fuel_use
  properties: heating value, net 1 MJ
  note on corresponding fuel use, propane, furnace >100kW: Lower heating value of the fuel input related to the heat/electricity output, taken directly from ecoinvent v3.0 dataset "heat production, natural gas, at industrial furnace >100kW, GLO 2000".
- pitch: 0.0012857 kg; lognormal variance with pedigree 0.31529, pedigree (1,1,2,1,1)
  for residual material landfill infrastructure
  property calculation property, kg 0 kg; name m_bitumen
  properties: carbon content, fossil 0.83, dry mass 1 kg, heating value, net 28 MJ, wet mass 1 kg
  note on calculation property, kg: Mass output. Defined here for use in the combined production calculations.
- polyethylene, high density, granulate: 0.00024899 kg; lognormal variance with pedigree 0.31529, pedigree (1,1,2,1,1)
  for residual material landfill infrastructure
  properties: carbon content, fossil 0.857143, dry mass 1 kg, heating value, net 42.47 MJ, wet mass 1 kg
- polypropylene, granulate: 8.1981e-7 kg; lognormal variance with pedigree 0.31529, pedigree (1,1,2,1,1)
  for residual material landfill infrastructure
  properties: carbon content, fossil 0.857143, dry mass 1 kg, heating value, net 32.78 MJ, wet mass 1 kg
  note on heating value, net: Value extracted from "treatment of waste polypropylene, open burning"
- polyvinylchloride, bulk polymerised: 8.1981e-7 kg; lognormal variance with pedigree 0.31529, pedigree (1,1,2,1,1)
  for residual material landfill infrastructure
  properties: carbon content, fossil 0.387097, dry mass 1 kg, heating value, net 21.5 MJ, wet mass 1 kg
- reinforcing steel: 2.9923e-5 kg; lognormal variance with pedigree 0.31529, pedigree (1,1,2,1,1)
  for residual material landfill infrastructure
  properties: carbon content, fossil 0.004, dry mass 1 kg, wet mass 1 kg
- sand: 0.00022955 kg; lognormal variance with pedigree 0.31529, pedigree (1,1,2,1,1)
  for residual material landfill infrastructure
  properties: dry mass 1 kg, wet mass 1 kg
- steel, chromium steel 18/8, hot rolled: 1.0384e-5 kg; lognormal variance with pedigree 0.31529, pedigree (1,1,2,1,1)
  for residual material landfill infrastructure
  properties: carbon content, fossil 0.0008, dry mass 1 kg, wet mass 1 kg
- synthetic rubber: 2.7327e-7 kg; lognormal variance with pedigree 0.31529, pedigree (1,1,2,1,1)
  for residual material landfill infrastructure
  properties: carbon content, fossil 0.871949, dry mass 1 kg, heating value, net 26.42 MJ, wet mass 1 kg
- tap water: 0.0063763 kg; lognormal variance with pedigree 0.31529, pedigree (1,1,2,1,1)
  for residual material landfill infrastructure
  properties: carbon content, fossil 0.00178991, dry mass 0.000337476 kg, water content 2962.17, wet mass 1 kg

## Inputs from nature
- Organic carbon, placed in landfill [inventory indicator, waste]: 0.03 kg; lognormal variance with pedigree 0.24163, pedigree (1,1,2,1,1)
  organic carbon placed in residual material landfill (for ecoscarcity LCIA only)
- Waste mass, total, placed in landfill [inventory indicator, waste]: 1 kg; lognormal variance with pedigree 0.0002, pedigree (1,1,2,1,1)
  waste mass placed in residual material landfill (for ecoscarcity LCIA only)
- Occupation, construction site [natural resource, land]: 0.00028571 m2*year; lognormal variance with pedigree 0.21182, pedigree (1,1,2,1,1)
  for residual material landfill construction
- Occupation, dump site [natural resource, land]: 0.0017143 m2*year; lognormal variance with pedigree 0.21182, pedigree (1,1,2,1,1)
  for residual material landfill area during operation
- Occupation, shrub land, sclerophyllous [natural resource, land]: 0.00028571 m2*year; lognormal variance with pedigree 0.21182, pedigree (1,1,2,1,1)
  for residual material landfill area initial aftercare recultivation
- Occupation, traffic area, road network [natural resource, land]: 0.0025714 m2*year; lognormal variance with pedigree 0.21182, pedigree (1,1,2,1,1)
  for access road of residual material landfill during construction, operation, and aftercare
- Transformation, from dump site [natural resource, land]: 5.7143e-5 m2; lognormal variance with pedigree 0.53191, pedigree (1,1,2,1,1)
  for residual material landfill area initial aftercare recultivation
- Transformation, from pasture, man made [natural resource, land]: 9.1429e-5 m2; lognormal variance with pedigree 0.53191, pedigree (1,1,2,1,1)
  for residual material landfill and access road
- Transformation, from shrub land, sclerophyllous [natural resource, land]: 5.7143e-5 m2; lognormal variance with pedigree 0.53191, pedigree (1,1,2,1,1)
  for residual material landfill area initial aftercare recultivation
- Transformation, from traffic area, road network [natural resource, land]: 3.4286e-5 m2; lognormal variance with pedigree 0.53191, pedigree (1,1,2,1,1)
  for recultivation of access road of residual material landfill after aftercare period
- Transformation, to dump site [natural resource, land]: 5.7143e-5 m2; lognormal variance with pedigree 0.53191, pedigree (1,1,2,1,1)
  for residual material landfill area
- Transformation, to forest, unspecified [natural resource, land]: 5.7143e-5 m2; lognormal variance with pedigree 0.53191, pedigree (1,1,2,1,1)
  for residual material landfill area aftercare recultivation
- Transformation, to pasture, man made [natural resource, land]: 3.4286e-5 m2; lognormal variance with pedigree 0.53191, pedigree (1,1,2,1,1)
  for recultivation of landfill and access road of residual material landfill after aftercare period
- Transformation, to shrub land, sclerophyllous [natural resource, land]: 5.7143e-5 m2; lognormal variance with pedigree 0.53191, pedigree (1,1,2,1,1)
  for residual material landfill area initial aftercare recultivation
- Transformation, to traffic area, road network [natural resource, land]: 3.4286e-5 m2; lognormal variance with pedigree 0.53191, pedigree (1,1,2,1,1)
  for access road of residual material landfill

## Emissions to nature
- Heat, waste [air, urban air close to ground]: 3.0857e-5 MJ; lognormal variance with pedigree 0.012648, pedigree (1,1,2,1,1)
  from electricity consumption in residual material landfill operation
- Hazardous waste disposed [inventory indicator, waste]: 1 kg; lognormal variance with pedigree 0.0002, pedigree (1,1,2,1,1)
  EN15804 waste mass in residual material landfill
- Aluminium III [water, ground-, long-term]: 0.0066712 kg; lognormal variance with pedigree 0.40852, pedigree (1,1,2,1,1)
  emissions to groundwater in residual material landfill
- Aluminium III [water, surface water]: 1.1137e-5 kg; lognormal variance with pedigree 1.0065, pedigree (1,1,2,1,1)
  emissions to surface water in residual material landfill
- Arsenic ion [water, ground-, long-term]: 3.9496e-6 kg; lognormal variance with pedigree 1.3888, pedigree (1,1,2,1,1)
  emissions to groundwater in residual material landfill
- Arsenic ion [water, surface water]: 4.705e-8 kg; lognormal variance with pedigree 1.7341, pedigree (1,1,2,1,1)
  emissions to surface water in residual material landfill
- BOD5, Biological Oxygen Demand [water, ground-, long-term]: 0.015007 kg; lognormal variance with pedigree 0.24164, pedigree (1,1,2,1,1)
  emissions to groundwater in residual material landfill
- BOD5, Biological Oxygen Demand [water, surface water]: 0.00014111 kg; lognormal variance with pedigree 0.61457, pedigree (1,1,2,1,1)
  emissions to surface water in residual material landfill
- Barium II [water, ground-, long-term]: 0.00081061 kg; lognormal variance with pedigree 1.2797, pedigree (1,1,2,1,1)
  emissions to groundwater in residual material landfill
- Barium II [water, surface water]: 1.3533e-6 kg; lognormal variance with pedigree 1.2761, pedigree (1,1,2,1,1)
  emissions to surface water in residual material landfill
- Boron [water, ground-, long-term]: 8.9847e-5 kg; lognormal variance with pedigree 0.96298, pedigree (1,1,2,1,1)
  emissions to groundwater in residual material landfill
- Boron [water, surface water]: 1.0153e-5 kg; lognormal variance with pedigree 1.0811, pedigree (1,1,2,1,1)
  emissions to surface water in residual material landfill
- COD, Chemical Oxygen Demand [water, ground-, long-term]: 0.15278 kg; lognormal variance with pedigree 0.24164, pedigree (1,1,2,1,1)
  emissions to groundwater in residual material landfill
- COD, Chemical Oxygen Demand [water, surface water]: 0.0014366 kg; lognormal variance with pedigree 0.61457, pedigree (1,1,2,1,1)
  emissions to surface water in residual material landfill
- Calcium II [water, ground-, long-term]: 0.012809 kg; lognormal variance with pedigree 0.53501, pedigree (1,1,2,1,1)
  emissions to groundwater in residual material landfill
- Calcium II [water, surface water]: 2.1383e-5 kg; lognormal variance with pedigree 0.94535, pedigree (1,1,2,1,1)
  emissions to surface water in residual material landfill
- Chloride [water, ground-, long-term]: 0.032855 kg; lognormal variance with pedigree 0.22533, pedigree (1,1,2,1,1)
  emissions to groundwater in residual material landfill
- Chloride [water, surface water]: 0.0021454 kg; lognormal variance with pedigree 0.3908, pedigree (1,1,2,1,1)
  emissions to surface water in residual material landfill
- Chromium VI [water, ground-, long-term]: 4.8618e-5 kg; lognormal variance with pedigree 1.0547, pedigree (1,1,2,1,1)
  emissions to groundwater in residual material landfill
- Chromium VI [water, surface water]: 3.1992e-7 kg; lognormal variance with pedigree 1.4728, pedigree (1,1,2,1,1)
  emissions to surface water in residual material landfill
- DOC, Dissolved Organic Carbon [water, ground-, long-term]: 0.029721 kg; lognormal variance with pedigree 0.24164, pedigree (1,1,2,1,1)
  emissions to groundwater in residual material landfill
- DOC, Dissolved Organic Carbon [water, surface water]: 0.00027946 kg; lognormal variance with pedigree 0.61457, pedigree (1,1,2,1,1)
  emissions to surface water in residual material landfill
- Fluoride [water, ground-, long-term]: 0.00034098 kg; lognormal variance with pedigree 0.78528, pedigree (1,1,2,1,1)
  emissions to groundwater in residual material landfill
- Fluoride [water, surface water]: 9.5876e-7 kg; lognormal variance with pedigree 1.3178, pedigree (1,1,2,1,1)
  emissions to surface water in residual material landfill
- Iron ion [water, ground-, long-term]: 0.00025589 kg; lognormal variance with pedigree 1.922, pedigree (1,1,2,1,1)
  emissions to groundwater in residual material landfill
- Iron ion [water, surface water]: 4.2719e-7 kg; lognormal variance with pedigree 1.4465, pedigree (1,1,2,1,1)
  emissions to surface water in residual material landfill
- Magnesium [water, ground-, long-term]: 0.0023788 kg; lognormal variance with pedigree 0.76219, pedigree (1,1,2,1,1)
  emissions to groundwater in residual material landfill
- Magnesium [water, surface water]: 3.9712e-6 kg; lognormal variance with pedigree 1.1387, pedigree (1,1,2,1,1)
  emissions to surface water in residual material landfill
- Manganese II [water, ground-, long-term]: 1.5455e-5 kg; lognormal variance with pedigree 1.922, pedigree (1,1,2,1,1)
  emissions to groundwater in residual material landfill
- Manganese II [water, surface water]: 2.5802e-8 kg; lognormal variance with pedigree 1.7918, pedigree (1,1,2,1,1)
  emissions to surface water in residual material landfill
- Phosphate [water, ground-, long-term]: 0.00035444 kg; lognormal variance with pedigree 1.2845, pedigree (1,1,2,1,1)
  emissions to groundwater in residual material landfill
- Phosphate [water, surface water]: 5.9172e-7 kg; lognormal variance with pedigree 1.5259, pedigree (1,1,2,1,1)
  emissions to surface water in residual material landfill
- Potassium I [water, ground-, long-term]: 0.0025094 kg; lognormal variance with pedigree 0.50073, pedigree (1,1,2,1,1)
  emissions to groundwater in residual material landfill
- Potassium I [water, surface water]: 0.00099064 kg; lognormal variance with pedigree 0.53876, pedigree (1,1,2,1,1)
  emissions to surface water in residual material landfill
- Silicon [water, ground-, long-term]: 0.0009945 kg; lognormal variance with pedigree 0.65781, pedigree (1,1,2,1,1)
  emissions to groundwater in residual material landfill
- Silicon [water, surface water]: 5.4967e-6 kg; lognormal variance with pedigree 1.0947, pedigree (1,1,2,1,1)
  emissions to surface water in residual material landfill
- Sodium I [water, ground-, long-term]: 0.012065 kg; lognormal variance with pedigree 0.29316, pedigree (1,1,2,1,1)
  emissions to groundwater in residual material landfill
- Sodium I [water, surface water]: 0.0079349 kg; lognormal variance with pedigree 0.3104, pedigree (1,1,2,1,1)
  emissions to surface water in residual material landfill
- Strontium II [water, ground-, long-term]: 1.6212e-5 kg; lognormal variance with pedigree 1.7897, pedigree (1,1,2,1,1)
  emissions to groundwater in residual material landfill
- Strontium II [water, surface water]: 2.7066e-8 kg; lognormal variance with pedigree 1.7862, pedigree (1,1,2,1,1)
  emissions to surface water in residual material landfill
- Sulfate [water, ground-, long-term]: 0.016306 kg; lognormal variance with pedigree 0.43031, pedigree (1,1,2,1,1)
  emissions to groundwater in residual material landfill
- Sulfate [water, surface water]: 0.0016937 kg; lognormal variance with pedigree 0.5553, pedigree (1,1,2,1,1)
  emissions to surface water in residual material landfill
- TOC, Total Organic Carbon [water, ground-, long-term]: 0.029721 kg; lognormal variance with pedigree 0.24164, pedigree (1,1,2,1,1)
  emissions to groundwater in residual material landfill
- TOC, Total Organic Carbon [water, surface water]: 0.00027946 kg; lognormal variance with pedigree 0.61457, pedigree (1,1,2,1,1)
  emissions to surface water in residual material landfill
- Zinc II [water, ground-, long-term]: 2.8816e-6 kg; lognormal variance with pedigree 1.922, pedigree (1,1,2,1,1)
  emissions to groundwater in residual material landfill
- Zinc II [water, surface water]: 4.8107e-9 kg; lognormal variance with pedigree 1.922, pedigree (1,1,2,1,1)
  emissions to surface water in residual material landfill
