# wood chips production, hardwood, at sawmill

Dataset: EcoSpold 2, unit process
Geography: CA-QC
Time period: 2011-01-01 to 2023-12-31
Technology level: current
Classification: ISIC rev.4 ecoinvent: 1610:Sawmilling and planing of wood
Tags: recontextualization
Scenario: Business-as-Usual
System model: Allocation, cut-off by classification
Generated by: Hugues Imbeault-Tétreault
Published in: Lignum 2010
Database: ecoinvent
isCopyrightProtected: true
accessRestrictedTo: 1

## General comment
This data represents the service of wood chipping to output one kg of dry mass wood chips. The dataset represents the use of a chipper in sawmill and is equivalent to the direct chipping in a profile chipper (see below). The exchanges of this child dataset are identical to the GLO dataset. This dataset was created to enable linking to regional markets (e.g. for electricity). Data quality indicators were adjusted accordingly.
The process chain in a sawmill is a net of interlinked processes; the process structure depends on the individual design and technologies in place for each sawmill. The structuring of the sawmilling processes is based on the identification of the core processes in a sawmill that are attributable to several co-products (such as upstream processes like forestry and transport of logs to the sawmill) sorting, storing and the sawing of the (debarked) log. Other processes are attributable directly to one of the co-products such as the chipping of residual wood (either after sawing or as part of the profile chipping), the chipping of the bark (the "debarking") or the suction of saw dust as collection and internal transport.
The following figure illustrates the general structure of the sawmilling processes before eventual drying and planing:
The data was provided by and approved by the Swiss forest industry (Holzindustrie Schweiz HIS).

## Included activities start
Wood chipping process starting from industrial residual wood (sidings and squarings) whith an electric stationary chipper or directly from the log (in the case of profile chippers) at sawmill site.

## Included activities end
This activity ends with wood chips wood at sawmill site. The dataset does not include direct wood dust emissions to the air from the chipper.

## Geography
Extrapolated from average Swiss conditions. Child dataset exchanges identical to GLO dataset. Dataset created to enable linking to regional markets (e.g. for electricity). Data quality indicators adjusted accordingly.

## Reference product
- wood chips, wet, measured as dry mass: 1 kg; name woodchip_hard; source BFS 2013; By-product classification allocatable product; CPC 31230: Wood in chips or particles; HS2017 4401: Fuel wood, in logs, billets, twigs, faggots or similar forms; wood in chip or particles; sawdust and wood was[...]
  production volume 1.1709e8 kg; = 1.301E+08*0.9
    estimated from the amout of slabs/sidings from the corresponding "sawing" dataset, assuming that 90% of slabs and sidings are converted to wood chips.
  property carbon content, fossil 0; name woodchip_hard_C_content_fossil
    fossil carbon content on a dry matter basis
  property carbon content, non-fossil 0.494; name woodchip_hard_C_content_non_fossil
    biogene carbon content on a dry matter basis
  property dry mass 1 kg; name woodchip_hard_DM
  property heating value, net 10.84 MJ
    Value based on the dataset 'softwood forestry, mixed species, sustainable forest management'
  property price 0.107 EUR2005
    Expert judgement (Urs Luginbühl, Swiss Sawmilling industry, personal communication in June 2014). Wood chips from softwood should have a price of 0.101 EUR/kg. Woodchips from hardwood should have a price of 0.112 EUR/kg. Average of these two values is used. Cross-reference; FAOSTAT database; http://faostat.fao.org/site/626/DesktopDefault.aspx?PageID=626#ancor; Average import/export prices of EU for 'chips and particles'. Price: 48.76 Euro/m3. The density of the wood chips is 650 kg/m3. The price is recalculated accordingly.
  property water content 0.7; name woodchip_hard_water_content
  property water in wet mass 0.7 kg; name woodchip_hard_WWM
  property wet mass 1.7 kg; name woodchip_hard_WM
  properties: carbon allocation 0.494 kg, carbon content 0.494

## Inputs from technosphere
All rows: source BFS 2013
- chipper, stationary, electric: 5.3e-8 unit; name chipper; lognormal variance with pedigree 0.4406, pedigree (2,1,4,5,1)
  infrastructure; data from ecoinvent v2.2
- electricity, medium voltage: 0.0197 kWh; name elec_medvol; lognormal variance with pedigree 0.2106, pedigree (2,1,4,5,1)
  electricity used for the chipping operation and collection of wood chips
- lubricating oil: 2.04e-6 kg; name oil; lognormal variance with pedigree 0.0106, pedigree (2,1,4,5,1)
  lubricant used in the chipper; data from ecoinvent v2.2
  properties: carbon content, fossil 0.75, dry mass 1 kg, heating value, net 40.2 MJ, wet mass 1 kg
  note on carbon content, fossil: Lubricating oil is produced from diesel. C-content/dry mass of fats and oils considered 75%, from: ecoinvent v2.2 report, n 15a, pg 40
  note on heating value, net: Literature value, Source: IPCC 2006, 2006 IPCC Guidelines for National Greenhouse Gas Inventories, Prepared by the National Greenhouse Gas Inventories Programme, Eggleston H.S., Buendia L., Miwa K., Ngara T. and Tanabe K. (eds). Published: IGES, Japan
- slab and siding, hardwood, wet, measured as dry mass: 1 kg; name slab_hardwood_wet; lognormal variance with pedigree 0.0106, pedigree (2,1,4,5,1)
  processed internally within the sawmill
  property carbon content, fossil 0; name slab_hardwood_wet_C_content_fossil
  property carbon content, non-fossil 0.494; name slab_hardwood_wet_C_content_non_fossil
  properties: dry mass 1 kg, heating value, net 7.79 MJ, water content 0.7, wet mass 1.7 kg
- steel, low-alloyed, hot rolled: 4.08e-6 kg; name steel_lowalloy; lognormal variance with pedigree 0.4406, pedigree (2,1,4,5,1)
  wear and tear parts such as chipping knives; data from ecoinvent v2.2
  properties: carbon content, fossil 0.005, dry mass 1 kg, wet mass 1 kg
  note on carbon content, fossil: Low alloyed steel composition given in Tab. 3.2 ecoinvent v2.2 report 10_partII. Steel assumed to have a C content of 0.5%

## Sampling procedure
complementary literature and sampling from sawmills

## Extrapolations
Copy of Swiss data. Child dataset exchanges identical to GLO dataset. Dataset created to enable linking to regional markets (e.g. for electricity). Data quality indicators adjusted accordingly.
