# ethanolamine production

Dataset: EcoSpold 2, unit process
Geography: RoW
Time period: 2000-01-01 to 2023-12-31
Technology level: current
Classification: ISIC rev.4 ecoinvent: 2011:Manufacture of basic chemicals
Synonyms: 141-43-5; 2-Hydroxyethylamine; Ethanolamine; Monoethanolamine; Aminoethanol; 2-aminoethanol
Tags: combined production
Scenario: Business-as-Usual
System model: Allocation, cut-off by classification
Generated by: Bo Weidema
Published in: Althaus H.-J. 2007
Database: ecoinvent
isCopyrightProtected: true
accessRestrictedTo: 1

## General comment
This dataset represents a multi-output process that delivers the co-products monoethanolamine, diethanolamine and triethanolamine in variable quantities. These three substances are derivatives of ammonia. While the first and the last one are viscous, colourless, clear liquids at normal room temperature, diethanolamine is a crystalline solid. Ethanolamines are used as intermediates in the production of surfactants, as corrosion inhibitors, for gas purification, as intermediates for the production of various chemicals, and as cement additives. This dataset models the production of ethanolamines by the reaction of ethylene oxide with ammonia.
The inventory is based on stoichiometric calculations and estimations. The energy and water consumptions are approximated based on data from a large chemical factory (Gendorf 2016).
References:
Althaus H.-J., Chudacoff M., Hischier R., Jungbluth N., Osses M. and Primas A. (2007) Life Cycle Inventories of Chemicals. ecoinvent report No. 8, v2.0. EMPA Dübendorf, Swiss Centre for Life Cycle Inventories, Dübendorf, CH.
Gendorf (2016) Umwelterklärung 2015, Werk Gendorf Industriepark, www.gendorf.de.

## Included activities start
The activity starts when the raw materials enter the process.

## Included activities end
This activity ends with the production of monoethanolamine, diethanolamine and triethanolamine. The raw materials and chemicals used for production are included, as well as estimated emissions to air and water from production (incomplete) and estimated energy demand and infrastructure of the plant (approximation). Solid wastes are omitted.

## Geography
The data used has no specific geographical origin as it is based on stoechiometric calculations and estimations. It is assumed to be representative of the production processes in this geography. Some values are based on data from a large chemical factory located in Germany. These are assumed to be valid for this geography.

## Technology
Production from ethylene oxide and ammonia with a process yield of 95%. The inventory is based on stoechiometric calculations. The emissions to air (0.2 wt% of raw material input) and water were estimated using mass balance. The treatment of the waste water in an internal waste water treatment plant is assumed (elimination efficiency of 90% for C).
Electricity is needed to run the process auxiliaries and the wastewater treatment. Fossil fuel is needed to generate the desired heat within the process scheme.
References:
Althaus H.-J., Chudacoff M., Hischier R., Jungbluth N., Osses M. and Primas A. (2007) Life Cycle Inventories of Chemicals. ecoinvent report No. 8, v2.0. EMPA Dübendorf, Swiss Centre for Life Cycle Inventories, Dübendorf, CH.

## Time period
Date of published literature. Some values are based on data published by the Gendorf factory that were collected between 2011 and 2015. The time period has been adjusted accordingly. For more details, see the comments of the exchanges.

## Parameters
- efficiency: 0.95 dimensionless; name process_efficiency
  process efficiency (output relative to input)
- sum of reference products: 1 kg; name sum_RP
  Sum of the amounts of the reference products mono-, di- and tri-ethanolamine.

## Reference product
- diethanolamine: 1 kg; name amount_diethanolamine; = RP2_PV/(RP1_PV + RP2_PV + RP3_PV); By-product classification allocatable product; CPC 34150: Amine-function compounds; oxygen-function amino-compounds, except lysine and its esters and salts thereof and […]; HS2017 292212: Amino-alcohols, other than those containing more than one kind of oxygen function; their ethers and esters;[...]; CAS 111-42-2
  Ethanolamines are used as intermediates in the production of surfactants, as corrosion inhibitors, for gas purification, as intermediates for the production of various chemicals, and as cement additives.
  References:
  Althaus H.-J., Chudacoff M., Hischier R., Jungbluth N., Osses M. and Primas A. (2007) Life Cycle Inventories of Chemicals. ecoinvent report No. 8, v2.0. EMPA Dübendorf, Swiss Centre for Life Cycle Inventories, Dübendorf, CH.
  production volume 3.59125e8 kg; name RP2_PV; = 0.325*1.7E+9
    Worldwide capacity for ethanolamines was 1.7 million metric tonnes (3.7 billion pounds) in 2007 (Dow Safety Assessments for mono, di and triethanolamine. Accessed from http://www.dow.com/productsafety/finder/index.htm#P).
    About half of the world production is monoethanolamine, 30 to 35% is diethanolamine and the remaining 15 to 20% triethanolamine (http://monographs.iarc.fr/ENG/Monographs/vol77/mono77-14.pdf).
  property heating value, net 26.52 MJ
    LHV is calculated based on the elemental composition of the substance. Based on the CAS number of the substance (000111-42-2), the chemical formula of the substance is found to be: C4H11NO2, (PubChem 2020).
    Reference: Kim, S., Chen, J., Cheng, T., Gindulyte, A., He, J., He, S., Li, Q., Shoemaker, B. A., Thiessen, P. A., Yu, B., Zaslavsky, L., Zhang, J., & Bolton, E. E. (2019). PubChem 2019 update: improved access to chemical data. Nucleic acids research, 47(D1), D1102–D1109. https://doi.org/10.1093/nar/gky1033
  property price 1.08 EUR2005
    Calculated value based on data from United Nations Commodity Trade Statistics Database (comtrade.un.org). UN comtrade category: 292212 Diethanolamine, salts. Year 2005. Using exchange rate of 1EURO = 1.209 USD. Average of price of import into 5 main markets (EU, US, JP, IN and CN).
  properties: carbon allocation 0.457143 kg, carbon content 0.457143, carbon content, fossil 0.457143, carbon content, non-fossil 0, dry mass 1 kg, water content 0, water in wet mass 0 kg, wet mass 1 kg

## Inputs from technosphere
- ammonia, anhydrous, liquid: 0.00477953, 0.00927805, 0.102841, 0.00434716, 0.00097244, 0.0357389, 0.00307219, 0.00946995 kg (8 suppliers, which the file names only by identifier); sum of these 0.170499 kg; = ((amount_monoethanolamine/61.084) + (amount_diethanolamine/105.14) + (amount_triethanolamine/149.19))*17.03/process_efficiency; lognormal variance with pedigree 0.1786, pedigree (4,5,5,5,5)
  For the production, a yield of 95% is used in this study.
  MW of ammonia: 17.03 g/mol
  MW monoethanolamine: 61.084 g/mol
  MW diethanolamine: 105.14 g/mol
  MW triethanolamine: 149.19 g/mol
  Uncertainty: e
  properties: dry mass 1 kg, wet mass 1 kg
- chemical factory, organics: 4e-10 unit; = 0.0000000004*(amount_monoethanolamine + amount_diethanolamine + amount_triethanolamine)/sum_RP; lognormal variance with pedigree 0.31, pedigree (2,3,2,4,3)
  Calculated based on literature data published by the industry. For this activity, no information was readily available concerning infrastructure and land-use. Therefore, the infrastructure is estimated based on data from two chemical factories, the BASF site of Ludwigshafen and the chemical factory in Gendorf (which are both located in Germany), which produce a wide range of chemical substances. Based on this data, the following assumptions are made: the built area amounts to about 4.2 ha, the plant has an average output of 50'000 t/a and a lifespan of fifty years. The estimated infrastructure amount is therefore 4.00 E-10 units per kg of produced chemical.
  References:
  Althaus H.-J., Chudacoff M., Hischier R., Jungbluth N., Osses M. and Primas A. (2007) Life Cycle Inventories of Chemicals. ecoinvent report No. 8, v2.0. EMPA Dübendorf, Swiss Centre for Life Cycle Inventories, Dübendorf, CH.
  Gendorf (2000) Umwelterklärung 2000, Werk Gendorf. Werk Gendorf, Burgkirchen.
- electricity, medium voltage: 0.0132619, 0.264545, 0.0888863, 0.00406124, 0.000812853, 0.000174538, 0.0273184 kWh (7 suppliers, which the file names only by identifier); sum of these 0.39906 kWh; = 0.39906*(amount_monoethanolamine + amount_diethanolamine + amount_triethanolamine)/sum_RP; lognormal variance with pedigree 0.0106, pedigree (2,3,2,4,3)
  Calculated based on literature data published by the GENDORF Chemical Park. The factory produced an average of 2462760 tonnes of chemical substances (including intermediates) per year in the years 2015-2019. The average consumption of electricity in the years 2015-2019 was 982796751 kWh per year. This equals 0.39906 kWh/kg chemical produced.
  References:
  Chemiepark GENDORF, Umwelterklärung 2016, https://www.gendorf.de/Nachbarn/Umweltschutz/Industrie und Nachhaltigkeit
  Chemiepark GENDORF, Umwelterklärung 2017, https://www.gendorf.de/Nachbarn/Umweltschutz/Industrie und Nachhaltigkeit
  Chemiepark GENDORF, Umwelterklärung 2020, https://www.gendorf.de/Nachbarn/Umweltschutz/Industrie und Nachhaltigkeit
- ethylene oxide: 0.882092 kg; name amount_ethylene_oxide; = ((amount_monoethanolamine/61.084) + (2*amount_diethanolamine/105.14) + (3*amount_triethanolamine/146.19))*44.053/process_efficiency; lognormal variance with pedigree 0.1786, pedigree (4,5,5,5,5)
  For the production, a yield of 95% is used in this study.
  MW of ethylene oxide: 44.053 g/mol
  MW monoethanolamine: 61.084 g/mol
  MW diethanolamine: 105.14 g/mol
  MW triethanolamine: 149.19 g/mol
  Uncertainty: e
  property carbon content, fossil 0.545455; name amount_ethylene_oxide_C_content_fossil
  properties: dry mass 1 kg, heating value, net 27.53 MJ, wet mass 1 kg
- heat, district or industrial, natural gas: 0.0304989, 1.856 MJ (2 suppliers, which the file names only by identifier); sum of these 1.8865 MJ; = 1.8865*(amount_monoethanolamine + amount_diethanolamine + amount_triethanolamine)/sum_RP; lognormal variance with pedigree 0.0106, pedigree (2,3,2,4,3)
  Calculated based on literature data published by the GENDORF Chemical Park. The factory produced an average of 2462760 tonnes of chemical substances (including intermediates) per year in the years 2015-2019. The average consumption of natural gas in the years 2015-2019 was 4645920000 MJ per year. This equals 1.8865 MJ/kg chemical produced.
  References:
  Chemiepark GENDORF, Umwelterklärung 2016, https://www.gendorf.de/Nachbarn/Umweltschutz/Industrie und Nachhaltigkeit
  Chemiepark GENDORF, Umwelterklärung 2017, https://www.gendorf.de/Nachbarn/Umweltschutz/Industrie und Nachhaltigkeit
  Chemiepark GENDORF, Umwelterklärung 2020, https://www.gendorf.de/Nachbarn/Umweltschutz/Industrie und Nachhaltigkeit
  properties: heating value, net 1 MJ
- heat, from steam, in chemical industry: 0.2078 MJ; = 0.2078*(amount_monoethanolamine + amount_diethanolamine + amount_triethanolamine)/sum_RP; lognormal variance with pedigree 0.0106, pedigree (2,3,2,4,3)
  Calculated based on literature data published by the GENDORF Chemical Park. The factory produced an average of 2462760 tonnes of chemical substances (including intermediates) per year in the years 2015-2019. The average consumption of steam (internal and external sources) in the years 2015-2019 was 511785800 MJ per year. This equals 0.2078 MJ/kg chemical produced.
  References:
  Chemiepark GENDORF, Umwelterklärung 2016, https://www.gendorf.de/Nachbarn/Umweltschutz/Industrie und Nachhaltigkeit
  Chemiepark GENDORF, Umwelterklärung 2017, https://www.gendorf.de/Nachbarn/Umweltschutz/Industrie und Nachhaltigkeit
  Chemiepark GENDORF, Umwelterklärung 2020, https://www.gendorf.de/Nachbarn/Umweltschutz/Industrie und Nachhaltigkeit
  properties: heating value, net 1 MJ
- nitrogen, liquid: 0.019 kg; = 0.019*(amount_monoethanolamine + amount_diethanolamine + amount_triethanolamine)/sum_RP; lognormal variance with pedigree 0.0106, pedigree (2,3,2,4,3)
  Calculated based on literature data published by the industry. This value is a 5-year average of data (2011 - 2015) published by the Gendorf factory (Gendorf, 2016, Umwelterklärung, www.gendorf.de), (Gendorf, 2015, Umwelterklärung, www.gendorf.de), (Gendorf, 2014, Umwelterklärung, www.gendorf.de). The amount of nitrogen used per kg of chemical substance produced is calculated using literature data published by the Gendorf factory based in Germany, which produces a wide range of chemical substances. The factory produced 1657400 tonnes of chemical substances in the year 2015 (Gendorf, 2016, Umwelterklärung, www.gendorf.de) and 740000 tonnes of intermediate products. The reported amount of nitrogen used in 2015 was 33512400 Nm3 (Gendorf, 2016, Umwelterklärung, www.gendorf.de). One Nm3 of nitrogen is equal to 1.2506 kg. The resulting amount of nitrogen - the 5-year average (2011 - 2015, weighted by production volume) is 0.019 kg/kg. Nitrogen is mainly used during the production of chemicals for 'blanketing', which is the process of applying gas to the vapour space of a container or vessel in order to control its composition.
  properties: dry mass 1 kg, wet mass 1 kg
- wastewater, average: -2.26892e-6, -8.07823e-9 m3 (2 suppliers, which the file names only by identifier); sum of these -2.277e-6 m3; = 0.000002277*(amount_monoethanolamine + amount_diethanolamine + amount_triethanolamine)/sum_RP; lognormal variance with pedigree 0.0104, pedigree (2,3,1,4,3)
  Calculated based on literature data published by the GENDORF Chemical Park. The factory produced an average of 2462760 tonnes of chemical substances (including intermediates) per year in the years 2015-2019. The average ouput of wastewater going to an external wastewater treatment plant in the years 2015-2019 was 5608 m3 per year. This equals 0.000002277 m3/kg chemical produced.
  References:
  Chemiepark GENDORF, Umwelterklärung 2016, https://www.gendorf.de/Nachbarn/Umweltschutz/Industrie und Nachhaltigkeit
  Chemiepark GENDORF, Umwelterklärung 2017, https://www.gendorf.de/Nachbarn/Umweltschutz/Industrie und Nachhaltigkeit
  Chemiepark GENDORF, Umwelterklärung 2020, https://www.gendorf.de/Nachbarn/Umweltschutz/Industrie und Nachhaltigkeit
  production volume; = (RP1_PV*BP_wastewater_average/ABS(amount_monoethanolamine)*ABS(amount_monoethanolamine)/(ABS(amount_monoethanolamine)+ABS(amount_diethanolamine)+ABS(amount_triethanolamine))) + (RP2_PV*BP_wastewater_average/ABS(amount_diethanolamine)*ABS(amount_diethanolamine)/(ABS(amount_monoethanolamine)+ABS(amount_diethanolamine)+ABS(amount_triethanolamine))) + (RP3_PV*BP_wastewater_average/ABS(amount_triethanolamine)*ABS(amount_triethanolamine)/(ABS(amount_monoethanolamine)+ABS(amount_diethanolamine)+ABS(amount_triethanolamine)))
    Calculated from the production volume of monoethanolamine in proportion to the respective output amounts.
  properties: carbon content, non-fossil 0.194039, dry mass 0.346837 kg, water content 2882.2, wet mass 1000 kg
  note on carbon content, non-fossil: 0.0673 kg TOC/m3 (Tab A.17, ecoinvent v2.2 report 13_I). TOC was considered as Total Carbon.

## Inputs from nature
- Water, cooling, unspecified natural origin [natural resource, in water]: 0.014707 m3; = 0.014707*(amount_monoethanolamine + amount_diethanolamine + amount_triethanolamine)/sum_RP; lognormal variance with pedigree 0.0106, pedigree (2,3,2,4,3)
  Calculated based on literature data published by the GENDORF Chemical Park. The factory produced an average of 2462760 tonnes of chemical substances (including intermediates) per year in the years 2015-2019. The average amount of cooling water released in the years 2015-2019 was 34408800 t per year. It was assumed that 5% of the cooling water was emitted to air during its use, therefore, to calculate the input of cooling water, the output value reported by GENDORF was scaled up by the factor 1/0.95. This equals 0.014707 m3/kg chemical produced.
  References:
  Chemiepark GENDORF, Umwelterklärung 2016, https://www.gendorf.de/Nachbarn/Umweltschutz/Industrie und Nachhaltigkeit
  Chemiepark GENDORF, Umwelterklärung 2017, https://www.gendorf.de/Nachbarn/Umweltschutz/Industrie und Nachhaltigkeit
  Chemiepark GENDORF, Umwelterklärung 2020, https://www.gendorf.de/Nachbarn/Umweltschutz/Industrie und Nachhaltigkeit
- Water, river [natural resource, in water]: 0.00096543 m3; = 0.00096543*(amount_monoethanolamine + amount_diethanolamine + amount_triethanolamine)/sum_RP; lognormal variance with pedigree 0.0106, pedigree (2,3,2,4,3)
  Calculated based on literature data published by the GENDORF Chemical Park. The factory produced an average of 2462760 tonnes of chemical substances (including intermediates) per year in the years 2015-2019. The average consumption of river water in the years 2015-2019 was 22000820 t per year. However, since the cooling water is modelled as an input, the amount of river water was adjusted to avoid double counting. 55% of the input amount of cooling water was deducted from the amount of river water, as that is the share of river water versus well water. This equals 0.00096543 m3/kg chemical produced.
  References:
  Chemiepark GENDORF, Umwelterklärung 2016, https://www.gendorf.de/Nachbarn/Umweltschutz/Industrie und Nachhaltigkeit
  Chemiepark GENDORF, Umwelterklärung 2017, https://www.gendorf.de/Nachbarn/Umweltschutz/Industrie und Nachhaltigkeit
  Chemiepark GENDORF, Umwelterklärung 2020, https://www.gendorf.de/Nachbarn/Umweltschutz/Industrie und Nachhaltigkeit
- Water, well, in ground [natural resource, in water]: 0.00081652 m3; = 0.00081652*(amount_monoethanolamine + amount_diethanolamine + amount_triethanolamine)/sum_RP; lognormal variance with pedigree 0.0106, pedigree (2,3,2,4,3)
  Calculated based on literature data published by the GENDORF Chemical Park. The factory produced an average of 2462760 tonnes of chemical substances (including intermediates) per year in the years 2015-2019. The average consumption of well water in the years 2015-2019 was 18607480 t per year. However, since the cooling water is modelled as an input, the amount of well water was adjusted to avoid double counting. 45% of the input amount of cooling water was deducted from the amount of well water, as that is the share of well water versus river water. This equals 0.00081652 m3/kg chemical produced.
  References:
  Chemiepark GENDORF, Umwelterklärung 2016, https://www.gendorf.de/Nachbarn/Umweltschutz/Industrie und Nachhaltigkeit
  Chemiepark GENDORF, Umwelterklärung 2017, https://www.gendorf.de/Nachbarn/Umweltschutz/Industrie und Nachhaltigkeit
  Chemiepark GENDORF, Umwelterklärung 2020, https://www.gendorf.de/Nachbarn/Umweltschutz/Industrie und Nachhaltigkeit

## Emissions to nature
- Ammonia [air, urban air close to ground]: 0.000340999 kg; name ammonia_emissions_air; = amount_ammonia*0.002; lognormal variance with pedigree 0.33, pedigree (5,5,5,5,5)
  There was no data available on process emissions to air for the production of ethanolamines. As approximation the air emissions occurring from the purge vent, the distillation vent and fugitive emission sources were estimated to 0.2% of the raw material input.
  Uncertainty: e
- Carbon dioxide, fossil [air, urban air close to ground]: 0.0762128 kg; = ((amount_ethylene_oxide*(1 - process_efficiency) - EO_emissions_air)*0.9)*amount_ethylene_oxide_C_content_fossil*44/12; lognormal variance with pedigree 0.2, pedigree (5,5,5,5,4)
  The unreacted ethylene oxide was assumed to leave the production process with the wastewater. This amount was calculated taken into account losses of 0.2% raw material as air emissions, and the efficiency of the reaction (95%). Further it was assumed that this wastewater is treated in an internal wastewater plant. Therefore, a removal efficiency of 90% for ethylene oxide was assumed. The carbon contained in the removed ethylene oxide was accounted as CO2 emissions to air.
  Uncertainty: e
- Ethylene oxide [air, urban air close to ground]: 0.00176418 kg; name EO_emissions_air; = amount_ethylene_oxide*0.002; lognormal variance with pedigree 0.33, pedigree (5,5,5,5,5)
  (same comment as for Ammonia)
- Nitrogen [air, unspecified]: 0.019 kg; = 0.019*(amount_monoethanolamine + amount_diethanolamine + amount_triethanolamine)/sum_RP; lognormal variance with pedigree 0.0106, pedigree (2,3,2,4,3)
  Calculated value. The amount of nitrogen released to air is equal to the amount of nitrogen entering the activity.
- Water [air, unspecified]: 0.00147 m3; = 0.00147*(amount_monoethanolamine + amount_diethanolamine + amount_triethanolamine)/sum_RP; lognormal variance with pedigree 0.0106, pedigree (2,3,2,4,3)
  Calculated based on literature data published by the GENDORF Chemical Park. The factory produced an average of 2462760 tonnes of chemical substances (including intermediates) per year in the years 2015-2019. To determine the emissions of water to air, the difference of all water inputs (from river, well, tap water and cooling) and outputs (wastewater, emissions to water) was calculated. The average ouput of water to air in the years 2015-2019 was 3620444 m3 per year. This equals 0.00147 m3/kg chemical produced. For more information on the other water exchanges please consult the respective exchange comment.
  References:
  Chemiepark GENDORF, Umwelterklärung 2016, https://www.gendorf.de/Nachbarn/Umweltschutz/Industrie und Nachhaltigkeit
  Chemiepark GENDORF, Umwelterklärung 2017, https://www.gendorf.de/Nachbarn/Umweltschutz/Industrie und Nachhaltigkeit
  Chemiepark GENDORF, Umwelterklärung 2020, https://www.gendorf.de/Nachbarn/Umweltschutz/Industrie und Nachhaltigkeit
- Ammonium [water, surface water]: 0.00260051 kg; = (amount_ammonia*(1 - process_efficiency) - ammonia_emissions_air)*0.3*18.038/17.03; lognormal variance with pedigree 0.23, pedigree (5,5,5,5,4)
  With an efficiency of 95%, 5% of ammonia is found in the wastewater, except for the amount in air emissions. For the ammonia within the wastewater a removal efficiency for NH4-N of 70% and for total N of 50% was assumed. The remaining emissions to water were considered as ammonium (NH4) and nitrate (NO3). The nitrogen emitted to air (N2) and remaining in the sewage sludge was neglected.
  MW of ammonia: 17.03 g/mol
  MW ammonium: 18.038 g/mol
  Uncertainty: e
- BOD5, Biological Oxygen Demand [water, surface water]: 0.000368809 kg; = COD*0.05; lognormal variance with pedigree 0.23, pedigree (5,5,5,5,4)
  BOD was considered 0.05*COD
  Uncertainty: e
- COD, Chemical Oxygen Demand [water, surface water]: 0.00737619 kg; name COD; = 1.7421150964958*EO_emissions_water; lognormal variance with pedigree 0.23, pedigree (5,5,5,5,4)
  COD was calculated from the amount of ethylene oxide in wastewater
  Uncertainty: e
- DOC, Dissolved Organic Carbon [water, surface water]: 0.00230732 kg; = TOC; lognormal variance with pedigree 0.23, pedigree (5,5,5,5,4)
  DOC was considered equal to TOC
  Uncertainty: e
- Ethylene oxide [water, surface water]: 0.00423404 kg; name EO_emissions_water; = (amount_ethylene_oxide*(1 - process_efficiency) - EO_emissions_air)*0.1; lognormal variance with pedigree 0.23, pedigree (5,5,5,5,4)
  The unreacted ethylene oxide was assumed to leave the production process with the wastewater. This amount was calculated taken into account losses of 0.2% raw material as air emissions, and the efficiency of the reaction (95%). Further it was assumed that this wastewater is treated in an internal wastewater plant. Therefore, a removal efficiency of 90% for ethylene oxide was assumed.
  Uncertainty: e
- Nitrate [water, surface water]: 0.0148986 kg; = (amount_ammonia*(1 - process_efficiency) - ammonia_emissions_air)*0.5*62.005/17.03; lognormal variance with pedigree 0.23, pedigree (5,5,5,5,4)
  The non-reacted ammonia is found in the wastewater, except for the amount in air emissions. For the ammonia within the wastewater a removal efficiency for NH4-N of 70% and for total N of 50% was assumed. The remaining emissions to water were considered as ammonium (NH4) and nitrate (NO3). The nitrogen emitted to air (N2) and remaining in the sewage sludge was neglected.
  MW of ammonia: 17.03 g/mol
  MW nitrate: 62 g/mol
  Uncertainty: e
- TOC, Total Organic Carbon [water, surface water]: 0.00230732 kg; name TOC; = 0.544944070046333*EO_emissions_water; lognormal variance with pedigree 0.23, pedigree (5,5,5,5,4)
  TOC was expressed relative to ethylene oxide in wastewater
  Uncertainty: e
- Water [water, unspecified]: 0.01504 m3; = 0.01504*(amount_monoethanolamine + amount_diethanolamine + amount_triethanolamine)/sum_RP; lognormal variance with pedigree 0.0106, pedigree (2,3,2,4,3)
  Calculated based on literature data published by the GENDORF Chemical Park. The factory produced an average of 2462760 tonnes of chemical substances (including intermediates) per year in the years 2015-2019. The amount of water released back to the environment consists of the sum of the amount of process water treated in the internal WWTP that is then released back to the environment and the amount of cooling water released back to the environment. The average ouput of the internal WWTP in the years 2015-2019 was 2628800 m3 and that of cooling water released back to the environment was 34408800 m3. This gives a yearly average of 37037600 m3 emissions of water to water. This equals 0.01504 m3/kg chemical produced.
  References:
  Chemiepark GENDORF, Umwelterklärung 2016, https://www.gendorf.de/Nachbarn/Umweltschutz/Industrie und Nachhaltigkeit
  Chemiepark GENDORF, Umwelterklärung 2017, https://www.gendorf.de/Nachbarn/Umweltschutz/Industrie und Nachhaltigkeit
  Chemiepark GENDORF, Umwelterklärung 2020, https://www.gendorf.de/Nachbarn/Umweltschutz/Industrie und Nachhaltigkeit

## Sampling procedure
The process data is estimated based on literature and stoechiometric calculations. Process emissions are based on estimations only. Some values are calculated based on data from a large chemical factory located in Germany. For more details, see the comments of the exchanges.

## Extrapolations
This dataset has been copied from an original dataset covering the geography RER. The uncertainty has been adjusted accordingly.

## Review by Emilia Moreno Ruiz 2017-08-08
This dataset was additionally reviewed in a separate review process by Eric Johnson of Atlantic Consulting as well as Emilia Moreno Ruiz and Gregor Wernet of ecoinvent.
