# barley grain production

Dataset: EcoSpold 2, unit process
Geography: AU-WA
Time period: 2011-01-01 to 2023-01-01
Technology level: current
Classification: ISIC rev.4 ecoinvent: 0111:Growing of cereals (except rice), leguminous crops and oil seeds
Scenario: Business-as-Usual
System model: Allocation, cut-off by classification
Generated by: Timothy Grant
Database: ecoinvent
isCopyrightProtected: true
accessRestrictedTo: 1

## General comment
This inventory represents the production of 1 kg of maize grain in AUS-WAS region, It has been developed with support from the Australian Commonwealth Government through the National Landcare Programme Innovation Grant and the Grains Research and Development Corporation (GRDC). The inventory was developed by CSIRO, the Department of Primary Industries NSW and Lifecycles. More detail on inventory development can be found in the Methodology for Developing Life Cycle Inventory' documents located at http://auslci.com.au/index.php/AusAgLCI. ;

## Included activities start
The inventory includes the processes for growing barley without irrigation on arable land in Western Australia, Australia. Inputs of fertilisers, pesticides as well as the transports to the farm are considered. All tractor operations, fuel supply and machine infrastructure is included. The direct and indirect emissions on the field from nitrogen application and stubble retention are included. Stubble/straw removed from the field is included in the nitrogen balance but allocation to straw product has been ignored as the fraction of stubble removed on average is low 11%,- and the economic value is generally low. The nitrogen balance also includes leaching of N in different parts of the state based on the ratio of evapouration/ precipitation ratio which results in 30% Nitrogen leaching in 1.5% of the state of WA. T Inventory refers to the production of 1 kg of grain. Source inventory refers to 1 ha of crop over 1 year, with an average yield value of 2110 kg (dry matter content = 1814.6 kg), from the end of the previous crop to the point of harvesting of the next crop.

## Included activities end
The system boundary ends at the field gate with all further processes such as transport, storage, packaging are excluded.

## Geography
This inventory refers to an average production in Western Australia, Australia.

## Technology
This dataset represents the current agricultural process from the soil tillage to the harvest of the crop

## Time period
Averge data collected for 2011-2016.

## Reference product
- barley grain: 1 kg; By-product classification allocatable product; CPC 01152: Barley, other; HS2017 100390: Cereals; barley, other than seed
  This inventory has been developed with support from the Australian Commonwealth Government through the National Landcare Programme Innovation Grant and the Grains Research and Development Corporation (GRDC). The inventory was developed by CSIRO, the Department of Primary Industries NSW and Lifecycles. More detail on inventory development can be found in the Methodology for Developing Life Cycle Inventory' documents located at http://auslci.com.au/index.php/AusAgLCI. ;
  production volume 4.61122e9 kg
    Australian Bureau of Statistics 2021-22, Agricultural Commodities, Australia, ABS, viewed 17 July 2023, <https://www.abs.gov.au/statistics/industry/agriculture/agricultural-commodities-australia/2021-22>.
  property price 0.16387 EUR2005
    The price was calculated based on data on gross value (AUD) [1] divided by the production quantity [2] of barley grain for the years 2017-2021 for the Western Australia region in Australia from the Australian Bureau of Statistics (ABS). Data was available per financial year, so that the first year of the financial year was assumed to be the year analysed. References: [1] Value of Agricultural Commodities Produced, Australia; accessed on 24.08.23, available at: https://www.abs.gov.au/statistics/industry/agriculture/value-agricultural-commodities-produced-australia [2] Agricultural Commodities, Australia; accessed on 24.08.2023, available at: https://www.abs.gov.au/statistics/industry/agriculture/agricultural-commodities-australia
    The prices were converted to EUR based on the annual exchange rates published by the European Central Bank (https://sdw.ecb.europa.eu/quickview.do?SERIES_KEY=120.EXR.A.AUD.EUR.SP00.A, last accessed on 2023-06-01) and adjusted for inflation relative to 2005 using the producer price index (PPI) of the euro area, published by eurostat (https://ec.europa.eu/eurostat/databrowser/view/STS_INPP_A__custom_6416181/default/table?lang=en, last accessed on 2023-06-01).
  properties: carbon allocation 0.400227 kg, carbon content 0.46538, carbon content, fossil 0, carbon content, non-fossil 0.46538, dry mass 0.86 kg, water content 0.162791, water in wet mass 0.14 kg, wet mass 1 kg

## Inputs from technosphere
- ammonium nitrate: 0.0182464 kg; lognormal variance with pedigree 0.0046, pedigree (1,4,3,1,1)
  None |) divided by kg yield per ha
  properties: dry mass 1 kg, wet mass 1 kg
- application of plant protection product, by field sprayer: 0.0028436 ha; lognormal variance with pedigree 0.0038, pedigree (2,3,3,1,1)
  None |) divided by kg yield per ha
  properties: dry mass 1 kg, wet mass 1 kg
- combine harvesting: 0.000473934 ha; lognormal variance with pedigree 0.0046, pedigree (1,4,3,1,1)
  None |) divided by kg yield per ha
  properties: dry mass 1 kg, wet mass 1 kg
- fertilising, by broadcaster: 0.000521327 ha; lognormal variance with pedigree 0.0038, pedigree (2,3,3,1,1)
  4.74E-04 units --- None |plus| 4.74E-05 units --- None |) divided by kg yield per ha
  properties: dry mass 1 kg, wet mass 1 kg
- glyphosate: 0.000665403 kg; lognormal variance with pedigree 0.0052, pedigree (3,3,3,1,1)
  3.24E-04 units --- None |plus| 3.41E-04 units --- None |) divided by kg yield per ha
  properties: carbon content, fossil 0.214286, dry mass 1 kg, wet mass 1 kg
- limestone, crushed, for mill: 0.0829384 kg; lognormal variance with pedigree 0.043825, pedigree (3,3,5,2,2)
  None |) divided by kg yield per ha
  properties: carbon content, fossil 0.117492, dry mass 0.998 kg, water content 0.00200401, wet mass 1 kg
- monoammonium phosphate: 0.0194313 kg; lognormal variance with pedigree 0.0126, pedigree (3,1,3,1,3)
  None |) divided by kg yield per ha
  properties: dry mass 1 kg, nitrogen content 0.084, phosphorus content 0.226939, wet mass 1 kg
- pesticide, unspecified: 0.00165498 kg; lognormal variance with pedigree 0.0052, pedigree (3,3,3,1,1)
  4.45E-04 units --- None |plus| 2.84E-05 units --- None |plus| 8.53E-06 units --- None |plus| 7.11E-04 units --- None |plus| 3.78E-04 units --- None |plus| 3.55E-05 units --- None |plus| 1.42E-06 units --- None |plus| 4.74E-05 units --- None |) divided by kg yield per ha
  properties: carbon content, fossil 0.486978, dry mass 1 kg, wet mass 1 kg
- planting with starter fertiliser, by no till planter: 0.000473934 ha; lognormal variance with pedigree 0.0046, pedigree (1,4,3,1,1)
  None |) divided by kg yield per ha
  properties: dry mass 1 kg, wet mass 1 kg
- tillage, cultivating, chiselling: 7.109e-5 ha; lognormal variance with pedigree 0.0046, pedigree (3,1,3,1,1)
  2.37E-05 units --- None |plus| 4.74E-05 units --- None |) divided by kg yield per ha
  properties: dry mass 1 kg, wet mass 1 kg
- transport, tractor and trailer, agricultural: 0.005 metric ton*km; lognormal variance with pedigree 0.124, pedigree (3,1,3,1,1)
  grain collection (Yield/1000)*0.005 metric ton*km |) divided by kg yield per ha
- urea: 0.0316114 kg; lognormal variance with pedigree 0.0126, pedigree (3,1,3,1,3)
  None |) divided by kg yield per ha
  properties: carbon content, fossil 0.2, dry mass 1 kg, wet mass 1 kg

## Inputs from nature
- Carbon dioxide, in air [natural resource, in air]: 2.95735 kg; lognormal variance with pedigree 0.0412, pedigree (1,3,5,1,1)
  None |) divided by kg yield per ha
- Occupation, annual crop, non-irrigated [natural resource, land]: 4.73934 m2*year; lognormal variance with pedigree 0.0047, pedigree (2,2,3,1,1)
  None |) divided by kg yield per ha
- Occupation, cropland fallow (non-use) [natural resource, land]: 0.263507 m2*year; lognormal variance with pedigree 0.006, pedigree (3,1,3,1,1)
  None |) divided by kg yield per ha

## Emissions to nature
- 2,4-D [air, non-urban air or from high stacks]: 4.44076e-6 kg; lognormal variance with pedigree 0.044, pedigree (1,4,3,1,1)
  None |) divided by kg yield per ha
- Ammonia [air, non-urban air or from high stacks]: 0.00274408 kg; lognormal variance with pedigree 0.012, pedigree (1,4,3,1,1)
  Direct emissions from fertilizers. Nitrogen applied per ha x fraction of nitrogen volatilized x N to NH4 coversion factor divided by kg yield per ha
- Antimony ion [air, non-urban air or from high stacks]: 1.62559e-8 kg; lognormal variance with pedigree 0.654, pedigree (1,4,3,1,1)
  None |) divided by kg yield per ha
- Arsenic ion [air, non-urban air or from high stacks]: 1.06161e-9 kg; lognormal variance with pedigree 0.654, pedigree (1,4,3,1,1)
  None |) divided by kg yield per ha
- Butadiene [air, non-urban air or from high stacks]: 2.1564e-6 kg; lognormal variance with pedigree 0.044, pedigree (1,4,3,1,1)
  None |) divided by kg yield per ha
- Cadmium II [air, non-urban air or from high stacks]: 2.19431e-8 kg; lognormal variance with pedigree 0.654, pedigree (1,4,3,1,1)
  None |) divided by kg yield per ha
- Carbon dioxide, fossil [air, non-urban air or from high stacks]: 0.0596455 kg; lognormal variance with pedigree 0.0046, pedigree (1,4,3,1,1)
  2.32E-02 units from urea |plus| 3.64E-02 units from lime application ) divided by kg yield per ha
- Carbon dioxide, from soil or biomass stock [air, non-urban air or from high stacks]: 1.45495 kg; lognormal variance with pedigree 0.004, pedigree (1,4,3,1,1)
  0.00E+00 units --- None |plus| 1.45E+00 units --- None |plus| 0.00E+00 units --- None |) divided by kg yield per ha
- Carbon dioxide, non-fossil [air, non-urban air or from high stacks]: 0.000241232 kg; lognormal variance with pedigree 0.0046, pedigree (1,4,3,1,1)
  None |) divided by kg yield per ha
- Carbon monoxide, from soil or biomass stock [air, non-urban air or from high stacks]: 0.00234123 kg; lognormal variance with pedigree 0.654, pedigree (1,4,3,1,1)
  None |) divided by kg yield per ha
- Carbon monoxide, non-fossil [air, non-urban air or from high stacks]: 0.00250711 kg; lognormal variance with pedigree 0.654, pedigree (1,4,3,1,1)
  None |) divided by kg yield per ha
- Chromium VI [air, non-urban air or from high stacks]: 1.09479e-8 kg; lognormal variance with pedigree 0.654, pedigree (1,4,3,1,1)
  None |) divided by kg yield per ha
- Clopyralid [air, non-urban air or from high stacks]: 3.5545e-7 kg; lognormal variance with pedigree 0.044, pedigree (1,4,3,1,1)
  None |) divided by kg yield per ha
- Cobalt II [air, non-urban air or from high stacks]: 3.891e-9 kg; lognormal variance with pedigree 0.654, pedigree (1,4,3,1,1)
  None |) divided by kg yield per ha
- Copper ion [air, non-urban air or from high stacks]: 7.77251e-9 kg; lognormal variance with pedigree 0.654, pedigree (1,4,3,1,1)
  None |) divided by kg yield per ha
- Dinitrogen monoxide [air, non-urban air or from high stacks]: 0.000187223 kg; lognormal variance with pedigree 0.034, pedigree (1,4,3,1,1)
  0.00E+00 units --- None |plus| 1.79E-05 units --- None |plus| 1.79E-06 units --- None |plus| 7.06E-06 units --- None |plus| 1.58E-04 units --- None |plus| 2.69E-06 units --- None |) divided by kg yield per ha
- Fungicides, unspecified [air, non-urban air or from high stacks]: 4.73934e-7 kg; lognormal variance with pedigree 0.044, pedigree (1,4,3,1,1)
  None |) divided by kg yield per ha
- Herbicides, unspecified [air, non-urban air or from high stacks]: 7.109e-6 kg; lognormal variance with pedigree 0.044, pedigree (1,4,3,1,1)
  None |) divided by kg yield per ha
- Lead II [air, non-urban air or from high stacks]: 1.80569e-8 kg; lognormal variance with pedigree 0.654, pedigree (1,4,3,1,1)
  None |) divided by kg yield per ha
- MCPA [air, non-urban air or from high stacks]: 3.78199e-6 kg; lognormal variance with pedigree 0.044, pedigree (1,4,3,1,1)
  None |) divided by kg yield per ha
- Manganese II [air, non-urban air or from high stacks]: 4.46919e-8 kg; lognormal variance with pedigree 0.654, pedigree (1,4,3,1,1)
  None |) divided by kg yield per ha
- Mercury II [air, non-urban air or from high stacks]: 4.59716e-9 kg; lognormal variance with pedigree 0.654, pedigree (1,4,3,1,1)
  None |) divided by kg yield per ha
- Methane, from soil or biomass stock [air, non-urban air or from high stacks]: 6.01896e-5 kg; lognormal variance with pedigree 0.012, pedigree (1,4,3,1,1)
  None |) divided by kg yield per ha
- Metsulfuron-methyl [air, unspecified]: 1.4218e-8 kg; lognormal variance with pedigree 0.044, pedigree (1,4,3,1,1)
  None |) divided by kg yield per ha
- NMVOC, non-methane volatile organic compounds [air, non-urban air or from high stacks]: 0.000136493 kg; lognormal variance with pedigree 5.004, pedigree (1,4,3,1,1)
  None |) divided by kg yield per ha
- Nickel II [air, non-urban air or from high stacks]: 6.35071e-9 kg; lognormal variance with pedigree 0.654, pedigree (1,4,3,1,1)
  None |) divided by kg yield per ha
- Nitrogen [air, non-urban air or from high stacks]: 0.00119431 kg; lognormal variance with pedigree 0.044, pedigree (1,4,3,1,1)
  Amount calculated from APSIM https://www.apsim.info/ runs for full rotation in region and divided by kg yield per ha.
- Nitrogen oxides [air, non-urban air or from high stacks]: 0.00022654 kg; lognormal variance with pedigree 0.034, pedigree (1,4,3,1,1)
  1.55E-04 units --- None |plus| 7.11E-05 units --- None |) divided by kg yield per ha
- Oxyfluorfen [air, non-urban air or from high stacks]: 8.53081e-8 kg; lognormal variance with pedigree 0.044, pedigree (1,4,3,1,1)
  None |) divided by kg yield per ha
- Particulate Matter, > 2.5 um and < 10um [air, non-urban air or from high stacks]: 0.000353555 kg; lognormal variance with pedigree 0.304, pedigree (1,4,3,1,1)
  None |) divided by kg yield per ha
- Selenium IV [air, non-urban air or from high stacks]: 1.76777e-9 kg; lognormal variance with pedigree 0.654, pedigree (1,4,3,1,1)
  None |) divided by kg yield per ha
- Triclopyr [air, non-urban air or from high stacks]: 2.8436e-7 kg; lognormal variance with pedigree 0.044, pedigree (1,4,3,1,1)
  None |) divided by kg yield per ha
- Zinc II [air, non-urban air or from high stacks]: 2.97156e-8 kg; lognormal variance with pedigree 0.654, pedigree (1,4,3,1,1)
  None |) divided by kg yield per ha
- 2,4-D [soil, agricultural]: 0.000439384 kg; lognormal variance with pedigree 0.037, pedigree (1,4,3,1,1)
  4.09E-04 units --- None |plus| 2.99E-05 units --- None |) divided by kg yield per ha
- Cadmium II [soil, agricultural]: 9.52607e-8 kg; lognormal variance with pedigree 0.044, pedigree (1,4,3,1,1)
  None |) divided by kg yield per ha
- Clopyralid [soil, agricultural]: 3.51659e-5 kg; lognormal variance with pedigree 0.037, pedigree (1,4,3,1,1)
  3.28E-05 units --- None |plus| 2.37E-06 units --- None |) divided by kg yield per ha
- Fungicides, unspecified [soil, agricultural]: 4.68483e-5 kg; lognormal variance with pedigree 0.037, pedigree (1,4,3,1,1)
  4.39E-05 units --- None |plus| 2.96E-06 units --- None |) divided by kg yield per ha
- Glyphosate [soil, agricultural]: 0.000665403 kg; lognormal variance with pedigree 0.0376, pedigree (3,3,3,1,1)
  3.24E-04 units --- None |plus| 3.41E-04 units --- None |) divided by kg yield per ha
- Herbicides, unspecified [soil, agricultural]: 0.000701896 kg; lognormal variance with pedigree 0.037, pedigree (1,4,3,1,1)
  6.54E-04 units --- None |plus| 4.79E-05 units --- None |) divided by kg yield per ha
- Lead II [soil, agricultural]: 6.06635e-8 kg; lognormal variance with pedigree 0.044, pedigree (1,4,3,1,1)
  None |) divided by kg yield per ha
- MCPA [soil, agricultural]: 0.000373791 kg; lognormal variance with pedigree 0.037, pedigree (1,4,3,1,1)
  3.48E-04 units --- None |plus| 2.55E-05 units --- None |) divided by kg yield per ha
- Mercury II [soil, agricultural]: 2.21327e-10 kg; lognormal variance with pedigree 0.044, pedigree (1,4,3,1,1)
  None |) divided by kg yield per ha
- Metsulfuron-methyl [soil, agricultural]: 1.40758e-6 kg; lognormal variance with pedigree 0.037, pedigree (1,4,3,1,1)
  1.31E-06 units --- None |plus| 9.48E-08 units --- None |) divided by kg yield per ha
- Oxyfluorfen [soil, agricultural]: 8.44076e-6 kg; lognormal variance with pedigree 0.037, pedigree (1,4,3,1,1)
  7.87E-06 units --- None |plus| 5.73E-07 units --- None |) divided by kg yield per ha
- Triclopyr [soil, agricultural]: 2.81232e-5 kg; lognormal variance with pedigree 0.037, pedigree (1,4,3,1,1)
  2.62E-05 units --- |plus| 1.91E-06 units --- None |) divided by kg yield per ha
- 2,4-D [water, surface water]: 5.54502e-7 kg; lognormal variance with pedigree 0.044, pedigree (1,4,3,1,1)
  5.55E-07 units --- None |plus| 0.00E+00 units --- None |) divided by kg yield per ha
- Clopyralid [water, surface water]: 4.38389e-8 kg; lognormal variance with pedigree 0.044, pedigree (1,4,3,1,1)
  4.38E-08 units --- None |plus| 0.00E+00 units --- None |) divided by kg yield per ha
- Fungicides, unspecified [water, surface water]: 5.49763e-8 kg; lognormal variance with pedigree 0.044, pedigree (1,4,3,1,1)
  5.50E-08 units --- None |plus| 0.00E+00 units --- None |) divided by kg yield per ha
- Herbicides, unspecified [water, surface water]: 8.86256e-7 kg; lognormal variance with pedigree 0.004, pedigree (1,4,3,1,1)
  8.86E-07 units --- None |plus| 0.00E+00 units --- None |) divided by kg yield per ha
- MCPA [water, surface water]: 4.70616e-7 kg; lognormal variance with pedigree 0.044, pedigree (1,4,3,1,1)
  4.71E-07 units --- None |plus| 0.00E+00 units --- None |) divided by kg yield per ha
- Metsulfuron-methyl [water, surface water]: 1.75355e-9 kg; lognormal variance with pedigree 0.044, pedigree (1,4,3,1,1)
  1.75E-09 units --- None |plus| 0.00E+00 units --- None |) divided by kg yield per ha
- Nitrate [water, ground-]: 0.00263981 kg; lognormal variance with pedigree 0.044, pedigree (1,4,3,1,1)
  Fertilizers leaching - Nitrous oxide emissions Nitrogen applied x fraction of nitrogen available for leaching x fraction of nitrogen leaching from NIR x (1-nitrogen reemitted to air) x conversion factor divided by kg yield per ha
- Oxyfluorfen [water, surface water]: 1.06161e-8 kg; lognormal variance with pedigree 0.004, pedigree (1,4,3,1,1)
  1.06E-08 units --- None |plus| 0.00E+00 units --- None |) divided by kg yield per ha
- Phosphate [water, ground-]: 1.18e-5 kg; lognormal variance with pedigree 0.044, pedigree (1,4,3,1,1)
  1.18E-05 kg - Phosphorus leaching to ground water 0.07kg P per ha.a as phosphate PO4 - Ecoinvent report on agriculture divided by kg yield per ha
- Phosphate [water, surface water]: 1.04e-5 kg; lognormal variance with pedigree 0.044, pedigree (1,4,3,1,1)
  1.04E-05 kg - P run-off to surface waters ecoinvent report on agriculture divided by kg yield per ha
- Phosphorus [water, surface water]: 1.66825e-6 kg; lognormal variance with pedigree 0.044, pedigree (1,4,3,1,1)
  None |) divided by kg yield per ha
- Triclopyr [water, surface water]: 3.53555e-8 kg; lognormal variance with pedigree 0.044, pedigree (1,4,3,1,1)
  3.54E-08 units --- None |plus| 0.00E+00 units --- None |) divided by kg yield per ha

## Sampling procedure
Face-to-face interviews with regional experts
