# carbon disulfide production, from charcoal

Dataset: EcoSpold 2, unit process
Geography: GLO
Time period: 2000-01-01 to 2023-12-31
Technology level: current
Classification: EcoSpold01Categories: chemicals/organics
Classification: ISIC rev.4 ecoinvent: 2011:Manufacture of basic chemicals
Scenario: Business-as-Usual
System model: Allocation, cut-off by classification
Share of production covered: 100 %
Generated by: Daria Dellenbach
Published in: Sutter, J. 2007
Database: ecoinvent
isCopyrightProtected: true
accessRestrictedTo: 1

## General comment
This dataset represents the production of 1 kg carbon disulfide, at plant, global. For this dataset the production of carbon disulfide by means of the reaction between sulfur and charcoal is considered. All data in the present dataset is referred to 1 kg carbon disulfide 100%. The system includes the process with consumption of raw materials, energy, infrastructure and land use as well as the generation of emissions to air and water. It also includes transportation of the raw materials. Transient or unstable operations like starting-up or shutting-down, are not included, but the production during stable operation conditions. Storage and transportation of the final product are also not included. It is assumed that the manufacturing plants are located in an urban/industrial area and consequently the emissions are categorised as emanating in a high population density area. The emissions into water are assumed to be emitted into rivers.

## Included activities start
From the reception of methane and sulphur at the factory gate.

## Included activities end
This activity ends with the production of carbon disulfide including materials, energy uses, infrastructure and emissions. This activity doesn't include water emissions.

## Geography
The inventory is modelled for the world.

## Technology
The technology used in this dataset is the production of CS2 by sulphurization of charcoal.
In retort plants, molten sulfur is heated and vaporized either before or after addition to the retort. Reaction between the sulfur vapor and a stationary bed of charcoal at 850 – 900 °C takes place inside the retort at slightly above atmospheric pressure. The product gas, consisting of carbon disulfide, some sulfur, hydrogen sulfide, carbonyl sulfide, and inerts, passes through a train of condenser, scrubber, and oil absorber where the crude carbon disulfide is recovered; the pure product is obtained by further treatment in distillation columns. The yields are below 90%.
Electrical resistance heating in brick-lined electrothermal reactors provides an alternative heat source for the reaction of charcoal with sulfur. Where cheap power is available, the electrical method may be more economic.
Figure: Methane process for CS2 production.
a) Reaction furnace; b) Catalytic reactors; c) Sulfur condenser; d) CS2 scrubber; e) CS2 condenser; f) CS2 absorber; g) Oil interchangers; h) CS2 stripper; i) Stabilizer column; j) Purification column; k) Caustic wash column; l) Water wash column
Tables: World production of CS2 in 1984 in 103 tons / World production of CS2 in 1991 in 103 tons
Lay, M., Sauerhoff, M., Saunders, D.:Carbon disulfide. Published online: 2000. In: Ullmann's Encyclopedia of Industrial Chemistry, Seventh Edition, 2004 Elec-tronic Release (ed. Fiedler E., Grossmann G., Kersebohm D., Weiss G. and Witte C.). 7 th Electronic Release Edition. Wiley InterScience, New York, Online-Version under: http://www.mrw.interscience.wiley.com/emrw/9783527306732/home

## Time period
Time of publications

## Parameters
- fraction, cooling water, cooling pond system, to air: 0.032 dimensionless; name fraction_CW_CP_to_air; lognormal variance with pedigree 0.0413, pedigree (2,3,1,3,1)
  Calculated based on literature value (Scown, C.D., 2011, Water Footprint of U.S. Transportation Fuels and supplying information of the article) (Vionnet, S., Quantis Water Database - Technical Report, 2012).
- fraction, cooling water, once-through system, to air: 0.004 dimensionless; name fraction_CW_OT_to_air; lognormal variance with pedigree 0.0413, pedigree (2,3,1,3,1)
  (same comment as for fraction, cooling water, cooling pond system, to air)
- fraction, cooling water, recirculating system, to air: 0.771 dimensionless; name fraction_CW_R_to_air; lognormal variance with pedigree 0.0413, pedigree (2,3,1,3,1)
  (same comment as for fraction, cooling water, cooling pond system, to air)
- fraction, cooling water, to air: 0.3875 dimensionless; name fraction_CW_to_air; = (0.5*fraction_CW_OT_to_air)+(0.5*fraction_CW_R_to_air); lognormal variance with pedigree 0.092025, pedigree (4,4,3,2,4)
  Calculated value based on literature value (see comments of the other parametres present in this dataset) and expert opinion. In the case when no industry/literature data are available about the type of cooling or directly fraction, cooling water, to air specific for the process a default assumption is applied. It is assumed that the once-through cooling system is used in 50% of all cases and recirculating system is used in another 50% of all cases.

## Reference product
- carbon disulfide: 1 kg; name RP; By-product classification allocatable product; CPC 34231: Chemical elements n.e.c.; inorganic acids except phosphoric, nitric and sulphonitric; inorganic oxygen compoun[…]; HS2017 281310: Carbon disulphide; CAS 75-15-0
  Carbon disulfide is a volatile, dense liquid with a wide flammability range in air (1 - 50 vol %). It has an unusually low autoignition point and a low flash point. Its evaporation rate into air is 1.6 times that of diethyl ether. It is an excellent solvent for many organic compounds and readily dissolves sulfur, phosphorus, iodine, waxes, rubber, and resins. The commercial product has a pungent odor characteristic of sulfur compounds.
  Carbon disulfide is used as a reaction and extraction solvent, as a catalyst presulfidation agent, an oil well solvent, and a cold vulcanization additive for rubber, synthetic chemicals.
  EcoSpold01Location=GLO
  production volume 3.45757e8 kg; name PV_RP; = (170097138.75+5.50E+08)/(0.154+0.1584)*0.15
    The annual production volume of Europe is 550'000'000kg and the US annual production volume is 1.7E+8. This value was sclaed up with the GDP, where Europe's contribution is 15.4% and the US contribution 15.84%.
    It is assumed that 15% of carbon disulfide are produced from charcoal.
    ECHA, carbon disulfide: https://echa.europa.eu/substance-information/-/substanceinfo/100.000.767
    EPA, carbon disulfide: https://www.epa.gov/chemical-data-reporting
    Ullmanns Encyclopedia of Industrial Chemistry, Carbon Disulfide (2011).
  property heating value, net 32.72 MJ
    LHV is calculated based on the elemental composition of the substance. Based on the CAS number of the substance (000075-10-0), the chemical formula of the substance is found to be: C70H49N5, (PubChem 2020).
    Reference: Kim, S., Chen, J., Cheng, T., Gindulyte, A., He, J., He, S., Li, Q., Shoemaker, B. A., Thiessen, P. A., Yu, B., Zaslavsky, L., Zhang, J., & Bolton, E. E. (2019). PubChem 2019 update: improved access to chemical data. Nucleic acids research, 47(D1), D1102–D1109. https://doi.org/10.1093/nar/gky1033
  property price 0.28 EUR2005
    Calculated value based on data from United Nations Commodity Trade Statistics Database (comtrade.un.org). UN comtrade category: 281310 Carbon disulphide. Year 2005. Using exchange rate of 1EURO = 1.209 USD. Average of price of import into 5 main markets (EU, US, JP, IN and CN).
  properties: carbon allocation 0.157895 kg, carbon content 0.157895, carbon content, fossil 0.157895, carbon content, non-fossil 0, dry mass 1 kg, water content 0, water in wet mass 0 kg, wet mass 1 kg

## Inputs from technosphere
- charcoal: 0.2236 kg; lognormal variance with pedigree 0.0499, pedigree (2,3,5,3,3)
  Charcoal was used as a raw material and is calculated based on stoichiometric balance, assuming 85% conversion.
  properties: carbon content, non-fossil 0.8, dry mass 1 kg, heating value, net 28.4 MJ, wet mass 1 kg
  note on heating value, net: Indicative value. Reference: Fuels - Higher and Lower Calorific Values, available at: https://www.engineeringtoolbox.com/fuels-higher-calorific-values-d_169.html
- chemical factory, organics: 4e-10 unit; source Gendorf 2000; lognormal variance with pedigree 0.3832, pedigree (2,4,5,4,4)
  EcoSpold01Location=RER
  Calculated based on literature data published by the industry. For this activity, no information was readily available concerning infrastructure and land-use. Therefore, the infrastructure is estimated based on data from two chemical factories, the BASF site of Ludwigshafen and the chemical factory in Gendorf (which are both located in Germany), which produce a wide range of chemical substances. Based on this data, the following assumptions are made: the built area amounts to about 4.2 ha, the plant has an average output of 50'000 t/a and a lifespan of fifty years. The estimated infrastructure amount is therefore 4.00 E-10 units per kg of produced chemical.
- electricity, medium voltage: 1.57 kWh; lognormal variance with pedigree 0.0499, pedigree (2,3,5,3,3)
  Electricity from grid for furnace operation.
  EcoSpold01Location=UCTE
- hazardous waste, for incineration: -0.00565798, -0.0027209, -7.11227e-5 kg (3 suppliers, which the file names only by identifier); sum of these -0.00845 kg; lognormal variance with pedigree 0.022825, pedigree (4,5,2,2,2)
  Hazardous waste which was sludge collected from CS2 storage tanks.
  Uncertainty: Stoechiometric calculation
  production volume; = PV_RP *hazWaste / RP
    Calculated from production volume of reference product using the relative outputs.
  properties: carbon content, fossil 0.554667, dry mass 0.75 kg, heating value, net 17 MJ, water content 0.333333, wet mass 1 kg
  note on carbon content, fossil: Tab A.6, ecoinvent v2.2 report 13_I. C content has been calculated after data in the tables, and then referred to 1 kg DM
  note on heating value, net: Value taken from the general comment of the treatment dataset.
- heat, district or industrial, natural gas: 1.95 MJ; lognormal variance with pedigree 0.0499, pedigree (2,3,5,3,3)
  EcoSpold01Location=RER
  Fuel gas was used as energy for the calcination process.
  properties: heating value, net 1 MJ
- heat, from steam, in chemical industry: 10.7965, 1.90355 MJ (2 suppliers, which the file names only by identifier); sum of these 12.7 MJ; lognormal variance with pedigree 0.0573, pedigree (2,5,5,3,3)
  Steam was used for blanketing of sulfur pits and pipline,
  properties: heating value, net 1 MJ
- inert waste, for final disposal: -0.0244508, -0.000159181 kg (2 suppliers, which the file names only by identifier); sum of these -0.02461 kg; source W. Kunz 2002; lognormal variance with pedigree 0.022825, pedigree (4,5,2,2,2)
  EcoSpold01Location=CH
  Solid waste, mostly fly ash from the furnace.
  Uncertainty: Stoechiometric calculation
  production volume; = PV_RP *inertWaste / RP
    Calculated from the production volume of carbon disulfide in proportion to the respective output amounts.
  properties: dry mass 0.995 kg, water content 0.00502513, wet mass 1 kg
- nitrogen, liquid: 0.0453114, 0.0124377 kg (2 suppliers, which the file names only by identifier); sum of these 0.0577491 kg; lognormal variance with pedigree 0.0499, pedigree (2,3,5,3,3)
  Nitrogen was used for purging of plant equipment.
  properties: dry mass 1 kg, wet mass 1 kg
- sulfur: 0.89856 kg; lognormal variance with pedigree 0.0499, pedigree (2,3,5,3,3)
  EcoSpold01Location=RER
  Sulfur fresh feed was used as raw material and is calculated based on stoichiometric balance, excluding recycle stream.
  properties: dry mass 1 kg, wet mass 1 kg
- wastewater, average: -1.09589e-8, -1.82361e-6, -4.36062e-7, -6.49273e-9 m3 (4 suppliers, which the file names only by identifier); sum of these -2.27712e-6 m3; lognormal variance with pedigree 0.0452, pedigree (2,4,1,5,4)
  Calculated based on literature data published by the GENDORF Chemical Park. The factory produced an average of 2462760 tonnes of chemical substances (including intermediates) per year in the years 2015-2019. The average ouput of wastewater going to an external wastewater treatment plant in the years 2015-2019 was 5608 m3 per year. This equals 0.000002277 m3/kg chemical produced.
  References:
  Chemiepark GENDORF, Umwelterklärung 2016, https://www.gendorf.de/Nachbarn/Umweltschutz/Industrie%20und%20Nachhaltigkeit
  Chemiepark GENDORF, Umwelterklärung 2017, https://www.gendorf.de/Nachbarn/Umweltschutz/Industrie%20und%20Nachhaltigkeit
  Chemiepark GENDORF, Umwelterklärung 2020, https://www.gendorf.de/Nachbarn/Umweltschutz/Industrie%20und%20Nachhaltigkeit
  properties: carbon content, non-fossil 0.194039, dry mass 0.346837 kg, mass concentration, TOC 0.1091 kg/m3, mass concentration, calcium 0.039453 kg/m3, mass concentration, chlorine 0.030031 kg/m3, mass concentration, hydrogen 0.013365 kg/m3, mass concentration, nitrogen 0.031015 kg/m3, mass concentration, oxygen 0.069824 kg/m3, mass concentration, sodium 0.06456 kg/m3, mass concentration, sulfur 0.015602 kg/m3, water content 2882.2, wet mass 1000 kg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
  note on carbon content, non-fossil: 0.0673 kg TOC/m3 (Tab A.17, ecoinvent v2.2 report 13_I). TOC was considered as Total Carbon.
- wastewater, unpolluted: -1.63629e-6, -0.000338364 m3 (2 suppliers, which the file names only by identifier); sum of these -0.00034 m3; lognormal variance with pedigree 0.0438, pedigree (2,4,1,4,4)
  Effluent from cooling water.
  production volume; = PV_RP *WW / RP
    Calculated from production volume of reference product using the relative outputs.
  properties: carbon content, fossil 0.00178991, carbon content, non-fossil 0.00178991, dry mass 0.337476 kg, water content 2962.17, wet mass 1000 kg
  note on carbon content, fossil: Assumed to be like in tap water. Bicarbonate content is 2.93 mol/m3. CO2 content is 0.1 mol/m3 (ecoinvent v2.2 report 8, Tab 93.1).

## Inputs from nature
- Water, cooling, unspecified natural origin [natural resource, in water]: 0.014707 m3; lognormal variance with pedigree 0.0852, pedigree (2,4,5,5,4)
  Calculated based on literature data published by the GENDORF Chemical Park. The factory produced an average of 2462760 tonnes of chemical substances (including intermediates) per year in the years 2015-2019. The average amount of cooling water released in the years 2015-2019 was 34408800 t per year. It was assumed that 5% of the cooling water was emitted to air during its use, therefore, to calculate the input of cooling water, the output value reported by GENDORF was scaled up by the factor 1/0.95. This equals 0.014707 m3/kg chemical produced.
  References:
  Chemiepark GENDORF, Umwelterklärung 2016, https://www.gendorf.de/Nachbarn/Umweltschutz/Industrie%20und%20Nachhaltigkeit
  Chemiepark GENDORF, Umwelterklärung 2017, https://www.gendorf.de/Nachbarn/Umweltschutz/Industrie%20und%20Nachhaltigkeit
  Chemiepark GENDORF, Umwelterklärung 2020, https://www.gendorf.de/Nachbarn/Umweltschutz/Industrie%20und%20Nachhaltigkeit
- Water, river [natural resource, in water]: 0.000965426 m3; lognormal variance with pedigree 0.0852, pedigree (2,4,5,5,4)
  Calculated based on literature data published by the GENDORF Chemical Park. The factory produced an average of 2462760 tonnes of chemical substances (including intermediates) per year in the years 2015-2019. The average consumption of river water in the years 2015-2019 was 22000820 t per year. However, since the cooling water is modelled as an input, the amount of river water was adjusted to avoid double counting. 55% of the input amount of cooling water was deducted from the amount of river water, as that is the share of river water versus well water. This equals 0.00096543 m3/kg chemical produced.
  References:
  Chemiepark GENDORF, Umwelterklärung 2016, https://www.gendorf.de/Nachbarn/Umweltschutz/Industrie%20und%20Nachhaltigkeit
  Chemiepark GENDORF, Umwelterklärung 2017, https://www.gendorf.de/Nachbarn/Umweltschutz/Industrie%20und%20Nachhaltigkeit
  Chemiepark GENDORF, Umwelterklärung 2020, https://www.gendorf.de/Nachbarn/Umweltschutz/Industrie%20und%20Nachhaltigkeit
- Water, well, in ground [natural resource, in water]: 0.000816522 m3; lognormal variance with pedigree 0.0852, pedigree (2,4,5,5,4)
  Calculated based on literature data published by the GENDORF Chemical Park. The factory produced an average of 2462760 tonnes of chemical substances (including intermediates) per year in the years 2015-2019. The average consumption of well water in the years 2015-2019 was 18607480 t per year. However, since the cooling water is modelled as an input, the amount of well water was adjusted to avoid double counting. 45% of the input amount of cooling water was deducted from the amount of well water, as that is the share of well water versus river water. This equals 0.00081652 m3/kg chemical produced.
  References:
  Chemiepark GENDORF, Umwelterklärung 2016, https://www.gendorf.de/Nachbarn/Umweltschutz/Industrie%20und%20Nachhaltigkeit
  Chemiepark GENDORF, Umwelterklärung 2017, https://www.gendorf.de/Nachbarn/Umweltschutz/Industrie%20und%20Nachhaltigkeit
  Chemiepark GENDORF, Umwelterklärung 2020, https://www.gendorf.de/Nachbarn/Umweltschutz/Industrie%20und%20Nachhaltigkeit

## Emissions to nature
- Carbon dioxide, fossil [air, unspecified]: 0.1079 kg; lognormal variance with pedigree 0.0499, pedigree (2,3,5,3,3)
  Calculated based on combustions of fuel gas and busting of safety disc,
- Nitrogen [air, unspecified]: 0.0577491 kg; lognormal variance with pedigree 0.043, pedigree (2,3,5,4,2)
  To ensure nitrogen balance.
- Sulfur dioxide [air, unspecified]: 0.0338 kg; lognormal variance with pedigree 0.0499, pedigree (2,3,5,3,3)
  Total SO2 emitted to the atmosphere by the plant due to bursting of safety disc,
- VOC, volatile organic compounds [air, unspecified]: 0.0123 kg; lognormal variance with pedigree 0.0499, pedigree (2,3,5,3,3)
  Volatiles are emitted during calcination process and originate from the impurities of coal.
- Water [air, unspecified]: 0.00147008 m3; lognormal variance with pedigree 0.1246, pedigree (2,4,5,5,4)
  Calculated based on literature data published by the GENDORF Chemical Park. The factory produced an average of 2462760 tonnes of chemical substances (including intermediates) per year in the years 2015-2019. To determine the emissions of water to air, the difference of all water inputs (from river, well, tap water and cooling) and outputs (wastewater, emissions to water) was calculated. The average ouput of water to air in the years 2015-2019 was 3620444 m3 per year. This equals 0.00147 m3/kg chemical produced. For more information on the other water exchanges please consult the respective exchange comment.
  References:
  Chemiepark GENDORF, Umwelterklärung 2016, https://www.gendorf.de/Nachbarn/Umweltschutz/Industrie%20und%20Nachhaltigkeit
  Chemiepark GENDORF, Umwelterklärung 2017, https://www.gendorf.de/Nachbarn/Umweltschutz/Industrie%20und%20Nachhaltigkeit
  Chemiepark GENDORF, Umwelterklärung 2020, https://www.gendorf.de/Nachbarn/Umweltschutz/Industrie%20und%20Nachhaltigkeit
- Water [water, unspecified]: 0.0150391 m3; lognormal variance with pedigree 0.1246, pedigree (2,4,5,5,4)
  Calculated based on literature data published by the GENDORF Chemical Park. The factory produced an average of 2462760 tonnes of chemical substances (including intermediates) per year in the years 2015-2019. The amount of water released back to the environment consists of the sum of the amount of process water treated in the internal WWTP that is then released back to the environment and the amount of cooling water released back to the environment. The average ouput of the internal WWTP in the years 2015-2019 was 2628800 m3 and that of cooling water released back to the environment was 34408800 m3. This gives a yearly average of 37037600 m3 emissions of water to water. This equals 0.01504 m3/kg chemical produced.
  References:
  Chemiepark GENDORF, Umwelterklärung 2016, https://www.gendorf.de/Nachbarn/Umweltschutz/Industrie%20und%20Nachhaltigkeit
  Chemiepark GENDORF, Umwelterklärung 2017, https://www.gendorf.de/Nachbarn/Umweltschutz/Industrie%20und%20Nachhaltigkeit
  Chemiepark GENDORF, Umwelterklärung 2020, https://www.gendorf.de/Nachbarn/Umweltschutz/Industrie%20und%20Nachhaltigkeit

## Sampling procedure
Standard values

## Extrapolations
Energy consumptions and emissions are estimated. Infrastructure and transports are calculated with standard values.
