# waste collection lorry production, 21 metric ton

Dataset: EcoSpold 2, unit process
Geography: RoW
Time period: 1991-01-01 to 2023-12-31
Technology level: current
Classification: EcoSpold01Categories: waste management/others
Classification: ISIC rev.4 ecoinvent: 2910:Manufacture of motor vehicles
Scenario: Business-as-Usual
System model: Allocation, cut-off by classification
Generated by: Gabor Doka (obsolete)
Published in: Doka G. 2007
Database: ecoinvent
isCopyrightProtected: true
accessRestrictedTo: 1

## General comment
based on a vehicle lifetime of 540'000 vehicle-kilometers. Gross load capactity 8.2 tons. Load factor 50%. Average load 4.1 tons. lifetime transport service 2.214 million ton-kilometers.

## Included activities end
vehicle and road infrastructure for waste collection vehicle. Production and maintenance.

## Technology
Waste collection and hydraulic compression vehicle. Gross load capactity 8.2 tons. Load factor 50%. Average load 4.1 tons. Extrapolated from data for lorry 16t class (ecoinvent 2000 report No. 14). Assuming 30% higher vehicle mass.

## Reference product
- waste collection lorry, 21 metric ton: 1 unit; By-product classification allocatable product; CPC 49119: Special-purpose motor vehicles n.e.c.; HS2017 870590: Vehicles; break-down lorries, road-sweepers, spraying lorries, mobile workshops, mobile radiological units,[...]
  EcoSpold01Location=CH
  production volume 3.96633 unit
    This is a placeholder value that does not reflect real-world production volumes. This dataset does not currently require a real-world production volume to work in the database framework, and no actual data were collected yet. This has no negative effect on the results of the ecoinvent database.
  property price 33854 EUR2005
    Calculated based on inputs: The price of the product has been calculated as a sum of the values of the material and energy inputs for this product. This value is therefore a rough estimation. It may underestimate the real price since there are additional expenses when producing any product. These expences can include for example labour costs, treatment of waste materials and profit for the producer. Please consider carefully whether this level of data quality is acceptable for your application.
  properties: carbon allocation 0 kg, carbon content 0

## Inputs from technosphere
- lorry, 16 metric ton: 1.3 unit; lognormal variance with pedigree 0.042, pedigree (1,1,5,5,1)
  unqualified estimate of mass increase compared to a 16t lorry.
  EcoSpold01Location=RER
- maintenance, lorry 16 metric ton: 1 unit; lognormal variance with pedigree 0.162, pedigree (1,1,5,5,1)
  EcoSpold01Location=CH
  approximated with maintenance for 16t lorry.

## Extrapolations
see Technology/Text This dataset has been copied from an original dataset covering the geography CH. The uncertainty has been adjusted accordingly.

## Review by Niels Jungbluth 2003-07-09
Passed.

## Review by Carl Vadenbo 2012-06-28
In preparation for the release of ecoinvent v3.0, the output of used lorry was removed from the dataset 'lorry 21t, municipal waste collection, CH' and added to vehicle production dataset instead. Furthermore, the dataset was renamed and extrapolated to 'waste collection lorry production, 21 metric ton, GLO 1991-2000'. The removal of aforementioned exchanges was reviewed and the dataset was accepted for inclusion into the ecoinvent database on 2012.07.06. It is nevertheless recommended that the dataset is revised and that the meta-data is improved prior to subsequent releases of the database.
