# maize grain production

Dataset: EcoSpold 2, unit process
Geography: US-NE
Time period: 2014-01-01 to 2023-12-31
Technology level: current
Classification: ISIC rev.4 ecoinvent: 0111:Growing of cereals (except rice), leguminous crops and oil seeds
Synonyms: Zea mays L., corn
Scenario: Business-as-Usual
System model: Allocation, cut-off by classification
Generated by: Juanita Barrera
Database: ecoinvent
isCopyrightProtected: true
accessRestrictedTo: 1

## General comment
This dataset represents the production of 1 kg of maize grain (fresh matter) in the US state of Nebraska at farm, with a pre-drying moisture content of 19.8%. This dataset includes preparation of the field prior to planting, field treatments, planting, applications of nutrients and pesticides, and harvest. Residues are not collected but remain on the field post-harvest and overwinter.
The average yield of maize grain grown in Nebraska for the 2014-2021 seasons was 11,619 kg/ha (wet mass) USDA NASS (2021d). The dataset reflects the average maize grain produced in Nebraska from 2014 to 2021, inclusive, as that period allows for at least one value from USDA statistics for most parameters and generally three or more. It reflects the mix of tillage practices (18% no till, 74% reduced till, 8% conventional tillage) (CTIC (2020a) and rotations (80% in rotation with soybean and 20% continuous corn) for maize grain. More than 90% of maize grown is genetically engineered, almost all stacking herbicide and insect tolerance traits. This dataset reflects practices consistent with that.
Area, productivity, use of mineral and organic fertilisers and pesticides, and irrigation inputs are based on farmer data reported to the U.S. Department of Agriculture. Lime use is based on soil pH and guidance from agricultural extension offices for maize grain. Field operations and equipment types and fuel use are based on materials provided to growers by the agricultural extension office(s), including farm budgets, and on survey information agricultural extension office(s) collect from growers, in conjunction with row spacing data from USDA. Drainage (tile or ditch) is installed on 6.6% of crop land, based on state-level agricultural survey data from USDA. Irrigation is included based on share of crop irrigated (57.8% over the time period, USDA NASS (2018d)). Chemigation is included in this and is not treated as an additional operation.
Area cultivated for maize grain in Nebraska increased by 19% between 2000 and 2021 (USDA NASS data, 5 year rolling averages). Direct land use change is included in the dataset as calculated in the ecoinvent crop LCI tool. The total cropland change 1997 to 2017 was 4.4% for all crops in Nebraska (NRCS 2020b).
Soil characteristics are based on IFA soil survey data (pH) and NRCS and USGS analysis (SOM, clay, slope). No anti-erosion practices are assumed in the dataset; instead, the erosion soil loss reported in the U.S. Natural Resources Conservation Service's Natural Resource Inventory is used.
References: USDA NASS (2021d) Area, Production, Yield by State - Corn - 2010-2021. US Department of Agriculture (USDA) National Agricultural Statistics Service. https://quickstats.nass.usda.gov (direct query: https://quickstats.nass.usda.gov/results/331F88CC-004E-34D2-B825-F8F65DAC7879)
CTIC (2020a) OpTIS - Operational Tillage Information System. Conservation Technology Information Center (CTIC). https://www.ctic.org/optis_tabular_queryaccessed March 23, 2021
USDA NASS (2018d) 2018 Irrigation and Water Management Survey (2017 Census of Agriculture). US Department of Agriculture (USDA). https://www.nass.usda.gov/Publications/AgCensus/2017/Online_Resources/Farm_and_Ranch_Irrigation_Survey/index.php
USDA NASS (2021j) Corn, Grain, Irrigated - Acres Harvested 2000-2021; Corn, Grain, Non-Irrigated - Acres Harvested 2000-2018. US Department of Agriculture (USDA). https://quickstats.nass.usda.gov
Iowa Soil Survey & Digital Soil Data: ISPAID. Version 8.1.1 (2017). https://www.extension.iastate.edu/soils/ispaid
NRCS (2020b) Land Cover/use of non-Federal rural land, by State and year, in the 2017 National Resources Inventory. USDA, Natural Resources Conservation Service. http://www.nrcs.usda.gov/Internet/NRCS_RCA/reports/nri_crop_nat.html, https://www.nrcs.usda.gov/wps/portal/nrcs/rca/national/technical/nra/rca/text/#NRI%20Cropland

## Included activities start
This activity starts with soil cultivation after the harvest of the previous crop.

## Included activities end
This dataset includes cultivation of the field prior to planting, field treatments, planting, applications of nutrients and pesticides, and harvest. It ends with harvested maize grain at the farm gate, prior to storage.

## Geography
Production of maize grain in Nebraska (US-NE).

## Technology
This dataset reflects current practice for maize grain in Nebraska as of 2022.

## Time period
The valid period covers 2014-01-01 through 2021-12-31 based on primary data sources. The production volumes, areas and applications are covered by data throughout the time period (annual for production and area, alternate years for applications). Due to disruption in 2020, some USDA data was reported for 2021 instead. Because the specific pesticides used show time-dependent trends, the most recent 3 years of data are used to avoid underweighting the most dominant pesticides currently used and to avoid skewing impacts based on compounds no longer in use. Field operations are based on current enterprise crop budgets and change little year to year. Data for manure applications were only available for time periods prior to the valid period but represent the best available option.

## Reference product
- maize grain: 1 kg; By-product classification allocatable product; CPC 01122: Maize (corn), other; HS2017 100590: Cereals; maize (corn), other than seed
  This dataset represents the production of 1 kg of maize grain (fresh matter) in the US state of Minnesota at farm, with a pre-drying moisture content of 20.%. This dataset includes preparation of the field prior to planting, field treatments, planting, applications of nutrients and pesticides, and harvest. Residues are not collected but remain on the field post-harvest and overwinter.
  production volume 4.51893e7 kg; name pv_maize
    Average annual production of maize grain in Nebraska 2014-2021: 45.2 Mt/year (source CORN, GRAIN - PRODUCTION, MEASURED IN Metric Tonne (converted from BU) US Department of Agriculture (USDA NASS) 2022 (direct query https://quickstats.nass.usda.gov/results/331F88CC-004E-34D2-B825-F8F65DAC7879)
  property carbon content, non-fossil 0.47886
    Biogene carbon content of maize grain on a dry matter basis 47.886%
    Carbon content of biomass fractions from Rouwenhorst et al (1991) (carbohydrates and proteins) and Nemecek and Kägi 2007 (lipids, fibres ash). Carbohydrate, protein, lipid and fibre contents of from Feedipedia.
    Sources:Heuzé V., Tran G., Lebas F. (2017) Maize grain. Feedipedia, a programme by INRAE, CIRAD, AFZ and FAO. https://www.feedipedia.org/node/556 Last updated on September 7, 2017, 14:29.
    Rouwenhorst, Frank Jzn, Scheffers & van Dijken (1991) Determination of protein concentration by total organic carbon analysis. Journal of Biochemical and Biophysical Methods, 22:119–128.https://www.sciencedirect.com/science/article/abs/pii/0165022X9190024Q
    Nemecek T. & Kägi T. (2007) Life Cycle Inventories of Swiss and European Agricultural Production Systems. Final report ecoinvent V2.0 No. 15a. Agroscope Reckenholz-Taenikon Research Station ART, Swiss Centre for Life Cycle Inventories, Zurich and Dübendorf, Switzerland, retrieved from: www.ecoinvent.ch.
  property energy content 14.9906 MJ
    The gross energy content of maize grain is 18.7MJ/kg on a dry matter basis, 87.2% dry matter as fed for North American maize grain (Feedipedia - Maize 2017). At the harvest moisture content of 19.4% (2014-2021, USDA NASS 2021a), the energy content of maize grain is 15.1MJ/kg product weight.
    Source(s):
    Heuzé V., Tran G., Lebas F. (2017) Maize grain. Feedipedia, a programme by INRAE, CIRAD, AFZ and FAO. https://www.feedipedia.org/node/556 Last updated on September 7, 2017, 14:29.
    USDA NASS (2021a) CORN, AT HARVEST, GRAIN - MOISTURE, 5 YEAR AVG, MEASURED IN PCT. US Department of Agriculture (USDA). https://quickstats.nass.usda.gov (direct query: https://quickstats.nass.usda.gov/results/13FC0C89-E211-3D0B-A9C5-BCFC35728512)
  property price 0.113883 EUR2005
    The price per kg of maize grain is considering for the years 2014-2021 for the state of Nebraska in the US. The values were retrieved in $/BU [1] and converted into $/kg considering a conversion factor of 1/25.4 [2]. References: [1] US Department of Agriculture (NASS), Quickstat, TabLe "CORN, GRAIN - PRICE RECEIVED, MEASURED IN $ / BU", accessed on 25.08.2023, available at: https://quickstats.nass.usda.gov/ [2] https://www.rayglen.com/grain-conversion-calculator/
    The prices were converted to EUR based on the annual exchange rates published by the European Central Bank (https://sdw.ecb.europa.eu/quickview.do?SERIES_KEY=120.EXR.A.AUD.EUR.SP00.A, last accessed on 2023-06-01) and adjusted for inflation relative to 2005 using the producer price index (PPI) of the euro area, published by eurostat (https://ec.europa.eu/eurostat/databrowser/view/STS_INPP_A__custom_6416181/default/table?lang=en, last accessed on 2023-06-01).
  properties: carbon allocation 0.383871 kg, carbon content 0.47886, carbon content, fossil 0, dry mass 0.801635 kg, water content 0.247451, water in wet mass 0.198365 kg, wet mass 1 kg
## Inputs from technosphere
- 2,4-dichlorotoluene: 1.72031e-5 kg; normal variance with pedigree 1.10031e-11, pedigree (1,2,2,1,1)
  This exchange is an aggregate of proxies for production of: 2,4-D 2-Ethylhexyl ester, 2,4-D dimethylamine salt (8.134E-02 kg/ha {1,2,1,1,1}; 3.904E-02 kg/ha {1,2,1,1,1}, respectively).
  Average over state-wide reported cropped area of maize grain for all tillage practices (CTIC 2020a) and across all rotation patterns (Socolar et al 2021) - calculated from specified herbicide/insecticide/fungicide quantity applied to treated acres weighted by share of acres treated with that herbicide/insecticide/fungicide (2014, 2016, 2018, 2021 - USDA NASS data, USDA NASS 2021f, USDA NASS 2021g).
  Sources:
  CTIC (2020a) OpTIS - Operational Tillage Information System. Conservation Technology Information Center (CTIC). https://www.ctic.org/optis_tabular_queryaccessed March 23, 2021
  Socolar Y, Goldstein B R, de Valpine P, Bowles T M (2021) Biophysical and policy factors predict simplified crop rotations in the US Midwest. Environ. Res. Lett. 16 054045. . https://iopscience.iop.org/article/10.1088/1748-9326/abf9ca
  USDA NASS (2021f) CORN - APPLICATIONS, MEASURED IN LB / ACRE / YEAR, AVG and NUMBER / YEAR (fertilizer and pesticides, amount, number of applications) - 2000-2021. US Department of Agriculture (USDA) National Agricultural Statistics Service. https://quickstats.nass.usda.gov (direct query: https://quickstats.nass.usda.gov/results/5BCE1263-5F91-31A9-B3DE-117AFBDDFF20)
  USDA NASS (2021g) CORN - TREATED, MEASURED IN PCT OF AREA PLANTED, AVG (fertilizer and pesticides, including chemigation) - 2000-2021. US Department of Agriculture (USDA) National Agricultural Statistics Service. https://quickstats.nass.usda.gov (direct query: https://quickstats.nass.usda.gov/results/C3A3CFC4-4341-3093-A3D2-544FBC852EF6)
  properties: carbon content, fossil 0.52212, dry mass 1 kg, heating value, net 20.34 MJ, wet mass 1 kg
- NPK (15-15-15) fertiliser: 0.00629747 kg; normal variance with pedigree 1.69538e-7, pedigree (2,1,2,1,1)
  6.3E-3 kg NPK (15-15-15) fertiliser/kg maize grain
  Quantities of specific fertilisers are calculated based on US fertiliser market share and nutrient compositions from the International Fertilizer Association data to supply N to meet total nutrient demand N-P-K-S: 171.01--41.14--13.48--9.8 kg/ha (USDA NASS data for 2014, 2016, 2018, 2021; reflects average over all rotations and tillage regimes) over reported cropped area of specified crop (includes all rotation patterns), meeting N demand with the IFA mix and any remaining P, K, and S demands with other fertilisers balanced to avoid exceeding other demands by more than 1%. Quantity of specific fertiliser calculated from: quantity of N applied to treated acres times percent of planted maize acres treated (USDA NASS) times share of N supplied by compound in U.S. consumption mix (ecoinvent and International Fertilizer Association 2019) times mass compound per mass N in compound.
  Sources:
  USDA NASS (2021f) CORN - APPLICATIONS, MEASURED IN LB / ACRE / YEAR, AVG and NUMBER / YEAR (fertilizer and pesticides, amount, number of applications) - 2000-2021. US Department of Agriculture (USDA) National Agricultural Statistics Service. https://quickstats.nass.usda.gov (direct query: https://quickstats.nass.usda.gov/results/5BCE1263-5F91-31A9-B3DE-117AFBDDFF20); USDA ERS Fertilizer and Price Data, updated 10/30/2019. https://www.ers.usda.gov/data-products/fertilizer-use-and-price/ USDA ERS. (2019). Table 9. Percent of corn acreage receiving nitrogen fertilizer, selected States. Fertilizer Use and Price Report. US Department of Agriculture (USDA) Economic Research Service (ERS). https://www.ers.usda.gov/data-products/fertilizer-use-and-price.aspx.
  USDA ERS. (2019). Table 10. Nitrogen used on corn, rate per fertilized acre receiving nitrogen, selected States. Fertilizer Use and Price Report. US Department of Agriculture (USDA) Economic Research Service (ERS). https://www.ers.usda.gov/data-products/fertilizer-use-and-price.aspx; Ecoinvent U.S. consumption mix for N fertilisers, from IFA data; IFA (2021) Nutrient content in percentage - IFA Fertilizer Converter. International Fertilizer Association. https://www.ifastat.org/converter/fertilizer-converter/accessed 2021-06-24
  properties: dry mass 1 kg, nitrogen content 0.15, phosphorus content 0.15, potassium content 0.15, wet mass 1 kg
  note on nitrogen content: Nitrogen content (on a dry matter basis) of NPK (15-15-15) fertiliser is calculated from the molecular formula of the substance ().
  note on phosphorus content: Phosphorus content (on a dry matter basis) of NPK (15-15-15) fertiliser is calculated from the molecular formula of the substance ().
  note on potassium content: Potassium content (on a dry matter basis) of NPK (15-15-15) fertiliser is calculated from the molecular formula of the substance ().
- [sulfonyl]urea-compound: 3.60798e-7 kg; normal variance with pedigree 4.76295e-13, pedigree (1,4,2,1,1)
  This exchange is an aggregate of proxies for production of: Diflufenzopyr sodium, Nicosulfuron, Rimsulfuron, Saflufenacil, Tembotrione, Thifensulfuron (5.431E-03 kg/ha {1,4,1,1,1}; 1.736E-03 kg/ha {1,2,1,1,1}; 3.736E-03 kg/ha {1,2,1,1,1}; 2.477E-03 kg/ha {1,4,1,1,1}; 4.881E-03 kg/ha {1,4,1,1,1}; 2.349E-03 kg/ha {1,2,1,1,1}, respectively).
  Average over state-wide reported cropped area of maize grain for all tillage practices (CTIC 2020a) and across all rotation patterns (Socolar et al 2021) - calculated from specified herbicide/insecticide/fungicide quantity applied to treated acres weighted by share of acres treated with that herbicide/insecticide/fungicide (2014, 2016, 2018, 2021 - USDA NASS data, USDA NASS 2021f, USDA NASS 2021g).
  Sources:
  CTIC (2020a) OpTIS - Operational Tillage Information System. Conservation Technology Information Center (CTIC). https://www.ctic.org/optis_tabular_queryaccessed March 23, 2021
  Socolar Y, Goldstein B R, de Valpine P, Bowles T M (2021) Biophysical and policy factors predict simplified crop rotations in the US Midwest. Environ. Res. Lett. 16 054045. . https://iopscience.iop.org/article/10.1088/1748-9326/abf9ca
  USDA NASS (2021f) CORN - APPLICATIONS, MEASURED IN LB / ACRE / YEAR, AVG and NUMBER / YEAR (fertilizer and pesticides, amount, number of applications) - 2000-2021. US Department of Agriculture (USDA) National Agricultural Statistics Service. https://quickstats.nass.usda.gov (direct query: https://quickstats.nass.usda.gov/results/5BCE1263-5F91-31A9-B3DE-117AFBDDFF20)
  USDA NASS (2021g) CORN - TREATED, MEASURED IN PCT OF AREA PLANTED, AVG (fertilizer and pesticides, including chemigation) - 2000-2021. US Department of Agriculture (USDA) National Agricultural Statistics Service. https://quickstats.nass.usda.gov (direct query: https://quickstats.nass.usda.gov/results/C3A3CFC4-4341-3093-A3D2-544FBC852EF6)
  properties: carbon content, fossil 0.540853, dry mass 1 kg, wet mass 1 kg
- [thio]carbamate-compound: 6.6478e-5 kg; normal variance with pedigree 2.77991e-11, pedigree (1,4,2,1,1)
  This exchange is an aggregate of proxies for production of: Mesotrione, Pyroxasulfone, Thiencarbazone-methyl , Topramezone (6.521E-02 kg/ha {1,2,1,1,1}; 4.545E-02 kg/ha {1,4,1,1,1}; 2.877E-03 kg/ha {1,4,1,1,1}; 8.967E-04 kg/ha {1,4,1,1,1}, respectively).
  Average over state-wide reported cropped area of maize grain for all tillage practices (CTIC 2020a) and across all rotation patterns (Socolar et al 2021) - calculated from specified herbicide/insecticide/fungicide quantity applied to treated acres weighted by share of acres treated with that herbicide/insecticide/fungicide (2014, 2016, 2018, 2021 - USDA NASS data, USDA NASS 2021f, USDA NASS 2021g).
  Sources:
  CTIC (2020a) OpTIS - Operational Tillage Information System. Conservation Technology Information Center (CTIC). https://www.ctic.org/optis_tabular_queryaccessed March 23, 2021
  Socolar Y, Goldstein B R, de Valpine P, Bowles T M (2021) Biophysical and policy factors predict simplified crop rotations in the US Midwest. Environ. Res. Lett. 16 054045. . https://iopscience.iop.org/article/10.1088/1748-9326/abf9ca
  USDA NASS (2021f) CORN - APPLICATIONS, MEASURED IN LB / ACRE / YEAR, AVG and NUMBER / YEAR (fertilizer and pesticides, amount, number of applications) - 2000-2021. US Department of Agriculture (USDA) National Agricultural Statistics Service. https://quickstats.nass.usda.gov (direct query: https://quickstats.nass.usda.gov/results/5BCE1263-5F91-31A9-B3DE-117AFBDDFF20)
  USDA NASS (2021g) CORN - TREATED, MEASURED IN PCT OF AREA PLANTED, AVG (fertilizer and pesticides, including chemigation) - 2000-2021. US Department of Agriculture (USDA) National Agricultural Statistics Service. https://quickstats.nass.usda.gov (direct query: https://quickstats.nass.usda.gov/results/C3A3CFC4-4341-3093-A3D2-544FBC852EF6)
  properties: carbon content, fossil 0.626349, dry mass 1 kg, wet mass 1 kg
- acetamide-anillide-compound, unspecified: 9.53584e-5 kg; normal variance with pedigree 3.60396e-10, pedigree (1,4,2,1,1)
  This exchange is an aggregate of proxies for production of: Acetochlor, Alachlor, Bicyclopyrone, Dimethenamid-P (5.025E-01 kg/ha {1,4,1,1,1}; 5.760E-01 kg/ha {1,2,1,1,1}; 2.219E-03 kg/ha {1,4,1,1,1}; 2.955E-02 kg/ha {1,2,1,1,1}, respectively).
  Average over state-wide reported cropped area of maize grain for all tillage practices (CTIC 2020a) and across all rotation patterns (Socolar et al 2021) - calculated from specified herbicide/insecticide/fungicide quantity applied to treated acres weighted by share of acres treated with that herbicide/insecticide/fungicide (2014, 2016, 2018, 2021 - USDA NASS data, USDA NASS 2021f, USDA NASS 2021g).
  Sources:
  CTIC (2020a) OpTIS - Operational Tillage Information System. Conservation Technology Information Center (CTIC). https://www.ctic.org/optis_tabular_queryaccessed March 23, 2021
  Socolar Y, Goldstein B R, de Valpine P, Bowles T M (2021) Biophysical and policy factors predict simplified crop rotations in the US Midwest. Environ. Res. Lett. 16 054045. . https://iopscience.iop.org/article/10.1088/1748-9326/abf9ca
  USDA NASS (2021f) CORN - APPLICATIONS, MEASURED IN LB / ACRE / YEAR, AVG and NUMBER / YEAR (fertilizer and pesticides, amount, number of applications) - 2000-2021. US Department of Agriculture (USDA) National Agricultural Statistics Service. https://quickstats.nass.usda.gov (direct query: https://quickstats.nass.usda.gov/results/5BCE1263-5F91-31A9-B3DE-117AFBDDFF20)
  USDA NASS (2021g) CORN - TREATED, MEASURED IN PCT OF AREA PLANTED, AVG (fertilizer and pesticides, including chemigation) - 2000-2021. US Department of Agriculture (USDA) National Agricultural Statistics Service. https://quickstats.nass.usda.gov (direct query: https://quickstats.nass.usda.gov/results/C3A3CFC4-4341-3093-A3D2-544FBC852EF6)
  properties: carbon content, fossil 0.659175, dry mass 1 kg, wet mass 1 kg
- ammonia, anhydrous, liquid: 0.00443643 kg; normal variance with pedigree 8.41398e-8, pedigree (2,1,2,1,1)
  4.44E-3 kg ammonia, anhydrous, liquid/kg maize grain
  Quantities of specific fertilisers are calculated based on US fertiliser market share and nutrient compositions from the International Fertilizer Association data to supply N to meet total nutrient demand N-P-K-S: 171.01--41.14--13.48--9.8 kg/ha (USDA NASS data for 2014, 2016, 2018, 2021; reflects average over all rotations and tillage regimes) over reported cropped area of specified crop (includes all rotation patterns), meeting N demand with the IFA mix and any remaining P, K, and S demands with other fertilisers balanced to avoid exceeding other demands by more than 1%. Quantity of specific fertiliser calculated from: quantity of N applied to treated acres times percent of planted maize acres treated (USDA NASS) times share of N supplied by compound in U.S. consumption mix (ecoinvent and International Fertilizer Association 2019) times mass compound per mass N in compound.
  Sources:
  USDA NASS (2021f) CORN - APPLICATIONS, MEASURED IN LB / ACRE / YEAR, AVG and NUMBER / YEAR (fertilizer and pesticides, amount, number of applications) - 2000-2021. US Department of Agriculture (USDA) National Agricultural Statistics Service. https://quickstats.nass.usda.gov (direct query: https://quickstats.nass.usda.gov/results/5BCE1263-5F91-31A9-B3DE-117AFBDDFF20); USDA ERS Fertilizer and Price Data, updated 10/30/2019. https://www.ers.usda.gov/data-products/fertilizer-use-and-price/ USDA ERS. (2019). Table 9. Percent of corn acreage receiving nitrogen fertilizer, selected States. Fertilizer Use and Price Report. US Department of Agriculture (USDA) Economic Research Service (ERS). https://www.ers.usda.gov/data-products/fertilizer-use-and-price.aspx.
  USDA ERS. (2019). Table 10. Nitrogen used on corn, rate per fertilized acre receiving nitrogen, selected States. Fertilizer Use and Price Report. US Department of Agriculture (USDA) Economic Research Service (ERS). https://www.ers.usda.gov/data-products/fertilizer-use-and-price.aspx; Ecoinvent U.S. consumption mix for N fertilisers, from IFA data; IFA (2021) Nutrient content in percentage - IFA Fertilizer Converter. International Fertilizer Association. https://www.ifastat.org/converter/fertilizer-converter/accessed 2021-06-24
  properties: dry mass 1 kg, wet mass 1 kg
- ammonium nitrate: 0.000681628 kg; normal variance with pedigree 1.98623e-9, pedigree (2,1,2,1,1)
  6.82E-4 kg ammonium nitrate/kg maize grain
  Quantities of specific fertilisers are calculated based on US fertiliser market share and nutrient compositions from the International Fertilizer Association data to supply N to meet total nutrient demand N-P-K-S: 171.01--41.14--13.48--9.8 kg/ha (USDA NASS data for 2014, 2016, 2018, 2021; reflects average over all rotations and tillage regimes) over reported cropped area of specified crop (includes all rotation patterns), meeting N demand with the IFA mix and any remaining P, K, and S demands with other fertilisers balanced to avoid exceeding other demands by more than 1%. Quantity of specific fertiliser calculated from: quantity of N applied to treated acres times percent of planted maize acres treated (USDA NASS) times share of N supplied by compound in U.S. consumption mix (ecoinvent and International Fertilizer Association 2019) times mass compound per mass N in compound.
  Sources:
  USDA NASS (2021f) CORN - APPLICATIONS, MEASURED IN LB / ACRE / YEAR, AVG and NUMBER / YEAR (fertilizer and pesticides, amount, number of applications) - 2000-2021. US Department of Agriculture (USDA) National Agricultural Statistics Service. https://quickstats.nass.usda.gov (direct query: https://quickstats.nass.usda.gov/results/5BCE1263-5F91-31A9-B3DE-117AFBDDFF20); USDA ERS Fertilizer and Price Data, updated 10/30/2019. https://www.ers.usda.gov/data-products/fertilizer-use-and-price/ USDA ERS. (2019). Table 9. Percent of corn acreage receiving nitrogen fertilizer, selected States. Fertilizer Use and Price Report. US Department of Agriculture (USDA) Economic Research Service (ERS). https://www.ers.usda.gov/data-products/fertilizer-use-and-price.aspx.
  USDA ERS. (2019). Table 10. Nitrogen used on corn, rate per fertilized acre receiving nitrogen, selected States. Fertilizer Use and Price Report. US Department of Agriculture (USDA) Economic Research Service (ERS). https://www.ers.usda.gov/data-products/fertilizer-use-and-price.aspx; Ecoinvent U.S. consumption mix for N fertilisers, from IFA data; IFA (2021) Nutrient content in percentage - IFA Fertilizer Converter. International Fertilizer Association. https://www.ifastat.org/converter/fertilizer-converter/accessed 2021-06-24
  properties: dry mass 1 kg, wet mass 1 kg
- ammonium nitrate phosphate: 0.000616596 kg; normal variance with pedigree 1.62531e-9, pedigree (2,1,2,1,1)
  6.17E-4 kg ammonium nitrate phosphate /kg maize grain
  Quantities of specific fertilisers are calculated based on US fertiliser market share and nutrient compositions from the International Fertilizer Association data to supply N to meet total nutrient demand N-P-K-S: 171.01--41.14--13.48--9.8 kg/ha (USDA NASS data for 2014, 2016, 2018, 2021; reflects average over all rotations and tillage regimes) over reported cropped area of specified crop (includes all rotation patterns), meeting N demand with the IFA mix and any remaining P, K, and S demands with other fertilisers balanced to avoid exceeding other demands by more than 1%. Quantity of specific fertiliser calculated from: quantity of N applied to treated acres times percent of planted maize acres treated (USDA NASS) times share of N supplied by compound in U.S. consumption mix (ecoinvent and International Fertilizer Association 2019) times mass compound per mass N in compound.
  Sources:
  USDA NASS (2021f) CORN - APPLICATIONS, MEASURED IN LB / ACRE / YEAR, AVG and NUMBER / YEAR (fertilizer and pesticides, amount, number of applications) - 2000-2021. US Department of Agriculture (USDA) National Agricultural Statistics Service. https://quickstats.nass.usda.gov (direct query: https://quickstats.nass.usda.gov/results/5BCE1263-5F91-31A9-B3DE-117AFBDDFF20); USDA ERS Fertilizer and Price Data, updated 10/30/2019. https://www.ers.usda.gov/data-products/fertilizer-use-and-price/ USDA ERS. (2019). Table 9. Percent of corn acreage receiving nitrogen fertilizer, selected States. Fertilizer Use and Price Report. US Department of Agriculture (USDA) Economic Research Service (ERS). https://www.ers.usda.gov/data-products/fertilizer-use-and-price.aspx.
  USDA ERS. (2019). Table 10. Nitrogen used on corn, rate per fertilized acre receiving nitrogen, selected States. Fertilizer Use and Price Report. US Department of Agriculture (USDA) Economic Research Service (ERS). https://www.ers.usda.gov/data-products/fertilizer-use-and-price.aspx; Ecoinvent U.S. consumption mix for N fertilisers, from IFA data; IFA (2021) Nutrient content in percentage - IFA Fertilizer Converter. International Fertilizer Association. https://www.ifastat.org/converter/fertilizer-converter/accessed 2021-06-24
  properties: dry mass 1 kg, nitrogen content 0.22, phosphorus content 0.0960126, wet mass 1 kg
  note on nitrogen content: Nitrogen content (on a dry matter basis) of ammonium nitrate phosphate is calculated from the molecular formula of the nutrient present in the substance.
  note on phosphorus content: Phosphorus content (on a dry matter basis) of ammonium nitrate phosphate is calculated from the molecular formula of the nutrient present in the substance.
- ammonium sulfate: 0.00623746 kg; normal variance with pedigree 1.66322e-7, pedigree (2,1,2,1,1)
  6.24E-3 kg ammonium sulfate/kg maize grain
  Quantities of specific fertilisers are calculated based on US fertiliser market share and nutrient compositions from the International Fertilizer Association data to supply N to meet total nutrient demand N-P-K-S: 171.01--41.14--13.48--9.8 kg/ha (USDA NASS data for 2014, 2016, 2018, 2021; reflects average over all rotations and tillage regimes) over reported cropped area of specified crop (includes all rotation patterns), meeting N demand with the IFA mix and any remaining P, K, and S demands with other fertilisers balanced to avoid exceeding other demands by more than 1%. Quantity of specific fertiliser calculated from: quantity of N applied to treated acres times percent of planted maize acres treated (USDA NASS) times share of N supplied by compound in U.S. consumption mix (ecoinvent and International Fertilizer Association 2019) times mass compound per mass N in compound.
  Sources:
  USDA NASS (2021f) CORN - APPLICATIONS, MEASURED IN LB / ACRE / YEAR, AVG and NUMBER / YEAR (fertilizer and pesticides, amount, number of applications) - 2000-2021. US Department of Agriculture (USDA) National Agricultural Statistics Service. https://quickstats.nass.usda.gov (direct query: https://quickstats.nass.usda.gov/results/5BCE1263-5F91-31A9-B3DE-117AFBDDFF20); USDA ERS Fertilizer and Price Data, updated 10/30/2019. https://www.ers.usda.gov/data-products/fertilizer-use-and-price/ USDA ERS. (2019). Table 9. Percent of corn acreage receiving nitrogen fertilizer, selected States. Fertilizer Use and Price Report. US Department of Agriculture (USDA) Economic Research Service (ERS). https://www.ers.usda.gov/data-products/fertilizer-use-and-price.aspx.
  USDA ERS. (2019). Table 10. Nitrogen used on corn, rate per fertilized acre receiving nitrogen, selected States. Fertilizer Use and Price Report. US Department of Agriculture (USDA) Economic Research Service (ERS). https://www.ers.usda.gov/data-products/fertilizer-use-and-price.aspx; Ecoinvent U.S. consumption mix for N fertilisers, from IFA data; IFA (2021) Nutrient content in percentage - IFA Fertilizer Converter. International Fertilizer Association. https://www.ifastat.org/converter/fertilizer-converter/accessed 2021-06-24
  properties: dry mass 1 kg, wet mass 1 kg
- application of plant protection product, by airplane: 2.3849e-5 ha; lognormal variance with pedigree 0.0206, pedigree (4,4,3,1,3)
  0.2771 ha/ha (2.38E-5 ha/kg maize grain) application of plant protection product, by airplane
  The dataset has an effective number of passes for application of pesticides of 1.39 ha: 1.08 applications of herbicides on 96.3% of cropped area, 1.28 applications of insecticides on 15.7% of cropped area, 1.06 applications of fungicides on 13.3% of cropped area (USDA NASS 2021f). Application by sprayer accounts for 80% (1.11 passes) and aircraft for 20% (0.28 passes). The budgets for maize grain in Nebraska include 10% of acres treated aerially twice over the season (2 passes) (Klein R and McClure G 2021a; Klein R and McClure G 2021b).
  Field operations are as identified in crop- and rotation-specific enterprise crop budgets supplied by the regional agricultural extension office and matched to equipment type in the budget or crop guidance. (UNL Extension 2020, Klein R and McClure G 2021a, Klein R and McClure G 2021b). Operations are matched to equipment type and where multiple options are available, the share of each is determined from guidance and annual farmer survey data (Custom Rate Summaries) for contracted operations/equipment. Where an operation applies only to a portion of the harvested area, the number of passes has been scaled by the % of harvested area to which it applies (e.g., manure spreading or insecticide) as indicated by USDA statistics (applications) or USDA reports (manure use) or as otherwise indicated in enterprise crop budgets.
  Source(s):
  Klein R and McClure G (2021a) 2021 Nebraska Crop Budgets EC872 - Dryland Corn. Nebraska Extension - Institute of Agriculture and Natural Resources, Universoty of Nebraska-Lincoln. https://cropwatch.unl.edu/Budgets/2021/2021-Corn-Dryland-121620.pdf; Klein R and McClure G (2021b) 2021 Nebraska Crop Budgets EC872 - Irrigated Corn. Nebraska Extension - Institute of Agriculture and Natural Resources, Universoty of Nebraska-Lincoln. https://cropwatch.unl.edu/Budgets/2021/2021-Corn-Irrigated-121620.pdf; NAAA (2020) Letter to the South Dakota Public Utilities Commission, July 30, 2020. National Agricultural Aviation Association. https://puc.sd.gov/commission/dockets/electric/2021/EL21-018/prefiledexhibits/MBExhH.pdf; NAAA (2019) NAAA Member Survey Report. National Agricultural Aviation Association. https://www.agaviation.org/; USDA NASS (2021f) CORN - APPLICATIONS, MEASURED IN LB / ACRE / YEAR, AVG and NUMBER / YEAR (fertilizer and pesticides, amount, number of applications) - 2000-2021. US Department of Agriculture (USDA) National Agricultural Statistics Service. https://quickstats.nass.usda.gov (direct query: https://quickstats.nass.usda.gov/results/5BCE1263-5F91-31A9-B3DE-117AFBDDFF20); UNL Extension (2020) Nebraska Crop Budgets. Nebraska Extension, University of Nebraska–Lincoln Institute of Agriculture and Natural Resources. https://cropwatch.unl.edu/budgets, https://cropwatch.unl.edu/Budgets/2020/2020-NE-crop-budget-intro.pdf; Klein R and McClure G (2021a) 2021 Nebraska Crop Budgets EC872 - Dryland Corn. Nebraska Extension - Institute of Agriculture and Natural Resources, Universoty of Nebraska-Lincoln. https://cropwatch.unl.edu/Budgets/2021/2021-Corn-Dryland-121620.pdf; Klein R and McClure G (2021b) 2021 Nebraska Crop Budgets EC872 - Irrigated Corn. Nebraska Extension - Institute of Agriculture and Natural Resources, Universoty of Nebraska-Lincoln. https://cropwatch.unl.edu/Budgets/2021/2021-Corn-Irrigated-121620.pdf
- application of plant protection product, by field sprayer: 0.000119245 ha; lognormal variance with pedigree 0.0206, pedigree (4,4,3,1,3)
  1.3855 ha/ha (1.19E-4 ha/kg maize grain) market for application of plant protection product, by sprayer
  The dataset has an effective number of passes for application of pesticides of 1.39 ha: 1.08 applications of herbicides on 96.3% of cropped area, 1.28 applications of insecticides on 15.7% of cropped area, 1.06 applications of fungicides on 13.3% of cropped area (USDA NASS 2021f). Application by sprayer accounts for 80% (1.11 passes) and aircraft for 20% (0.28 passes). The budgets for maize grain in Nebraska include 10% of acres treated aerially twice over the season (2 passes) (Klein R and McClure G 2021a; Klein R and McClure G 2021b).
  Field operations are as identified in crop- and rotation-specific enterprise crop budgets supplied by the regional agricultural extension office and matched to equipment type in the budget or crop guidance. (UNL Extension 2020, Klein R and McClure G 2021a, Klein R and McClure G 2021b). Operations are matched to equipment type and where multiple options are available, the share of each is determined from guidance and annual farmer survey data (Custom Rate Summaries) for contracted operations/equipment. Where an operation applies only to a portion of the harvested area, the number of passes has been scaled by the % of harvested area to which it applies (e.g., manure spreading or insecticide) as indicated by USDA statistics (applications) or USDA reports (manure use) or as otherwise indicated in enterprise crop budgets.
  Source(s):
  Klein R and McClure G (2021a) 2021 Nebraska Crop Budgets EC872 - Dryland Corn. Nebraska Extension - Institute of Agriculture and Natural Resources, Universoty of Nebraska-Lincoln. https://cropwatch.unl.edu/Budgets/2021/2021-Corn-Dryland-121620.pdf; Klein R and McClure G (2021b) 2021 Nebraska Crop Budgets EC872 - Irrigated Corn. Nebraska Extension - Institute of Agriculture and Natural Resources, Universoty of Nebraska-Lincoln. https://cropwatch.unl.edu/Budgets/2021/2021-Corn-Irrigated-121620.pdf; NAAA (2020) Letter to the South Dakota Public Utilities Commission, July 30, 2020. National Agricultural Aviation Association. https://puc.sd.gov/commission/dockets/electric/2021/EL21-018/prefiledexhibits/MBExhH.pdf; NAAA (2019) NAAA Member Survey Report. National Agricultural Aviation Association. https://www.agaviation.org/; USDA NASS (2021f) CORN - APPLICATIONS, MEASURED IN LB / ACRE / YEAR, AVG and NUMBER / YEAR (fertilizer and pesticides, amount, number of applications) - 2000-2021. US Department of Agriculture (USDA) National Agricultural Statistics Service. https://quickstats.nass.usda.gov (direct query: https://quickstats.nass.usda.gov/results/5BCE1263-5F91-31A9-B3DE-117AFBDDFF20); UNL Extension (2020) Nebraska Crop Budgets. Nebraska Extension, University of Nebraska–Lincoln Institute of Agriculture and Natural Resources. https://cropwatch.unl.edu/budgets, https://cropwatch.unl.edu/Budgets/2020/2020-NE-crop-budget-intro.pdf; Klein R and McClure G (2021a) 2021 Nebraska Crop Budgets EC872 - Dryland Corn. Nebraska Extension - Institute of Agriculture and Natural Resources, Universoty of Nebraska-Lincoln. https://cropwatch.unl.edu/Budgets/2021/2021-Corn-Dryland-121620.pdf; Klein R and McClure G (2021b) 2021 Nebraska Crop Budgets EC872 - Irrigated Corn. Nebraska Extension - Institute of Agriculture and Natural Resources, Universoty of Nebraska-Lincoln. https://cropwatch.unl.edu/Budgets/2021/2021-Corn-Irrigated-121620.pdf
- atrazine: 6.6452e-5 kg; normal variance with pedigree 2.18593e-10, pedigree (1,2,2,1,1)
  Atrazine (7.721E-01 kg/ha {1,2,1,1,1}).
  Average over state-wide reported cropped area of maize grain for all tillage practices (CTIC 2020a) and across all rotation patterns (Socolar et al 2021) - calculated from specified herbicide/insecticide/fungicide quantity applied to treated acres weighted by share of acres treated with that herbicide/insecticide/fungicide (2014, 2016, 2018, 2021 - USDA NASS data, USDA NASS 2021f, USDA NASS 2021g).
  Sources:
  CTIC (2020a) OpTIS - Operational Tillage Information System. Conservation Technology Information Center (CTIC). https://www.ctic.org/optis_tabular_queryaccessed March 23, 2021
  Socolar Y, Goldstein B R, de Valpine P, Bowles T M (2021) Biophysical and policy factors predict simplified crop rotations in the US Midwest. Environ. Res. Lett. 16 054045. . https://iopscience.iop.org/article/10.1088/1748-9326/abf9ca
  USDA NASS (2021f) CORN - APPLICATIONS, MEASURED IN LB / ACRE / YEAR, AVG and NUMBER / YEAR (fertilizer and pesticides, amount, number of applications) - 2000-2021. US Department of Agriculture (USDA) National Agricultural Statistics Service. https://quickstats.nass.usda.gov (direct query: https://quickstats.nass.usda.gov/results/5BCE1263-5F91-31A9-B3DE-117AFBDDFF20)
  USDA NASS (2021g) CORN - TREATED, MEASURED IN PCT OF AREA PLANTED, AVG (fertilizer and pesticides, including chemigation) - 2000-2021. US Department of Agriculture (USDA) National Agricultural Statistics Service. https://quickstats.nass.usda.gov (direct query: https://quickstats.nass.usda.gov/results/C3A3CFC4-4341-3093-A3D2-544FBC852EF6)
  properties: carbon content, fossil 0.446512, dry mass 1 kg, wet mass 1 kg
- benzo[thia]diazole-compound: 9.46828e-5 kg; normal variance with pedigree 1.11512e-14, pedigree (1,2,2,1,1)
  This exchange is an aggregate of proxies for production of: Flumetsulam, Fluthiacet-methyl (3.287E-03 kg/ha {1,2,1,1,1}; 9.056E-04 kg/ha {1,2,1,1,1}, respectively).
  Average over state-wide reported cropped area of maize grain for all tillage practices (CTIC 2020a) and across all rotation patterns (Socolar et al 2021) - calculated from specified herbicide/insecticide/fungicide quantity applied to treated acres weighted by share of acres treated with that herbicide/insecticide/fungicide (2014, 2016, 2018, 2021 - USDA NASS data, USDA NASS 2021f, USDA NASS 2021g).
  Sources:
  CTIC (2020a) OpTIS - Operational Tillage Information System. Conservation Technology Information Center (CTIC). https://www.ctic.org/optis_tabular_queryaccessed March 23, 2021
  Socolar Y, Goldstein B R, de Valpine P, Bowles T M (2021) Biophysical and policy factors predict simplified crop rotations in the US Midwest. Environ. Res. Lett. 16 054045. . https://iopscience.iop.org/article/10.1088/1748-9326/abf9ca
  USDA NASS (2021f) CORN - APPLICATIONS, MEASURED IN LB / ACRE / YEAR, AVG and NUMBER / YEAR (fertilizer and pesticides, amount, number of applications) - 2000-2021. US Department of Agriculture (USDA) National Agricultural Statistics Service. https://quickstats.nass.usda.gov (direct query: https://quickstats.nass.usda.gov/results/5BCE1263-5F91-31A9-B3DE-117AFBDDFF20)
  USDA NASS (2021g) CORN - TREATED, MEASURED IN PCT OF AREA PLANTED, AVG (fertilizer and pesticides, including chemigation) - 2000-2021. US Department of Agriculture (USDA) National Agricultural Statistics Service. https://quickstats.nass.usda.gov (direct query: https://quickstats.nass.usda.gov/results/C3A3CFC4-4341-3093-A3D2-544FBC852EF6)
  properties: carbon content, fossil 0.499869, dry mass 1 kg, wet mass 1 kg
- benzoic-compound: 1.77373e-6 kg; normal variance with pedigree 1.27521e-11, pedigree (1,2,2,1,1)
  This exchange is an aggregate of proxies for production of: Dicamba diglyceride salt, Dicamba Dimethylamine Salt, Dicamba potassium salt, Dicamba sodium salt (2.679E-02 kg/ha {1,2,1,1,1}; 7.622E-03 kg/ha {1,2,1,1,1}; 3.088E-02 kg/ha {1,2,1,1,1}; 1.422E-02 kg/ha {1,2,1,1,1}, respectively).
  Average over state-wide reported cropped area of maize grain for all tillage practices (CTIC 2020a) and across all rotation patterns (Socolar et al 2021) - calculated from specified herbicide/insecticide/fungicide quantity applied to treated acres weighted by share of acres treated with that herbicide/insecticide/fungicide (2014, 2016, 2018, 2021 - USDA NASS data, USDA NASS 2021f, USDA NASS 2021g).
  Sources:
  CTIC (2020a) OpTIS - Operational Tillage Information System. Conservation Technology Information Center (CTIC). https://www.ctic.org/optis_tabular_queryaccessed March 23, 2021
  Socolar Y, Goldstein B R, de Valpine P, Bowles T M (2021) Biophysical and policy factors predict simplified crop rotations in the US Midwest. Environ. Res. Lett. 16 054045. . https://iopscience.iop.org/article/10.1088/1748-9326/abf9ca
  USDA NASS (2021f) CORN - APPLICATIONS, MEASURED IN LB / ACRE / YEAR, AVG and NUMBER / YEAR (fertilizer and pesticides, amount, number of applications) - 2000-2021. US Department of Agriculture (USDA) National Agricultural Statistics Service. https://quickstats.nass.usda.gov (direct query: https://quickstats.nass.usda.gov/results/5BCE1263-5F91-31A9-B3DE-117AFBDDFF20)
  USDA NASS (2021g) CORN - TREATED, MEASURED IN PCT OF AREA PLANTED, AVG (fertilizer and pesticides, including chemigation) - 2000-2021. US Department of Agriculture (USDA) National Agricultural Statistics Service. https://quickstats.nass.usda.gov (direct query: https://quickstats.nass.usda.gov/results/C3A3CFC4-4341-3093-A3D2-544FBC852EF6)
  properties: carbon content, fossil 0.405853, dry mass 1 kg, wet mass 1 kg
- combine harvesting, maize: 8.60635e-5 ha; lognormal variance with pedigree 0.0206, pedigree (4,4,3,1,3)
  8.61E-5 ha/kg combine harvesting (1 pass per year).
  Used with harvesting cart. Field operations are as identified in crop- and rotation-specific enterprise crop budgets supplied by the regional agricultural extension office and matched to equipment type in the budget or crop guidance. Operations are matched to equipment type and where multiple options are available, the share of each is determined from guidance and annual farmer survey data (Custom Rate Summaries) for contracted operations/equipment.
  Sources:
  UNL Extension (2020) Nebraska Crop Budgets. Nebraska Extension, University of Nebraska–Lincoln Institute of Agriculture and Natural Resources. https://cropwatch.unl.edu/budgets, https://cropwatch.unl.edu/Budgets/2020/2020-NE-crop-budget-intro.pdf; Klein R and McClure G (2021a) 2021 Nebraska Crop Budgets EC872 - Dryland Corn. Nebraska Extension - Institute of Agriculture and Natural Resources, Universoty of Nebraska-Lincoln. https://cropwatch.unl.edu/Budgets/2021/2021-Corn-Dryland-121620.pdf; Klein R and McClure G (2021b) 2021 Nebraska Crop Budgets EC872 - Irrigated Corn. Nebraska Extension - Institute of Agriculture and Natural Resources, Universoty of Nebraska-Lincoln. https://cropwatch.unl.edu/Budgets/2021/2021-Corn-Irrigated-121620.pdf
- cyclic N-compound: 3.99485e-6 kg; normal variance with pedigree 4.26624e-12, pedigree (1,2,2,1,1)
  This exchange is an aggregate of proxies for production of: Metconazole, Propiconazole, Prothioconazole, Clopyralid, Clopyralid Mono Salt, Isoxaflutole (3.152E-03 kg/ha {1,2,1,1,1}; 6.434E-03 kg/ha {1,2,1,1,1}; 5.324E-03 kg/ha {1,2,1,1,1}; 1.425E-02 kg/ha {1,2,1,1,1}; 6.120E-03 kg/ha {1,2,1,1,1}; 1.114E-02 kg/ha {1,2,1,1,1}, respectively).
  Average over state-wide reported cropped area of maize grain for all tillage practices (CTIC 2020a) and across all rotation patterns (Socolar et al 2021) - calculated from specified herbicide/insecticide/fungicide quantity applied to treated acres weighted by share of acres treated with that herbicide/insecticide/fungicide (2014, 2016, 2018, 2021 - USDA NASS data, USDA NASS 2021f, USDA NASS 2021g).
  Sources:
  CTIC (2020a) OpTIS - Operational Tillage Information System. Conservation Technology Information Center (CTIC). https://www.ctic.org/optis_tabular_queryaccessed March 23, 2021
  Socolar Y, Goldstein B R, de Valpine P, Bowles T M (2021) Biophysical and policy factors predict simplified crop rotations in the US Midwest. Environ. Res. Lett. 16 054045. . https://iopscience.iop.org/article/10.1088/1748-9326/abf9ca
  USDA NASS (2021f) CORN - APPLICATIONS, MEASURED IN LB / ACRE / YEAR, AVG and NUMBER / YEAR (fertilizer and pesticides, amount, number of applications) - 2000-2021. US Department of Agriculture (USDA) National Agricultural Statistics Service. https://quickstats.nass.usda.gov (direct query: https://quickstats.nass.usda.gov/results/5BCE1263-5F91-31A9-B3DE-117AFBDDFF20)
  USDA NASS (2021g) CORN - TREATED, MEASURED IN PCT OF AREA PLANTED, AVG (fertilizer and pesticides, including chemigation) - 2000-2021. US Department of Agriculture (USDA) National Agricultural Statistics Service. https://quickstats.nass.usda.gov (direct query: https://quickstats.nass.usda.gov/results/C3A3CFC4-4341-3093-A3D2-544FBC852EF6)
  properties: carbon content, fossil 0.641962, dry mass 1 kg, wet mass 1 kg
- diammonium phosphate: 0.00102766 kg; normal variance with pedigree 4.51475e-9, pedigree (2,1,2,1,1)
  1.03E-3 kg diammonium phosphate/kg maize grain
  Quantities of specific fertilisers are calculated based on US fertiliser market share and nutrient compositions from the International Fertilizer Association data to supply N to meet total nutrient demand N-P-K-S: 171.01--41.14--13.48--9.8 kg/ha (USDA NASS data for 2014, 2016, 2018, 2021; reflects average over all rotations and tillage regimes) over reported cropped area of specified crop (includes all rotation patterns), meeting N demand with the IFA mix and any remaining P, K, and S demands with other fertilisers balanced to avoid exceeding other demands by more than 1%. Quantity of specific fertiliser calculated from: quantity of N applied to treated acres times percent of planted maize acres treated (USDA NASS) times share of N supplied by compound in U.S. consumption mix (ecoinvent and International Fertilizer Association 2019) times mass compound per mass N in compound.
  Sources:
  USDA NASS (2021f) CORN - APPLICATIONS, MEASURED IN LB / ACRE / YEAR, AVG and NUMBER / YEAR (fertilizer and pesticides, amount, number of applications) - 2000-2021. US Department of Agriculture (USDA) National Agricultural Statistics Service. https://quickstats.nass.usda.gov (direct query: https://quickstats.nass.usda.gov/results/5BCE1263-5F91-31A9-B3DE-117AFBDDFF20); USDA ERS Fertilizer and Price Data, updated 10/30/2019. https://www.ers.usda.gov/data-products/fertilizer-use-and-price/ USDA ERS. (2019). Table 9. Percent of corn acreage receiving nitrogen fertilizer, selected States. Fertilizer Use and Price Report. US Department of Agriculture (USDA) Economic Research Service (ERS). https://www.ers.usda.gov/data-products/fertilizer-use-and-price.aspx.
  USDA ERS. (2019). Table 10. Nitrogen used on corn, rate per fertilized acre receiving nitrogen, selected States. Fertilizer Use and Price Report. US Department of Agriculture (USDA) Economic Research Service (ERS). https://www.ers.usda.gov/data-products/fertilizer-use-and-price.aspx; Ecoinvent U.S. consumption mix for N fertilisers, from IFA data; IFA (2021) Nutrient content in percentage - IFA Fertilizer Converter. International Fertilizer Association. https://www.ifastat.org/converter/fertilizer-converter/accessed 2021-06-24
  properties: dry mass 1 kg, nitrogen content 0.18, phosphorus content 0.200754, wet mass 1 kg
  note on nitrogen content: Nitrogen content (on a dry matter basis) of diammonium phosphate is calculated from the molecular formula of the nutrient present in the substance.
  note on phosphorus content: Phosphorus content (on a dry matter basis) of diammonium phosphate is calculated from the molecular formula of the nutrient present in the substance.
- diesel, burned in agricultural machinery: 0.0100874 MJ; lognormal variance with pedigree 0.0206, pedigree (4,4,3,1,3)
  1.01E-2 MJ/kg diesel, burned in agricultural machinery
  Based on agricultural extension expert estimates of annual costs for haulage - moving grain from field to storage - and general fuel use (enterprise crop budgets including IA, NE, IL) and farmer survey data (Iowa Farm Custom Rate Survey, 2021 (ISU), Wisconsin Farm Custom Rate Survey 2021 (USDA, NASS, Wisconsin Field Office)).
  Field operations are as identified in crop- and rotation-specific enterprise crop budgets supplied by the regional agricultural extension office and matched to equipment type in the budget or crop guidance. Operations are matched to equipment type and where multiple options are available, the share of each is determined from guidance and annual farmer survey data (Custom Rate Summaries) for contracted operations/equipment.
  Sources:
  ISU Extension 2021a; UNL Extension 2020; Langemeier MR, Nielsen B, Vyn TJ, Casteel S, and Johnson B 2021; Plastina, Johanns, Gleisner, Qualman 2021; WI NASS 2021
  UNL Extension (2020) Nebraska Crop Budgets. Nebraska Extension, University of Nebraska–Lincoln Institute of Agriculture and Natural Resources. https://cropwatch.unl.edu/budgets, https://cropwatch.unl.edu/Budgets/2020/2020-NE-crop-budget-intro.pdf; Klein R and McClure G (2021a) 2021 Nebraska Crop Budgets EC872 - Dryland Corn. Nebraska Extension - Institute of Agriculture and Natural Resources, Universoty of Nebraska-Lincoln. https://cropwatch.unl.edu/Budgets/2021/2021-Corn-Dryland-121620.pdf; Klein R and McClure G (2021b) 2021 Nebraska Crop Budgets EC872 - Irrigated Corn. Nebraska Extension - Institute of Agriculture and Natural Resources, Universoty of Nebraska-Lincoln. https://cropwatch.unl.edu/Budgets/2021/2021-Corn-Irrigated-121620.pdf
- dinitroaniline-compound: 1.91409e-6 kg; normal variance with pedigree 1.7374e-12, pedigree (1,4,2,1,1)
  This exchange is an aggregate of proxies for production of: Azoxystrobin, Pyraclostrobin, Trifloxystrobin (6.083E-03 kg/ha {1,2,1,1,1}; 9.482E-03 kg/ha {1,2,1,1,1}; 6.675E-03 kg/ha {1,4,1,1,1}, respectively).
  Average over state-wide reported cropped area of maize grain for all tillage practices (CTIC 2020a) and across all rotation patterns (Socolar et al 2021) - calculated from specified herbicide/insecticide/fungicide quantity applied to treated acres weighted by share of acres treated with that herbicide/insecticide/fungicide (2014, 2016, 2018, 2021 - USDA NASS data, USDA NASS 2021f, USDA NASS 2021g).
  Sources:
  CTIC (2020a) OpTIS - Operational Tillage Information System. Conservation Technology Information Center (CTIC). https://www.ctic.org/optis_tabular_queryaccessed March 23, 2021
  Socolar Y, Goldstein B R, de Valpine P, Bowles T M (2021) Biophysical and policy factors predict simplified crop rotations in the US Midwest. Environ. Res. Lett. 16 054045. . https://iopscience.iop.org/article/10.1088/1748-9326/abf9ca
  USDA NASS (2021f) CORN - APPLICATIONS, MEASURED IN LB / ACRE / YEAR, AVG and NUMBER / YEAR (fertilizer and pesticides, amount, number of applications) - 2000-2021. US Department of Agriculture (USDA) National Agricultural Statistics Service. https://quickstats.nass.usda.gov (direct query: https://quickstats.nass.usda.gov/results/5BCE1263-5F91-31A9-B3DE-117AFBDDFF20)
  USDA NASS (2021g) CORN - TREATED, MEASURED IN PCT OF AREA PLANTED, AVG (fertilizer and pesticides, including chemigation) - 2000-2021. US Department of Agriculture (USDA) National Agricultural Statistics Service. https://quickstats.nass.usda.gov (direct query: https://quickstats.nass.usda.gov/results/C3A3CFC4-4341-3093-A3D2-544FBC852EF6)
  properties: carbon content, fossil 0.55516, dry mass 1 kg, wet mass 1 kg
- fertilising, by broadcaster: 0.000174936 ha; lognormal variance with pedigree 0.0206, pedigree (4,4,3,1,3)
  2.0326 ha/ha (1.75E-4 ha/kg maize grain) fertilising, by broadcaster
  Average application rates for mineral fertilisers (NPKS) on maize grain in Nebraska are: 2.68 N applications on 99.3% of cropped area, 1.38 P applications on 74.5% of cropped area, 1.55 K applications on 27.3% of cropped area, and 2.00 S applications on 36.0% of cropped area (USDA NASS 2021f, NPKS data from 2014, 2016, 2018, 2021). Applications of N are split between anhydrous ammonia and other NPK(S) fertilsers because they are generally applied differently, with different equipment. Other than anhydrous ammonia, most NPK(S) fertilisers are applied together via broadcast application.
  Anhydrous ammonia application (knifing/injection) is calculated as market share of N that is anhydrous ammonia * total N applications (=0.63). Other N application is then: total USDA N applications less applications of anhydrous ammonia (=2.05). The market share of N that is anhydrous ammonia is calculated from fertiliser market group shares crossed with meeting NPKS nutrient demand (here, 23.44%). Thus, the dataset includes 0.62 anhydrous ammonia applications via injection (0.63 * 99.3% of crop area with applied N) and 2.03 other N applications via broadcast (2.05 * 99.3%). Since the number of passes for N application after removing the anhydrous ammonia share is greater than the maximum number of passes reported for the other nutrients, this dataset assumes that any other fertiliser applications are reflected under that pass and the total fertiliser broadcast fertiliser passes are thus 2.03.
  Field operations are as identified in crop- and rotation-specific enterprise crop budgets supplied by the regional agricultural extension office and matched to equipment type in the budget or crop guidance. (UNL Extension 2020, Klein R and McClure G 2021a, Klein R and McClure G 2021b). Operations are matched to equipment type and where multiple options are available, the share of each is determined from guidance and annual farmer survey data (Custom Rate Summaries) for contracted operations/equipment. Where an operation applies only to a portion of the harvested area, the number of passes has been scaled by the % of harvested area to which it applies (e.g., manure spreading or insecticide) as indicated by USDA statistics (applications) or USDA reports (manure use) or as otherwise indicated in enterprise crop budgets.
  Source(s):
  USDA NASS (2021f) CORN - APPLICATIONS, MEASURED IN LB / ACRE / YEAR, AVG and NUMBER / YEAR (fertilizer and pesticides, amount, number of applications) - 2000-2021. US Department of Agriculture (USDA) National Agricultural Statistics Service. https://quickstats.nass.usda.gov (direct query: https://quickstats.nass.usda.gov/results/5BCE1263-5F91-31A9-B3DE-117AFBDDFF20); UNL Extension (2020) Nebraska Crop Budgets. Nebraska Extension, University of Nebraska–Lincoln Institute of Agriculture and Natural Resources. https://cropwatch.unl.edu/budgets, https://cropwatch.unl.edu/Budgets/2020/2020-NE-crop-budget-intro.pdf; Klein R and McClure G (2021a) 2021 Nebraska Crop Budgets EC872 - Dryland Corn. Nebraska Extension - Institute of Agriculture and Natural Resources, Universoty of Nebraska-Lincoln. https://cropwatch.unl.edu/Budgets/2021/2021-Corn-Dryland-121620.pdf; Klein R and McClure G (2021b) 2021 Nebraska Crop Budgets EC872 - Irrigated Corn. Nebraska Extension - Institute of Agriculture and Natural Resources, Universoty of Nebraska-Lincoln. https://cropwatch.unl.edu/Budgets/2021/2021-Corn-Irrigated-121620.pdf
- fertilising, by injection: 5.3557e-5 ha; lognormal variance with pedigree 0.0206, pedigree (4,4,3,1,3)
  0.6223 ha/ha (5.36E-5 ha/kg maize grain) fertilising, by injection
  Average application rates for mineral fertilisers (NPKS) on maize grain in Nebraska are: 2.68 N applications on 99.3% of cropped area, 1.38 P applications on 74.5% of cropped area, 1.55 K applications on 27.3% of cropped area, and 2.00 S applications on 36.0% of cropped area (USDA NASS 2021f, NPKS data from 2014, 2016, 2018, 2021). Applications of N are split between anhydrous ammonia and other NPK(S) fertilsers because they are generally applied differently, with different equipment. Other than anhydrous ammonia, most NPK(S) fertilisers are applied together via broadcast application.
  Anhydrous ammonia application (knifing/injection) is calculated as market share of N that is anhydrous ammonia * total N applications (=0.63). Other N application is then: total USDA N applications less applications of anhydrous ammonia (=2.05). The market share of N that is anhydrous ammonia is calculated from fertiliser market group shares crossed with meeting NPKS nutrient demand (here, 23.44%). Thus, the dataset includes 0.62 anhydrous ammonia applications via injection (0.63 * 99.3% of crop area with applied N) and 0.63 other N applications via broadcast.Since the number of passes for N application after removing the anhydrous ammonia share is greater than the maximum number of passes reported for the other nutrients, this dataset assumes that any other fertiliser applications are reflected under that pass and the total fertiliser broadcast fertiliser passes are thus 2.05.
  Field operations are as identified in crop- and rotation-specific enterprise crop budgets supplied by the regional agricultural extension office and matched to equipment type in the budget or crop guidance. (UNL Extension 2020, Klein R and McClure G 2021a, Klein R and McClure G 2021b). Operations are matched to equipment type and where multiple options are available, the share of each is determined from guidance and annual farmer survey data (Custom Rate Summaries) for contracted operations/equipment. Where an operation applies only to a portion of the harvested area, the number of passes has been scaled by the % of harvested area to which it applies (e.g., manure spreading or insecticide) as indicated by USDA statistics (applications) or USDA reports (manure use) or as otherwise indicated in enterprise crop budgets.
  Source(s):
  USDA NASS (2021f) CORN - APPLICATIONS, MEASURED IN LB / ACRE / YEAR, AVG and NUMBER / YEAR (fertilizer and pesticides, amount, number of applications) - 2000-2021. US Department of Agriculture (USDA) National Agricultural Statistics Service. https://quickstats.nass.usda.gov (direct query: https://quickstats.nass.usda.gov/results/5BCE1263-5F91-31A9-B3DE-117AFBDDFF20); UNL Extension (2020) Nebraska Crop Budgets. Nebraska Extension, University of Nebraska–Lincoln Institute of Agriculture and Natural Resources. https://cropwatch.unl.edu/budgets, https://cropwatch.unl.edu/Budgets/2020/2020-NE-crop-budget-intro.pdf; Klein R and McClure G (2021a) 2021 Nebraska Crop Budgets EC872 - Dryland Corn. Nebraska Extension - Institute of Agriculture and Natural Resources, Universoty of Nebraska-Lincoln. https://cropwatch.unl.edu/Budgets/2021/2021-Corn-Dryland-121620.pdf; Klein R and McClure G (2021b) 2021 Nebraska Crop Budgets EC872 - Irrigated Corn. Nebraska Extension - Institute of Agriculture and Natural Resources, Universoty of Nebraska-Lincoln. https://cropwatch.unl.edu/Budgets/2021/2021-Corn-Irrigated-121620.pdf
- glyphosate: 9.84834e-6 kg; normal variance with pedigree 7.00982e-10, pedigree (1,2,2,1,1)
  This exchange is an aggregate of Glyphosate, Glyphosate dimethylamine salt, Glyphosate isopropylamine salt, Glyphosate Potassium Salt (1.857E-01 kg/ha {1,2,1,1,1}; 9.390E-02 kg/ha {1,2,1,1,1}; 3.930E-01 kg/ha {1,2,1,1,1}; 4.275E-01 kg/ha {1,2,1,1,1}, respectively).
  Average over state-wide reported cropped area of maize grain for all tillage practices (CTIC 2020a) and across all rotation patterns (Socolar et al 2021) - calculated from specified herbicide/insecticide/fungicide quantity applied to treated acres weighted by share of acres treated with that herbicide/insecticide/fungicide (2014, 2016, 2018, 2021 - USDA NASS data, USDA NASS 2021f, USDA NASS 2021g).
  Sources:
  CTIC (2020a) OpTIS - Operational Tillage Information System. Conservation Technology Information Center (CTIC). https://www.ctic.org/optis_tabular_queryaccessed March 23, 2021
  Socolar Y, Goldstein B R, de Valpine P, Bowles T M (2021) Biophysical and policy factors predict simplified crop rotations in the US Midwest. Environ. Res. Lett. 16 054045. . https://iopscience.iop.org/article/10.1088/1748-9326/abf9ca
  USDA NASS (2021f) CORN - APPLICATIONS, MEASURED IN LB / ACRE / YEAR, AVG and NUMBER / YEAR (fertilizer and pesticides, amount, number of applications) - 2000-2021. US Department of Agriculture (USDA) National Agricultural Statistics Service. https://quickstats.nass.usda.gov (direct query: https://quickstats.nass.usda.gov/results/5BCE1263-5F91-31A9-B3DE-117AFBDDFF20)
  USDA NASS (2021g) CORN - TREATED, MEASURED IN PCT OF AREA PLANTED, AVG (fertilizer and pesticides, including chemigation) - 2000-2021. US Department of Agriculture (USDA) National Agricultural Statistics Service. https://quickstats.nass.usda.gov (direct query: https://quickstats.nass.usda.gov/results/C3A3CFC4-4341-3093-A3D2-544FBC852EF6)
  properties: carbon content, fossil 0.214286, dry mass 1 kg, wet mass 1 kg
- harvesting, use of harvesting cart: 8.60635e-5 kg; lognormal variance with pedigree 0.0206, pedigree (4,4,3,1,3)
  8.61E-5 kg/kg harvesting, use of harvesting cart (1 pass per year).
  Used alongside combine harvester. Field operations are as identified in crop- and rotation-specific enterprise crop budgets supplied by the regional agricultural extension office and matched to equipment type in the budget or crop guidance. Operations are matched to equipment type and where multiple options are available, the share of each is determined from guidance and annual farmer survey data (Custom Rate Summaries) for contracted operations/equipment.
  Sources:
  UNL Extension (2020) Nebraska Crop Budgets. Nebraska Extension, University of Nebraska–Lincoln Institute of Agriculture and Natural Resources. https://cropwatch.unl.edu/budgets, https://cropwatch.unl.edu/Budgets/2020/2020-NE-crop-budget-intro.pdf; Klein R and McClure G (2021a) 2021 Nebraska Crop Budgets EC872 - Dryland Corn. Nebraska Extension - Institute of Agriculture and Natural Resources, Universoty of Nebraska-Lincoln. https://cropwatch.unl.edu/Budgets/2021/2021-Corn-Dryland-121620.pdf; Klein R and McClure G (2021b) 2021 Nebraska Crop Budgets EC872 - Irrigated Corn. Nebraska Extension - Institute of Agriculture and Natural Resources, Universoty of Nebraska-Lincoln. https://cropwatch.unl.edu/Budgets/2021/2021-Corn-Irrigated-121620.pdf
- irrigation: 0.127447 m3; lognormal variance with pedigree 0.0038, pedigree (1,3,3,1,2)
  1,480.8 m3/ha (1.27E-1 m3/kg maize grain) irrigation. Water applied for irrigation (2,562 m3/irrigated ha, 2013, 2018 from USDA NASS (2018)), weighted by the share of acres irrigated (57.8%, average over 2010-2018 from USDA NASS (2021); percent of harvested irrigated acres not reported 2019-2021).
  Sources:
  USDA NASS (2018d) 2018 Irrigation and Water Management Survey (2017 Census of Agriculture). US Department of Agriculture (USDA). https://www.nass.usda.gov/Publications/AgCensus/2017/Online_Resources/Farm_and_Ranch_Irrigation_Survey/index.php
  USDA NASS (2021j) Corn, Grain, Irrigated - Acres Harvested 2000-2021; Corn, Grain, Non-Irrigated - Acres Harvested 2000-2018. US Department of Agriculture (USDA). https://quickstats.nass.usda.gov
  properties: dry mass 0.11 kg, water content 9089.91, wet mass 1000 kg
- land use change, annual crop: 1.30279e-5 ha; lognormal variance with pedigree 0.082025, pedigree (1,1,3,2,1)
  Area cultivated for maize grain in Nebraska increased by 19% between 2000 and 2021 (USDA NASS data, 5 year rolling averages). US NRCS data indicates that total cropland in Nebraska has expanded over the same period by 4% (NRCS 2020b). The expansion of cropland for all crops in Nebraska in this period was supplied 86% from CRP land, 12% from Rangeland, 2% from Forest land; thus, 14% of crop expansion is direct land use conversion. comparing five year rolling averages for the beginning and end of the 20 year time horizon.
  Calculated value from ecoinvent Crop LCI tool, 0.15137 divided by the yield in kg/ha. Land use change is allocated to all crops and activities that grew in the last 20 years for the US, and only to them, according to their respective area increase. Crop production and natural land areas in all countries use data from 1989 to 2012 (FAOSTAT 2012), as well as for country climates and soil types (EU-JRC 2010c). Crops for which planted area decreased are not attributed LUC impacts or credits. Land use change (LUC) combines land transformation areas calculated with the adapted 'Direct Land Use Change Assessment Tool' version 2014 developed by Blonk Consultants and the carbon losses from soil organic carbon (SOC) and vegetation (VEG) as calculated in ecoinvent v3. See 'WFLDB-Guidelines.pdf', available at https://ecoquery.ecoinvent.org/File/Reports.
- limestone and gypsum application, by spreader: 4.06209e-6 ha; lognormal variance with pedigree 0.1381, pedigree (4,2,3,1,3)
  0.047 ha/ha (4.06E-6 ha/kg maize grain), calculated as the fraction of crop area treated with lime (37.76%, from state level estimated agricultural acres with pH <6.1, Bruulsema T and Jones J D 2021) / (8 years between applications, based on Bruulsema T and Jones J D 2021).
  Liming is reccommended for soils that have dropped to pH of 5.4-5.8 Shaver T M (2014) Nutrient Management for Agronomic Crops in Nebraska (rev Dec 2014). The University of Nebraska Institute of Agriculture and Natural Resources. https://extensionpublications.unl.edu/assets/pdf/ec155.pdfaccessed August 30, 2021
  Sources:
  Bruulsema T and Jones J D (2021) Soil Test Summary 2020. Foundation for Agronomic Research and Plant Nutrition Canada present this 2020 summary of soil test levels in North America. Foundation for Agronomic Research, Plant Nutrition Canada. https://soiltest.tfi.org/about/about_soil_test_summaryaccessed August 30, 2021; Kaiser and Ronen (2018) Lime needs in Minnesota (website). University of Minnesota Extension. https://extension.umn.edu/liming/lime-needs-minnesotaaccessed August 30, 2021; Mamo, M, Wortmann, CS, Shaipro, CA (2015) Lime Use for Soil Acidity Management. University of Nebraska–Lincoln Extension, Institute of Agriculture and Natural Resources. https://extensionpublications.unl.edu/assets/pdf/g1504.pdfaccessed August 30, 2021; Shaver T M (2014) Nutrient Management for Agronomic Crops in Nebraska (rev Dec 2014). The University of Nebraska Institute of Agriculture and Natural Resources. https://extensionpublications.unl.edu/assets/pdf/ec155.pdfaccessed August 30, 2021; Wortmann CS, Mamo M, Shapiro CA (2009) Management Strategies to Reduce the Rate of Soil Acidification. University of Nebraska–Lincoln Extension, Institute of Agriculture and Natural Resources. https://extensionpublications.unl.edu/assets/html/g1503/build/g1503.htm; Shaver T M (2014) Nutrient Management for Agronomic Crops in Nebraska (rev Dec 2014). The University of Nebraska Institute of Agriculture and Natural Resources. https://extensionpublications.unl.edu/assets/pdf/ec155.pdfaccessed August 30, 2021; Bly A and Gelderman R (2019) Chapter: 25 Liming South Dakota Soils . SDSU Extension . https://extension.sdstate.edu/sites/default/files/2019-09/S-0003-25-Corn.pdf; Mallarino A P, Pagani A, Sawyer J E (2011) Corn and soybean response to soil pH level and liming. Paper presented at the 2011 Integrated Crop Management Conference. Iowa State University.Cooperative Extension Service, Iowa State University of Science and Technology. https://core.ac.uk/download/pdf/128983337.pdfaccessed November 17, 2021
- limestone, crushed, washed: 0.0200753 kg; lognormal variance with pedigree 0.1381, pedigree (4,2,3,1,3)
  Application of limestone to raise soil pH, 233.26 kg/ha (2.01E-2 kg/kg maize grain), calculated as the (mass of lime applied to treated acres (2 t/treated ha)) * fraction of crop area treated with lime (37.76%, from soil pH data from ) / (8 years between applications, based on Shaver T M 2014).
  Liming is reccommended for soils that have dropped to pH of 5.4-5.8 Where other information is not available, the years between applications has been estimated as equivalent to or greater than the recommended re-test time.
  Sources:
  Bruulsema T and Jones J D (2021) Soil Test Summary 2020. Foundation for Agronomic Research and Plant Nutrition Canada present this 2020 summary of soil test levels in North America. Foundation for Agronomic Research, Plant Nutrition Canada. https://soiltest.tfi.org/about/about_soil_test_summaryaccessed August 30, 2021; Kaiser and Ronen (2018) Lime needs in Minnesota (website). University of Minnesota Extension. https://extension.umn.edu/liming/lime-needs-minnesotaaccessed August 30, 2021; Mamo, M, Wortmann, CS, Shaipro, CA (2015) Lime Use for Soil Acidity Management. University of Nebraska–Lincoln Extension, Institute of Agriculture and Natural Resources. https://extensionpublications.unl.edu/assets/pdf/g1504.pdfaccessed August 30, 2021; Shaver T M (2014) Nutrient Management for Agronomic Crops in Nebraska (rev Dec 2014). The University of Nebraska Institute of Agriculture and Natural Resources. https://extensionpublications.unl.edu/assets/pdf/ec155.pdfaccessed August 30, 2021; Wortmann CS, Mamo M, Shapiro CA (2009) Management Strategies to Reduce the Rate of Soil Acidification. University of Nebraska–Lincoln Extension, Institute of Agriculture and Natural Resources. https://extensionpublications.unl.edu/assets/html/g1503/build/g1503.htm; Shaver T M (2014) Nutrient Management for Agronomic Crops in Nebraska (rev Dec 2014). The University of Nebraska Institute of Agriculture and Natural Resources. https://extensionpublications.unl.edu/assets/pdf/ec155.pdfaccessed August 30, 2021; Bly A and Gelderman R (2019) Chapter: 25 Liming South Dakota Soils . SDSU Extension . https://extension.sdstate.edu/sites/default/files/2019-09/S-0003-25-Corn.pdf; Mallarino A P, Pagani A, Sawyer J E (2011) Corn and soybean response to soil pH level and liming. Paper presented at the 2011 Integrated Crop Management Conference. Iowa State University.Cooperative Extension Service, Iowa State University of Science and Technology. https://core.ac.uk/download/pdf/128983337.pdfaccessed November 17, 2021
  properties: carbon content, fossil 0.117257, dry mass 0.998 kg, water content 0.00200401, wet mass 1 kg
  note on carbon content, fossil: Table 3.1, ecoinvent v2.2 report 7, part VII, pg 3. MW CaCO3=100, MW MgCO3=84. C content of limestone is 0.117257 kg/kg DM
- liquid manure spreading, by vacuum tanker: 9.89611e-8 m3; lognormal variance with pedigree 0.090625, pedigree (4,4,5,2,4)
  0.001 m3/ha (9.9E-8 m3/kg maize grain) liquid manure spreading, by vacuum tanker
  The total effective manure application rate of 973 kg/ha (0.084 kg/kg maize grain) is calculated from USDA ERS data for amount of manure applied (17.2 T/ha; 1.48 kg/kg maize grain) on share of crop area treated (5.7%) (years available: 2005, 2010) (USDA ARMS 2015a). The manure data has significant uncertainty due to both the age of the available data and the statistical limitations imposed by confidentiality for USDA survey respondents.
  About % of applied manure is in liquid form, calculated from the share of dry, semi-dry and slurry and lagoon manure applied from ARMS data. 100% of manure from cattle. The state's USDA manure table shows zero share from either swine or poultry manures.
  Cattle manure is apportioned between solid and liquid consistent with USDA esimtated shares.
  The calculated solid and liquid manure shares in this dataset are thus 0.1% solid and 99.9% liquid manure. The effective application rates are 971.4 kg solid manure per ha (9.9E-8 kg/kg maize grain) and . m3 liquid manure per ha (9.9E-8 m3/kg maize grain).
  Field operations are as identified in crop- and rotation-specific enterprise crop budgets supplied by the regional agricultural extension office and matched to equipment type in the budget or crop guidance. (UNL Extension 2020, Klein R and McClure G 2021a, Klein R and McClure G 2021b). Operations are matched to equipment type and where multiple options are available, the share of each is determined from guidance and annual farmer survey data (Custom Rate Summaries) for contracted operations/equipment. Where an operation applies only to a portion of the harvested area, the number of passes has been scaled by the % of harvested area to which it applies (e.g., manure spreading or insecticide) as indicated by USDA statistics (applications) or USDA reports (manure use) or as otherwise indicated in enterprise crop budgets.
  Source(s):
  USDA ARMS (2015a) Agricultural Resource Management Survey (ARMS) Farm Financial and Crop Production Practices: Manure Table, Corn. USDA. https://data.ers.usda.gov/reports.aspx?ID=17883
  Beegle D and Peters J. (2019) Common Manure Test Results Conversions. National Cooperative Extension Resource, Livestock And Poultry Environmental Learning Community (Lpelc). https://lpelc.org/common-manure-test-results-conversions/accessed October 5, 2021
  Wilson M (2021) Manure Characteristics. University of Minnesota Extension. https://extension.umn.edu/manure-management/manure-characteristics; https://drive.google.com/file/d/1-c8bx_75YSsQZTNFB_YFVD-uw_SbX1dB/view?usp=sharing
  UNL Extension (2020) Nebraska Crop Budgets. Nebraska Extension, University of Nebraska–Lincoln Institute of Agriculture and Natural Resources. https://cropwatch.unl.edu/budgets, https://cropwatch.unl.edu/Budgets/2020/2020-NE-crop-budget-intro.pdf; Klein R and McClure G (2021a) 2021 Nebraska Crop Budgets EC872 - Dryland Corn. Nebraska Extension - Institute of Agriculture and Natural Resources, Universoty of Nebraska-Lincoln. https://cropwatch.unl.edu/Budgets/2021/2021-Corn-Dryland-121620.pdf; Klein R and McClure G (2021b) 2021 Nebraska Crop Budgets EC872 - Irrigated Corn. Nebraska Extension - Institute of Agriculture and Natural Resources, Universoty of Nebraska-Lincoln. https://cropwatch.unl.edu/Budgets/2021/2021-Corn-Irrigated-121620.pdf
- maize seed, for sowing: 0.00160909 kg; normal variance with pedigree 0.000261615, pedigree (3,3,2,1,2)
  Each planted hectare uses 18.7 kg seed (1.61E-3 kg/kg maize grain). This value is calculated from a seeding rate of 69,778 seeds/ha (Barr RL, Mason SC, Novacek MJ, Wortmann CS, Rees JM. 2013; UNL Extension 2020; Klein R and McClure G 2021; Klein R and McClure G 2021) and an average seed count of 3,732 seeds/kg (averaged from Licht M and Clemens Z 2020, Leinfelder-Miles M 2018). More than 90% of planted maize corn is genetically engineered (state by state variation 0.3-1.8%), mostly with stacked herbicide-tolerant and insect-tolerant traits (USDA NASS 2022). The dataset uses the less variable agronomically optimal seeding rate rather than the more variable, though potentially lower, economically optimal rate. Germination and stand losses are accounted for in the seeding rate. The uncertainty parameters are calculated using the full range of seeding rates in the enterprise crop budgets (standard deviation of 18.6seeds/ha)
  Sources:
  Barr RL, Mason SC, Novacek MJ, Wortmann CS, Rees JM. (2013) Row Spacing and Seeding Rate Recommendations for Corn in Nebraska. G2216. University of Nebraska–Lincoln Extension, Institute of Agriculture and Natural Resources. https://extensionpublications.unl.edu/assets/html/g2068/build/g2068.htm, UNL Extension (2020) Nebraska Crop Budgets. Nebraska Extension, University of Nebraska–Lincoln Institute of Agriculture and Natural Resources. https://cropwatch.unl.edu/budgets, https://cropwatch.unl.edu/Budgets/2020/2020-NE-crop-budget-intro.pdf, Klein R and McClure G (2021a) 2021 Nebraska Crop Budgets EC872 - Dryland Corn. Nebraska Extension - Institute of Agriculture and Natural Resources, Universoty of Nebraska-Lincoln. https://cropwatch.unl.edu/Budgets/2021/2021-Corn-Dryland-121620.pdf, Klein R and McClure G (2021b) 2021 Nebraska Crop Budgets EC872 - Irrigated Corn. Nebraska Extension - Institute of Agriculture and Natural Resources, Universoty of Nebraska-Lincoln. https://cropwatch.unl.edu/Budgets/2021/2021-Corn-Irrigated-121620.pdf
  properties: carbon content, non-fossil 0.45263, dry mass 0.88 kg, water content 0.136364, wet mass 1 kg
  note on carbon content, non-fossil: biogene carbon content on a dry matter basis; Composition data obtained from Corn Grain Whole, in (http://beefmagazine.com/images/2009%20feed%20table.pdf). First, composition data were refered to 1 kg dry mass. Then, C-contents were calculated considering a C-content/dry mass of 44% in carbohydrates (including fibres), 53% in proteins and 75% in fats. All data from ecoinvent report, n 15a, pg 40, except C-content in protein, that comes from Determination of protein concentration by total organic carbon analysis, Rouwenhorst et al., 1991, J Biochem and Biophys Methods, 22:119-128.
- manure, liquid, cattle: 9.96086e-5 kg; lognormal variance with pedigree 0.0118, pedigree (4,3,3,1,2)
  9.96E-5 kg cattle manure/kg maize grain
  The total effective manure application rate of 973 kg/ha (0.084 kg/kg maize grain) is calculated from USDA ERS data for amount of manure applied (17.2 T/ha; 1.48 kg/kg maize grain) on share of crop area treated (5.7%) (years available: 2005, 2010) (USDA ARMS 2015a). The manure data has significant uncertainty due to both the age of the available data and the statistical limitations imposed by confidentiality for USDA survey respondents.
  About % of applied manure is in liquid form, calculated from the share of dry, semi-dry and slurry and lagoon manure applied from ARMS data. 100% of manure from cattle. The state's USDA manure table shows zero share from either swine or poultry manures.
  Cattle manure is apportioned between solid and liquid consistent with USDA esimtated shares.
  The calculated solid and liquid manure shares in this dataset are thus 0.1% solid and 99.9% liquid manure. Volume of liquid manure is calculated using density ~8.4lb/gal (8-9 lb/gal, Wilson M 2021). Total mass liquid manure is 9.96E-5 kg/kg maize grain, total volume of liquid manure is 9.9E-8 m3/kg maize.
  Sources:
  Wilson M (2021) Manure Characteristics. University of Minnesota Extension. https://extension.umn.edu/manure-management/manure-characteristics; https://drive.google.com/file/d/1-c8bx_75YSsQZTNFB_YFVD-uw_SbX1dB/view?usp=sharing
  Beegle D and Peters J. (2019) Common Manure Test Results Conversions. National Cooperative Extension Resource, Livestock And Poultry Environmental Learning Community (Lpelc). https://lpelc.org/common-manure-test-results-conversions/accessed October 5, 2021
  USDA ARMS (2015a) Agricultural Resource Management Survey (ARMS) Farm Financial and Crop Production Practices: Manure Table, Corn. USDA. https://data.ers.usda.gov/reports.aspx?ID=17883
  properties: carbon content, non-fossil 0.68, dry mass 0.075 kg, water content 12.333, wet mass 1 kg
- manure, solid, cattle: 0.0836051 kg; lognormal variance with pedigree 0.0118, pedigree (4,3,3,1,2)
  8.36E-2 kg cattle manure/kg maize grain
  The total effective manure application rate of 973 kg/ha (0.084 kg/kg maize grain) is calculated from USDA ERS data for amount of manure applied (17.2 T/ha; 1.48 kg/kg maize grain) on share of crop area treated (5.7%) (years available: 2005, 2010) (USDA ARMS 2015a). The manure data has significant uncertainty due to both the age of the available data and the statistical limitations imposed by confidentiality for USDA survey respondents.
  About % of applied manure is in liquid form, calculated from the share of dry, semi-dry and slurry and lagoon manure applied from ARMS data. 100% of manure from cattle. The state's USDA manure table shows zero share from either swine or poultry manures.
  Cattle manure is apportioned between solid and liquid consistent with USDA esimtated shares.
  The calculated solid and liquid manure shares in this dataset are thus 0.1% solid and 99.9% liquid manure. Total mass solid manure is 8.36E-2 kg/kg maize grain.
  Sources:
  Beegle D and Peters J. (2019) Common Manure Test Results Conversions. National Cooperative Extension Resource, Livestock And Poultry Environmental Learning Community (Lpelc). https://lpelc.org/common-manure-test-results-conversions/accessed October 5, 2021
  USDA ARMS (2015a) Agricultural Resource Management Survey (ARMS) Farm Financial and Crop Production Practices: Manure Table, Corn. USDA. https://data.ers.usda.gov/reports.aspx?ID=17883
  properties: carbon content, non-fossil 0.441, dry mass 0.22 kg, water content 3.5454, wet mass 1 kg
- monoammonium phosphate: 0.00830181 kg; normal variance with pedigree 2.94632e-7, pedigree (2,1,2,1,1)
  8.3E-3 kg monoammonium phosphate/kg maize grain
  Quantities of specific fertilisers are calculated based on US fertiliser market share and nutrient compositions from the International Fertilizer Association data to supply N to meet total nutrient demand N-P-K-S: 171.01--41.14--13.48--9.8 kg/ha (USDA NASS data for 2014, 2016, 2018, 2021; reflects average over all rotations and tillage regimes) over reported cropped area of specified crop (includes all rotation patterns), meeting N demand with the IFA mix and any remaining P, K, and S demands with other fertilisers balanced to avoid exceeding other demands by more than 1%. Quantity of specific fertiliser calculated from: quantity of N applied to treated acres times percent of planted maize acres treated (USDA NASS) times share of N supplied by compound in U.S. consumption mix (ecoinvent and International Fertilizer Association 2019) times mass compound per mass N in compound.
  Sources:
  USDA NASS (2021f) CORN - APPLICATIONS, MEASURED IN LB / ACRE / YEAR, AVG and NUMBER / YEAR (fertilizer and pesticides, amount, number of applications) - 2000-2021. US Department of Agriculture (USDA) National Agricultural Statistics Service. https://quickstats.nass.usda.gov (direct query: https://quickstats.nass.usda.gov/results/5BCE1263-5F91-31A9-B3DE-117AFBDDFF20); USDA ERS Fertilizer and Price Data, updated 10/30/2019. https://www.ers.usda.gov/data-products/fertilizer-use-and-price/ USDA ERS. (2019). Table 9. Percent of corn acreage receiving nitrogen fertilizer, selected States. Fertilizer Use and Price Report. US Department of Agriculture (USDA) Economic Research Service (ERS). https://www.ers.usda.gov/data-products/fertilizer-use-and-price.aspx.
  USDA ERS. (2019). Table 10. Nitrogen used on corn, rate per fertilized acre receiving nitrogen, selected States. Fertilizer Use and Price Report. US Department of Agriculture (USDA) Economic Research Service (ERS). https://www.ers.usda.gov/data-products/fertilizer-use-and-price.aspx; Ecoinvent U.S. consumption mix for N fertilisers, from IFA data; IFA (2021) Nutrient content in percentage - IFA Fertilizer Converter. International Fertilizer Association. https://www.ifastat.org/converter/fertilizer-converter/accessed 2021-06-24
  properties: dry mass 1 kg, nitrogen content 0.084, phosphorus content 0.226939, wet mass 1 kg
  note on nitrogen content: Nitrogen content (on a dry matter basis) of monoammonium phosphate is calculated from the molecular formula of the nutrient present in the substance.
  note on phosphorus content: Phosphorus content (on a dry matter basis) of monoammonium phosphate is calculated from the molecular formula of the nutrient present in the substance.
- organophosphorus-compound, unspecified: 1.29799e-5 kg; normal variance with pedigree 4.1701e-12, pedigree (1,4,2,1,1)
  This exchange is an aggregate of proxies for production of: Chlorpyrifos, Glufosinate ammonium (5.833E-02 kg/ha {1,2,1,1,1}; 9.249E-02 kg/ha {1,2,1,1,1}, respectively).
  Average over state-wide reported cropped area of maize grain for all tillage practices (CTIC 2020a) and across all rotation patterns (Socolar et al 2021) - calculated from specified herbicide/insecticide/fungicide quantity applied to treated acres weighted by share of acres treated with that herbicide/insecticide/fungicide (2014, 2016, 2018, 2021 - USDA NASS data, USDA NASS 2021f, USDA NASS 2021g).
  Sources:
  CTIC (2020a) OpTIS - Operational Tillage Information System. Conservation Technology Information Center (CTIC). https://www.ctic.org/optis_tabular_queryaccessed March 23, 2021
  Socolar Y, Goldstein B R, de Valpine P, Bowles T M (2021) Biophysical and policy factors predict simplified crop rotations in the US Midwest. Environ. Res. Lett. 16 054045. . https://iopscience.iop.org/article/10.1088/1748-9326/abf9ca
  USDA NASS (2021f) CORN - APPLICATIONS, MEASURED IN LB / ACRE / YEAR, AVG and NUMBER / YEAR (fertilizer and pesticides, amount, number of applications) - 2000-2021. US Department of Agriculture (USDA) National Agricultural Statistics Service. https://quickstats.nass.usda.gov (direct query: https://quickstats.nass.usda.gov/results/5BCE1263-5F91-31A9-B3DE-117AFBDDFF20)
  USDA NASS (2021g) CORN - TREATED, MEASURED IN PCT OF AREA PLANTED, AVG (fertilizer and pesticides, including chemigation) - 2000-2021. US Department of Agriculture (USDA) National Agricultural Statistics Service. https://quickstats.nass.usda.gov (direct query: https://quickstats.nass.usda.gov/results/C3A3CFC4-4341-3093-A3D2-544FBC852EF6)
  properties: carbon content, fossil 0.260898, dry mass 1 kg, wet mass 1 kg
- packaging, for fertilisers: 0.102994 kg; name packaging_f; lognormal variance with pedigree 0.1708, pedigree (4,3,2,5,4)
  The total amount of mineral and/or synthetic fertilisers needed for the production of maize grain is calculated to be circa 180.777kg/ha. The total amount of applied mineral fertiliser is doubled to account for the packaging of the diluted product. Lime is not delivered packaged. Thus, 0.103 kg/ha of packaging for fertilisers is calculated with this exchange.
  properties: carbon content, fossil 0.825301, dry mass 1 kg, price 0.0642 EUR2005, wet mass 1 kg
  note on carbon content, fossil: Considering a chemical formula (C2H4)n for polyethylene, carbon content-fossil is calculated to be 0.856286 kg of Carbon per kg of dry mass.
- packaging, for pesticides: 0.000744956 kg; name packaging_p; lognormal variance with pedigree 0.0514, pedigree (4,3,2,5,4)
  The total amount of active substance/s of pesticides used for the production of maize grain is calculated to be about 4.33 kg/ha (2014, 2016, 2018, 2021 - USDA NASS data, USDA NASS 2021f, USDA NASS 2021g). The total amount of active substance/s is doubled in order to account for the packaging of the diluted product of pesticides that are applied. Therefore, 8.66 kg of packaging for pesticides per ha maize grain (7.45E-4 kg/kg) is calculated with this exchange.
  properties: carbon content, fossil 0.85714, dry mass 1 kg, price 0.0642 EUR2005, wet mass 1 kg
- phenoxy-compound: 7.71714e-8 kg; normal variance with pedigree 2.50428e-15, pedigree (1,4,2,1,1)
  Proxy for production of Benzovindiflupyr (8.967E-04 kg/ha {1,4,1,1,1}).
  Average over state-wide reported cropped area of maize grain for all tillage practices (CTIC 2020a) and across all rotation patterns (Socolar et al 2021) - calculated from specified herbicide/insecticide/fungicide quantity applied to treated acres weighted by share of acres treated with that herbicide/insecticide/fungicide (2014, 2016, 2018, 2021 - USDA NASS data, USDA NASS 2021f, USDA NASS 2021g).
  Sources:
  CTIC (2020a) OpTIS - Operational Tillage Information System. Conservation Technology Information Center (CTIC). https://www.ctic.org/optis_tabular_queryaccessed March 23, 2021
  Socolar Y, Goldstein B R, de Valpine P, Bowles T M (2021) Biophysical and policy factors predict simplified crop rotations in the US Midwest. Environ. Res. Lett. 16 054045. . https://iopscience.iop.org/article/10.1088/1748-9326/abf9ca
  USDA NASS (2021f) CORN - APPLICATIONS, MEASURED IN LB / ACRE / YEAR, AVG and NUMBER / YEAR (fertilizer and pesticides, amount, number of applications) - 2000-2021. US Department of Agriculture (USDA) National Agricultural Statistics Service. https://quickstats.nass.usda.gov (direct query: https://quickstats.nass.usda.gov/results/5BCE1263-5F91-31A9-B3DE-117AFBDDFF20)
  USDA NASS (2021g) CORN - TREATED, MEASURED IN PCT OF AREA PLANTED, AVG (fertilizer and pesticides, including chemigation) - 2000-2021. US Department of Agriculture (USDA) National Agricultural Statistics Service. https://quickstats.nass.usda.gov (direct query: https://quickstats.nass.usda.gov/results/C3A3CFC4-4341-3093-A3D2-544FBC852EF6)
  properties: carbon content, fossil 0.532559, dry mass 1 kg, wet mass 1 kg
- planting, by drill: 6.35268e-5 ha; lognormal variance with pedigree 0.0206, pedigree (4,4,3,1,3)
  6.35E-5 ha/kg planting (0.738 effective pass(es) per year).
  Field operations are as identified in crop- and rotation-specific enterprise crop budgets supplied by the regional agricultural extension office and matched to equipment type in the budget or crop guidance. Operations are matched to equipment type and where multiple options are available, the share of each is determined from guidance and annual farmer survey data (Custom Rate Summaries) for contracted operations/equipment. Field cultivation and tillage operations are specific to the tillage regime used. The rotation pattern also dictates some tillage patterns, captured in the GIS data for tillage shares. Maize cultivation is 74% reduced till, 18% conventional tillage, and 8% no till in Nebraska (CTIC 2020a). Sowing with till and no-till planters based on share of field type. Planting on reduced till fields only.
  Sources:
  UNL Extension (2020) Nebraska Crop Budgets. Nebraska Extension, University of Nebraska–Lincoln Institute of Agriculture and Natural Resources. https://cropwatch.unl.edu/budgets, https://cropwatch.unl.edu/Budgets/2020/2020-NE-crop-budget-intro.pdf; Klein R and McClure G (2021a) 2021 Nebraska Crop Budgets EC872 - Dryland Corn. Nebraska Extension - Institute of Agriculture and Natural Resources, Universoty of Nebraska-Lincoln. https://cropwatch.unl.edu/Budgets/2021/2021-Corn-Dryland-121620.pdf; Klein R and McClure G (2021b) 2021 Nebraska Crop Budgets EC872 - Irrigated Corn. Nebraska Extension - Institute of Agriculture and Natural Resources, Universoty of Nebraska-Lincoln. https://cropwatch.unl.edu/Budgets/2021/2021-Corn-Irrigated-121620.pdf; CTIC (2020a) OpTIS - Operational Tillage Information System. Conservation Technology Information Center (CTIC). https://www.ctic.org/optis_tabular_queryaccessed March 23, 2021
- planting, by no till drill: 1.55853e-5 ha; lognormal variance with pedigree 0.0206, pedigree (4,4,3,1,3)
  1.56E-5 ha/kg planting (0.181 effective pass(es) per year).
  Field operations are as identified in crop- and rotation-specific enterprise crop budgets supplied by the regional agricultural extension office and matched to equipment type in the budget or crop guidance. Operations are matched to equipment type and where multiple options are available, the share of each is determined from guidance and annual farmer survey data (Custom Rate Summaries) for contracted operations/equipment. Field cultivation and tillage operations are specific to the tillage regime used. The rotation pattern also dictates some tillage patterns, captured in the GIS data for tillage shares. Maize cultivation is 74% reduced till, 18% conventional tillage, and 8% no till in Nebraska (CTIC 2020a). Sowing with till and no-till planters based on share of field type. Planting on no till fields only.
  Sources:
  UNL Extension (2020) Nebraska Crop Budgets. Nebraska Extension, University of Nebraska–Lincoln Institute of Agriculture and Natural Resources. https://cropwatch.unl.edu/budgets, https://cropwatch.unl.edu/Budgets/2020/2020-NE-crop-budget-intro.pdf; Klein R and McClure G (2021a) 2021 Nebraska Crop Budgets EC872 - Dryland Corn. Nebraska Extension - Institute of Agriculture and Natural Resources, Universoty of Nebraska-Lincoln. https://cropwatch.unl.edu/Budgets/2021/2021-Corn-Dryland-121620.pdf; Klein R and McClure G (2021b) 2021 Nebraska Crop Budgets EC872 - Irrigated Corn. Nebraska Extension - Institute of Agriculture and Natural Resources, Universoty of Nebraska-Lincoln. https://cropwatch.unl.edu/Budgets/2021/2021-Corn-Irrigated-121620.pdf; CTIC (2020a) OpTIS - Operational Tillage Information System. Conservation Technology Information Center (CTIC). https://www.ctic.org/optis_tabular_queryaccessed March 23, 2021
- planting, by row crop planter: 6.95137e-6 ha; lognormal variance with pedigree 0.0206, pedigree (4,4,3,1,3)
  6.95E-6 ha/kg planting (0.081 effective pass(es) per year).
  Field operations are as identified in crop- and rotation-specific enterprise crop budgets supplied by the regional agricultural extension office and matched to equipment type in the budget or crop guidance. Operations are matched to equipment type and where multiple options are available, the share of each is determined from guidance and annual farmer survey data (Custom Rate Summaries) for contracted operations/equipment. Field cultivation and tillage operations are specific to the tillage regime used. The rotation pattern also dictates some tillage patterns, captured in the GIS data for tillage shares. Maize cultivation is 74% reduced till, 18% conventional tillage, and 8% no till in Nebraska (CTIC 2020a). Sowing with till and no-till planters based on share of field type. Planting on conventionally tilled fields only.
  Sources:
  UNL Extension (2020) Nebraska Crop Budgets. Nebraska Extension, University of Nebraska–Lincoln Institute of Agriculture and Natural Resources. https://cropwatch.unl.edu/budgets, https://cropwatch.unl.edu/Budgets/2020/2020-NE-crop-budget-intro.pdf; Klein R and McClure G (2021a) 2021 Nebraska Crop Budgets EC872 - Dryland Corn. Nebraska Extension - Institute of Agriculture and Natural Resources, Universoty of Nebraska-Lincoln. https://cropwatch.unl.edu/Budgets/2021/2021-Corn-Dryland-121620.pdf; Klein R and McClure G (2021b) 2021 Nebraska Crop Budgets EC872 - Irrigated Corn. Nebraska Extension - Institute of Agriculture and Natural Resources, Universoty of Nebraska-Lincoln. https://cropwatch.unl.edu/Budgets/2021/2021-Corn-Irrigated-121620.pdf; CTIC (2020a) OpTIS - Operational Tillage Information System. Conservation Technology Information Center (CTIC). https://www.ctic.org/optis_tabular_queryaccessed March 23, 2021
- potassium nitrate: 0.00208312 kg; normal variance with pedigree 1.85509e-8, pedigree (2,1,2,1,1)
  2.08E-3 kg potassium nitrate/kg maize grain
  Quantities of specific fertilisers are calculated based on US fertiliser market share and nutrient compositions from the International Fertilizer Association data to supply N to meet total nutrient demand N-P-K-S: 171.01--41.14--13.48--9.8 kg/ha (USDA NASS data for 2014, 2016, 2018, 2021; reflects average over all rotations and tillage regimes) over reported cropped area of specified crop (includes all rotation patterns), meeting N demand with the IFA mix and any remaining P, K, and S demands with other fertilisers balanced to avoid exceeding other demands by more than 1%. Quantity of specific fertiliser calculated from: quantity of N applied to treated acres times percent of planted maize acres treated (USDA NASS) times share of N supplied by compound in U.S. consumption mix (ecoinvent and International Fertilizer Association 2019) times mass compound per mass N in compound.
  Sources:
  USDA NASS (2021f) CORN - APPLICATIONS, MEASURED IN LB / ACRE / YEAR, AVG and NUMBER / YEAR (fertilizer and pesticides, amount, number of applications) - 2000-2021. US Department of Agriculture (USDA) National Agricultural Statistics Service. https://quickstats.nass.usda.gov (direct query: https://quickstats.nass.usda.gov/results/5BCE1263-5F91-31A9-B3DE-117AFBDDFF20); USDA ERS Fertilizer and Price Data, updated 10/30/2019. https://www.ers.usda.gov/data-products/fertilizer-use-and-price/ USDA ERS. (2019). Table 9. Percent of corn acreage receiving nitrogen fertilizer, selected States. Fertilizer Use and Price Report. US Department of Agriculture (USDA) Economic Research Service (ERS). https://www.ers.usda.gov/data-products/fertilizer-use-and-price.aspx.
  USDA ERS. (2019). Table 10. Nitrogen used on corn, rate per fertilized acre receiving nitrogen, selected States. Fertilizer Use and Price Report. US Department of Agriculture (USDA) Economic Research Service (ERS). https://www.ers.usda.gov/data-products/fertilizer-use-and-price.aspx; Ecoinvent U.S. consumption mix for N fertilisers, from IFA data; IFA (2021) Nutrient content in percentage - IFA Fertilizer Converter. International Fertilizer Association. https://www.ifastat.org/converter/fertilizer-converter/accessed 2021-06-24
  properties: dry mass 1 kg, wet mass 1 kg
- pyrethroid-compound: 1.3549e-6 kg; normal variance with pedigree 1.06007e-14, pedigree (1,2,2,1,1)
  Proxy for production of Bifenthrin (1.352E-02 kg/ha {1,2,1,1,1}).
  Average over state-wide reported cropped area of maize grain for all tillage practices (CTIC 2020a) and across all rotation patterns (Socolar et al 2021) - calculated from specified herbicide/insecticide/fungicide quantity applied to treated acres weighted by share of acres treated with that herbicide/insecticide/fungicide (2014, 2016, 2018, 2021 - USDA NASS data, USDA NASS 2021f, USDA NASS 2021g).
  Sources:
  CTIC (2020a) OpTIS - Operational Tillage Information System. Conservation Technology Information Center (CTIC). https://www.ctic.org/optis_tabular_queryaccessed March 23, 2021
  Socolar Y, Goldstein B R, de Valpine P, Bowles T M (2021) Biophysical and policy factors predict simplified crop rotations in the US Midwest. Environ. Res. Lett. 16 054045. . https://iopscience.iop.org/article/10.1088/1748-9326/abf9ca
  USDA NASS (2021f) CORN - APPLICATIONS, MEASURED IN LB / ACRE / YEAR, AVG and NUMBER / YEAR (fertilizer and pesticides, amount, number of applications) - 2000-2021. US Department of Agriculture (USDA) National Agricultural Statistics Service. https://quickstats.nass.usda.gov (direct query: https://quickstats.nass.usda.gov/results/5BCE1263-5F91-31A9-B3DE-117AFBDDFF20)
  USDA NASS (2021g) CORN - TREATED, MEASURED IN PCT OF AREA PLANTED, AVG (fertilizer and pesticides, including chemigation) - 2000-2021. US Department of Agriculture (USDA) National Agricultural Statistics Service. https://quickstats.nass.usda.gov (direct query: https://quickstats.nass.usda.gov/results/C3A3CFC4-4341-3093-A3D2-544FBC852EF6)
  properties: carbon content, fossil 0.623, dry mass 1 kg, wet mass 1 kg
- solid manure loading and spreading, by hydraulic loader and spreader: 0.0836051 kg; lognormal variance with pedigree 0.090625, pedigree (4,4,5,2,4)
  971.434 kg/ha (8.36E-2 kg/kg maize grain) solid manure loading and spreading, by hydraulic loader and spreader
  The total effective manure application rate of 973 kg/ha (0.084 kg/kg maize grain) is calculated from USDA ERS data for amount of manure applied (17.2 T/ha; 1.48 kg/kg maize grain) on share of crop area treated (5.7%) (years available: 2005, 2010) (USDA ARMS 2015a). The manure data has significant uncertainty due to both the age of the available data and the statistical limitations imposed by confidentiality for USDA survey respondents.
  About % of applied manure is in liquid form, calculated from the share of dry, semi-dry and slurry and lagoon manure applied from ARMS data. 100% of manure from cattle. The state's USDA manure table shows zero share from either swine or poultry manures.
  Cattle manure is apportioned between solid and liquid consistent with USDA esimtated shares.
  The calculated solid and liquid manure shares in this dataset are thus 0.1% solid and 99.9% liquid manure. The effective application rates are 971.4 kg solid manure per ha (9.9E-8 kg/kg maize grain) and . m3 liquid manure per ha (9.9E-8 m3/kg maize grain).
  Field operations are as identified in crop- and rotation-specific enterprise crop budgets supplied by the regional agricultural extension office and matched to equipment type in the budget or crop guidance. (UNL Extension 2020, Klein R and McClure G 2021a, Klein R and McClure G 2021b). Operations are matched to equipment type and where multiple options are available, the share of each is determined from guidance and annual farmer survey data (Custom Rate Summaries) for contracted operations/equipment. Where an operation applies only to a portion of the harvested area, the number of passes has been scaled by the % of harvested area to which it applies (e.g., manure spreading or insecticide) as indicated by USDA statistics (applications) or USDA reports (manure use) or as otherwise indicated in enterprise crop budgets.
  Source(s):
  USDA ARMS (2015a) Agricultural Resource Management Survey (ARMS) Farm Financial and Crop Production Practices: Manure Table, Corn. USDA. https://data.ers.usda.gov/reports.aspx?ID=17883
  Beegle D and Peters J. (2019) Common Manure Test Results Conversions. National Cooperative Extension Resource, Livestock And Poultry Environmental Learning Community (Lpelc). https://lpelc.org/common-manure-test-results-conversions/accessed October 5, 2021
  Wilson M (2021) Manure Characteristics. University of Minnesota Extension. https://extension.umn.edu/manure-management/manure-characteristics; https://drive.google.com/file/d/1-c8bx_75YSsQZTNFB_YFVD-uw_SbX1dB/view?usp=sharing
  UNL Extension (2020) Nebraska Crop Budgets. Nebraska Extension, University of Nebraska–Lincoln Institute of Agriculture and Natural Resources. https://cropwatch.unl.edu/budgets, https://cropwatch.unl.edu/Budgets/2020/2020-NE-crop-budget-intro.pdf; Klein R and McClure G (2021a) 2021 Nebraska Crop Budgets EC872 - Dryland Corn. Nebraska Extension - Institute of Agriculture and Natural Resources, Universoty of Nebraska-Lincoln. https://cropwatch.unl.edu/Budgets/2021/2021-Corn-Dryland-121620.pdf; Klein R and McClure G (2021b) 2021 Nebraska Crop Budgets EC872 - Irrigated Corn. Nebraska Extension - Institute of Agriculture and Natural Resources, Universoty of Nebraska-Lincoln. https://cropwatch.unl.edu/Budgets/2021/2021-Corn-Irrigated-121620.pdf
- tillage, cultivating, by strip tiller: 6.35268e-5 ha; lognormal variance with pedigree 0.0206, pedigree (4,4,3,1,3)
  6.35E-5 ha/kg tillage, cultivating, by strip tiller (0.738 effective pass(es) per year).
  Field operations are as identified in crop- and rotation-specific enterprise crop budgets supplied by the regional agricultural extension office and matched to equipment type in the budget or crop guidance. Operations are matched to equipment type and where multiple options are available, the share of each is determined from guidance and annual farmer survey data (Custom Rate Summaries) for contracted operations/equipment. Field cultivation and tillage operations are specific to the tillage regime used. The rotation pattern also dictates some tillage patterns, captured in the GIS data for tillage shares. Maize cultivation is 74% reduced till, 18% conventional tillage, and 8% no till in Nebraska (CTIC 2020a). This operation applies to reduced till fields only.
  Sources:
  UNL Extension (2020) Nebraska Crop Budgets. Nebraska Extension, University of Nebraska–Lincoln Institute of Agriculture and Natural Resources. https://cropwatch.unl.edu/budgets, https://cropwatch.unl.edu/Budgets/2020/2020-NE-crop-budget-intro.pdf; Klein R and McClure G (2021a) 2021 Nebraska Crop Budgets EC872 - Dryland Corn. Nebraska Extension - Institute of Agriculture and Natural Resources, Universoty of Nebraska-Lincoln. https://cropwatch.unl.edu/Budgets/2021/2021-Corn-Dryland-121620.pdf; Klein R and McClure G (2021b) 2021 Nebraska Crop Budgets EC872 - Irrigated Corn. Nebraska Extension - Institute of Agriculture and Natural Resources, Universoty of Nebraska-Lincoln. https://cropwatch.unl.edu/Budgets/2021/2021-Corn-Irrigated-121620.pdf; CTIC (2020a) OpTIS - Operational Tillage Information System. Conservation Technology Information Center (CTIC). https://www.ctic.org/optis_tabular_queryaccessed March 23, 2021
- tillage, cultivating, chiselling: 6.95137e-6 ha; lognormal variance with pedigree 0.0206, pedigree (4,4,3,1,3)
  6.95E-6 ha/kg tillage, cultivating, chiselling (0.081 effective pass(es) per year).
  Field operations are as identified in crop- and rotation-specific enterprise crop budgets supplied by the regional agricultural extension office and matched to equipment type in the budget or crop guidance. Operations are matched to equipment type and where multiple options are available, the share of each is determined from guidance and annual farmer survey data (Custom Rate Summaries) for contracted operations/equipment. Field cultivation and tillage operations are specific to the tillage regime used. The rotation pattern also dictates some tillage patterns, captured in the GIS data for tillage shares. Maize cultivation is 74% reduced till, 18% conventional tillage, and 8% no till in Nebraska (CTIC 2020a). This operation applies only to conventionaly tilled fields.
  Sources:
  UNL Extension (2020) Nebraska Crop Budgets. Nebraska Extension, University of Nebraska–Lincoln Institute of Agriculture and Natural Resources. https://cropwatch.unl.edu/budgets, https://cropwatch.unl.edu/Budgets/2020/2020-NE-crop-budget-intro.pdf; Klein R and McClure G (2021a) 2021 Nebraska Crop Budgets EC872 - Dryland Corn. Nebraska Extension - Institute of Agriculture and Natural Resources, Universoty of Nebraska-Lincoln. https://cropwatch.unl.edu/Budgets/2021/2021-Corn-Dryland-121620.pdf; Klein R and McClure G (2021b) 2021 Nebraska Crop Budgets EC872 - Irrigated Corn. Nebraska Extension - Institute of Agriculture and Natural Resources, Universoty of Nebraska-Lincoln. https://cropwatch.unl.edu/Budgets/2021/2021-Corn-Irrigated-121620.pdf; CTIC (2020a) OpTIS - Operational Tillage Information System. Conservation Technology Information Center (CTIC). https://www.ctic.org/optis_tabular_queryaccessed March 23, 2021
- tillage, disking: 6.95137e-6 ha; lognormal variance with pedigree 0.0206, pedigree (4,4,3,1,3)
  6.95E-6 ha/kg tillage, disking (0.081 effective pass(es) per year).
  Field operations are as identified in crop- and rotation-specific enterprise crop budgets supplied by the regional agricultural extension office and matched to equipment type in the budget or crop guidance. Operations are matched to equipment type and where multiple options are available, the share of each is determined from guidance and annual farmer survey data (Custom Rate Summaries) for contracted operations/equipment. Field cultivation and tillage operations are specific to the tillage regime used. The rotation pattern also dictates some tillage patterns, captured in the GIS data for tillage shares. Maize cultivation is 74% reduced till, 18% conventional tillage, and 8% no till in Nebraska (CTIC 2020a). This operation applies only to conventionaly tilled fields.
  Sources:
  UNL Extension (2020) Nebraska Crop Budgets. Nebraska Extension, University of Nebraska–Lincoln Institute of Agriculture and Natural Resources. https://cropwatch.unl.edu/budgets, https://cropwatch.unl.edu/Budgets/2020/2020-NE-crop-budget-intro.pdf; Klein R and McClure G (2021a) 2021 Nebraska Crop Budgets EC872 - Dryland Corn. Nebraska Extension - Institute of Agriculture and Natural Resources, Universoty of Nebraska-Lincoln. https://cropwatch.unl.edu/Budgets/2021/2021-Corn-Dryland-121620.pdf; Klein R and McClure G (2021b) 2021 Nebraska Crop Budgets EC872 - Irrigated Corn. Nebraska Extension - Institute of Agriculture and Natural Resources, Universoty of Nebraska-Lincoln. https://cropwatch.unl.edu/Budgets/2021/2021-Corn-Irrigated-121620.pdf; CTIC (2020a) OpTIS - Operational Tillage Information System. Conservation Technology Information Center (CTIC). https://www.ctic.org/optis_tabular_queryaccessed March 23, 2021

- tillage, field cultivator: 0.000172127 ha; lognormal variance with pedigree 0.0206, pedigree (4,4,3,1,3)
  1.72E-4 ha/kg tillage, field cultivator (2. effective pass(es) per year).
  Field operations are as identified in crop- and rotation-specific enterprise crop budgets supplied by the regional agricultural extension office and matched to equipment type in the budget or crop guidance. Operations are matched to equipment type and where multiple options are available, the share of each is determined from guidance and annual farmer survey data (Custom Rate Summaries) for contracted operations/equipment. Field cultivation and tillage operations are specific to the tillage regime used. The rotation pattern also dictates some tillage patterns, captured in the GIS data for tillage shares. Maize cultivation is 74% reduced till, 18% conventional tillage, and 8% no till in Nebraska (CTIC 2020a). This operation applies to fields under all tillage regimes.
  Sources:
  UNL Extension (2020) Nebraska Crop Budgets. Nebraska Extension, University of Nebraska–Lincoln Institute of Agriculture and Natural Resources. https://cropwatch.unl.edu/budgets, https://cropwatch.unl.edu/Budgets/2020/2020-NE-crop-budget-intro.pdf; Klein R and McClure G (2021a) 2021 Nebraska Crop Budgets EC872 - Dryland Corn. Nebraska Extension - Institute of Agriculture and Natural Resources, Universoty of Nebraska-Lincoln. https://cropwatch.unl.edu/Budgets/2021/2021-Corn-Dryland-121620.pdf; Klein R and McClure G (2021b) 2021 Nebraska Crop Budgets EC872 - Irrigated Corn. Nebraska Extension - Institute of Agriculture and Natural Resources, Universoty of Nebraska-Lincoln. https://cropwatch.unl.edu/Budgets/2021/2021-Corn-Irrigated-121620.pdf; CTIC (2020a) OpTIS - Operational Tillage Information System. Conservation Technology Information Center (CTIC). https://www.ctic.org/optis_tabular_queryaccessed March 23, 2021
- urea: 0.00812023 kg; normal variance with pedigree 2.81885e-7, pedigree (2,1,2,1,1)
  8.12E-3 kg urea/kg maize grain
  Quantities of specific fertilisers are calculated based on US fertiliser market share and nutrient compositions from the International Fertilizer Association data to supply N to meet total nutrient demand N-P-K-S: 171.01--41.14--13.48--9.8 kg/ha (USDA NASS data for 2014, 2016, 2018, 2021; reflects average over all rotations and tillage regimes) over reported cropped area of specified crop (includes all rotation patterns), meeting N demand with the IFA mix and any remaining P, K, and S demands with other fertilisers balanced to avoid exceeding other demands by more than 1%. Quantity of specific fertiliser calculated from: quantity of N applied to treated acres times percent of planted maize acres treated (USDA NASS) times share of N supplied by compound in U.S. consumption mix (ecoinvent and International Fertilizer Association 2019) times mass compound per mass N in compound.
  Sources:
  USDA NASS (2021f) CORN - APPLICATIONS, MEASURED IN LB / ACRE / YEAR, AVG and NUMBER / YEAR (fertilizer and pesticides, amount, number of applications) - 2000-2021. US Department of Agriculture (USDA) National Agricultural Statistics Service. https://quickstats.nass.usda.gov (direct query: https://quickstats.nass.usda.gov/results/5BCE1263-5F91-31A9-B3DE-117AFBDDFF20); USDA ERS Fertilizer and Price Data, updated 10/30/2019. https://www.ers.usda.gov/data-products/fertilizer-use-and-price/ USDA ERS. (2019). Table 9. Percent of corn acreage receiving nitrogen fertilizer, selected States. Fertilizer Use and Price Report. US Department of Agriculture (USDA) Economic Research Service (ERS). https://www.ers.usda.gov/data-products/fertilizer-use-and-price.aspx.
  USDA ERS. (2019). Table 10. Nitrogen used on corn, rate per fertilized acre receiving nitrogen, selected States. Fertilizer Use and Price Report. US Department of Agriculture (USDA) Economic Research Service (ERS). https://www.ers.usda.gov/data-products/fertilizer-use-and-price.aspx; Ecoinvent U.S. consumption mix for N fertilisers, from IFA data; IFA (2021) Nutrient content in percentage - IFA Fertilizer Converter. International Fertilizer Association. https://www.ifastat.org/converter/fertilizer-converter/accessed 2021-06-24
  properties: carbon content, fossil 0.2, dry mass 1 kg, wet mass 1 kg
- urea ammonium nitrate mix: 0.0136947 kg; normal variance with pedigree 8.0175e-7, pedigree (2,1,2,1,1)
  1.37E-2 kg urea ammonium nitrate mix/kg maize grain
  Quantities of specific fertilisers are calculated based on US fertiliser market share and nutrient compositions from the International Fertilizer Association data to supply N to meet total nutrient demand N-P-K-S: 171.01--41.14--13.48--9.8 kg/ha (USDA NASS data for 2014, 2016, 2018, 2021; reflects average over all rotations and tillage regimes) over reported cropped area of specified crop (includes all rotation patterns), meeting N demand with the IFA mix and any remaining P, K, and S demands with other fertilisers balanced to avoid exceeding other demands by more than 1%. Quantity of specific fertiliser calculated from: quantity of N applied to treated acres times percent of planted maize acres treated (USDA NASS) times share of N supplied by compound in U.S. consumption mix (ecoinvent and International Fertilizer Association 2019) times mass compound per mass N in compound.
  Sources:
  USDA NASS (2021f) CORN - APPLICATIONS, MEASURED IN LB / ACRE / YEAR, AVG and NUMBER / YEAR (fertilizer and pesticides, amount, number of applications) - 2000-2021. US Department of Agriculture (USDA) National Agricultural Statistics Service. https://quickstats.nass.usda.gov (direct query: https://quickstats.nass.usda.gov/results/5BCE1263-5F91-31A9-B3DE-117AFBDDFF20); USDA ERS Fertilizer and Price Data, updated 10/30/2019. https://www.ers.usda.gov/data-products/fertilizer-use-and-price/ USDA ERS. (2019). Table 9. Percent of corn acreage receiving nitrogen fertilizer, selected States. Fertilizer Use and Price Report. US Department of Agriculture (USDA) Economic Research Service (ERS). https://www.ers.usda.gov/data-products/fertilizer-use-and-price.aspx.
  USDA ERS. (2019). Table 10. Nitrogen used on corn, rate per fertilized acre receiving nitrogen, selected States. Fertilizer Use and Price Report. US Department of Agriculture (USDA) Economic Research Service (ERS). https://www.ers.usda.gov/data-products/fertilizer-use-and-price.aspx; Ecoinvent U.S. consumption mix for N fertilisers, from IFA data; IFA (2021) Nutrient content in percentage - IFA Fertilizer Converter. International Fertilizer Association. https://www.ifastat.org/converter/fertilizer-converter/accessed 2021-06-24
  properties: carbon content, fossil 0.0879977, dry mass 0.75 kg, hydrogen content 0.095042, nitrogen content 0.401231, oxygen content 0.749063, water content 0.333333, wet mass 1 kg
  note on carbon content, fossil: Carbon content, fossil is calculated based on the chemical formula of the substance.
  note on hydrogen content: Hydrogen content (on a dry matter basis) of urea ammonium nitrate mix is calculated from the molecular formula of the substance (CH6N4O4).
  note on nitrogen content: Nitrogen content (on a dry matter basis) of urea ammonium nitrate mix is calculated from the molecular formula of the substance (CH6N4O4).
  note on oxygen content: Oxygen content (on a dry matter basis) of urea ammonium nitrate mix is calculated from the molecular formula of the substance (CH6N4O4).
- waste polyethylene: -0.103739 kg; name waste_pe; = packaging_f+packaging_p; lognormal variance with pedigree 0.002625, pedigree (2,3,2,2,2)
  This waste is derived from the sum of packaging of pesticide and fertilizer.
  production volume; = waste_pe*pv_maize
    Calculated from production volume of reference product using the relative outputs.
  properties: carbon content, fossil 0.825301, dry mass 0.996 kg, heating value, net 42.47 MJ, water content 0.00401606, wet mass 1 kg
  note on carbon content, fossil: C content in 1 kg DM was calculated using data in Tab A.1, ecoinvent v2.2 report 13_I
  note on heating value, net: Value taken from the general comment of the treatment dataset.

## Inputs from nature
- Carbon dioxide, in air [natural resource, in air]: 1.38197 kg; lognormal variance with pedigree 0.0015, pedigree (2,2,2,1,1)
  (same comment as for maize grain)
- Energy, gross calorific value, in biomass [natural resource, biotic]: 14.9906 MJ; lognormal variance with pedigree 0.1235, pedigree (3,3,2,3,5)
  (same comment as for maize grain)
- Occupation, annual crop, irrigated [natural resource, land]: 0.49737 m2*year; lognormal variance with pedigree 0.0029, pedigree (2,2,2,1,1)
  Land occupation per year (annual growing season). Land is under rotation with other annual crop production (~80% corn-soy, ~20% corn-corn, Socolar et al 2021). US NRCS data indicates that total cropland in Nebraska has expanded 4% over the last 20 years, 14% of which was supplied by conversion of pasture, range and forest land, the remainder from land idled under the Conservation Reserve Program (CRP) (NRCS 2020b).
  Annual production is 45.2 million tonnes from 2017-2021 on 3.9 million ha planted and 3.8 million ha harvested (USDA NASS 2021d). Thus occupation is 0.86 ha/t or 8,606.35 m2/t (0.8606 m2/kg). This overall land use is split into irrigated (57.79%) and non-irrigated (42.21%) based on agricultural census data (USDA NASS 2021d) (4.97E-1 m2 planted/kg harvested maize of irrigated land, and 3.63E-1 m2 planted/kg harvested maize of non-irrigated land).
  Sources:
  USDA NASS (2021d) Area, Production, Yield by State - Corn - 2010-2021. US Department of Agriculture (USDA) National Agricultural Statistics Service. https://quickstats.nass.usda.gov (direct query: https://quickstats.nass.usda.gov/results/331F88CC-004E-34D2-B825-F8F65DAC7879)
  NRCS (2020b) Land Cover/use of non-Federal rural land, by State and year, in the 2017 National Resources Inventory. USDA, Natural Resources Conservation Service. http://www.nrcs.usda.gov/Internet/NRCS_RCA/reports/nri_crop_nat.html, https://www.nrcs.usda.gov/wps/portal/nrcs/rca/national/technical/nra/rca/text/#NRI%20Cropland
  Socolar Y, Goldstein B R, de Valpine P, Bowles T M (2021) Biophysical and policy factors predict simplified crop rotations in the US Midwest. Environ. Res. Lett. 16 054045. . https://iopscience.iop.org/article/10.1088/1748-9326/abf9ca
- Occupation, annual crop, non-irrigated [natural resource, land]: 0.363266 m2*year; lognormal variance with pedigree 0.0029, pedigree (2,2,2,1,1)
  (same comment as for Occupation, annual crop, irrigated)
- Transformation, from annual crop, irrigated [natural resource, land]: 0.49737 m2; lognormal variance with pedigree 0.0089, pedigree (2,2,2,1,1)
  Transformation of land for planting. Land is under rotation with other annual crop production (~80% corn-soy, ~20% corn-corn, Socolar et al 2021). US NRCS data indicates that total cropland in Nebraska has expanded 4% over the last 20 years, 14% of which was supplied by conversion of pasture, range and forest land, the remainder from land idled under the Conservation Reserve Program (CRP) (NRCS 2020b).
  Annual production is 45.2 million tonnes from 2017-2021 on 3.9 million ha planted and 3.8 million ha harvested (USDA NASS 2021d). Thus occupation is 0.86 ha/t or 8,606.35 m2/t (0.8606 m2/kg). This overall land use is split into irrigated (57.79%) and non-irrigated (42.21%) based on agricultural census data (USDA NASS 2021d) (4.97E-1 m2 planted/kg harvested maize of irrigated land, and 3.63E-1 m2 planted/kg harvested maize of non-irrigated land).
  Sources:
  USDA NASS (2021d) Area, Production, Yield by State - Corn - 2010-2021. US Department of Agriculture (USDA) National Agricultural Statistics Service. https://quickstats.nass.usda.gov (direct query: https://quickstats.nass.usda.gov/results/331F88CC-004E-34D2-B825-F8F65DAC7879)
  NRCS (2020b) Land Cover/use of non-Federal rural land, by State and year, in the 2017 National Resources Inventory. USDA, Natural Resources Conservation Service. http://www.nrcs.usda.gov/Internet/NRCS_RCA/reports/nri_crop_nat.html, https://www.nrcs.usda.gov/wps/portal/nrcs/rca/national/technical/nra/rca/text/#NRI%20Cropland
  Socolar Y, Goldstein B R, de Valpine P, Bowles T M (2021) Biophysical and policy factors predict simplified crop rotations in the US Midwest. Environ. Res. Lett. 16 054045. . https://iopscience.iop.org/article/10.1088/1748-9326/abf9ca
- Transformation, from annual crop, non-irrigated [natural resource, land]: 0.363266 m2; lognormal variance with pedigree 0.0089, pedigree (2,2,2,1,1)
  (same comment as for Transformation, from annual crop, irrigated)
- Transformation, to annual crop, irrigated [natural resource, land]: 0.49737 m2; lognormal variance with pedigree 0.0089, pedigree (2,2,2,1,1)
  (same comment as for Transformation, from annual crop, irrigated)
- Transformation, to annual crop, non-irrigated [natural resource, land]: 0.363266 m2; lognormal variance with pedigree 0.0089, pedigree (2,2,2,1,1)
  (same comment as for Transformation, from annual crop, irrigated)
## Emissions to nature
- Ammonia [air, non-urban air or from high stacks]: 0.00156411 kg; lognormal variance with pedigree 0.0172, pedigree (2,3,4,1,1)
  Ammonia volatilised from applied mineral and organic fertilisers, 18.2 kg NH3/ha (1.56E-3kg NH3/kg maize grain) total, 15.5 kg NH3/ha (1.56E-3 kg NH3/kg maize grain) from synthetic fertilisers, 2.7 kg NH3/ha (2.31E-4 kg NH3/kg maize grain) from manure. NH3 from volatilisation of mineral fertilisers is calculated using Tier 2 emission factors (temperate climate, specific fertiliser) from the European Environment Agency, EMEP/EEA 3Da1, Table3.2 (EEA 2019). NH3 from manure application is calculated with emission factors provided in EMEP/EEA 3.D.a.2.a (Animal manure applied to soils) (EEA 2019) for manure types used as (fraction TAN in total N)*(EF manure spreading per TAN) for each animal group and type. (kg NH3-N/kg N applied: cattle, solid: 0.474; cattle, liquid: 0.33). The emissions from manure calculated here do not account for the change in N mineralization and phosphate runoff with incorporation type or time. Where impacts from manure application are expected to be significant, this should be considered as N volatilisation during and after application of manure ranges from as low as 1% N with direct injection to ~5% with immediate incorporation to 20-40% without incorporation (Sawyer J, Mallarino A P (2016) Using Manure Nutrients for Crop Production. Cooperative Extension Service, Iowa State University of Science and Technology. https://store.extension.iastate.edu/product/12874and Midwast Plan Services MWPS-18, 3ed).. NH3 from volatilisation of mineral fertilisers is calculated using Tier 2 emission factors (temperate climate, specific fertiliser) from the European Environment Agency, EMEP/EEA 3Da1, Table3.2 (EEA 2019). NH3 from manure application is calculated with emission factors provided in EMEP/EEA 3.D.a.2.a (Animal manure applied to soils) (EEA 2019) for manure types used as (fraction TAN in total N)*(EF manure spreading per TAN) for each animal group and type. (kg NH3-N/kg N applied: cattle, solid: 0.474; cattle, liquid: 0.33). The emissions from manure calculated here do not account for the change in N mineralization and phosphate runoff with incorporation type or time. Where impacts from manure application are expected to be significant, this should be considered as N volatilisation during and after application of manure ranges from as low as 1% N with direct injection to ~5% with immediate incorporation to 20-40% without incorporation (Sawyer J, Mallarino A P (2016) Using Manure Nutrients for Crop Production. Cooperative Extension Service, Iowa State University of Science and Technology. https://store.extension.iastate.edu/product/12874and Midwast Plan Services MWPS-18, 3ed).
  Sources:
  EEA (2019a) EMEP/EEA air pollutant emission inventory guidebook Part B: sectoral guidance chapters 3. Agriculture 3 D Crop production and agricultural soils. European Environment Agency. https://www.eea.europa.eu/publications/emep-eea-guidebook-2019/part-b-sectoral-guidance-chapters/4-agriculture/3-d-crop-production-and/view
  EEA (2019b) EMEP/EEA air pollutant emission inventory guidebook Part B: sectoral guidance chapters 3. Agriculture 3 B Manure management. European Environment Agency. https://www.eea.europa.eu/publications/emep-eea-guidebook-2019/part-b-sectoral-guidance-chapters/4-agriculture/3-b-manure-management/view
- Carbon dioxide, fossil [air, non-urban air or from high stacks]: 0.00980366 kg; lognormal variance with pedigree 0.0092, pedigree (2,3,4,1,1)
  CO2 emissions from use of urea fertilisers and lime, 113.912 kg/ha (9.8E-3 kg/kg maize grain): 69.83 kg/ha from lime and 44.08 kg/ha from urea and urea ammonium nitrate.
  Emissions are calculated following the IPCC NIR Guidelines, §11.3 and §11.4, using IPCC NIR equations 11.12 (lime) and 11.13 (urea) (mass of lime/urea * emissions factor for lime/urea) with Tier 1 emissions factors (IPCC 2006b). EF limestone = 0.12 kg CO2-C/kg limestone (0.06-0.12, uniform) and EF urea = 0.2 kg CO2-C/kg urea (0.1-0.2, uniform) applied to both urea and the approximately 35% of UAN that is urea. The result is converted from kg CO2-C to kg CO2 (multiplying by the molar mass of CO2/mass of C in CO2 = 44.01/12)
  Sources: IPCC (2006a) 2006 IPCC Guidelines for National Greenhouse Gas Inventories - Chapter 11: N2O Emissions from Managed Soils, and CO2 Emissions from Lime and Urea Application in Volume 4: Agriculture, Forestry and Other Land Use. UN Intergovernmental Panel on Climate Change (IPCC). https://www.ipcc-nggip.iges.or.jp/public/2006gl/pdf/4_Volume4/V4_11_Ch11_N2O&CO2.pdf, https://www.ipcc-nggip.iges.or.jp/public/2006gl/
  IPCC (2019a) Chapter 11: N2O Emissions from Managed Soils, and CO2 Emissions from Lime and Urea Application in 2019 Refinement to the 2006 IPCC Guidelines for National Greenhouse Gas Inventories - Volume 4: Agriculture, Forestry and Other Land Use. UN Intergovernmental Panel on Climate Change (IPCC). https://www.ipcc-nggip.iges.or.jp/public/2019rf/pdf/4_Volume4/19R_V4_Ch11_Soils_N2O_CO2.pdf https://www.ipcc-nggip.iges.or.jp/public/2019rf/index.html, https://www.ipcc.ch/report/2019-refinement-to-the-2006-ipcc-guidelines-for-national-greenhouse-gas-inventories/
  IPCC (2006b) IPCC Guidelines for National Greenhouse Gas Inventories (Volumes 1, 2, and 4). UN Intergovernmental Panel on Climate Change (IPCC). https://www.ipcc-nggip.iges.or.jp/public/2006gl/index.html
  IPCC (2019b) 2019 Refinement to the 2006 IPCC Guidelines for National Greenhouse Gas Inventories (Volumes 1, 2, and 4). UN Intergovernmental Panel on Climate Change (IPCC). https://www.ipcc.ch/report/2019-refinement-to-the-2006-ipcc-guidelines-for-national-greenhouse-gas- inventories/ https://www.ipcc-nggip.iges.or.jp/public/2019rf/index.html.
  IPCC (2019c) Equation 11.1, Chapter 11: N2O Emissions from Managed Soils, and CO2 Emissions from Lime and Urea Application in 2019 Refinement to the 2006 IPCC Guidelines for National Greenhouse Gas Inventories - Volume 4: Agriculture, Forestry and Other Land Use. UN Intergovernmental Panel on Climate Change (IPCC). https://www.ipcc-nggip.iges.or.jp/public/2019rf/pdf/4_Volume4/19R_V4_Ch11_Soils_N2O_CO2.pdf https://www.ipcc-nggip.iges.or.jp/public/2019rf/index.html, https://www.ipcc.ch/report/2019-refinement-to-the-2006-ipcc-guidelines-for-national-greenhouse-gas-inventories/
  IPCC (2019d) Equation 11.2, Chapter 11: N2O Emissions from Managed Soils, and CO2 Emissions from Lime and Urea Application in 2019 Refinement to the 2006 IPCC Guidelines for National Greenhouse Gas Inventories - Volume 4: Agriculture, Forestry and Other Land Use. UN Intergovernmental Panel on Climate Change (IPCC). https://www.ipcc-nggip.iges.or.jp/public/2019rf/pdf/4_Volume4/19R_V4_Ch11_Soils_N2O_CO2.pdf https://www.ipcc-nggip.iges.or.jp/public/2019rf/index.html, https://www.ipcc.ch/report/2019-refinement-to-the-2006-ipcc-guidelines-for-national-greenhouse-gas-inventories/
  IPCC (2019e) Table 11.1(A), Chapter 11: N2O Emissions from Managed Soils, and CO2 Emissions from Lime and Urea Application in 2019 Refinement to the 2006 IPCC Guidelines for National Greenhouse Gas Inventories - Volume 4: Agriculture, Forestry and Other Land Use. UN Intergovernmental Panel on Climate Change (IPCC). https://www.ipcc-nggip.iges.or.jp/public/2019rf/pdf/4_Volume4/19R_V4_Ch11_Soils_N2O_CO2.pdf https://www.ipcc-nggip.iges.or.jp/public/2019rf/index.html, https://www.ipcc.ch/report/2019-refinement-to-the-2006-ipcc-guidelines-for-national-greenhouse-gas-inventories/
- Dinitrogen monoxide [air, non-urban air or from high stacks]: 0.000164907 kg; lognormal variance with pedigree 0.0392, pedigree (2,3,4,1,1)
  Direct and indirect N2O emissions from fertilizer and manure use and crop cultivation. direct emissions: 2.01 kgN2O/ha (1.65E-4 kg N2O/kg maize grain), 5.58E-2 kg N2O/ha from synthetic fertiliser N and 6.02E-4 kg N2O/ha from manure N, 1.26E+0kg N2O/ha from crop residues
  Emissions from run-off and leaching of N after direct volatilisation of NH3 are calculated using the IPCC National Greenhouse Gas Inventory Guidance (IPCC 2006a, 2019Ra) using Tier 1 and Tier 2 parameters. Direct N2O emissions are calculated using Tier 2 paramaters from Table equation 11.2 of the 2019Refinement to wi of the IPCC National Inventory Guidance, 2019 revision. including contributions from nutrient applications, with the Tier 2 emissions factors for wet climates (Table 11.1, IPCC 2019R) 0.016 kg N2O-N/kg fertiliser N applied (uniform range 0.013--0.019) and 0.006 kgN2O-N/kg manure N applied (uniform range 0.001--0.011)
  Sources:
  IPCC (2006a) 2006 IPCC Guidelines for National Greenhouse Gas Inventories - Chapter 11: N2O Emissions from Managed Soils, and CO2 Emissions from Lime and Urea Application in Volume 4: Agriculture, Forestry and Other Land Use. UN Intergovernmental Panel on Climate Change (IPCC). https://www.ipcc-nggip.iges.or.jp/public/2006gl/pdf/4_Volume4/V4_11_Ch11_N2O&CO2.pdf, https://www.ipcc-nggip.iges.or.jp/public/2006gl/
  IPCC (2019a) Chapter 11: N2O Emissions from Managed Soils, and CO2 Emissions from Lime and Urea Application in 2019 Refinement to the 2006 IPCC Guidelines for National Greenhouse Gas Inventories - Volume 4: Agriculture, Forestry and Other Land Use. UN Intergovernmental Panel on Climate Change (IPCC). https://www.ipcc-nggip.iges.or.jp/public/2019rf/pdf/4_Volume4/19R_V4_Ch11_Soils_N2O_CO2.pdf https://www.ipcc-nggip.iges.or.jp/public/2019rf/index.html, https://www.ipcc.ch/report/2019-refinement-to-the-2006-ipcc-guidelines-for-national-greenhouse-gas-inventories/
  IPCC (2006b) IPCC Guidelines for National Greenhouse Gas Inventories (Volumes 1, 2, and 4). UN Intergovernmental Panel on Climate Change (IPCC). https://www.ipcc-nggip.iges.or.jp/public/2006gl/index.html
  IPCC (2019b) 2019 Refinement to the 2006 IPCC Guidelines for National Greenhouse Gas Inventories (Volumes 1, 2, and 4). UN Intergovernmental Panel on Climate Change (IPCC). https://www.ipcc.ch/report/2019-refinement-to-the-2006-ipcc-guidelines-for-national-greenhouse-gas- inventories/ https://www.ipcc-nggip.iges.or.jp/public/2019rf/index.html.
  IPCC (2019c) Equation 11.1, Chapter 11: N2O Emissions from Managed Soils, and CO2 Emissions from Lime and Urea Application in 2019 Refinement to the 2006 IPCC Guidelines for National Greenhouse Gas Inventories - Volume 4: Agriculture, Forestry and Other Land Use. UN Intergovernmental Panel on Climate Change (IPCC). https://www.ipcc-nggip.iges.or.jp/public/2019rf/pdf/4_Volume4/19R_V4_Ch11_Soils_N2O_CO2.pdf https://www.ipcc-nggip.iges.or.jp/public/2019rf/index.html, https://www.ipcc.ch/report/2019-refinement-to-the-2006-ipcc-guidelines-for-national-greenhouse-gas-inventories/
  IPCC (2019d) Equation 11.2, Chapter 11: N2O Emissions from Managed Soils, and CO2 Emissions from Lime and Urea Application in 2019 Refinement to the 2006 IPCC Guidelines for National Greenhouse Gas Inventories - Volume 4: Agriculture, Forestry and Other Land Use. UN Intergovernmental Panel on Climate Change (IPCC). https://www.ipcc-nggip.iges.or.jp/public/2019rf/pdf/4_Volume4/19R_V4_Ch11_Soils_N2O_CO2.pdf https://www.ipcc-nggip.iges.or.jp/public/2019rf/index.html, https://www.ipcc.ch/report/2019-refinement-to-the-2006-ipcc-guidelines-for-national-greenhouse-gas-inventories/
  IPCC (2019e) Table 11.1(A), Chapter 11: N2O Emissions from Managed Soils, and CO2 Emissions from Lime and Urea Application in 2019 Refinement to the 2006 IPCC Guidelines for National Greenhouse Gas Inventories - Volume 4: Agriculture, Forestry and Other Land Use. UN Intergovernmental Panel on Climate Change (IPCC). https://www.ipcc-nggip.iges.or.jp/public/2019rf/pdf/4_Volume4/19R_V4_Ch11_Soils_N2O_CO2.pdf https://www.ipcc-nggip.iges.or.jp/public/2019rf/index.html, https://www.ipcc.ch/report/2019-refinement-to-the-2006-ipcc-guidelines-for-national-greenhouse-gas-inventories/
- Nitrogen oxides [air, non-urban air or from high stacks]: 0.000593909 kg; lognormal variance with pedigree 0.0392, pedigree (2,3,4,1,1)
  NOx emissions from fertilizer and manure nitrification after N loss from NH3, as NO2. 6.9E+0 kg NO2/ha (5.94E-4kg NO2/kg maize grain), 6.72E+0 kg NO2/ha from fertilisers; 1.79E-1 kg NO2/ha from manure). Calculated according to EEA/EMEP guidance, EF_NO_Managed Soils = 0.04 kg NO2/kg N fertiliser and manure N applied (range 0.005 to 0.104, 95% CL), from Table 3.1, Tier 1 EFs for source category 3.D, EMEP/EEA Guidebook 2019. The differences between NO emissions from different application type, soil organic carbon levels, drainage or soil pH are not accounted for here.
  Sources:
  EEA (2019a) EMEP/EEA air pollutant emission inventory guidebook Part B: sectoral guidance chapters 3. Agriculture 3 D Crop production and agricultural soils. European Environment Agency. https://www.eea.europa.eu/publications/emep-eea-guidebook-2019/part-b-sectoral-guidance-chapters/4-agriculture/3-d-crop-production-and/view
  EEA (2019b) EMEP/EEA air pollutant emission inventory guidebook Part B: sectoral guidance chapters 3. Agriculture 3 B Manure management. European Environment Agency. https://www.eea.europa.eu/publications/emep-eea-guidebook-2019/part-b-sectoral-guidance-chapters/4-agriculture/3-b-manure-management/view
- Water [air, non-urban air or from high stacks]: 0.0841149 m3; lognormal variance with pedigree 0.0015, pedigree (2,2,2,1,1)
  Irrigation water released to air via evapotranspiration. Calculated by the ecoinvent agricultural LCI tool.
- 2,4-D dimethylamine salt [soil, agricultural]: 3.36006e-6 kg; normal variance with pedigree 1.5101e-13, pedigree (2,2,2,1,1)
  2,4-D amines emission to agricultural soil (3.904E-02 kg/ha).
  Pesticides are assumed ultimately to be 100% emitted to soil (Nemecek et al 2015). Average over state-wide reported cropped area of maize grain for all tillage practices (CTIC 2020a) and across all rotation patterns (Socolar et al 2021) - calculated from specified herbicide/insecticide/fungicide quantity applied to treated acres weighted by share of acres treated with that herbicide/insecticide/fungicide (2014, 2016, 2018, 2021 - USDA NASS data, USDA NASS 2021f, USDA NASS 2021g).
  Sources:
  Nemecek T, Bengoa X, Lansche J, et al (2015) Methodological Guidelines for the Life Cycle Inventory of Agricultural Products, Version 3.0. 84.
  CTIC (2020a) OpTIS - Operational Tillage Information System. Conservation Technology Information Center (CTIC). https://www.ctic.org/optis_tabular_queryaccessed March 23, 2021
  Socolar Y, Goldstein B R, de Valpine P, Bowles T M (2021) Biophysical and policy factors predict simplified crop rotations in the US Midwest. Environ. Res. Lett. 16 054045. . https://iopscience.iop.org/article/10.1088/1748-9326/abf9ca
  USDA NASS (2021f) CORN - APPLICATIONS, MEASURED IN LB / ACRE / YEAR, AVG and NUMBER / YEAR (fertilizer and pesticides, amount, number of applications) - 2000-2021. US Department of Agriculture (USDA) National Agricultural Statistics Service. https://quickstats.nass.usda.gov (direct query: https://quickstats.nass.usda.gov/results/5BCE1263-5F91-31A9-B3DE-117AFBDDFF20)
  USDA NASS (2021g) CORN - TREATED, MEASURED IN PCT OF AREA PLANTED, AVG (fertilizer and pesticides, including chemigation) - 2000-2021. US Department of Agriculture (USDA) National Agricultural Statistics Service. https://quickstats.nass.usda.gov (direct query: https://quickstats.nass.usda.gov/results/C3A3CFC4-4341-3093-A3D2-544FBC852EF6)
- 2,4-D ester [soil, agricultural]: 7.00009e-6 kg; normal variance with pedigree 1.34908e-11, pedigree (2,2,2,1,1)
  2,4-D ester emission to agricultural soil (8.134E-02 kg/ha).
  Pesticides are assumed ultimately to be 100% emitted to soil (Nemecek et al 2015). Average over state-wide reported cropped area of maize grain for all tillage practices (CTIC 2020a) and across all rotation patterns (Socolar et al 2021) - calculated from specified herbicide/insecticide/fungicide quantity applied to treated acres weighted by share of acres treated with that herbicide/insecticide/fungicide (2014, 2016, 2018, 2021 - USDA NASS data, USDA NASS 2021f, USDA NASS 2021g).
  Sources:
  Nemecek T, Bengoa X, Lansche J, et al (2015) Methodological Guidelines for the Life Cycle Inventory of Agricultural Products, Version 3.0. 84.
  CTIC (2020a) OpTIS - Operational Tillage Information System. Conservation Technology Information Center (CTIC). https://www.ctic.org/optis_tabular_queryaccessed March 23, 2021
  Socolar Y, Goldstein B R, de Valpine P, Bowles T M (2021) Biophysical and policy factors predict simplified crop rotations in the US Midwest. Environ. Res. Lett. 16 054045. . https://iopscience.iop.org/article/10.1088/1748-9326/abf9ca
  USDA NASS (2021f) CORN - APPLICATIONS, MEASURED IN LB / ACRE / YEAR, AVG and NUMBER / YEAR (fertilizer and pesticides, amount, number of applications) - 2000-2021. US Department of Agriculture (USDA) National Agricultural Statistics Service. https://quickstats.nass.usda.gov (direct query: https://quickstats.nass.usda.gov/results/5BCE1263-5F91-31A9-B3DE-117AFBDDFF20)
  USDA NASS (2021g) CORN - TREATED, MEASURED IN PCT OF AREA PLANTED, AVG (fertilizer and pesticides, including chemigation) - 2000-2021. US Department of Agriculture (USDA) National Agricultural Statistics Service. https://quickstats.nass.usda.gov (direct query: https://quickstats.nass.usda.gov/results/C3A3CFC4-4341-3093-A3D2-544FBC852EF6)
- Acetochlor [soil, agricultural]: 4.32431e-5 kg; normal variance with pedigree 1.87653e-10, pedigree (2,2,2,1,1)
  Acetochlor emission to agricultural soil (5.025E-01 kg/ha).
  Pesticides are assumed ultimately to be 100% emitted to soil (Nemecek et al 2015). Average over state-wide reported cropped area of maize grain for all tillage practices (CTIC 2020a) and across all rotation patterns (Socolar et al 2021) - calculated from specified herbicide/insecticide/fungicide quantity applied to treated acres weighted by share of acres treated with that herbicide/insecticide/fungicide (2014, 2016, 2018, 2021 - USDA NASS data, USDA NASS 2021f, USDA NASS 2021g).
  Sources:
  Nemecek T, Bengoa X, Lansche J, et al (2015) Methodological Guidelines for the Life Cycle Inventory of Agricultural Products, Version 3.0. 84.
  CTIC (2020a) OpTIS - Operational Tillage Information System. Conservation Technology Information Center (CTIC). https://www.ctic.org/optis_tabular_queryaccessed March 23, 2021
  Socolar Y, Goldstein B R, de Valpine P, Bowles T M (2021) Biophysical and policy factors predict simplified crop rotations in the US Midwest. Environ. Res. Lett. 16 054045. . https://iopscience.iop.org/article/10.1088/1748-9326/abf9ca
  USDA NASS (2021f) CORN - APPLICATIONS, MEASURED IN LB / ACRE / YEAR, AVG and NUMBER / YEAR (fertilizer and pesticides, amount, number of applications) - 2000-2021. US Department of Agriculture (USDA) National Agricultural Statistics Service. https://quickstats.nass.usda.gov (direct query: https://quickstats.nass.usda.gov/results/5BCE1263-5F91-31A9-B3DE-117AFBDDFF20)
  USDA NASS (2021g) CORN - TREATED, MEASURED IN PCT OF AREA PLANTED, AVG (fertilizer and pesticides, including chemigation) - 2000-2021. US Department of Agriculture (USDA) National Agricultural Statistics Service. https://quickstats.nass.usda.gov (direct query: https://quickstats.nass.usda.gov/results/C3A3CFC4-4341-3093-A3D2-544FBC852EF6)
- Alachlor [soil, agricultural]: 4.95718e-5 kg; lognormal variance with pedigree 0.0339, pedigree (2,2,2,1,1)
  Alachlor emission to agricultural soil (5.760E-01 kg/ha).
  Pesticides are assumed ultimately to be 100% emitted to soil (Nemecek et al 2015). Average over state-wide reported cropped area of maize grain for all tillage practices (CTIC 2020a) and across all rotation patterns (Socolar et al 2021) - calculated from specified herbicide/insecticide/fungicide quantity applied to treated acres weighted by share of acres treated with that herbicide/insecticide/fungicide (2014, 2016, 2018, 2021 - USDA NASS data, USDA NASS 2021f, USDA NASS 2021g).
  Sources:
  Nemecek T, Bengoa X, Lansche J, et al (2015) Methodological Guidelines for the Life Cycle Inventory of Agricultural Products, Version 3.0. 84.
  CTIC (2020a) OpTIS - Operational Tillage Information System. Conservation Technology Information Center (CTIC). https://www.ctic.org/optis_tabular_queryaccessed March 23, 2021
  Socolar Y, Goldstein B R, de Valpine P, Bowles T M (2021) Biophysical and policy factors predict simplified crop rotations in the US Midwest. Environ. Res. Lett. 16 054045. . https://iopscience.iop.org/article/10.1088/1748-9326/abf9ca
  USDA NASS (2021f) CORN - APPLICATIONS, MEASURED IN LB / ACRE / YEAR, AVG and NUMBER / YEAR (fertilizer and pesticides, amount, number of applications) - 2000-2021. US Department of Agriculture (USDA) National Agricultural Statistics Service. https://quickstats.nass.usda.gov (direct query: https://quickstats.nass.usda.gov/results/5BCE1263-5F91-31A9-B3DE-117AFBDDFF20)
  USDA NASS (2021g) CORN - TREATED, MEASURED IN PCT OF AREA PLANTED, AVG (fertilizer and pesticides, including chemigation) - 2000-2021. US Department of Agriculture (USDA) National Agricultural Statistics Service. https://quickstats.nass.usda.gov (direct query: https://quickstats.nass.usda.gov/results/C3A3CFC4-4341-3093-A3D2-544FBC852EF6)
- Atrazine [soil, agricultural]: 6.6452e-5 kg; normal variance with pedigree 2.18593e-10, pedigree (2,2,2,1,1)
  Atrazine emission to agricultural soil (7.721E-01 kg/ha).
  Pesticides are assumed ultimately to be 100% emitted to soil (Nemecek et al 2015). Average over state-wide reported cropped area of maize grain for all tillage practices (CTIC 2020a) and across all rotation patterns (Socolar et al 2021) - calculated from specified herbicide/insecticide/fungicide quantity applied to treated acres weighted by share of acres treated with that herbicide/insecticide/fungicide (2014, 2016, 2018, 2021 - USDA NASS data, USDA NASS 2021f, USDA NASS 2021g).
  Sources:
  Nemecek T, Bengoa X, Lansche J, et al (2015) Methodological Guidelines for the Life Cycle Inventory of Agricultural Products, Version 3.0. 84.
  CTIC (2020a) OpTIS - Operational Tillage Information System. Conservation Technology Information Center (CTIC). https://www.ctic.org/optis_tabular_queryaccessed March 23, 2021
  Socolar Y, Goldstein B R, de Valpine P, Bowles T M (2021) Biophysical and policy factors predict simplified crop rotations in the US Midwest. Environ. Res. Lett. 16 054045. . https://iopscience.iop.org/article/10.1088/1748-9326/abf9ca
  USDA NASS (2021f) CORN - APPLICATIONS, MEASURED IN LB / ACRE / YEAR, AVG and NUMBER / YEAR (fertilizer and pesticides, amount, number of applications) - 2000-2021. US Department of Agriculture (USDA) National Agricultural Statistics Service. https://quickstats.nass.usda.gov (direct query: https://quickstats.nass.usda.gov/results/5BCE1263-5F91-31A9-B3DE-117AFBDDFF20)
  USDA NASS (2021g) CORN - TREATED, MEASURED IN PCT OF AREA PLANTED, AVG (fertilizer and pesticides, including chemigation) - 2000-2021. US Department of Agriculture (USDA) National Agricultural Statistics Service. https://quickstats.nass.usda.gov (direct query: https://quickstats.nass.usda.gov/results/C3A3CFC4-4341-3093-A3D2-544FBC852EF6)
- Azoxystrobin [soil, agricultural]: 5.2356e-7 kg; normal variance with pedigree 2.68442e-13, pedigree (2,2,2,1,1)
  Azoxystrobin emission to agricultural soil (6.083E-03 kg/ha).
  Pesticides are assumed ultimately to be 100% emitted to soil (Nemecek et al 2015). Average over state-wide reported cropped area of maize grain for all tillage practices (CTIC 2020a) and across all rotation patterns (Socolar et al 2021) - calculated from specified herbicide/insecticide/fungicide quantity applied to treated acres weighted by share of acres treated with that herbicide/insecticide/fungicide (2014, 2016, 2018, 2021 - USDA NASS data, USDA NASS 2021f, USDA NASS 2021g).
  Sources:
  Nemecek T, Bengoa X, Lansche J, et al (2015) Methodological Guidelines for the Life Cycle Inventory of Agricultural Products, Version 3.0. 84.
  CTIC (2020a) OpTIS - Operational Tillage Information System. Conservation Technology Information Center (CTIC). https://www.ctic.org/optis_tabular_queryaccessed March 23, 2021
  Socolar Y, Goldstein B R, de Valpine P, Bowles T M (2021) Biophysical and policy factors predict simplified crop rotations in the US Midwest. Environ. Res. Lett. 16 054045. . https://iopscience.iop.org/article/10.1088/1748-9326/abf9ca
  USDA NASS (2021f) CORN - APPLICATIONS, MEASURED IN LB / ACRE / YEAR, AVG and NUMBER / YEAR (fertilizer and pesticides, amount, number of applications) - 2000-2021. US Department of Agriculture (USDA) National Agricultural Statistics Service. https://quickstats.nass.usda.gov (direct query: https://quickstats.nass.usda.gov/results/5BCE1263-5F91-31A9-B3DE-117AFBDDFF20)
  USDA NASS (2021g) CORN - TREATED, MEASURED IN PCT OF AREA PLANTED, AVG (fertilizer and pesticides, including chemigation) - 2000-2021. US Department of Agriculture (USDA) National Agricultural Statistics Service. https://quickstats.nass.usda.gov (direct query: https://quickstats.nass.usda.gov/results/C3A3CFC4-4341-3093-A3D2-544FBC852EF6)
- Benzovindiflupyr [soil, agricultural]: 7.71714e-8 kg; normal variance with pedigree 2.50428e-15, pedigree (2,2,2,1,1)
  Benzovindiflupyr emission to agricultural soil (8.967E-04 kg/ha).
  Pesticides are assumed ultimately to be 100% emitted to soil (Nemecek et al 2015). Average over state-wide reported cropped area of maize grain for all tillage practices (CTIC 2020a) and across all rotation patterns (Socolar et al 2021) - calculated from specified herbicide/insecticide/fungicide quantity applied to treated acres weighted by share of acres treated with that herbicide/insecticide/fungicide (2014, 2016, 2018, 2021 - USDA NASS data, USDA NASS 2021f, USDA NASS 2021g).
  Sources:
  Nemecek T, Bengoa X, Lansche J, et al (2015) Methodological Guidelines for the Life Cycle Inventory of Agricultural Products, Version 3.0. 84.
  CTIC (2020a) OpTIS - Operational Tillage Information System. Conservation Technology Information Center (CTIC). https://www.ctic.org/optis_tabular_queryaccessed March 23, 2021
  Socolar Y, Goldstein B R, de Valpine P, Bowles T M (2021) Biophysical and policy factors predict simplified crop rotations in the US Midwest. Environ. Res. Lett. 16 054045. . https://iopscience.iop.org/article/10.1088/1748-9326/abf9ca
  USDA NASS (2021f) CORN - APPLICATIONS, MEASURED IN LB / ACRE / YEAR, AVG and NUMBER / YEAR (fertilizer and pesticides, amount, number of applications) - 2000-2021. US Department of Agriculture (USDA) National Agricultural Statistics Service. https://quickstats.nass.usda.gov (direct query: https://quickstats.nass.usda.gov/results/5BCE1263-5F91-31A9-B3DE-117AFBDDFF20)
  USDA NASS (2021g) CORN - TREATED, MEASURED IN PCT OF AREA PLANTED, AVG (fertilizer and pesticides, including chemigation) - 2000-2021. US Department of Agriculture (USDA) National Agricultural Statistics Service. https://quickstats.nass.usda.gov (direct query: https://quickstats.nass.usda.gov/results/C3A3CFC4-4341-3093-A3D2-544FBC852EF6)
- Bicyclopyrone [soil, agricultural]: 1.90999e-7 kg; normal variance with pedigree 6.69985e-17, pedigree (2,2,2,1,1)
  Bicyclopyrone emission to agricultural soil (2.219E-03 kg/ha).
  Pesticides are assumed ultimately to be 100% emitted to soil (Nemecek et al 2015). Average over state-wide reported cropped area of maize grain for all tillage practices (CTIC 2020a) and across all rotation patterns (Socolar et al 2021) - calculated from specified herbicide/insecticide/fungicide quantity applied to treated acres weighted by share of acres treated with that herbicide/insecticide/fungicide (2014, 2016, 2018, 2021 - USDA NASS data, USDA NASS 2021f, USDA NASS 2021g).
  Sources:
  Nemecek T, Bengoa X, Lansche J, et al (2015) Methodological Guidelines for the Life Cycle Inventory of Agricultural Products, Version 3.0. 84.
  CTIC (2020a) OpTIS - Operational Tillage Information System. Conservation Technology Information Center (CTIC). https://www.ctic.org/optis_tabular_queryaccessed March 23, 2021
  Socolar Y, Goldstein B R, de Valpine P, Bowles T M (2021) Biophysical and policy factors predict simplified crop rotations in the US Midwest. Environ. Res. Lett. 16 054045. . https://iopscience.iop.org/article/10.1088/1748-9326/abf9ca
  USDA NASS (2021f) CORN - APPLICATIONS, MEASURED IN LB / ACRE / YEAR, AVG and NUMBER / YEAR (fertilizer and pesticides, amount, number of applications) - 2000-2021. US Department of Agriculture (USDA) National Agricultural Statistics Service. https://quickstats.nass.usda.gov (direct query: https://quickstats.nass.usda.gov/results/5BCE1263-5F91-31A9-B3DE-117AFBDDFF20)
  USDA NASS (2021g) CORN - TREATED, MEASURED IN PCT OF AREA PLANTED, AVG (fertilizer and pesticides, including chemigation) - 2000-2021. US Department of Agriculture (USDA) National Agricultural Statistics Service. https://quickstats.nass.usda.gov (direct query: https://quickstats.nass.usda.gov/results/C3A3CFC4-4341-3093-A3D2-544FBC852EF6)
- Bifenthrin [soil, agricultural]: 1.1639e-6 kg; normal variance with pedigree 2.65017e-13, pedigree (2,2,2,1,1)
  Bifenthrin emission to agricultural soil (1.352E-02 kg/ha).
  Pesticides are assumed ultimately to be 100% emitted to soil (Nemecek et al 2015). Average over state-wide reported cropped area of maize grain for all tillage practices (CTIC 2020a) and across all rotation patterns (Socolar et al 2021) - calculated from specified herbicide/insecticide/fungicide quantity applied to treated acres weighted by share of acres treated with that herbicide/insecticide/fungicide (2014, 2016, 2018, 2021 - USDA NASS data, USDA NASS 2021f, USDA NASS 2021g).
  Sources:
  Nemecek T, Bengoa X, Lansche J, et al (2015) Methodological Guidelines for the Life Cycle Inventory of Agricultural Products, Version 3.0. 84.
  CTIC (2020a) OpTIS - Operational Tillage Information System. Conservation Technology Information Center (CTIC). https://www.ctic.org/optis_tabular_queryaccessed March 23, 2021
  Socolar Y, Goldstein B R, de Valpine P, Bowles T M (2021) Biophysical and policy factors predict simplified crop rotations in the US Midwest. Environ. Res. Lett. 16 054045. . https://iopscience.iop.org/article/10.1088/1748-9326/abf9ca
  USDA NASS (2021f) CORN - APPLICATIONS, MEASURED IN LB / ACRE / YEAR, AVG and NUMBER / YEAR (fertilizer and pesticides, amount, number of applications) - 2000-2021. US Department of Agriculture (USDA) National Agricultural Statistics Service. https://quickstats.nass.usda.gov (direct query: https://quickstats.nass.usda.gov/results/5BCE1263-5F91-31A9-B3DE-117AFBDDFF20)
  USDA NASS (2021g) CORN - TREATED, MEASURED IN PCT OF AREA PLANTED, AVG (fertilizer and pesticides, including chemigation) - 2000-2021. US Department of Agriculture (USDA) National Agricultural Statistics Service. https://quickstats.nass.usda.gov (direct query: https://quickstats.nass.usda.gov/results/C3A3CFC4-4341-3093-A3D2-544FBC852EF6)
- Cadmium II [soil, agricultural]: -8.13357e-9 kg; normal variance with pedigree 0.04, pedigree (4,4,5,2,4)
  Emissions of heavy metals to soil are estimated based on the SALCA-heavy metal model (Freiermuth 2006) following the procedure in the ecoinvent agricultural LCI tool (Faist Emmenegger, Délerce-Mauris and Porté 2018 Models Integrated in Ecoinvent LCI Calculation Tool for Crop Production). The balance of heavy metal emissions to soils includes the net change from erosion, leaching, crop removal and fertilizer, manure, lime, planting and deposition. The crop system carries a share of heavy metals emissions based on the ratio of cropping additions to total additions (additions to crop system divided by additions to crop system plus depostion from air and present in soils) Sources for heavy metals contents include: Heavy-metal contents of plant material, maize (mg/kg dry matter, from Freiermuth 2006). ; Leaching of heavy metals to surface water (Wolfensberger & Dinkel 1997), where drainage is installed ; Deposition of heavy metals to soils, mg per ha per year (Freiermuth 2006). ; Deposition of heavy metals to soils, mg per ha per year (Freiermuth 2006). ; Average heavy metal contents in crop soils, mg per kg soil, based on data for Switzerland (from Keller & Desaules, 2001). state and regional erosion rates are from US NRC National Resources Inventory, 2017. and Drainage on all cropland acres state-wide, including tile drainage (57.9%,) and ditch drainage (7.0%). USDA (2018) 2017 Census of Agriculture, Volume 1, Chapter 2: State Level Data - Table 41. Land Use Practices: 2017 and 2012 (live table: https://www.nass.usda.gov/Quick_Stats/CDQT/chapter/2/table/41/state/US). US Department of Agriculture (USDA). https://www.nass.usda.gov/Publications/AgCensus/2017/Full_Report/Volume_1,_Chapter_2_US_State_Level/st99_2_0041_0041.pdf. Fertilizer, manure and pesticide application rates are based on USDA NASS data.
  (N.B. The uncertainty associated with manure data increases the uncertainty of the heavy metal emissions.)
  Sources:
  Freiermuth (2006) SALCA-Schwermetall - Modell zur Berechnung der Schwermetall- flüsse in der Landwirtschaftlichen Ökobilanz. Agroscope FAL Zürich-Reckenholz . https://www.agroscope.admin.ch/dam/agroscope/de/dokumente/themen/umwelt-ressourcen/produktionssysteme/salca-schwermetall.pdf.download.pdf/SALCA-Schwermetall.pdf
  Faist Emmenegger M, Reinhard J, Zah R (2009) Sustainability Quick Check for Biofuels - in- termediate background report. With contributions from T. Ziep, R. Weichbrodt, Prof. Dr. V. Wohlgemuth, FHTW Berlin and A. Roches, R. Freiermuth Knuchel, Dr. G. Gaillard, Agroscope Reckenholz-Tänikon. Dübendorf. . https://www.researchgate.net/profile/Rainer-Zah/publication/230725635_SQCB_-_Sustainability_Quick_Check_for_Biofuels_Second_draft_18th_February_2009_-_Intermediate_Background_Report_With_contributions_from_T_Ziep_R_Weichbrodt_Prof_Dr_V_Wohlgemuth_FHTW_Berlin_and_A_Roche/links/56b458fb08ae1f8aa45392e6/SQCB-Sustainability-Quick-Check-for-Biofuels-Second-draft-18th-February-2009-Intermediate-Background-Report-With-contributions-from-T-Ziep-R-Weichbrodt-Prof-Dr-V-Wohlgemuth-FHTW-Berlin-and-A-R.pdf
  Prasuhn, V (2006) Erfassung der PO4-Austräge für die Ökobilanzierung. SALCA-Phosphor. Zü-rich, CH, Agrocope FAL Reckenholz. Agrocope.
  Faist Emmenegger, Délerce-Mauris and Porté (2018) 2018 Models Integrated in Ecoinvent LCI Calculation Tool for Crop Production.
- Chlorpyrifos [soil, agricultural]: 5.02e-6 kg; normal variance with pedigree 3.17433e-12, pedigree (2,2,2,1,1)
  Chlorpyrifos emission to agricultural soil (5.833E-02 kg/ha).
  Pesticides are assumed ultimately to be 100% emitted to soil (Nemecek et al 2015). Average over state-wide reported cropped area of maize grain for all tillage practices (CTIC 2020a) and across all rotation patterns (Socolar et al 2021) - calculated from specified herbicide/insecticide/fungicide quantity applied to treated acres weighted by share of acres treated with that herbicide/insecticide/fungicide (2014, 2016, 2018, 2021 - USDA NASS data, USDA NASS 2021f, USDA NASS 2021g).
  Sources:
  Nemecek T, Bengoa X, Lansche J, et al (2015) Methodological Guidelines for the Life Cycle Inventory of Agricultural Products, Version 3.0. 84.
  CTIC (2020a) OpTIS - Operational Tillage Information System. Conservation Technology Information Center (CTIC). https://www.ctic.org/optis_tabular_queryaccessed March 23, 2021
  Socolar Y, Goldstein B R, de Valpine P, Bowles T M (2021) Biophysical and policy factors predict simplified crop rotations in the US Midwest. Environ. Res. Lett. 16 054045. . https://iopscience.iop.org/article/10.1088/1748-9326/abf9ca
  USDA NASS (2021f) CORN - APPLICATIONS, MEASURED IN LB / ACRE / YEAR, AVG and NUMBER / YEAR (fertilizer and pesticides, amount, number of applications) - 2000-2021. US Department of Agriculture (USDA) National Agricultural Statistics Service. https://quickstats.nass.usda.gov (direct query: https://quickstats.nass.usda.gov/results/5BCE1263-5F91-31A9-B3DE-117AFBDDFF20)
  USDA NASS (2021g) CORN - TREATED, MEASURED IN PCT OF AREA PLANTED, AVG (fertilizer and pesticides, including chemigation) - 2000-2021. US Department of Agriculture (USDA) National Agricultural Statistics Service. https://quickstats.nass.usda.gov (direct query: https://quickstats.nass.usda.gov/results/C3A3CFC4-4341-3093-A3D2-544FBC852EF6)
- Chromium III [soil, agricultural]: -6.58498e-6 kg; normal variance with pedigree 0.04, pedigree (4,4,5,2,4)
  (same comment as for Cadmium II)
- Clopyralid [soil, agricultural]: 1.753e-6 kg; normal variance with pedigree 8.42753e-13, pedigree (2,2,2,1,1)
  Clopyralid emission to agricultural soil (2.037E-02 kg/ha).
  Pesticides are assumed ultimately to be 100% emitted to soil (Nemecek et al 2015). Average over state-wide reported cropped area of maize grain for all tillage practices (CTIC 2020a) and across all rotation patterns (Socolar et al 2021) - calculated from specified herbicide/insecticide/fungicide quantity applied to treated acres weighted by share of acres treated with that herbicide/insecticide/fungicide (2014, 2016, 2018, 2021 - USDA NASS data, USDA NASS 2021f, USDA NASS 2021g).
  Sources:
  Nemecek T, Bengoa X, Lansche J, et al (2015) Methodological Guidelines for the Life Cycle Inventory of Agricultural Products, Version 3.0. 84.
  CTIC (2020a) OpTIS - Operational Tillage Information System. Conservation Technology Information Center (CTIC). https://www.ctic.org/optis_tabular_queryaccessed March 23, 2021
  Socolar Y, Goldstein B R, de Valpine P, Bowles T M (2021) Biophysical and policy factors predict simplified crop rotations in the US Midwest. Environ. Res. Lett. 16 054045. . https://iopscience.iop.org/article/10.1088/1748-9326/abf9ca
  USDA NASS (2021f) CORN - APPLICATIONS, MEASURED IN LB / ACRE / YEAR, AVG and NUMBER / YEAR (fertilizer and pesticides, amount, number of applications) - 2000-2021. US Department of Agriculture (USDA) National Agricultural Statistics Service. https://quickstats.nass.usda.gov (direct query: https://quickstats.nass.usda.gov/results/5BCE1263-5F91-31A9-B3DE-117AFBDDFF20)
  USDA NASS (2021g) CORN - TREATED, MEASURED IN PCT OF AREA PLANTED, AVG (fertilizer and pesticides, including chemigation) - 2000-2021. US Department of Agriculture (USDA) National Agricultural Statistics Service. https://quickstats.nass.usda.gov (direct query: https://quickstats.nass.usda.gov/results/C3A3CFC4-4341-3093-A3D2-544FBC852EF6)
- Copper ion [soil, agricultural]: -4.33368e-6 kg; normal variance with pedigree 0.04, pedigree (4,4,5,2,4)
  (same comment as for Cadmium II)
- Dicamba [soil, agricultural]: 6.84293e-6 kg; normal variance with pedigree 1.27521e-11, pedigree (2,2,2,1,1)
  Dicamba emission to agricultural soil (7.951E-02 kg/ha).
  Pesticides are assumed ultimately to be 100% emitted to soil (Nemecek et al 2015). Average over state-wide reported cropped area of maize grain for all tillage practices (CTIC 2020a) and across all rotation patterns (Socolar et al 2021) - calculated from specified herbicide/insecticide/fungicide quantity applied to treated acres weighted by share of acres treated with that herbicide/insecticide/fungicide (2014, 2016, 2018, 2021 - USDA NASS data, USDA NASS 2021f, USDA NASS 2021g).
  Sources:
  Nemecek T, Bengoa X, Lansche J, et al (2015) Methodological Guidelines for the Life Cycle Inventory of Agricultural Products, Version 3.0. 84.
  CTIC (2020a) OpTIS - Operational Tillage Information System. Conservation Technology Information Center (CTIC). https://www.ctic.org/optis_tabular_queryaccessed March 23, 2021
  Socolar Y, Goldstein B R, de Valpine P, Bowles T M (2021) Biophysical and policy factors predict simplified crop rotations in the US Midwest. Environ. Res. Lett. 16 054045. . https://iopscience.iop.org/article/10.1088/1748-9326/abf9ca
  USDA NASS (2021f) CORN - APPLICATIONS, MEASURED IN LB / ACRE / YEAR, AVG and NUMBER / YEAR (fertilizer and pesticides, amount, number of applications) - 2000-2021. US Department of Agriculture (USDA) National Agricultural Statistics Service. https://quickstats.nass.usda.gov (direct query: https://quickstats.nass.usda.gov/results/5BCE1263-5F91-31A9-B3DE-117AFBDDFF20)
  USDA NASS (2021g) CORN - TREATED, MEASURED IN PCT OF AREA PLANTED, AVG (fertilizer and pesticides, including chemigation) - 2000-2021. US Department of Agriculture (USDA) National Agricultural Statistics Service. https://quickstats.nass.usda.gov (direct query: https://quickstats.nass.usda.gov/results/C3A3CFC4-4341-3093-A3D2-544FBC852EF6)
- Diflufenzopyr-sodium [soil, agricultural]: 4.67369e-7 kg; normal variance with pedigree 2.74706e-14, pedigree (2,2,2,1,1)
  Diflufenzopyr-sodium emission to agricultural soil (5.431E-03 kg/ha).
  Pesticides are assumed ultimately to be 100% emitted to soil (Nemecek et al 2015). Average over state-wide reported cropped area of maize grain for all tillage practices (CTIC 2020a) and across all rotation patterns (Socolar et al 2021) - calculated from specified herbicide/insecticide/fungicide quantity applied to treated acres weighted by share of acres treated with that herbicide/insecticide/fungicide (2014, 2016, 2018, 2021 - USDA NASS data, USDA NASS 2021f, USDA NASS 2021g).
  Sources:
  Nemecek T, Bengoa X, Lansche J, et al (2015) Methodological Guidelines for the Life Cycle Inventory of Agricultural Products, Version 3.0. 84.
  CTIC (2020a) OpTIS - Operational Tillage Information System. Conservation Technology Information Center (CTIC). https://www.ctic.org/optis_tabular_queryaccessed March 23, 2021
  Socolar Y, Goldstein B R, de Valpine P, Bowles T M (2021) Biophysical and policy factors predict simplified crop rotations in the US Midwest. Environ. Res. Lett. 16 054045. . https://iopscience.iop.org/article/10.1088/1748-9326/abf9ca
  USDA NASS (2021f) CORN - APPLICATIONS, MEASURED IN LB / ACRE / YEAR, AVG and NUMBER / YEAR (fertilizer and pesticides, amount, number of applications) - 2000-2021. US Department of Agriculture (USDA) National Agricultural Statistics Service. https://quickstats.nass.usda.gov (direct query: https://quickstats.nass.usda.gov/results/5BCE1263-5F91-31A9-B3DE-117AFBDDFF20)
  USDA NASS (2021g) CORN - TREATED, MEASURED IN PCT OF AREA PLANTED, AVG (fertilizer and pesticides, including chemigation) - 2000-2021. US Department of Agriculture (USDA) National Agricultural Statistics Service. https://quickstats.nass.usda.gov (direct query: https://quickstats.nass.usda.gov/results/C3A3CFC4-4341-3093-A3D2-544FBC852EF6)
- Dimethenamid-P [soil, agricultural]: 2.54344e-6 kg; normal variance with pedigree 1.22466e-12, pedigree (2,2,2,1,1)
  Dimethenamid-P emission to agricultural soil (2.955E-02 kg/ha).
  Pesticides are assumed ultimately to be 100% emitted to soil (Nemecek et al 2015). Average over state-wide reported cropped area of maize grain for all tillage practices (CTIC 2020a) and across all rotation patterns (Socolar et al 2021) - calculated from specified herbicide/insecticide/fungicide quantity applied to treated acres weighted by share of acres treated with that herbicide/insecticide/fungicide (2014, 2016, 2018, 2021 - USDA NASS data, USDA NASS 2021f, USDA NASS 2021g).
  Sources:
  Nemecek T, Bengoa X, Lansche J, et al (2015) Methodological Guidelines for the Life Cycle Inventory of Agricultural Products, Version 3.0. 84.
  CTIC (2020a) OpTIS - Operational Tillage Information System. Conservation Technology Information Center (CTIC). https://www.ctic.org/optis_tabular_queryaccessed March 23, 2021
  Socolar Y, Goldstein B R, de Valpine P, Bowles T M (2021) Biophysical and policy factors predict simplified crop rotations in the US Midwest. Environ. Res. Lett. 16 054045. . https://iopscience.iop.org/article/10.1088/1748-9326/abf9ca
  USDA NASS (2021f) CORN - APPLICATIONS, MEASURED IN LB / ACRE / YEAR, AVG and NUMBER / YEAR (fertilizer and pesticides, amount, number of applications) - 2000-2021. US Department of Agriculture (USDA) National Agricultural Statistics Service. https://quickstats.nass.usda.gov (direct query: https://quickstats.nass.usda.gov/results/5BCE1263-5F91-31A9-B3DE-117AFBDDFF20)
  USDA NASS (2021g) CORN - TREATED, MEASURED IN PCT OF AREA PLANTED, AVG (fertilizer and pesticides, including chemigation) - 2000-2021. US Department of Agriculture (USDA) National Agricultural Statistics Service. https://quickstats.nass.usda.gov (direct query: https://quickstats.nass.usda.gov/results/C3A3CFC4-4341-3093-A3D2-544FBC852EF6)
- Flumetsulam [soil, agricultural]: 2.82855e-7 kg; normal variance with pedigree 9.25083e-15, pedigree (2,2,2,1,1)
  Flumetsulam emission to agricultural soil (3.287E-03 kg/ha).
  Pesticides are assumed ultimately to be 100% emitted to soil (Nemecek et al 2015). Average over state-wide reported cropped area of maize grain for all tillage practices (CTIC 2020a) and across all rotation patterns (Socolar et al 2021) - calculated from specified herbicide/insecticide/fungicide quantity applied to treated acres weighted by share of acres treated with that herbicide/insecticide/fungicide (2014, 2016, 2018, 2021 - USDA NASS data, USDA NASS 2021f, USDA NASS 2021g).
  Sources:
  Nemecek T, Bengoa X, Lansche J, et al (2015) Methodological Guidelines for the Life Cycle Inventory of Agricultural Products, Version 3.0. 84.
  CTIC (2020a) OpTIS - Operational Tillage Information System. Conservation Technology Information Center (CTIC). https://www.ctic.org/optis_tabular_queryaccessed March 23, 2021
  Socolar Y, Goldstein B R, de Valpine P, Bowles T M (2021) Biophysical and policy factors predict simplified crop rotations in the US Midwest. Environ. Res. Lett. 16 054045. . https://iopscience.iop.org/article/10.1088/1748-9326/abf9ca
  USDA NASS (2021f) CORN - APPLICATIONS, MEASURED IN LB / ACRE / YEAR, AVG and NUMBER / YEAR (fertilizer and pesticides, amount, number of applications) - 2000-2021. US Department of Agriculture (USDA) National Agricultural Statistics Service. https://quickstats.nass.usda.gov (direct query: https://quickstats.nass.usda.gov/results/5BCE1263-5F91-31A9-B3DE-117AFBDDFF20)
  USDA NASS (2021g) CORN - TREATED, MEASURED IN PCT OF AREA PLANTED, AVG (fertilizer and pesticides, including chemigation) - 2000-2021. US Department of Agriculture (USDA) National Agricultural Statistics Service. https://quickstats.nass.usda.gov (direct query: https://quickstats.nass.usda.gov/results/C3A3CFC4-4341-3093-A3D2-544FBC852EF6)
- Fluthiacet-methyl [soil, agricultural]: 7.79431e-8 kg; normal variance with pedigree 3.65637e-16, pedigree (2,2,2,1,1)
  Fluthiacet-methyl emission to agricultural soil (9.056E-04 kg/ha).
  Pesticides are assumed ultimately to be 100% emitted to soil (Nemecek et al 2015). Average over state-wide reported cropped area of maize grain for all tillage practices (CTIC 2020a) and across all rotation patterns (Socolar et al 2021) - calculated from specified herbicide/insecticide/fungicide quantity applied to treated acres weighted by share of acres treated with that herbicide/insecticide/fungicide (2014, 2016, 2018, 2021 - USDA NASS data, USDA NASS 2021f, USDA NASS 2021g).
  Sources:
  Nemecek T, Bengoa X, Lansche J, et al (2015) Methodological Guidelines for the Life Cycle Inventory of Agricultural Products, Version 3.0. 84.
  CTIC (2020a) OpTIS - Operational Tillage Information System. Conservation Technology Information Center (CTIC). https://www.ctic.org/optis_tabular_queryaccessed March 23, 2021
  Socolar Y, Goldstein B R, de Valpine P, Bowles T M (2021) Biophysical and policy factors predict simplified crop rotations in the US Midwest. Environ. Res. Lett. 16 054045. . https://iopscience.iop.org/article/10.1088/1748-9326/abf9ca
  USDA NASS (2021f) CORN - APPLICATIONS, MEASURED IN LB / ACRE / YEAR, AVG and NUMBER / YEAR (fertilizer and pesticides, amount, number of applications) - 2000-2021. US Department of Agriculture (USDA) National Agricultural Statistics Service. https://quickstats.nass.usda.gov (direct query: https://quickstats.nass.usda.gov/results/5BCE1263-5F91-31A9-B3DE-117AFBDDFF20)
  USDA NASS (2021g) CORN - TREATED, MEASURED IN PCT OF AREA PLANTED, AVG (fertilizer and pesticides, including chemigation) - 2000-2021. US Department of Agriculture (USDA) National Agricultural Statistics Service. https://quickstats.nass.usda.gov (direct query: https://quickstats.nass.usda.gov/results/C3A3CFC4-4341-3093-A3D2-544FBC852EF6)
- Glufosinate [soil, agricultural]: 7.95994e-6 kg; normal variance with pedigree 4.77044e-12, pedigree (2,2,2,1,1)
  Glufosinate emission to agricultural soil (9.249E-02 kg/ha).
  Pesticides are assumed ultimately to be 100% emitted to soil (Nemecek et al 2015). Average over state-wide reported cropped area of maize grain for all tillage practices (CTIC 2020a) and across all rotation patterns (Socolar et al 2021) - calculated from specified herbicide/insecticide/fungicide quantity applied to treated acres weighted by share of acres treated with that herbicide/insecticide/fungicide (2014, 2016, 2018, 2021 - USDA NASS data, USDA NASS 2021f, USDA NASS 2021g).
  Sources:
  Nemecek T, Bengoa X, Lansche J, et al (2015) Methodological Guidelines for the Life Cycle Inventory of Agricultural Products, Version 3.0. 84.
  CTIC (2020a) OpTIS - Operational Tillage Information System. Conservation Technology Information Center (CTIC). https://www.ctic.org/optis_tabular_queryaccessed March 23, 2021
  Socolar Y, Goldstein B R, de Valpine P, Bowles T M (2021) Biophysical and policy factors predict simplified crop rotations in the US Midwest. Environ. Res. Lett. 16 054045. . https://iopscience.iop.org/article/10.1088/1748-9326/abf9ca
  USDA NASS (2021f) CORN - APPLICATIONS, MEASURED IN LB / ACRE / YEAR, AVG and NUMBER / YEAR (fertilizer and pesticides, amount, number of applications) - 2000-2021. US Department of Agriculture (USDA) National Agricultural Statistics Service. https://quickstats.nass.usda.gov (direct query: https://quickstats.nass.usda.gov/results/5BCE1263-5F91-31A9-B3DE-117AFBDDFF20)
  USDA NASS (2021g) CORN - TREATED, MEASURED IN PCT OF AREA PLANTED, AVG (fertilizer and pesticides, including chemigation) - 2000-2021. US Department of Agriculture (USDA) National Agricultural Statistics Service. https://quickstats.nass.usda.gov (direct query: https://quickstats.nass.usda.gov/results/C3A3CFC4-4341-3093-A3D2-544FBC852EF6)
- Glyphosate [soil, agricultural]: 9.46828e-5 kg; normal variance with pedigree 7.00982e-10, pedigree (2,2,2,1,1)
  Glyphosate emission to agricultural soil (1.100E+00 kg/ha).
  Pesticides are assumed ultimately to be 100% emitted to soil (Nemecek et al 2015). Average over state-wide reported cropped area of maize grain for all tillage practices (CTIC 2020a) and across all rotation patterns (Socolar et al 2021) - calculated from specified herbicide/insecticide/fungicide quantity applied to treated acres weighted by share of acres treated with that herbicide/insecticide/fungicide (2014, 2016, 2018, 2021 - USDA NASS data, USDA NASS 2021f, USDA NASS 2021g).
  Sources:
  Nemecek T, Bengoa X, Lansche J, et al (2015) Methodological Guidelines for the Life Cycle Inventory of Agricultural Products, Version 3.0. 84.
  CTIC (2020a) OpTIS - Operational Tillage Information System. Conservation Technology Information Center (CTIC). https://www.ctic.org/optis_tabular_queryaccessed March 23, 2021
  Socolar Y, Goldstein B R, de Valpine P, Bowles T M (2021) Biophysical and policy factors predict simplified crop rotations in the US Midwest. Environ. Res. Lett. 16 054045. . https://iopscience.iop.org/article/10.1088/1748-9326/abf9ca
  USDA NASS (2021f) CORN - APPLICATIONS, MEASURED IN LB / ACRE / YEAR, AVG and NUMBER / YEAR (fertilizer and pesticides, amount, number of applications) - 2000-2021. US Department of Agriculture (USDA) National Agricultural Statistics Service. https://quickstats.nass.usda.gov (direct query: https://quickstats.nass.usda.gov/results/5BCE1263-5F91-31A9-B3DE-117AFBDDFF20)
  USDA NASS (2021g) CORN - TREATED, MEASURED IN PCT OF AREA PLANTED, AVG (fertilizer and pesticides, including chemigation) - 2000-2021. US Department of Agriculture (USDA) National Agricultural Statistics Service. https://quickstats.nass.usda.gov (direct query: https://quickstats.nass.usda.gov/results/C3A3CFC4-4341-3093-A3D2-544FBC852EF6)
- Isoxaflutole [soil, agricultural]: 9.5864e-7 kg; normal variance with pedigree 7.68757e-14, pedigree (2,2,2,1,1)
  Isoxaflutole emission to agricultural soil (1.114E-02 kg/ha).
  Pesticides are assumed ultimately to be 100% emitted to soil (Nemecek et al 2015). Average over state-wide reported cropped area of maize grain for all tillage practices (CTIC 2020a) and across all rotation patterns (Socolar et al 2021) - calculated from specified herbicide/insecticide/fungicide quantity applied to treated acres weighted by share of acres treated with that herbicide/insecticide/fungicide (2014, 2016, 2018, 2021 - USDA NASS data, USDA NASS 2021f, USDA NASS 2021g).
  Sources:
  Nemecek T, Bengoa X, Lansche J, et al (2015) Methodological Guidelines for the Life Cycle Inventory of Agricultural Products, Version 3.0. 84.
  CTIC (2020a) OpTIS - Operational Tillage Information System. Conservation Technology Information Center (CTIC). https://www.ctic.org/optis_tabular_queryaccessed March 23, 2021
  Socolar Y, Goldstein B R, de Valpine P, Bowles T M (2021) Biophysical and policy factors predict simplified crop rotations in the US Midwest. Environ. Res. Lett. 16 054045. . https://iopscience.iop.org/article/10.1088/1748-9326/abf9ca
  USDA NASS (2021f) CORN - APPLICATIONS, MEASURED IN LB / ACRE / YEAR, AVG and NUMBER / YEAR (fertilizer and pesticides, amount, number of applications) - 2000-2021. US Department of Agriculture (USDA) National Agricultural Statistics Service. https://quickstats.nass.usda.gov (direct query: https://quickstats.nass.usda.gov/results/5BCE1263-5F91-31A9-B3DE-117AFBDDFF20)
  USDA NASS (2021g) CORN - TREATED, MEASURED IN PCT OF AREA PLANTED, AVG (fertilizer and pesticides, including chemigation) - 2000-2021. US Department of Agriculture (USDA) National Agricultural Statistics Service. https://quickstats.nass.usda.gov (direct query: https://quickstats.nass.usda.gov/results/C3A3CFC4-4341-3093-A3D2-544FBC852EF6)
- Lead II [soil, agricultural]: -7.5609e-7 kg; normal variance with pedigree 0.04, pedigree (4,4,5,2,4)
  (same comment as for Cadmium II)
- Mercury II [soil, agricultural]: -1.66812e-7 kg; normal variance with pedigree 0.04, pedigree (4,4,5,2,4)
  (same comment as for Cadmium II)
- Mesotrione [soil, agricultural]: 5.61181e-6 kg; normal variance with pedigree 5.69738e-12, pedigree (2,2,2,1,1)
  Mesotrione emission to agricultural soil (6.521E-02 kg/ha).
  Pesticides are assumed ultimately to be 100% emitted to soil (Nemecek et al 2015). Average over state-wide reported cropped area of maize grain for all tillage practices (CTIC 2020a) and across all rotation patterns (Socolar et al 2021) - calculated from specified herbicide/insecticide/fungicide quantity applied to treated acres weighted by share of acres treated with that herbicide/insecticide/fungicide (2014, 2016, 2018, 2021 - USDA NASS data, USDA NASS 2021f, USDA NASS 2021g).
  Sources:
  Nemecek T, Bengoa X, Lansche J, et al (2015) Methodological Guidelines for the Life Cycle Inventory of Agricultural Products, Version 3.0. 84.
  CTIC (2020a) OpTIS - Operational Tillage Information System. Conservation Technology Information Center (CTIC). https://www.ctic.org/optis_tabular_queryaccessed March 23, 2021
  Socolar Y, Goldstein B R, de Valpine P, Bowles T M (2021) Biophysical and policy factors predict simplified crop rotations in the US Midwest. Environ. Res. Lett. 16 054045. . https://iopscience.iop.org/article/10.1088/1748-9326/abf9ca
  USDA NASS (2021f) CORN - APPLICATIONS, MEASURED IN LB / ACRE / YEAR, AVG and NUMBER / YEAR (fertilizer and pesticides, amount, number of applications) - 2000-2021. US Department of Agriculture (USDA) National Agricultural Statistics Service. https://quickstats.nass.usda.gov (direct query: https://quickstats.nass.usda.gov/results/5BCE1263-5F91-31A9-B3DE-117AFBDDFF20)
  USDA NASS (2021g) CORN - TREATED, MEASURED IN PCT OF AREA PLANTED, AVG (fertilizer and pesticides, including chemigation) - 2000-2021. US Department of Agriculture (USDA) National Agricultural Statistics Service. https://quickstats.nass.usda.gov (direct query: https://quickstats.nass.usda.gov/results/C3A3CFC4-4341-3093-A3D2-544FBC852EF6)
- Metconazole [soil, agricultural]: 2.71306e-7 kg; normal variance with pedigree 3.56157e-14, pedigree (2,2,2,1,1)
  Metconazole emission to agricultural soil (3.152E-03 kg/ha).
  Pesticides are assumed ultimately to be 100% emitted to soil (Nemecek et al 2015). Average over state-wide reported cropped area of maize grain for all tillage practices (CTIC 2020a) and across all rotation patterns (Socolar et al 2021) - calculated from specified herbicide/insecticide/fungicide quantity applied to treated acres weighted by share of acres treated with that herbicide/insecticide/fungicide (2014, 2016, 2018, 2021 - USDA NASS data, USDA NASS 2021f, USDA NASS 2021g).
  Sources:
  Nemecek T, Bengoa X, Lansche J, et al (2015) Methodological Guidelines for the Life Cycle Inventory of Agricultural Products, Version 3.0. 84.
  CTIC (2020a) OpTIS - Operational Tillage Information System. Conservation Technology Information Center (CTIC). https://www.ctic.org/optis_tabular_queryaccessed March 23, 2021
  Socolar Y, Goldstein B R, de Valpine P, Bowles T M (2021) Biophysical and policy factors predict simplified crop rotations in the US Midwest. Environ. Res. Lett. 16 054045. . https://iopscience.iop.org/article/10.1088/1748-9326/abf9ca
  USDA NASS (2021f) CORN - APPLICATIONS, MEASURED IN LB / ACRE / YEAR, AVG and NUMBER / YEAR (fertilizer and pesticides, amount, number of applications) - 2000-2021. US Department of Agriculture (USDA) National Agricultural Statistics Service. https://quickstats.nass.usda.gov (direct query: https://quickstats.nass.usda.gov/results/5BCE1263-5F91-31A9-B3DE-117AFBDDFF20)
  USDA NASS (2021g) CORN - TREATED, MEASURED IN PCT OF AREA PLANTED, AVG (fertilizer and pesticides, including chemigation) - 2000-2021. US Department of Agriculture (USDA) National Agricultural Statistics Service. https://quickstats.nass.usda.gov (direct query: https://quickstats.nass.usda.gov/results/C3A3CFC4-4341-3093-A3D2-544FBC852EF6)
- Metolachlor [soil, agricultural]: 2.87916e-5 kg; normal variance with pedigree 9.78028e-11, pedigree (2,2,2,1,1)
  Metolachlor emission to agricultural soil (3.345E-01 kg/ha).
  Pesticides are assumed ultimately to be 100% emitted to soil (Nemecek et al 2015). Average over state-wide reported cropped area of maize grain for all tillage practices (CTIC 2020a) and across all rotation patterns (Socolar et al 2021) - calculated from specified herbicide/insecticide/fungicide quantity applied to treated acres weighted by share of acres treated with that herbicide/insecticide/fungicide (2014, 2016, 2018, 2021 - USDA NASS data, USDA NASS 2021f, USDA NASS 2021g).
  Sources:
  Nemecek T, Bengoa X, Lansche J, et al (2015) Methodological Guidelines for the Life Cycle Inventory of Agricultural Products, Version 3.0. 84.
  CTIC (2020a) OpTIS - Operational Tillage Information System. Conservation Technology Information Center (CTIC). https://www.ctic.org/optis_tabular_queryaccessed March 23, 2021
  Socolar Y, Goldstein B R, de Valpine P, Bowles T M (2021) Biophysical and policy factors predict simplified crop rotations in the US Midwest. Environ. Res. Lett. 16 054045. . https://iopscience.iop.org/article/10.1088/1748-9326/abf9ca
  USDA NASS (2021f) CORN - APPLICATIONS, MEASURED IN LB / ACRE / YEAR, AVG and NUMBER / YEAR (fertilizer and pesticides, amount, number of applications) - 2000-2021. US Department of Agriculture (USDA) National Agricultural Statistics Service. https://quickstats.nass.usda.gov (direct query: https://quickstats.nass.usda.gov/results/5BCE1263-5F91-31A9-B3DE-117AFBDDFF20)
  USDA NASS (2021g) CORN - TREATED, MEASURED IN PCT OF AREA PLANTED, AVG (fertilizer and pesticides, including chemigation) - 2000-2021. US Department of Agriculture (USDA) National Agricultural Statistics Service. https://quickstats.nass.usda.gov (direct query: https://quickstats.nass.usda.gov/results/C3A3CFC4-4341-3093-A3D2-544FBC852EF6)
- Nickel II [soil, agricultural]: -4.71222e-6 kg; normal variance with pedigree 0.04, pedigree (4,4,5,2,4)
  (same comment as for Cadmium II)
- Nicosulfuron [soil, agricultural]: 1.49391e-7 kg; normal variance with pedigree 2.98856e-15, pedigree (2,2,2,1,1)
  Nicosulfuron emission to agricultural soil (1.736E-03 kg/ha).
  Pesticides are assumed ultimately to be 100% emitted to soil (Nemecek et al 2015). Average over state-wide reported cropped area of maize grain for all tillage practices (CTIC 2020a) and across all rotation patterns (Socolar et al 2021) - calculated from specified herbicide/insecticide/fungicide quantity applied to treated acres weighted by share of acres treated with that herbicide/insecticide/fungicide (2014, 2016, 2018, 2021 - USDA NASS data, USDA NASS 2021f, USDA NASS 2021g).
  Sources:
  Nemecek T, Bengoa X, Lansche J, et al (2015) Methodological Guidelines for the Life Cycle Inventory of Agricultural Products, Version 3.0. 84.
  CTIC (2020a) OpTIS - Operational Tillage Information System. Conservation Technology Information Center (CTIC). https://www.ctic.org/optis_tabular_queryaccessed March 23, 2021
  Socolar Y, Goldstein B R, de Valpine P, Bowles T M (2021) Biophysical and policy factors predict simplified crop rotations in the US Midwest. Environ. Res. Lett. 16 054045. . https://iopscience.iop.org/article/10.1088/1748-9326/abf9ca
  USDA NASS (2021f) CORN - APPLICATIONS, MEASURED IN LB / ACRE / YEAR, AVG and NUMBER / YEAR (fertilizer and pesticides, amount, number of applications) - 2000-2021. US Department of Agriculture (USDA) National Agricultural Statistics Service. https://quickstats.nass.usda.gov (direct query: https://quickstats.nass.usda.gov/results/5BCE1263-5F91-31A9-B3DE-117AFBDDFF20)
  USDA NASS (2021g) CORN - TREATED, MEASURED IN PCT OF AREA PLANTED, AVG (fertilizer and pesticides, including chemigation) - 2000-2021. US Department of Agriculture (USDA) National Agricultural Statistics Service. https://quickstats.nass.usda.gov (direct query: https://quickstats.nass.usda.gov/results/C3A3CFC4-4341-3093-A3D2-544FBC852EF6)
- Propiconazole [soil, agricultural]: 5.53705e-7 kg; normal variance with pedigree 2.03504e-13, pedigree (2,2,2,1,1)
  Propiconazole emission to agricultural soil (6.434E-03 kg/ha).
  Pesticides are assumed ultimately to be 100% emitted to soil (Nemecek et al 2015). Average over state-wide reported cropped area of maize grain for all tillage practices (CTIC 2020a) and across all rotation patterns (Socolar et al 2021) - calculated from specified herbicide/insecticide/fungicide quantity applied to treated acres weighted by share of acres treated with that herbicide/insecticide/fungicide (2014, 2016, 2018, 2021 - USDA NASS data, USDA NASS 2021f, USDA NASS 2021g).
  Sources:
  Nemecek T, Bengoa X, Lansche J, et al (2015) Methodological Guidelines for the Life Cycle Inventory of Agricultural Products, Version 3.0. 84.
  CTIC (2020a) OpTIS - Operational Tillage Information System. Conservation Technology Information Center (CTIC). https://www.ctic.org/optis_tabular_queryaccessed March 23, 2021
  Socolar Y, Goldstein B R, de Valpine P, Bowles T M (2021) Biophysical and policy factors predict simplified crop rotations in the US Midwest. Environ. Res. Lett. 16 054045. . https://iopscience.iop.org/article/10.1088/1748-9326/abf9ca
  USDA NASS (2021f) CORN - APPLICATIONS, MEASURED IN LB / ACRE / YEAR, AVG and NUMBER / YEAR (fertilizer and pesticides, amount, number of applications) - 2000-2021. US Department of Agriculture (USDA) National Agricultural Statistics Service. https://quickstats.nass.usda.gov (direct query: https://quickstats.nass.usda.gov/results/5BCE1263-5F91-31A9-B3DE-117AFBDDFF20)
  USDA NASS (2021g) CORN - TREATED, MEASURED IN PCT OF AREA PLANTED, AVG (fertilizer and pesticides, including chemigation) - 2000-2021. US Department of Agriculture (USDA) National Agricultural Statistics Service. https://quickstats.nass.usda.gov (direct query: https://quickstats.nass.usda.gov/results/C3A3CFC4-4341-3093-A3D2-544FBC852EF6)
- Prothioconazole [soil, agricultural]: 4.58205e-7 kg; normal variance with pedigree 1.25239e-13, pedigree (2,2,2,1,1)
  Prothioconazol emission to agricultural soil (5.324E-03 kg/ha).
  Pesticides are assumed ultimately to be 100% emitted to soil (Nemecek et al 2015). Average over state-wide reported cropped area of maize grain for all tillage practices (CTIC 2020a) and across all rotation patterns (Socolar et al 2021) - calculated from specified herbicide/insecticide/fungicide quantity applied to treated acres weighted by share of acres treated with that herbicide/insecticide/fungicide (2014, 2016, 2018, 2021 - USDA NASS data, USDA NASS 2021f, USDA NASS 2021g).
  Sources:
  Nemecek T, Bengoa X, Lansche J, et al (2015) Methodological Guidelines for the Life Cycle Inventory of Agricultural Products, Version 3.0. 84.
  CTIC (2020a) OpTIS - Operational Tillage Information System. Conservation Technology Information Center (CTIC). https://www.ctic.org/optis_tabular_queryaccessed March 23, 2021
  Socolar Y, Goldstein B R, de Valpine P, Bowles T M (2021) Biophysical and policy factors predict simplified crop rotations in the US Midwest. Environ. Res. Lett. 16 054045. . https://iopscience.iop.org/article/10.1088/1748-9326/abf9ca
  USDA NASS (2021f) CORN - APPLICATIONS, MEASURED IN LB / ACRE / YEAR, AVG and NUMBER / YEAR (fertilizer and pesticides, amount, number of applications) - 2000-2021. US Department of Agriculture (USDA) National Agricultural Statistics Service. https://quickstats.nass.usda.gov (direct query: https://quickstats.nass.usda.gov/results/5BCE1263-5F91-31A9-B3DE-117AFBDDFF20)
  USDA NASS (2021g) CORN - TREATED, MEASURED IN PCT OF AREA PLANTED, AVG (fertilizer and pesticides, including chemigation) - 2000-2021. US Department of Agriculture (USDA) National Agricultural Statistics Service. https://quickstats.nass.usda.gov (direct query: https://quickstats.nass.usda.gov/results/C3A3CFC4-4341-3093-A3D2-544FBC852EF6)
- Pyraclostrobin [soil, agricultural]: 8.16088e-7 kg; normal variance with pedigree 8.2291e-14, pedigree (2,2,2,1,1)
  Pyraclostrobin (prop) emission to agricultural soil (9.482E-03 kg/ha).
  Pesticides are assumed ultimately to be 100% emitted to soil (Nemecek et al 2015). Average over state-wide reported cropped area of maize grain for all tillage practices (CTIC 2020a) and across all rotation patterns (Socolar et al 2021) - calculated from specified herbicide/insecticide/fungicide quantity applied to treated acres weighted by share of acres treated with that herbicide/insecticide/fungicide (2014, 2016, 2018, 2021 - USDA NASS data, USDA NASS 2021f, USDA NASS 2021g).
  Sources:
  Nemecek T, Bengoa X, Lansche J, et al (2015) Methodological Guidelines for the Life Cycle Inventory of Agricultural Products, Version 3.0. 84.
  CTIC (2020a) OpTIS - Operational Tillage Information System. Conservation Technology Information Center (CTIC). https://www.ctic.org/optis_tabular_queryaccessed March 23, 2021
  Socolar Y, Goldstein B R, de Valpine P, Bowles T M (2021) Biophysical and policy factors predict simplified crop rotations in the US Midwest. Environ. Res. Lett. 16 054045. . https://iopscience.iop.org/article/10.1088/1748-9326/abf9ca
  USDA NASS (2021f) CORN - APPLICATIONS, MEASURED IN LB / ACRE / YEAR, AVG and NUMBER / YEAR (fertilizer and pesticides, amount, number of applications) - 2000-2021. US Department of Agriculture (USDA) National Agricultural Statistics Service. https://quickstats.nass.usda.gov (direct query: https://quickstats.nass.usda.gov/results/5BCE1263-5F91-31A9-B3DE-117AFBDDFF20)
  USDA NASS (2021g) CORN - TREATED, MEASURED IN PCT OF AREA PLANTED, AVG (fertilizer and pesticides, including chemigation) - 2000-2021. US Department of Agriculture (USDA) National Agricultural Statistics Service. https://quickstats.nass.usda.gov (direct query: https://quickstats.nass.usda.gov/results/C3A3CFC4-4341-3093-A3D2-544FBC852EF6)
- Pyroxasulfone [soil, agricultural]: 3.91177e-6 kg; normal variance with pedigree 1.33832e-11, pedigree (2,2,2,1,1)
  Pyroxasulfone emission to agricultural soil (4.545E-02 kg/ha).
  Pesticides are assumed ultimately to be 100% emitted to soil (Nemecek et al 2015). Average over state-wide reported cropped area of maize grain for all tillage practices (CTIC 2020a) and across all rotation patterns (Socolar et al 2021) - calculated from specified herbicide/insecticide/fungicide quantity applied to treated acres weighted by share of acres treated with that herbicide/insecticide/fungicide (2014, 2016, 2018, 2021 - USDA NASS data, USDA NASS 2021f, USDA NASS 2021g).
  Sources:
  Nemecek T, Bengoa X, Lansche J, et al (2015) Methodological Guidelines for the Life Cycle Inventory of Agricultural Products, Version 3.0. 84.
  CTIC (2020a) OpTIS - Operational Tillage Information System. Conservation Technology Information Center (CTIC). https://www.ctic.org/optis_tabular_queryaccessed March 23, 2021
  Socolar Y, Goldstein B R, de Valpine P, Bowles T M (2021) Biophysical and policy factors predict simplified crop rotations in the US Midwest. Environ. Res. Lett. 16 054045. . https://iopscience.iop.org/article/10.1088/1748-9326/abf9ca
  USDA NASS (2021f) CORN - APPLICATIONS, MEASURED IN LB / ACRE / YEAR, AVG and NUMBER / YEAR (fertilizer and pesticides, amount, number of applications) - 2000-2021. US Department of Agriculture (USDA) National Agricultural Statistics Service. https://quickstats.nass.usda.gov (direct query: https://quickstats.nass.usda.gov/results/5BCE1263-5F91-31A9-B3DE-117AFBDDFF20)
  USDA NASS (2021g) CORN - TREATED, MEASURED IN PCT OF AREA PLANTED, AVG (fertilizer and pesticides, including chemigation) - 2000-2021. US Department of Agriculture (USDA) National Agricultural Statistics Service. https://quickstats.nass.usda.gov (direct query: https://quickstats.nass.usda.gov/results/C3A3CFC4-4341-3093-A3D2-544FBC852EF6)
- Rimsulfuron [soil, agricultural]: 3.21515e-7 kg; normal variance with pedigree 9.54061e-15, pedigree (2,2,2,1,1)
  Rimsulfuron emission to agricultural soil (3.736E-03 kg/ha).
  Pesticides are assumed ultimately to be 100% emitted to soil (Nemecek et al 2015). Average over state-wide reported cropped area of maize grain for all tillage practices (CTIC 2020a) and across all rotation patterns (Socolar et al 2021) - calculated from specified herbicide/insecticide/fungicide quantity applied to treated acres weighted by share of acres treated with that herbicide/insecticide/fungicide (2014, 2016, 2018, 2021 - USDA NASS data, USDA NASS 2021f, USDA NASS 2021g).
  Sources:
  Nemecek T, Bengoa X, Lansche J, et al (2015) Methodological Guidelines for the Life Cycle Inventory of Agricultural Products, Version 3.0. 84.
  CTIC (2020a) OpTIS - Operational Tillage Information System. Conservation Technology Information Center (CTIC). https://www.ctic.org/optis_tabular_queryaccessed March 23, 2021
  Socolar Y, Goldstein B R, de Valpine P, Bowles T M (2021) Biophysical and policy factors predict simplified crop rotations in the US Midwest. Environ. Res. Lett. 16 054045. . https://iopscience.iop.org/article/10.1088/1748-9326/abf9ca
  USDA NASS (2021f) CORN - APPLICATIONS, MEASURED IN LB / ACRE / YEAR, AVG and NUMBER / YEAR (fertilizer and pesticides, amount, number of applications) - 2000-2021. US Department of Agriculture (USDA) National Agricultural Statistics Service. https://quickstats.nass.usda.gov (direct query: https://quickstats.nass.usda.gov/results/5BCE1263-5F91-31A9-B3DE-117AFBDDFF20)
  USDA NASS (2021g) CORN - TREATED, MEASURED IN PCT OF AREA PLANTED, AVG (fertilizer and pesticides, including chemigation) - 2000-2021. US Department of Agriculture (USDA) National Agricultural Statistics Service. https://quickstats.nass.usda.gov (direct query: https://quickstats.nass.usda.gov/results/C3A3CFC4-4341-3093-A3D2-544FBC852EF6)
- S-Metolachlor [soil, agricultural]: 3.76864e-5 kg; normal variance with pedigree 7.86739e-11, pedigree (2,2,2,1,1)
  S-metolachlor emission to agricultural soil (4.379E-01 kg/ha).
  Pesticides are assumed ultimately to be 100% emitted to soil (Nemecek et al 2015). Average over state-wide reported cropped area of maize grain for all tillage practices (CTIC 2020a) and across all rotation patterns (Socolar et al 2021) - calculated from specified herbicide/insecticide/fungicide quantity applied to treated acres weighted by share of acres treated with that herbicide/insecticide/fungicide (2014, 2016, 2018, 2021 - USDA NASS data, USDA NASS 2021f, USDA NASS 2021g).
  Sources:
  Nemecek T, Bengoa X, Lansche J, et al (2015) Methodological Guidelines for the Life Cycle Inventory of Agricultural Products, Version 3.0. 84.
  CTIC (2020a) OpTIS - Operational Tillage Information System. Conservation Technology Information Center (CTIC). https://www.ctic.org/optis_tabular_queryaccessed March 23, 2021
  Socolar Y, Goldstein B R, de Valpine P, Bowles T M (2021) Biophysical and policy factors predict simplified crop rotations in the US Midwest. Environ. Res. Lett. 16 054045. . https://iopscience.iop.org/article/10.1088/1748-9326/abf9ca
  USDA NASS (2021f) CORN - APPLICATIONS, MEASURED IN LB / ACRE / YEAR, AVG and NUMBER / YEAR (fertilizer and pesticides, amount, number of applications) - 2000-2021. US Department of Agriculture (USDA) National Agricultural Statistics Service. https://quickstats.nass.usda.gov (direct query: https://quickstats.nass.usda.gov/results/5BCE1263-5F91-31A9-B3DE-117AFBDDFF20)
  USDA NASS (2021g) CORN - TREATED, MEASURED IN PCT OF AREA PLANTED, AVG (fertilizer and pesticides, including chemigation) - 2000-2021. US Department of Agriculture (USDA) National Agricultural Statistics Service. https://quickstats.nass.usda.gov (direct query: https://quickstats.nass.usda.gov/results/C3A3CFC4-4341-3093-A3D2-544FBC852EF6)
- Saflufenacil [soil, agricultural]: 2.13186e-7 kg; normal variance with pedigree 7.05377e-15, pedigree (2,2,2,1,1)
  Saflufenacil emission to agricultural soil (2.477E-03 kg/ha).
  Pesticides are assumed ultimately to be 100% emitted to soil (Nemecek et al 2015). Average over state-wide reported cropped area of maize grain for all tillage practices (CTIC 2020a) and across all rotation patterns (Socolar et al 2021) - calculated from specified herbicide/insecticide/fungicide quantity applied to treated acres weighted by share of acres treated with that herbicide/insecticide/fungicide (2014, 2016, 2018, 2021 - USDA NASS data, USDA NASS 2021f, USDA NASS 2021g).
  Sources:
  Nemecek T, Bengoa X, Lansche J, et al (2015) Methodological Guidelines for the Life Cycle Inventory of Agricultural Products, Version 3.0. 84.
  CTIC (2020a) OpTIS - Operational Tillage Information System. Conservation Technology Information Center (CTIC). https://www.ctic.org/optis_tabular_queryaccessed March 23, 2021
  Socolar Y, Goldstein B R, de Valpine P, Bowles T M (2021) Biophysical and policy factors predict simplified crop rotations in the US Midwest. Environ. Res. Lett. 16 054045. . https://iopscience.iop.org/article/10.1088/1748-9326/abf9ca
  USDA NASS (2021f) CORN - APPLICATIONS, MEASURED IN LB / ACRE / YEAR, AVG and NUMBER / YEAR (fertilizer and pesticides, amount, number of applications) - 2000-2021. US Department of Agriculture (USDA) National Agricultural Statistics Service. https://quickstats.nass.usda.gov (direct query: https://quickstats.nass.usda.gov/results/5BCE1263-5F91-31A9-B3DE-117AFBDDFF20)
  USDA NASS (2021g) CORN - TREATED, MEASURED IN PCT OF AREA PLANTED, AVG (fertilizer and pesticides, including chemigation) - 2000-2021. US Department of Agriculture (USDA) National Agricultural Statistics Service. https://quickstats.nass.usda.gov (direct query: https://quickstats.nass.usda.gov/results/C3A3CFC4-4341-3093-A3D2-544FBC852EF6)
- Tembotrione [soil, agricultural]: 4.20102e-7 kg; normal variance with pedigree 1.16028e-14, pedigree (2,2,2,1,1)
  Tembotrione emission to agricultural soil (4.881E-03 kg/ha).
  Pesticides are assumed ultimately to be 100% emitted to soil (Nemecek et al 2015). Average over state-wide reported cropped area of maize grain for all tillage practices (CTIC 2020a) and across all rotation patterns (Socolar et al 2021) - calculated from specified herbicide/insecticide/fungicide quantity applied to treated acres weighted by share of acres treated with that herbicide/insecticide/fungicide (2014, 2016, 2018, 2021 - USDA NASS data, USDA NASS 2021f, USDA NASS 2021g).
  Sources:
  Nemecek T, Bengoa X, Lansche J, et al (2015) Methodological Guidelines for the Life Cycle Inventory of Agricultural Products, Version 3.0. 84.
  CTIC (2020a) OpTIS - Operational Tillage Information System. Conservation Technology Information Center (CTIC). https://www.ctic.org/optis_tabular_queryaccessed March 23, 2021
  Socolar Y, Goldstein B R, de Valpine P, Bowles T M (2021) Biophysical and policy factors predict simplified crop rotations in the US Midwest. Environ. Res. Lett. 16 054045. . https://iopscience.iop.org/article/10.1088/1748-9326/abf9ca
  USDA NASS (2021f) CORN - APPLICATIONS, MEASURED IN LB / ACRE / YEAR, AVG and NUMBER / YEAR (fertilizer and pesticides, amount, number of applications) - 2000-2021. US Department of Agriculture (USDA) National Agricultural Statistics Service. https://quickstats.nass.usda.gov (direct query: https://quickstats.nass.usda.gov/results/5BCE1263-5F91-31A9-B3DE-117AFBDDFF20)
  USDA NASS (2021g) CORN - TREATED, MEASURED IN PCT OF AREA PLANTED, AVG (fertilizer and pesticides, including chemigation) - 2000-2021. US Department of Agriculture (USDA) National Agricultural Statistics Service. https://quickstats.nass.usda.gov (direct query: https://quickstats.nass.usda.gov/results/C3A3CFC4-4341-3093-A3D2-544FBC852EF6)
- Thiencarbazone-methyl [soil, agricultural]: 2.47592e-7 kg; normal variance with pedigree 3.6965e-15, pedigree (2,2,2,1,1)
  Thiencarbazone-methyl emission to agricultural soil (2.877E-03 kg/ha).
  Pesticides are assumed ultimately to be 100% emitted to soil (Nemecek et al 2015). Average over state-wide reported cropped area of maize grain for all tillage practices (CTIC 2020a) and across all rotation patterns (Socolar et al 2021) - calculated from specified herbicide/insecticide/fungicide quantity applied to treated acres weighted by share of acres treated with that herbicide/insecticide/fungicide (2014, 2016, 2018, 2021 - USDA NASS data, USDA NASS 2021f, USDA NASS 2021g).
  Sources:
  Nemecek T, Bengoa X, Lansche J, et al (2015) Methodological Guidelines for the Life Cycle Inventory of Agricultural Products, Version 3.0. 84.
  CTIC (2020a) OpTIS - Operational Tillage Information System. Conservation Technology Information Center (CTIC). https://www.ctic.org/optis_tabular_queryaccessed March 23, 2021
  Socolar Y, Goldstein B R, de Valpine P, Bowles T M (2021) Biophysical and policy factors predict simplified crop rotations in the US Midwest. Environ. Res. Lett. 16 054045. . https://iopscience.iop.org/article/10.1088/1748-9326/abf9ca
  USDA NASS (2021f) CORN - APPLICATIONS, MEASURED IN LB / ACRE / YEAR, AVG and NUMBER / YEAR (fertilizer and pesticides, amount, number of applications) - 2000-2021. US Department of Agriculture (USDA) National Agricultural Statistics Service. https://quickstats.nass.usda.gov (direct query: https://quickstats.nass.usda.gov/results/5BCE1263-5F91-31A9-B3DE-117AFBDDFF20)
  USDA NASS (2021g) CORN - TREATED, MEASURED IN PCT OF AREA PLANTED, AVG (fertilizer and pesticides, including chemigation) - 2000-2021. US Department of Agriculture (USDA) National Agricultural Statistics Service. https://quickstats.nass.usda.gov (direct query: https://quickstats.nass.usda.gov/results/C3A3CFC4-4341-3093-A3D2-544FBC852EF6)
- Thifensulfuron-methyl [soil, agricultural]: 2.02165e-7 kg; normal variance with pedigree 1.77932e-14, pedigree (2,2,2,1,1)
  Thifensulfuron-methyl emission to agricultural soil (2.349E-03 kg/ha).
  Pesticides are assumed ultimately to be 100% emitted to soil (Nemecek et al 2015). Average over state-wide reported cropped area of maize grain for all tillage practices (CTIC 2020a) and across all rotation patterns (Socolar et al 2021) - calculated from specified herbicide/insecticide/fungicide quantity applied to treated acres weighted by share of acres treated with that herbicide/insecticide/fungicide (2014, 2016, 2018, 2021 - USDA NASS data, USDA NASS 2021f, USDA NASS 2021g).
  Sources:
  Nemecek T, Bengoa X, Lansche J, et al (2015) Methodological Guidelines for the Life Cycle Inventory of Agricultural Products, Version 3.0. 84.
  CTIC (2020a) OpTIS - Operational Tillage Information System. Conservation Technology Information Center (CTIC). https://www.ctic.org/optis_tabular_queryaccessed March 23, 2021
  Socolar Y, Goldstein B R, de Valpine P, Bowles T M (2021) Biophysical and policy factors predict simplified crop rotations in the US Midwest. Environ. Res. Lett. 16 054045. . https://iopscience.iop.org/article/10.1088/1748-9326/abf9ca
  USDA NASS (2021f) CORN - APPLICATIONS, MEASURED IN LB / ACRE / YEAR, AVG and NUMBER / YEAR (fertilizer and pesticides, amount, number of applications) - 2000-2021. US Department of Agriculture (USDA) National Agricultural Statistics Service. https://quickstats.nass.usda.gov (direct query: https://quickstats.nass.usda.gov/results/5BCE1263-5F91-31A9-B3DE-117AFBDDFF20)
  USDA NASS (2021g) CORN - TREATED, MEASURED IN PCT OF AREA PLANTED, AVG (fertilizer and pesticides, including chemigation) - 2000-2021. US Department of Agriculture (USDA) National Agricultural Statistics Service. https://quickstats.nass.usda.gov (direct query: https://quickstats.nass.usda.gov/results/C3A3CFC4-4341-3093-A3D2-544FBC852EF6)
- Topramezone [soil, agricultural]: 7.71714e-8 kg; normal variance with pedigree 8.32622e-16, pedigree (2,2,2,1,1)
  Topramezone emission to agricultural soil (8.967E-04 kg/ha).
  Pesticides are assumed ultimately to be 100% emitted to soil (Nemecek et al 2015). Average over state-wide reported cropped area of maize grain for all tillage practices (CTIC 2020a) and across all rotation patterns (Socolar et al 2021) - calculated from specified herbicide/insecticide/fungicide quantity applied to treated acres weighted by share of acres treated with that herbicide/insecticide/fungicide (2014, 2016, 2018, 2021 - USDA NASS data, USDA NASS 2021f, USDA NASS 2021g).
  Sources:
  Nemecek T, Bengoa X, Lansche J, et al (2015) Methodological Guidelines for the Life Cycle Inventory of Agricultural Products, Version 3.0. 84.
  CTIC (2020a) OpTIS - Operational Tillage Information System. Conservation Technology Information Center (CTIC). https://www.ctic.org/optis_tabular_queryaccessed March 23, 2021
  Socolar Y, Goldstein B R, de Valpine P, Bowles T M (2021) Biophysical and policy factors predict simplified crop rotations in the US Midwest. Environ. Res. Lett. 16 054045. . https://iopscience.iop.org/article/10.1088/1748-9326/abf9ca
  USDA NASS (2021f) CORN - APPLICATIONS, MEASURED IN LB / ACRE / YEAR, AVG and NUMBER / YEAR (fertilizer and pesticides, amount, number of applications) - 2000-2021. US Department of Agriculture (USDA) National Agricultural Statistics Service. https://quickstats.nass.usda.gov (direct query: https://quickstats.nass.usda.gov/results/5BCE1263-5F91-31A9-B3DE-117AFBDDFF20)
  USDA NASS (2021g) CORN - TREATED, MEASURED IN PCT OF AREA PLANTED, AVG (fertilizer and pesticides, including chemigation) - 2000-2021. US Department of Agriculture (USDA) National Agricultural Statistics Service. https://quickstats.nass.usda.gov (direct query: https://quickstats.nass.usda.gov/results/C3A3CFC4-4341-3093-A3D2-544FBC852EF6)
- Trifloxystrobin [soil, agricultural]: 5.74445e-7 kg; normal variance with pedigree 1.73346e-13, pedigree (2,2,2,1,1)
  Trifloxystrobin emission to agricultural soil (6.675E-03 kg/ha).
  Pesticides are assumed ultimately to be 100% emitted to soil (Nemecek et al 2015). Average over state-wide reported cropped area of maize grain for all tillage practices (CTIC 2020a) and across all rotation patterns (Socolar et al 2021) - calculated from specified herbicide/insecticide/fungicide quantity applied to treated acres weighted by share of acres treated with that herbicide/insecticide/fungicide (2014, 2016, 2018, 2021 - USDA NASS data, USDA NASS 2021f, USDA NASS 2021g).
  Sources:
  Nemecek T, Bengoa X, Lansche J, et al (2015) Methodological Guidelines for the Life Cycle Inventory of Agricultural Products, Version 3.0. 84.
  CTIC (2020a) OpTIS - Operational Tillage Information System. Conservation Technology Information Center (CTIC). https://www.ctic.org/optis_tabular_queryaccessed March 23, 2021
  Socolar Y, Goldstein B R, de Valpine P, Bowles T M (2021) Biophysical and policy factors predict simplified crop rotations in the US Midwest. Environ. Res. Lett. 16 054045. . https://iopscience.iop.org/article/10.1088/1748-9326/abf9ca
  USDA NASS (2021f) CORN - APPLICATIONS, MEASURED IN LB / ACRE / YEAR, AVG and NUMBER / YEAR (fertilizer and pesticides, amount, number of applications) - 2000-2021. US Department of Agriculture (USDA) National Agricultural Statistics Service. https://quickstats.nass.usda.gov (direct query: https://quickstats.nass.usda.gov/results/5BCE1263-5F91-31A9-B3DE-117AFBDDFF20)
  USDA NASS (2021g) CORN - TREATED, MEASURED IN PCT OF AREA PLANTED, AVG (fertilizer and pesticides, including chemigation) - 2000-2021. US Department of Agriculture (USDA) National Agricultural Statistics Service. https://quickstats.nass.usda.gov (direct query: https://quickstats.nass.usda.gov/results/C3A3CFC4-4341-3093-A3D2-544FBC852EF6)
- Zinc II [soil, agricultural]: -1.32564e-5 kg; normal variance with pedigree 0.04, pedigree (4,4,5,2,4)
  (same comment as for Cadmium II)
- Cadmium II [water, ground-]: 5.15482e-11 kg; lognormal variance with pedigree 0.180025, pedigree (4,4,5,2,4)
  Emissions of heavy metals to ground water arise from leaching. These emissions are estimated based on the SALCA-heavy metal model (Freiermuth 2006) following the procedure in the ecoinvent agricultural LCI tool (Faist Emmenegger, Délerce-Mauris and Porté 2018 Models Integrated in Ecoinvent LCI Calculation Tool for Crop Production). The crop system carries a share of heavy metals emissions based on the ratio of cropping additions to total additions (additions to crop system divided by additions to crop system plus depostion from air and present in soils)Sources for heavy metals leaching to groundwater include: Leaching of heavy metals to groundwater (Wolfensberger & Dinkel 1997), where no drainage is installed ; the share of leaching to groundwater is calculated from Drainage on all cropland acres state-wide, including tile drainage (57.9%,) and ditch drainage (7.0%). USDA (2018) 2017 Census of Agriculture, Volume 1, Chapter 2: State Level Data - Table 41. Land Use Practices: 2017 and 2012 (live table: https://www.nass.usda.gov/Quick_Stats/CDQT/chapter/2/table/41/state/US). US Department of Agriculture (USDA). https://www.nass.usda.gov/Publications/AgCensus/2017/Full_Report/Volume_1,_Chapter_2_US_State_Level/st99_2_0041_0041.pdf.
  (N.B. The uncertainty associated with manure data increases the uncertainty of the heavy metal emissions.)
  Sources:
  Freiermuth (2006) SALCA-Schwermetall - Modell zur Berechnung der Schwermetall- flüsse in der Landwirtschaftlichen Ökobilanz. Agroscope FAL Zürich-Reckenholz . https://www.agroscope.admin.ch/dam/agroscope/de/dokumente/themen/umwelt-ressourcen/produktionssysteme/salca-schwermetall.pdf.download.pdf/SALCA-Schwermetall.pdf
  Faist Emmenegger M, Reinhard J, Zah R (2009) Sustainability Quick Check for Biofuels - in- termediate background report. With contributions from T. Ziep, R. Weichbrodt, Prof. Dr. V. Wohlgemuth, FHTW Berlin and A. Roches, R. Freiermuth Knuchel, Dr. G. Gaillard, Agroscope Reckenholz-Tänikon. Dübendorf. . https://www.researchgate.net/profile/Rainer-Zah/publication/230725635_SQCB_-_Sustainability_Quick_Check_for_Biofuels_Second_draft_18th_February_2009_-_Intermediate_Background_Report_With_contributions_from_T_Ziep_R_Weichbrodt_Prof_Dr_V_Wohlgemuth_FHTW_Berlin_and_A_Roche/links/56b458fb08ae1f8aa45392e6/SQCB-Sustainability-Quick-Check-for-Biofuels-Second-draft-18th-February-2009-Intermediate-Background-Report-With-contributions-from-T-Ziep-R-Weichbrodt-Prof-Dr-V-Wohlgemuth-FHTW-Berlin-and-A-R.pdf
  Prasuhn, V (2006) Erfassung der PO4-Austräge für die Ökobilanzierung. SALCA-Phosphor. Zü-rich, CH, Agrocope FAL Reckenholz. Agrocope.
  Faist Emmenegger, Délerce-Mauris and Porté (2018) 2018 Models Integrated in Ecoinvent LCI Calculation Tool for Crop Production.
- Cadmium II [water, surface water]: 1.21297e-8 kg; lognormal variance with pedigree 0.180025, pedigree (4,4,5,2,4)
  Emissions of heavy metals to surface water arise from leaching (when drainage is present) and erosion. Emissions are estimated based on the SALCA-heavy metal model (Freiermuth 2006) following the procedure in the ecoinvent agricultural LCI tool (Faist Emmenegger, Délerce-Mauris and Porté 2018 Models Integrated in Ecoinvent LCI Calculation Tool for Crop Production). The crop system carries a share of heavy metals emissions based on the ratio of cropping additions to total additions (additions to crop system divided by additions to crop system plus depostion from air and present in soils)
  Sources:
  Freiermuth (2006) SALCA-Schwermetall - Modell zur Berechnung der Schwermetall- flüsse in der Landwirtschaftlichen Ökobilanz. Agroscope FAL Zürich-Reckenholz . https://www.agroscope.admin.ch/dam/agroscope/de/dokumente/themen/umwelt-ressourcen/produktionssysteme/salca-schwermetall.pdf.download.pdf/SALCA-Schwermetall.pdf
  Faist Emmenegger M, Reinhard J, Zah R (2009) Sustainability Quick Check for Biofuels - in- termediate background report. With contributions from T. Ziep, R. Weichbrodt, Prof. Dr. V. Wohlgemuth, FHTW Berlin and A. Roches, R. Freiermuth Knuchel, Dr. G. Gaillard, Agroscope Reckenholz-Tänikon. Dübendorf. . https://www.researchgate.net/profile/Rainer-Zah/publication/230725635_SQCB_-_Sustainability_Quick_Check_for_Biofuels_Second_draft_18th_February_2009_-_Intermediate_Background_Report_With_contributions_from_T_Ziep_R_Weichbrodt_Prof_Dr_V_Wohlgemuth_FHTW_Berlin_and_A_Roche/links/56b458fb08ae1f8aa45392e6/SQCB-Sustainability-Quick-Check-for-Biofuels-Second-draft-18th-February-2009-Intermediate-Background-Report-With-contributions-from-T-Ziep-R-Weichbrodt-Prof-Dr-V-Wohlgemuth-FHTW-Berlin-and-A-R.pdf
  Prasuhn, V (2006) Erfassung der PO4-Austräge für die Ökobilanzierung. SALCA-Phosphor. Zü-rich, CH, Agrocope FAL Reckenholz. Agrocope.
  Faist Emmenegger, Délerce-Mauris and Porté (2018) 2018 Models Integrated in Ecoinvent LCI Calculation Tool for Crop Production. Sources for heavy metals contents include: Leaching of heavy metals to surface water (Wolfensberger & Dinkel 1997), where drainage is installed ; Average heavy metal contents in crop soils, mg per kg soil, based on data for Switzerland (from Keller & Desaules, 2001). erosion rates are from US NRC National Resources Inventory, 2017. and Drainage on all cropland acres state-wide, including tile drainage (57.9%,) and ditch drainage (7.0%). USDA (2018) 2017 Census of Agriculture, Volume 1, Chapter 2: State Level Data - Table 41. Land Use Practices: 2017 and 2012 (live table: https://www.nass.usda.gov/Quick_Stats/CDQT/chapter/2/table/41/state/US). US Department of Agriculture (USDA). https://www.nass.usda.gov/Publications/AgCensus/2017/Full_Report/Volume_1,_Chapter_2_US_State_Level/st99_2_0041_0041.pdf. Fertilizer, manure and pesticide application rates are based on USDA NASS data.
  (N.B. The uncertainty associated with manure data increases the uncertainty of the heavy metal emissions.)
  Sources:
  Freiermuth (2006) SALCA-Schwermetall - Modell zur Berechnung der Schwermetall- flüsse in der Landwirtschaftlichen Ökobilanz. Agroscope FAL Zürich-Reckenholz . https://www.agroscope.admin.ch/dam/agroscope/de/dokumente/themen/umwelt-ressourcen/produktionssysteme/salca-schwermetall.pdf.download.pdf/SALCA-Schwermetall.pdf
  Faist Emmenegger M, Reinhard J, Zah R (2009) Sustainability Quick Check for Biofuels - in- termediate background report. With contributions from T. Ziep, R. Weichbrodt, Prof. Dr. V. Wohlgemuth, FHTW Berlin and A. Roches, R. Freiermuth Knuchel, Dr. G. Gaillard, Agroscope Reckenholz-Tänikon. Dübendorf. . https://www.researchgate.net/profile/Rainer-Zah/publication/230725635_SQCB_-_Sustainability_Quick_Check_for_Biofuels_Second_draft_18th_February_2009_-_Intermediate_Background_Report_With_contributions_from_T_Ziep_R_Weichbrodt_Prof_Dr_V_Wohlgemuth_FHTW_Berlin_and_A_Roche/links/56b458fb08ae1f8aa45392e6/SQCB-Sustainability-Quick-Check-for-Biofuels-Second-draft-18th-February-2009-Intermediate-Background-Report-With-contributions-from-T-Ziep-R-Weichbrodt-Prof-Dr-V-Wohlgemuth-FHTW-Berlin-and-A-R.pdf
  Prasuhn, V (2006) Erfassung der PO4-Austräge für die Ökobilanzierung. SALCA-Phosphor. Zü-rich, CH, Agrocope FAL Reckenholz. Agrocope.
  Faist Emmenegger, Délerce-Mauris and Porté (2018) 2018 Models Integrated in Ecoinvent LCI Calculation Tool for Crop Production.
- Chromium III [water, ground-]: 1.69122e-6 kg; lognormal variance with pedigree 0.180025, pedigree (4,4,5,2,4)
  (same comment as for Cadmium II)
- Chromium III [water, surface water]: 1.00441e-5 kg; lognormal variance with pedigree 0.180025, pedigree (4,4,5,2,4)
  (same comment as for Cadmium II)
- Copper ion [water, ground-]: 2.01809e-7 kg; lognormal variance with pedigree 0.180025, pedigree (4,4,5,2,4)
  (same comment as for Cadmium II)
- Copper ion [water, surface water]: 3.42242e-6 kg; lognormal variance with pedigree 0.180025, pedigree (4,4,5,2,4)
  (same comment as for Cadmium II)
- Lead II [water, ground-]: 5.38183e-10 kg; lognormal variance with pedigree 0.180025, pedigree (4,4,5,2,4)
  (same comment as for Cadmium II)
- Lead II [water, surface water]: 9.2628e-6 kg; lognormal variance with pedigree 0.180025, pedigree (4,4,5,2,4)
  (same comment as for Cadmium II)
- Mercury II [water, ground-]: 4.40132e-11 kg; lognormal variance with pedigree 0.180025, pedigree (4,4,5,2,4)
  (same comment as for Cadmium II)
- Mercury II [water, surface water]: 2.8644e-7 kg; lognormal variance with pedigree 0.180025, pedigree (4,4,5,2,4)
  (same comment as for Cadmium II)
- Nickel II [water, surface water]: 9.2256e-6 kg; lognormal variance with pedigree 0.180025, pedigree (4,4,5,2,4)
  (same comment as for Cadmium II)
- Nitrate [water, ground-]: 0.0128441 kg; lognormal variance with pedigree 0.0409, pedigree (2,2,2,1,1)
  The total nitrate leaching/runoff is 1.597E+2 kg NO3/ha (1.284E-2kg NO3/kg maize grain), 6.735E+1 kg NO3/ha from fertilisers, 1.796E+0 kg NO3/ha , 9.460E+1 kg NO3/ha from soil mineralization, and -3.997E+0 kg NO3 N uptake. Nitrate leaching is calculated with the SQCB-NO3 model (Faist Emmenegger et al. 2009) using general (state-level) parameters for slope and clay content, local precipitation and irrigation data.
  Sources:
  Faist Emmenegger M, Reinhard J, Zah R (2009) Sustainability Quick Check for Biofuels - in- termediate background report. With contributions from T. Ziep, R. Weichbrodt, Prof. Dr. V. Wohlgemuth, FHTW Berlin and A. Roches, R. Freiermuth Knuchel, Dr. G. Gaillard, Agroscope Reckenholz-Tänikon. Dübendorf. . https://www.researchgate.net/profile/Rainer-Zah/publication/230725635_SQCB_-_Sustainability_Quick_Check_for_Biofuels_Second_draft_18th_February_2009_-_Intermediate_Background_Report_With_contributions_from_T_Ziep_R_Weichbrodt_Prof_Dr_V_Wohlgemuth_FHTW_Berlin_and_A_Roche/links/56b458fb08ae1f8aa45392e6/SQCB-Sustainability-Quick-Check-for-Biofuels-Second-draft-18th-February-2009-Intermediate-Background-Report-With-contributions-from-T-Ziep-R-Weichbrodt-Prof-Dr-V-Wohlgemuth-FHTW-Berlin-and-A-R.pdf
  DeBruin J and Butzen S (2020) Nitrogen uptake by corn . Pioneer. https://www.pioneer.com/us/agronomy/nitrogen_uptake_corn.htmlaccessed 11-20-2021
  Fan, Y., Wang, Z., Liao, D. et al. (2020) Uptake and utilization of nitrogen, phosphorus and potassium as related to yield advantage in maize-soybean intercropping under different row configurations. Sci Rep 10, 9504. https://doi.org/10.1038/s41598-020-66459-y
  Hollinger S E (1995) Midwestern Climate Center Soils Atlas and Database. Crop Science Extension & Outreach, University of Illinois . https://www.isws.illinois.edu/pubdoc/C/ISWSC-179.pdf
  Bruulsema T and Jones J D (2021) Soil Test Summary 2020. Foundation for Agronomic Research and Plant Nutrition Canada present this 2020 summary of soil test levels in North America. Foundation for Agronomic Research, Plant Nutrition Canada. https://soiltest.tfi.org/about/about_soil_test_summaryaccessed August 30, 2021
  USDA (2018) 2017 Census of Agriculture, Volume 1, Chapter 2: State Level Data - Table 41. Land Use Practices: 2017 and 2012 (live table: https://www.nass.usda.gov/Quick_Stats/CDQT/chapter/2/table/41/state/US). US Department of Agriculture (USDA). https://www.nass.usda.gov/Publications/AgCensus/2017/Full_Report/Volume_1,_Chapter_2_US_State_Level/st99_2_0041_0041.pdf 6.6% is emitted to surface water and 93.4% to ground water, since 6.6% of cropland in Nebraska has drainage (USDA 2018).

- Nitrate [water, surface water]: 0.000904403 kg; lognormal variance with pedigree 0.0409, pedigree (2,2,2,1,1)
  The total nitrate leaching/runoff is 1.597E+2 kg NO3/ha (1.284E-2kg NO3/kg maize grain), 6.735E+1 kg NO3/ha from fertilisers, 1.796E+0 kg NO3/ha , 9.460E+1 kg NO3/ha from soil mineralization, and -3.997E+0 kg NO3 N uptake.
  6.6% is emitted to surface water and 93.4% to ground water, since 6.6% of cropland in Nebraska has drainage (USDA 2018).
  Nitrate leaching is calculated with the SQCB-NO3 model (Faist Emmenegger et al. 2009) using general (state-level) parameters for slope and clay content, local precipitation and irrigation data.
  Sources:
  Faist Emmenegger M, Reinhard J, Zah R (2009) Sustainability Quick Check for Biofuels - in- termediate background report. With contributions from T. Ziep, R. Weichbrodt, Prof. Dr. V. Wohlgemuth, FHTW Berlin and A. Roches, R. Freiermuth Knuchel, Dr. G. Gaillard, Agroscope Reckenholz-Tänikon. Dübendorf. . https://www.researchgate.net/profile/Rainer-Zah/publication/230725635_SQCB_-_Sustainability_Quick_Check_for_Biofuels_Second_draft_18th_February_2009_-_Intermediate_Background_Report_With_contributions_from_T_Ziep_R_Weichbrodt_Prof_Dr_V_Wohlgemuth_FHTW_Berlin_and_A_Roche/links/56b458fb08ae1f8aa45392e6/SQCB-Sustainability-Quick-Check-for-Biofuels-Second-draft-18th-February-2009-Intermediate-Background-Report-With-contributions-from-T-Ziep-R-Weichbrodt-Prof-Dr-V-Wohlgemuth-FHTW-Berlin-and-A-R.pdf
  DeBruin J and Butzen S (2020) Nitrogen uptake by corn . Pioneer. https://www.pioneer.com/us/agronomy/nitrogen_uptake_corn.htmlaccessed 11-20-2021
  Fan, Y., Wang, Z., Liao, D. et al. (2020) Uptake and utilization of nitrogen, phosphorus and potassium as related to yield advantage in maize-soybean intercropping under different row configurations. Sci Rep 10, 9504. https://doi.org/10.1038/s41598-020-66459-y
  Hollinger S E (1995) Midwestern Climate Center Soils Atlas and Database. Crop Science Extension & Outreach, University of Illinois . https://www.isws.illinois.edu/pubdoc/C/ISWSC-179.pdf
  Bruulsema T and Jones J D (2021) Soil Test Summary 2020. Foundation for Agronomic Research and Plant Nutrition Canada present this 2020 summary of soil test levels in North America. Foundation for Agronomic Research, Plant Nutrition Canada. https://soiltest.tfi.org/about/about_soil_test_summaryaccessed August 30, 2021
  USDA (2018) 2017 Census of Agriculture, Volume 1, Chapter 2: State Level Data - Table 41. Land Use Practices: 2017 and 2012 (live table: https://www.nass.usda.gov/Quick_Stats/CDQT/chapter/2/table/41/state/US). US Department of Agriculture (USDA). https://www.nass.usda.gov/Publications/AgCensus/2017/Full_Report/Volume_1,_Chapter_2_US_State_Level/st99_2_0041_0041.pdf
- Phosphate [water, ground-]: 1.20489e-5 kg; lognormal variance with pedigree 0.0428, pedigree (2,4,2,1,1)
  Phosphate leaching to ground water 0.14 kg PO4/ha (1.205E-5 kg/kg maize grain): 7.000E-2 kg PO4/ha from manure and 7.000E-2 kg PO4/ha from leaching from arable land. Phosphate leaching to ground water is calculated using the SALCA-P model (Prasuhn 2006) with an average leaching factor for arable lands and the amount of phosphate in any applied manure, as implemented in the ecoinvent agricultural LCI tool (see Ecoinvent_Too_Model_Description_20191015.pdf). Does not incorporate state or county data on soils, slope or conservation drainage infrastructure. Calculated with the ecoinvent agricultural LCI tool. If the slope is less than 3%, no phosphate loss through run-off occurs (Prasuhn 2006). If the slope is greater or equal to 3%, phosphate loss through run-off are computed like in (Prasuhn 2006) with the site-specific correction factors set to their default value (=1):
  Sources:
  Prasuhn, V (2006) Erfassung der PO4-Austräge für die Ökobilanzierung. SALCA-Phosphor. Zü-rich, CH, Agrocope FAL Reckenholz. Agrocope.
  Freiermuth (2006) SALCA-Schwermetall - Modell zur Berechnung der Schwermetall- flüsse in der Landwirtschaftlichen Ökobilanz. Agroscope FAL Zürich-Reckenholz . https://www.agroscope.admin.ch/dam/agroscope/de/dokumente/themen/umwelt-ressourcen/produktionssysteme/salca-schwermetall.pdf.download.pdf/SALCA-Schwermetall.pdf
  U.S. Department of Agriculture. 2017.
  2017 National Resources Inventory.
  Natural Resources Conservation Service, Washington, DC. 31 October 2020 *
  <http://www.nrcs.usda.gov/Internet/NRCS_RCA/reports/nri_crop_nat.html>
- Phosphate [water, surface water]: 1.80093e-5 kg; lognormal variance with pedigree 0.0428, pedigree (2,4,2,1,1)
  Phosphate runoff to surface water 0.209kg PO4/ha (1.801E-5 kg/kg maize grain): 4.478E-3 kg PO4/ha from manure, 2.978E-2 kg PO4/ha from mineral fertilisers, and 1.750E-1 kg PO4/ha from leaching from arable landPhosphate runoff to surface water is calculated using the SALCA-P model (Prasuhn 2006) with an average leaching factor for arable lands and the amount of phosphate in any applied solid manure, liquid manure and mineral fertilisers, as implemented in the ecoinvent agricultural LCI tool (see Ecoinvent_Too_Model_Description_20191015.pdf). Does not incorporate state or county data on soils, slope or conservation drainage infrastructure. Calculated with the ecoinvent agricultural LCI tool. (4.478E-3 kg PO4/ha from manure, 2.978E-2 kg PO4/ha from mineral fertilisers, and 1.750E-1 kg PO4/ha from leaching from arable land)
  Sources:
  Prasuhn, V (2006) Erfassung der PO4-Austräge für die Ökobilanzierung. SALCA-Phosphor. Zü-rich, CH, Agrocope FAL Reckenholz. Agrocope.
  Freiermuth (2006) SALCA-Schwermetall - Modell zur Berechnung der Schwermetall- flüsse in der Landwirtschaftlichen Ökobilanz. Agroscope FAL Zürich-Reckenholz . https://www.agroscope.admin.ch/dam/agroscope/de/dokumente/themen/umwelt-ressourcen/produktionssysteme/salca-schwermetall.pdf.download.pdf/SALCA-Schwermetall.pdf
  U.S. Department of Agriculture. 2017.
  2017 National Resources Inventory.
  Natural Resources Conservation Service, Washington, DC. 31 October 2020 *
  <http://www.nrcs.usda.gov/Internet/NRCS_RCA/reports/nri_crop_nat.html>
- Phosphorus [water, surface water]: 1.37042e-6 kg; lognormal variance with pedigree 0.0502, pedigree (3,2,4,3,1)
  Phosphorus emissions to surface water are based on the SALCA-P model (Prasuhn 2006), but using state-specific data for agricultural land (not crop-specific). The erosion and soil test values encompass the state-wide reported cropped area of maize grain in Iowa for all tillage practices (OPTiS 2020) and across all rotation patterns (Socolar et al 2021).Soil Phosphorus losses are calculated from an annual soil loss from water erosion on agricultural soils in Iowa of 12.89t/ha/year (NRCS 2020a)with a Phosphorus soil concentration of 20mg/kg soil, the median value from 1,139,873 soil test samples reported for Iowa in the 2020 Soil Test Survey, (the average of the 2005, 2010, 2015, and 2020 median soil Phosphorus concentrations is 24.mg/kg soil) (Bruulsema T and Jones J D 2021).No enrichment factor has been applied, because the phosphorus soil concentration samples are specifically agricultural land in the study area and thus any enrichment as a result of synthetic and organic fertilisers is already caputred in the soil test.An active cultivation duration of 6.8 months (0.56 year), covering cultivation through harvest (from weekly progress reports,USDA NASS 2021e), is used to adjust the annual erosion to the crop share (see Faist-Emmenegger et al 2009).No adjustment has been made for the presence of drainage (installed on 64.9% of crop land, USDA 2018) or any anti-erosion practices.Sources:
  NRCS (2020a) Soil losses from erosion (water and wind) on cultivated cropland, in the 2017 National Resources Inventory. USDA, Natural Resources Conservation Service. http://www.nrcs.usda.gov/Internet/NRCS_RCA/reports/nri_crop_nat.html
  Bruulsema T and Jones J D (2021) Soil Test Summary 2020. Foundation for Agronomic Research and Plant Nutrition Canada present this 2020 summary of soil test levels in North America. Foundation for Agronomic Research, Plant Nutrition Canada. https://soiltest.tfi.org/about/about_soil_test_summaryaccessed August 30, 2021
  USDA NASS (2021e) CORN - PROGRESS (planted, emerged, harvested) - 2000-2021. US Department of Agriculture (USDA) National Agricultural Statistics Service. https://quickstats.nass.usda.gov (direct query: https://quickstats.nass.usda.gov/results/C4906A1B-9BAA-31C4-8033-B8D950FECC3E)
  USDA (2018) 2017 Census of Agriculture, Volume 1, Chapter 2: State Level Data - Table 41. Land Use Practices: 2017 and 2012 (live table: https://www.nass.usda.gov/Quick_Stats/CDQT/chapter/2/table/41/state/US). US Department of Agriculture (USDA). https://www.nass.usda.gov/Publications/AgCensus/2017/Full_Report/Volume_1,_Chapter_2_US_State_Level/st99_2_0041_0041.pdf
  Prasuhn, V (2006) Erfassung der PO4-Austräge für die Ökobilanzierung. SALCA-Phosphor. Zü-rich, CH, Agrocope FAL Reckenholz. Agrocope.
  Faist Emmenegger M, Reinhard J, Zah R (2009) Sustainability Quick Check for Biofuels - in- termediate background report. With contributions from T. Ziep, R. Weichbrodt, Prof. Dr. V. Wohlgemuth, FHTW Berlin and A. Roches, R. Freiermuth Knuchel, Dr. G. Gaillard, Agroscope Reckenholz-Tänikon. Dübendorf. . https://www.researchgate.net/profile/Rainer-Zah/publication/230725635_SQCB_-_Sustainability_Quick_Check_for_Biofuels_Second_draft_18th_February_2009_-_Intermediate_Background_Report_With_contributions_from_T_Ziep_R_Weichbrodt_Prof_Dr_V_Wohlgemuth_FHTW_Berlin_and_A_Roche/links/56b458fb08ae1f8aa45392e6/SQCB-Sustainability-Quick-Check-for-Biofuels-Second-draft-18th-February-2009-Intermediate-Background-Report-With-contributions-from-T-Ziep-R-Weichbrodt-Prof-Dr-V-Wohlgemuth-FHTW-Berlin-and-A-R.pdf
- Water [water, ground-]: 0.0344106 m3; lognormal variance with pedigree 0.0015, pedigree (2,2,2,1,1)
  Irrigation water not taken up by crop. Calculated by the ecoinvent agricultural LCI tool.
- Water [water, surface water]: 0.00892128 m3; lognormal variance with pedigree 0.0015, pedigree (2,2,2,1,1)
  Irrigation water not taken up by crop. Calculated by the ecoinvent agricultural LCI tool.
- Zinc II [water, ground-]: 3.21281e-7 kg; lognormal variance with pedigree 0.180025, pedigree (4,4,5,2,4)
  (same comment as for Cadmium II)
- Zinc II [water, surface water]: 2.60773e-5 kg; lognormal variance with pedigree 0.180025, pedigree (4,4,5,2,4)
  (same comment as for Cadmium II)

## Sampling procedure
Data is obtained from state, county and national statistics, agricultural extension offices, and published literature. Data for production, yields, applications of NPKS fertilisers, applications of pesticides, row width, and irrigation (if any) was obtained from the US Dept of Agriculture's National Agricultural Statistics Service and in most cases provides high-quality data spanning the dataset time period. Field operations and energy use are from enterprise crop budgets provided by local agricultural extensions offices and their farmer survey data. Literature data is used where USDA and agricultural extension guidance and data are not available. Uncertainty distribution types and statistical parameters have been based where possible on the underlying data itself, primarily normal distributions for data from USDA NASS. Otherwise, lognormal distributions are selected for use with Pedigree scores.

## Extrapolations
Mineral fertiliser applications are crop and location (state and sub-state levels) specific for nutrient applied, based on survey data compiled by the USDA National Agricultural Statistics Service. Specific fertilisers are extrapolated from mineral fertiliser applications to maize grain in Nebraska and market consumption in the US (ecoinvent and IFA 2019). Organic fertiliser types are extrapolated from animal manure use data for maize grain in Nebraska (state-level) based on data collected by the USDA Economic Reserach Service for 2010, 2005 and 2000 and current materials on lifestock levels. Rotations are based on published analysis and classification of Cropland Data Layer GIS data for 2012-2018 and other sources (Socolar et al 2021). The US average is used for the state level values based on similarity shown in souce maps, with the exception of MO and KS (significantly more area multi-crop rotations, with rotations of alfalfa and oats). Rotations that are predominantly corn/soy (e.g., CPCSCS & SCPCSC) have also been grouped as corn-soy rotation, assuming the overall trend will continue and the year of pasture is intermittent. Corn in a non-repetitive rotation with anything else (>4% of land surveyed) is treated as corn-corn as the most conservative option. The rotation pattern is assumed to be steady throughout the period, consistent with number of years classified. Data about tillage practices are from crop-specific GIS data for corn encompassing the dataset years (OpTIS 2020). Reduced till and high-residue (>30%) reduced till have been grouped together into a single reduced till category. Soil characteristics, including pH and clay content, are extrapolated from data reported 2020 (pH, SOM) and 1995 (clay, slope), and taken as valid for the full time period. Slope is consistent with 2009 USGS data showing 64% of the crop on farmland with slope under 2% and 79% less than 3%. Drainage tile data from 2012 (reported to USDA for the 2012 agricultural census) is extrapolated as valid from that date through the rest of the time period of the dataset and the distribution of drainage is treated as homogenous for all field crops. Machine usage is modelled with midwestern US diesel consumption and field operations set out by the regional agricultural extension office and crop budgets (Lazarus 2021, ISU 2015-2021). Machine sizes (power) are approximate but based on common, recent surveys and equipment analyses (Lazarus 2021). Transports are modelled with standard distances. Emissions are calculated with standard methods according to ecoinvent documentation (Nemecek and Schnetzer, 2011. '01 crop production-direct field emissions natural resources' v1.2, August 2011 ) and the World Food LCA Database guidelines and the ecoinvent agricultural LCI tool. Pesticide data is sometimes withheld in the NASS database to avoid disclosing data for individual operations (denoted with "D" in the data returned for the query, indicating a non-zero but withheld value). Where there is obfuscated, non-zero data for particular compounds, the crop-specific U.S. average (calculated from the USDA NASS data, which covers a subset of states, generally those with non-negligible production of the particular crop) are used. For states with all (D) entries (i.e., the compound has been reported as used – non-zero -- but data cannot be shown), the average quantity and variability of the application rate for that compound across all of the specific crop in the US in the same time period is used. For states with a single non-D data year in the dataset timeframe, that data value is uded and the variability is set to the variability of the application rate for that compound across all of the specific crop in the US in the relevant time period. This U.S. corn average value and standard deviation is neither production nor area weighted, as the application rate depends on many factors and this value is intended to represent the range of use. Instead, the average percent of treated acres for the class in that state is used. That is, if the average share of planted area across all non-zero, non-withheld values for fungicide treatment is 15%, then the US average application rate for the withheld data fungicide is scaled by 15% to reflect the effective average treatment per ha for that compound on the particular crop in the state.
