# heat production, light fuel oil, at industrial furnace 1MW

Dataset: EcoSpold 2, unit process
Geography: Europe without Switzerland
Time period: 1991-01-01 to 2023-12-31
Technology level: current
Classification: ISIC rev.4 ecoinvent: 3530:Steam and air conditioning supply
Classification: EcoSpold01Categories: oil/heating systems
Tags: ConvertedDataset
Scenario: Business-as-Usual
System model: Allocation, cut-off by classification
Generated by: Niels Jungbluth
Published in: Jungbluth, N. 2007
Database: ecoinvent
isCopyrightProtected: true
accessRestrictedTo: 1

## General comment
Inventory for the operation of an oil boiler, data related to fuel input.
[This dataset was already contained in the ecoinvent database version 2. It was not individually updated during the transfer to ecoinvent version 3. Life Cycle Impact Assessment results may still have changed, as they are affected by changes in the supply chain, i.e. in other datasets. This dataset was generated following the ecoinvent quality guidelines for version 2. It may have been subject to central changes described in the ecoinvent version 3 change report (http://www.ecoinvent.org/database/ecoinvent-version-3/reports-of-changes/), and the results of the central updates were reviewed extensively. The changes added e.g. consistent water flows and other information throughout the database. The documentation of this dataset can be found in the ecoinvent reports of version 2, which are still available via the ecoinvent website. The change report linked above covers all central changes that were made during the conversion process.]

## Included activities end
Direct air emissions from combustion, including infrastructure, fuel consumption, waste and auxiliary electricity use.

## Geography
Assumption for operation in Europe.

## Technology
Average non-modulating, non-condensing furnace used in 2000.

## Time period
New data for regulated emissions like NOx, particles, other figures are partly based on older literature data.

## Parameters
- scaling factor: 1.05263 dimensionless; name scaling_factor

## Reference product
- heat, district or industrial, other than natural gas: 1 MJ; = 0.95 * scaling_factor; By-product classification allocatable product; CPC 17300: Steam and hot water
  Amount was scaled to 1.
  EcoSpold01Location=RER
  production volume 4.27186e10 MJ
    Assumption.
    The production volume does not reflect reality, but the share of heat from oil on the European market for heat, district or industrial, other than natural gas according to http://www.iea.org/statistics/statisticssearch/report/?country=EU28&product=electricityandheat&year=2012
  property price 0.0106 EUR2005
    Average European district heat price from Ecoheatcool and Euroheat 2005-2006, Ecoheat Work package 1: The European heat market. Final report. 10.6 EUR/GJ i s the price of district heat. http://www.solarthermalworld.org/files/Ecoheatcool%20WP1%20Web.pdf?download
  properties: Corresponding fuel use 1.05263 MJ, carbon allocation 0 kg, carbon content 0, heating value, net 1 MJ

## Inputs from technosphere
- chimney: 3.65495e-8 m; = 3.4722E-08 * scaling_factor; lognormal variance with pedigree 0.3526, pedigree (3,3,5,1,1)
  EcoSpold01Location=CH
  Calculated
  Amount was scaled to the amount of reference product.
  Uncertainty: Calculated
- electricity, low voltage: 0.000875168 kWh; = 0.00083141 * scaling_factor; lognormal variance with pedigree 0.0426, pedigree (3,3,5,1,1)
  Literature
  Amount was scaled to the amount of reference product.
  EcoSpold01Location=UCTE
  Uncertainty: Literature
- industrial furnace, 1MW, oil: 2.924e-9 unit; = 2.7778E-09 * scaling_factor; lognormal variance with pedigree 0.3526, pedigree (3,3,5,1,1)
  EcoSpold01Location=CH
  Estimation 5000h use per year
  Amount was scaled to the amount of reference product.
  Uncertainty: Estimation 5000h use per year
- light fuel oil: 0.0246526 kg; = 0.02342 * scaling_factor; lognormal variance with pedigree 0.0412, pedigree (2,3,5,1,1)
  EcoSpold01Location=RER
  Literature
  Amount was scaled to the amount of reference product.
  Uncertainty: Literature
  properties: carbon content, fossil 0.862, dry mass 1 kg, heating value, net 42.6 MJ, wet mass 1 kg
- oil storage, 3000l: 3.89863e-8 unit; = 3.7037E-08 * scaling_factor; lognormal variance with pedigree 0.3526, pedigree (3,3,5,1,1)
  Calculated
  Amount was scaled to the amount of reference product.
  EcoSpold01Location=CH
  Uncertainty: Calculated

## Emissions to nature
- Ammonia [air, urban air close to ground]: 1.57895e-7 kg; = 1.5E-07 * scaling_factor; lognormal variance with pedigree 0.5, pedigree (1,1,5,1,1)
  Literature, calculation from ranges
  Amount was scaled to the amount of reference product.
- Benzene [air, urban air close to ground]: 1.57895e-8 kg; = 1.5E-08 * scaling_factor; lognormal variance with pedigree 0.8526, pedigree (3,3,5,1,1)
  Literature, basic uncertainty estimated = 6
  Amount was scaled to the amount of reference product.
  Uncertainty: Literature, basic uncertainty estimated = 6
- Benzo(a)pyrene [air, urban air close to ground]: 2.94737e-11 kg; = 2.8E-11 * scaling_factor; lognormal variance with pedigree 0.8526, pedigree (3,3,5,1,1)
  (same comment as for Benzene)
- Butane [air, urban air close to ground]: 3.31579e-7 kg; = 3.15E-07 * scaling_factor; lognormal variance with pedigree 0.8526, pedigree (3,3,5,1,1)
  (same comment as for Benzene)
- Carbon dioxide, fossil [air, urban air close to ground]: 0.0778947 kg; = 0.074 * scaling_factor; lognormal variance with pedigree 0.0426, pedigree (3,3,5,1,1)
  Literature
  Amount was scaled to the amount of reference product.
  Uncertainty: Literature
- Carbon monoxide, fossil [air, urban air close to ground]: 4.21053e-6 kg; = 4E-06 * scaling_factor; lognormal variance with pedigree 0.2, pedigree (1,1,5,1,1)
  Calculation from ranges
  Amount was scaled to the amount of reference product.
- Copper ion [air, urban air close to ground]: 7.36842e-7 kg; = 7E-07 * scaling_factor; lognormal variance with pedigree 0.6926, pedigree (3,3,5,1,1)
  Literature
  Amount was scaled to the amount of reference product.
  Uncertainty: Literature
- Dinitrogen monoxide [air, urban air close to ground]: 6.31579e-7 kg; = 6E-07 * scaling_factor; lognormal variance with pedigree 0.57, pedigree (1,1,5,1,1)
  Calculation from ranges
  Amount was scaled to the amount of reference product.
- Dioxins, measured as 2,3,7,8-tetrachlorodibenzo-p-dioxin [air, urban air close to ground]: 4.73684e-16 kg; = 4.5E-16 * scaling_factor; lognormal variance with pedigree 0.3526, pedigree (3,3,5,1,1)
  Literature
  Amount was scaled to the amount of reference product.
  Uncertainty: Literature
- Formaldehyde [air, urban air close to ground]: 9.47368e-7 kg; = 9E-07 * scaling_factor; lognormal variance with pedigree 0.8526, pedigree (3,3,5,1,1)
  (same comment as for Benzene)
- Hydrocarbons, aliphatic, alkanes, unspecified [air, urban air close to ground]: 5.05263e-7 kg; = 4.8E-07 * scaling_factor; lognormal variance with pedigree 0.8526, pedigree (3,3,5,1,1)
  (same comment as for Benzene)
- Hydrocarbons, aromatic [air, urban air close to ground]: 3.15789e-8 kg; = 3E-08 * scaling_factor; lognormal variance with pedigree 0.8526, pedigree (3,3,5,1,1)
  (same comment as for Benzene)
- Hydrochloric acid [air, urban air close to ground]: 9.89474e-8 kg; = 9.4E-08 * scaling_factor; lognormal variance with pedigree 0.0926, pedigree (3,3,5,1,1)
  Literature
  Amount was scaled to the amount of reference product.
  Uncertainty: Literature
- Hydrogen fluoride [air, urban air close to ground]: 9.47368e-9 kg; = 9E-09 * scaling_factor; lognormal variance with pedigree 0.0926, pedigree (3,3,5,1,1)
  Literature
  Amount was scaled to the amount of reference product.
  Uncertainty: Literature
- Mercury II [air, urban air close to ground]: 5.26316e-10 kg; = 5E-10 * scaling_factor; lognormal variance with pedigree 0.6926, pedigree (3,3,5,1,1)
  Literature
  Amount was scaled to the amount of reference product.
  Uncertainty: Literature
- Methane, fossil [air, urban air close to ground]: 1.05263e-6 kg; = 1E-06 * scaling_factor; lognormal variance with pedigree 0.8526, pedigree (3,3,5,1,1)
  (same comment as for Benzene)
- Nitrogen oxides [air, urban air close to ground]: 5.26316e-5 kg; = 5E-05 * scaling_factor; lognormal variance with pedigree 0.69, pedigree (1,1,5,1,1)
  Calculation from ranges
  Amount was scaled to the amount of reference product.
- PAH, polycyclic aromatic hydrocarbons [air, urban air close to ground]: 6.10526e-10 kg; = 5.8E-10 * scaling_factor; lognormal variance with pedigree 0.3526, pedigree (3,3,5,1,1)
  Literature
  Amount was scaled to the amount of reference product.
  Uncertainty: Literature
- Particulate Matter, < 2.5 um [air, urban air close to ground]: 1.05263e-7 kg; = 1E-07 * scaling_factor; lognormal variance with pedigree 0.3526, pedigree (3,3,5,1,1)
  Literature
  Amount was scaled to the amount of reference product.
  Uncertainty: Literature
- Pentane [air, urban air close to ground]: 2.21053e-7 kg; = 2.1E-07 * scaling_factor; lognormal variance with pedigree 0.8526, pedigree (3,3,5,1,1)
  (same comment as for Benzene)
- Propane [air, urban air close to ground]: 2.11579e-8 kg; = 2.01E-08 * scaling_factor; lognormal variance with pedigree 0.8526, pedigree (3,3,5,1,1)
  (same comment as for Benzene)
- Sulfur dioxide [air, urban air close to ground]: 4.93053e-5 kg; = 4.684E-05 * scaling_factor; lognormal variance with pedigree 1.24, pedigree (1,1,5,1,1)
  Calculation from ranges
  Amount was scaled to the amount of reference product.
- Toluene [air, urban air close to ground]: 3.15789e-8 kg; = 3E-08 * scaling_factor; lognormal variance with pedigree 0.8526, pedigree (3,3,5,1,1)
  (same comment as for Benzene)
- Zinc II [air, urban air close to ground]: 7.36842e-7 kg; = 7E-07 * scaling_factor; lognormal variance with pedigree 0.6926, pedigree (3,3,5,1,1)
  Literature
  Amount was scaled to the amount of reference product.
  Uncertainty: Literature

## Sampling procedure
Data published in literature based on measurements.

## Review by Michael Spielmann (obsolete) 2006-02-16
passed
none
