# nuclear power plant construction, pressure water reactor 650MW

Dataset: EcoSpold 2, unit process
Geography: RoW
Time period: 1982-01-01 to 2023-12-31
Technology level: current
Classification: ISIC rev.4 ecoinvent: 4220:Construction of utility projects
Classification: EcoSpold01Categories: nuclear power/power plants
Scenario: Business-as-Usual
System model: Allocation, cut-off by classification
Generated by: Pablo Tirado
Database: ecoinvent
isCopyrightProtected: true
accessRestrictedTo: 1

## General comment
This dataset represents the construction of a pressure water nuclear plant .This dataset is based on study on the production, transport and distribution of electricity in Quebec.
The CANDU (CANada Deuterium Uranium) technology was used to built this nuclear power plant. This nuclear technology is characterized by the use of heavy water as moderator and natural uranium as fuel.
Source: http://www.candu.com/en/home/default.aspx
There are 11 reactors with this technology in the world with installed powers around 700MW.
[This dataset was already contained in the ecoinvent database version 2. It was not individually updated during the transfer to ecoinvent version 3. Life Cycle Impact Assessment results may still have changed, as they are affected by changes in the supply chain, i.e. in other datasets. This dataset was generated following the ecoinvent quality guidelines for version 2. It may have been subject to central changes described in the ecoinvent version 3 change report (http://www.ecoinvent.org/database/ecoinvent-version-3/reports-of-changes/), and the results of the central updates were reviewed extensively. The changes added e.g. consistent water flows and other information throughout the database. The documentation of this dataset can be found in the ecoinvent reports of version 2, which are still available via the ecoinvent website. The change report linked above covers all central changes that were made during the conversion process.]

## Included activities start
From land transformation and construction operations.

## Included activities end
The activity ends with the dismantling of the plant after use. The decomissioning is projected to last about 50 years, with a dormancy period, where maintenance activities occur, the buildings dismantling and the site reclamation.
This datasets includes:
- the most important materials used for the construction of the plant and the associated infrastructures: cement, gravel, steel, copper, lead, aluminium;
- operations and machinery for construction
- and use;
- decommissioning and waste treatment
The dataset does not include:
-The maintenance operations during the dormancy period;
-The site reclamation operations

## Geography
Data collected for Quebec. Uncertainty adjusted accordngly

## Technology
Data refer to Gentilly-2 nuclear power plant, the only nuclear facility in Quebec. The Gentilly-2 CANDU pressurized heavy water reactor (PHWR) has a gross output of 675 MWe.
The nuclear plant includes as main components:
-CANDU reactor
-Moderator system
-Heat transport system
-Turbine generator system
-Reactor regulator system
-Management systems (water, heavy water, liquid wastes, gas effluents)
-Spent fuel stockage
-Solid radioactive wastes stockage
-Energy systems (auxiliary system, batteries, etc.)
-Buildings

## Time period
Between 1982 and 2012 but assumed to be equivalent to present construction (energy, explosives and opérations)

## Reference product
- nuclear power plant, pressure water reactor, 650MW: 1 unit; name amount_RP; By-product classification allocatable product; CPC 53262: Power plants; HS2017 840110: Nuclear reactors
  production volume 0.333333 unit; name APV_RP; = 11/lifetime
    Calculated from lifetime and number of nuclear plants in the world. 11 similar plants in the world.
    source: http://www.candu.com/en/home/candureactors/candu6/default.aspx
  property lifetime 30 year; name lifetime
    LIterature value. Based on reali lifetime. The plant started its operation in 1982 and ended in 2012.
  property price 1.49027e8 EUR2005
    Calculated based on inputs: The price of the product has been calculated as a sum of the values of the material and energy inputs for this product. This value is therefore a rough estimation. It may underestimate the real price since there are additional expenses when producing any product. These expences can include for example labour costs, treatment of waste materials and profit for the producer. Please consider carefully whether this level of data quality is acceptable for your application.
  properties: carbon allocation 0 kg, carbon content 0

## Inputs from technosphere
- aluminium oxide, non-metallurgical: 842.385, 142.615 kg (2 suppliers, which the file names only by identifier); sum of these 985 kg; = 1.00E+03*(1-.015); lognormal variance with pedigree 0.0427, pedigree (3,1,5,3,1)
  Estimated value. Palladium alumine (1.5% palladium and 98.5% aluminium oxide)
  properties: dry mass 1 kg, wet mass 1 kg
- aluminium, cast alloy: 350 kg; name aluCast; = 1000*.35; lognormal variance with pedigree 0.0487, pedigree (4,1,5,3,1)
  EcoSpold01Location=RER
  Literature/estimated value. Sum of all the aluminium used in the plant and its equipments. It is assumed that 65% of the total aluminium is wrought alloy and 35% is cast alloy
  properties: dry mass 1 kg, wet mass 1 kg
- aluminium, wrought alloy: 650 kg; name aluWrought; = 1000*.65; lognormal variance with pedigree 0.0487, pedigree (4,1,5,3,1)
  Literature/estimated value. Sum of all the aluminium used in the plant and its equipments. It is assumed that 65% of the total aluminium is wrought alloy and 35% is cast alloy
  EcoSpold01Location=RER
  properties: dry mass 1 kg, wet mass 1 kg
- brass: 267655, 1345 kg (2 suppliers, which the file names only by identifier); sum of these 269000 kg; lognormal variance with pedigree 0.0413, pedigree (2,1,5,3,1)
  Literature value. Sum of all the brass used in the plant and its equipments.
  properties: dry mass 1 kg, wet mass 1 kg
- cadmium: 168 kg; lognormal variance with pedigree 0.0413, pedigree (2,1,5,3,1)
  Literature value. Sum of all the cadmium used in the plant and its equipments.
  properties: dry mass 1 kg, wet mass 1 kg
- concrete, normal strength: 2273.82, 499.32, 789.221, 324.78, 433.686, 4042.35, 4792, 171428 m3 (8 suppliers, which the file names only by identifier); sum of these 184583 m3; = 4.43E+08/2400; lognormal variance with pedigree 0.0413, pedigree (2,1,5,3,1)
  EcoSpold01Location=CH
  Literature value. Sum of all the concrete used in the plant and its equipments.
  properties: dry mass 2190 kg, water content 0.086758, wet mass 2380 kg
- copper, cathode: 600000 kg; name copper; lognormal variance with pedigree 0.0413, pedigree (2,1,5,3,1)
  Literature value. Sum of all the copper used in the plant and its equipments.
  EcoSpold01Location=RER
  properties: dry mass 1 kg, wet mass 1 kg
- diesel, burned in building machine: 1.9e8 MJ; lognormal variance with pedigree 0.1, pedigree (1,5,5,5,4)
  EcoSpold01Location=GLO
  Estimated value. Extrapolation from another plant type
  properties: heating value, net 1 MJ
- electricity, medium voltage: 1.49497e7, 2.98213e8, 7.46536e6, 4.57811e6, 6.45524e7, 916303, 196751, 2.08233e7, 3.07951e7, 8.85102e7 kWh (10 suppliers, which the file names only by identifier); sum of these 5.31e8 kWh; lognormal variance with pedigree 0.1, pedigree (1,5,5,5,4)
  EcoSpold01Location=CH
  Estimated value. Extrapolation from another plant type
- excavation, hydraulic digger: 100000 m3; lognormal variance with pedigree 0.0413, pedigree (2,1,5,3,1)
  EcoSpold01Location=RER
  Literature value. Sum of all the concrete used in the plant and its equipments.
- gravel, crushed: 41933.1, 736845, 253.458, 191968 kg (4 suppliers, which the file names only by identifier); sum of these 971000 kg; lognormal variance with pedigree 0.0413, pedigree (2,1,5,3,1)
  Literature value. Sum of all the gravel used in the plant and its equipments.
  properties: dry mass 1 kg, wet mass 1 kg
- heat, district or industrial, other than natural gas: 1.32466e8, 3.38433e6 MJ (2 suppliers, which the file names only by identifier); sum of these 1.3585e8 MJ; lognormal variance with pedigree 0.1, pedigree (1,5,5,5,4)
  Estimated value. Extrapolation from another plant type
  EcoSpold01Location=CH
  properties: heating value, net 1 MJ
- inert waste, for final disposal: -4.85937e8, -3.16357e6 kg (2 suppliers, which the file names only by identifier); sum of these -4.891e8 kg; = concrete*2400+ gravel+ reinfSteel+ steelLowAlloyed+brass+lead+wood
  EcoSpold01Location=CH
  Estimated value. All the buildings and infrastructures
  production volume; = APV_RP* inertWaste/ amount_RP
    Calculated from the production volume of nuclear power plant, in proportion to the respective output amounts.
  properties: dry mass 0.995 kg, water content 0.00502513, wet mass 1 kg
- iron-nickel-chromium alloy: 1.02e6 kg; name alloy; lognormal variance with pedigree 0.0413, pedigree (2,1,5,3,1)
  Literature value. Sum of all the alloy (Incolloy-800) used in the plant and its equipments.
  properties: dry mass 1 kg, wet mass 1 kg
- lead: 20000 kg; lognormal variance with pedigree 0.0413, pedigree (2,1,5,3,1)
  Literature value. Sum of all the lead used in the plant and its equipments.
  properties: dry mass 1 kg, wet mass 1 kg
- palladium: 15 kg; = 1.00E+03*.015; lognormal variance with pedigree 0.0427, pedigree (3,1,5,3,1)
  Estimated value. Palladium alumine (1.5% palladium and 98.5% aluminium oxide)
  properties: dry mass 1 kg, wet mass 1 kg
- platinum: 1000 kg; lognormal variance with pedigree 0.0413, pedigree (2,1,5,3,1)
  Literature value. Sum of all the platinum used in the plant and its equipments.
  properties: dry mass 1 kg, wet mass 1 kg
- plywood: 3.36074, 71.3059 m3 (2 suppliers, which the file names only by identifier); sum of these 74.6667 m3; = 5.60E+04/750; lognormal variance with pedigree 0.0413, pedigree (2,1,5,3,1)
  Literature value. Sum of all the concrete used in the plant and its equipments.
  EcoSpold01Location=RER
  properties: carbon content, fossil 0.09783, carbon content, non-fossil 0.409818, dry mass 768.6 kg, heating value, net 11688.9 MJ, price 400 EUR2005, water content 0.070778, wet mass 823 kg
- reinforcing steel: 140000 kg; name reinfSteel; lognormal variance with pedigree 0.0413, pedigree (2,1,5,3,1)
  Literature value. Sum of all the reinforcing steel used in the plant and its equipments.
  EcoSpold01Location=RER
  properties: carbon content, fossil 0.004, dry mass 1 kg, wet mass 1 kg
- scrap aluminium: -667.91, -317.208, -14.8827 kg (3 suppliers, which the file names only by identifier); sum of these -1000 kg; = aluWrought+ aluCast
  Estimated value. All the aluminium used in buildings and equipments
  production volume; = scrapAlu* APV_RP/ amount_RP
    Calculated from production volume of reference product using the relative outputs.
  properties: dry mass 1 kg, wet mass 1 kg
- scrap copper: -400746, -190325, -8929.62 kg (3 suppliers, which the file names only by identifier); sum of these -600000 kg; = copper
  Estimated value. All the copper used in buildings and equipments
  production volume; = scrapCopper* APV_RP/ amount_RP
    Calculated from production volume of reference product using the relative outputs.
  properties: dry mass 1 kg, wet mass 1 kg
- scrap steel: -3.13132e7, -1.49658e7, -18961.2 kg (3 suppliers, which the file names only by identifier); sum of these -4.6298e7 kg; = steelChromium+ steelLowAlloyed
  Estimated value. All the steel used in buildings and equipments
  production volume; = scrapSteel* APV_RP/ amount_RP
    Calculated from production volume of reference product using the relative outputs.
  properties: dry mass 1 kg, wet mass 1 kg
- steel, chromium steel 18/8, hot rolled: 1.598e6 kg; name steelChromium; = 2.18E+05+1.38E+06; lognormal variance with pedigree 0.0413, pedigree (2,1,5,3,1)
  Literature value. Sum of all the steel, chromium used in the plant and its equipments.
  EcoSpold01Location=RER
  properties: carbon content, fossil 0.0008, dry mass 1 kg, wet mass 1 kg
  note on carbon content, fossil: Stainless steel model is the grade 304 steel (18/8 stainless, 18% chromium 8% nickel; max. 0.08% C)
- steel, low-alloyed, hot rolled: 4.47e7 kg; name steelLowAlloyed; lognormal variance with pedigree 0.0413, pedigree (2,1,5,3,1)
  (same comment as for excavation, hydraulic digger)
  properties: carbon content, fossil 0.005, dry mass 1 kg, wet mass 1 kg
  note on carbon content, fossil: Low alloyed steel composition given in Tab. 3.2 ecoinvent v2.2 report 10_partII. Steel assumed to have a C content of 0.5%
- zircon: 615000 kg; lognormal variance with pedigree 0.0807, pedigree (5,1,5,3,1)
  Estimated/literature value. Sum of all the Zircalloy-2 used in the plant and its equipments.
  properties: dry mass 1 kg, wet mass 1 kg

## Inputs from nature
All rows: lognormal variance with pedigree 0.0807, pedigree (2,1,5,3,1)
- Occupation, construction site [natural resource, land]: 6e6 m2*year; = 3*UnitConversion(1, 'km2', 'm2')*.5*4
  Calculated value. Total surface multiplied by the duration of construction (4 years)
- Occupation, industrial area [natural resource, land]: 4.5e7 m2*year; = 3*UnitConversion(1, 'km2', 'm2')*.5*lifetime
  Calculated value. Total surface multiplied by lifetime
- Transformation, from pasture, man made [natural resource, land]: 3e6 m2; = 3*UnitConversion(1, 'km2', 'm2')
  Estimated value. 3 km2 of total surface.
- Transformation, to industrial area [natural resource, land]: 1.5e6 m2; = 3*UnitConversion(1, 'km2', 'm2')*.5
  Estimated value. 3 km2 of total surface.
- Transformation, to unspecified [natural resource, land]: 1.5e6 m2; = 3*UnitConversion(1, 'km2', 'm2')*.5
  Estimated value. 3 km2 of total surface.

## Sampling procedure
assumptions

## Extrapolations
Extrapolation from regional dataset. Uncertainty is adjusted accordingly

## Review by Christian Bauer 2014-01-05
This dataset was thoroughfully reviewed and complies with the Data Quality Guidelines.

## Review by Emilia Moreno Ruiz 2015-09-17
broken formula fixed
