# gravel production, crushed

Dataset: EcoSpold 2, unit process
Geography: CH
Time period: 2013-01-01 to 2023-12-31
Technology level: current
Classification: EcoSpold01Categories: construction materials/additives
Classification: ISIC rev.4 ecoinvent: 0810:Quarrying of stone, sand and clay
Scenario: Business-as-Usual
System model: Allocation, cut-off by classification
Share of production covered: 100 %
Generated by: Frank Werner
Published in: Kellenberger D. 2004
Database: ecoinvent
isCopyrightProtected: true
accessRestrictedTo: 1

## General comment
This dataset represents the production of 1 kg of crushed gravel. From the total amount (100%) of mined gravel round, crushed and sand, about 15% is crushed gravel.

## Included activities start
From gravel at ground, unexcavated.

## Included activities end
This activity ends with the crushed gravel produced and the recultivation process done. This dataset includes the whole manufacturing process, internal processes (transport, etc.) and infrastructure. This dataset doesn't include the administration and wastewater wasn't considered because it has been assumed that the content is mainly superfine sand which has no negative effect on the ground water and soil.

## Geography
Data was obtained from Swiss industries.

## Technology
The typical technology for Swiss production was assumed.

## Parameters
- fraction, process water, to air: 0.272727 dimensionless; name fraction_PW_to_air; lognormal variance with pedigree 0.092025, pedigree (4,4,3,2,4)
  Calculated based on literature value (Byers, 2003) (Vionnet, S., Quantis Water Database - Technical Report, 2012).
- fraction, tap water, to air: 0.272727 dimensionless; name fraction_TW_to_air; = fraction_PW_to_air; lognormal variance with pedigree 0.092025, pedigree (4,4,3,2,4)
  Calculated value. See comment in the other parametres present in this dataset. Tap water is considered to be always used as process water, thus process water fractions to air are applied to all tap water input flows to calculate the amount of water consumed in the processes.

## Reference product
- gravel, crushed: 1 kg; name m_gravel; By-product classification allocatable product; CPC 15320: Pebbles, gravel, broken or crushed stone, macadam; granules, chippings and powder of stone; HS2017 251710: Pebbles, gravel, broken or crushed stone; of a kind commonly used for concrete aggregates, for road metalli[...]
  The largest use of construction sand and gravel is as aggregate for the production of concrete. The second largest use is as foundation material for highways, railways, runways, etc. Other major uses include aggregate for hot mix asphalt, and filler for highway, dam, and other back-filling. Smaller volumes of construction sand and gravel are used in plaster and gunite sands, snow and ice control, and railroad ballast.
  The largest use of construction sand and gravel is as aggregate for the production of concrete. The second largest use is as foundation material for highways, railways, runways, etc. Other major uses include aggregate for hot mix asphalt, and filler for highway, dam, and other back-filling. Smaller volumes of construction sand and gravel are used in plaster and gunite sands, snow and ice control, and railroad ballast.
  production volume 1.2675e9 kg; name p_gravel; = 50*0.65*0.15*1E12*0.00026
    estimate based on http://www.kiesfuergenerationen.ch/resources/uploads/VTB_Bericht_Endversion%20extern.pdf
  property price 0.00828715 EUR2005
    Price, average unit value, dollars per metric ton in 2022 of crushed stone (gravel, crushed) of 14 USD/metric ton. The price is the annual average free-on-board plant prices, usually at the first point of sale or captive use, as reported by crushed stone producing companies. Prices do not include transportation from the plant or yard to the consumer, although they do include all costs of mining, processing, in-plant transportation, overhead, and profit. Value retrieved from USGS, Mineral Commodity Summaries 2023, accessed on 20230918: https://pubs.usgs.gov/periodicals/mcs2023/mcs2023-stone-crushed.pdf from https://www.usgs.gov/centers/national-minerals-information-center/crushed-stone-statistics-and-information
    The price was converted to EUR based on the annual exchange rates published by the European Central Bank (https://sdw.ecb.europa.eu/quickview.do?SERIES_KEY=120.EXR.A.USD.EUR.SP00.A, last accessed on 2023-06-01) and adjusted for inflation relative to 2005 using the producer price index (PPI) of the euro area, published by eurostat (https://ec.europa.eu/eurostat/databrowser/view/STS_INPP_A__custom_6416181/default/table?lang=en, last accessed on 2023-06-01).
  properties: carbon allocation 0 kg, carbon content 0, carbon content, fossil 0, carbon content, non-fossil 0, dry mass 1 kg, water content 0, water in wet mass 0 kg, wet mass 1 kg

## Inputs from technosphere
- building, hall, steel construction: 2.85e-6 m2; lognormal variance with pedigree 0.338, pedigree (3,5,4,1,1)
  Estimation. A total area of the mine is estimated in 12'000m2. However, 3'000m2 are included in the module 'gravel/sand quarry construction' and the remaining 9'000m2 are accounted in this dataset.
  This exchange has an activity link directly to the producing activity because the product is primarily consumed in the same geographical area where it is produced.
- conveyor belt: 9.51e-8 m; lognormal variance with pedigree 0.390025, pedigree (5,4,4,2,1)
  Estimation. A conveyor belt with a lenght of 1.000m was assumed, considering that the 15% is used for the transportation of crushed gravel. A service life of 25 years was estimated. The yearly production amount considered was 63,096.75 tons (15% of 420,645).
  Estimation. A conveyor belt with a lenght of 1.000m was assumed, considering that the 15% is used for the transportation of crushed gravel. A service life of 25 years was estimated. The yearly production amount considered was 63,096.75 tons (15% of 420,645).
- diesel, burned in building machine: 0.0143 MJ; source Künniger T. 2001; lognormal variance with pedigree 0.019225, pedigree (2,3,4,2,1)
  Literature value. The fuel for the mining of crushed gravel, recultivation and internal transport are included.
  properties: heating value, net 1 MJ
- electricity, medium voltage: 0.00398 kWh; lognormal variance with pedigree 0.0192, pedigree (2,3,4,1,1)
  Value from on-site measurements in 21 querries in Switzerland taken for 2013
- gravel/sand quarry infrastructure: 4.75e-11 unit; source Künniger T. 2001; lognormal variance with pedigree 0.3186, pedigree (1,3,4,1,1)
  Literature value. The 15% of the total unit mine is considered for crushed gravel.
- heat, central or small-scale, other than natural gas: 0.00491 MJ; source Künniger T. 2001; lognormal variance with pedigree 0.0192, pedigree (2,3,4,1,1)
  Literature value. Heating of the production plant is considered.
  properties: heating value, net 1 MJ
- industrial machine, heavy, unspecified: 9.51e-5 kg; lognormal variance with pedigree 0.338025, pedigree (3,5,4,2,1)
  Estimation. The machines used for the production of crushed gravel are considered: 4 crushers (assuming each 25t), 3 sieves (assuming each 5t) and 5 'small' silos (assuming each 7t). The total weight of the machines considered is 150 t. The service life of all these machines is assumed to be 25 years. The part of the machines which belongs to the mining process itself is included in the module 'gravel/sand mine'. Wearing parts and lubricating oil is taken into account. The total amount of material treated by these machines over 25 years is therefore about 131.25 Mio tons.
  Estimation. The machines used for the production of crushed gravel are considered: 4 crushers (assuming each 25t), 3 sieves (assuming each 5t) and 5 'small' silos (assuming each 7t). The total weight of the machines considered is 150 t. The service life of all these machines is assumed to be 25 years. The part of the machines which belongs to the mining process itself is included in the module 'gravel/sand mine'. Wearing parts and lubricating oil is taken into account. The total amount of material treated by these machines over 25 years is therefore about 131.25 Mio tons.
- lubricating oil: 2.5e-6 kg; source Künniger T. 2001; lognormal variance with pedigree 0.019225, pedigree (2,3,4,2,1)
  Literature value. Lubricating grease and oil are considered as process materials.
  properties: carbon content, fossil 0.75, dry mass 1 kg, heating value, net 40.2 MJ, wet mass 1 kg
  note on carbon content, fossil: Lubricating oil is produced from diesel. C-content/dry mass of fats and oils considered 75%, from: ecoinvent v2.2 report, n 15a, pg 40
  note on heating value, net: Literature value, Source: IPCC 2006, 2006 IPCC Guidelines for National Greenhouse Gas Inventories, Prepared by the National Greenhouse Gas Inventories Programme, Eggleston H.S., Buendia L., Miwa K., Ngara T. and Tanabe K. (eds). Published: IGES, Japan
- municipal solid waste: -2.12e-6 kg; name m_municipal_waste; source Künniger T. 2001; lognormal variance with pedigree 0.0012, pedigree (2,3,1,1,1)
  Proxy. Disposal of municipal solid waste is used as proxy.
  Literature value, different waste as syntethic rubber, plastics, etc. are disposed.
  production volume; = m_municipal_waste/m_gravel*p_gravel
    Calculated from the production volume of gravel, crushed in proportion to the respective output amounts.
  properties: carbon content, fossil 0.171549, carbon content, non-fossil 0.261655, dry mass 0.771 kg, heating value, net 11.74 MJ, water content 0.297017, wet mass 1 kg
  note on carbon content, fossil: MSW composition in tab 4.1, ecoinvent v2.2 report 13_I. C content referred to 1 kg DM
  note on heating value, net: Value taken from the general comment of the treatment dataset.
- recultivation, limestone mine: 1.27e-6 m2; source Künniger T. 2001; lognormal variance with pedigree 0.1406, pedigree (3,3,4,1,1)
  Proxy, based on literature values. 'Recultivation, limestone mine' is used as proxy, an important difference is the amount of transformation to a certain area which is just left to nature.
  This exchange has an activity link directly to the producing activity because the product is primarily consumed in the same geographical area where it is produced.
- steel, low-alloyed, hot rolled: 5.1e-5 kg; source Künniger T. 2001; lognormal variance with pedigree 0.019225, pedigree (2,3,4,2,1)
  Literature value. The wearing parts (metal) are considered as process materials.
  properties: carbon content, fossil 0.005, dry mass 1 kg, wet mass 1 kg
  note on carbon content, fossil: Low alloyed steel composition given in Tab. 3.2 ecoinvent v2.2 report 10_partII. Steel assumed to have a C content of 0.5%
- synthetic rubber: 4e-6 kg; source Künniger T. 2001; lognormal variance with pedigree 0.019225, pedigree (2,3,4,2,1)
  Literature value. The wearing parts (no metal) are considered as process materials.
  properties: carbon content, fossil 0.871949, dry mass 1 kg, heating value, net 26.42 MJ, wet mass 1 kg
  note on carbon content, fossil: EPDM (Ethylene-propene-diene terpolymer) rubber is a terpolymer of ethylene, propene, and a diene with the residual unsaturated portion of the diene in the side chain (ecoinvent v2.2 report 7-part XX & Ullmann). Chemical formula (deduced from Evidences of Solvent-Induced Miscibility in Polychloroprene-co-Ethylene-Propene Diene Terpolymer Blends, Dubey et al., Journal of Applied Polymer Science, 2009, 111:1884–1891): C20H35
- tap water: 0.0122 kg; name tap_water_input; source Künniger T. 2001; lognormal variance with pedigree 0.019225, pedigree (2,3,4,2,1)
  Literature value.
  properties: carbon content, fossil 0.00178991, dry mass 0.000337476 kg, water content 2962.17, wet mass 1 kg
  note on carbon content, fossil: Bicarbonate content is 2.93 mol/m3. CO2 content is 0.1 mol/m3 (ecoinvent v2.2 report 8, Tab 93.1).
- waste mineral oil: -2.5e-6 kg; name m_waste_oil; source Künniger T. 2001; lognormal variance with pedigree 0.0012, pedigree (2,3,1,1,1)
  Literature value.
  production volume; = m_waste_oil/m_gravel*p_gravel
    (same comment as for municipal solid waste)
  properties: carbon content, fossil 0.864444, dry mass 0.9 kg, heating value, net 34.7 MJ, water content 0.111111, wet mass 1 kg
  note on carbon content, fossil: Tab A.6, ecoinvent v2.2 report 13_I. C content has been calculated after data in the tables, and then referred to 1 kg DM

## Inputs from nature
- Gravel [natural resource, in ground]: 1.04 kg; source Künniger T. 2001; lognormal variance with pedigree 0.019225, pedigree (2,3,4,2,1)
  Literature value.
- Occupation, lake, artificial [natural resource, land]: 6.27e-5 m2*year; source Künniger T. 2001; lognormal variance with pedigree 0.1392, pedigree (2,3,4,1,1)
  Estimation, based on literature values. An average land-use of 0.0023 m2/t is considered. It is assumed that after 10 years the used land is recultivated.
- Occupation, mineral extraction site [natural resource, land]: 0.000288 m2*year; source Künniger T. 2001; lognormal variance with pedigree 0.0592, pedigree (2,3,4,1,1)
  Estimation, based on literature values. An average land-use of 0.0288 m2/t is considered. It is assumed that after 10 years the used land is recultivated.
- Transformation, from unspecified [natural resource, land]: 3.51e-5 m2; source Künniger T. 2001; lognormal variance with pedigree 0.1392, pedigree (2,3,4,1,1)
  Estimation, based on literature values. The average land-used assumed is 0.0351 m2/t.
- Transformation, to lake, artificial [natural resource, land]: 6.27e-6 m2; source Künniger T. 2001; lognormal variance with pedigree 0.1392, pedigree (2,3,4,1,1)
  Estimation, based on literature values. The average land-used assumed is 0.0063 m2/t.
- Transformation, to mineral extraction site [natural resource, land]: 2.88e-5 m2; source Künniger T. 2001; lognormal variance with pedigree 0.1392, pedigree (2,3,4,1,1)
  Estimation, based on literature values. The average land-used assumed is 0.0288 m2/t.
- Water, unspecified natural origin [natural resource, in water]: 0.00111195 m3; name water_UNO_input; source Byers, W. 2003; lognormal variance with pedigree 0.052625, pedigree (3,3,5,2,1)
  Literature value. The water used in the process is considered.
  Calculated based on literature, (Vionnet, S., Quantis Water Database - Technical Report, 2012). Water use during wet screening, sand screw and gravity classifier. 10% of water added to be used for dust control. The process boundaries are set by the boundaries of gravel/send processing plant. The process ends when the finished, sorted gravel of defined particles' sizes leaves the plant. It is assumed that 10% of water added for dust control on the site.

## Emissions to nature
- Particulate Matter, < 2.5 um [air, non-urban air or from high stacks]: 4e-10 kg; source Künniger T. 2001; lognormal variance with pedigree 0.3892, pedigree (2,3,4,1,4)
  Estimation, based on literature values. The total dust production is classified in different categories according to the share in the 'mining of limestone' dataset. The 5% of the dust production is considered Particulates <2.5 um. This distribution is used as the basis for most mining/digging processes as it is assumed that differences among them are marginal.
- Particulate Matter, > 10 um [air, non-urban air or from high stacks]: 5.6e-9 kg; source Künniger T. 2001; lognormal variance with pedigree 0.1292, pedigree (2,3,4,1,4)
  Estimation, based on literature values. The total dust production is classified in different categories according to the share in the 'mining of limestone' dataset. The 70% of the dust production is considered Particulates >10 um. This distribution is used as the basis for most mining/digging processes as it is assumed that differences among them are marginal.
- Particulate Matter, > 2.5 um and < 10um [air, non-urban air or from high stacks]: 2e-9 kg; source Künniger T. 2001; lognormal variance with pedigree 0.2092, pedigree (2,3,4,1,4)
  Estimation, based on literature values. The total dust production is classified in different categories according to the share in the 'mining of limestone' dataset. The 25% of the dust production is considered Particulates <2.5 um, >10 um. This distribution is used as the basis for most mining/digging processes as it is assumed that differences among them are marginal.
- Water [air, unspecified]: 0.000306585 m3; name water_to_air_unspecified; = (tap_water_input/1000*fraction_TW_to_air)+(water_UNO_input*fraction_PW_to_air); lognormal variance with pedigree 0.0487, pedigree (2,2,4,1,1)
  Calculated value based on literature values and expert opinion. See comments in the parametres' comment field.
  property fraction, origin: fresh water 0.0108527; name fraction_origin_fresh_water
  property fraction, origin: salt water 0; name fraction_origin_salt_water
  property fraction, origin: unspecified 0.989147; name fraction_origin_unspecified
- Water [water, unspecified]: 0.00081756 m3; name water_to_water_unspecified; = (tap_water_input/1000)*(1-fraction_TW_to_air)+water_UNO_input*(1-fraction_PW_to_air); lognormal variance with pedigree 0.0487, pedigree (2,2,4,1,1)
  (same comment as for Water)
  property carbon content, fossil 0; name C_content_fossil
  property carbon content, non-fossil 0; name C_content_non_fossil
  property dry mass 0 kg; name DM
  property fraction, origin: fresh water 0.0108527; name fraction_origin_fresh_water_Ww
  property fraction, origin: salt water 0; name fraction_origin_salt_water_Ww
  property fraction, origin: unspecified 0.989147; name fraction_origin_unspecified_Ww
  property water in wet mass 1000 kg; name WWM
  property wet mass 1000 kg; name WM

## Sampling procedure
Measurement data of four Swiss plants. For electricity consumption: measurement of 21 Swiss plants

## Review by Hans-Jörg Althaus 2015-01-19
passed
