# selective coating, copper sheet, sputtering

Dataset: EcoSpold 2, unit process
Geography: RoW
Time period: 2001-01-01 to 2023-12-31
Technology level: current
Classification: EcoSpold01Categories: metals/refinement
Classification: ISIC rev.4 ecoinvent: 2592:Treatment and coating of metals; machining
Synonyms: PVD; physical vapour deposition; sunselect
Tags: ConvertedDataset
Scenario: Business-as-Usual
System model: Allocation, cut-off by classification
Share of production covered: 70 %
Generated by: Niels Jungbluth
Published in: Althaus H.-J. 2000
Database: ecoinvent
isCopyrightProtected: true
accessRestrictedTo: 1

## General comment
Inventory for selective coatings of solar absorbers.
[This dataset was already contained in the ecoinvent database version 2. It was not individually updated during the transfer to ecoinvent version 3. Life Cycle Impact Assessment results may still have changed, as they are affected by changes in the supply chain, i.e. in other datasets. This dataset was generated following the ecoinvent quality guidelines for version 2. It may have been subject to central changes described in the ecoinvent version 3 change report (http://www.ecoinvent.org/database/ecoinvent-version-3/reports-of-changes/), and the results of the central updates were reviewed extensively. The changes added e.g. consistent water flows and other information throughout the database. The documentation of this dataset can be found in the ecoinvent reports of version 2, which are still available via the ecoinvent website. The change report linked above covers all central changes that were made during the conversion process.]

## Included activities start
The activity starts with the sheet entering the process.The material on which this activity is applied it is not included as input.

## Included activities end
Gate to gate inventory for the process including energy use in the plant, infrastructure and packaging, relevant materials and emissions.

## Geography
Production plant in DE. No data for SE.

## Technology
Sputtering of chromium and tin

## Time period
Environmental report.

## Parameters
- fraction, process water, to air: 0.15 dimensionless; lognormal variance with pedigree 0.092025, pedigree (4,4,3,2,4)
- fraction, tap water, to air: 0.15 dimensionless; lognormal variance with pedigree 0.092025, pedigree (4,4,3,2,4)

## Reference product
- selective coat, copper sheet, sputter deposition: 1 m2; By-product classification allocatable product; CPC 88731: Metal treatment and coating services
  EcoSpold01Location=DE
  production volume 433174 m2
    Upscaled with a factor 3.18 from the EU production volume of 1.2 Mio. m2 per year according to Ecoinvent v.2 report 10, section 8.2. Equally distributed over the 6 types of 'selective coating'.
  property price 0.788186 EUR2005
    Calculated based on inputs: The price of the product has been calculated as a sum of the values of the material and energy inputs for this product. This value is therefore a rough estimation. It may underestimate the real price since there are additional expenses when producing any product. These expences can include for example labour costs, treatment of waste materials and profit for the producer. Please consider carefully whether this level of data quality is acceptable for your application.
  properties: carbon allocation 0 kg, carbon content 0

## Inputs from technosphere
- argon, liquid: 0.00328 kg; lognormal variance with pedigree 0.0421, pedigree (1,2,5,5,1)
  Questionnaire (plus helium)
  EcoSpold01Location=RER
  Uncertainty: Questionnaire (plus helium)
  properties: dry mass 1 kg, wet mass 1 kg
- chromium: 0.0074 kg; lognormal variance with pedigree 0.0421, pedigree (1,2,5,5,1)
  EcoSpold01Location=RER
  Questionnaire
  Uncertainty: Questionnaire
  properties: dry mass 1 kg, wet mass 1 kg
- copper, cathode: 0.0818 kg; lognormal variance with pedigree 0.0421, pedigree (1,2,5,5,1)
  Copper production wastes
  EcoSpold01Location=RER
  Uncertainty: Copper production wastes
  properties: dry mass 1 kg, wet mass 1 kg
- corrugated board box: 0.00556181, 0.0121382 kg (2 suppliers, which the file names only by identifier); sum of these 0.0177 kg; lognormal variance with pedigree 0.0421, pedigree (1,2,5,5,1)
  Questionnaire
  EcoSpold01Location=RER
  Uncertainty: Questionnaire
  properties: carbon content, fossil 0.000656085, carbon content, non-fossil 0.432275, dry mass 0.945 kg, heating value, net 12.86 MJ, water content 0.0582011, wet mass 1 kg
  note on carbon content, fossil: Fossil C content was calculated after fossil C contents of chemicals used in the production of board (Tab 10-15 & 10.16 ecoinvent v2.2 report 11_III, part 10)
  note on carbon content, non-fossil: Biogenic C content was calculated after biogenic C contents of chemicals used in the production of board (Tab 10.15 & 10.16, ecoinvent v2.2 report 11_III, part 10).
- diesel, burned in building machine: 0.225 MJ; lognormal variance with pedigree 0.0421, pedigree (1,2,5,5,1)
  EcoSpold01Location=GLO
  Questionnaire, use for vehicles in plant operation
  Uncertainty: Questionnaire, use for vehicles in plant operation
  properties: heating value, net 1 MJ
- electricity, medium voltage: 0.00133717, 0.0020016, 0.000632324, 0.01177, 0.00690809, 0.00819021, 0.0994835, 0.000237269, 1.98447, 0.0011059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 kWh (48 suppliers, which the file names only by identifier); sum of these 3.47 kWh; lognormal variance with pedigree 0.0421, pedigree (1,2,5,5,1)
  EcoSpold01Location=DE
  Questionnaire, total electricity use in the factory
  Uncertainty: Questionnaire, total electricity use in the factory
- kraft paper: 0.000555 kg; lognormal variance with pedigree 0.0421, pedigree (1,2,5,5,1)
  Questionnaire
  Uncertainty: Questionnaire
  properties: carbon content, fossil 0.0020219, carbon content, non-fossil 0.41662, dry mass 0.945 kg, heating value, net 14.11 MJ, water content 0.0582011, wet mass 1 kg
  note on carbon content, fossil: Fossil C content was calculated after fossil C contents of chemicals used in the production of the paper (in Tab 9.4 ecoinvent v2.2 report 11_III, part 9).
  note on carbon content, non-fossil: Biogenic C content was calculated after biogenic C contents of chemicals used in the production of the paper (in Tab 9.4 ecoinvent v2.2 report 11_III, part 9). The cellulose content in 1 kg of paper (on a wet mas basis) was estimated as (1-chemical content), C content of cellulose was considered 0.44 kgC/kg dry mass (ecoinvent v2.2 report, n 15a, pg 40)
- light fuel oil: 5.02369e-5, 0.00526383, 0.000258878, 0.000522476, 3.73343e-5, 3.46709e-5, 3.25769e-5 kg (7 suppliers, which the file names only by identifier); sum of these 0.0062 kg; lognormal variance with pedigree 0.0421, pedigree (1,2,5,5,1)
  EcoSpold01Location=RER
  Questionnaire, including heating
  Uncertainty: Questionnaire, including heating
  properties: carbon content, fossil 0.862, dry mass 1 kg, heating value, net 42.6 MJ, wet mass 1 kg
- lubricating oil: 0.000773 kg; lognormal variance with pedigree 0.0421, pedigree (1,2,5,5,1)
  EcoSpold01Location=RER
  Questionnaire
  Uncertainty: Questionnaire
  properties: carbon content, fossil 0.75, dry mass 1 kg, heating value, net 40.2 MJ, wet mass 1 kg
  note on carbon content, fossil: Lubricating oil is produced from diesel. C-content/dry mass of fats and oils considered 75%, from: ecoinvent v2.2 report, n 15a, pg 40
  note on heating value, net: Literature value, Source: IPCC 2006, 2006 IPCC Guidelines for National Greenhouse Gas Inventories, Prepared by the National Greenhouse Gas Inventories Programme, Eggleston H.S., Buendia L., Miwa K., Ngara T. and Tanabe K. (eds). Published: IGES, Japan
- metal coating facility: 3.33e-7 unit; lognormal variance with pedigree 0.3421, pedigree (1,2,5,5,1)
  EcoSpold01Location=RER
  Questionnaire
  Uncertainty: Questionnaire
- municipal solid waste: -3.52533e-6, -2.17673e-7, -1.43328e-7, -5.81987e-6, -6.91083e-7, -3.86321e-7, -4.39095e-6, -1.70483e-6, -1.10632e-6, -2.71848e-6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 kg (43 suppliers, which the file names only by identifier); sum of these -0.00341 kg; lognormal variance with pedigree 0.0021, pedigree (1,2,1,5,1)
  EcoSpold01Location=CH
  Questionnaire
  Uncertainty: Questionnaire
  production volume
    Calculated from the production volume of selective coat, copper sheet, sputter deposition in proportion to the respective output amounts.
  properties: carbon content, fossil 0.171549, carbon content, non-fossil 0.261655, dry mass 0.771 kg, heating value, net 11.74 MJ, water content 0.297017, wet mass 1 kg
  note on carbon content, fossil: MSW composition in tab 4.1, ecoinvent v2.2 report 13_I. C content referred to 1 kg DM
  note on heating value, net: Value taken from the general comment of the treatment dataset.
- nitrogen, liquid: 0.00182 kg; lognormal variance with pedigree 0.0421, pedigree (1,2,5,5,1)
  Questionnaire
  EcoSpold01Location=RER
  Uncertainty: Questionnaire
  properties: dry mass 1 kg, wet mass 1 kg
- oxygen, liquid: 0.000909 kg; lognormal variance with pedigree 0.0421, pedigree (1,2,5,5,1)
  Questionnaire
  EcoSpold01Location=RER
  Uncertainty: Questionnaire
  properties: dry mass 1 kg, wet mass 1 kg
- polyethylene, low density, granulate: 0.000518 kg; lognormal variance with pedigree 0.0421, pedigree (1,2,5,5,1)
  EcoSpold01Location=RER
  Plastic packagings
  Uncertainty: Plastic packagings
  properties: carbon content, fossil 0.857143, dry mass 1 kg, heating value, net 42.47 MJ, wet mass 1 kg
  note on carbon content, fossil: Polyethylene is formed out of a huge amount of ethylene monomers (C2H4) (ecoinvent v2.2 report 11_II). MW=28 g/mol
- tap water: 0.0147061, 0.0224181, 0.0418311, 0.11269, 0.565297, 0.0100814, 6.46898 kg (7 suppliers, which the file names only by identifier); sum of these 7.236 kg; source NREL - National Renewable Energy Laborat 2005; lognormal variance with pedigree 0.0546, pedigree (3,3,5,5,1)
  Questionnaire
  Calculated based on literature, (Vionnet, S., Quantis Water Database - Technical Report, 2012). The process starts when untreated surface enters the coating plant. It includes the processes: pre-treatment (cleaning) and coating itself. The source presents data on general "Automotive painting, electrocoating, per m2", without specification of what kind of surface is being coated and what kind of coat is used. It is assumed (expert opinion) that this data are more likely to be right then the original - ecoivent values.
  EcoSpold01Location=RER
  Uncertainty: Questionnaire
  properties: carbon content, fossil 0.00178991, dry mass 0.000337476 kg, water content 2962.17, wet mass 1 kg
  note on carbon content, fossil: Bicarbonate content is 2.93 mol/m3. CO2 content is 0.1 mol/m3 (ecoinvent v2.2 report 8, Tab 93.1).
- tin: 0.00862 kg; lognormal variance with pedigree 0.0421, pedigree (1,2,5,5,1)
  Questionnaire
  EcoSpold01Location=RER
  Uncertainty: Questionnaire
  properties: dry mass 1 kg, wet mass 1 kg
- waste mineral oil: -7.24013e-6, -0.00076576 kg (2 suppliers, which the file names only by identifier); sum of these -0.000773 kg; lognormal variance with pedigree 0.0021, pedigree (1,2,1,5,1)
  EcoSpold01Location=CH
  Questionnaire
  Uncertainty: Questionnaire
  production volume
    (same comment as for municipal solid waste)
  properties: carbon content, fossil 0.864444, dry mass 0.9 kg, heating value, net 34.7 MJ, water content 0.111111, wet mass 1 kg
  note on carbon content, fossil: Tab A.6, ecoinvent v2.2 report 13_I. C content has been calculated after data in the tables, and then referred to 1 kg DM
- wastewater, unpolluted: -1.09246e-6, -0.000225908 m3 (2 suppliers, which the file names only by identifier); sum of these -0.000227 m3; lognormal variance with pedigree 0.0021, pedigree (1,2,1,5,1)
  Questionnaire. The water is mainly used for cooling and thus it does not have to be treated afterwards.
  production volume
    (same comment as for municipal solid waste)
  properties: carbon content, fossil 0.00178991, carbon content, non-fossil 0.00178991, dry mass 0.337476 kg, water content 2962.17, wet mass 1000 kg
  note on carbon content, fossil: Assumed to be like in tap water. Bicarbonate content is 2.93 mol/m3. CO2 content is 0.1 mol/m3 (ecoinvent v2.2 report 8, Tab 93.1).

## Emissions to nature
- Water [air, unspecified]: 0.0010854 m3; lognormal variance with pedigree 0.0827, pedigree (2,2,5,5,1)
  Calculated value based on literature values and expert opinion. See comments in the parametres' comment field.
- Water [water, unspecified]: 0.0061506 m3; lognormal variance with pedigree 0.0827, pedigree (2,2,5,5,1)
  (same comment as for Water)
  property carbon content, fossil 0; name C_content_fossil
  property carbon content, non-fossil 0; name C_content_non_fossil
  property dry mass 0 kg; name DM
  property water in wet mass 1000 kg; name WWM
  property wet mass 1000 kg; name WM

## Sampling procedure
Environmental report and personal communication.

## Extrapolations
This dataset has been copied from an original dataset covering the geography DE. The uncertainty has been adjusted accordingly.

## Review by Hans-Jörg Althaus 2003-05-22
passed
