# electricity production, wind, <1MW turbine, onshore

Dataset: EcoSpold 2, unit process
Geography: IN-AP
Time period: 2000-01-01 to 2023-12-31
Technology level: modern
Classification: ISIC rev.4 ecoinvent: 3510:Electric power generation, transmission and distribution
Tags: wind power
Scenario: Business-as-Usual
System model: Allocation, cut-off by classification
Generated by: Johannes Müller
Published in: Burger, B. 2007
Database: ecoinvent
isCopyrightProtected: true
accessRestrictedTo: 1

## General comment
This dataset represents the production of high voltage electricity at onshore grid-connected wind power plants with a capacity of less than 1 MW in India - Andhra Pradesh in 2012. It includes operation and maintenance expenditures as well as infrastructure inputs. Wind load hours have been adapted to local conditions (see parameters).
At the moment, the class of onshore < 1MW wind turbines is approximated with a 0.8 MW onshore wind turbine consisting of the infrastructure datasets for "moving parts" and "fixed parts". Moving parts are the rotor, the nacelle, electronics, and the network connection. The tower and foundation are considered as fixed parts.
According to The Wind Power Database (2014), total installed wind capacity on-and offshore in India - Andhra Pradesh in the end of 2014 amounted to 65268.61 MW. Out of it, 1.9% were installed offshore, which are modelled with a 2 MW wind turbine. Percentages of the three onshore wind power plant classes modelled in ecoinvent referring to the total installed capacity (725 windfarms by 12/2014): <1MW 15.5%; 1-3MW 44.8%; >3MW 37.8% [Retreived from The Wind Power. 2014. Wind power and wind farms database. www.thewindpower.net, Status December 2014]. Values are valid for TOTAL China, not for this specific province. The offshore plants are located in the provinces Jiangsu, Liaoning, Shanghai, Guangdong and Shandong.
[This dataset is meant to replace the following datasets:]

## Included activities start
From operation of the wind power plant to high voltage electricity at the plant. According to (European Communities 2001), electricity produced with wind turbines in a wind power plant is connected to medium voltage or high voltage systems, depending on the size of the windfarm. Normally, each wind turbine contains a transformer from low voltage to medium voltage. The network connection additionally transforms the electricity to high voltage electricity. It is assumed here, that there are no stand-alone grid-connected small wind turbines and that all electricity is connected to the network in form of high voltage electricity.

Source:
European Communities. 2001. Wind Turbine Grid Connection and Interaction. Deutsches Windenergie-Institut /Tech-wise A/S /DM Energy, p. 7 Tab.2.1

## Included activities end
This activity ends with the production of 1kWh of high voltage electricity produced at the power plant and delivered to the grid.

This dataset includes
- the operation and maintenance of the wind power plant
- change of lubricating oil every year

This dataset doesn"t include
- raw materials extraction, decommissioning and waste treatment as these activities are already included in infrastructure datasets
- transformation of the electricity produced in order to deliver in to the grid as this is already included in the infrastructure datasets.

## Technology
Technology of a specific 800 kW wind power plant modelled with a dataset for fixed and moving parts each (the latter including the network connection). Moving parts are the rotor, the nacelle, electronics, and the network connection. The tower and foundation are considered as fixed parts.

## Parameters
- Installed capacity: 264.29 MW; name capacity_installed; lognormal variance with pedigree 0.0012, pedigree (2,1,1,1,1)
  Literature value. Total installed capacity of operative wind turbines on shore during 2020.
  According to TheWindPower during 2020 only 264.29 MW were operative: <1MW 6.88 %; 1-3MW 93.12 %. Source: thewindpower.net, https://www.thewindpower.net/windfarms_list_en.php?country=IN
- Percentage of onshore wind power plant class capacity on total: 1 dimensionless; name percentage_class_onshore; lognormal variance with pedigree 0.0037, pedigree (3,2,1,1,2)
  Literature value/calculated value. India, Andhra Pradesh only has onshore wind power plants with the following shares of technologies:
  electricity production, wind, <1MW turbine, onshore: 6.88%
  electricity production, wind, 1-3MW turbine, onshore: 93.12%
  Source:
  The Wind Power. 2020. Windpower and wind farms database. www.thewindpower.net, Status December 2020
  Percentage of the wind power plant class energy production on total wind power production in a country. Classes: <1MW, 1-3MW, >3MW. Values for onshore wind power plants.
- Wind load hours: 3369.4 hour; name wind_load_hours; = gross_electricity*(1- losses_gross_net)/(capacity_installed*1000); lognormal variance with pedigree 0.050625, pedigree (5,3,1,2,3)
  Calculated value/Literature value. Wind load hours in China (not only in this province but in total China).
  Net electricity production in 2012 with wind power according to the IEA Electricity information 2014 in China divided by the total installed capacity 2012 in China.
  IEA. 2014. Electricity Information 2014. ISBN 978-92-64-21692-1. International Energy Agency (IEA), Paris Cedex (FR).
  nan
- distance: 200 km; lognormal variance with pedigree 0.1016, pedigree (4,5,5,4,4)
  Estimation. Maintenance transport to the power plant. One person travels two times per year over a distance of 200 km each time, one time for check only with a car, one time for change of the lubricating oil with a lorry.
  nan
- gross electricity production: 8.99494e8 kWh; name gross_electricity; lognormal variance with pedigree 0.0019, pedigree (2,2,1,1,2)
  Literature value/statistics. Gross electricity production from <1 MW on-shore grid-connected wind power plants during 2019-20
  According to TheWindPower during 2020 only 264.29 MW were operative: <1MW 6.88 %; 1-3MW 93.12 %. Source: thewindpower.net, https://www.thewindpower.net/windfarms_list_en.php?country=IN
  The gross renewable electricity production was calculated from:
  Central Electricity Authority. (2021). All India electricity statistics general review 2021.
  https://cea.nic.in/dashboard/?lang=en
  The renewables were split into technologies using the renewable generation data from the dashboard.
  The split into the states using capacity data from TheWindPower.net.
  https://www.thewindpower.net/windfarms_list_en.php?country=IN
- losses from gross electricity production: 0.01 dimensionless; name losses_gross_net; lognormal variance with pedigree 0.0113, pedigree (3,3,1,3,3)
  Estimation. The factor for the loss of electricity from gross to net electricity production is an assumption based on experiences, statistics and expertise (1% losses for wind).
  nan
- use of lubricating oil for maintenance: 63 kg; name lubricating_oil_maintenance; lognormal variance with pedigree 0.0912, pedigree (4,4,5,4,4)
  Literature value. 63kg of lubricating oil are changed every year.(Burger&Bauer 2007, p.41)
  nan

## Reference product
- electricity, high voltage: 1 kWh; By-product classification allocatable product; CPC 17100: Electrical energy; HS2017 271600: Electrical energy
  production volume 7.37315e8 kWh; name APV_electricity; = gross_electricity* (1-losses_gross_net)* percentage_class_onshore
    Calculated value
  property price 0.0977 EUR2005
    Temporary price data. Calculated as 90% of purchasers price based on: 94% of the average price (to account for a 6% loss in transformation and transmission) for electricity for industrial consumersin 2005 (excluded taxes). From IEA.
  properties: carbon allocation 0 kg, carbon content 0

## Inputs from technosphere
- lubricating oil: 2.33721e-5 kg; name lubricating_oil; = lubricating_oil_maintenance*lifetime/(lifetime*(capacity_MW*1000)*wind_load_hours); lognormal variance with pedigree 0.008, pedigree (1,1,4,1,1)
  Calculated value. Lubricating oil use for maintenance.
  properties: carbon content, fossil 0.75, dry mass 1 kg, heating value, net 40.2 MJ, wet mass 1 kg
  note on carbon content, fossil: Lubricating oil is produced from diesel. C-content/dry mass of fats and oils considered 75%, from: ecoinvent v2.2 report, n 15a, pg 40
  note on heating value, net: Literature value, Source: IPCC 2006, 2006 IPCC Guidelines for National Greenhouse Gas Inventories, Prepared by the National Greenhouse Gas Inventories Programme, Eggleston H.S., Buendia L., Miwa K., Ngara T. and Tanabe K. (eds). Published: IGES, Japan
- transport, freight, lorry 7.5-16 metric ton, EURO3: 1.73414e-12 metric ton*km; = ((lubricating_oil/1000)/2)*(distance*2*lifetime/(lifetime*(capacity_MW*1000)*wind_load_hours))
  Calculated value. Two maintenance transports to the power plant with 200 km each. Once a year, the lubricating oil is transported and changed.
- waste mineral oil: -2.33721e-5 kg; name waste_min_oil_10; = lubricating_oil
  Calculated value
  production volume; = APV_electricity* waste_min_oil_10
    Calculated from production volume of reference product using the relative outputs.
    Due to reasons of the parent-child relationship, a safety amount of 400000kg waste mineral oil had to be added.
  properties: carbon content, fossil 0.864444, dry mass 0.9 kg, heating value, net 34.7 MJ, water content 0.111111, wet mass 1 kg
  note on carbon content, fossil: Tab A.6, ecoinvent v2.2 report 13_I. C content has been calculated after data in the tables, and then referred to 1 kg DM
  note on heating value, net: Value taken from the general comment of the treatment dataset.
- wind power plant, 800kW, fixed parts: 1.85493e-8 unit; = 1/(lifetime*(capacity_MW*1000)*wind_load_hours); lognormal variance with pedigree 0.008, pedigree (1,1,4,1,1)
  Calculated value
  property capacity [MW] 0.8 MW; name capacity_MW
  properties: lifetime 20 year
  note on lifetime: Estimation/literature value. Today, wind turbine producers often use a lifetime of 20 years for all parts of the wind turbine in their financial calculataions, even if it can be assumed that the foundation could have a longer lifetime.
- wind power plant, 800kW, moving parts: 1.85493e-8 unit; = 1/(lifetime*(capacity_MW*1000)*wind_load_hours); lognormal variance with pedigree 0.008, pedigree (1,1,4,1,1)
  Calculated value
  property lifetime 20 year; name lifetime

## Inputs from nature
- Energy, kinetic (in wind), converted [natural resource, in air]: 3.87 MJ

## Sampling procedure
Literature, calculations

## Extrapolations
The turbine class <1MW is represented by a wind turbine with a capacity of 0.8 MW.
