# peanut production, reduced tillage

Dataset: EcoSpold 2, unit process
Geography: BR-SP
Time period: 2020-01-01 to 2023-12-31
Technology level: current
Classification: ISIC rev.4 ecoinvent: 0111:Growing of cereals (except rice), leguminous crops and oil seeds
Synonyms: peanut production, peanut cultivation
Tags: No
Scenario: Business-as-Usual
System model: Allocation, cut-off by classification
Generated by: Anna Leticia M. T. Pighinelli
Published in: Folegatti Matsuura, M. 2017
Database: ecoinvent
isCopyrightProtected: true
accessRestrictedTo: 1

## General comment
The raw data collected in interviews were organized in electronic spreadsheets and checked for completeness and consistency. Agricultural inputs were detailed as to their composition and physical characteristics. Agricultural operations were characterized in terms type of fuel and specific consumption. Precipitation is enought to supply water to the crop, no extra water needed. Emissions from the agricultural process were estimated using the BRCalc/ICVCalc tool, developed by Embrapa Environment, which includes specific climate and soil databases for the 137 Brazilian agricultural mesoregions, in addition to databases of parameters related to agricultural crops, fertilisers and pesticides.
The main emission models adopted by BRCalc/ICVCalc (Folegatti-Matsuura et al., 2022) derive from the references: Nemecek et al. (2015), IPCC (2019), Nemecek & Kagi (2007), Folegatti-Matsuura & Picoli (2018). It was used the model BRLUC (Donke et al., 2020) to estimate the LUC emissions; and the PestLCI Consensus V1.0, parameterized for Brazil, to estimate pesticide emissions.

## Included activities start
This activity starts with soil preparation (reforming) after the last pasture grazing or harvest of the previous crop (sugarcane).

## Included activities end
The dataset includes the inputs of correctives, mineral fertilisers and pesticides. It is assumed that no organic fertiliser is applied. The dataset includes the amount of fuel consumed during agricultural operations and their emissions are estimated. The dataset also includes direct field emissions and land use change emissions, with important regionalizations added. The dataset doesn't include: seed inputs, cleaning and storage of harvested grains. The activity ends after harvest at the farm gate.

## Allocation
In Brazil, peanut is mostly produced in reforming of agricultural areas, specially pasture and sugarcane. For the fraction of peanut produced in cropping systems, land occupation, correctives application and correctives are allocated among the products of the system, adopting factors that consider the fraction of area and the occupation time. When in a cropping system, land occupation, soil preparation operation, correctives application and correctives are allocated among the products of the system, adopting factors that consider the fraction of area and the occupation time. In this case, 4% of total correctives and 4% of diesel used in the agricultural operations that were shared with sugarcane or pasture were considered as input for peanut production

## Geography
The inventory is modelled for Brazil, São Paulo

## Technology
This dataset represents the production of 1 kg of peanut in shell (fresh matter) composed of 77% grains/kernel, 23% of shell, in the Alta Paulista and the Alta Mogiana regions in the state of Sao Paulo, which is composed of the peanut production regions of Marilia, Tupã and Ribeirão Preto. This is an averaged dataset which includes 1 scenario in rotation with pasture and 3 in rotation with sugarcane of which one is ripstrip. When in a cropping system, land occupation, soil preparation operation, correctives application and correctives, liming operation and limestone are allocated among the products of the system, adopting factors that consider the fraction of area and the occupation time. In this case, 4% of total correctives and 4% of diesel used in the agricultural operations that were shared with pasture/sugarcane were considered as input for peanut production. Mineral fertiliser input is 130 kg MAP/ha and 69.9 kg KCl/ha. Total active ingredients (a.i.) applied as pesticides amount to 14.91 kg a.i./ha. In the ripstrip scenario, Ripstrip was used during soil preparation, reducing the diesel consumption. The average productivity is 4554 kg/ha, at 11% moisture.
Agricultural operation was modelled based on the total diesel consumed to perform the operation and the emissions to air related to diesel burning.
All inputs are averaged by the production volumes of the regions.

## Time period
Time period of the most of the data collected for this dataset.

## Reference product
- peanut: 1 kg; By-product classification allocatable product; CPC 01422: Groundnuts, in shell; HS2017 080290: Nuts, edible; n.e.c. in heading no. 0801 and 0802, fresh or dried, whether or not shelled or peeled
  This dataset represents the production of 1 kg of peanut in shell (fresh matter) composed of 77% grains/kernel, 23% of shell, in the Alta Paulista and the Alta Mogiana regions in the state of Sao Paulo, which is composed of the peanut production regions of Marilia, Tupã and Ribeirão Preto. This is an averaged dataset which includes 1 scenario in rotation with pasture and 3 in rotation with sugarcane of which one is ripstrip. When in a cropping system, land occupation, soil preparation operation, correctives application and correctives, liming operation and limestone are allocated among the products of the system, adopting factors that consider the fraction of area and the occupation time. In this case, 4% of total correctives and 4% of diesel used in the agricultural operations that were shared with pasture/sugarcane were considered as input for peanut production. Mineral fertiliser input is 130 kg MAP/ha and 69.9 kg KCl/ha. Total active ingredients (a.i.) applied as pesticides amount to 14.91 kg a.i./ha. In the ripstrip scenario, Ripstrip was used during soil preparation, reducing the diesel consumption. The average productivity is 4554 kg/ha, at 11% moisture. All inputs are averaged by the production volumes of the regions.
  production volume 4.82279e8 kg
    IBGE, 2021. Brazilian Institute of Geography and Statistic. Municipal Agricultural Production – PAM. Produção Agrícola Municipal [in Portuguese]. Available at: https://sidra.ibge.gov.br/home/ipp/brasil
  property price 3.2 EUR2005
    Literature data (FAOSTAT). Price of peanut produced in Spain in 2008.
  properties: carbon allocation 0.54793 kg, carbon content 0.58063, carbon content, fossil 0, carbon content, non-fossil 0.58063, dry mass 0.943681 kg, water content 0.05968, water in wet mass 0.0563189 kg, wet mass 1 kg

## Inputs from technosphere
- alkylbenzene, linear: 2.38412e-5 kg; lognormal variance with pedigree 1.0709, pedigree (2,2,2,1,1)
  The amount of pesticide or adjuvant was obtained from interviews with producers and experts. Concentration of the active ingredient was obtained in the Material Safety Data Sheet. The amount of dilution water was 200 L/ha per application.
  properties: carbon content, fossil 0.672414, dry mass 1 kg, heating value, net 41.22 MJ, wet mass 1 kg
- boric acid, anhydrous, powder: 4.07244e-5 kg; lognormal variance with pedigree 1.0709, pedigree (2,2,2,1,1)
  No specific inventory was found in ecoinvent with chemical formula corresponding to a fertilizer with micronutients. It was necessary to adapt the amount of micronutrients to a processes (flows) available in this database, based on the molar masse of the micronutrients. Boron via formulated 04-30-10 + 0.1% Zn + 0.1% B (assumed B source: Borax pentahydrate with 15% B)
  properties: dry mass 1 kg, wet mass 1 kg
- calcium borates: 0.00749799 kg; lognormal variance with pedigree 1.0709, pedigree (2,2,2,1,1)
  No specific inventory was found in ecoinvent with chemical formula corresponding to a fertilizer with micronutients. It was necessary to adapt the amount of micronutrients to a processes (flows) available in this database, based on the molar masse of the micronutrients. Calcium via SSP (source not defined). Concentration calculated as 25% in SSP
  properties: dry mass 1 kg, wet mass 1 kg
- chlorothalonil: 0.00191179 kg; lognormal variance with pedigree 1.0709, pedigree (2,2,2,1,1)
  (same comment as for alkylbenzene, linear)
  properties: carbon content, fossil 0.360902, dry mass 1 kg, wet mass 1 kg
- cobalt: 3.06099e-7 kg; lognormal variance with pedigree 1.0709, pedigree (2,2,2,1,1)
  No specific inventory was found in ecoinvent with chemical formula corresponding to a fertilizer with micronutients. It was necessary to adapt the amount of micronutrients to a processes (flows) available in this database, based on the molar masse of the micronutrients. Foliar fertilizer, assumed source: CoMo Platinum (1.50% Co and 15% Mo).
  property price 0 EUR2005; name cobalt_price
  properties: dry mass 1 kg, wet mass 1 kg
- diesel, low-sulfur: 0.0125175 kg; lognormal variance with pedigree 1.2403, pedigree (3,2,2,1,3)
  The amount of diesel fuel (B12 mix in Brazil) used in agricultural operations not found in ecoinvent
  properties: carbon content, fossil 0.865, dry mass 1 kg, heating value, net 42.8 MJ, wet mass 1 kg
- dolomite: 0.0156285 kg; lognormal variance with pedigree 1.1123, pedigree (3,2,2,1,1)
  The amount of soil corrective was obtained from interviews with producers and experts.
  properties: carbon content, fossil 0.130435, dry mass 1 kg, wet mass 1 kg
- fatty acid methyl ester: 0.0017649 kg; lognormal variance with pedigree 1.2403, pedigree (3,2,2,1,3)
  The amount of biodiesel fuel (B12 mix in Brazil) used in agricultural operations not found in ecoinvent plus the fatty acids used as pesticide adjuvant
  properties: carbon content, fossil 0.041, carbon content, non-fossil 0.732, dry mass 1 kg, heating value, net 37.2 MJ, wet mass 1 kg
  note on heating value, net: Based on literature, report 17, page 439. Jungbluth, N., Chudacoff, M., Dauriat, A., Dinkel, F., Doka, G., Faist Emmenegger, M., Gnansounou, E., Kljun, N., Schleiss, K., Spielmann, M., Stettler, C., Sutter, J. 2007: Life Cycle Inventories of Bioenergy. ecoinvent report No. 17, Swiss Centre for Life Cycle Inventories, Dübendorf, CH.
- glyphosate: 0.000442238 kg; lognormal variance with pedigree 1.0709, pedigree (2,2,2,1,1)
  (same comment as for alkylbenzene, linear)
  properties: carbon content, fossil 0.214286, dry mass 1 kg, wet mass 1 kg
- gypsum, mineral: 0.00562392 kg; lognormal variance with pedigree 1.1123, pedigree (3,2,2,1,1)
  The amount of soil corrective was obtained from interviews with producers and experts.
  properties: dry mass 1 kg, wet mass 1 kg
- land use change, annual crop: 0.000106 ha; lognormal variance with pedigree 1.22882, pedigree (2,1,2,2,3)
  LUC modeling implemented in ecoinvent for Brazil is based on Donke et al. (2020). LUC amount was updated, based on yield and crop expansion rate from IBGE (2022). Reference years: average among 2017, 2018, 2019. Equation: (1/yield * % crop expansion). The yield is the average for the years 2017 to 2019. Expansion: difference of the average area of the years 2017 to 2019 (t1=t0+20) for the years 1998 to 2000 (t0), by the formula (1-(t0/t1)).
- metolachlor: 0.000182304 kg; lognormal variance with pedigree 1.0709, pedigree (2,2,2,1,1)
  (same comment as for alkylbenzene, linear)
  properties: carbon content, fossil 0.633803, dry mass 1 kg, wet mass 1 kg
- molybdenum trioxide: 6.32021e-7 kg; lognormal variance with pedigree 1.0709, pedigree (2,2,2,1,1)
  No specific inventory was found in ecoinvent with chemical formula corresponding to a fertilizer with micronutients. It was necessary to adapt the amount of micronutrients to a processes (flows) available in this database, based on the molar masse of the micronutrients. Foliar fertilizer, assumed source: CoMo Platinum (1.50% Co and 15% Mo)
  properties: bismuth content 8e-5, copper content 0.0006, iron content 0.0044, lead content 0.00015, molecular weight 143.9 g/mol, molybdenum content 0.62, oxygen content 0.29, sulfur content 0.0003
- monoammonium phosphate: 0.0288669 kg; lognormal variance with pedigree 1.0709, pedigree (2,2,2,1,1)
  The amount of fertiliser was obtained from interviews with producers and experts. The nutrient content in the input was obtained from technical literature and technical regulation documents. The selection of the fertiliser from the ecoinvent database and its ammount was based on the commercial product.
  properties: dry mass 1 kg, nitrogen content 0.084, phosphorus content 0.226939, wet mass 1 kg
  note on nitrogen content: Nitrogen content (on a dry matter basis) of monoammonium phosphate is calculated from the molecular formula of the nutrient present in the substance.
  note on phosphorus content: Phosphorus content (on a dry matter basis) of monoammonium phosphate is calculated from the molecular formula of the nutrient present in the substance.
- packaging, for fertilisers: 0.061059 kg; lognormal variance with pedigree 1.6408, pedigree (4,3,2,5,4)
  The HDPE packaging was considered for macronutrient fertilisers. Soil correctives were not considered in the packaging calculation since these are transported in bulk. The amount of packaging for pesticides was also estimated. It was considered twice the value of the active ingredient of fertilisers and pesticides applied in the field to account for the packaging of the diluted products. The production and disposal of the packaging were included in this exchange.
  properties: carbon content, fossil 0.825301, dry mass 1 kg, price 0.0642 EUR2005, wet mass 1 kg
  note on carbon content, fossil: Considering a chemical formula (C2H4)n for polyethylene, carbon content-fossil is calculated to be 0.856286 kg of Carbon per kg of dry mass.
- packaging, for pesticides: 0.0065398 kg; lognormal variance with pedigree 1.6408, pedigree (4,3,2,5,4)
  (same comment as for packaging, for fertilisers)
  properties: carbon content, fossil 0.85714, dry mass 1 kg, price 0.0642 EUR2005, wet mass 1 kg
- pesticide, unspecified: 0.000731265 kg; lognormal variance with pedigree 1.0709, pedigree (2,2,2,1,1)
  The commercial pesticides not found in the ecoinvent database were summed up and added as “pesticide, unspecified”
  properties: carbon content, fossil 0.486978, dry mass 1 kg, wet mass 1 kg
- potassium chloride: 0.0142318 kg; lognormal variance with pedigree 1.0709, pedigree (2,2,2,1,1)
  (same comment as for monoammonium phosphate)
  properties: dry mass 1 kg, wet mass 1 kg
- propylene glycol, liquid: 6.99813e-6 kg; lognormal variance with pedigree 1.0709, pedigree (2,2,2,1,1)
  (same comment as for alkylbenzene, linear)
  properties: carbon content, fossil 0.473684, dry mass 1 kg, heating value, net 27.09 MJ, wet mass 1 kg
- single superphosphate: 0.022788 kg; lognormal variance with pedigree 1.0709, pedigree (2,2,2,1,1)
  (same comment as for monoammonium phosphate)
  properties: dry mass 1 kg, phosphorus content 0.0916484, wet mass 1 kg
- sulfur: 0.000474873 kg; lognormal variance with pedigree 1.0709, pedigree (2,2,2,1,1)
  No specific inventory was found in ecoinvent with chemical formula corresponding to a fertilizer with micronutients. It was necessary to adapt the amount of micronutrients to a processes (flows) available in this database, based on the molar masse of the micronutrients. Sulphur via SSP (source not defined). Concentration calculated as 15.4% in SSP
  properties: dry mass 1 kg, wet mass 1 kg
- zinc monosulfate: 2.34496e-5 kg; lognormal variance with pedigree 1.0709, pedigree (2,2,2,1,1)
  No specific inventory was found in ecoinvent with chemical formula corresponding to a fertilizer with micronutients. It was necessary to adapt the amount of micronutrients to a processes (flows) available in this database, based on the molar masse of the micronutrients. Zinc via formulated 04-30-10 + 0.1% Zn + 0.1% B (assumed Zn source: Zinc Sulphate with 20% Zn)
  properties: dry mass 1 kg, wet mass 1 kg

## Inputs from nature
- Carbon dioxide, in air [natural resource, in air]: 1.6317 kg; lognormal variance with pedigree 1.0709, pedigree (2,2,2,1,1)
  Carbon dioxide (CO2) absorption from air during photosynthesis was also included, according to Nemecek and Schnetzer (2012). It considers the carbon content of the reference product based on the ecoinvent database (Jungbluth et al., 2007).
- Occupation, arable land, unspecified use [natural resource, land]: 0.0879219 m2*year; lognormal variance with pedigree 1.1122, pedigree (3,1,2,1,1)
  The land occupation was calculated based on crop yield
- Transformation, from annual crop [natural resource, land]: 2.19503 m2; lognormal variance with pedigree 1.0608, pedigree (2,1,2,1,1)
  The LUC input comprises the actual data related to land transformation. This land transformation flow is irrelevant to LUC and the amounts are equal in both the 'land transformation from' and 'land transformation to'.
- Transformation, to annual crop [natural resource, land]: 2.19503 m2; lognormal variance with pedigree 1.0608, pedigree (2,1,2,1,1)
  (same comment as for Transformation, from annual crop)
- Water, river [natural resource, in water]: 0.00044 m3; lognormal variance with pedigree 1.0608, pedigree (2,1,2,1,1)
  Water consumed for pesticide dilution. Estimated volume based on interviews with producers and experts

## Emissions to nature
- Abamectin [air, non-urban air or from high stacks]: 5.38091e-7 kg; lognormal variance with pedigree 1.1123, pedigree (3,2,2,1,1)
  Pesticide emissions are calculated using the PestLCI model, adapted to the Brazilian conditions (Embrapa, 2021; PestLCI, 2022).
- Ammonia [air, non-urban air or from high stacks]: 0.000184323 kg; lognormal variance with pedigree 1.13033, pedigree (3,2,2,2,3)
  Ammonia releases to air, according to the AGRAMMON model: 'Plant production' (Nemecek & Schnetzer, 2011)
- Benzene [air, non-urban air or from high stacks]: 9.14274e-8 kg; lognormal variance with pedigree 1.2403, pedigree (3,2,2,1,3)
  Emissions derived from fuel combustion (diesel 88%, and biodiesel 12%), using emission factors from Nemecek & Kagi (2007)
- Benzo(a)pyrene [air, non-urban air or from high stacks]: 3.75623e-10 kg; lognormal variance with pedigree 1.2403, pedigree (3,2,2,1,3)
  (same comment as for Benzene)
- Cadmium II [air, non-urban air or from high stacks]: 1.25175e-10 kg; lognormal variance with pedigree 1.2403, pedigree (3,2,2,1,3)
  (same comment as for Benzene)
- Carbon dioxide, fossil [air, non-urban air or from high stacks]: 0.0465058 kg; lognormal variance with pedigree 1.1089, pedigree (4,3,2,3,1)
  Carbon dioxide releases from urea and limestone application, according to IPCC (2006) plus emissions derived from fuel combustion (diesel 88%, and biodiesel 12%), using emission factors from Nemecek & Kagi (2007)
- Carbon dioxide, non-fossil [air, non-urban air or from high stacks]: 0.00488021 kg; lognormal variance with pedigree 1.1089, pedigree (4,3,2,3,1)
  (same comment as for Benzene)
- Carbon monoxide, fossil [air, non-urban air or from high stacks]: 6.69366e-5 kg; lognormal variance with pedigree 1.2403, pedigree (3,2,2,1,3)
  (same comment as for Benzene)
- Carboxin [air, non-urban air or from high stacks]: 7.36429e-7 kg; lognormal variance with pedigree 1.1123, pedigree (3,2,2,1,1)
  (same comment as for Abamectin)
- Chlorantraniliprole [air, non-urban air or from high stacks]: 1.5047e-6 kg; lognormal variance with pedigree 1.1123, pedigree (3,2,2,1,1)
  (same comment as for Abamectin)
- Chlorothalonil [air, non-urban air or from high stacks]: 0.000192444 kg; lognormal variance with pedigree 1.1123, pedigree (3,2,2,1,1)
  (same comment as for Abamectin)
- Chromium III [air, non-urban air or from high stacks]: 6.26121e-10 kg; lognormal variance with pedigree 1.2403, pedigree (3,2,2,1,3)
  (same comment as for Benzene)
- Copper ion [air, non-urban air or from high stacks]: 2.13106e-8 kg; lognormal variance with pedigree 1.2403, pedigree (3,2,2,1,3)
  (same comment as for Benzene)
- Dinitrogen monoxide [air, non-urban air or from high stacks]: 0.00017928 kg; lognormal variance with pedigree 1.11033, pedigree (3,2,2,2,3)
  Direct and indirect N2O emissions according to IPCC (2019) plus emissions derived from fuel combustion (diesel 88%, and biodiesel 12%), using emission factors from Nemecek & Kagi (2007)
- Epoxiconazole [air, non-urban air or from high stacks]: 3.47901e-6 kg; lognormal variance with pedigree 1.1123, pedigree (3,2,2,1,1)
  (same comment as for Abamectin)
- Fipronil [air, non-urban air or from high stacks]: 4.9007e-7 kg; lognormal variance with pedigree 1.1123, pedigree (3,2,2,1,1)
  (same comment as for Abamectin)
- Fluazifop-P-butyl [air, non-urban air or from high stacks]: 3.29324e-6 kg; lognormal variance with pedigree 1.1123, pedigree (3,2,2,1,1)
  (same comment as for Abamectin)
- Fludioxonil [air, non-urban air or from high stacks]: 1.62457e-7 kg; lognormal variance with pedigree 1.1123, pedigree (3,2,2,1,1)
  (same comment as for Abamectin)
- Glyphosate [air, non-urban air or from high stacks]: 4.42238e-5 kg; lognormal variance with pedigree 1.1123, pedigree (3,2,2,1,1)
  (same comment as for Abamectin)
- Hydrocarbons, unspecified [air, non-urban air or from high stacks]: 3.75623e-5 kg; lognormal variance with pedigree 1.2403, pedigree (3,2,2,1,3)
  (same comment as for Benzene)
- Lambda-cyhalothrin [air, non-urban air or from high stacks]: 1.04107e-6 kg; lognormal variance with pedigree 1.1123, pedigree (3,2,2,1,1)
  (same comment as for Abamectin)
- Metalaxyl-M [air, non-urban air or from high stacks]: 1.30112e-7 kg; lognormal variance with pedigree 1.1123, pedigree (3,2,2,1,1)
  (same comment as for Abamectin)
- Methane, fossil [air, non-urban air or from high stacks]: 1.61497e-6 kg; lognormal variance with pedigree 1.2403, pedigree (3,2,2,1,3)
  (same comment as for Benzene)
- Methane, non-fossil [air, non-urban air or from high stacks]: 6.65247e-7 kg; lognormal variance with pedigree 1.2403, pedigree (3,2,2,1,3)
  (same comment as for Benzene)
- Nickel II [air, non-urban air or from high stacks]: 8.76618e-10 kg; lognormal variance with pedigree 1.2403, pedigree (3,2,2,1,3)
  (same comment as for Benzene)
- Nitrogen oxides [air, non-urban air or from high stacks]: 0.000596809 kg; lognormal variance with pedigree 1.11033, pedigree (3,2,2,2,3)
  Emissions of NOx from applied mineral fertilisers, according to WFLDB (2019)
- PAH, polycyclic aromatic hydrocarbons [air, non-urban air or from high stacks]: 4.11484e-8 kg; lognormal variance with pedigree 1.2403, pedigree (3,2,2,1,3)
  (same comment as for Benzene)
- Particulate Matter, < 2.5 um [air, non-urban air or from high stacks]: 6.98538e-7 kg; lognormal variance with pedigree 1.2403, pedigree (3,2,2,1,3)
  (same comment as for Benzene)
- Pyraclostrobin [air, non-urban air or from high stacks]: 6.36505e-6 kg; lognormal variance with pedigree 1.1123, pedigree (3,2,2,1,1)
  (same comment as for Abamectin)
- S-Metolachlor [air, non-urban air or from high stacks]: 1.82304e-5 kg; lognormal variance with pedigree 1.1123, pedigree (3,2,2,1,1)
  (same comment as for Abamectin)
- Selenium IV [air, non-urban air or from high stacks]: 1.25175e-10 kg; lognormal variance with pedigree 1.2403, pedigree (3,2,2,1,3)
  (same comment as for Benzene)
- Sulfur dioxide [air, non-urban air or from high stacks]: 1.26367e-5 kg; lognormal variance with pedigree 1.2403, pedigree (3,2,2,1,3)
  (same comment as for Benzene)
- Thiabendazole [air, non-urban air or from high stacks]: 9.70328e-7 kg; lognormal variance with pedigree 1.1123, pedigree (3,2,2,1,1)
  (same comment as for Abamectin)
- Thiamethoxam [air, non-urban air or from high stacks]: 4.99477e-6 kg; lognormal variance with pedigree 1.1123, pedigree (3,2,2,1,1)
  (same comment as for Abamectin)
- Thiophanate-methyl [air, non-urban air or from high stacks]: 1.36006e-5 kg; lognormal variance with pedigree 1.1123, pedigree (3,2,2,1,1)
  (same comment as for Abamectin)
- Thiram [air, non-urban air or from high stacks]: 5.64688e-6 kg; lognormal variance with pedigree 1.1123, pedigree (3,2,2,1,1)
  (same comment as for Abamectin)
- Trifluralin [air, non-urban air or from high stacks]: 8.29145e-6 kg; lognormal variance with pedigree 1.1123, pedigree (3,2,2,1,1)
  (same comment as for Abamectin)
- Water [air, unspecified]: 0.00044 m3; lognormal variance with pedigree 0.0034, pedigree (2,1,2,5,1)
- Zinc II [air, non-urban air or from high stacks]: 1.25175e-8 kg; lognormal variance with pedigree 1.2403, pedigree (3,2,2,1,3)
  (same comment as for Benzene)
- Abamectin [soil, agricultural]: 4.41793e-6 kg; lognormal variance with pedigree 1.11233, pedigree (3,2,2,2,1)
  (same comment as for Abamectin)
- Abamectin [soil, forestry]: 8.38011e-9 kg; lognormal variance with pedigree 1.11233, pedigree (3,2,2,2,1)
  (same comment as for Abamectin)
- Alkylbenzene (c10-c15) [soil, agricultural]: 2.50068e-5 kg; lognormal variance with pedigree 1.11233, pedigree (3,2,2,2,1)
  (same comment as for Abamectin)
- Arsenic ion [soil, agricultural]: 9.92249e-8 kg; normal variance with pedigree 1.21, pedigree (5,5,5,5,5)
  Heavy metals emissions to agricultural soil through erosion are estimated by using the SALCA-heavy metal model (Nemecek et al., 2015).
  Uncertainty: Emissions of heavy metals to soil estimated based on WFLDB adapted to Brazil
- Cadmium II [soil, agricultural]: -6.36595e-8 kg; normal variance with pedigree 1.21, pedigree (5,5,5,5,5)
  (same comment as for Arsenic ion)
- Carboxin [soil, agricultural]: 1.2212e-5 kg; lognormal variance with pedigree 1.11233, pedigree (3,2,2,2,1)
  (same comment as for Abamectin)
- Carboxin [soil, forestry]: 1.17087e-8 kg; lognormal variance with pedigree 1.11233, pedigree (3,2,2,2,1)
  (same comment as for Abamectin)
- Chlorantraniliprole [soil, agricultural]: 8.33023e-6 kg; lognormal variance with pedigree 1.11233, pedigree (3,2,2,2,1)
  (same comment as for Abamectin)
- Chlorantraniliprole [soil, forestry]: 1.50491e-8 kg; lognormal variance with pedigree 1.11233, pedigree (3,2,2,2,1)
  (same comment as for Abamectin)
- Chlorothalonil [soil, agricultural]: 0.000283987 kg; lognormal variance with pedigree 1.11233, pedigree (3,2,2,2,1)
  (same comment as for Abamectin)
- Chlorothalonil [soil, forestry]: 2.93298e-6 kg; lognormal variance with pedigree 1.11233, pedigree (3,2,2,2,1)
  (same comment as for Abamectin)
- Chromium III [soil, agricultural]: 3.36259e-7 kg; normal variance with pedigree 1.21, pedigree (5,5,5,5,5)
  (same comment as for Arsenic ion)
- Copper ion [soil, agricultural]: 3.44166e-7 kg; normal variance with pedigree 1.21, pedigree (5,5,5,5,5)
  (same comment as for Arsenic ion)
- Diafenthiuron [soil, agricultural]: 3.41085e-6 kg; lognormal variance with pedigree 1.11233, pedigree (3,2,2,2,1)
  (same comment as for Abamectin)
- Diafenthiuron [soil, forestry]: 1.00708e-7 kg; lognormal variance with pedigree 1.11233, pedigree (3,2,2,2,1)
  (same comment as for Abamectin)
- Epoxiconazole [soil, agricultural]: 4.68543e-6 kg; lognormal variance with pedigree 1.11233, pedigree (3,2,2,2,1)
  (same comment as for Abamectin)
- Epoxiconazole [soil, forestry]: 5.34411e-8 kg; lognormal variance with pedigree 1.11233, pedigree (3,2,2,2,1)
  (same comment as for Abamectin)
- Fipronil [soil, agricultural]: 4.39738e-6 kg; lognormal variance with pedigree 1.11233, pedigree (3,2,2,2,1)
  (same comment as for Abamectin)
- Fipronil [soil, forestry]: 7.54973e-9 kg; lognormal variance with pedigree 1.11233, pedigree (3,2,2,2,1)
  (same comment as for Abamectin)
- Fluazifop-P-butyl [soil, agricultural]: 3.22708e-6 kg; lognormal variance with pedigree 1.11233, pedigree (3,2,2,2,1)
  (same comment as for Abamectin)
- Fluazifop-P-butyl [soil, forestry]: 5.05747e-8 kg; lognormal variance with pedigree 1.11233, pedigree (3,2,2,2,1)
  (same comment as for Abamectin)
- Fludioxonil [soil, agricultural]: 1.44079e-6 kg; lognormal variance with pedigree 1.11233, pedigree (3,2,2,2,1)
  (same comment as for Abamectin)
- Fludioxonil [soil, forestry]: 2.49198e-9 kg; lognormal variance with pedigree 1.11233, pedigree (3,2,2,2,1)
  (same comment as for Abamectin)
- Glyphosate [soil, agricultural]: 0.000388947 kg; lognormal variance with pedigree 1.11233, pedigree (3,2,2,2,1)
  (same comment as for Abamectin)
- Glyphosate [soil, forestry]: 6.799e-7 kg; lognormal variance with pedigree 1.11233, pedigree (3,2,2,2,1)
  (same comment as for Abamectin)
- Lambda-cyhalothrin [soil, agricultural]: 2.13776e-6 kg; lognormal variance with pedigree 1.11233, pedigree (3,2,2,2,1)
  (same comment as for Abamectin)
- Lambda-cyhalothrin [soil, forestry]: 1.60001e-8 kg; lognormal variance with pedigree 1.11233, pedigree (3,2,2,2,1)
  (same comment as for Abamectin)
- Lead II [soil, agricultural]: -2.82569e-5 kg; normal variance with pedigree 1.21, pedigree (5,5,5,5,5)
  (same comment as for Arsenic ion)
- Metalaxyl-M [soil, agricultural]: 1.14675e-6 kg; lognormal variance with pedigree 1.11233, pedigree (3,2,2,2,1)
  (same comment as for Abamectin)
- Metalaxyl-M [soil, forestry]: 2.06562e-9 kg; lognormal variance with pedigree 1.11233, pedigree (3,2,2,2,1)
  (same comment as for Abamectin)
- Pesticides, unspecified [soil, agricultural]: 3.15112e-5 kg; lognormal variance with pedigree 1.11233, pedigree (3,2,2,2,1)
  (same comment as for Abamectin)
- Pesticides, unspecified [soil, forestry]: 2.15629e-7 kg; lognormal variance with pedigree 1.11233, pedigree (3,2,2,2,1)
  (same comment as for Abamectin)
- Picoxystrobin [soil, agricultural]: 2.10728e-5 kg; lognormal variance with pedigree 1.11233, pedigree (3,2,2,2,1)
  (same comment as for Abamectin)
- Propylene glycol [soil, agricultural]: 6.99813e-6 kg; lognormal variance with pedigree 1.11233, pedigree (3,2,2,2,1)
  Emission was destinated to agricultural soil, according to Nemecek and Schnetzer (2012).
- Pyraclostrobin [soil, agricultural]: 8.82253e-6 kg; lognormal variance with pedigree 1.11233, pedigree (3,2,2,2,1)
  (same comment as for Abamectin)
- Pyraclostrobin [soil, forestry]: 9.7775e-8 kg; lognormal variance with pedigree 1.11233, pedigree (3,2,2,2,1)
  (same comment as for Abamectin)
- S-Metolachlor [soil, agricultural]: 0.000161721 kg; lognormal variance with pedigree 1.11233, pedigree (3,2,2,2,1)
  (same comment as for Abamectin)
- S-Metolachlor [soil, forestry]: 2.84483e-7 kg; lognormal variance with pedigree 1.11233, pedigree (3,2,2,2,1)
  (same comment as for Abamectin)
- Thiabendazole [soil, agricultural]: 8.74766e-6 kg; lognormal variance with pedigree 1.11233, pedigree (3,2,2,2,1)
  (same comment as for Abamectin)
- Thiabendazole [soil, forestry]: 1.50695e-8 kg; lognormal variance with pedigree 1.11233, pedigree (3,2,2,2,1)
  (same comment as for Abamectin)
- Thiamethoxam [soil, agricultural]: 4.2194e-5 kg; lognormal variance with pedigree 1.11233, pedigree (3,2,2,2,1)
  (same comment as for Abamectin)
- Thiamethoxam [soil, forestry]: 7.92954e-8 kg; lognormal variance with pedigree 1.11233, pedigree (3,2,2,2,1)
  (same comment as for Abamectin)
- Thiophanate-methyl [soil, agricultural]: 5.72972e-5 kg; lognormal variance with pedigree 1.11233, pedigree (3,2,2,2,1)
  (same comment as for Abamectin)
- Thiophanate-methyl [soil, forestry]: 2.09013e-7 kg; lognormal variance with pedigree 1.11233, pedigree (3,2,2,2,1)
  (same comment as for Abamectin)
- Thiram [soil, agricultural]: 4.98344e-5 kg; lognormal variance with pedigree 1.11233, pedigree (3,2,2,2,1)
  (same comment as for Abamectin)
- Thiram [soil, forestry]: 8.72383e-8 kg; lognormal variance with pedigree 1.11233, pedigree (3,2,2,2,1)
  (same comment as for Abamectin)
- Trifluralin [soil, agricultural]: 7.44377e-5 kg; lognormal variance with pedigree 1.11233, pedigree (3,2,2,2,1)
  (same comment as for Abamectin)
- Trifluralin [soil, forestry]: 1.27153e-7 kg; lognormal variance with pedigree 1.11233, pedigree (3,2,2,2,1)
  (same comment as for Abamectin)
- Abamectin [water, ground-]: 1.72013e-8 kg; lognormal variance with pedigree 1.11233, pedigree (3,2,2,2,1)
  (same comment as for Abamectin)
- Abamectin [water, unspecified]: 1.8892e-11 kg; lognormal variance with pedigree 1.11233, pedigree (3,2,2,2,1)
  (same comment as for Abamectin)
- Arsenic ion [water, surface water]: 9.92349e-12 kg; lognormal variance with pedigree 1.11233, pedigree (3,2,2,2,1)
  Emissions of heavy metals to surface water are calculated according to Schmidt (2007)
- Cadmium II [water, surface water]: 8.78739e-13 kg; lognormal variance with pedigree 1.11233, pedigree (3,2,2,2,1)
  Emissions of heavy metals to surface water are calculated according to Schmidt (2007)
- Carboxin [water, ground-]: 1.65034e-8 kg; lognormal variance with pedigree 1.11233, pedigree (3,2,2,2,1)
  (same comment as for Abamectin)
- Carboxin [water, unspecified]: 2.63313e-11 kg; lognormal variance with pedigree 1.11233, pedigree (3,2,2,2,1)
  (same comment as for Abamectin)
- Chlorantraniliprole [water, ground-]: 1.21292e-8 kg; lognormal variance with pedigree 1.11233, pedigree (3,2,2,2,1)
  (same comment as for Abamectin)
- Chlorantraniliprole [water, unspecified]: 5.26928e-11 kg; lognormal variance with pedigree 1.11233, pedigree (3,2,2,2,1)
  (same comment as for Abamectin)
- Chlorothalonil [water, ground-]: 6.49934e-8 kg; lognormal variance with pedigree 1.11233, pedigree (3,2,2,2,1)
  (same comment as for Abamectin)
- Chlorothalonil [water, unspecified]: 6.58921e-9 kg; lognormal variance with pedigree 1.11233, pedigree (3,2,2,2,1)
  (same comment as for Abamectin)
- Chromium III [water, surface water]: 3.68959e-11 kg; lognormal variance with pedigree 1.11233, pedigree (3,2,2,2,1)
  Emissions of heavy metals to surface water are calculated according to Schmidt (2007)
- Copper ion [water, surface water]: 3.51143e-11 kg; lognormal variance with pedigree 1.11233, pedigree (3,2,2,2,1)
  Emissions of heavy metals to surface water are calculated according to Schmidt (2007)
- Epoxiconazole [water, ground-]: 2.90133e-9 kg; lognormal variance with pedigree 1.11233, pedigree (3,2,2,2,1)
  (same comment as for Abamectin)
- Epoxiconazole [water, unspecified]: 1.20477e-10 kg; lognormal variance with pedigree 1.11233, pedigree (3,2,2,2,1)
  (same comment as for Abamectin)
- Fipronil [water, ground-]: 3.47023e-10 kg; lognormal variance with pedigree 1.11233, pedigree (3,2,2,2,1)
  (same comment as for Abamectin)
- Fipronil [water, unspecified]: 1.69538e-11 kg; lognormal variance with pedigree 1.11233, pedigree (3,2,2,2,1)
  (same comment as for Abamectin)
- Fluazifop-P-butyl [water, ground-]: 2.13913e-10 kg; lognormal variance with pedigree 1.11233, pedigree (3,2,2,2,1)
  (same comment as for Abamectin)
- Fluazifop-P-butyl [water, unspecified]: 1.1394e-10 kg; lognormal variance with pedigree 1.11233, pedigree (3,2,2,2,1)
  (same comment as for Abamectin)
- Fludioxonil [water, ground-]: 5.61614e-12 kg; lognormal variance with pedigree 1.11233, pedigree (3,2,2,2,1)
  (same comment as for Abamectin)
- Fludioxonil [water, unspecified]: 5.60144e-12 kg; lognormal variance with pedigree 1.11233, pedigree (3,2,2,2,1)
  (same comment as for Abamectin)
- Glyphosate [water, ground-]: 1.50735e-8 kg; lognormal variance with pedigree 1.11233, pedigree (3,2,2,2,1)
  (same comment as for Abamectin)
- Glyphosate [water, unspecified]: 1.5255e-9 kg; lognormal variance with pedigree 1.11233, pedigree (3,2,2,2,1)
  (same comment as for Abamectin)
- Lambda-cyhalothrin [water, ground-]: 7.6292e-12 kg; lognormal variance with pedigree 1.11233, pedigree (3,2,2,2,1)
  (same comment as for Abamectin)
- Lambda-cyhalothrin [water, unspecified]: 3.60268e-11 kg; lognormal variance with pedigree 1.11233, pedigree (3,2,2,2,1)
  (same comment as for Abamectin)
- Lead II [water, surface water]: 2.23139e-11 kg; lognormal variance with pedigree 1.11233, pedigree (3,2,2,2,1)
  Emissions of heavy metals to surface water are calculated according to Schmidt (2007)
- Mercury II [water, surface water]: 1.09119e-7 kg; lognormal variance with pedigree 1.11233, pedigree (3,2,2,2,1)
  Emissions of heavy metals to surface water are calculated according to Schmidt (2007)
- Metalaxyl-M [water, ground-]: 1.03649e-8 kg; lognormal variance with pedigree 1.11233, pedigree (3,2,2,2,1)
  (same comment as for Abamectin)
- Metalaxyl-M [water, unspecified]: 4.63846e-12 kg; lognormal variance with pedigree 1.11233, pedigree (3,2,2,2,1)
  (same comment as for Abamectin)
- Nitrate [water, ground-]: 0.023702 kg; lognormal variance with pedigree 1.11233, pedigree (3,2,2,2,1)
  The SQCB-NO3 model was used according to Nemecek et al. (2015), considering only the quantity of water from precipitation (no irrigation was applied). Technical parameters are available in the BRCalc/ICVCalc tool (Folegatti-Matsuura et al., 2022).
- Pesticides, unspecified [water, ground-]: 2.16707e-9 kg; lognormal variance with pedigree 1.11233, pedigree (3,2,2,2,1)
  (same comment as for Abamectin)
- Pesticides, unspecified [water, unspecified]: 6.20422e-10 kg; lognormal variance with pedigree 1.11233, pedigree (3,2,2,2,1)
  (same comment as for Abamectin)
- Phosphorus [water, surface water]: 0.00207238 kg; lognormal variance with pedigree 1.11233, pedigree (3,2,2,2,1)
  Only the phosphorus emission to surface water caused by soil erosion was calculated, according to Nemecek et al., 2015. Required technical parameters are available in the BRCalc/ICVCalc tool (Folegatti-Matsuura et al., 2022).
- Pyraclostrobin [water, ground-]: 1.30755e-9 kg; lognormal variance with pedigree 1.11233, pedigree (3,2,2,2,1)
  (same comment as for Abamectin)
- Pyraclostrobin [water, unspecified]: 2.19457e-10 kg; lognormal variance with pedigree 1.11233, pedigree (3,2,2,2,1)
  (same comment as for Abamectin)
- S-Metolachlor [water, ground-]: 2.91099e-7 kg; lognormal variance with pedigree 1.11233, pedigree (3,2,2,2,1)
  (same comment as for Abamectin)
- S-Metolachlor [water, unspecified]: 6.39535e-10 kg; lognormal variance with pedigree 1.11233, pedigree (3,2,2,2,1)
  (same comment as for Abamectin)
- Thiabendazole [water, ground-]: 3.44761e-9 kg; lognormal variance with pedigree 1.11233, pedigree (3,2,2,2,1)
  (same comment as for Abamectin)
- Thiabendazole [water, unspecified]: 3.3888e-11 kg; lognormal variance with pedigree 1.11233, pedigree (3,2,2,2,1)
  (same comment as for Abamectin)
- Thiamethoxam [water, ground-]: 4.57868e-7 kg; lognormal variance with pedigree 1.11233, pedigree (3,2,2,2,1)
  (same comment as for Abamectin)
- Thiamethoxam [water, unspecified]: 1.77974e-10 kg; lognormal variance with pedigree 1.11233, pedigree (3,2,2,2,1)
  (same comment as for Abamectin)
- Thiophanate-methyl [water, ground-]: 1.70006e-8 kg; lognormal variance with pedigree 1.11233, pedigree (3,2,2,2,1)
  (same comment as for Abamectin)
- Thiophanate-methyl [water, unspecified]: 4.68946e-10 kg; lognormal variance with pedigree 1.11233, pedigree (3,2,2,2,1)
  (same comment as for Abamectin)
- Thiram [water, ground-]: 4.24225e-8 kg; lognormal variance with pedigree 1.11233, pedigree (3,2,2,2,1)
  (same comment as for Abamectin)
- Thiram [water, unspecified]: 1.97159e-10 kg; lognormal variance with pedigree 1.11233, pedigree (3,2,2,2,1)
  (same comment as for Abamectin)
- Trifluralin [water, ground-]: 3.73513e-9 kg; lognormal variance with pedigree 1.11233, pedigree (3,2,2,2,1)
  (same comment as for Abamectin)
- Trifluralin [water, unspecified]: 2.86095e-10 kg; lognormal variance with pedigree 1.11233, pedigree (3,2,2,2,1)
  (same comment as for Abamectin)

## Sampling procedure
The main source of data for agricultural inputs and operations is interview with relevant peanut producers located in Sao Paulo state, the main producer state in Brazil. Emissions from the agricultural process are estimated using BRCalc/ICVCalc (Folegatti-Matsuura et al., 2022).

## Review by Simone Fazio 2022-07-29
all the review comments have been addressed, solved or better explained
