# treatment of brake wear emissions, passenger car

Dataset: EcoSpold 2, unit process
Geography: RER
Time period: 2012-01-01 to 2023-12-31
Technology level: current
Classification: ISIC rev.4 ecoinvent: 3821:Treatment and disposal of non-hazardous waste
Scenario: Business-as-Usual
System model: Allocation, cut-off by classification
Generated by: Andrew Simons
Published in: Ntziachristos L., Paul P. 2009
Database: ecoinvent
isCopyrightProtected: true
accessRestrictedTo: 1

## General comment
This dataset represents the treatment of non-exhaust emissions produced by brake abrasion from average passenger car. The datasets are treatments because they represent a removal of substances from the technosphere (removal of brake material).
This dataset is valid for Europe and represents the average data for the operation of an average passenger car.
Calculation of non-exhaust emissions (tyre, brake and road wear emissions as well as petrol evaporation emissions) are based on: Ntziachristos, L., Boulter, P. (2009b). EMEP/EEA air pollutant emissions inventory guidebook 2009: Road vehicle tyre and brake wear; Road surface wear. Copenhagen, European Environment Agency.
The emission factors relate to 1kg brake wear. The quantity of brake wear emissions per kg vehicle and km is defined in the transport datasets.
The brake wear emissions are to air, water and soil. All particulates are accounted for as emissions to air and have particle sizes below 100um. Anything above this does not remain airborne over longer periods. Total particulates equals total of all air emission substances. The fractions to water and soil are calculated by deducting the airborne emissions from the total tyre wear. This remaining amount is then simply split 50/50 between water and soil.

## Included activities start
The activity starts with the friction of passenger car brakes

## Included activities end
The activity ends with emissions of passenger car brake wear

## Reference product
- brake wear emissions, passenger car: -1 kg; source Ntziachristos L., Paul P. 2009; By-product classification Waste; CPC 49129: Other parts and accessories n.e.c. of motor vehicles (including brakes, gear boxes, axles, road wheels, suspen[…]; HS2017 8708: Motor vehicles; parts and accessories, of heading no. 8701 to 8705
  Calculations
  production volume 4.92e7 kg; = 6.56e12*7.50E-06
    Estimation. Calculated from production volume of reference product using the relative outputs.
    Total vkm/yr expresses the total annual kilometers driven by a vehicle
    Total vkm/yr= pkm/yr * p/v = 4.099E+12 pkm/yr * 1.6 p/v = 6.558E+12 vkm/yr
    Annual production volume of non-exhaust brake wear emissions = total vkm/yr * total kg emissions = 6.558E+12 vkm/yr * 7.5E-6kg/vkm
    pkm expresses the unit of measure representing the transport of one passenger over one kilometre. The pkm/year is 4.099E+12. p/v represents the number of passengers per vehicle, which corresponds to 1.6. Source: EU and EEA
    <http://ec.europa.eu/transport/publications/statistics/doc/pb2010_3_transport.pdf>
    <http://www.eea.europa.eu/data-and-maps/figures/term29-occupancy-rates-in-passenger-transport-1>
    Total kg emissions represents the total amount of non-exhaust road wear emissions per vehicle. Total kg non-exhaust road wear emissions= 1.50E-05 kg/vkm. This is the value for a medium sized passenger car. Source: Ntziachristos, L., Boulter, P. (2009b). EMEP/EEA air pollutant emissions inventory guidebook 2009: Road vehicle tyre and brake wear; Road surface wear. Copenhagen, European Environment Agency.
  property price 0 EUR2005
    Waste products are assigned a price of zero as they are assumed to require further treatment.
  properties: carbon allocation 0 kg, carbon content 0

## Emissions to nature
All rows: source Ntziachristos L., Paul P. 2009; lognormal variance with pedigree 0.0413, pedigree (2,2,5,1,1)
- Aluminium III [air, urban air close to ground]: 0.00285 kg; = LiveLink('\\FS01\Gabe\_LCA\Ecoinvent\v3\v3 data\Livelink data for ecoeditor\All_non_exhaust_emissions.xls','Brakes','D12','', 'Automatic')
  Literature value
- Antimony ion [air, urban air close to ground]: 0.139 kg; = LiveLink('\\FS01\Gabe\_LCA\Ecoinvent\v3\v3 data\Livelink data for ecoeditor\All_non_exhaust_emissions.xls','Brakes','D34','', 'Automatic')
  Literature value
- Arsenic ion [air, urban air close to ground]: 9.38e-5 kg; = LiveLink('\\FS01\Gabe\_LCA\Ecoinvent\v3\v3 data\Livelink data for ecoeditor\All_non_exhaust_emissions.xls','Brakes','D13','', 'Automatic')
  Literature value
- Barium II [air, urban air close to ground]: 0.0535 kg; = LiveLink('\\FS01\Gabe\_LCA\Ecoinvent\v3\v3 data\Livelink data for ecoeditor\All_non_exhaust_emissions.xls','Brakes','D14','', 'Automatic')
  Literature value
- Bromine [air, urban air close to ground]: 5.56e-5 kg; = LiveLink('\\FS01\Gabe\_LCA\Ecoinvent\v3\v3 data\Livelink data for ecoeditor\All_non_exhaust_emissions.xls','Brakes','D15','', 'Automatic')
  Literature value
- Cadmium II [air, urban air close to ground]: 3.11e-5 kg; = LiveLink('\\FS01\Gabe\_LCA\Ecoinvent\v3\v3 data\Livelink data for ecoeditor\All_non_exhaust_emissions.xls','Brakes','D17','', 'Automatic')
  Literature value
- Calcium II [air, urban air close to ground]: 0.0107 kg; = LiveLink('\\FS01\Gabe\_LCA\Ecoinvent\v3\v3 data\Livelink data for ecoeditor\All_non_exhaust_emissions.xls','Brakes','D16','', 'Automatic')
  Literature value
- Carbon [air, urban air close to ground]: 0.0363 kg; = LiveLink('\\FS01\Gabe\_LCA\Ecoinvent\v3\v3 data\Livelink data for ecoeditor\All_non_exhaust_emissions.xls','Brakes','D22','', 'Automatic')
  Literature value
- Chlorine [air, urban air close to ground]: 0.00208 kg; = LiveLink('\\FS01\Gabe\_LCA\Ecoinvent\v3\v3 data\Livelink data for ecoeditor\All_non_exhaust_emissions.xls','Brakes','D18','', 'Automatic')
  Literature value
- Chromium III [air, urban air close to ground]: 8.89e-6 kg; = LiveLink('\\FS01\Gabe\_LCA\Ecoinvent\v3\v3 data\Livelink data for ecoeditor\All_non_exhaust_emissions.xls','Brakes','D20','', 'Automatic')
  Literature value
- Cobalt II [air, urban air close to ground]: 8.89e-6 kg; = LiveLink('\\FS01\Gabe\_LCA\Ecoinvent\v3\v3 data\Livelink data for ecoeditor\All_non_exhaust_emissions.xls','Brakes','D19','', 'Automatic')
  Literature value
- Copper ion [air, urban air close to ground]: 0.071 kg; = LiveLink('\\FS01\Gabe\_LCA\Ecoinvent\v3\v3 data\Livelink data for ecoeditor\All_non_exhaust_emissions.xls','Brakes','D21','', 'Automatic')
  Literature value
- Iron ion [air, urban air close to ground]: 0.291 kg; = LiveLink('\\FS01\Gabe\_LCA\Ecoinvent\v3\v3 data\Livelink data for ecoeditor\All_non_exhaust_emissions.xls','Brakes','D23','', 'Automatic')
  Literature value
- Lead II [air, urban air close to ground]: 0.00843 kg; = LiveLink('\\FS01\Gabe\_LCA\Ecoinvent\v3\v3 data\Livelink data for ecoeditor\All_non_exhaust_emissions.xls','Brakes','D32','', 'Automatic')
  Literature value
- Lithium I [air, urban air close to ground]: 7.72e-5 kg; = LiveLink('\\FS01\Gabe\_LCA\Ecoinvent\v3\v3 data\Livelink data for ecoeditor\All_non_exhaust_emissions.xls','Brakes','D25','', 'Automatic')
  Literature value
- Manganese II [air, urban air close to ground]: 0.00342 kg; = LiveLink('\\FS01\Gabe\_LCA\Ecoinvent\v3\v3 data\Livelink data for ecoeditor\All_non_exhaust_emissions.xls','Brakes','D26','', 'Automatic')
  Literature value
- Molybdenum VI [air, urban air close to ground]: 0.0139 kg; = LiveLink('\\FS01\Gabe\_LCA\Ecoinvent\v3\v3 data\Livelink data for ecoeditor\All_non_exhaust_emissions.xls','Brakes','D27','', 'Automatic')
  Literature value
- Nickel II [air, urban air close to ground]: 0.000454 kg; = LiveLink('\\FS01\Gabe\_LCA\Ecoinvent\v3\v3 data\Livelink data for ecoeditor\All_non_exhaust_emissions.xls','Brakes','D29','', 'Automatic')
  Literature value
- Nitrate [air, urban air close to ground]: 0.00222 kg; = LiveLink('\\FS01\Gabe\_LCA\Ecoinvent\v3\v3 data\Livelink data for ecoeditor\All_non_exhaust_emissions.xls','Brakes','D30','', 'Automatic')
  Literature value
- Organic carbon [air, urban air close to ground]: 0.149 kg; = LiveLink('\\FS01\Gabe\_LCA\Ecoinvent\v3\v3 data\Livelink data for ecoeditor\All_non_exhaust_emissions.xls','Brakes','D31','', 'Automatic')
  Literature value
- PAH, polycyclic aromatic hydrocarbons [air, urban air close to ground]: 2.47e-6 kg; = LiveLink('\\FS01\Gabe\_LCA\Ecoinvent\v3\v3 data\Livelink data for ecoeditor\All_non_exhaust_emissions.xls','Brakes','D9','', 'Automatic')
  Literature value
- Particulate Matter, < 2.5 um [air, urban air close to ground]: 0.39 kg; = LiveLink('\\FS01\Gabe\_LCA\Ecoinvent\v3\v3 data\Livelink data for ecoeditor\All_non_exhaust_emissions.xls','Brakes','D7','', 'Automatic')
  Literature value. The three classes of particulates are included in the total emissions together with other air emissions. This implies a (minor) double-counting of mass as by Ecoinvent quality guidelines in “Overview and methodology, final draft revision 2, Weidema et al., 2012
- Particulate Matter, > 10 um [air, urban air close to ground]: 0.02 kg; = LiveLink('\\FS01\Gabe\_LCA\Ecoinvent\v3\v3 data\Livelink data for ecoeditor\All_non_exhaust_emissions.xls','Brakes','D5','', 'Automatic')
  (same comment as for Particulate Matter, < 2.5 um)
  property carbon content, fossil 0.922579; name C_content_fossil
  property carbon content, non-fossil 0; name C_content_non_fossil
  property dry mass 1 kg; name DM
  property water content 0; name water_content
  property water in wet mass 0 kg; name WWM
  property wet mass 1 kg; name WM
- Particulate Matter, > 2.5 um and < 10um [air, urban air close to ground]: 0.59 kg; = LiveLink('\\FS01\Gabe\_LCA\Ecoinvent\v3\v3 data\Livelink data for ecoeditor\All_non_exhaust_emissions.xls','Brakes','D6','', 'Automatic')
  (same comment as for Particulate Matter, < 2.5 um)
- Potassium I [air, urban air close to ground]: 0.000727 kg; = LiveLink('\\FS01\Gabe\_LCA\Ecoinvent\v3\v3 data\Livelink data for ecoeditor\All_non_exhaust_emissions.xls','Brakes','D24','', 'Automatic')
  Literature value
- Selenium IV [air, urban air close to ground]: 2.78e-5 kg; = LiveLink('\\FS01\Gabe\_LCA\Ecoinvent\v3\v3 data\Livelink data for ecoeditor\All_non_exhaust_emissions.xls','Brakes','D35','', 'Automatic')
  Literature value
- Silicon [air, urban air close to ground]: 0.0943 kg; = LiveLink('\\FS01\Gabe\_LCA\Ecoinvent\v3\v3 data\Livelink data for ecoeditor\All_non_exhaust_emissions.xls','Brakes','D36','', 'Automatic')
  Literature value
- Sodium I [air, urban air close to ground]: 0.0108 kg; = LiveLink('\\FS01\Gabe\_LCA\Ecoinvent\v3\v3 data\Livelink data for ecoeditor\All_non_exhaust_emissions.xls','Brakes','D28','', 'Automatic')
  Literature value
- Strontium II [air, urban air close to ground]: 0.000722 kg; = LiveLink('\\FS01\Gabe\_LCA\Ecoinvent\v3\v3 data\Livelink data for ecoeditor\All_non_exhaust_emissions.xls','Brakes','D39','', 'Automatic')
  Literature value
- Sulfate [air, urban air close to ground]: 0.0464 kg; = LiveLink('\\FS01\Gabe\_LCA\Ecoinvent\v3\v3 data\Livelink data for ecoeditor\All_non_exhaust_emissions.xls','Brakes','D37','', 'Automatic')
  Literature value
- Sulfur dioxide [air, urban air close to ground]: 0.0356 kg; = LiveLink('\\FS01\Gabe\_LCA\Ecoinvent\v3\v3 data\Livelink data for ecoeditor\All_non_exhaust_emissions.xls','Brakes','D33','', 'Automatic')
  Sulphur as Sulphur dioxide. Literature value
- Tin ion [air, urban air close to ground]: 0.00972 kg; = LiveLink('\\FS01\Gabe\_LCA\Ecoinvent\v3\v3 data\Livelink data for ecoeditor\All_non_exhaust_emissions.xls','Brakes','D38','', 'Automatic')
  Literature value
- Titanium ion [air, urban air close to ground]: 0.005 kg; = LiveLink('\\FS01\Gabe\_LCA\Ecoinvent\v3\v3 data\Livelink data for ecoeditor\All_non_exhaust_emissions.xls','Brakes','D40','', 'Automatic')
  Literature value
- Vanadium V [air, urban air close to ground]: 0.000917 kg; = LiveLink('\\FS01\Gabe\_LCA\Ecoinvent\v3\v3 data\Livelink data for ecoeditor\All_non_exhaust_emissions.xls','Brakes','D41','', 'Automatic')
  Literature value
- Zinc II [air, urban air close to ground]: 0.0121 kg; = LiveLink('\\FS01\Gabe\_LCA\Ecoinvent\v3\v3 data\Livelink data for ecoeditor\All_non_exhaust_emissions.xls','Brakes','D42','', 'Automatic')
  Literature value

## Sampling procedure
Literature
