# soybean oil refinery operation

Dataset: EcoSpold 2, unit process
Geography: RoW
Time period: 2000-01-01 to 2023-12-31
Technology level: current
Classification: ISIC rev.4 ecoinvent: 1040:Manufacture of vegetable and animal oils and fats
Scenario: Business-as-Usual
System model: Allocation, cut-off by classification
Generated by: Anne Greig
Published in: Omni Tech International 2010
Database: ecoinvent
isCopyrightProtected: true
accessRestrictedTo: 1

## General comment
This dataset represents the production of refined soybean oil, respectively soap stock, from crude soybean oil.

## Included activities start
From reception of crude soybean oil at the refinery gate through refining of crude soybean oil.

## Included activities end
System boundary is at the refinery.

## Technology
Average technology for alkaline refining process, which refers to caustic soda being added to degummed crude oil, which reacts with the free fatty acids (FFA) to form soap stock. The oil/soap mixture is separated using a centrifuge, and filtration is performed to further clarify the oil from the soap.

## Time period
Energy data for 2008; process inputs and other data from literature sources.

## Parameters
- fraction: 0.752 dimensionless; name fraction_of_crude_oil_PV_to_refinery; lognormal variance with pedigree 0.0086, pedigree (4,1,1,1,1)
- fraction, process water, to air: 0.15 dimensionless; name fraction_PW_to_air; lognormal variance with pedigree 0.092025, pedigree (4,4,3,2,4)
  Literature value. In case when no industry/process specific data are available, default evaporation fraction value is used. This value is 15% and is based on literature (Statistics Canada, 2007 & Shaffer, K.H., 2008, Consumptive water use in the Great Lakes Basin, USGS & Shiklomanov, 2003, World Water Resources at the Beginning of the 21st Century) and has been approved by an expert.
- fraction, tap water, to air: 0.15 dimensionless; name fraction_TW_to_air; = fraction_PW_to_air; lognormal variance with pedigree 0.092025, pedigree (4,4,3,2,4)
  Calculated value. See comment in the other parametres present in this dataset. Tap water is considered to be always used as process water, thus process water fractions to air are applied to all tap water input flows to calculate the amount of water consumed in the processes.
- utilisation rate: 0.9 dimensionless; name utilization_rate; lognormal variance with pedigree 0.0086, pedigree (4,1,1,1,1)

## Reference product
- soap: 1 kg; name soap_BP; source Omni Tech International  2010; By-product classification allocatable product; CPC 35321: Soap; organic surface-active products and preparations for use as soap; paper, wadding, felt and nonwovens, im[…]; HS2017 340111: Soap and organic surface-active products; in the form of bars, cakes, moulded shapes, and paper, wadding, f[...]
  Calculated value based on mass balance.
  production volume 2.27262e8 kg; = soap_BP/ soybean_oil_refined* soybean_oil_refined_PV
    Calculated from production volume of reference product using the relative outputs.
  property carbon content, fossil 0
    Soap (CnH2n+1 COO Na) is produced by a combined saponification and neutralisation process performed on a blend of oleochemical feedstocks comprised of short chain (C12-14, derived from coconut or palm kernel oil) and long chain (C16-18, from tallow or palm oil) esters.The ratio of short to long fatty acid chains is 20:80 (ecoinvent v2.2 report 12). Short fatty acid has been estimated as C12.5H(2*12.5+1); MW R=176 g/mol. Long fatty acid has been estimatedas C16H(2*16+1); MW R=225 g/mol. MW of COONa=67 g/mol
  property carbon content, non-fossil 0.692237
    Soap (CnH2n+1 COO Na) is produced by a combined saponification and neutralisation process performed on a blend of oleochemical feedstocks comprised of short chain (C12-14, derived from coconut or palm kernel oil) and long chain (C16-18, from tallow or palm oil) esters.The ratio of short to long fatty acid chains is 20:80 (ecoinvent v2.2 report 12). Short fatty acid has been estimated as C12.5H(2*12.5+1); MW R=176 g/mol. Long fatty acid has been estimated as C16H(2*16+1); MW R=225 g/mol. MW of COONa=67 g/mol
  property heating value, net 17.93 MJ
    LHV is calculated based on the Carbon content of the product. More details can be found on the respective documentation.
  property price 1.73 EUR2005
    According to Industrial Commodity Statistics Yearbook 2005, volume 1. Physical Quantity Data. UN. New York 2008 (hard copy ). The price is for the highest producing country in EU27 where the data are present (Italy) and soap; paper, wadding, and similar, covered with soap or detergent. US$ converted to according to http://en.wikipedia.org/wiki/Table_of_historical_exchange_rates downloaded 30 June 2009.
  properties: allocation factor 0.00743069, carbon allocation 0.602247 kg, carbon content 0.692237, dry mass 0.87 kg, true value 0.012802, water content 0.149425, water in wet mass 0.13 kg, wet mass 1 kg

## Inputs from technosphere
- electricity, medium voltage: 0.000185349, 0.0036973, 5.67602e-5, 1.13605e-5, 2.43936e-6, 0.000381803, 0.000144915 kWh (7 suppliers, which the file names only by identifier); sum of these 0.00447993 kWh; = UnitConversion(15.223, 'British thermal unit ISO IT', 'MJ')*UnitConversion(1,'MJ','kWh'); source Omni Tech International  2010; lognormal variance with pedigree 0.0446, pedigree (1,4,5,5,1)
  Measured value
- heat, district or industrial, natural gas: 0.000970183, 0.0590403 MJ (2 suppliers, which the file names only by identifier); sum of these 0.0600105 MJ; = UnitConversion(56.644,'British thermal unit ISO IT','MJ'); source Omni Tech International  2010; lognormal variance with pedigree 0.0446, pedigree (1,4,5,5,1)
  Measured value
  properties: heating value, net 1 MJ
- sodium hydroxide, without water, in 50% solution state: 0.00230954 kg; source Omni Tech International  2010; lognormal variance with pedigree 0.0526, pedigree (3,5,5,5,1)
  Estimated value
  properties: dry mass 1 kg, heating value, net 3.03 MJ, wet mass 1 kg
- soybean oil, crude: 1.04632 kg; name soybean_oil_crude_input
  Calculated value based on mass balance. Note that the mass balance is not completely 100%; the balance can be found in the saponifiable matter in the wastewater.
  properties: carbon content, non-fossil 0.768, dry mass 1 kg, heating value, net 38.4 MJ, wet mass 1 kg
  note on heating value, net: Values is approximated from HHV from "vegetable oil, crude". Source: Radovanovic,M.; Zivanovic,T.; Stojiljkovic,D.; Jovanovic,V.; Jerinic,N.; Knezevic,S. et.al. Utilization of sunflower husk as a fuel for industrial boilers - 20 years experience. Proc. 5th Eur. Conf. on Industrial Furnaces&Boilers 2000,vol.2,p.221-233. Available at: https://phyllis.nl/Biomass/View/2152
- tap water: 0.318208, 0.485081, 0.905137, 2.43837, 0.293514, 12.2318, 139.975 kg (7 suppliers, which the file names only by identifier); sum of these 156.647 kg; source Omni Tech International  2010; lognormal variance with pedigree 0.212, pedigree (3,5,5,5,5)
  Estimated value
  properties: carbon content, fossil 0.00178991, dry mass 0.000337476 kg, water content 2962.17, wet mass 1 kg
- vegetable oil refinery: 1.22271e-10 unit; = 1/(lifetime_capacity_kg*utilization_rate); lognormal variance with pedigree 0.4687, pedigree (4,3,5,3,5)
  The utilization rate of 90% means that out of the whole capacity of the vegetable oil refinery only 90% is actually used for the production.
  property lifetime 50 year; name lifetime
  property lifetime capacity [kg] 9.125e9 kg; name lifetime_capacity_kg; = 500*365*1000*lifetime
  note on lifetime capacity [kg]: According to literature (World Bank, 1999, The Indian Oilseed Complex, http://books.google.ch/books?id=cAmzHYm7kHoC&pg=PA151&dq=edible+oil+refinery+plant+infrastructure+area&hl=en&sa=X&ei=x65MT729L7HN4QSYmszJAg&redir_esc=y#v=onepage&q=edible%20oil%20refinery%20plant%20infrastructure%20area&f=false) the average size European vegetable oil refinery produce 500 tones/day of refined vegetable oil.
- wastewater from vegetable oil refinery: -0.12351 m3; name wastewater_from_vegetable_oil_rafinery_o; source Omni Tech International  2010; lognormal variance with pedigree 0.174, pedigree (3,5,3,5,5)
  Estimated value. This wastewater contains 27% saponifiable and unsaponifiable matter.
  production volume; = wastewater_from_vegetable_oil_rafinery_o/ soybean_oil_refined* soybean_oil_refined_PV
    Calculated from production volume of reference product using the relative outputs.
  property dry mass 3.85 kg; name wastewater_from_vegetable_oil_rafin_DM_0
  property water in wet mass 996.15 kg; name wastewater_from_vegetable_oil_rafi_WWM_0; = wastewater_from_vegetable_oil_rafin_WM_0- wastewater_from_vegetable_oil_rafin_DM_0
  property wet mass 1000 kg; name wastewater_from_vegetable_oil_rafin_WM_0

## Emissions to nature
- Water [air, non-urban air or from high stacks]: 0.0331369 m3; = (tap_water_input-( wastewater_from_vegetable_oil_rafinery_o*1000)) / 1000; source Omni Tech International  2010; lognormal variance with pedigree 0.212, pedigree (3,5,5,5,5)
  Based on mass balance of water in and out.

## Sampling procedure
Mix of data from a major processor and from literature.

## Review by Bo Weidema 2012-08-23
Changed to treatment dataset (with negative reference product)
