# unsaturated hydrocarbons production, steam cracking operation, average

Dataset: EcoSpold 2, unit process
Geography: RoW
Time period: 2019-01-01 to 2023-12-31
Technology level: current
Classification: ISIC rev.4 ecoinvent: 202:Manufacture of other chemical products
Synonyms: SC
Scenario: Business-as-Usual
System model: Allocation, cut-off by classification
Generated by: Thomas Fröhlich
Published in: IFEU/PlasticsEurope 2021
Database: ecoinvent
isCopyrightProtected: true
accessRestrictedTo: 1

## General comment
Steam cracking is a process to split up longer, saturated hydrocarbons into shorter, unsaturated compounds under high temperature (700-875 °C) in the presence of steam. The main products of steam cracking are ethylene, propylene, pyrolysis gas (containing aromatic hydrocarbon, mainly benzene, toluene and xylenes) and butadiene, their shares depending on the feedstock. Important minor products are hydrogen, ethyl benzene, styrene and butene.
The generic design of the cracking units is quite similar. Little modifications help to optimize the plant performance according to local conditions. Besides differences in furnace design, pressure and temperature of the fractionation columns and refrigeration systems may vary or turbo expanders may be in use.
The feedstock of steam crackers can vary. In the European Union crackers are basically fed with naphtha, but in the last years the share of butane and propane is increasing. Naphtha is an important product of the oil refinery. Liquid feedstocks are favourable within the EU as they can easily be transported. Other important feedstocks for crackers in the EU are atmospheric gas oil, refinery gas and ethane. This dataset was extrapolated from the European dataset (IFEU/PlasticsEurope, 2021). Therefore the European feedstock mix was applied.
In the present dataset, there are four reference products (ethylene, propylene, butadiene, crude and pyrolysis gas containing benzene, toluene and xylenes). For more information on how multi-functionality is solved, consult the Sampling Procedure.
References:
IFEU/PlasticsEurope (2021): Eco-profile of Steam Cracker Products: Ethylene, Propylene, Butadiene, Pyrolysis Gasoline, Ethylene Oxide (EO), Ethylene Glycols (MEG, DEG, TEG)
Falcke H.; Holbrook S.; Clenahan I.; Lopez Carretero A.; Sanalan T.; Brinkmann T.; Roth J.; Zerger B.; Roudier S.; Delgado Sancho L. (2017): Best Available Techniques (BAT) Reference Document for the Production of Large Volume Organic Chemicals, JRC Science for Policy Report.
Zimmermann H., Walzl R. (2011): Ethylene, Ullmann's Encyclopedia of Industrial Chemistry, Wiley VCH.

## Included activities start
The activity starts with the raw materials entering the steam cracker.

## Included activities end
The activity ends with the final products being ready for further processing or transportation at the production site gate. The dataset includes the input materials, energy uses, infrastructure and emissions.

## Geography
This dataset was extrapolated from the European dataset (IFEU/PlasticsEurope, 2021). Therefore the European feedstock mix was applied. Representative for minium 80% of European (EU + GB, NO, CH) production.

## Technology
This dataset was extrapolated from the European dataset (IFEU/PlasticsEurope, 2021). Therefore the European feedstock mix was applied.
The modelled cracker represents an average European steam cracker based on industrial survey, representative for minimum 80 % of European (EU + GB, NO, CH) production. The used feedstock is as follows(share by mass): butane (16.2%), ethane (4.5%), naphtha (64%), natural gas liquids (2.2%), propane (7.6%), refinery gas (1.5%) and atmospheric gas oil (4%, proxied by diesel).
A steam cracker complex may be separated into three sections: pyrolysis, primary fractionation/compression and product fractionation.
In the pyrolysis section (steam cracker) the hydrocarbon feedstock is preheated and then vaporised with superheated steam before passing into long and narrow tubes arranged in a cracking furnace. In this reactor, the hydrocarbon feedstock is cracked into smaller molecules. The product distribution can be controlled through variation of the residence time, temperature profile, and partial pressure. The process is highly endothermic and therefore requires high energy input. Therefore, the tubes of the furnace are heated to 750 – 875 °C by oil or gas fire burners. In addition, several cracking products are partly used internally as fuel. Medium pressured steam (around 10 bar, 220 °C) is injected to reduce the partial pressure of the hydrocarbon mixture and to minimise coke formation high-pressure; the steam cracker owes its name to this process step. Transfer line exchangers (TLEs) may be used to quickly quench the product gases to 550 – 650°C and to recover heat for internal use.
The primary fractionation and compression section consists of the primary fractionator (naphtha and gas oil feed only), quench tower, gas compressor and gas clean-up facilities. The primary fractionator is used to condense and fractionate fuel oil streams produced from naphtha and gas oil fed crackers. The gases are de-superheated in the quench tower by a circulating oil or water stream. The circulating oil or water stream is used as a source of medium-level heat for other sections of the plant. Product gases from the quench tower are condensed by four or five stages of gas compression. The gas is cooled after each stage and passed through a liquid knock-out drum. Finally, acid gases and carbon dioxide are removed from the cracked gas.
In the product fractionation section the products are cooled down and subsequently fractionated. The chilling train usually consists of four or five successive stages of chilling, incorporating ethylene and propylene refrigeration as well as an elaborate self-refrigeration system. This produces hydrogen, which is used for downstream hydrogenation or hydrotreating of the heavier products, or can be sold as a product. The exact process flow sequence varies according to the feedstock and the design arrangement; however, various fractionation towers are used to separate the desired products. This may include a sequence of de-methaniser, followed by a de-ethaniser. Bottoms from the de-ethaniser are directed to the de-propaniser and the de-butaniser. The lighter the feedstock, the fewer fractions need to be separated, such that the separation system may be constructed simpler. After separation the ethylene still contains undesirable acetylene and ethane. Acetylene is removed either by selective catalytic hydrogenation or by extractive distillation. Ethane is recycled back to the cracker after being separated from ethylene. Similarly, the C3 fraction contains methyl acetylene and propadiene after separation. Selective hydrogenation is used to convert these into propylene and propane prior to separation in a C3 splitter.
It is assumed that roughly 7% of the cooling water is evaporated, the remaining 93% are emitted as water to water. A temperature difference of 8°C was assumed for the cooling water.
Waste for recycling was specified in the original inventory but due to lack of information on composition and type of recycling, it was split into hazardous waste for incineration, hazardous waste for underground deposit and inert waste for disposal according to the waste shares in the initial inventory.
References:
IFEU/PlasticsEurope (2021): Eco-profile of Steam Cracker Products: Ethylene, Propylene, Butadiene, Pyrolysis Gasoline, Ethylene Oxide (EO), Ethylene Glycols (MEG, DEG, TEG)
Falcke H.; Holbrook S.; Clenahan I.; Lopez Carretero A.; Sanalan T.; Brinkmann T.; Roth J.; Zerger B.; Roudier S.; Delgado Sancho L. (2017): Best Available Techniques (BAT) Reference Document for the Production of Large Volume Organic Chemicals, JRC Science for Policy Report.

## Time period
Data collection 2019/2020. The technology is not expected to change within 5 years.

## Reference product
- hydrogen, gaseous, low pressure: 1 kg; name hydrogen; By-product classification allocatable product; CPC 34210: Hydrogen, nitrogen, oxygen, carbon dioxide and rare gases; inorganic oxygen compounds of non-metals n.e.c.; HS2017 280410: Hydrogen; CAS 1333-74-0
  European average value, based on industrial survey, representative for min. 80 % of European (EU + GB, NO, CH) production
  IFEU/PlasticsEurope (2021): Eco-profile of Steam Cracker Products: Ethylene, Propylene, Butadiene, Pyrolysis Gasoline, Ethylene Oxide (EO), Ethylene Glycols (MEG, DEG, TEG)
  production volume 5.0416e9 kg; name PV_hydrogen; = hydrogen/ethylene*PV_ethylene
    Calculated from production volume of reference product using the relative outputs.
  property heating value, net 120.21 MJ
    LHV is calculated based on the elemental composition of the substance. Based on the CAS number of the substance (001333-74-0), the chemical formula of the substance is found to be: H2, (PubChem 2020).
    Reference: Kim, S., Chen, J., Cheng, T., Gindulyte, A., He, J., He, S., Li, Q., Shoemaker, B. A., Thiessen, P. A., Yu, B., Zaslavsky, L., Zhang, J., & Bolton, E. E. (2019). PubChem 2019 update: improved access to chemical data. Nucleic acids research, 47(D1), D1102–D1109. https://doi.org/10.1093/nar/gky1033
  property price 1.90471 EUR2005
    Price for 2021.
    Price based on HydrogenEurope: Clean Hydrogen Monitor 2022, available here: https://hydrogeneurope.eu/wp-content/uploads/2022/10/Clean_Hydrogen_Monitor_10-2022_DIGITAL.pdf, last accessed 2023-07-25.
    The prices were converted to EUR based on the annual exchange rates published by the European Central Bank (https://sdw.ecb.europa.eu/quickview.do?SERIES_KEY=120.EXR.A.USD.EUR.SP00.A, last accessed on 2022-02-15) and adjusted for inflation relative to 2005 using the producer price index (PPI) of the euro area, published by eurostat (https://ec.europa.eu/eurostat/databrowser/view/STS_INPP_A__custom_6416181/default/table?lang=en, last accessed on 2022-05-04).
  properties: carbon allocation 0 kg, carbon content 0, carbon content, fossil 0, carbon content, non-fossil 0, dry mass 1 kg, water content 0, water in wet mass 0 kg, wet mass 1 kg

## Inputs from technosphere
- butane: 0.197115 kg; lognormal variance with pedigree 0.0132, pedigree (2,4,1,5,3)
  (same comment as for hydrogen, gaseous, low pressure)
  properties: carbon content, fossil 0.827586, dry mass 1 kg, heating value, net 45.89 MJ, wet mass 1 kg
- chemical factory, organics: 4.37397e-10 unit; = 4E-10*(ethylene+propylene+butadiene_crude+pyGas_BTX+butene_mixed+hydrogen); lognormal variance with pedigree 0.0732, pedigree (2,4,1,4,4)
  Calculated based on literature data published by the industry. For this activity, no information was readily available concerning infrastructure and land-use. Therefore, the infrastructure is estimated based on data from two chemical factories, the BASF site of Ludwigshafen and the chemical factory in Gendorf (which are both located in Germany), which produce a wide range of chemical substances. Based on this data, the following assumptions are made: the built area amounts to about 4.2 ha, the plant has an average output of 50'000 t/a and a lifespan of fifty years. The estimated infrastructure amount is therefore 4.00 E-10 units per kg of produced chemical.
  This amount was multiplied with the amount of chemical products produced.
  References:
  Althaus H.-J., Chudacoff M., Hischier R., Jungbluth N., Osses M. and Primas A. (2007) Life Cycle Inventories of Chemicals. ecoinvent report No. 8, v2.0. EMPA Dübendorf, Swiss Centre for Life Cycle Inventories, Dübendorf, CH.
  Gendorf (2000) Umwelterklärung 2000, Werk Gendorf. Werk Gendorf, Burgkirchen.
- compressed air, 700 kPa gauge: 0.0146639 m3; lognormal variance with pedigree 0.0132, pedigree (2,4,1,5,3)
  (same comment as for hydrogen, gaseous, low pressure)
- diesel: 0.000100244, 0.0415557, 0.00042607, 0.00420839, 0.00029478, 0.00208519 kg (6 suppliers, which the file names only by identifier); sum of these 0.0486704 kg; lognormal variance with pedigree 0.0132, pedigree (2,4,1,5,3)
  European average value, based on industrial survey, representative for min. 80 % of European (EU + GB, NO, CH) production
  Diesel is used as a proxy for atmospheric gas oil (AGO).
  IFEU/PlasticsEurope (2021): Eco-profile of Steam Cracker Products: Ethylene, Propylene, Butadiene, Pyrolysis Gasoline, Ethylene Oxide (EO), Ethylene Glycols (MEG, DEG, TEG)
  properties: carbon content, fossil 0.865, dry mass 1 kg, heating value, net 42.8 MJ, wet mass 1 kg
  note on carbon content, fossil: C-content of diesel is 86.5% (ecoinvent v2.2 report 6_IV, Tab 3.14)
- electricity, medium voltage: 0.00401034, 0.0799974, 0.0268789, 0.0012281, 0.000245804, 5.27796e-5, 0.00826097 kWh (7 suppliers, which the file names only by identifier); sum of these 0.120674 kWh; lognormal variance with pedigree 0.0132, pedigree (2,4,1,5,3)
  (same comment as for hydrogen, gaseous, low pressure)
- ethane: 0.0547542 kg; lognormal variance with pedigree 0.0526, pedigree (2,4,1,5,3)
  (same comment as for hydrogen, gaseous, low pressure)
  properties: carbon content, fossil 0.798875, dry mass 1 kg, heating value, net 48.38 MJ, wet mass 1 kg
- hazardous waste, for incineration: -0.00380223 kg; name hazwaste_incineration; lognormal variance with pedigree 0.0132, pedigree (2,4,1,5,3)
  (same comment as for hydrogen, gaseous, low pressure)
  production volume; name PV_hazwaste_incineration; = hazwaste_incineration/ethylene*PV_ethylene
    Calculated from production volume of reference product using the relative outputs.
  properties: carbon content, fossil 0.554667, dry mass 0.75 kg, heating value, net 17 MJ, water content 0.333333, wet mass 1 kg
  note on carbon content, fossil: Tab A.6, ecoinvent v2.2 report 13_I. C content has been calculated after data in the tables, and then referred to 1 kg DM
  note on heating value, net: Value taken from the general comment of the treatment dataset.
- hazardous waste, for underground deposit: -0.001058 kg; name hazwaste_deposit; lognormal variance with pedigree 0.0132, pedigree (2,4,1,5,3)
  (same comment as for hydrogen, gaseous, low pressure)
  production volume; name PV_hazwaste_deposit; = hazwaste_deposit/ethylene*PV_ethylene
    Calculated from production volume of reference product using the relative outputs.
  properties: carbon content, fossil 0.554667, dry mass 1 kg, wet mass 1 kg
  note on carbon content, fossil: Tab A.6, ecoinvent v2.2 report 13_I, average hazardous waste composition was used, and referred to 0% water mass. No waste-specific emission are currently inventoried for underground deposits. Accordingly, no waste composition must be specified. For generic, average waste to underground deposit deposition in a 200 liter steel drum without cement solidification is assumed (ecoinvent v2.2 report 13_I).
- inert waste, for final disposal: -0.000376263 kg; name inert_waste; lognormal variance with pedigree 0.0132, pedigree (2,4,1,5,3)
  (same comment as for hydrogen, gaseous, low pressure)
  production volume; name PV_inert_waste; = inert_waste/ethylene*PV_ethylene
    Calculated from production volume of reference product using the relative outputs.
  properties: dry mass 0.995 kg, water content 0.00502513, wet mass 1 kg
- methanol: 7.47635e-5, 0.000144992, 1.37323e-5 kg (3 suppliers, which the file names only by identifier); sum of these 0.000233488 kg; lognormal variance with pedigree 0.0132, pedigree (2,4,1,5,3)
  (same comment as for hydrogen, gaseous, low pressure)
  properties: carbon content, fossil 0.375, dry mass 1 kg, heating value, net 20 MJ, wet mass 1 kg
  note on heating value, net: Based on literature, page 533, Report 17: Jungbluth, N., Chudacoff, M., Dauriat, A., Dinkel, F., Doka, G., Faist Emmenegger, M., Gnansounou, E., Kljun, N., Schleiss, K., Spielmann, M., Stettler, C., Sutter, J. 2007: Life Cycle Inventories of Bioenergy. ecoinvent report No. 17, Swiss Centre for Life Cycle Inventories, Dübendorf, CH.
- naphtha: 0.00106701, 0.0133639, 0.629999, 0.102179, 0.00440348, 0.0277146 kg (6 suppliers, which the file names only by identifier); sum of these 0.778726 kg; lognormal variance with pedigree 0.0132, pedigree (2,4,1,5,3)
  (same comment as for hydrogen, gaseous, low pressure)
  properties: carbon content, fossil 0.919743, dry mass 1 kg, heating value, net 45 MJ, wet mass 1 kg
- natural gas liquids: 0.0267687 kg; lognormal variance with pedigree 0.0132, pedigree (2,4,1,5,3)
  (same comment as for hydrogen, gaseous, low pressure)
  properties: carbon content, fossil 0.812659, dry mass 1 kg, heating value, net 24.62 MJ, wet mass 1 kg
- nitrogen, liquid: 0.0112723 kg; lognormal variance with pedigree 0.0132, pedigree (2,4,1,5,3)
  (same comment as for hydrogen, gaseous, low pressure)
  properties: dry mass 1 kg, wet mass 1 kg
- propane: 0.0924737 kg; lognormal variance with pedigree 0.0132, pedigree (2,4,1,5,3)
  (same comment as for hydrogen, gaseous, low pressure)
  properties: carbon content, fossil 0.817139, dry mass 1 kg, heating value, net 46.4 MJ, wet mass 1 kg
  note on heating value, net: Indicative value. Reference: Fuels - Higher and Lower Calorific Values, available at: https://www.engineeringtoolbox.com/fuels-higher-calorific-values-d_169.html
- refinery gas: 0.0182514 kg; lognormal variance with pedigree 0.0132, pedigree (2,4,1,5,3)
  (same comment as for hydrogen, gaseous, low pressure)
  properties: carbon content, fossil 0.77, dry mass 1 kg, heating value, net 50.3 MJ, wet mass 1 kg
- sodium hydroxide, without water, in 50% solution state: 0.00493664 kg; lognormal variance with pedigree 0.0132, pedigree (2,4,1,5,3)
  (same comment as for hydrogen, gaseous, low pressure)
  properties: dry mass 1 kg, heating value, net 3.03 MJ, wet mass 1 kg
- wastewater, average: -0.000677324, -2.41153e-6 m3 (2 suppliers, which the file names only by identifier); sum of these -0.000679736 m3; lognormal variance with pedigree 0.0019, pedigree (2,2,1,1,2)
  (same comment as for hydrogen, gaseous, low pressure)
  production volume; name PV_wastewater; = wastewater/ethylene*PV_ethylene
    Calculated from production volume of reference product using the relative outputs.
  properties: carbon content, non-fossil 0.194039, dry mass 0.346837 kg, mass concentration, TOC 0.1091 kg/m3, mass concentration, calcium 0.039453 kg/m3, mass concentration, chlorine 0.030031 kg/m3, mass concentration, hydrogen 0.013365 kg/m3, mass concentration, nitrogen 0.031015 kg/m3, mass concentration, oxygen 0.069824 kg/m3, mass concentration, sodium 0.06456 kg/m3, mass concentration, sulfur 0.015602 kg/m3, water content 2882.2, wet mass 1000 kg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
  note on carbon content, non-fossil: 0.0673 kg TOC/m3 (Tab A.17, ecoinvent v2.2 report 13_I). TOC was considered as Total Carbon.
- water, deionised: 2.18688 kg; lognormal variance with pedigree 0.0132, pedigree (2,4,1,5,3)
  (same comment as for hydrogen, gaseous, low pressure)
  properties: wet mass 1 kg

## Inputs from nature
- Occupation, industrial area [natural resource, land]: 0.000418765 m2*year; lognormal variance with pedigree 0.0512, pedigree (2,4,1,4,3)
  (same comment as for hydrogen, gaseous, low pressure)
- Water, cooling, unspecified natural origin [natural resource, in water]: 0.10225 m3; lognormal variance with pedigree 0.0132, pedigree (2,4,1,5,3)
  (same comment as for hydrogen, gaseous, low pressure)

## Emissions to nature
- Acetylene [air, unspecified]: 5.20316e-7 kg; lognormal variance with pedigree 0.0526, pedigree (2,4,1,5,3)
  (same comment as for hydrogen, gaseous, low pressure)
- Benzene [air, unspecified]: 1.03468e-5 kg; lognormal variance with pedigree 0.0526, pedigree (2,4,1,5,3)
  (same comment as for hydrogen, gaseous, low pressure)
- Butadiene [air, unspecified]: 5.02476e-6 kg; lognormal variance with pedigree 0.0526, pedigree (2,4,1,5,3)
  (same comment as for hydrogen, gaseous, low pressure)
- Butane [air, unspecified]: 1.48662e-7 kg; lognormal variance with pedigree 0.0526, pedigree (2,4,1,5,3)
  (same comment as for hydrogen, gaseous, low pressure)
- Butene [air, unspecified]: 5.20316e-6 kg; lognormal variance with pedigree 0.0526, pedigree (2,4,1,5,3)
  (same comment as for hydrogen, gaseous, low pressure)
- Carbon dioxide, fossil [air, unspecified]: 0.724691 kg; lognormal variance with pedigree 0.0132, pedigree (2,4,1,5,3)
  (same comment as for hydrogen, gaseous, low pressure)
- Carbon monoxide, fossil [air, unspecified]: 0.00021269 kg; lognormal variance with pedigree 0.6626, pedigree (2,4,1,5,3)
  (same comment as for hydrogen, gaseous, low pressure)
- Chlorodifluoromethane [air, unspecified]: 1.48662e-8 kg; lognormal variance with pedigree 0.0526, pedigree (2,4,1,5,3)
  (same comment as for hydrogen, gaseous, low pressure)
- Ethane [air, unspecified]: 7.31415e-6 kg; lognormal variance with pedigree 0.0526, pedigree (2,4,1,5,3)
  (same comment as for hydrogen, gaseous, low pressure)
- Ethylene [air, unspecified]: 2.00991e-5 kg; lognormal variance with pedigree 0.0526, pedigree (2,4,1,5,3)
  (same comment as for hydrogen, gaseous, low pressure)
- Formamide [air, unspecified]: 5.35182e-7 kg; lognormal variance with pedigree 0.0526, pedigree (2,4,1,5,3)
  (same comment as for hydrogen, gaseous, low pressure)
- Heptane [air, unspecified]: 1.9326e-7 kg; lognormal variance with pedigree 0.0526, pedigree (2,4,1,5,3)
  (same comment as for hydrogen, gaseous, low pressure)
- Hydrocarbons, aliphatic, alkanes, cyclic [air, unspecified]: 8.02773e-7 kg; lognormal variance with pedigree 0.0526, pedigree (2,4,1,5,3)
  (same comment as for hydrogen, gaseous, low pressure)
- Hydrocarbons, aliphatic, alkanes, unspecified [air, unspecified]: 7.13576e-7 kg; lognormal variance with pedigree 0.0526, pedigree (2,4,1,5,3)
  (same comment as for hydrogen, gaseous, low pressure)
- Hydrocarbons, aromatic [air, unspecified]: 1.49702e-5 kg; lognormal variance with pedigree 0.0526, pedigree (2,4,1,5,3)
  (same comment as for hydrogen, gaseous, low pressure)
- Hydrocarbons, chlorinated [air, unspecified]: 2.82457e-7 kg; lognormal variance with pedigree 0.0526, pedigree (2,4,1,5,3)
  (same comment as for hydrogen, gaseous, low pressure)
- Hydrogen [air, unspecified]: 2.111e-6 kg; lognormal variance with pedigree 0.0526, pedigree (2,4,1,5,3)
  (same comment as for hydrogen, gaseous, low pressure)
- Methane, fossil [air, unspecified]: 1.99801e-5 kg; lognormal variance with pedigree 0.0526, pedigree (2,4,1,5,3)
  (same comment as for hydrogen, gaseous, low pressure)
- Methanol [air, unspecified]: 3.27056e-7 kg; lognormal variance with pedigree 0.0526, pedigree (2,4,1,5,3)
  (same comment as for hydrogen, gaseous, low pressure)
- NMVOC, non-methane volatile organic compounds [air, unspecified]: 0.000394191 kg; lognormal variance with pedigree 0.0526, pedigree (2,4,1,5,3)
  (same comment as for hydrogen, gaseous, low pressure)
- Nitrogen oxides [air, unspecified]: 0.00047982 kg; lognormal variance with pedigree 0.0526, pedigree (2,4,1,5,3)
  (same comment as for hydrogen, gaseous, low pressure)
- Particulate Matter, > 2.5 um and < 10um [air, unspecified]: 3.60802e-5 kg; lognormal variance with pedigree 0.3126, pedigree (2,4,1,5,3)
  (same comment as for hydrogen, gaseous, low pressure)
- Propylene [air, unspecified]: 8.86023e-6 kg; lognormal variance with pedigree 0.0526, pedigree (2,4,1,5,3)
  (same comment as for hydrogen, gaseous, low pressure)
- Styrene [air, unspecified]: 4.45985e-7 kg; lognormal variance with pedigree 0.0526, pedigree (2,4,1,5,3)
  (same comment as for hydrogen, gaseous, low pressure)
- Sulfur dioxide [air, unspecified]: 1.48216e-5 kg; lognormal variance with pedigree 0.0132, pedigree (2,4,1,5,3)
  (same comment as for hydrogen, gaseous, low pressure)
- Toluene [air, unspecified]: 1.63974e-5 kg; lognormal variance with pedigree 0.0526, pedigree (2,4,1,5,3)
  (same comment as for hydrogen, gaseous, low pressure)
- Water [air, unspecified]: 0.00213538 m3; lognormal variance with pedigree 0.0526, pedigree (2,4,1,5,3)
  (same comment as for hydrogen, gaseous, low pressure)
- t-Butyl methyl ether [air, unspecified]: 2.42318e-6 kg; lognormal variance with pedigree 0.0526, pedigree (2,4,1,5,3)
  (same comment as for hydrogen, gaseous, low pressure)
- BOD5, Biological Oxygen Demand [water, unspecified]: 2.29088e-5 kg; lognormal variance with pedigree 0.0526, pedigree (2,4,1,5,3)
  (same comment as for hydrogen, gaseous, low pressure)
- Benzene [water, unspecified]: 2.97323e-8 kg; lognormal variance with pedigree 0.3126, pedigree (2,4,1,5,3)
  (same comment as for hydrogen, gaseous, low pressure)
- COD, Chemical Oxygen Demand [water, unspecified]: 0.000100436 kg; lognormal variance with pedigree 0.0526, pedigree (2,4,1,5,3)
  (same comment as for hydrogen, gaseous, low pressure)
- DOC, Dissolved Organic Carbon [water, unspecified]: 3.2765e-5 kg; lognormal variance with pedigree 0.0526, pedigree (2,4,1,5,3)
  (same comment as for hydrogen, gaseous, low pressure)
- Mercury II [water, unspecified]: 3.81495e-9 kg; lognormal variance with pedigree 0.6626, pedigree (2,4,1,5,3)
  (same comment as for hydrogen, gaseous, low pressure)
- Nitrogen [water, unspecified]: 1.35282e-6 kg; lognormal variance with pedigree 0.0526, pedigree (2,4,1,5,3)
  (same comment as for hydrogen, gaseous, low pressure)
- Oils, unspecified [water, unspecified]: 0.000118796 kg; lognormal variance with pedigree 0.3126, pedigree (2,4,1,5,3)
  (same comment as for hydrogen, gaseous, low pressure)
- Phenol [water, unspecified]: 2.97323e-8 kg; lognormal variance with pedigree 0.3126, pedigree (2,4,1,5,3)
  (same comment as for hydrogen, gaseous, low pressure)
- Sulfate [water, unspecified]: 0.000632243 kg; lognormal variance with pedigree 0.0526, pedigree (2,4,1,5,3)
  (same comment as for hydrogen, gaseous, low pressure)
- TOC, Total Organic Carbon [water, unspecified]: 4.11644e-5 kg; lognormal variance with pedigree 0.0526, pedigree (2,4,1,5,3)
  (same comment as for hydrogen, gaseous, low pressure)
- Toluene [water, unspecified]: 3.67194e-6 kg; lognormal variance with pedigree 0.3126, pedigree (2,4,1,5,3)
  (same comment as for hydrogen, gaseous, low pressure)
- Water [water, unspecified]: 0.101622 m3; lognormal variance with pedigree 0.0526, pedigree (2,4,1,5,3)
  (same comment as for hydrogen, gaseous, low pressure)
- Zinc II [water, unspecified]: 4.16253e-7 kg; lognormal variance with pedigree 0.6626, pedigree (2,4,1,5,3)
  (same comment as for hydrogen, gaseous, low pressure)

## Sampling procedure
Extrapolation from European dataset. Industry survey complemented with literature data and data from the Reference Document on Best Available Techniques in the Large Volume Organic Chemical Industry (2017)

Multi-functionality is solved in accordance with PlasticsEurope (2017) with a flow specific approach. Feedstock is partitioned to all allocatable outputs by mass, whereas emissions and utilities are only assigned to intended products (reference products, butene, mixed and hydrogen, gaseous, low pressure) by mass.

References:

PlasticsEurope (2017): PlasticsEurope recommendation on Steam Cracker allocation, available here: https://plasticseurope.org/wp-content/uploads/2021/12/PlasticsEurope_recommendation_on_Steam_Cracker_allocation-_Juillet_2018.pdf, last accessed 20-10-2023.

IFEU/PlasticsEurope (2021): Eco-profile of Steam Cracker Products: Ethylene, Propylene, Butadiene, Pyrolysis Gasoline, Ethylene Oxide (EO), Ethylene Glycols (MEG, DEG, TEG).

## Extrapolations
Extrapolation from European dataset. Uncertainty has been adjusted accordingly.
