# tomato production, fresh grade, open field

Dataset: EcoSpold 2, unit process
Geography: IN-UP
Time period: 2015-01-01 to 2023-12-31
Technology level: current
Classification: ISIC rev.4 ecoinvent: 0113:Growing of vegetables and melons, roots and tubers
Scenario: Business-as-Usual
System model: Allocation, cut-off by classification
Generated by: Sanjeevan Bajaj
Database: ecoinvent
isCopyrightProtected: true
accessRestrictedTo: 1

## General comment
This dataset represents the production of 1 kg of fresh Tomato fresh grade during December, 2015- June, 2016 at a farm located in Village- Bhagatpur Ratan, District- Moradabad of UP. In this area, fields are irrigated with ground water using electric pump for surface irrigation. The farm has a yield of 60,000 kg fresh matter per ha for this crop cycle. Sowing date for the crop is 10-Feburary, 2016 and harvesting date is 12-June, 2016. Mineral NP fertilizer input is 113.25-69 kg/ha. Herbicide used has active ingredient as Carbofuran 495g/ha, Cypermethrin 156.25g/ha Machinery is used only for soil cultivation with fuel consumption of 12.48 kg/ha using plough and rotary cultivator for soil tillage.
[This dataset is meant to replace the following datasets:
- tomato production, fresh grade, IN-UP, 2015 - 2018]

## Included activities start
This activity starts about two weeks after the harvest of the previous crop. The soil is prepared for cultivation in December and sowing of seeds started about six weeks after soil preparation. Thereafter the crop is mature for harvesting in about 4 months.

## Included activities end
The activity ends with the harvesting of the mature Tomato from the Tomato plant

## Technology
Cultivation of Tomato follows conventional production standards

## Time period
Soil cultivating date for the main crop: 30-December, 2015; Harvesting date main crop: 12-June, 2016

## Reference product
- tomato, fresh grade: 1 kg; By-product classification allocatable product; CPC 01234: Tomatoes; HS2017 070200: Vegetables; tomatoes, fresh or chilled
  production volume 8.1937e8 kg; = 819.37*1000*1000
    http://agriexchange.apeda.gov.in/India%20Production/India_Productions.aspx?cat=Vegetables&hscode=1088 Production volume for Uttar Pradesh State in India is taken as representing the production in North India. Figure is for the year 2015-16 and is given in thousand tonnes.
  property price 1.09 EUR2005
    Calculated from the trade statistics for the year 2005 published by the UN (COMTRADE database, accessed 20151105) as an average of 5 biggest importers of tomato in the world; USA, DE, UK, FR and NL. Comtrade cathegory: 702: Tomatoes, fresh or chilled.
  properties: carbon allocation 0 kg, carbon content 0

## Inputs from technosphere
- [thio]carbamate-compound: 8.25e-6 kg; lognormal variance with pedigree 0.0052, pedigree (2,4,3,1,1)
  Calculated Value. This value has been calculated by using the ecoinvent LCI calculation tool for crop production.
  properties: carbon content, fossil 0.626349, dry mass 1 kg, wet mass 1 kg
- compost: 0.003125 kg; lognormal variance with pedigree 0.0052, pedigree (2,4,3,1,1)
  (same comment as for [thio]carbamate-compound)
  property cadmium content 3.6e-7; name Cd_content
  property chromium content 2.23e-5; name Cr_content
  property copper content 5.77e-5; name Cu_content
  property dry mass 0.5 kg; name DM
  property lead content 4.9e-5; name Pb_content
  property mercury content 1.2e-7; name Hg_content
  property nickel content 1.63e-5; name Ni_content
  property nitrogen content 0.014; name N_content
  property phosphorus content 0.0035; name P_content
  property potassium content 0.01; name K_content
  property zinc content 0.000184; name Zn_content
  properties: carbon content, non-fossil 0.183645, water content 1, wet mass 1 kg
- inorganic nitrogen fertiliser, as N: 0.000453 kg; lognormal variance with pedigree 0.0052, pedigree (2,4,3,1,1)
  This exchange is an aggregation of amounts:
  0.001058669890248312. Comment:
  1.6192964160794746E-4. Comment:
  1.6192964160794746E-4. Comment:
  1.642034538805976E-4. Comment:
  4.197497699777306E-6. Comment:
  3.907536329433147E-5. Comment:
  properties: dry mass 1 kg, wet mass 1 kg
- inorganic phosphorus fertiliser, as P2O5: 0.00115 kg; lognormal variance with pedigree 0.0052, pedigree (2,4,3,1,1)
  This exchange is an aggregation of amounts:
  5.92281387178312E-6. Comment:
  1.0884954469483347E-4. Comment:
  4.888900782089441E-4. Comment:
  4.888900782089441E-4. Comment:
  2.39572171843368E-4. Comment:
  properties: dry mass 1 kg, wet mass 1 kg
- irrigation: 0.018 m3; lognormal variance with pedigree 0.0052, pedigree (2,4,3,1,1)
  The data was collected for a hectare area through interview
  properties: dry mass 0.11 kg, water content 9089.91, wet mass 1000 kg
- land use change, annual crop: 4.66496e-6 ha; lognormal variance with pedigree 0.0052, pedigree (2,4,3,1,1)
  (same comment as for [thio]carbamate-compound)
- packaging, for fertilisers: 0.006075 kg; lognormal variance with pedigree 0.0532, pedigree (4,3,3,5,4)
  Total amount of active substance/s of fertilisers needed for the production of 'tomato, fresh grade' is calculated to be circa 3.04E-03 kg. Fertiliser/s used in this dataset is/are: 'nitrogen fertiliser, as N', 'phosphate fertiliser, as P2O5', 'urea, as N'. The total amount of active substance/s is doubled in order to account for the packaging of the dilluted product of fertiliser/s that is/are applied. Therefore, 6.08E-03 kg of packaging for fertilisers is justified with this exchange.
  properties: carbon content, fossil 0.825301, dry mass 1 kg, heating value, net 25.01 MJ, price 0.0642 EUR2005, wet mass 1 kg
  note on carbon content, fossil: Considering a chemical formula (C2H4)n for polyethylene, carbon content-fossil is calculated to be 0.856286 kg of Carbon per kg of dry mass.
- packaging, for pesticides: 2.17083e-5 kg; lognormal variance with pedigree 0.0532, pedigree (4,3,3,5,4)
  Total amount of active substance/s of pesticides needed for the production of tomato, fresh grade is calculated to be circa 1.09E-05 kg. Pesticide/s used in this dataset is/are: '[thio]carbamate-compound', 'pyrethroid-compound'. The total amount of active substance/s is doubled in order to account for the packaging of the dilluted product of pesticide/s that is/are applied. Therefore, 2.17E-05 kg of packaging for pesticides is justified with this exchange.
  properties: carbon content, fossil 0.85714, dry mass 1 kg, heating value, net 25.97 MJ, price 0.0642 EUR2005, wet mass 1 kg
- plastic tunnel: 3e-6 m2; lognormal variance with pedigree 0.0052, pedigree (2,4,3,1,1)
  (same comment as for [thio]carbamate-compound)
- pyrethroid-compound: 2.60417e-6 kg; lognormal variance with pedigree 0.0052, pedigree (2,4,3,1,1)
  (same comment as for [thio]carbamate-compound)
  properties: carbon content, fossil 0.623, dry mass 1 kg, wet mass 1 kg
- tillage, ploughing: 5.33946e-6 ha; lognormal variance with pedigree 0.0052, pedigree (2,4,3,1,1)
  (same comment as for [thio]carbamate-compound)
- tillage, rotary cultivator: 4.86809e-6 ha; lognormal variance with pedigree 0.0052, pedigree (2,4,3,1,1)
  (same comment as for [thio]carbamate-compound)
- urea: 0.00307528 kg; lognormal variance with pedigree 0.0052, pedigree (2,4,3,1,1)
  The exchange has been updated from 'urea, as N' into 'urea' and therefore its amount has been scaled (multiplied) from 0.0014 kg by 2.1438 kg of 'urea' per kg of 'urea, as N'. Original comment of the exchange is: The data was collected for a hectare area through interview
  properties: carbon content, fossil 0.2, dry mass 1 kg, wet mass 1 kg

## Inputs from nature
- Carbon dioxide, in air [natural resource, in air]: 0.081455 kg; lognormal variance with pedigree 0.0052, pedigree (2,4,3,1,1)
  (same comment as for [thio]carbamate-compound)
- Energy, gross calorific value, in biomass [natural resource, biotic]: 0.936732 MJ; lognormal variance with pedigree 0.0052, pedigree (2,4,3,1,1)
  The data was collected for a hectare area through interview
- Occupation, annual crop, irrigated [natural resource, land]: 0.0833333 m2*year; lognormal variance with pedigree 0.0066, pedigree (2,4,3,1,1)
  (same comment as for [thio]carbamate-compound)
- Transformation, from annual crop, irrigated [natural resource, land]: 0.166667 m2; lognormal variance with pedigree 0.0126, pedigree (2,4,3,1,1)
  (same comment as for [thio]carbamate-compound)
- Transformation, to annual crop, irrigated [natural resource, land]: 0.166667 m2; lognormal variance with pedigree 0.0126, pedigree (2,4,3,1,1)
  (same comment as for [thio]carbamate-compound)

## Emissions to nature
- Ammonia [air, non-urban air or from high stacks]: 0.000330942 kg; lognormal variance with pedigree 0.0126, pedigree (2,4,3,1,1)
  (same comment as for [thio]carbamate-compound)
- Carbon dioxide, fossil [air, non-urban air or from high stacks]: 0.00225362 kg; lognormal variance with pedigree 0.0052, pedigree (2,4,3,1,1)
  (same comment as for [thio]carbamate-compound)
- Dinitrogen monoxide [air, non-urban air or from high stacks]: 3.69901e-5 kg; lognormal variance with pedigree 0.0346, pedigree (2,4,3,1,1)
  (same comment as for [thio]carbamate-compound)
- Nitrogen oxides [air, non-urban air or from high stacks]: 0.000117098 kg; lognormal variance with pedigree 0.0446, pedigree (2,4,3,1,1)
  (same comment as for [thio]carbamate-compound)
- Water [air, non-urban air or from high stacks]: 0.00918 m3; lognormal variance with pedigree 0.0052, pedigree (2,4,3,1,1)
  (same comment as for [thio]carbamate-compound)
- Cadmium II [soil, agricultural]: 3.8557e-8 kg; lognormal variance with pedigree 0.0446, pedigree (2,4,3,1,1)
  (same comment as for [thio]carbamate-compound)
- Carbofuran [soil, agricultural]: 8.25e-6 kg; lognormal variance with pedigree 0.0376, pedigree (2,4,3,1,1)
  (same comment as for [thio]carbamate-compound)
- Chromium III [soil, agricultural]: -4.05879e-7 kg
  (same comment as for [thio]carbamate-compound)
- Copper ion [soil, agricultural]: -1.43557e-6 kg
  (same comment as for [thio]carbamate-compound)
- Cypermethrin [soil, agricultural]: 2.60417e-6 kg; lognormal variance with pedigree 0.0376, pedigree (2,4,3,1,1)
  (same comment as for [thio]carbamate-compound)
- Lead II [soil, agricultural]: -3.75327e-7 kg
  (same comment as for [thio]carbamate-compound)
- Mercury II [soil, agricultural]: -3.26513e-9 kg
  (same comment as for [thio]carbamate-compound)
- Nickel II [soil, agricultural]: -6.0497e-7 kg
  (same comment as for [thio]carbamate-compound)
- Zinc II [soil, agricultural]: -2.7293e-6 kg
  (same comment as for [thio]carbamate-compound)
- Cadmium II [water, ground-]: 3.79655e-10 kg; lognormal variance with pedigree 0.0946, pedigree (2,4,3,1,1)
  (same comment as for [thio]carbamate-compound)
- Cadmium II [water, surface water]: 9.69607e-9 kg; lognormal variance with pedigree 0.0946, pedigree (2,4,3,1,1)
  (same comment as for [thio]carbamate-compound)
- Chromium III [water, ground-]: 1.6953e-7 kg; lognormal variance with pedigree 0.0946, pedigree (2,4,3,1,1)
  (same comment as for [thio]carbamate-compound)
- Chromium III [water, surface water]: 8.98073e-7 kg; lognormal variance with pedigree 0.0946, pedigree (2,4,3,1,1)
  (same comment as for [thio]carbamate-compound)
- Copper ion [water, ground-]: 2.78193e-8 kg; lognormal variance with pedigree 0.0946, pedigree (2,4,3,1,1)
  (same comment as for [thio]carbamate-compound)
- Copper ion [water, surface water]: 1.25999e-6 kg; lognormal variance with pedigree 0.0946, pedigree (2,4,3,1,1)
  (same comment as for [thio]carbamate-compound)
- Lead II [water, ground-]: 2.35975e-9 kg; lognormal variance with pedigree 0.0946, pedigree (2,4,3,1,1)
  (same comment as for [thio]carbamate-compound)
- Lead II [water, surface water]: 4.07334e-7 kg; lognormal variance with pedigree 0.0946, pedigree (2,4,3,1,1)
  (same comment as for [thio]carbamate-compound)
- Mercury II [water, ground-]: 8.49783e-12 kg; lognormal variance with pedigree 0.0946, pedigree (2,4,3,1,1)
  (same comment as for [thio]carbamate-compound)
- Mercury II [water, surface water]: 2.0936e-9 kg; lognormal variance with pedigree 0.0946, pedigree (2,4,3,1,1)
  (same comment as for [thio]carbamate-compound)
- Nickel II [water, surface water]: 6.64186e-7 kg; lognormal variance with pedigree 0.0946, pedigree (2,4,3,1,1)
  (same comment as for [thio]carbamate-compound)
- Nitrate [water, ground-]: 0.000809523 kg; lognormal variance with pedigree 0.0446, pedigree (2,4,3,1,1)
  (same comment as for [thio]carbamate-compound)
- Phosphate [water, ground-]: 1.78861e-6 kg; lognormal variance with pedigree 0.0446, pedigree (2,4,3,1,1)
  (same comment as for [thio]carbamate-compound)
- Phosphate [water, surface water]: 5.24286e-6 kg; lognormal variance with pedigree 0.0446, pedigree (2,4,3,1,1)
  (same comment as for [thio]carbamate-compound)
- Phosphorus [water, surface water]: 7.12188e-5 kg; lognormal variance with pedigree 0.0446, pedigree (2,4,3,1,1)
  (same comment as for [thio]carbamate-compound)
- Water [water, ground-]: 0.00702 m3; lognormal variance with pedigree 0.0052, pedigree (2,4,3,1,1)
  (same comment as for [thio]carbamate-compound)
- Water [water, surface water]: 0.0018 m3; lognormal variance with pedigree 0.0052, pedigree (2,4,3,1,1)
  (same comment as for [thio]carbamate-compound)
- Zinc II [water, ground-]: 1.76232e-7 kg; lognormal variance with pedigree 0.0946, pedigree (2,4,3,1,1)
  (same comment as for [thio]carbamate-compound)
- Zinc II [water, surface water]: 1.55713e-6 kg; lognormal variance with pedigree 0.0946, pedigree (2,4,3,1,1)
  (same comment as for [thio]carbamate-compound)

## Sampling procedure
The farmer was identified and contacted by agriculture science faculty familiar with the local farmers in the region. Data was collected directly from the farmer through semi-structured interview using a questionnaire based on the input requirements of the ecoinvent LCI calculation tool for crop production. The farmer does not maintain any written records and has provided the data from recent memory. In this region, typically farmers are unable to provide exact name of active ingredient in the pesticide they use and the same was noted from details given on the pesticide packet. Individual farmer is not able to calculate fuel consumption for his own farm alone and this information has been collected from farming community of the area.

## Extrapolations
Ecoinvent LCI calculation tool for crop production was used to calculate field emissions from the cultivation process. Number of wet days have been taken for the neighboring region (New Delhi) and rainfall data is Normal rainfall for Western Uttar Pradesh where the farm is located.
