# polyester-complexed starch biopolymer production

Dataset: EcoSpold 2, unit process
Geography: RoW
Time period: 2000-01-01 to 2023-12-31
Technology level: current
Classification: EcoSpold01Categories: plastics/polymers
Classification: ISIC rev.4 ecoinvent: 1062:Manufacture of starches and starch products
Tags: ConvertedDataset
Scenario: Business-as-Usual
System model: Allocation, cut-off by classification
Generated by: Fredy Dinkel
Published in: Althaus H.J. 2007
Database: ecoinvent
isCopyrightProtected: true
accessRestrictedTo: 1

## General comment
Inventory refers to the production of 1 kg granulate modified starch. The inventories is based on calculations and extrapolations using highly aggregated background data from the environmental product declaration of Materbi (Novamont, 2004, Italy). Included processes in the inventory of modified starch granulate are the production of input materials corn starch and fossil components (plasticizers and complexing agents), transports of input materials, energy consumption in the processing and packaging at plant aswell as waste treatment.
[This dataset was already contained in the ecoinvent database version 2. It was not individually updated during the transfer to ecoinvent version 3. Life Cycle Impact Assessment results may still have changed, as they are affected by changes in the supply chain, i.e. in other datasets. This dataset was generated following the ecoinvent quality guidelines for version 2. It may have been subject to central changes described in the ecoinvent version 3 change report (http://www.ecoinvent.org/database/ecoinvent-version-3/reports-of-changes/), and the results of the central updates were reviewed extensively. The changes added e.g. consistent water flows and other information throughout the database. The documentation of this dataset can be found in the ecoinvent reports of version 2, which are still available via the ecoinvent website. The change report linked above covers all central changes that were made during the conversion process.]

## Included activities end
Only high aggregated data were available. So the emissions from energy consumption, waste water treatement and raw material inputs have been subtracted resulting in a difference in NMVOC emissions.shown in this process.

## Geography
Modified starch "mater-bi" is produced mainly by Novamont in Terni, Italy

## Technology
Production of modified starch out of corn starch, plasticizers and complexing agent.

## Reference product
- polyester-complexed starch biopolymer: 1 kg; By-product classification allocatable product; CPC 23220: Starches; inulin; wheat gluten; dextrins and other modified starches; HS2017 350510: Dextrins and other modified starches
  EcoSpold01Location=RER
  production volume 2.67763 kg
    This is a placeholder value that does not reflect real-world production volumes. This dataset does not currently require a real-world production volume to work in the database framework, and no actual data were collected yet. This has no negative effect on the results of the ecoinvent database.
  property carbon content, non-fossil 0.44
    Starch is a carbohydrate, C content considered 0.44 kg/kg DM (ecoinvent v2.2 report 15a, pg40)
  properties: carbon allocation 0.44 kg, carbon content 0.44, carbon content, fossil 0, dry mass 1 kg, heating value, net 18.94 MJ, price 0.29 EUR2005, water content 0, water in wet mass 0 kg, wet mass 1 kg

## Inputs from technosphere
- chemical factory, organics: 5e-10 unit; lognormal variance with pedigree 0.494, pedigree (5,4,5,5,4)
  EcoSpold01Location=RER
  Assumption infrastructure similar than chemical plant, but only half size. 50 years lifte time and output 20'000 t as Novamont in Italy
  Uncertainty: Assumption infrastructure similar than chemical plant, but only half size. 50 years lifte time and output 20'000 t as Novamont in Italy
- electricity, low voltage: 0.00112463, 0.0176856, 0.367087, 0.0362333, 0.00022569, 0.126383, 0.00626108 kWh (7 suppliers, which the file names only by identifier); sum of these 0.555 kWh; lognormal variance with pedigree 0.1227, pedigree (2,2,5,5,4)
  EcoSpold01Location=IT
  Value for direct electricity consumption from EDP Materbi Granulate NF07U (Novamont, 2004)
  Uncertainty: Value for direct electricity consumption from EDP Materbi Granulate NF07U (Novamont, 2004)
- hazardous waste, for incineration: -0.009 kg; lognormal variance with pedigree 0.0829, pedigree (2,2,2,5,4)
  Data for granulate processing and packaging from EDP Materbi Granulate NF07U (Novamont, 2004), assumption icineration
  EcoSpold01Location=CH
  Uncertainty: Data for granulate processing and packaging from EDP Materbi Granulate NF07U (Novamont, 2004), assumption icineration
  production volume
    Calculated from the production volume of modified starch in proportion to the respective output amounts.
  properties: carbon content, fossil 0.554667, dry mass 0.75 kg, heating value, net 17 MJ, water content 0.333333, wet mass 1 kg
  note on carbon content, fossil: Tab A.6, ecoinvent v2.2 report 13_I. C content has been calculated after data in the tables, and then referred to 1 kg DM
  note on heating value, net: Value taken from the general comment of the treatment dataset.
- heat, district or industrial, other than natural gas: 8.4204, 0.00390102 MJ (2 suppliers, which the file names only by identifier); sum of these 8.4243 MJ; lognormal variance with pedigree 0.1227, pedigree (2,2,5,5,4)
  Total coal consumption from EDP Materbi Granulate NF07U (Novamont, 2004). Assumption Carbotech AG use as fuel mainly.
  EcoSpold01Location=RER
  Uncertainty: Total coal consumption from EDP Materbi Granulate NF07U (Novamont, 2004). Assumption Carbotech AG use as fuel mainly.
  properties: heating value, net 1 MJ
- maize starch: 0.33561 kg; lognormal variance with pedigree 0.1227, pedigree (2,2,5,5,4)
  Calculation portion starch from reported CO2 fixation per kg granulate (0.59 kg CO2) compared to CO2 fixation in corn starch (1.74 kg CO2). 0.59 kg CO2 per kg Materbi reported in EDP Materbi Granulate NF07U (Novamont, 2004)
  EcoSpold01Location=DE
  Uncertainty: Calculation portion starch from reported CO2 fixation per kg granulate (0.59 kg CO2) compared to CO2 fixation in corn starch (1.74 kg CO2). 0.59 kg CO2 per kg Materbi reported in EDP Materbi Granulate NF07U (Novamont, 2004)
  properties: carbon content, non-fossil 0.46, dry mass 0.86 kg, heating value, net 11.64 MJ, water content 0.162791, wet mass 1 kg
  note on carbon content, non-fossil: C-content of starch is considered 46% on dry mass basis (from "Evolutionary and Biochemical Aspects", A.D. Kay and T. Vrede (in Global Ecology, 2010, Elsevier B.V., S.E. Jørgensen Ed.)).
- municipal solid waste: -5.09902e-6, -6.05486e-7, -3.76839e-6, -0.00287686, -4.23695e-7, -1.35999e-7, -3.07394e-7, -1.27969e-5 kg (8 suppliers, which the file names only by identifier); sum of these -0.0029 kg; lognormal variance with pedigree 0.0829, pedigree (2,2,2,5,4)
  Data for granulate processing and packaging from EDP Materbi Granulate NF07U (Novamont, 2004), assumption landfill
  EcoSpold01Location=CH
  Uncertainty: Data for granulate processing and packaging from EDP Materbi Granulate NF07U (Novamont, 2004), assumption landfill
  production volume
    (same comment as for hazardous waste, for incineration)
  properties: carbon content, fossil 0.171549, carbon content, non-fossil 0.261655, dry mass 0.771 kg, heating value, net 11.74 MJ, water content 0.297017, wet mass 1 kg
  note on carbon content, fossil: MSW composition in tab 4.1, ecoinvent v2.2 report 13_I. C content referred to 1 kg DM
- naphtha: 0.000423707, 0.00530676, 0.250171, 0.0405749, 0.00174861, 0.0110054 kg (6 suppliers, which the file names only by identifier); sum of these 0.30923 kg; lognormal variance with pedigree 0.1227, pedigree (2,2,5,5,4)
  Total oil consumption from EDP Materbi Granulate NF07U (Novamont, 2004). Assumption Carbotech AG share between fuel and material use (=plasticizer for Materbi)
  EcoSpold01Location=RER
  Uncertainty: Total oil consumption from EDP Materbi Granulate NF07U (Novamont, 2004). Assumption Carbotech AG share between fuel and material use (=plasticizer for Materbi)
  properties: carbon content, fossil 0.919743, dry mass 1 kg, heating value, net 45 MJ, wet mass 1 kg
  note on carbon content, fossil: C-content was calculated using data from Tab 3.20, ecoinvent v2.2 report 6_IV CO2 emmissions and High heating value.
- natural gas, high pressure: 0.00248417, 0.00419048, 0.00914073, 0.00305901, 0.00071488, 0.00425482, 0.00408282, 0.0107359, 0.00414476, 0.00641078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 m3 (37 suppliers, which the file names only by identifier); sum of these 0.321718 m3; lognormal variance with pedigree 0.1227, pedigree (2,2,5,5,4)
  EcoSpold01Location=IT
  Total gas consumption from EDP Materbi Granulate NF07U (Novamont, 2004). Assumption Carbotech AG material use mainly (=plasticizers for Mater-bi)
  Uncertainty: Total gas consumption from EDP Materbi Granulate NF07U (Novamont, 2004). Assumption Carbotech AG material use mainly (=plasticizers for Mater-bi)
  properties: carbon content, fossil 0.602381, dry mass 0.84 kg, heating value, gross 40 MJ, heating value, net 36 MJ, wet mass 0.84 kg
  note on carbon content, fossil: An average C content of 0.506 kg C/ m3 has been assumed (this average has been calculated using data in Tab 3.5, ecoinvent v2.2 report 6_V
  note on heating value, net: Literature value, Source: Christoph Meili;Niels Jungbluth;Maresa Bussa (2021) Life cycle inventories of crude oil and natural gas extraction. ESU-services Ltd. commissioned by BAFU & VSG, Schaffhausen, Switzerland, http://esu-services.ch/data/public-lci-reports/

## Emissions to nature
- NMVOC, non-methane volatile organic compounds [air, non-urban air or from high stacks]: 0.0007 kg; lognormal variance with pedigree 0.234, pedigree (5,4,5,5,4)
  Correction for lacking potential emissions photochemical oxidants compared to aggregated data in EDP Materbi Granulate NF07U (Novamont, 2004). Assumption Carbotech AG VOC emissions as typical in plastic industry
  Uncertainty: Correction for lacking potential emissions photochemical oxidants compared to aggregated data in EDP Materbi Granulate NF07U (Novamont, 2004). Assumption Carbotech AG VOC emissions as typical in plastic industry

## Sampling procedure
Data were compiled from environmental product declaration of producer Novamont in Italy

## Extrapolations
This dataset has been copied from an original dataset covering the geography RER. The uncertainty has been adjusted accordingly.

## Review by Hans-Jörg Althaus 2007-08-31
passed
none
