# cement production, Portland

Dataset: EcoSpold 2, unit process
Geography: TN
Time period: 2019-01-01 to 2023-12-31
Technology level: current
Classification: ISIC rev.4 ecoinvent: 2394:Manufacture of cement, lime and plaster
Synonyms: CEM I 42.5 N; Portland cement; CEM I
Scenario: Business-as-Usual
System model: Allocation, cut-off by classification
Share of production covered: 15 %
Generated by: [Deleted]Makrem Cherni
Published in: Cherni Makrem 2022
Database: ecoinvent
isCopyrightProtected: true
accessRestrictedTo: 1

## General comment
The information details the manufacturing of Portland cement using milled limestone and gypsum as fillers. Tunisia has five types of cement (CEM I) based on the supplementary cementitious materials (limestone). In terms of mass composition, CEM I has 5% to 10% limestone filler. Tunisian standards (NT 47.01 (2017)) specify the five cement types. Tunisian cement output is represented by five different kinds of cement. The table below summarizes the various cement kinds and compositions as defined by Tunisian specifications (NT 47.01).(2017). Clinker, gypsum, and limestone made CEM I cement (see composition in the table). This dataset covers data from the clinker stockpile to the cement suitable for bulk shipment. After cooling from the rotary kiln, the clinker is pulverized in ball mills to particles less than 75 mm in size. It is then transported to silos and combined with calcium sulfate (gypsum) and limestone. The combined cement is transported to a finishing mill and then kept in cement silos until it is delivered in bulk or packaged (kraft paper). Primary data was collected from one cement factory in Tunisia, who informed the total values of cement production inputs and outputs in 2019. Primary and secondary raw materials and fuels, auxiliary materials, energy, and water use were all recorded. It equates to a 15% market share. Particulate emissions may occur. However they are not recorded owing to a lack of data for the cement grinding phase (air emissions are monitored for the integrated clinker-cement plant as a whole and reported in the clinker production process).
NT47.01(2017): Ciment - Partie 1: Composition, spécifications et critères des conformité des ciments courants

## Included activities start
From the reception of raw materials at the cement factory.

## Included activities end
This activity ends with the Portland cement produced in the cement silos (after milling). The dataset does not include packaging and administration.

## Geography
The dataset represents the Portland cement production for Tunisia.

## Technology
In Tunisia, all cement production is through dry kiln process. The clinker (90-95%) is ground with gypsum (3-5%) and depending on the type of cement and technical standard (NT-47.01 2017 Eqv EN 197-1) with other materials such as limestone (5 to 10%) to produce the Portland cement.
The production values for Portland cement, which include the amounts of clinker, limestone, silica sand, and gypsum, are derived from the historical annual production statistics of a specific cement plant in 2019. Although these values are lower than the standard in Tunisia, similar values were observed in other cement plant. It is important to highlight that silica sand and limestone serves as a substitute for clinker in the production of this particular Portland cement.

## Time period
Time period corresponds to data collection period (2019).

## Reference product
- cement, Portland: 1 kg; name cement; By-product classification allocatable product; CPC 37440: Portland cement, aluminous cement, slag cement and similar hydraulic cements, except in the form of clinkers; HS2017 252329: Cement; portland, other than white, whether or not artificially coloured; CAS 65997-15-1
  Estimated from two cement plant, since there no public data on the production of each type of cements in Tunisia (due to confidentiality manner).
  production volume 3.91846e9 kg; name APV_Portlandcement; = 8096*10^6*48.40%
    Total production volume of hydraulic cement in Tunisia in 2019: 8'096'000 metric ton. Source: USGS (2019). U.S. Geological Survey, Minerals Yearbook Annual Tables, 2019. Available at: https://www.usgs.gov/centers/national-minerals-information-center/cement-statistics-and-information
    The share of Portland cement in the market is 48.40%. This share is based on the annual production from the cement manufacturer.
  property price 0.0541 EUR2005
    2005 import and export prices (total trades (USD) divided by total weight (kg) in China, India, USA, Japan, Russia and Europe, major producers and consumers (http://www.cementchina.net/freport/showfre.asp?id=749) from UN Commodity Trade Statistics Database (http://data.un.org/Explorer.aspxDatabase [Accessed 2 July 2010]). Commodity: Portland cement, other than white cement
  properties: carbon allocation 0 kg, carbon content 0, carbon content, fossil 0, carbon content, non-fossil 0, dry mass 1 kg, water content 0, water in wet mass 0 kg, wet mass 1 kg

## Inputs from technosphere
- cement factory: 5.36e-11 unit; source Kellenberger D. 2007; lognormal variance with pedigree 0.3126, pedigree (4,3,3,5,1)
  Literature Value. Extrapolated from the "cement production, Portland, GLO 2022" dataset, accessed 15.09.2022.
  Uncertainty: Variance of log-transformed data was taken from ecoinvent report no 1, table 10.3. Value represents demand of infrastructure for input/output group c.
- clinker: 0.88863 kg; lognormal variance with pedigree 0.1726, pedigree (5,5,3,5,5)
  Values were calculated based on primary data collection in Tunisia. Based on annual average.
  properties: dry mass 1 kg, wet mass 1 kg
- electricity, medium voltage: 0.0425 kWh; lognormal variance with pedigree 0.0113, pedigree (3,3,4,3,1)
  Measured value. Annual average of values informed by manufacturer. Electricity used to operate the crusher, mill, the rotary kiln and the clinker cooler. Electricity used to crush and grind additives (limestone and gypsum) and also to grind cement (clinker with additives).
  Uncertainty: Variance of log-transformed data was taken from ecoinvent report no 1, table 10.3. Value represents demand of products, electricity etc. for input/output group c.
- gypsum, mineral: 0.02839 kg; lognormal variance with pedigree 0.0113, pedigree (3,3,4,3,1)
  Measured value. Annual average of values informed by manufacturer. Gyspum used for regulating the setting time of cement.
  Uncertainty: Variance of log-transformed data was taken from ecoinvent report no 1, table 10.3. Value represents demand of products, electricity etc. for input/output group c.
  properties: dry mass 1 kg, wet mass 1 kg
- limestone, crushed, for mill: 0.0683 kg; lognormal variance with pedigree 0.0046, pedigree (1,4,3,1,1)
  Measured value. Weighted average of value informed by manufacturer. additive for cement production.
  properties: dry mass 0.998 kg, water content 0.00200401, wet mass 1 kg
- lubricating oil: 3.08e-6 kg; name lubricating_oil_input; lognormal variance with pedigree 0.2106, pedigree (5,5,5,5,5)
  Values were calculated based on primary data collection in Tunisia from the manufacturer. Lubricating oil used to lubricate heavy machinery (ball mills).
  properties: carbon content, fossil 0.75, dry mass 1 kg, heating value, net 40.2 MJ, wet mass 1 kg
  note on carbon content, fossil: Lubricating oil is produced from diesel. C-content/dry mass of fats and oils considered 75%, from: ecoinvent v2.2 report, n 15a, pg 40
  note on heating value, net: Literature value, Source: IPCC 2006, 2006 IPCC Guidelines for National Greenhouse Gas Inventories, Prepared by the National Greenhouse Gas Inventories Programme, Eggleston H.S., Buendia L., Miwa K., Ngara T. and Tanabe K. (eds). Published: IGES, Japan
- sand: 0.01468 kg; lognormal variance with pedigree 0.0046, pedigree (1,4,3,1,1)
  Measured value. Weighted average of value informed by manufacturer. Sand used as suplementary cementous materials for cement production.
  properties: dry mass 1 kg, wet mass 1 kg
- scrap steel: -6.79e-5 kg; name waste_steel; = steel_input; lognormal variance with pedigree 0.2106, pedigree (5,5,5,5,5)
  Data collected from manufacturer. The steel used in the replacement of steel balls from cement mill.
  production volume; = APV_Portlandcement * waste_steel / cement
    Calculated from production volume of reference product using the relative outputs.
  properties: carbon content, fossil 0.005, dry mass 1 kg, wet mass 1 kg
- steel, low-alloyed: 6.79e-5 kg; name steel_input; lognormal variance with pedigree 0.0046, pedigree (1,4,3,1,1)
  Values were calculated based on primary data collection in Tunisia.
  this refer to steel balls replaced from cement mill.
  property carbon content, fossil 0; name C_content_fossil
  property carbon content, non-fossil 0; name C_content_non_fossil
  property dry mass 1 kg; name DM
  property water content 0; name water_content
  property water in wet mass 0 kg; name WWM
  property wet mass 1 kg; name WM
- waste mineral oil: -3.08e-6 kg; name waste_oil; = lubricating_oil_input; lognormal variance with pedigree 0.2106, pedigree (5,5,5,5,5)
  Data collected from manufacturer. The lubricating oil must be disposed of after use (the lubricating oil is used to lube the machinery and does not become part of the product). Therefore, same amount as lubricating oil input is used to model the waste.
  production volume; = APV_Portlandcement * waste_oil / cement
    Calculated from production volume of reference product using the relative outputs.
  properties: carbon content, fossil 0.75, dry mass 0.9 kg, heating value, net 34.7 MJ, water content 0.111111, wet mass 1 kg
  note on heating value, net: Value taken from the general comment of the treatment dataset.

## Emissions to nature
- Water [air, unspecified]: 1.366e-7 m3; lognormal variance with pedigree 0.0052, pedigree (2,4,3,1,1)
  Water vapour from the drying of the limestone.
  Uncertainty: B

## Sampling procedure
Data represent 15% of Tunisia's 2019 cement production. Using confidential surveys, one cement manufacturer gave information on the production of cement in 2019. The manufacturer's estimated cement composition is represented by the weighted average of raw material flows. Since manufacturers did not provide the production amounts of each kind of cement owing to privacy issues, the weighting factor utilized is the overall volume of cement produced. The yearly average of the manufacturer unit flows was calculated for additional input flows, such as grinding aids, equipment maintenance supplies, fuels and power. With the exception of the grinding aids, all other flows' consumption is given for the whole cement plant, which often makes several types of cement. Manufacturer information on fuel usage was provided in terms of mass or volume. To make the dataset simpler and to take into account the accompanying air emissions, they were transformed into energy using their lower heating values and modeled as a heat input. The "cement Portland/GLO" information was used to estimate the infrastructure input flow (cement plant) (accessed 15.09.2022). The weighted average of the sample was taken into consideration while calculating the exchange amounts. In order to maintain consistency with other EcoInvent datasets, no conversion to the geometric mean of the lognormal distribution was performed.

## Extrapolations
Data represent 15% of Tunisian cement production. This sample is extrapolated to reflect total output in the country. The primary values are regarded appropriate for a typical production of Portland cement (CEM I) in Tunisia. The infrastructure was extrapolated from the "cement production, Portland, GLO 2022" dataset, accessed 15.09.2022.

## Review by Bruno Peuportier 2023-05-02
All explanations and corrections have been completed
