# tubular particleboard production

Dataset: EcoSpold 2, unit process
Geography: RoW
Time period: 2012-01-01 to 2023-12-31
Technology level: current
Classification: ISIC rev.4 ecoinvent: 1621:Manufacture of veneer sheets and wood-based panels
Synonyms: Röhrenspanplatte
Tags: Swiss brush-up completed
Scenario: Business-as-Usual
System model: Allocation, cut-off by classification
Generated by: Frank Werner
Database: ecoinvent
isCopyrightProtected: true
accessRestrictedTo: 1

## General comment
This dataset represents the global production of tubular particleboard. It was created as a copy of the corresponding loca dataset for Europe. Data are based on a German production sample.
Particleboard - also known as particle board, and chipboard - is an engineered wood product manufactured from wood chips, sawmill shavings, or even sawdust, and a synthetic resin or other suitable binder, which is pressed and extruded.
Like a bridge construction, tubular particleboard provides an ideal combination of light weight and stability. Compared to solid boards, the weight of tubular particleboard is reduced by up to 60%. Tubular particleboards are used for door cores, isolation boards, furniture, packing, and decoration.
Reference:
Rüter, S. and S. Diederichs (2012): Ökobilanz-Basisdaten für Bauprodukte aus Holz. Arbeitsbericht aus dem Institut für Holztechnologie und Holzbiologie Nr. 2012/1, Johann Heinrich von Thünen-Institut (vTI), Hamburg.
[This dataset is meant to replace the following datasets:]

## Included activities start
From the reception at the factory gate of all materials and fuels used.

## Included activities end
This activity ends with the tubular particleboard produced at the factory gate. The dataset includes the inputs to and outputs of the production processes and the available process emissions. Infrastructure is a rough estimate.

## Geography
Data for Germany used for central Europe

## Technology
Technology reflects a sample of German tubular particleboard production.

## Parameters
- wood_fuel: 891.1; lognormal variance with pedigree 0.0256, pedigree (1,3,1,1,1)
  input of wood fuel used in production; value calculated from Rüter et al. 2012

## Reference product
- tubular particleboard: 1 m3; By-product classification allocatable product; CPC 31439: Other board of wood or other ligneous materials; HS2017 441011: Particle board of wood, whether or not agglomerated with resins or other organic binding substances
  Reference product. Plywood produced in Germany by processes representative for global average. The reference product is ready for delivery at the wooden board factory.
  A large number of materials can be produced with differing properties and areas of use. Typical uses are as construction plywood for wall, floor, and ceiling panels and also as panels for concrete shuttering, and decorative covering veneers in interior furnishings (e.g. wall panels or doors).
  production volume 2.99918e6 m3; name tubular_particleboard_pv; = 96983601*0.05
    assumed to be 5% of global particleboard production in 2018 (96983601m3) according to FAOSTAT (product category particle board; production quantitity; 2018) http://www.fao.org/faostat/en/#data/FO
  property heating value, net 3808.36 MJ
    LHV is calculated based on the Carbon content of the product. More details can be found on the respective documentation.The property is based on a value of 14MJ/kg
  property price 162.75 EUR2005
    Expert judgement; 75% of price of regular particleboard due to reduced material input.
  properties: carbon allocation 127.01 kg, carbon content 0.496754, carbon content, fossil 0.06786, carbon content, non-fossil 0.428894, dry mass 255.68 kg, water content 0.0638298, water in wet mass 16.32 kg, wet mass 272 kg

## Inputs from technosphere
- diesel, burned in building machine: 12.84 MJ; lognormal variance with pedigree 0.0446, pedigree (1,4,5,5,1)
  Literature value; sample from Germany
  properties: heating value, net 1 MJ
- dust collector, electrostatic precipitator, for industrial use: 9.28239e-7 unit; = 1.3889E-09*wood_fuel/1.33333; lognormal variance with pedigree 0.31, pedigree (1,1,4,5,1)
  Literature value; sample from Germany
- electricity, medium voltage: 1.19007, 23.7392, 7.97629, 0.364439, 0.0729421, 0.0156623, 2.45144 kWh (7 suppliers, which the file names only by identifier); sum of these 35.81 kWh; lognormal variance with pedigree 0.0446, pedigree (1,4,5,5,1)
  Literature value; sample from Germany
- furnace, wood chips, with silo, 5000kW: 9.28231e-7 unit; = 1.38888888888889E-09*wood_fuel/1.33333; lognormal variance with pedigree 0.0106, pedigree (1,1,4,5,1)
  Infrastructure factor from DS "Heat, district or industrial, other than natural gas {CH}| heat production, wood chips from industry, at furnace 5000kW | Cut-off, U", multiplied by the input of wood fuel (direct wood fuel plus production residues); correction for assumed efficiency as original value refers to heat output
- heat, district or industrial, natural gas: 0.0598175, 3.64018 MJ (2 suppliers, which the file names only by identifier); sum of these 3.7 MJ; lognormal variance with pedigree 0.0112, pedigree (1,3,4,5,1)
  Fuel input, converted to heat output
  properties: heating value, net 1 MJ
- heat, district or industrial, other than natural gas: 406.537, 52.8552 MJ (2 suppliers, which the file names only by identifier); sum of these 459.392 MJ; lognormal variance with pedigree 0.0112, pedigree (1,3,4,5,1)
  Fuel input, converted to heat output
  properties: heating value, net 1 MJ
- lubricating oil: 0.015 kg; name m_lubricating_oil; lognormal variance with pedigree 0.0206, pedigree (4,4,4,5,1)
  Literature value; sample from Germany
  property dry mass 1 kg; name DM_oil
  properties: carbon content, fossil 0.75, heating value, net 40.2 MJ, wet mass 1 kg
  note on carbon content, fossil: Lubricating oil is produced from diesel. C-content/dry mass of fats and oils considered 75%, from: ecoinvent v2.2 report, n 15a, pg 40
  note on heating value, net: Literature value, Source: IPCC 2006, 2006 IPCC Guidelines for National Greenhouse Gas Inventories, Prepared by the National Greenhouse Gas Inventories Programme, Eggleston H.S., Buendia L., Miwa K., Ngara T. and Tanabe K. (eds). Published: IGES, Japan
- municipal solid waste: -0.000606607, -7.2032e-5, -0.000448309, -0.342248, -5.04052e-5, -1.61792e-5, -3.65693e-5, -0.00152239 kg (8 suppliers, which the file names only by identifier); sum of these -0.345 kg; lognormal variance with pedigree 0.1238, pedigree (2,3,1,5,5)
  Literature value; sample from Germany
  Uncertainty: a
  production volume; = w_MSW*tubular_particleboard_pv
    Calculated from production volume of reference product using the relative outputs.
  properties: carbon content, fossil 0.171549, carbon content, non-fossil 0.261655, dry mass 0.771 kg, heating value, net 11.74 MJ, water content 0.297017, wet mass 1 kg
  note on carbon content, fossil: MSW composition in tab 4.1, ecoinvent v2.2 report 13_I. C content referred to 1 kg DM
  note on heating value, net: Value taken from the general comment of the treatment dataset.
- paraffin: 0.339 kg; lognormal variance with pedigree 0.0112, pedigree (1,3,4,5,1)
  hydrophobing agent
  properties: carbon content, fossil 0.847059, dry mass 1 kg, heating value, net 41.5 MJ, wet mass 1 kg
  note on heating value, net: Indicative value. Reference: Fuels - Higher and Lower Calorific Values, available at: https://www.engineeringtoolbox.com/fuels-higher-calorific-values-d_169.html
- pulpwood, softwood, measured as solid wood under bark: 0.0239634 m3; lognormal variance with pedigree 0.0112, pedigree (1,3,4,5,1)
  Literature value; sample from Germany
  properties: basic wood density 387.2, carbon content, non-fossil 0.494, dry mass 440 kg, heating value, net 4483.78 MJ, water content 0.7, wet mass 748 kg
  note on heating value, net: Value based on "softwood forestry, mixed species, sustainable forest management"The property is based on a value of 11.58MJ/kg
- scrap steel: -0.27 kg; name m_scrap_steel; = m_steel_lowalloyed; lognormal variance with pedigree 0.0066, pedigree (3,4,1,5,1)
  calculated from steel input
  production volume; = m_scrap_steel*tubular_particleboard_pv
    Calculated from production volume of reference product using the relative outputs.
  property dry mass 1 kg; name w_chromium_steel_DM
  properties: wet mass 1 kg
- steel, low-alloyed, hot rolled: 0.27 kg; name m_steel_lowalloyed; lognormal variance with pedigree 0.0286, pedigree (3,5,4,5,3)
  Literature value; sample from Germany
  properties: carbon content, fossil 0.005, dry mass 1 kg, wet mass 1 kg
  note on carbon content, fossil: Low alloyed steel composition given in Tab. 3.2 ecoinvent v2.2 report 10_partII. Steel assumed to have a C content of 0.5%
- tap water: 0.0748112, 0.114043, 0.212799, 0.573265, 0.0690058, 2.87572, 32.9084 kg (7 suppliers, which the file names only by identifier); sum of these 36.828 kg; lognormal variance with pedigree 0.0118, pedigree (2,3,4,5,1)
  Literature value; sample from Germany
  properties: carbon content, fossil 0.00178991, dry mass 0.000337476 kg, water content 2962.17, wet mass 1 kg
  note on carbon content, fossil: Bicarbonate content is 2.93 mol/m3. CO2 content is 0.1 mol/m3 (ecoinvent v2.2 report 8, Tab 93.1).
- urea formaldehyde resin: 20.1429 kg; lognormal variance with pedigree 0.0446, pedigree (1,4,5,5,1)
  Literature value; sample from Germany
  properties: carbon content, fossil 0.408958, dry mass 1 kg, heating value, net 12.39 MJ, wet mass 1 kg
  note on carbon content, fossil: Chemical formula of the urea formaldehide monomer was assumed to be C3H8N2O
- waste mineral oil: -0.015 kg; name w_mineral_oil; = m_lubricating_oil/DM_oil; lognormal variance with pedigree 0.0038, pedigree (2,3,1,5,1)
  hydraulic oil and engine oil/grease; adjusted for water content of waste oil
  production volume; = w_mineral_oil*tubular_particleboard_pv
    Calculated from production volume of reference product using the relative outputs.
  properties: carbon content, fossil 0.864444, dry mass 0.9 kg, heating value, net 34.7 MJ, water content 0.111111, wet mass 1 kg
  note on carbon content, fossil: Tab A.6, ecoinvent v2.2 report 13_I. C content has been calculated after data in the tables, and then referred to 1 kg DM
- wastewater from particle board production: -0.018414 m3; name wastewater; lognormal variance with pedigree 0.0048, pedigree (1,4,2,5,1)
  Literature value; sample from Germany; assumption 50% tap water as wastewater
  production volume; = wastewater*tubular_particleboard_pv
    Calculated from production volume of reference product using the relative outputs.
  properties: carbon content, non-fossil 4.4393e-12, dry mass 0.00279718 kg, mass concentration, TOC 0.0015871 kg/m3, mass concentration, hydrogen 0.0010157 kg/m3, mass concentration, oxygen 0.00019441 kg/m3, water content 357502, wet mass 1000 kg
- wood ash mixture, pure: -0.445551 kg; name w_wood_ash; = 0.000666666666666667*wood_fuel/1.33333; lognormal variance with pedigree 0.0032, pedigree (1,3,1,5,1)
  Amount derived from DS "Heat, district or industrial, other than natural gas {CH}| heat production, wood chips from industry, at furnace 5000kW | Cut-off, U" on heat generation from industrial residual wood per MJ, multiplied by the input of wood fuel (direct wood fuel plus production residues ) scaled to reflect wood input per generated heat
  production volume; = w_wood_ash*tubular_particleboard_pv
    Calculated from production volume of reference product using the relative outputs.
  properties: carbon content, non-fossil 0.012, dry mass 1 kg, wet mass 1 kg
- wood chips, wet, measured as dry mass: 0.614896, 271.385 kg (2 suppliers, which the file names only by identifier); sum of these 272 kg; lognormal variance with pedigree 0.0112, pedigree (1,3,4,5,1)
  Literature value; sample from Germany
  properties: carbon content, non-fossil 0.494, dry mass 1 kg, heating value, net 10.84 MJ, water content 1.1, wet mass 2.1 kg
  note on heating value, net: Value based on the dataset 'softwood forestry, mixed species, sustainable forest management'
- wooden board factory, organic bonded boards: 2.62238e-8 unit; lognormal variance with pedigree 0.398, pedigree (4,5,5,5,4)
  Default value from ecoinvent 2.2

## Emissions to nature
- Acetaldehyde [air, unspecified]: 5.43572e-5 kg; = 8.13333333333333E-08*wood_fuel/1.33333; lognormal variance with pedigree 0.0832, pedigree (2,3,5,5,1)
  Emission factor from DS "Heat, district or industrial, other than natural gas {CH}| heat production, wood chips from industry, at furnace 5000kW | Cut-off, U" on heat generation from industrial residual wood per MJ, multiplied by the input of wood fuel (direct wood fuel plus production residues ) scaled to reflect wood input per generated heat.
- Ammonia [air, unspecified]: 0.00154161 kg; = 2.30666666666667E-06*wood_fuel/1.33333; lognormal variance with pedigree 0.0832, pedigree (2,3,5,5,1)
  (same comment as for Acetaldehyde)
- Arsenic ion [air, unspecified]: 8.91102e-7 kg; = 1.33333333333333E-09*wood_fuel/1.33333; lognormal variance with pedigree 0.6932, pedigree (2,3,5,5,1)
  (same comment as for Acetaldehyde)
- Benzene [air, unspecified]: 0.000810903 kg; = 1.21333333333333E-06*wood_fuel/1.33333; lognormal variance with pedigree 0.0832, pedigree (2,3,5,5,1)
  (same comment as for Acetaldehyde)
- Benzo(a)pyrene [air, unspecified]: 4.45551e-7 kg; = 6.66666666666667E-10*wood_fuel/1.33333; lognormal variance with pedigree 0.3432, pedigree (2,3,5,5,1)
  (same comment as for Acetaldehyde)
- Bromine [air, unspecified]: 5.34661e-5 kg; = 0.00000008*wood_fuel/1.33333; lognormal variance with pedigree 0.6932, pedigree (2,3,5,5,1)
  (same comment as for Acetaldehyde)
- Cadmium II [air, unspecified]: 6.23772e-7 kg; = 9.33333333333334E-10*wood_fuel/1.33333; lognormal variance with pedigree 0.6932, pedigree (2,3,5,5,1)
  (same comment as for Acetaldehyde)
- Calcium II [air, unspecified]: 0.00521295 kg; = 0.0000078*wood_fuel/1.33333; lognormal variance with pedigree 0.6932, pedigree (2,3,5,5,1)
  (same comment as for Acetaldehyde)
- Carbon dioxide, non-fossil [air, unspecified]: 95.3479 kg; = 0.142666666666666*wood_fuel/1.33333; lognormal variance with pedigree 0.0438, pedigree (2,3,5,5,1)
  (same comment as for Acetaldehyde)
- Carbon monoxide, non-fossil [air, unspecified]: 0.17822 kg; = 0.000266666666666667*wood_fuel/1.33333; lognormal variance with pedigree 0.6932, pedigree (2,3,5,5,1)
  (same comment as for Acetaldehyde)
- Chlorine [air, unspecified]: 0.000160398 kg; = 0.00000024*wood_fuel/1.33333; lognormal variance with pedigree 0.6932, pedigree (2,3,5,5,1)
  (same comment as for Acetaldehyde)
- Chromium III [air, unspecified]: 3.52876e-6 kg; = 5.28000000000001E-09*wood_fuel/1.33333; lognormal variance with pedigree 0.6932, pedigree (2,3,5,5,1)
  (same comment as for Acetaldehyde)
- Chromium VI [air, unspecified]: 3.56441e-8 kg; = 5.33333333333334E-11*wood_fuel/1.33333; lognormal variance with pedigree 0.6932, pedigree (2,3,5,5,1)
  (same comment as for Acetaldehyde)
- Copper ion [air, unspecified]: 1.96042e-5 kg; = 2.93333333333334E-08*wood_fuel/1.33333; lognormal variance with pedigree 0.6932, pedigree (2,3,5,5,1)
  (same comment as for Acetaldehyde)
- Dinitrogen monoxide [air, unspecified]: 0.00204954 kg; = 3.06666666666667E-06*wood_fuel/1.33333; lognormal variance with pedigree 0.0832, pedigree (2,3,5,5,1)
  (same comment as for Acetaldehyde)
- Dioxins, measured as 2,3,7,8-tetrachlorodibenzo-p-dioxin [air, unspecified]: 2.76242e-11 kg; = 4.13333333333333E-14*wood_fuel/1.33333; lognormal variance with pedigree 0.3432, pedigree (2,3,5,5,1)
  (same comment as for Acetaldehyde)
- Ethyl benzene [air, unspecified]: 2.67331e-5 kg; = 0.00000004*wood_fuel/1.33333; lognormal variance with pedigree 0.0832, pedigree (2,3,5,5,1)
  (same comment as for Acetaldehyde)
- Fluorine [air, unspecified]: 4.45551e-5 kg; = 6.66666666666667E-08*wood_fuel/1.33333; lognormal variance with pedigree 0.0832, pedigree (2,3,5,5,1)
  (same comment as for Acetaldehyde)
- Formaldehyde [air, unspecified]: 0.0303302 kg; = 1.73333333333334E-07*wood_fuel/1.33333+0.0302144; lognormal variance with pedigree 0.1632, pedigree (2,3,5,5,1)
  Emission factor from DS "Heat, district or industrial, other than natural gas {CH}| heat production, wood chips from industry, at furnace 5000kW | Cut-off, U" on heat generation from industrial residual wood per MJ, multiplied by the input of wood fuel (direct wood fuel plus production residues ) scaled to reflect wood input per generated heat plus estimated emissions from wood and glue drying processes (according to Rüter & Diederichs 2012).
- Hexachlorobenzene [air, unspecified]: 6.41594e-12 kg; = 9.60000000000001E-15*wood_fuel/1.33333; lognormal variance with pedigree 0.0832, pedigree (2,3,5,5,1)
  (same comment as for Acetaldehyde)
- Hydrocarbons, aliphatic, alkanes, unspecified [air, unspecified]: 0.000810903 kg; = 1.21333333333333E-06*wood_fuel/1.33333; lognormal variance with pedigree 0.0832, pedigree (2,3,5,5,1)
  (same comment as for Acetaldehyde)
- Hydrocarbons, aliphatic, unsaturated [air, unspecified]: 0.00276242 kg; = 4.13333333333333E-06*wood_fuel/1.33333; lognormal variance with pedigree 0.0832, pedigree (2,3,5,5,1)
  (same comment as for Acetaldehyde)
- Lead II [air, unspecified]: 2.22776e-5 kg; = 3.33333333333333E-08*wood_fuel/1.33333; lognormal variance with pedigree 0.6932, pedigree (2,3,5,5,1)
  (same comment as for Acetaldehyde)
- Magnesium [air, unspecified]: 0.000320797 kg; name magnesium; = 0.00000048*wood_fuel/1.33333; lognormal variance with pedigree 0.6932, pedigree (2,3,5,5,1)
  (same comment as for Acetaldehyde)
- Manganese II [air, unspecified]: 0.000151487 kg; name manganese; = 2.26666666666667E-07*wood_fuel/1.33333; lognormal variance with pedigree 0.6932, pedigree (2,3,5,5,1)
  (same comment as for Acetaldehyde)
- Mercury II [air, unspecified]: 2.67331e-7 kg; name mercury; = 0.0000000004*wood_fuel/1.33333; lognormal variance with pedigree 0.6932, pedigree (2,3,5,5,1)
  (same comment as for Acetaldehyde)
- Methane, non-fossil [air, unspecified]: 0.00133665 kg; = 0.000002*wood_fuel/1.33333; lognormal variance with pedigree 0.0832, pedigree (2,3,5,5,1)
  (same comment as for Acetaldehyde)
- NMVOC, non-methane volatile organic compounds [air, unspecified]: 0.00311886 kg; name nmvoc; = 4.66666666666666E-06*wood_fuel/1.33333; lognormal variance with pedigree 0.0832, pedigree (2,3,5,5,1)
  (same comment as for Acetaldehyde)
- Nickel II [air, unspecified]: 5.34661e-6 kg; name nickel; = 0.000000008*wood_fuel/1.33333; lognormal variance with pedigree 0.6932, pedigree (2,3,5,5,1)
  (same comment as for Acetaldehyde)
- Nitrogen oxides [air, unspecified]: 0.200498 kg; = 0.0003*wood_fuel/1.33333; lognormal variance with pedigree 0.0832, pedigree (2,3,5,5,1)
  (same comment as for Acetaldehyde)
- PAH, polycyclic aromatic hydrocarbons [air, unspecified]: 9.89123e-6 kg; name pah; = 0.0000000148*wood_fuel/1.33333; lognormal variance with pedigree 0.3432, pedigree (2,3,5,5,1)
  (same comment as for Acetaldehyde)
- Particulate Matter, < 2.5 um [air, unspecified]: 0.0222776 kg; = 0.0000333333333333333*wood_fuel/1.33333; lognormal variance with pedigree 0.3432, pedigree (2,3,5,5,1)
  (same comment as for Acetaldehyde)
- Pentachlorophenol [air, unspecified]: 7.21793e-9 kg; = 0.0000000000108*wood_fuel/1.33333; lognormal variance with pedigree 0.0832, pedigree (2,3,5,5,1)
  (same comment as for Acetaldehyde)
- Phosphorus [air, unspecified]: 0.000267331 kg; = 0.0000004*wood_fuel/1.33333; lognormal variance with pedigree 0.0832, pedigree (2,3,5,5,1)
  (same comment as for Acetaldehyde)
- Potassium I [air, unspecified]: 0.0208518 kg; = 0.0000312*wood_fuel/1.33333; lognormal variance with pedigree 0.0832, pedigree (2,3,5,5,1)
  (same comment as for Acetaldehyde)
- Sodium I [air, unspecified]: 0.00115843 kg; = 1.73333333333334E-06*wood_fuel/1.33333; lognormal variance with pedigree 0.6932, pedigree (2,3,5,5,1)
  (same comment as for Acetaldehyde)
- Sulfur dioxide [air, unspecified]: 0.00222776 kg; = 3.33333333333334E-06*wood_fuel/1.33333; lognormal variance with pedigree 0.0438, pedigree (2,3,5,5,1)
  (same comment as for Acetaldehyde)
- Toluene [air, unspecified]: 0.000267331 kg; = 0.0000004*wood_fuel/1.33333; lognormal variance with pedigree 0.0832, pedigree (2,3,5,5,1)
  (same comment as for Acetaldehyde)
- Water [air, unspecified]: 0.0585136 m3; = 0.00006*wood_fuel/1.33333+m_tapwater/2/1000; lognormal variance with pedigree 0.132, pedigree (4,4,5,5,4)
  Water emissions from the combustion of the wood (emission per MJ, scaled to wood input and extrapolated from wood input to heat generated) plus 50% of tap water input
- Zinc II [air, unspecified]: 0.000267331 kg; = 0.0000004*wood_fuel/1.33333; lognormal variance with pedigree 0.6932, pedigree (2,3,5,5,1)
  (same comment as for Acetaldehyde)
- m-Xylene [air, unspecified]: 0.000106932 kg; name mxylene; = 0.00000016*wood_fuel/1.33333; lognormal variance with pedigree 0.0832, pedigree (2,3,5,5,1)
  (same comment as for Acetaldehyde)

## Sampling procedure
Literature; emissions profile per MJ wood input from PSI (2014)

## Extrapolations
See Geography and Technology
