# zinc oxide production

Dataset: EcoSpold 2, unit process
Geography: RoW
Time period: 2005-01-01 to 2023-12-31
Technology level: current
Classification: ISIC rev.4 ecoinvent: 2011:Manufacture of basic chemicals
Synonyms: Chinese White; zinc white; Snow white; Permanent White; Amalox; Oxozinc; ZINC OXIDE
Scenario: Business-as-Usual
System model: Allocation, cut-off by classification
Generated by: Roland Hischier
Published in: Hischier R. 2007
Database: ecoinvent
isCopyrightProtected: true
accessRestrictedTo: 1

## General comment
This dataset represents the production of 1 kg of solid zinc oxide powder. Zinc oxide, formerly also called zinc white, is a fine white powder that turns yellow when heated above 300 °C. Zinc oxide is mainly produced from residues and secondary zinc. It is used mainly in the rubber industry as a vulcanization activator or sometimes as a filler. Tires contain up to 5% zinc. Another application for zinc oxide is the use as an additive in fertilizers or in animal feed, as a dietary supplement to overcome potential zinc deficiencies. Zinc oxide is also used in the cosmetic industry for lipsticks, powders and sunscreens. Other applications of zinc oxide, such as fillers in lubricants, are of minor importance.
Three different processes are used to produce zinc oxide: about 1 – 2 % of zinc oxide is produced by the wet process, 10 – 20 % by the direct process, and the remainder by the indirect (or French) process. This dataset represents the production of zinc oxide out of secondary zinc materials by means of the indirect (or French) way. The inventory is estimated based on literature and expert judgement and represents therefore a rough estimation of the process requirements and should therefore be used only for processes where the impact of zinc oxide is not considered to be high.
References:
Hischier R., Classen M., Lehmann M. and Scharnhorst W. (2007) Life cycle inventories of Electric and Electronic Equipment: Production, Use and Disposal. ecoinvent report No. 18. Empa / Technology & Society Lab, Swiss Centre for Life Cycle Inventories, Dübendorf, 2007.
Auer, G., Woditsch, P., Westerhaus, A., Kischkewitz, J., Griebler, W.-D. and De Liedekerke, M. 2009. Pigments, Inorganic, 2. White Pigments. Ullmann's Encyclopedia of Industrial Chemistry.
Schwab, B., Ruh, A., Manthey, J. and Drosik, M. 2015. Zinc. Ullmann's Encyclopedia of Industrial Chemistry. 1–25.
Gendorf (2016) Umwelterklärung 2015, Werk Gendorf Industriepark, www.gendorf.de.

## Included activities start
From reception of raw materials at the factory gate.

## Included activities end
This activity ends with the production of zinc oxide. This dataset includes the input of zinc scrap (for which iron scrap is used as proxy). The consumption of air is not included. The dataset also includes the estimated energy demand and infrastructure of the plant. Solid wastes and water consumption are omitted.

## Geography
Data used has no specific geographical origin (stoichiometry). The electricity consumption is based on data from a large chemical factory located in Germany. It is assumed to be valid for this geography.

## Technology
Zinc oxide is mainly produced from residues and secondary zinc by means of the indirect (or French) way. The demand for chemical purity imposed by the users means that a number of purification techniques are required. About 1 – 2 % of zinc oxide is produced by the wet process, 10 – 20 % by the direct process, and the remainder by the indirect process.
References:
Hischier R., Classen M., Lehmann M. and Scharnhorst W. (2007) Life cycle inventories of Electric and Electronic Equipment: Production, Use and Disposal. ecoinvent report No. 18. Empa / Technology & Society Lab, Swiss Centre for Life Cycle Inventories, Dübendorf, 2007.
Auer, G., Woditsch, P., Westerhaus, A., Kischkewitz, J., Griebler, W.-D. and De Liedekerke, M. 2009. Pigments, Inorganic, 2. White Pigments. Ullmann's Encyclopedia of Industrial Chemistry.
Schwab, B., Ruh, A., Manthey, J. and Drosik, M. 2015. Zinc. Ullmann's Encyclopedia of Industrial Chemistry. 1–25.

## Time period
Date of published literature. The electricity consumption is based on data published by the Gendorf factory that were collected between 2011 and 2015. The time period has been adjusted accordingly.

## Reference product
- zinc oxide: 1 kg; name RP; By-product classification allocatable product; CPC 34220: Zinc oxide; zinc peroxide; chromium oxides and hydroxides; manganese oxides; iron oxides and hydroxides; earth[…]; HS2017 260800: Zinc ores and concentrates; CAS 1314-13-2
  Zinc oxide formerly also called zinc white, is a fine white powder that turns yellow when heated above 300 °C.
  Historically seen, Zinc oxide was a byproduct of copper smelting. Already the Romans knew this substance that they called 'cadmia'. In the 18th century, the process to produce ZnO by the combustion of metallic zinc has been discovered, and in 1840 industrial production was started by Leclaire (indirect or French process). The use of this white pigment spread rapidly. Zinc oxide replaced white lead because it had the advantage of being nontoxic, of not darkening in the presence of sulfurous gases, and of having better hiding power. In parallel the process in a roasting furnace was developed in which a grate is charged with coal and then covered with a mixture of zinc ore and coal. Here zinc is reduced by the partial combustion of the coal and reoxidized at the furnace exit (direct or American process). However, this second process is today no longer used. A third industrial production process exists but this wet process is less widely used.
  production volume 2.2354e8 kg; name RP_PV; = 10E8*0.3
    Calculated based on literature value and estimate.
    10E+5 ton/year of zinc oxide is produced globally (Klingshirn, 2007). Three basic technologies of zinc production exists. It is assumed, that the total production volume is distributed between these three technologies evenly.
  property price 2 EUR2005
    Estimated based on expert judgement and knowledge of the market for chemicals.
  properties: carbon allocation 0 kg, carbon content 0, carbon content, fossil 0, carbon content, non-fossil 0, dry mass 1 kg, water content 0, water in wet mass 0 kg, wet mass 1 kg

## Inputs from technosphere
- chemical factory, organics: 4e-10 unit; lognormal variance with pedigree 0.3448, pedigree (2,4,2,5,4)
  Calculated based on literature data published by the industry. For this activity, no information was readily available concerning infrastructure and land-use. Therefore, the infrastructure is estimated based on data from two chemical factories, the BASF site of Ludwigshafen and the chemical factory in Gendorf (which are both located in Germany), which produce a wide range of chemical substances. Based on this data, the following assumptions are made: the built area amounts to about 4.2 ha, the plant has an average output of 50'000 t/a and a lifespan of fifty years. The estimated infrastructure amount is therefore 4.00 E-10 units per kg of produced chemical.
  References:
  Althaus H.-J., Chudacoff M., Hischier R., Jungbluth N., Osses M. and Primas A. (2007) Life Cycle Inventories of Chemicals. ecoinvent report No. 8, v2.0. EMPA Dübendorf, Swiss Centre for Life Cycle Inventories, Dübendorf, CH.
  Gendorf (2000) Umwelterklärung 2000, Werk Gendorf. Werk Gendorf, Burgkirchen.
- electricity, medium voltage: 0.013262, 0.264547, 0.088887, 0.00406128, 0.00081286, 0.000174539, 0.0273186 kWh (7 suppliers, which the file names only by identifier); sum of these 0.399063 kWh; source Gendorf 2000; lognormal variance with pedigree 0.0454, pedigree (2,4,2,5,4)
  Calculated based on literature data published by the GENDORF Chemical Park. The factory produced an average of 2462760 tonnes of chemical substances (including intermediates) per year in the years 2015-2019. The average consumption of electricity in the years 2015-2019 was 982796751 kWh per year. This equals 0.39906 kWh/kg chemical produced.
  References:
  Chemiepark GENDORF, Umwelterklärung 2016, https://www.gendorf.de/Nachbarn/Umweltschutz/Industrie%20und%20Nachhaltigkeit
  Chemiepark GENDORF, Umwelterklärung 2017, https://www.gendorf.de/Nachbarn/Umweltschutz/Industrie%20und%20Nachhaltigkeit
  Chemiepark GENDORF, Umwelterklärung 2020, https://www.gendorf.de/Nachbarn/Umweltschutz/Industrie%20und%20Nachhaltigkeit
- heat, district or industrial, natural gas: 0.129335, 7.87066 MJ (2 suppliers, which the file names only by identifier); sum of these 8 MJ; lognormal variance with pedigree 0.1786, pedigree (4,5,5,5,5)
  Estimated value based on expert judgement. The amount of heat required for this process can vary greatly depending on the furnace design. The fuel consumption ranges from 120 L to over 250 L of heavy oil per tonne of zinc oxide (Jiyang 2009). Based on this range, an amount of 8 MJ of heat per kg of zinc oxide is assumed to be consumed.
  Reference:
  Communication by Chen Jiyang (2009), Zinc oxide production by French process, https://www.finishing.com/123/73page2.shtml.
  properties: heating value, net 1 MJ
- iron scrap, sorted, pressed: 0.84526 kg; lognormal variance with pedigree 0.1786, pedigree (4,5,5,5,5)
  Proxy with calculation: due to a lack of a specific module for zinc scrap, iron scrap is used. It is calculated based on stoechiometry with an efficiency of 95%.
  Uncertainty: e
  properties: dry mass 1 kg, wet mass 1 kg
- wastewater, average: -2.26904e-6, -8.07865e-9 m3 (2 suppliers, which the file names only by identifier); sum of these -2.27712e-6 m3; lognormal variance with pedigree 0.0452, pedigree (2,4,1,5,4)
  Calculated based on literature data published by the GENDORF Chemical Park. The factory produced an average of 2462760 tonnes of chemical substances (including intermediates) per year in the years 2015-2019. The average ouput of wastewater going to an external wastewater treatment plant in the years 2015-2019 was 5608 m3 per year. This equals 0.000002277 m3/kg chemical produced.
  References:
  Chemiepark GENDORF, Umwelterklärung 2016, https://www.gendorf.de/Nachbarn/Umweltschutz/Industrie%20und%20Nachhaltigkeit
  Chemiepark GENDORF, Umwelterklärung 2017, https://www.gendorf.de/Nachbarn/Umweltschutz/Industrie%20und%20Nachhaltigkeit
  Chemiepark GENDORF, Umwelterklärung 2020, https://www.gendorf.de/Nachbarn/Umweltschutz/Industrie%20und%20Nachhaltigkeit
  properties: carbon content, non-fossil 0.194039, dry mass 0.346837 kg, mass concentration, TOC 0.1091 kg/m3, mass concentration, calcium 0.039453 kg/m3, mass concentration, chlorine 0.030031 kg/m3, mass concentration, hydrogen 0.013365 kg/m3, mass concentration, nitrogen 0.031015 kg/m3, mass concentration, oxygen 0.069824 kg/m3, mass concentration, sodium 0.06456 kg/m3, mass concentration, sulfur 0.015602 kg/m3, water content 2882.2, wet mass 1000 kg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
  note on carbon content, non-fossil: 0.0673 kg TOC/m3 (Tab A.17, ecoinvent v2.2 report 13_I). TOC was considered as Total Carbon.

## Inputs from nature
- Water, cooling, unspecified natural origin [natural resource, in water]: 0.014707 m3; lognormal variance with pedigree 0.0454, pedigree (2,4,2,5,4)
  Calculated based on literature data published by the GENDORF Chemical Park. The factory produced an average of 2462760 tonnes of chemical substances (including intermediates) per year in the years 2015-2019. The average amount of cooling water released in the years 2015-2019 was 34408800 t per year. It was assumed that 5% of the cooling water was emitted to air during its use, therefore, to calculate the input of cooling water, the output value reported by GENDORF was scaled up by the factor 1/0.95. This equals 0.014707 m3/kg chemical produced.
  References:
  Chemiepark GENDORF, Umwelterklärung 2016, https://www.gendorf.de/Nachbarn/Umweltschutz/Industrie%20und%20Nachhaltigkeit
  Chemiepark GENDORF, Umwelterklärung 2017, https://www.gendorf.de/Nachbarn/Umweltschutz/Industrie%20und%20Nachhaltigkeit
  Chemiepark GENDORF, Umwelterklärung 2020, https://www.gendorf.de/Nachbarn/Umweltschutz/Industrie%20und%20Nachhaltigkeit
- Water, river [natural resource, in water]: 0.000965426 m3; lognormal variance with pedigree 0.0454, pedigree (2,4,2,5,4)
  Calculated based on literature data published by the GENDORF Chemical Park. The factory produced an average of 2462760 tonnes of chemical substances (including intermediates) per year in the years 2015-2019. The average consumption of river water in the years 2015-2019 was 22000820 t per year. However, since the cooling water is modelled as an input, the amount of river water was adjusted to avoid double counting. 55% of the input amount of cooling water was deducted from the amount of river water, as that is the share of river water versus well water. This equals 0.00096543 m3/kg chemical produced.
  References:
  Chemiepark GENDORF, Umwelterklärung 2016, https://www.gendorf.de/Nachbarn/Umweltschutz/Industrie%20und%20Nachhaltigkeit
  Chemiepark GENDORF, Umwelterklärung 2017, https://www.gendorf.de/Nachbarn/Umweltschutz/Industrie%20und%20Nachhaltigkeit
  Chemiepark GENDORF, Umwelterklärung 2020, https://www.gendorf.de/Nachbarn/Umweltschutz/Industrie%20und%20Nachhaltigkeit
- Water, well, in ground [natural resource, in water]: 0.000816522 m3; lognormal variance with pedigree 0.0454, pedigree (2,4,2,5,4)
  Calculated based on literature data published by the GENDORF Chemical Park. The factory produced an average of 2462760 tonnes of chemical substances (including intermediates) per year in the years 2015-2019. The average consumption of well water in the years 2015-2019 was 18607480 t per year. However, since the cooling water is modelled as an input, the amount of well water was adjusted to avoid double counting. 45% of the input amount of cooling water was deducted from the amount of well water, as that is the share of well water versus river water. This equals 0.00081652 m3/kg chemical produced.
  References:
  Chemiepark GENDORF, Umwelterklärung 2016, https://www.gendorf.de/Nachbarn/Umweltschutz/Industrie%20und%20Nachhaltigkeit
  Chemiepark GENDORF, Umwelterklärung 2017, https://www.gendorf.de/Nachbarn/Umweltschutz/Industrie%20und%20Nachhaltigkeit
  Chemiepark GENDORF, Umwelterklärung 2020, https://www.gendorf.de/Nachbarn/Umweltschutz/Industrie%20und%20Nachhaltigkeit

## Emissions to nature
- Water [air, unspecified]: 0.00147008 m3; lognormal variance with pedigree 0.0848, pedigree (2,4,2,5,4)
  Calculated based on literature data published by the GENDORF Chemical Park. The factory produced an average of 2462760 tonnes of chemical substances (including intermediates) per year in the years 2015-2019. To determine the emissions of water to air, the difference of all water inputs (from river, well, tap water and cooling) and outputs (wastewater, emissions to water) was calculated. The average ouput of water to air in the years 2015-2019 was 3620444 m3 per year. This equals 0.00147 m3/kg chemical produced. For more information on the other water exchanges please consult the respective exchange comment.
  References:
  Chemiepark GENDORF, Umwelterklärung 2016, https://www.gendorf.de/Nachbarn/Umweltschutz/Industrie%20und%20Nachhaltigkeit
  Chemiepark GENDORF, Umwelterklärung 2017, https://www.gendorf.de/Nachbarn/Umweltschutz/Industrie%20und%20Nachhaltigkeit
  Chemiepark GENDORF, Umwelterklärung 2020, https://www.gendorf.de/Nachbarn/Umweltschutz/Industrie%20und%20Nachhaltigkeit
- Zinc II [air, urban air close to ground]: 0.000423 kg; lognormal variance with pedigree 0.1022, pedigree (1,1,2,5,1)
  Concerning the emissions to air, due to a lack of information, it is assumed that 1% of the excess zinc input is emitted to air.
  Reference:
  Hischier R., Classen M., Lehmann M. and Scharnhorst W. (2007) Life cycle inventories of Electric and Electronic Equipment: Production, Use and Disposal. ecoinvent report No. 18. Empa / Technology & Society Lab, Swiss Centre for Life Cycle Inventories, Dübendorf, 2007.
- Water [water, unspecified]: 0.0150391 m3; lognormal variance with pedigree 0.0848, pedigree (2,4,2,5,4)
  Calculated based on literature data published by the GENDORF Chemical Park. The factory produced an average of 2462760 tonnes of chemical substances (including intermediates) per year in the years 2015-2019. The amount of water released back to the environment consists of the sum of the amount of process water treated in the internal WWTP that is then released back to the environment and the amount of cooling water released back to the environment. The average ouput of the internal WWTP in the years 2015-2019 was 2628800 m3 and that of cooling water released back to the environment was 34408800 m3. This gives a yearly average of 37037600 m3 emissions of water to water. This equals 0.01504 m3/kg chemical produced.
  References:
  Chemiepark GENDORF, Umwelterklärung 2016, https://www.gendorf.de/Nachbarn/Umweltschutz/Industrie%20und%20Nachhaltigkeit
  Chemiepark GENDORF, Umwelterklärung 2017, https://www.gendorf.de/Nachbarn/Umweltschutz/Industrie%20und%20Nachhaltigkeit
  Chemiepark GENDORF, Umwelterklärung 2020, https://www.gendorf.de/Nachbarn/Umweltschutz/Industrie%20und%20Nachhaltigkeit

## Sampling procedure
The process data is based on literature. The electricity consumption is approximated based on data from a large chemical factory located in Germany. The process emissions are based on estimations only.

## Extrapolations
This dataset has been copied from an original dataset covering the geography RER. The uncertainty has been adjusted accordingly.

## Review by Gregor Wernet 2017-08-04
This dataset was additionally reviewed in a separate review process by Eric Johnson of Atlantic Consulting as well as Emilia Moreno Ruiz and Gregor Wernet of ecoinvent.
