# acetic anhydride production, acetic acid pyrolysis, via ketene intermediate

Dataset: EcoSpold 2, unit process
Geography: RER
Time period: 1989-01-01 to 2023-12-31
Technology level: current
Classification: ISIC rev.4 ecoinvent: 2011:Manufacture of basic chemicals
Scenario: Business-as-Usual
System model: Allocation, cut-off by classification
Share of production covered: 100 %
Generated by: Iasonas Ioannou
Published in: Sutter, J. 2007
Database: ecoinvent
isCopyrightProtected: true
accessRestrictedTo: 1

## General comment
This dataset represents the production of 1 kg of acetic anhydride from acetic acid based on the intermediate formation of ketene. Acetic anhydride (CAS-No. 108-24-7, (CH3CO)2O) is a colourless liquid with a pungent odor and is strongly lachrymatory. Acetic anhydride is one of the largest commercially produced carboxylic acid anhydride (Kirk, 2004), and is an important intermediate readily used in both research and industry (Held, 2004).
Today, acetic anhydride is made mostly by either the ketene process or the oxidation of acetaldehyde (Sutter, 2007). Production by another process, the carbonylation of methyl acetate (Halcon process), was begun in 1983. In Western Europe, 77 % of acetic anhydride is made by the ketene process and 23 % by the oxidation of acetaldehyde. Since production by the Halcon process began at the Tennessee-Eastman plant, 25 % of acetic anhydride in the United States has been made by this process and 75 % by the ketene process.
Acetic anhydride is used chiefly as an acetylating and dehydrating agent; it is used on a large scale for the acetylation of cellulose (Sutter, 2007). Other areas of application for acetic anhydride are the production of poly(methylacrylimide) hard foam, acetylated plastic auxiliaries, explosives, particularly hexogen production, the production of certain types of brake fluids, the production of auxiliaries for drilling fluids, the detergent industry, for the production of cold – bleaching activators, the dyeing industry, in the preparation of organic intermediates, in the production of pharmaceuticals, in the food industry, flavors and fragrances, and herbicides such as metolachlor (Dual) and alachlor (Lasso).
In this dataset, the raw material inputs, and process-specific material exchanges, are modelled with a generic stoichiometry-based tool, using literature or estimated yields. The emissions are modelled with a default value, which is estimated based on losses, unreacted chemicals, among others. At the same time, the energy consumption is based on data from literature sources. Finally, the auxiliary (i.e., cooling water and infrastructure) exchanges are modelled with a default value based on industry data from literature sources. For more information on the calculations refer to the sampling procedure.
References:
Sutter, J. (2007) Life Cycle Inventories of Petrochemical Solvents. ecoinvent report No. 22. Swiss Centre for Life Cycle Inventories, Dübendorf, 2007.
Kirk, Raymond E., Donald F. Othmer, and Charles A. Mann. "Encyclopedia of Chemical Technology." 2004.
Held, H., Rengstl, A., Mayer, D.: Acetic anhydride and mixed fatty acid anhy-drides. In: "Ullmann's Encyclopedia of Industrial." 2004

## Included activities start
The activity starts when the raw materials enter the process.

## Included activities end
The activity ends with acetic anhydride being ready for further transformation or transportation at the production site gate. Materials entering the process are included as well as energy uses, infrastructure and emissions.

## Geography
The inventory is modelled for Europe. The main material inputs and outputs of this activity are generated with on a generic stoichiometry-based model, using literature or estimated yields. Furthermore, the source of information for the heat and electricity inputs is literature data for the specific technology. Finally, the main source of information for the values for water (process and cooling), nitrogen, chemical factory is industry data from the GENDORF Chemical Park, which is based in Germany and produced an average of 2462760 tonnes of chemical substances in the years 2015-2019. For more information on the calculations refer to the sampling procedure.
The dataset could also be considered as not geography-specific, and thus, valid for a broader geographical coverage.
References:
Hischier, R. (2005) Establishing Life Cycle Inventories of Chemicals Based on Differing Data Availability (9 pp). The International Journal of Life Cycle Assessment, Volume 10, Issue 1, pp 59-67. 10.1065/lca2004.10.181.7
Chemiepark GENDORF, Umwelterklärung 2016, https://www.gendorf.de/Nachbarn/Umweltschutz/Industrie%20und%20Nachhaltigkeit
Chemiepark GENDORF, Umwelterklärung 2017, https://www.gendorf.de/Nachbarn/Umweltschutz/Industrie%20und%20Nachhaltigkeit
Chemiepark GENDORF, Umwelterklärung 2020, https://www.gendorf.de/Nachbarn/Umweltschutz/Industrie%20und%20Nachhaltigkeit
Chauvel, Alain, Gilles Lefebvre, and L. Castex in "Petrochemical processes. Technical and economical characteristics Vol. 2." (1989)

## Technology
The ketene process for the production of acetic anhydride proceeds in two steps: the thermal cleavage of acetic acid to form ketene and the reaction of ketene with acetic acid. The alloy Sicromal, containing 25 % Cr, 20 % Ni, and 2 % Si, is particularly suitable. Triethyl phosphate is employed as the catalyst.
CH3COOH → CH2CO + H2O, ΔH = 147 MJ
CH3COOH + CH2CO → (CH3CO)2O, ΔH = -63 MJ
Hot acetic acid vapor is broken into ketene and water at 700 – 750 °C in the presence of traces of phosphoric acid catalyst. The pressure in the reactor is generally reduced so that the ketene can be isolated before it reacts with acetic acid or with water. The cleavage takes place in a multicoil reactor with coils made of highly heat-resistant steel alloys. Triethyl phosphate is employed as the catalyst.
The above figure shows how the vacuum process operates. Acetic acid is fed continuously into the evaporator (a). The acetic acid vapor leaving the evaporator passes over the catalyst evaporator (b), which is supplied continuously with catalyst, and thence into the ketene oven (c). The acetic acid is heated (d) and then cleaved (e). As soon as the cracked gases have left the oven, ammonia is added to prevent the ketene from reacting with the water or with the remaining acetic acid. For the same reason, and also to remove condensable gases, the hot gas is cooled in combined water and brine condensers (f), (g). A 40 – 48 % aqueous solution of acetic acid condenses at about 0 °C and is separated (h) from the cleavage gas (0 – 10 °C). About 4 – 8 % of this acetic acid results from the reaction of the condensed acetic anhydride with water.
Two processes are available for the reaction of ketene with acetic acid. The classical scrubber process is being replaced gradually by the Wacker process with liquid-ring pumping. After the reaction with the ketene with acetic acid, the raw anhydride is distilled.
In this dataset, a yield of 95% was assumed for each reaction.
References:
Held, H., Rengstl, A., Mayer, D.: Acetic anhydride and mixed fatty acid anhy-drides. In: Ullmann's Encyclopedia of Industrial
Sutter, J. (2007) Life Cycle Inventories of Petrochemical Solvents. ecoinvent report No. 22. Swiss Centre for Life Cycle Inventories, Dübendorf, 2007.

## Time period
The time period spans from the earliest year from which at least one of the input values was obtained until 2022, but overall form the most realistic picture of the production. Besides, the activity is partly generated, in terms of material inputs and outputs, based on a generic stoichiometry-based model, using literature or estimated yields, which does not expect to change over time.
The source of information for the heat and electricity inputs is literature data (from 1989) for the specific technology. Finally, the main source of information for the values for water (process and cooling), nitrogen, chemical factory is industry data from the GENDORF Chemical Park. The values are a 5-year average of data from 2015 to 2019 published by the GENDORF Chemical Park, which is based in Germany and produced an average of 2462760 tonnes of chemical substances in the years 2015-2019. The end time period is therefore set based on the years from Gendorf reference.
For more information on the calculations refer to the sampling procedure and in the comments of the exchanges.
References:
Hischier, R. (2005) Establishing Life Cycle Inventories of Chemicals Based on Differing Data Availability (9 pp). The International Journal of Life Cycle Assessment, Volume 10, Issue 1, pp 59-67. 10.1065/lca2004.10.181.7
Chemiepark GENDORF, Umwelterklärung 2016, https://www.gendorf.de/Nachbarn/Umweltschutz/Industrie%20und%20Nachhaltigkeit
Chemiepark GENDORF, Umwelterklärung 2017, https://www.gendorf.de/Nachbarn/Umweltschutz/Industrie%20und%20Nachhaltigkeit
Chemiepark GENDORF, Umwelterklärung 2020, https://www.gendorf.de/Nachbarn/Umweltschutz/Industrie%20und%20Nachhaltigkeit
Chauvel, Alain, Gilles Lefebvre, and L. Castex in "Petrochemical processes. Technical and economical characteristics Vol. 2." (1989)

## Reference product
- acetic anhydride: 1 kg; name RP; By-product classification allocatable product; CPC 34120: Industrial monocarboxylic fatty acids; acid oils from refining; HS2017 291524: Acids; saturated acyclic monocarboxylic acids; acetic anhydride; CAS 108-24-7
  Acetic anhydride is a colourless liquid with a pungent odor and is strongly lachrymatory. It is miscible with polar solvents and dissolves in cold alcohol with slow decomposition. Acetic anhydride is used chiefly as an acetylating and dehydrating agent; it is used on a large scale for the acetylation of cellulose. Other areas of application for acetic anhydride are the production of poly(methylacrylimide) hard foam, acetylated plastic auxiliaries, explosives, particularly hexogen production, the production of certain types of brake fluids, the production of auxiliaries for drilling fluids, the detergent industry, for the production of cold - bleaching activators, the dyeing industry, in the preparation of organic intermediates, in the production of pharmaceuticals, in the food industry, flavors and fragrances, and herbicides such as metolachlor (Dual) and alachlor (Lasso).
  production volume 3.32024e8 kg; name RP_PV
    Unknown production capacity according to OECD HIGH PRODUCTION VOLUME CHEMICALS PROGRAM SIDS INITIAL ASSESSMENT REPORT * 80% capacity utilisation * ketene route 77% (ecoinvent v2)
  property heating value, net 21.38 MJ
    LHV is calculated based on the elemental composition of the substance. Based on the CAS number of the substance (000108-24-7), the chemical formula of the substance is found to be: C4H6O3, (PubChem 2020). Reference: Kim, S., Chen, J., Cheng, T., Gindulyte, A., He, J., He, S., Li, Q., Shoemaker, B. A., Thiessen, P. A., Yu, B., Zaslavsky, L., Zhang, J., & Bolton, E. E. (2019). PubChem 2019 update: improved access to chemical data. Nucleic acids research, 47(D1), D1102–D1109. https://doi.org/10.1093/nar/gky1033
  property price 0.691 EUR2005
    Temporary price data. Calculated as 90% of purchasers price based on: Source: 28 August 2006 issue of Chemical Market Reporter (ICIS)
  properties: carbon allocation 0.470588 kg, carbon content 0.470588, carbon content, fossil 0.470588, carbon content, non-fossil 0, dry mass 1 kg, water content 0, water in wet mass 0 kg, wet mass 1 kg

## Inputs from technosphere
- acetic acid, without water, in 98% solution state: 1.25083 kg; source Chauvel, A. 1989; lognormal variance with pedigree 0.0026, pedigree (2,3,2,1,2)
  Calculated value based on stoichiometric calculations and literature data. For more information on the calculations refer to the sampling procedure.
  Uncertainty: Chauvel 1989
  properties: carbon content, fossil 0.400016, dry mass 1 kg, heating value, net 14.6 MJ, wet mass 1 kg
  note on heating value, net: Based on literature, page 10, Althaus H.-J., Chudacoff M., Hischier R., Jungbluth N., Osses M. and Primas A. (2007) Life Cycle Inventories of Chemicals. Final report ecoinvent data v2.0 No. 8. EMPA, Swiss Centre for Life Cycle Inventories, Dübendorf, CH, Online-Version under: www.ecoinvent.org.
- chemical factory, organics: 4e-10 unit; lognormal variance with pedigree 0.3434, pedigree (2,4,2,4,4)
  Calculated based on literature data published by the industry. For this activity, no information was readily available concerning infrastructure and land-use. Therefore, the infrastructure is estimated based on data from two chemical factories, the BASF site of Ludwigshafen and the chemical factory in Gendorf (which are both located in Germany), which produce a wide range of chemical substances. Based on this data, the following assumptions are made: the built area amounts to about 4.2 ha, the plant has an average output of 50'000 t/a and a lifespan of fifty years. The estimated infrastructure amount is therefore 4.00 E-10 units per kg of produced chemical. References: Althaus H.-J., Chudacoff M., Hischier R., Jungbluth N., Osses M. and Primas A. (2007) Life Cycle Inventories of Chemicals. ecoinvent report No. 8, v2.0. EMPA Dübendorf, Swiss Centre for Life Cycle Inventories, Dübendorf, CH. Gendorf (2000) Umwelterklärung 2000, Werk Gendorf. Werk Gendorf, Burgkirchen.
  Uncertainty: Estimation
- electricity, medium voltage: 0.39 kWh; source Chauvel, A. 1989; lognormal variance with pedigree 0.0026, pedigree (2,3,2,1,2)
  Value reported by Chauvel, Alain, Gilles Lefebvre, and L. Castex in "Petrochemical processes. Technical and economical characteristics Vol. 2." (1989).
  Uncertainty: Chauvel 1989
- heat, district or industrial, natural gas: 7 MJ; source Chauvel, A. 1989; lognormal variance with pedigree 0.0026, pedigree (2,3,2,1,2)
  (same comment as for electricity, medium voltage)
  properties: heating value, net 1 MJ
- heat, from steam, in chemical industry: 11 MJ; lognormal variance with pedigree 0.0026, pedigree (2,3,2,1,2)
  Value reported by Chauvel, Alain, Gilles Lefebvre, and L. Castex in "Petrochemical processes. Technical and economical characteristics Vol. 2." (1989).
  properties: heating value, net 1 MJ
- wastewater, average: -4.59945e-6, -0.000183016 m3 (2 suppliers, which the file names only by identifier); sum of these -0.000187615 m3; lognormal variance with pedigree 0.0038, pedigree (3,3,1,1,2)
  Calculated value based on stoichiometric calculations and literature data. For more information on the calculations refer to the sampling procedure.
  production volume; = RP_PV * (WW / RP)
    Calculated from production volume of reference product using the relative outputs.
  properties: carbon content, non-fossil 0.194039, dry mass 0.346837 kg, mass concentration, TOC 0.1091 kg/m3, mass concentration, calcium 0.039453 kg/m3, mass concentration, chlorine 0.030031 kg/m3, mass concentration, hydrogen 0.013365 kg/m3, mass concentration, nitrogen 0.031015 kg/m3, mass concentration, oxygen 0.069824 kg/m3, mass concentration, sodium 0.06456 kg/m3, mass concentration, sulfur 0.015602 kg/m3, water content 2882.2, wet mass 1000 kg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
  note on carbon content, non-fossil: 0.0673 kg TOC/m3 (Tab A.17, ecoinvent v2.2 report 13_I). TOC was considered as Total Carbon.

## Inputs from nature
- Water, cooling, unspecified natural origin [natural resource, in water]: 0.214063 m3; name CW_u; = 0.891930591 * ( 240 / 1000 ); source Chauvel, A. 1989; lognormal variance with pedigree 0.044, pedigree (2,4,2,4,4)
  This value is estimated based on the cooling requirements reported by Chauvel, Alain, Gilles Lefebvre, and L. Castex in "Petrochemical processes. Technical and economical characteristics Vol. 2." (1989). The value of cooling water input for the latter process is 0.24 m3 per kg.
  At the same time, the latter amount was split between the following sources (1) "Water, cooling, unspecified natural origin", (2) "Water, river", and (3) "Water, well. in ground"
- Water, river [natural resource, in water]: 0.014052 m3; name CW_r; = 0.058550155 * ( 240 / 1000 ); lognormal variance with pedigree 0.044, pedigree (2,4,2,4,4)
  (same comment as for Water, cooling, unspecified natural origin)
- Water, well, in ground [natural resource, in water]: 0.0118846 m3; name CW_g; = 0.049519254 * ( 240 / 1000 ); lognormal variance with pedigree 0.044, pedigree (2,4,2,4,4)
  (same comment as for Water, cooling, unspecified natural origin)

## Emissions to nature
- Carbon dioxide, fossil [air, urban air close to ground]: 0.140903 kg; lognormal variance with pedigree 0.004, pedigree (3,3,2,1,2)
  Calculated losses, based on the boiling point of a chemical, to water or to air. In addition, unreacted chemicals are assumed to go to wastewater treatment, which has a conversion rate in biological treatment of 95% of carbon into carbon dioxide. The remaining 5% are released as emissions to water.
- Ketene [air, unspecified]: 0.00546697 kg; lognormal variance with pedigree 0.004, pedigree (3,3,2,1,2)
  (same comment as for Carbon dioxide, fossil)
- Water [air, unspecified]: 0.0213689 m3; = 0.089036947 * (CW_u + CW_r + CW_g ); lognormal variance with pedigree 0.0848, pedigree (2,4,2,5,4)
  Calculated value. This output flow is estimated based on the inputs. For more details, see Mathematical Relation.
  property fraction, origin: fresh water 0.000879762; name fraction_origin_fresh_water
  property fraction, origin: salt water 0; name fraction_origin_salt_water
  property fraction, origin: unspecified 0.99912; name fraction_origin_unspecified
- Acetic acid [water, unspecified]: 0.00320978 kg; lognormal variance with pedigree 0.004, pedigree (3,3,2,1,2)
  (same comment as for Carbon dioxide, fossil)
- Acetic anhydride [water, unspecified]: 0.00025 kg; lognormal variance with pedigree 0.004, pedigree (3,3,2,1,2)
  (same comment as for Carbon dioxide, fossil)
- BOD5, Biological Oxygen Demand [water, surface water]: 0.0053922 kg; lognormal variance with pedigree 0.218, pedigree (4,5,5,5,5)
  Calculated value. The BOD, COD, TOC and BOD5 are calculated based on the amount and type of emissions released to water in the same activity.
- COD, Chemical Oxygen Demand [water, surface water]: 0.0053922 kg; lognormal variance with pedigree 0.218, pedigree (4,5,5,5,5)
  (same comment as for BOD5, Biological Oxygen Demand)
- DOC, Dissolved Organic Carbon [water, surface water]: 0.00202207 kg; lognormal variance with pedigree 0.188, pedigree (4,5,5,5,5)
  Calculated value. The BOD, COD, TOC and BOD5 are calculated based on the amount and type of emissions released to water in the same activity.
  Uncertainty: Calculated from the water emissions
- TOC, Total Organic Carbon [water, surface water]: 0.00202207 kg; lognormal variance with pedigree 0.218, pedigree (4,5,5,5,5)
  (same comment as for BOD5, Biological Oxygen Demand)
- Water [water, unspecified]: 0.218631 m3; = 0.910963053 * (CW_u + CW_r + CW_g ); lognormal variance with pedigree 0.0848, pedigree (2,4,2,5,4)
  (same comment as for Water)
  property carbon content, fossil 0; name C_content_fossil
  property carbon content, non-fossil 0; name C_content_non_fossil
  property dry mass 0 kg; name DM
  property fraction, origin: fresh water 0.0021557; name fraction_origin_fresh_water_Ww
  property fraction, origin: salt water 0; name fraction_origin_salt_water_Ww
  property fraction, origin: unspecified 0.997844; name fraction_origin_unspecified_Ww
  property water in wet mass 1000 kg; name WWM
  property wet mass 1000 kg; name WM

## Sampling procedure
Literature data and stoichiometric calculation. This inventory is partially based on a generic model of the production of chemicals. The data generated by this model have been improved with compound-specific data when available. The model of the production of chemicals is using specific industry or literature data wherever possible and more generic data on chemical production processes to fill compound-specific data gaps when necessary. The basic principles of the model have been published in literature (Hischier, 2005). The model has been updated and extended with newly available data from the chemical industry. In the model, unreacted fractions are treated in a waste treatment process, and emissions reported are after a waste treatment process that is included in the scope of this dataset. For volatile reactants, a small level of evaporation is assumed. Solvents and catalysts are mostly recycled in closed-loop systems within the scope of the dataset and reported flows are for losses from this system.
The source of information for the heat and electricity inputs is literature data (from 1989) for the specific technology. Finally, the main source of information for the values for water (process and cooling), nitrogen, and chemical factory is industry data from the GENDORF Chemical Park. The values are a 5-year average of data from 2015 to 2019 published by the GENDORF Chemical Park, which is based in Germany and produced an average of 2462760 tonnes of chemical substances in the years 2015-2019. For more information refer to the comments of the exchanges.

References:
Hischier, R. (2005) Establishing Life Cycle Inventories of Chemicals Based on Differing Data Availability (9 pp). The International Journal of Life Cycle Assessment, Volume 10, Issue 1, pp 59-67. 10.1065/lca2004.10.181.7
Chemiepark GENDORF, Umwelterklärung 2016, https://www.gendorf.de/Nachbarn/Umweltschutz/Industrie%20und%20Nachhaltigkeit
Chemiepark GENDORF, Umwelterklärung 2017, https://www.gendorf.de/Nachbarn/Umweltschutz/Industrie%20und%20Nachhaltigkeit
Chemiepark GENDORF, Umwelterklärung 2020, https://www.gendorf.de/Nachbarn/Umweltschutz/Industrie%20und%20Nachhaltigkeit
Chauvel, Alain, Gilles Lefebvre, and L. Castex in "Petrochemical processes. Technical and economical characteristics Vol. 2." (1989)
