# softwood forestry, paraná pine, sustainable forest management

Dataset: EcoSpold 2, unit process
Geography: RoW
Time period: 2000-01-01 to 2023-12-31
Technology level: current
Classification: ISIC rev.4 ecoinvent: 0220:Logging
Classification: EcoSpold01Categories: wooden materials/extraction
Synonyms: Araucaria angustifolia
Scenario: Business-as-Usual
System model: Allocation, cut-off by classification
Generated by: Frank Werner (obsolete)
Published in: Althaus H.J. 2007
Database: ecoinvent
isCopyrightProtected: true
accessRestrictedTo: 1

## General comment
This dataset represents average of two well-documented, large-scale logging companies. both companies own also natural forests where (some) Paraná pine is extracted. Percentage of plantation trees and trees from managed natural forests as well as intensity of management are not known. Data of the two companies differs considerably. emissions from biomass burning according to IPCC 2003.
The data refers to wood 'under bark'. CO2 assimilation is based on 49.4% carbon in the wood including the bark (15%). Biomass energy equals gross calorific value including bark.

## Included activities start
Plantation establishment process starting from pines tree planting.

## Included activities end
This activity ends with harvested paraná pine tree logs, at forest road. The dataset includes plantation establishment, management, harvesting, hauling operations and biomass burning of branchings. The dataset does not include branchings left to rot on the ground, fuel consumption and the use of gravel and land for forest roads. This activity ends with standing eucalyptus trees before harvesting. The dataset includes the CO2 absorption from air and the land use for the trees to grow (including 10% bark). The dataset does not include the land use of forest road area. includes plantation establishment and management, harvesting and hauling operations incl. emissions from burning of branchings; fuel consumption and gravel for forest road construction is unknown; land use of forest roads and gravel are distregarded; branchings are left to rot on the ground includes the CO2 absorption from air and the land use for the trees to grow (including 15% bark). Forest road area is not included in the land useDensity: 500 kg/m3 (u=0)

## Technology
state-of-the art technology; forest operations largely based on manual labor, some mechanisation is currently undertaken
natural growth; relates to the forest area and CO2 from air needed to produce Paraná pine

## Parameters
- fraction, process water, to air: 0.55 dimensionless; name fraction_PW_to_air; lognormal variance with pedigree 0.092025, pedigree (4,4,3,2,4)
- fraction, tap water, to air: 0.55 dimensionless; name fraction_TW_to_air; lognormal variance with pedigree 0.092025, pedigree (4,4,3,2,4)

## Reference product
- sawlog and veneer log, paraná pine, measured as solid wood under bark: 1 m3; By-product classification allocatable product; CPC 3110: Wood, sawn or chipped lengthwise, sliced or peeled, of a thickness exceeding 6 mm; railway or tramway sleepers […]; HS2017 440325: Wood; coniferous species n.e.c in headings 4403.21 or 4403.23, in the rough, whether or not stripped of bar[...]
  production volume 3.78551e6 m3; = 8832847.22/0.7
    Estimated. The global production volume is extrapolated from the BR production volume assuming that BR produces 70% of glboal production.
  property carbon content, non-fossil 0.494
    C content of dry mass is 0.494 kgC/kg dry wood (ecoinvent v2.2 report 21).
  property heating value, net 6870.62 MJ
    LHV is calculated based on the Carbon content of the product. More details can be found on the respective documentation.The property is based on a value of 9.16MJ/kg
  property price 64.06 EUR2005
    Reference: FAOSTAT (accessed 20140112). The price is calculated by using data on total world import quantity (m3) and import value (1000 USD), year 2005. 84002927 m3 of Ind Rwd Wir (C) was imported in the world in 2005. The import value was 6507230.2000 USD. The calculated price is thus (6507230200/84002927*0.8)=64.0629983690925 Euro.
  properties: carbon allocation 290.588 kg, carbon content 0.494, carbon content, fossil 0, dry mass 588.235 kg, water content 0.5, water in wet mass 294.118 kg, wet mass 882.353 kg

## Inputs from technosphere
- chemical, inorganic: 0.0023 kg; lognormal variance with pedigree 0.126, pedigree (3,4,5,5,4)
  properties: carbon content, fossil 0.003, dry mass 1 kg, wet mass 1 kg
  note on carbon content, fossil: This dataset is an unweighted average of 20 inorganic substances (listed in Tab 88.1, ecoinvent v2.2 report 8, part II), being part of the top100 chemicals included in this database. The C-content has also been calculated as an unweighted average of the C content of the substances composing this dataset.
- chemical, organic: 0.11 kg; lognormal variance with pedigree 0.126, pedigree (3,4,5,5,4)
  properties: carbon content, fossil 0.628, dry mass 1 kg, heating value, net 19.03 MJ, wet mass 1 kg
  note on carbon content, fossil: This dataset is an unweighted average of 20 organic substances (listed in Tab 88.1, ecoinvent v2.2 report 8, part II), being part of the top100 chemicals included in this database. The C-content has also been calculated as an unweighted average of the C content of the substances composing this dataset.
- diesel, burned in building machine: 1684 MJ; lognormal variance with pedigree 0.056, pedigree (3,4,5,5,1)
  properties: heating value, net 1 MJ
- power sawing, without catalytic converter: 0.4 hour; lognormal variance with pedigree 0.056, pedigree (3,4,5,5,1)
- tap water: 0.084554, 0.128895, 0.240513, 0.0779925, 3.25023, 37.1941, 27.7737 kg (7 suppliers, which the file names only by identifier); sum of these 68.75 kg; lognormal variance with pedigree 0.056, pedigree (3,4,5,5,1)
  properties: carbon content, fossil 0.00178991, dry mass 0.000337476 kg, water content 2962.17, wet mass 1 kg
  note on carbon content, fossil: Bicarbonate content is 2.93 mol/m3. CO2 content is 0.1 mol/m3 (ecoinvent v2.2 report 8, Tab 93.1).

## Inputs from nature
- Carbon dioxide, in air [natural resource, in air]: 2080 kg; lognormal variance with pedigree 0.056, pedigree (3,4,5,5,1)
- Energy, gross calorific value, in biomass [natural resource, biotic]: 30200 MJ
- Occupation, forest, intensive [natural resource, land]: 6120 m2*year; lognormal variance with pedigree 0.21, pedigree (5,5,5,5,5)
- Transformation, from forest, intensive [natural resource, land]: 136 m2; lognormal variance with pedigree 0.28, pedigree (5,5,5,5,5)
- Transformation, to forest, intensive [natural resource, land]: 136 m2; lognormal variance with pedigree 0.28, pedigree (5,5,5,5,5)
- Wood, soft, standing [natural resource, biotic]: 1 m3; lognormal variance with pedigree 0.056, pedigree (3,4,5,5,1)

## Emissions to nature
- Carbon dioxide, non-fossil [air, unspecified]: 1182.5 kg; lognormal variance with pedigree 0.056, pedigree (3,4,5,5,1)
- Dinitrogen monoxide [air, non-urban air or from high stacks]: 0.0071077 kg; lognormal variance with pedigree 0.096, pedigree (3,4,5,5,1)
- Methane, non-fossil [air, non-urban air or from high stacks]: 1.0338 kg; lognormal variance with pedigree 0.096, pedigree (3,4,5,5,1)
- Particulate Matter, < 2.5 um [air, non-urban air or from high stacks]: 3 kg; lognormal variance with pedigree 0.096, pedigree (3,4,5,5,1)
- Particulate Matter, > 10 um [air, non-urban air or from high stacks]: 2 kg; lognormal variance with pedigree 0.096, pedigree (3,4,5,5,1)
- Particulate Matter, > 2.5 um and < 10um [air, non-urban air or from high stacks]: 2.5 kg; lognormal variance with pedigree 0.096, pedigree (3,4,5,5,1)
- Water [air, unspecified]: 0.0378125 m3; name water_to_air_unspecified; lognormal variance with pedigree 0.0827, pedigree (2,2,5,5,1)
  Calculated value based on literature values and expert opinion. See comments in the parametres' comment field.
  property fraction, origin: fresh water 1; name fraction_origin_fresh_water
  property fraction, origin: salt water 0; name fraction_origin_salt_water
  property fraction, origin: unspecified 0; name fraction_origin_unspecified
- Water [water, unspecified]: 0.0309375 m3; name water_to_water_unspecified; lognormal variance with pedigree 0.0827, pedigree (2,2,5,5,1)
  (same comment as for Water)
  property carbon content, fossil 0; name C_content_fossil
  property carbon content, non-fossil 0; name C_content_non_fossil
  property dry mass 0 kg; name DM
  property fraction, origin: fresh water 1; name fraction_origin_fresh_water_Ww
  property fraction, origin: salt water 0; name fraction_origin_salt_water_Ww
  property fraction, origin: unspecified 0; name fraction_origin_unspecified_Ww
  property water in wet mass 1000 kg; name WWM
  property wet mass 1000 kg; name WM

## Sampling procedure
literature, partly relying on estimates (fuel consumption)

## Extrapolations
This dataset has been copied from an original dataset covering the geography BR. The uncertainty has been adjusted accordingly.

## Review by Hans-Jörg Althaus 2009-01-22
Passed

## Review by Emilia Moreno Ruiz 2013-04-12
PV set to 4

## Review by Emilia Moreno Ruiz 2014-05-21
restructured to fit new sector (CO2 intake and land use merged into the forestry dataset)

## Review by Emilia Moreno Ruiz 2015-10-02
PV adjusted
