# petrol production, low-sulfur

Dataset: EcoSpold 2, unit process
Geography: Europe without Switzerland
Time period: 2005-01-01 to 2023-12-31
Technology level: current
Classification: EcoSpold01Categories: oil/fuels
Classification: ISIC rev.4 ecoinvent: 1920:Manufacture of refined petroleum products
Tags: ConvertedDataset
Scenario: Business-as-Usual
System model: Allocation, cut-off by classification
Generated by: Niels Jungbluth
Published in: Jungbluth, N. 2007
Database: ecoinvent
isCopyrightProtected: true
accessRestrictedTo: 1

## General comment
Estimation for the conversion of refinery production to low-sulphur petrol with a sulphur content < 50ppm (Today 150ppm). A additional energy use of 6% has been estimated. Data for additional emissions and additional infrastructure were not available.

## Included activities end
additional energy use for production, no process specific emissions and material use.

## Geography
Estimation for the European situation.

## Technology
Different technologies might be used to reduce the sulphur content, e.g. better catalysts, new hydrodesulphurisation process, higher storage capacities, separate transport systems.

## Time period
Time of publications and information in the literature

## Reference product
- petrol, low-sulfur: 1 kg; By-product classification allocatable product; CPC 33311: Motor gasoline; HS2017 2710: Petroleum oils and oils from bituminous minerals, not crude; preparations n.e.c, containing by weight 70% or [...]; CAS 86290-81-5
  EcoSpold01Location=RER
  production volume 1.80731e11 kg; = 1.90243E+11*0.95
    Calculated based on the production volume of "petrol, unleaded" in petroleum refineries in Europe without Switzerland (see activity "petrol production, unleaded, petroleum refinery operation, Europe without Switzerland, 2014-2017"). European regulation requires all petrol to be processed to petrol, low-sulfur. It is here assumed that 95% of the European petrol production are desulfurized, the remainder is meant to supply petrol blent for two-stroke engines.
  property heating value, net 42.5 MJ
    Based on literature, page 611, Report 17: Jungbluth, N., Chudacoff, M., Dauriat, A., Dinkel, F., Doka, G., Faist Emmenegger, M., Gnansounou, E., Kljun, N., Schleiss, K., Spielmann, M., Stettler, C., Sutter, J. 2007: Life Cycle Inventories of Bioenergy. ecoinvent report No. 17, Swiss Centre for Life Cycle Inventories, Dübendorf, CH.
  property price 0.71 EUR2005
    Average calculated from All Grades, Areas and Formulations in USA for 2005. Source: http://www.eia.gov/oil_gas/petroleum/data_publications/wrgp/mogas_history.html
  properties: carbon allocation 0.865 kg, carbon content 0.865, carbon content, fossil 0.865, carbon content, non-fossil 0, dry mass 1 kg, water content 0, water in wet mass 0 kg, wet mass 1 kg

## Inputs from technosphere
- electricity, medium voltage: 0.00334 kWh; lognormal variance with pedigree 0.3686, pedigree (4,3,5,1,1)
  Estimation 6% of refinery energy use, basic uncertainity = 3 based on literature
  EcoSpold01Location=UCTE
  Uncertainty: Estimation 6% of refinery energy use, basic uncertainity = 3 based on literature
- heat, district or industrial, other than natural gas: 0.224 MJ
  Estimation 6% of refinery energy use, basic uncertainity = 3 based on literature
  properties: heating value, net 1 MJ
- heavy fuel oil, burned in refinery furnace: 0.0768 MJ; lognormal variance with pedigree 0.3686, pedigree (4,3,5,1,1)
  Estimation 6% of refinery energy use, basic uncertainity = 3 based on literature
  EcoSpold01Location=RER
  Uncertainty: Estimation 6% of refinery energy use, basic uncertainity = 3 based on literature
  properties: carbon content, fossil 0.849, dry mass 0.0242718 kg, wet mass 0.0242718 kg
- petrol, unleaded: 1 kg; lognormal variance with pedigree 0.2106, pedigree (5,5,5,5,5)
  Input
  EcoSpold01Location=RER
  Uncertainty: Input
  properties: carbon content, fossil 0.865, dry mass 1 kg, heating value, net 43.2 MJ, wet mass 1 kg
  note on heating value, net: Assumed equal to "petroleum". LHV for petroleum: Based on literature, page 7, Report6, part 4

## Sampling procedure
Literature data with calculations based on refinery models.

## Review by Michael Spielmann (obsolete) 2003-07-04
passed

## Review by Emilia Moreno Ruiz 2018-02-14
Direct activity link to producers added.
