# silicon production, solar grade, modified Siemens process

Dataset: EcoSpold 2, unit process
Geography: RoW
Time period: 2004-01-01 to 2023-12-31
Technology level: current
Classification: ISIC rev.4 ecoinvent: 2011:Manufacture of basic chemicals
Synonyms: Monosilane; Silicone; Silicon tetrahydride; Silicon metal; 7440-21-3; polycrystaline SoG-Silicon
Scenario: Business-as-Usual
System model: Allocation, cut-off by classification
Share of production covered: 75 %
Generated by: [System]
Published in: Jungbluth, N. 2007
Database: ecoinvent
isCopyrightProtected: true
accessRestrictedTo: 1

## General comment
This dataset represents the production of solar-grade silicon for use in the photovoltaic industry. For this use, a purity of >98% is sufficient. The process modeled in this dataset represents a mix of the Siemens process (used for the production of electronic-grade silicon) and a modified Siemens process (developed specifically for the production of solar-grade silicon), with each process having a 50% share. The inventory is based on literature and industry data.
References:
Jungbluth N., Stucki M, and Frischknecht R. (2009) Photovoltaics. In Dones, R. (Ed.) et al., Sachbilanzen von Energiesystemen: Grundlagen für den ökologischen Vergleich von Energiesystemen und den Einbezug von Energiesystemen in Ökobilanzen für die Schweiz. ecoinvent report No. 6-XII, Swiss Centre for Life Cycle Inventories, Dübendorf, CH, 2009.

## Included activities start
The activity starts when the raw materials enter the process.

## Included activities end
This activity ends with the production of high purity polycrystalline silicon from MG-silicon. Only energy use, chemicals and yield are known. Emissions to water are roughly estimated.

## Geography
Data for different types of processes in Europe and North America. The inventory is assumed to be representative of the global production.

## Technology
Production with the Siemens process either from SiHCl3 or SiH4. Partly with standard the Siemens process and partly with the modified Siemens ('solar grade') process, which has a lower electricity consumption. The mix of electricity supply is in accordance with the actual conditions at the considered production locations.
Reference:
Jungbluth N., Stucki M, and Frischknecht R. (2009) Photovoltaics. In Dones, R. (Ed.) et al., Sachbilanzen von Energiesystemen: Grundlagen für den ökologischen Vergleich von Energiesystemen und den Einbezug von Energiesystemen in Ökobilanzen für die Schweiz. ecoinvent report No. 6-XII, Swiss Centre for Life Cycle Inventories, Dübendorf, CH, 2009.

## Time period
Time of investigation.

## Reference product
- silicon, solar grade: 1 kg; name RP; By-product classification allocatable product; CPC 34250: Salts of oxometallic or peroxometallic acids; colloidal precious metals and compounds thereof; inorganic and o[…]; HS2017 2804: Hydrogen, rare gases and other non-metals; CAS 7440-21-3
  Solar grade silicon finds application in the photovoltaic industry.
  References:
  Jungbluth N., Stucki M, and Frischknecht R. (2009) Photovoltaics. In Dones, R. (Ed.) et al., Sachbilanzen von Energiesystemen: Grundlagen für den ökologischen Vergleich von Energiesystemen und den Einbezug von Energiesystemen in Ökobilanzen für die Schweiz. ecoinvent report No. 6-XII, Swiss Centre for Life Cycle Inventories, Dübendorf, CH, 2009.
  production volume 1.159e7 kg; name RP_PV
    ecoinvent v2 report 6_XII
  property price 18.4 EUR2005
    Temporary price data. Calculated as 90% of purchasers price based on: From ecoinvent report, no. 06_XIII, 10, table 5.2, page 32. Based on persomal communication with E. Williams in December 2002.
  properties: carbon allocation 0 kg, carbon content 0, carbon content, fossil 0, carbon content, non-fossil 0, dry mass 1 kg, water content 0, water in wet mass 0 kg, wet mass 1 kg

## Inputs from technosphere
- electricity, high voltage: 0.0916215, 9.9729, 65, 1.51119, 29.8288, 0.458521, 3.11707, 0.0199319 kWh (8 suppliers, which the file names only by identifier); sum of these 110 kWh; lognormal variance with pedigree 0.0432, pedigree (2,3,5,5,1)
  Literature, actual sources of electricity can vary with considered production location
  Uncertainty: l
- heat, district or industrial, natural gas: 2.99088, 182.009 MJ (2 suppliers, which the file names only by identifier); sum of these 185 MJ; lognormal variance with pedigree 0.0432, pedigree (2,3,5,5,1)
  Literature, for process heat
  Uncertainty: l
  properties: heating value, net 1 MJ
- hydrochloric acid, without water, in 30% solution state: 1.6017 kg; lognormal variance with pedigree 0.0446, pedigree (3,3,5,5,1)
  De Wild 2007, share of NaOH, HCl and H2 estimated with EG-Si data
  Uncertainty: d
  properties: dry mass 1 kg, heating value, net 3.32 MJ, wet mass 1 kg
- hydrogen, gaseous, medium pressure, merchant: 0.0307997, 0.0193393 kg (2 suppliers, which the file names only by identifier); sum of these 0.050139 kg; lognormal variance with pedigree 0.0446, pedigree (3,3,5,5,1)
  De Wild 2007, share of NaOH, HCl and H2 estimated with EG-Si data
  Uncertainty: d
  properties: dry mass 1 kg, heating value, net 120.21 MJ, wet mass 1 kg
- silicon, metallurgical grade: 1.13 kg; lognormal variance with pedigree 0.0432, pedigree (2,3,5,5,1)
  Literature
  Uncertainty: L
  properties: dry mass 1 kg, wet mass 1 kg
- silicone factory: 1e-11 unit; lognormal variance with pedigree 0.3606, pedigree (1,3,5,5,3)
  Estimation
  Uncertainty: E
- sodium hydroxide, without water, in 50% solution state: 0.34819 kg; lognormal variance with pedigree 0.0446, pedigree (3,3,5,5,1)
  De Wild 2007, share of NaOH, HCl and H2 estimated with EG-Si data
  Uncertainty: d
  properties: dry mass 1 kg, heating value, net 3.03 MJ, wet mass 1 kg

## Emissions to nature
- AOX, Adsorbable Organic Halides [water, surface water]: 1.2619e-5 kg; lognormal variance with pedigree 0.1001, pedigree (1,2,5,5,3)
  Environmental report 2002, average Si product
  Uncertainty: E
- BOD5, Biological Oxygen Demand [water, surface water]: 0.00020471 kg; lognormal variance with pedigree 0.1001, pedigree (1,2,5,5,3)
  Environmental report 2002, average Si product
  Uncertainty: E
- COD, Chemical Oxygen Demand [water, surface water]: 0.00202 kg; lognormal variance with pedigree 0.1001, pedigree (1,2,5,5,3)
  Environmental report 2002, average Si product
  Uncertainty: E
- Chloride [water, surface water]: 0.035991 kg; lognormal variance with pedigree 0.3601, pedigree (1,2,5,5,3)
  Environmental report 2002, average Si product
  Uncertainty: E
- Copper ion [water, surface water]: 1.0236e-7 kg; lognormal variance with pedigree 0.7001, pedigree (1,2,5,5,3)
  Environmental report 2002, average Si product
  Uncertainty: E
- DOC, Dissolved Organic Carbon [water, surface water]: 0.00090998 kg; lognormal variance with pedigree 0.092, pedigree (3,5,5,5,1)
  Extrapolation for sum parameter
  Uncertainty: E
- Iron ion [water, surface water]: 5.6085e-6 kg; lognormal variance with pedigree 0.7001, pedigree (1,2,5,5,3)
  Environmental report 2002, average Si product
  Uncertainty: E
- Nitrogen [water, surface water]: 0.00020751 kg; lognormal variance with pedigree 0.1001, pedigree (1,2,5,5,3)
  Environmental report 2002, average Si product
  Uncertainty: E
- Phosphate [water, surface water]: 2.8043e-6 kg; lognormal variance with pedigree 0.1001, pedigree (1,2,5,5,3)
  Environmental report 2002, average Si product
  Uncertainty: E
- Sodium I [water, surface water]: 0.03379 kg; lognormal variance with pedigree 0.1001, pedigree (1,2,5,5,3)
  Environmental report 2002, average Si product
  Uncertainty: E
- TOC, Total Organic Carbon [water, surface water]: 0.00090998 kg; lognormal variance with pedigree 0.1001, pedigree (1,2,5,5,3)
  Environmental report 2002, average Si product
  Uncertainty: E
- Zinc II [water, surface water]: 1.963e-6 kg; lognormal variance with pedigree 0.7001, pedigree (1,2,5,5,3)
  Environmental report 2002, average Si product
  Uncertainty: E

## Sampling procedure
Average of data from one company and estimated data from another company based on literature data.

## Extrapolations
Emissions to water are estimated with values taken from the MG-silicon purification to EG-silicon with a similar type of process. This dataset has been copied from an original dataset covering the geography RER. The uncertainty has been adjusted accordingly.

## Review by Gregor Wernet 2017-08-04
This dataset was additionally reviewed in a separate review process by Eric Johnson of Atlantic Consulting as well as Emilia Moreno Ruiz and Gregor Wernet of ecoinvent.
