# gold refinery operation

Dataset: EcoSpold 2, unit process
Geography: ZA
Time period: 2017-01-01 to 2023-12-31
Technology level: current
Classification: ISIC rev.4 ecoinvent: 0729:Mining of other non-ferrous metal ores
Scenario: Business-as-Usual
System model: Allocation, cut-off by classification
Share of production covered: 100 %
Generated by: Russo
Published in: Charikinya E. 2017
Database: ecoinvent
isCopyrightProtected: true
accessRestrictedTo: 1

## General comment
This dataset describe the refinery of gold. Unrefined gold (85% gold) is upgraded to the London Good Delivery Standard (99.5% gold). A small percentage is further upgrade to the Jewellery standard (99.8% gold).

## Included activities start
The activity starts with the unrefined gold being transported from both South African and non South African mines. Some gold is also recovered from scrap metals as secondary refinery, as well as retreatment of sulfidic tailings. The activity includes the transport of unrefined gold from both the mining, concentration and extraction plants and retreatment plants to the refinery within South Africa. More it accounts also for imports from other gold producer countries in Africa and in the rest of the world (Far and Middle East, Australia and North America). Transport with ZA is done maily: airfreight (helicopter) - all local mine including SA Mint: 94% of all local gold processed; road transport - secondary depositor: this constitutes the 6% of all local gold processed.

## Included activities end
The activity end with the refined gold sold both to the export and local market.

## Geography
Rand Refinery (Pty) Limited is the largest integrated single-site precious metals refining and smelting complex in the world. Rand Refinery is the refining hub for Africa and increasingly beyond. It was established in 1920 to refine gold within South Africa which until that time had been refined in London. Since its inception it has refined nearly 50,000 tonnes of gold. This represents some 30% of all the gold mined in the world since antiquity. Figure below provide the overview top gold producer globally (source: www.focus-economics.org).

## Technology
REFINING: The refinery, which provides a same day refining service, employs the widely used Miller Chlorination Process to upgrade the gold bullion it receives from mines to at least 99.50% fine gold, the minimum standard required for gold sold on the world bullion markets. It also employs the world’s leading silver refining technology. To further refine gold and silver to 99.99% the cost-effective once-through Wohlwill electrolytic refining process is used.
MILLER CHLORINATION PROCESS: This is a pyrometallurgical process whereby gold dore is heated in furnace crucibles. The process is able to separate gold from impurities by using chlorine gas which is added to the crucibles once the gold is molten. Chlorine gas does not react with gold but will combine with silver and base metals to form chlorides. Once the chlorides have formed they float to the surface as slag or escape as volatile gases. The surface melt and the fumes containing the impurities are collected and further refined to extract the gold and silver.
This process can take up to 90 minutes produces gold which is at least 99.5% pure with silver being the main remaining component. This gold can be cast into bars as 99.5% gold purity meets the minimum London Good Delivery. However some customers such as jewellers and other industrial end users require gold that is almost 100% pure, so further refining is necessary. In this case, gold using the Miller process is cast into anodes which are then sent to an electrolytic plant. The final product is 99.99% pure gold sponge that can then be melted to produce various end products suited to the needs of the customer.
WOHLWILL PROCESS - The electrolytic method of gold refining was first developed by Dr. Emil Wohlwill of Norddeutsche Affinerie in Hamburg in 1874. Dr. Wohlwill’s process is based on the solubility of gold but the insolubility of silver in an electrolyte solution of gold chloride (AuCl3) in hydrochloric acid. Figure below provide the overview of the refining process (source Rand Refinery Brochure)
Emissions includes also HCl to air: 7.48e-03 Calculated from rand refinery scrubber and baghouse emmission values Metal concentrators, Emmision report 2016 http://www.environmentalconsultants.co.za/wp-content/uploads/2016/11/Appendix-D1.pdf

## Parameters
- fraction, process water, to air: 0.15 dimensionless; name fraction_PW_to_air; lognormal variance with pedigree 0.092025, pedigree (4,4,3,2,4)
  Literature value. In case when no industry/process specific data are available, default evaporation fraction value is used. This value is 15% and is based on literature (Statistics Canada, 2007 & Shaffer, K.H., 2008, Consumptive water use in the Great Lakes Basin, USGS & Shiklomanov, 2003, World Water Resources at the Beginning of the 21st Century) and has been approved by an expert.
- water used in primary activity: 0.10522 m3; name totWaterPA; = potable_water_input/1000
  water input to the process, from Rand water treatment plant

## Reference product
- gold: 1 kg; name RP_amount_1; = (1-0.0051107)+0.0051107; By-product classification allocatable product; CPC 41320: Gold (including gold plated with platinum), unwrought or in semi-manufactured forms, or in powder form; HS2017 710812: Metals; gold, non-monetary, unwrought (but not powder); CAS 7440-57-5
  Gold for the London exchange and killo bars for China and Indian market (min grade 99.5%) and Gold sold locally to Jewellers (min grade 99.8%). Values obtained from personal communication with Rand refinery and from Randy Refinery Corporate Brochure 2017 and Integrated Report 2017.
  production volume 295000 kg; name APV_glod; = 293500+1500
    (same comment as for gold)
  property gold content 0.995015; = (1-0.0051107)*0.995+0.0051107*0.998
    gold content on a dry matter basis
  property price 25128.4 EUR2005
    Price calculated as 5-year market average (2015-2019; USD/kg; USGS [2020]) and converted to EUR2005 (USD2019/EUR2005 exchange rate: 0.62; Official Data Foundation [2020] and Macrotrends [2020]).
    References:
    Official Data Foundation (2020). Inflation Calculator [Online]. Available from: https://www.officialdata.org/us/inflation/2005?endYear=2019&amount=1 [Accessed 28/07/2020]
    USGS (2020). Mineral Commodity Summaries 2020 [Online]. Available from: https://pubs.usgs.gov/periodicals/mcs2020/mcs2020.pdf [Accessed 28/07/2020]
    Macrotrends (2020). Euro Dollar Exchange Rate (EUR USD) - Historical Chart [Online]. Available from: https://www.macrotrends.net/2548/euro-dollar-exchange-rate-historical-chart [Accessed 28/07/2020]
  properties: carbon allocation 0 kg, carbon content 0, carbon content, fossil 0, carbon content, non-fossil 0, dry mass 1 kg, water content 0, water in wet mass 0 kg, wet mass 1 kg

## Inputs from technosphere
- chlorine, liquid: 0.171244 kg; lognormal variance with pedigree 0.0046, pedigree (2,4,3,1,1)
  Chlorine Gas consumption at 4.83g/oz. Rand refinery intergrated reports 2017
  properties: dry mass 1 kg, wet mass 1 kg
- diesel, burned in building machine: 1.3569 MJ; lognormal variance with pedigree 0.0046, pedigree (2,4,3,1,1)
  Diesel used to operate machinery and to shutdown plant during power outage. Values obtained from personal communication with Rand refinery in m3 and converte do MJ (diesel density 885kg/m3 and calorific value 45 MJ/kg).
  properties: heating value, net 1 MJ
- electricity, medium voltage: 71.6 kWh; lognormal variance with pedigree 0.0046, pedigree (2,4,3,1,1)
  Electricity consumption at 2.0279kWh/oz . This value depends on grade of gold delivered for refining. Rand refinery intergrated reports 2017
- gold, unrefined: 0.602606 kg; = ((1.2-0.0052129)/2)+0.0052129; lognormal variance with pedigree 0.0027, pedigree (2,2,3,1,1)
  Unrefined gold (85% pure); synonims are gold dore, crude gold. Dore refers to an unrefined (therefore impure) alloy of gold with variable quantities of silver and smaller quantities of base metals, which is produced at a mine berfore passing on to a refinery for upgrading toLondon Good Delivery Standard. It accounts for unrefined gold coming from outside South Africa.
  The original dataset included a minor input (0.0052129 kg) of scrap gold. However, due to a lack of such a product in the database, this exchange has not been included; instead, the amount has been added to this exchange (gold, unrefined) to ensure mass balance.
  properties: dry mass 1 kg, gold content 0.85, wet mass 1 kg
- gold, unrefined: 0.0483889 kg; = ((1.2-0.0052129)/2)*0.081; lognormal variance with pedigree 0.0027, pedigree (2,2,3,1,1)
  Unrefined gold (85% pure); synonims are gold dore, crude gold. Dore refers to an unrefined (therefore impure) alloy of gold with variable quantities of silver and smaller quantities of base metals, which is produced at a mine berfore passing on to a refinery for upgrading toLondon Good Delivery Standard. It accounts for the share (8%) of Unrefined Gold from retreatment of sulfidic tailings to be sent to SA for refining.
- gold, unrefined: 0.549005 kg; = ((1.2-0.0052129)/2)*0.919; lognormal variance with pedigree 0.0046, pedigree (2,4,3,1,1)
  Unrefined gold (85% pure); synonyms are gold dore and crude gold. Dore refers to an unrefined (therefore impure) alloy of gold with variable quantities of silver and smaller quantities of base metals, which is produced at a mine berfore passing on to a refinery for upgrading to London Good Delivery Standard. It accounts for the share (8%) of Unrefined Gold from retreatment of sulfidica tailings to be sent to SA for refining. It accounts for the share (92%) of Unrefined Gold from underground mining to be sent to SA for refining.
- nickel smelter slag: -0.199973 kg; name ByP_01; lognormal variance with pedigree 0.0026, pedigree (2,4,1,1,1)
  This is used to represents the gold smelter slag. A nre property gold content has been addedd in the exchange properties to correclty represent the composition of the slag. Annual average. Values obtained from personal communication with Rand refinery and from Randy Refinery Corporate Brochure 2017 and Integrated Report 2017.
  production volume; = APV_glod *ByP_01
    Calculated from production volume of reference product using the relative outputs.
  property gold content 0.0151856; name ByP_01_Au_content; = 1-(1-0.0051107)*0.995+0.0051107*0.998
  properties: carbon content, fossil 0.00345, dry mass 1 kg, wet mass 1 kg
- precious metal refinery: 1.64609e-7 unit; = 1/(25*243000); lognormal variance with pedigree 0.21, pedigree (5,5,5,5,5)
  infrastructure from ecoinvent dataset
- tap water: 105.22 kg; name potable_water_input; lognormal variance with pedigree 0.0046, pedigree (2,4,3,1,1)
  Water from Rand water treatment plant. Reported as 2.986Litres/oz. Rand refinery intergrated reports 2017.
  properties: carbon content, fossil 0.00178991, dry mass 0.000337476 kg, water content 2962.17, wet mass 1 kg
  note on carbon content, fossil: Bicarbonate content is 2.93 mol/m3. CO2 content is 0.1 mol/m3 (ecoinvent v2.2 report 8, Tab 93.1).
- transport, freight, aircraft, unspecified: 4.1011 metric ton*km; lognormal variance with pedigree 0.0026, pedigree (2,1,3,1,1)
  This represent the Unrefined Gold coming from both from Soutu africa and from outside africa: West and East Centra africa, Far East Asia, Middle East, Australia and North America. Data on trasport distances from Chamber of Mines of South Africa (2017) Facts and Figure (2016), and data on share was obtained with personal communication with Rand Refinery.
- transport, freight, lorry, unspecified: 0.00645 metric ton*km; lognormal variance with pedigree 0.0026, pedigree (2,1,3,1,1)
  Average transport distance in Witwatersrand basin is of 215 km from mining sites to the refinery plant and is mainly road transport. This represents secondary depositor and constitutes the 6% of all local gold processed. Data on trasport distances from Chamber of Mines of South Africa (2017) Facts and Figure (2016), and data on share was obtained with personal communication with Rand Refinery.
- wastewater, unpolluted: -0.000477 m3; name effluent; lognormal variance with pedigree 0.0027, pedigree (3,2,1,1,2)
  Average value (2008-2012) obtained from Rand refinery intergrated reports 2008 to 2012. This represent the effluent discharged after being treated to meet the National Limits as per South African Water Quality Guidelines http://www.dwa.gov.za/iwqs/wq_guide/Pol_saWQguideFRESHAquaticecosystemsvol7.pdf
  production volume; = APV_glod * (effluent / RP_amount_1)
    Calculated from production volume of reference product using the relative outputs.
  properties: carbon content, fossil 0.00178991, carbon content, non-fossil 0.00178991, dry mass 0.337476 kg, water content 2962.17, wet mass 1000 kg
  note on carbon content, fossil: Assumed to be like in tap water. Bicarbonate content is 2.93 mol/m3. CO2 content is 0.1 mol/m3 (ecoinvent v2.2 report 8, Tab 93.1).

## Emissions to nature
- Ammonia [air, non-urban air or from high stacks]: 0.00137 kg; lognormal variance with pedigree 0.0027, pedigree (2,2,3,1,1)
  Calculated from rand refinery scrubber and baghouse emmission values Metal concentrators, Emmision report 2016 http://www.environmentalconsultants.co.za/wp-content/uploads/2016/11/Appendix-D1.pdf
- Arsenic ion [air, non-urban air or from high stacks]: 7.63e-6 kg; lognormal variance with pedigree 0.0048, pedigree (3,2,3,3,2)
  Calculated based on EU metal mining air emmisions Best Available Techniques Reference http://eippcb.jrc.ec.europa.eu/reference/
- Cadmium II [air, non-urban air or from high stacks]: 7.63e-6 kg; lognormal variance with pedigree 0.0048, pedigree (3,2,3,3,2)
  (same comment as for Arsenic ion)
- Chlorine [air, non-urban air or from high stacks]: 0.0016 kg; lognormal variance with pedigree 0.0027, pedigree (2,2,3,1,1)
  (same comment as for Ammonia)
- Iron ion [air, non-urban air or from high stacks]: 2.29e-5 kg; lognormal variance with pedigree 0.0048, pedigree (3,2,3,3,2)
  (same comment as for Arsenic ion)
- Lead II [air, non-urban air or from high stacks]: 1.53e-5 kg; lognormal variance with pedigree 0.0048, pedigree (3,2,3,3,2)
  (same comment as for Arsenic ion)
- Nickel II [air, non-urban air or from high stacks]: 7.63e-6 kg; lognormal variance with pedigree 0.0048, pedigree (3,2,3,3,2)
  (same comment as for Arsenic ion)
- Nitrogen oxides [air, non-urban air or from high stacks]: 0.0496 kg; lognormal variance with pedigree 0.0027, pedigree (2,2,3,1,1)
  (same comment as for Ammonia)
- Particulate Matter, < 2.5 um [air, non-urban air or from high stacks]: 0.00183 kg; lognormal variance with pedigree 0.0027, pedigree (2,2,3,1,1)
  (same comment as for Ammonia)
- Radioactive species, other beta emitters [air, unspecified]: 2.0443e-6 kBq; lognormal variance with pedigree 0.0046, pedigree (2,4,3,1,1)
  2017 value reported in Intergarted report; ti was given in mSv and it has converted to the corresponding value in kBq. Rand refinery intergrated reports 2017.
- Sulfur dioxide [air, non-urban air or from high stacks]: 0.00221 kg; lognormal variance with pedigree 0.0027, pedigree (2,2,3,1,1)
  (same comment as for Ammonia)
- Water [air, non-urban air or from high stacks]: 0.015783 m3; = fraction_PW_to_air*totWaterPA; lognormal variance with pedigree 0.090025, pedigree (4,4,5,2,4)
  water losses to air
- Zinc II [air, non-urban air or from high stacks]: 0.000229 kg; lognormal variance with pedigree 0.0048, pedigree (3,2,3,3,2)
  (same comment as for Arsenic ion)
- Arsenic ion [water, surface water]: 2.39e-7 kg; lognormal variance with pedigree 0.0047, pedigree (3,2,3,1,2)
  Calculated based on Authorized levels of deleterious substances prescribed in South African Water Quality Guidelines http://www.dwa.gov.za/iwqs/wq_guide/Pol_saWQguideFRESHAquaticecosystemsvol7.pdf
- BOD5, Biological Oxygen Demand [water, surface water]: 9.54e-7 kg; lognormal variance with pedigree 0.0048, pedigree (3,2,3,3,2)
  Calculated based on EU metal mining liquid effluent regulations and guidelines for mining Best Available Techniques Reference http://eippcb.jrc.ec.europa.eu/reference/
- COD, Chemical Oxygen Demand [water, surface water]: 1.53e-5 kg; lognormal variance with pedigree 0.0048, pedigree (3,2,3,3,2)
  (same comment as for BOD5, Biological Oxygen Demand)
- Cadmium II [water, surface water]: 4.77e-7 kg; lognormal variance with pedigree 0.0048, pedigree (3,2,3,3,2)
  (same comment as for BOD5, Biological Oxygen Demand)
- Chromium III [water, surface water]: 2.86e-9 kg; lognormal variance with pedigree 0.0048, pedigree (3,2,3,3,2)
  (same comment as for BOD5, Biological Oxygen Demand)
- Copper ion [water, surface water]: 1.43e-7 kg; lognormal variance with pedigree 0.0047, pedigree (3,2,3,1,2)
  (same comment as for Arsenic ion)
- DOC, Dissolved Organic Carbon [water, surface water]: 1.98e-6 kg; lognormal variance with pedigree 0.0047, pedigree (3,2,3,1,2)
  (same comment as for Arsenic ion)
- Dissolved solids [water, surface water]: 3.34e-6 kg; lognormal variance with pedigree 0.0048, pedigree (3,2,3,3,2)
  (same comment as for BOD5, Biological Oxygen Demand)
- Iron ion [water, surface water]: 1.43e-7 kg; lognormal variance with pedigree 0.0048, pedigree (3,2,3,3,2)
  (same comment as for BOD5, Biological Oxygen Demand)
- Lead II [water, surface water]: 9.54e-8 kg; lognormal variance with pedigree 0.0047, pedigree (3,2,3,1,2)
  (same comment as for Arsenic ion)
- Manganese II [water, surface water]: 4.77e-8 kg; lognormal variance with pedigree 0.0048, pedigree (3,2,3,3,2)
  (same comment as for BOD5, Biological Oxygen Demand)
- Mercury II [water, surface water]: 1.43e-7 kg; lognormal variance with pedigree 0.0048, pedigree (3,2,3,3,2)
  (same comment as for BOD5, Biological Oxygen Demand)
- Nickel II [water, surface water]: 2.39e-7 kg; lognormal variance with pedigree 0.0047, pedigree (3,2,3,1,2)
  (same comment as for Arsenic ion)
- Nitrogen, organic bound [water, surface water]: 1.09e-5 kg; lognormal variance with pedigree 0.0047, pedigree (3,2,3,1,2)
  (same comment as for Arsenic ion)
- Sulfate [water, surface water]: 3.82e-7 kg; lognormal variance with pedigree 0.0067, pedigree (3,2,3,5,2)
  (same comment as for BOD5, Biological Oxygen Demand)
- TOC, Total Organic Carbon [water, surface water]: 1.98e-6 kg; lognormal variance with pedigree 0.0048, pedigree (3,2,3,3,2)
  (same comment as for BOD5, Biological Oxygen Demand)
- Water [water, surface water]: 0.08896 m3; = ((1-fraction_PW_to_air)*totWaterPA)-effluent; lognormal variance with pedigree 0.090025, pedigree (4,4,5,2,4)
  water losses to surface water
- Zinc II [water, surface water]: 2.39e-7 kg; lognormal variance with pedigree 0.0047, pedigree (3,2,3,1,2)
  (same comment as for Arsenic ion)

## Sampling procedure
Randy Refinery integrated report 2017 and private communication.

## Extrapolations
Randy Refinery integrated report 2017 and private communication. Values obtained from personal communication with Rand refinery and from Randy Refinery Corporate Brochure 2017. Emissions were calculated using the following references: Air Emission calculated from rand refinery scrubber and baghouse emmission values Metal concentrators, Emmision report 2016 http://www.environmentalconsultants.co.za/wp-content/uploads/2016/11/Appendix-D1.pdf or calculated based on EU metal mining air emmisions Best Available Techniques Reference http://eippcb.jrc.ec.europa.eu/reference/ Water emission calculated based on Authorized levels of deleterious substances prescribed in South African Water Quality Guidelines http://www.dwa.gov.za/iwqs/wq_guide/Pol_saWQguideFRESHAquaticecosystemsvol7.pdf or calculated based on EU metal mining liquid effluent regulations and guidelines for mining Best Available Techniques Reference http://eippcb.jrc.ec.europa.eu/reference/ Data on transport distances were taken from Chamber of Mines of South Africa (2017) Fact and Figure (2016), and data on shares of the production and transport were obtained from personal communnication wih Rand Refinery.
