# boron carbide production

Dataset: EcoSpold 2, unit process
Geography: GLO
Time period: 2000-01-01 to 2023-12-31
Technology level: current
Classification: EcoSpold01Categories: chemicals/inorganics
Classification: ISIC rev.4 ecoinvent: 2011:Manufacture of basic chemicals
Synonyms: black diamond; tetrabor
Tags: ConvertedDataset
Scenario: Business-as-Usual
System model: Allocation, cut-off by classification
Share of production covered: 100 %
Generated by: Jürgen Sutter
Published in: Sutter, J. 2007
Database: ecoinvent
isCopyrightProtected: true
accessRestrictedTo: 1

## General comment
This dataset represents the production of 1 kg boron carbide, at plant, global. The production of boron carbide by means of the reduction of boric oxide is considered. All data in the present report are referred to 1 kg boron carbide 100%. The system includes the process with consumption of raw materials, energy, infrastructure and land use as well as the generation of emissions to air. As no process water is used no emissions to water are assumed.It also includes transportation of the raw materials. Transient or unstable operations like starting-up or shutting-down, are not included, but the production during stable operation conditions. Storage and transportation of the final product are also not included. It is assumed that the manufacturing plants are located in an urban/industrial area and consequently the emissions are categorised as emanating in a high population density area. The emissions into water are assumed to be emitted into rivers.
[This dataset was already contained in the ecoinvent database version 2. It was not individually updated during the transfer to ecoinvent version 3. Life Cycle Impact Assessment results may still have changed, as they are affected by changes in the supply chain, i.e. in other datasets. This dataset was generated following the ecoinvent quality guidelines for version 2. It may have been subject to central changes described in the ecoinvent version 3 change report (http://www.ecoinvent.org/database/ecoinvent-version-3/reports-of-changes/), and the results of the central updates were reviewed extensively. The changes added e.g. consistent water flows and other information throughout the database. The documentation of this dataset can be found in the ecoinvent reports of version 2, which are still available via the ecoinvent website. The change report linked above covers all central changes that were made during the conversion process.]

## Included activities start
From the reception of a mixture of boric oxide and carbon at the factory gate.

## Included activities end
This activity ends with the production of boron carbide including materials, energy uses, infrastructure and emissions.

## Geography
The inventory is modelled for the world.

## Technology
The most common method for large-scale production of boron carbide is carbothermic reduction of boric oxide, and this is the method considered in this dataset.
The process is so strongly endothermic, 1812 kJ/mol or 9.1 kWh/kg, that it is usually carried out at 1500 – 2500 °C in an electric furnace. Either arc furnaces or resistance furnaces, analogous to Acheson furnaces for SiC, are used. The starting material is an intimate mixture of boric oxide and carbon, e.g., petroleum coke or graphite. Large quantities of carbon monoxide, 2.3 m3/kg, are generated, and boron can be lost by evaporation of B2O3 at the high temperatures. In the electrothermic process used by ESK, a subsidiary of Wacker Chemie, the product is cooled, and the unconverted outer-zone material is removed to leave a fused coarse-grained boron carbide of high purity: B plus C ≥ 99 wt %, total metal impurity ≤ 0.2 wt %, N plus O ≤ 0.3 wt %, B : C mole ratio of 4.0 – 4.3. This boron carbide is obtained in the form of regular blocks, which are broken up and milled to produce the B4C grain size appropriate for final use.
If the carbothermic reduction is carried out below the melting point of B4C, e.g., at 1600 – 1800 °C, in a vented graphite tube furnace starting from a dehydrated mixture of H3BO3, acetylene black or sugar, and ethylene glycol, very fine-grained (0.5 – 5 µm), stoichiometric B4C powders are produced, although productivity is low.
Uniformly sized submicrometer powders of boron carbide (specific surface area 20–35 m2/g) can be synthesized continuously by rapid carbothermic reduction (RCR) of boron oxide in a graphite transport reactor at ca. 2000°C.
Baudis, U., Fichte, R.: Boron and Boron Alloys. Published online: 2000. In: Ullmann's Encyclopedia of Industrial Chemistry, Seventh Edition, 2004 Electronic Release (ed. Fiedler E., Grossmann G., Kersebohm D., Weiss G. and Witte C.). 7 th Electronic Release Edition. Wiley InterScience, New York, Online-Version under: http://www.mrw.interscience.wiley.com/emrw/9783527306732/home

## Time period
Time of publications

## Parameters
- fraction, cooling water, cooling pond system, to air: 0.032 dimensionless; name fraction_CW_CP_to_air; lognormal variance with pedigree 0.0413, pedigree (2,3,1,3,1)
  Calculated based on literature value (Scown, C.D., 2011, Water Footprint of U.S. Transportation Fuels and supplying information of the article) (Vionnet, S., Quantis Water Database - Technical Report, 2012).
- fraction, cooling water, once-through system, to air: 0.004 dimensionless; name fraction_CW_OT_to_air; lognormal variance with pedigree 0.0413, pedigree (2,3,1,3,1)
  (same comment as for fraction, cooling water, cooling pond system, to air)
- fraction, cooling water, recirculating system, to air: 0.771 dimensionless; name fraction_CW_R_to_air; lognormal variance with pedigree 0.0413, pedigree (2,3,1,3,1)
  (same comment as for fraction, cooling water, cooling pond system, to air)
- fraction, cooling water, to air: 0.3875 dimensionless; name fraction_CW_to_air; = (0.5*fraction_CW_OT_to_air)+(0.5*fraction_CW_R_to_air); lognormal variance with pedigree 0.092025, pedigree (4,4,3,2,4)
  Calculated value based on literature value (see comments of the other parametres present in this dataset) and expert opinion. In the case when no industry/literature data are available about the type of cooling or directly fraction, cooling water, to air specific for the process a default assumption is applied. It is assumed that the once-through cooling system is used in 50% of all cases and recirculating system is used in another 50% of all cases.

## Reference product
- boron carbide: 1 kg; By-product classification allocatable product; CPC 34280: Hydrogen peroxide; phosphides; carbides; hydrides, nitrides, azides, silicides and borides; HS2017 284990: Carbides; whether or not chemically defined, other than of calcium or silicon; CAS 12069-32-8
  Boron carbide is an exceedingly hard material, inferior in hardness only to diamond and cubic boron nitride. Boron carbide crystals are deep black and shiny. The crystals melt congruently. The density of B4C having the natural isotopic composition is 2.52 g/cm3; 10B4C is less dense, 2.37 g/cm3. Boron carbide belongs to the important group of nonmetallic hard materials, which includes alumina, silicon carbide, and diamond. The composition of commercial boron carbide is usually close to a boron : carbon stoichiometry of 4 : 1, the stoichiometric limit on the high-carbon side.
  Uses Based on Hardness
  The major industrial use of boron carbide is as abrasive grit or powder. Commercial grits are available in particle sizes from 1 µm to 10000 µm and predominantly used as polishing, lapping, and grinding media for hard materials, especially cemented tungsten carbide and fine ceramics. Water and commercial oils serve as lubricant and coolant. Available as a substitute for loose powders is B4C paste, which can withstand temperatures up to 350 °C.
  The second category is wear-resistant engineering components made of dense, sintered shapes. Boron carbide sand-blasting nozzles are now the most common form of such a component. These nozzles are characterized by minimum wear, even with corundum or silicon carbide grit. Sintered-B4C wheel dressing sticks are used to produce new cutting edges on surface grains of grinding wheels with minimum wear. So-called hand laps are used to render the cutting edges of cemented carbide tools keen and smooth. Mortars and pestles of boron carbide are suitable for grinding hard materials without contamination from the grinding equipment.
  Uses in Nuclear Technology
  Boron carbide is both cheaper and easier to fabricate than the element boron itself. As a result it has found almost exclusive usage as a control rod material, neutron poison, and a neutron shielding material.
  Chemical Uses
  Boron carbide powder is used to introduce boron into the surface layer of steels and other ferrous materials.
  Its high boron content makes B4C useful as a raw material for the production of other boron compounds, including the boron halides and metal borides. Much of the BCl3 made commercially is used in the production of boron filament for reinforcement of metals and plastics.
  Uses in Refractories
  In carbon-bonded refractories, B4C powder is used as an antioxidant. Small additions of B4C to the refractory material reduce the burn out of the carbon and improve the corrosion resistance against slags and steel melts. A simultaneous addition of B4C and a metallic antioxidant results in better oxidation resistance of the refractories than the addition of B4C or the metallic antioxidant alone. The effect depends on the oxidation of the antioxidants and reaction with the oxides of the refractory material, which creates oxidic phases and gaseous components. Both prevent the infiltration of molten slag or steel, and the oxide phases protect the carbon against oxidation by forming a protective oxidic layer at the hot face of the refractory.
  Uses in Metal Matrix Composites
  Metal matrix composites (MMCs) made of B4C and Al or Al-alloy have a higher stiffness, strength and hardness and lower weight than the metal itself. The content of B4C in the MMCs is up to 50 wt %. This material could be used to produce magnetic disks for hard disk drives, automotive components, sports goods, etc.
  Other Uses
  The thermoelectric properties of B13C2 are such that B13C2 could be an interesting material for high-temperature thermoelectric conversion. Thermoelements made of the couple B4C - C can be used for temperature measurements up to 2300 °C.
  EcoSpold01Location=GLO
  production volume 1 kg
    Unknown
    Dummy value to be replaced by measured, estimated or calculated value
  property heating value, net 6.59 MJ
    LHV is calculated based on the elemental composition of the substance. Based on the CAS number of the substance (012069-32-8), the chemical formula of the substance is found to be: CB4, (PubChem 2020).
    Reference: Kim, S., Chen, J., Cheng, T., Gindulyte, A., He, J., He, S., Li, Q., Shoemaker, B. A., Thiessen, P. A., Yu, B., Zaslavsky, L., Zhang, J., & Bolton, E. E. (2019). PubChem 2019 update: improved access to chemical data. Nucleic acids research, 47(D1), D1102–D1109. https://doi.org/10.1093/nar/gky1033
  property price 20.97 EUR2005
    Calculated value based on data from United Nations Commodity Trade Statistics Database (comtrade.un.org). UN comtrade category: 284990 Carbides except calcium and silicon. Year 2005. Using exchange rate of 1EURO = 1.209 USD. Average of price of import into 5 main markets (EU, US, JP, IN and CN).
  properties: carbon allocation 0.813559 kg, carbon content 0.813559, carbon content, fossil 0.813559, carbon content, non-fossil 0, dry mass 1 kg, water content 0, water in wet mass 0 kg, wet mass 1 kg

## Inputs from technosphere
- boric oxide: 2.4978 kg; source Baudis, U 2004; lognormal variance with pedigree 0.076, pedigree (4,5,5,1,1)
  EcoSpold01Location=GLO
  Stoichiometric calculation. As there was no data available for the production of boron carbide, the values for the consumption of the raw materials are calculated with an assumed yield of 95 %.
  Uncertainty: Stoechiometric calculation
  properties: dry mass 1 kg, wet mass 1 kg
- chemical factory, organics: 4e-10 unit; lognormal variance with pedigree 0.3846, pedigree (2,4,5,5,4)
  EcoSpold01Location=RER
  Calculated based on literature data published by the industry. For this activity, no information was readily available concerning infrastructure and land-use. Therefore, the infrastructure is estimated based on data from two chemical factories, the BASF site of Ludwigshafen and the chemical factory in Gendorf (which are both located in Germany), which produce a wide range of chemical substances. Based on this data, the following assumptions are made: the built area amounts to about 4.2 ha, the plant has an average output of 50'000 t/a and a lifespan of fifty years. The estimated infrastructure amount is therefore 4.00 E-10 units per kg of produced chemical.
  References:
  Althaus H.-J., Chudacoff M., Hischier R., Jungbluth N., Osses M. and Primas A. (2007) Life Cycle Inventories of Chemicals. ecoinvent report No. 8, v2.0. EMPA Dübendorf, Swiss Centre for Life Cycle Inventories, Dübendorf, CH.
  Gendorf (2000) Umwelterklärung 2000, Werk Gendorf. Werk Gendorf, Burgkirchen.
  Uncertainty: Estimation
- coke: 0.480032, 1.01867 MJ (2 suppliers, which the file names only by identifier); sum of these 1.4987 MJ; source Baudis, U 2004; lognormal variance with pedigree 0.076, pedigree (4,5,5,1,1)
  Stoichiometric calculation. As there was no data available for the production of boron carbide, the values for the consumption of the raw materials are calculated with an assumed yield of 100 %
  EcoSpold01Location=GLO
  Uncertainty: Stoechiometric calculation
  properties: carbon content, fossil 0.869149, dry mass 0.0328671 kg, heating value, net 28.6 MJ, water content 0.0638298, wet mass 0.034965 kg
  note on carbon content, fossil: 81.7% C and 6% water in wet mass (ecoinvent v2.1 report 6_VI Table 7.1)
- electricity, medium voltage: 9.1 kWh; source Baudis, U 2004; lognormal variance with pedigree 0.04, pedigree (1,1,5,1,1)
  EcoSpold01Location=UCTE
  Literature value
  Uncertainty: Ullmann 2005
- inert waste, for final disposal: -0.198528, -0.00129247 kg (2 suppliers, which the file names only by identifier); sum of these -0.19982 kg; lognormal variance with pedigree 0.036, pedigree (4,5,1,1,1)
  Estimation. The remaining boric oxide and carbon (5 % of the input) are assumed to be disposed as inert waste.
  EcoSpold01Location=CH
  Uncertainty: Stoechiometric calculation
  production volume
    Calculated from the production volume of boron carbide in proportion to the respective output amounts.
  properties: dry mass 0.995 kg, water content 0.00502513, wet mass 1 kg
- wastewater, average: -1.09589e-8, -1.82361e-6, -4.36062e-7, -6.49273e-9 m3 (4 suppliers, which the file names only by identifier); sum of these -2.27712e-6 m3; lognormal variance with pedigree 0.0452, pedigree (2,4,1,5,4)
  Calculated based on literature data published by the GENDORF Chemical Park. The factory produced an average of 2462760 tonnes of chemical substances (including intermediates) per year in the years 2015-2019. The average ouput of wastewater going to an external wastewater treatment plant in the years 2015-2019 was 5608 m3 per year. This equals 0.000002277 m3/kg chemical produced.
  References:
  Chemiepark GENDORF, Umwelterklärung 2016, https://www.gendorf.de/Nachbarn/Umweltschutz/Industrie%20und%20Nachhaltigkeit
  Chemiepark GENDORF, Umwelterklärung 2017, https://www.gendorf.de/Nachbarn/Umweltschutz/Industrie%20und%20Nachhaltigkeit
  Chemiepark GENDORF, Umwelterklärung 2020, https://www.gendorf.de/Nachbarn/Umweltschutz/Industrie%20und%20Nachhaltigkeit
  properties: carbon content, non-fossil 0.194039, dry mass 0.346837 kg, mass concentration, TOC 0.1091 kg/m3, mass concentration, calcium 0.039453 kg/m3, mass concentration, chlorine 0.030031 kg/m3, mass concentration, hydrogen 0.013365 kg/m3, mass concentration, nitrogen 0.031015 kg/m3, mass concentration, oxygen 0.069824 kg/m3, mass concentration, sodium 0.06456 kg/m3, mass concentration, sulfur 0.015602 kg/m3, water content 2882.2, wet mass 1000 kg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
  note on carbon content, non-fossil: 0.0673 kg TOC/m3 (Tab A.17, ecoinvent v2.2 report 13_I). TOC was considered as Total Carbon.

## Inputs from nature
- Water, cooling, unspecified natural origin [natural resource, in water]: 0.014707 m3; source Gendorf 2000; lognormal variance with pedigree 0.0852, pedigree (2,4,5,5,4)
  Calculated based on literature data published by the GENDORF Chemical Park. The factory produced an average of 2462760 tonnes of chemical substances (including intermediates) per year in the years 2015-2019. The average amount of cooling water released in the years 2015-2019 was 34408800 t per year. It was assumed that 5% of the cooling water was emitted to air during its use, therefore, to calculate the input of cooling water, the output value reported by GENDORF was scaled up by the factor 1/0.95. This equals 0.014707 m3/kg chemical produced.
  References:
  Chemiepark GENDORF, Umwelterklärung 2016, https://www.gendorf.de/Nachbarn/Umweltschutz/Industrie%20und%20Nachhaltigkeit
  Chemiepark GENDORF, Umwelterklärung 2017, https://www.gendorf.de/Nachbarn/Umweltschutz/Industrie%20und%20Nachhaltigkeit
  Chemiepark GENDORF, Umwelterklärung 2020, https://www.gendorf.de/Nachbarn/Umweltschutz/Industrie%20und%20Nachhaltigkeit
  Uncertainty: Estimation
- Water, river [natural resource, in water]: 0.000965426 m3; lognormal variance with pedigree 0.0852, pedigree (2,4,5,5,4)
  Calculated based on literature data published by the GENDORF Chemical Park. The factory produced an average of 2462760 tonnes of chemical substances (including intermediates) per year in the years 2015-2019. The average consumption of river water in the years 2015-2019 was 22000820 t per year. However, since the cooling water is modelled as an input, the amount of river water was adjusted to avoid double counting. 55% of the input amount of cooling water was deducted from the amount of river water, as that is the share of river water versus well water. This equals 0.00096543 m3/kg chemical produced.
  References:
  Chemiepark GENDORF, Umwelterklärung 2016, https://www.gendorf.de/Nachbarn/Umweltschutz/Industrie%20und%20Nachhaltigkeit
  Chemiepark GENDORF, Umwelterklärung 2017, https://www.gendorf.de/Nachbarn/Umweltschutz/Industrie%20und%20Nachhaltigkeit
  Chemiepark GENDORF, Umwelterklärung 2020, https://www.gendorf.de/Nachbarn/Umweltschutz/Industrie%20und%20Nachhaltigkeit
- Water, well, in ground [natural resource, in water]: 0.000816522 m3; lognormal variance with pedigree 0.0852, pedigree (2,4,5,5,4)
  Calculated based on literature data published by the GENDORF Chemical Park. The factory produced an average of 2462760 tonnes of chemical substances (including intermediates) per year in the years 2015-2019. The average consumption of well water in the years 2015-2019 was 18607480 t per year. However, since the cooling water is modelled as an input, the amount of well water was adjusted to avoid double counting. 45% of the input amount of cooling water was deducted from the amount of well water, as that is the share of well water versus river water. This equals 0.00081652 m3/kg chemical produced.
  References:
  Chemiepark GENDORF, Umwelterklärung 2016, https://www.gendorf.de/Nachbarn/Umweltschutz/Industrie%20und%20Nachhaltigkeit
  Chemiepark GENDORF, Umwelterklärung 2017, https://www.gendorf.de/Nachbarn/Umweltschutz/Industrie%20und%20Nachhaltigkeit
  Chemiepark GENDORF, Umwelterklärung 2020, https://www.gendorf.de/Nachbarn/Umweltschutz/Industrie%20und%20Nachhaltigkeit

## Emissions to nature
- Carbon dioxide, fossil [air, urban air close to ground]: 4.4298 kg; lognormal variance with pedigree 0.1786, pedigree (4,5,5,5,5)
  Estimation. There was no data available on process emissions to air for the boron carbide production. As approximation the air emissions occurring from the purge vent, the distillation vent and fugitive emission sources were estimated to 1% of the produced CO. The remaining CO is oxidated to CO2.
  Uncertainty: Estimation
- Carbon monoxide, fossil [air, urban air close to ground]: 0.028475 kg; lognormal variance with pedigree 0.798, pedigree (4,5,5,5,5)
  Estimation. There was no data available on process emissions to air for the boron carbide production. As approximation the air emissions occurring from the purge vent, the distillation vent and fugitive emission sources were estimated to 1% of the produced CO.
  Uncertainty: Estimation
- Water [air, unspecified]: 0.00147008 m3; lognormal variance with pedigree 0.1246, pedigree (2,4,5,5,4)
  Calculated based on literature data published by the GENDORF Chemical Park. The factory produced an average of 2462760 tonnes of chemical substances (including intermediates) per year in the years 2015-2019. To determine the emissions of water to air, the difference of all water inputs (from river, well, tap water and cooling) and outputs (wastewater, emissions to water) was calculated. The average ouput of water to air in the years 2015-2019 was 3620444 m3 per year. This equals 0.00147 m3/kg chemical produced. For more information on the other water exchanges please consult the respective exchange comment.
  References:
  Chemiepark GENDORF, Umwelterklärung 2016, https://www.gendorf.de/Nachbarn/Umweltschutz/Industrie%20und%20Nachhaltigkeit
  Chemiepark GENDORF, Umwelterklärung 2017, https://www.gendorf.de/Nachbarn/Umweltschutz/Industrie%20und%20Nachhaltigkeit
  Chemiepark GENDORF, Umwelterklärung 2020, https://www.gendorf.de/Nachbarn/Umweltschutz/Industrie%20und%20Nachhaltigkeit
  property fraction, origin: fresh water 0; name fraction_origin_fresh_water
  property fraction, origin: salt water 0; name fraction_origin_salt_water
  property fraction, origin: unspecified 1; name fraction_origin_unspecified
- Water [water, unspecified]: 0.0150391 m3; lognormal variance with pedigree 0.1246, pedigree (2,4,5,5,4)
  Calculated based on literature data published by the GENDORF Chemical Park. The factory produced an average of 2462760 tonnes of chemical substances (including intermediates) per year in the years 2015-2019. The amount of water released back to the environment consists of the sum of the amount of process water treated in the internal WWTP that is then released back to the environment and the amount of cooling water released back to the environment. The average ouput of the internal WWTP in the years 2015-2019 was 2628800 m3 and that of cooling water released back to the environment was 34408800 m3. This gives a yearly average of 37037600 m3 emissions of water to water. This equals 0.01504 m3/kg chemical produced.
  References:
  Chemiepark GENDORF, Umwelterklärung 2016, https://www.gendorf.de/Nachbarn/Umweltschutz/Industrie%20und%20Nachhaltigkeit
  Chemiepark GENDORF, Umwelterklärung 2017, https://www.gendorf.de/Nachbarn/Umweltschutz/Industrie%20und%20Nachhaltigkeit
  Chemiepark GENDORF, Umwelterklärung 2020, https://www.gendorf.de/Nachbarn/Umweltschutz/Industrie%20und%20Nachhaltigkeit
  property carbon content, fossil 0; name C_content_fossil
  property carbon content, non-fossil 0; name C_content_non_fossil
  property dry mass 0 kg; name DM
  property fraction, origin: fresh water 0; name fraction_origin_fresh_water_Ww
  property fraction, origin: salt water 0; name fraction_origin_salt_water_Ww
  property fraction, origin: unspecified 1; name fraction_origin_unspecified_Ww
  property water in wet mass 1000 kg; name WWM
  property wet mass 1000 kg; name WM

## Sampling procedure
Standard values

## Extrapolations
Emissions are calculated estimated. Infrastructure and transports are calculated with standard values.

## Review by Roland Hischier 2007-09-20
passed.
-

## Review by Roland Hischier 2011-09-23
Transfer of documentation done.
