# non-ferrous metal smelter production

Dataset: EcoSpold 2, unit process
Geography: GLO
Time period: 2003-01-01 to 2023-12-31
Technology level: current
Classification: ISIC rev.4 ecoinvent: 2823:Manufacture of machinery for metallurgy
Classification: EcoSpold01Categories: metals/extraction
Tags: ConvertedDataset
Scenario: Business-as-Usual
System model: Allocation, cut-off by classification
Generated by: Mischa Classen
Published in: Althaus H.-J. 2000
Database: ecoinvent
isCopyrightProtected: true
accessRestrictedTo: 1

## General comment
The module is designed for unspecific use. It is based on inventories from aluminium and iron industry. Lifetime: 50a, input: 6'750'000 t ore concentrate (39%), output: 2'650'000 t metal per year
[This dataset was already contained in the ecoinvent database version 2. It was not individually updated during the transfer to ecoinvent version 3. Life Cycle Impact Assessment results may still have changed, as they are affected by changes in the supply chain, i.e. in other datasets. This dataset was generated following the ecoinvent quality guidelines for version 2. It may have been subject to central changes described in the ecoinvent version 3 change report (http://www.ecoinvent.org/database/ecoinvent-version-3/reports-of-changes/), and the results of the central updates were reviewed extensively. The changes added e.g. consistent water flows and other information throughout the database. The documentation of this dataset can be found in the ecoinvent reports of version 2, which are still available via the ecoinvent website. The change report linked above covers all central changes that were made during the conversion process.]

## Included activities start
The activity starts with the reception of the components at the facility.

## Included activities end
Includes facilities for roasting, electrolysis and for the blast furnace and converter processes.

## Geography
No geographical context, inventory based on calculations

## Technology
Infrastructure modules from aluminium and iron production are chosen as proxy: aluminium oxide, plant / aluminium hydroxide, plant / electrolysis, plant / blast furnace / blast furnace converter. Their output have been scaled to fit average operations.

## Reference product
- non-ferrous metal smelter: 1 unit; By-product classification allocatable product; CPC 44310: Converters, ladles, ingot moulds and casting machines, of a kind used in metallurgy or in metal foundries; met[…]
  EcoSpold01Location=GLO
  production volume 1 unit
    NA
    Dummy value to be replaced by measured, estimated or calculated value
  property price 2.80541e9 EUR2005
    Calculated based on inputs: The price of the product has been calculated as a sum of the values of the material and energy inputs for this product. This value is therefore a rough estimation. It may underestimate the real price since there are additional expenses when producing any product. These expences can include for example labour costs, treatment of waste materials and profit for the producer. Please consider carefully whether this level of data quality is acceptable for your application.
  properties: carbon allocation 0 kg, carbon content 0

## Inputs from technosphere
All rows: lognormal variance with pedigree 0.69, pedigree (1,1,5,1,1)
- aluminium electrolysis facility: 17 unit
  EcoSpold01Location=RER
  estimate
- aluminium oxide factory: 8.47 unit
  EcoSpold01Location=RER
  estimate
- blast furnace: 1.22 unit
  estimate
  EcoSpold01Location=RER
- blast oxygen furnace converter: 1 unit
  EcoSpold01Location=RER
  estimate
- chemical factory, organics: 1.9 unit
  estimate
  EcoSpold01Location=RER

## Sampling procedure
Literature

## Extrapolations
see Geography and Technology

## Review by Roland Hischier 2003-07-02
Passed.
