# pulpwood, softwood, measured as solid wood under bark, import from Europe without Switzerland

Dataset: EcoSpold 2, unit process
Geography: CH
Time period: 2019-01-01 to 2023-12-31
Technology level: current
Classification: ISIC rev.4 ecoinvent: 0220:Logging
Scenario: Business-as-Usual
System model: Allocation, cut-off by classification
Generated by: [System]
Database: ecoinvent
isCopyrightProtected: true
accessRestrictedTo: 1

## General comment
This dataset describes the transport (expressed in tkm) needed for an average export European pulpwood, softwood to Switzerland. Transport distances are based on expert judgment and are in line with the ecoinvent default transport assumption for Europe.

## Included activities start
The activity starts with the product delivered at the forest road.

## Included activities end
This activity ends at the point of 'handing over' the pulpwood, softwood from one country to the other at the border.

## Reference product
- pulpwood, softwood, measured as solid wood under bark: 1 m3; By-product classification allocatable product; CPC 3110: Wood, sawn or chipped lengthwise, sliced or peeled, of a thickness exceeding 6 mm; railway or tramway sleepers […]; HS2017 4403: Wood in the rough, whether or not stripped of bark or sapwood, or roughly squared
  production volume 123667 m3; = 318000/0.72*0.28
    318'000 Kg represents the Swiss production mix of 'pulpwood, softwood, measured as solid wood under bark', covering 72% of the Swiss market. The import from the rest of Europe covers the remaining 28 % of the market (FAOStat 2016).
  property heating value, gross 0 MJ
    gross (upper) heating (calorific) value; referring to 1 m3 solid wood as the reference flow, excluding bark
  property heating value, net 4483.78 MJ
    Value based on "softwood forestry, mixed species, sustainable forest management"The property is based on a value of 11.58MJ/kg
  property price 168 EUR2005
    Temporary price data. Calculated as 90% of purchasers price based on: 2004 prices for World Import/Export (USD/kg) from FaoStat (http://faostat.fao.org/site/626/default.aspx#ancor, [accessed 14th June 2010]) Commodity: 'Wood Pulp +'. A density of 450 kg/m3 was assumed.
  property wet mass 929.28 kg; name WM
  properties: basic wood density 0, carbon allocation 191.277 kg, carbon content 0.494, carbon content, fossil 0, carbon content, non-fossil 0.494, dry mass 387.2 kg, water content 1.4, water in wet mass 542.08 kg

## Inputs from technosphere
- pulpwood, softwood, measured as solid wood under bark: 1 m3
  Part of the Swiss market comes from import. The shares of Swiss production and import are defined in the PV comment.
  property basic wood density 0; name pulpwood_basic_wood_d
  properties: carbon content, non-fossil 0.494, dry mass 387.2 kg, heating value, net 4483.78 MJ, water content 1.4, wet mass 929.28 kg
  note on heating value, net: Value based on "softwood forestry, mixed species, sustainable forest management"The property is based on a value of 11.58MJ/kg
- transport, freight, lorry, unspecified: 185.856 metric ton*km; = 0.2*WM; lognormal variance with pedigree 0.172, pedigree (3,5,3,1,4)
  import: lorry, 0.2 metric ton*km (expert guess)
