# tungsten mine operation and beneficiation

Dataset: EcoSpold 2, unit process
Geography: CN
Time period: 1979-01-01 to 2023-12-31
Technology level: current
Classification: ISIC rev.4 ecoinvent: 0729:Mining of other non-ferrous metal ores
Synonyms: Wolfram; W; Scheelite; Wolframite
Scenario: Business-as-Usual
System model: Allocation, cut-off by classification
Generated by: Nora Minas
Published in: Ma X. 2017
Database: ecoinvent
isCopyrightProtected: true
accessRestrictedTo: 1

## General comment
This dataset represents the activity of tungsten (W) concentrate production in China. An average ore grade of 0.236 % W is assumed. Scheelite (CaWO4) and wolframite ((Fe, Mn)WO4) are the only two economically important W minerals. Literature values of the share in existing deposits are con-tradicting. While the British Geological Survey and Furberg et al (2019) report that 70 % of the global W resources are scheelite, Olafsdottir and Sverdrup (2018) and Politis et al (2017) state that 70 % of the global W resources are wolframite. For this dataset, a share of 70 % scheelite and 30 % wolframite was assumed. As depicted in the figure below, processing methods differ for scheelite and wolframite ore and the W concentrate is assumed to be produced from wolframite ore (30%) and scheelite ore (70%).
Furberg, A., Arvidsson, R., Molander, S., 2019. Environmental life cycle assessment of cemented carbide (WC-Co) production. J. Clean. Prod. 209, 1126–1138. https://doi.org/10.1016/j.jclepro.2018.10.272
Olafsdottir, A.H., Sverdrup, H.U., 2018. Modelling Global Mining, Secondary Extraction, Supply, Stocks-in-Society, Recycling, Market Price and Resources, Using the WORLD6 Model; Tin. Biophys. Econ. Resour. Qual. 3. https://doi.org/10.1007/s41247-018-0041-8
Pitfield, P., Brown, T., 2011. Tungsten profile. Br. Geol. Surv.
Politis, A., Paspaliaris, I., Taxiarchou, M., 2017. MSP-REFRAM: Management of wastes from primary resource processing : identification , environmental evaluations.

## Included activities start
The activity starts with the extraction, crushing and milling of the ore.

## Included activities end
The activity ends with the production of tungsten concentrate with a minimum concentration of 65% WO3 (51.5 % W).

## Geography
Chinese W concentrate production represent 82 % of the global production. The dataset is mainly based on a published inventory by Ma et al. (2017) which represents tungsten mining and tungsten carbide sites located in Jiangsu (CN) and Jiangxi Province (CN), respectively. It is unclear how many productions sites were taken into account for this study. Annual tungsten mining and tungsten carbide production capacities were reported to be 5.0 *10^5 and 1.5 _*10^3 t, respectively in 2014. Inputs and outputs were adjusted according to an average recovery rate of 75 % and an average ore grade of 0.236% that was calculated based on several literature sources reporting tungsten ore grades in China.
The average ore grade was calculated based on the following sources:
Han, H., Hu, Y., Sun, W., Li, X., Cao, C., Liu, R., Yue, T., Meng, X., Guo, Y., Wang, J., Gao, Z., Chen, P., Huang, W., Liu, J., Xie, J., Chen, Y., 2017. Fatty acid flotation versus BHA flotation of tungsten minerals and their performance in flotation practice. Int. J. Miner. Process. 159, 22-29. https://doi.org/10.1016/j.minpro.2016.12.006
Lu, K.W., Gong, X.Z., Sun, B.X., Ding, Q., 2019. Life Cycle Assessment of Tungsten Production in China. Mater. Sci. Forum 944, 1137-1143. https://doi.org/10.4028/www.scientific.net/msf.944.1137
Wu, D.D., Wen, S.M., Yang, J., Deng, J.S., Liu, J., 2013. Experimental Study on Floatation of Scheelite Ore of Jiangxi. Adv. Mater. Res. 868, 429-432. https://doi.org/10.4028/www.scientific.net/amr.868.429
Yang, X., 2018. Beneficiation studies of tungsten ores - A review. Miner. Eng. 125, 111-119. https://doi.org/10.1016/j.mineng.2018.06.001
The average ore grade was calculated based on the following sources:
Han, H., Hu, Y., Sun, W., Li, X., Cao, C., Liu, R., Yue, T., Meng, X., Guo, Y., Wang, J., Gao, Z., Chen, P., Huang, W., Liu, J., Xie, J., Chen, Y., 2017. Fatty acid flotation versus BHA flotation of tungsten minerals and their performance in flotation practice. Int. J. Miner. Process. 159, 22-29. https://doi.org/10.1016/j.minpro.2016.12.006
Lu, K.W., Gong, X.Z., Sun, B.X., Ding, Q., 2019. Life Cycle Assessment of Tungsten Production in China. Mater. Sci. Forum 944, 1137-1143. https://doi.org/10.4028/www.scientific.net/msf.944.1137
Wu, D.D., Wen, S.M., Yang, J., Deng, J.S., Liu, J., 2013. Experimental Study on Floatation of Scheelite Ore of Jiangxi. Adv. Mater. Res. 868, 429-432. https://doi.org/10.4028/www.scientific.net/amr.868.429
Yang, X., 2018. Beneficiation studies of tungsten ores - A review. Miner. Eng. 125, 111-119. https://doi.org/10.1016/j.mineng.2018.06.001
Value for recovery rate was taken from
Leal-Ayala et al. (2015)
Leal-Ayala, D.R., Allwood, J.M., Petavratzi, E., Brown, T.J., Gunn, G., 2015. Mapping the global flow of tungsten to identify key material efficiency and supply security opportunities. Resour. Conserv. Recycl. 103, 19-28. https://doi.org/10.1016/j.resconrec.2015.07.003

## Technology
Only under-ground mine operation, being the most common form of W mining, is considered. The system includes the concentration by gravity method and grinding and in the case of sheelite ore the concentration by sulfide flotation, scheelite flotation and roasting.

## Time period
Inputs for water are based on a publication from 1979: Yih, S.W.H., Wang, C.T., 1979. Tungsten - Sources, Metallurgy, Properties and Applications.

## Parameters
- decomposition coefficient: 0.5 dimensionless; name decomposition_coefficient
  Hydrolytic decomposition of xanthate to CS2
  National Pollution inventory, Emission Estimation Technique Manual For Mining Version 3.1, January 2012
- fraction, process water, to air: 0.5 dimensionless; name fraction_PW_to_air; lognormal variance with pedigree 0.1306, pedigree (4,4,5,4,4)
  Approximation: Value taken from 'copper mine operation, sulfide ore, GLO, 1994-2003'.
- ore grade: 0.236 % (obsolete); name ore_grade; lognormal variance with pedigree 0.6518, pedigree (2,3,2,1,2)
  An average ore grade was calculated based on values reported for China. (Han et al. 2017; Lu et al. 2019; Wu et al. 2013; Yang 2018)
  Han, H., Hu, Y., Sun, W., Li, X., Cao, C., Liu, R., Yue, T., Meng, X., Guo, Y., Wang, J., Gao, Z., Chen, P., Huang, W., Liu, J., Xie, J., Chen, Y., 2017. Fatty acid flotation versus BHA flotation of tungsten minerals and their performance in flotation practice. Int. J. Miner. Process. 159, 22-29. https://doi.org/10.1016/j.minpro.2016.12.006
  Lu, K.W., Gong, X.Z., Sun, B.X., Ding, Q., 2019. Life Cycle Assessment of Tungsten Production in China. Mater. Sci. Forum 944, 1137-1143. https://doi.org/10.4028/www.scientific.net/msf.944.1137
  Wu, D.D., Wen, S.M., Yang, J., Deng, J.S., Liu, J., 2013. Experimental Study on Floatation of Scheelite Ore of Jiangxi. Adv. Mater. Res. 868, 429-432. https://doi.org/10.4028/www.scientific.net/amr.868.429
  Yang, X., 2018. Beneficiation studies of tungsten ores - A review. Miner. Eng. 125, 111-119. https://doi.org/10.1016/j.mineng.2018.06.001
- ore, mined: 291.215 kg; name ore_mined; = (0.65*0.793)/ (ore_grade/100)/ (rec_rate_W/100); lognormal variance with pedigree 0.653625, pedigree (2,3,3,2,2)
  ore mined per Kg of concentrate with 65 % WO3 (corresponding to 0.793* 65 % W)
- proportion tailings non-sulfidic: 0.5 dimensionless; name proportion_tailings_nonsulfidic
  Literature value
  Furberg, A., Arvidsson, R., Molander, S., 2019. Environmental life cycle assessment of cemented carbide (WC-Co) production. J. Clean. Prod. 209, 1126–1138. https://doi.org/10.1016/j.jclepro.2018.10.272
- proportion tailings sulfidic: 0.5 dimensionless; name proportion_tailings_sulfidic
  Literature value
  Furberg, A., Arvidsson, R., Molander, S., 2019. Environmental life cycle assessment of cemented carbide (WC-Co) production. J. Clean. Prod. 209, 1126-1138. https://doi.org/10.1016/j.jclepro.2018.10.272
- recovery rate tungsten: 75 % (obsolete); name rec_rate_W; uniform min 60, max 90, pedigree (2,3,5,3,2)
  Literature value
  Leal-Ayala, D.R., Allwood, J.M., Petavratzi, E., Brown, T.J., Gunn, G., 2015. Mapping the global flow of tungsten to identify key material efficiency and supply security opportunities. Resour. Conserv. Recycl. 103, 19-28. https://doi.org/10.1016/j.resconrec.2015.07.003

## Reference product
- tungsten concentrate: 1 kg; name Amount_tungsten_concentrate; By-product classification allocatable product; CPC 14290: Other non-ferrous metal ores and concentrates (other than uranium or thorium ores and concentrates); HS2017 261100: Tungsten ores and concentrates
  production volume 139806 kg; name PV_tungsten_concentrate; = 72000/0.515
    According to the USGS tungsten concentrate production in China was 72000 tons (tungsten content) in 2016 (82 % of the global production). The PV is calculated by dividing by the tungsten content of marketable tungsten concentrate (0.515).
  property carbon content, fossil 0.0146398
    fossil carbon content on a dry matter basis. Estimated value to maintain carbon balance throughout the DS related to tungsten production.
  properties: carbon allocation 0.0146398 kg, carbon content 0.0146398, carbon content, non-fossil 0, dry mass 1 kg, price 19 EUR2005, tungsten content 0.515, water content 0, water in wet mass 0 kg, wet mass 1 kg

## Inputs from technosphere
- blasting: 0.113983 kg; = 510/1303000* ore_mined; source Ma X. 2017; lognormal variance with pedigree 0.6564, pedigree (3,4,3,1,2)
  Calculated value based on input of ore (1303000 Kg) and blasting (510 Kg) provided by Ma et al. (2017). The amount was adjusted according to the ore grade and recovery rate as defined in the parameter section.
- chemical, organic: 0.0212589 kg; name chemicals_org; = 95.12/1303000* ore_mined; source Ma X. 2017; lognormal variance with pedigree 0.6564, pedigree (3,4,3,1,2)
  Calculated value: Represents the amount of xanthate (6.37E-03 Kg) and sodium fluosilicate (1.49E-02 Kg) consumed during flotation. Amount was calculated based on input of ore (1303000 Kg), xanthate (28.45 Kg) and sodium fluosilicate (66.67 Kg) provided by Ma et al. (2017) and adjusted according to the input of ore calculated with the ore grade and recovery rate as defined in the parameter section.
  properties: carbon content, fossil 0.628, dry mass 1 kg, heating value, net 19.03 MJ, wet mass 1 kg
  note on carbon content, fossil: This dataset is an unweighted average of 20 organic substances (listed in Tab 88.1, ecoinvent v2.2 report 8, part II), being part of the top100 chemicals included in this database. The C-content has also been calculated as an unweighted average of the C content of the substances composing this dataset.
- conveyor belt: 5.82429e-6 m; = 2*10^-8* ore_mined; source Classen M. 2009; lognormal variance with pedigree 0.7459, pedigree (5,5,5,3,3)
  Approximation: 2000 m conveyor belts are assumed with a capacity of 2000 t/h, a lifetime of 10 years and 5000 working hours per year which yields 2*10-8 m conveyor per Kg of ore mined.
- copper sulfate: 0.00715186 kg; = 32/1303000* ore_mined; source Ma X. 2017; lognormal variance with pedigree 0.6564, pedigree (3,4,3,1,2)
  Calculated value based on input of ore (1303000 Kg) and copper sulfate (32 Kg) provided by Ma et al. (2017). The amount was adjusted according to the input of ore calculated with the ore grade and recovery rate as defined in the parameter section.
  properties: dry mass 1 kg, wet mass 1 kg
- diesel, burned in building machine: 17.8579 MJ; = 0.73*30404.3/1303000* ore_mined*3.6; source Ma X. 2017; lognormal variance with pedigree 0.6584, pedigree (3,4,3,5,2)
  Calculated value based on assumption that 73 % of the mining energy required is covered diesel and 27 % electricity (Furberg et al. 2019). Total Energy consumption was based on the input of ore (1303000 Kg) and electricity (30404.3 kWh). The input ofdiesel was adjusted according to the input of ore calculated with the ore grade and recovery rate as defined in the parameter section. conversion factor kWh to MJ: 3.6
  Furberg, A., Arvidsson, R., Molander, S., 2019. Environmental life cycle assessment of cemented carbide (WC-Co) production. J. Clean. Prod. 209, 1126-1138. https://doi.org/10.1016/j.jclepro.2018.10.272
  properties: heating value, net 1 MJ
- electricity, medium voltage: 1.83471 kWh; = 0.27*30404.3/1303000* ore_mined; source Ma X. 2017; lognormal variance with pedigree 0.6584, pedigree (3,4,3,5,2)
  Calculated value based on assumption that 73 % of the mining energy required is covered diesel and 27 % electricity (Furberg et al. 2019). Total Energy consumption was based on the input of ore (1303000 Kg) and electricity (30404.3 kWh). The input of electricity was adjusted according to the input of ore calculated with the ore grade and recovery rate as defined in the parameter section.
  Furberg, A., Arvidsson, R., Molander, S., 2019. Environmental life cycle assessment of cemented carbide (WC-Co) production. J. Clean. Prod. 209, 1126-1138. https://doi.org/10.1016/j.jclepro.2018.10.272
- fatty acid: 0.0119213 kg; = 53.34/1303000* ore_mined; source Ma X. 2017; lognormal variance with pedigree 0.6564, pedigree (3,4,3,1,2)
  Approximation for the input of coal oleic acid. Calculated value based on input of ore (1303000 Kg) and coal oleic acid (53.34 Kg) provided by Ma et al. (2017). The amount was adjusted according to the input of ore calculated with the ore grade and recovery rate as defined in the parameter section.
  properties: carbon content, non-fossil 0.75, dry mass 1 kg, heating value, net 22.73 MJ, wet mass 1 kg
- kerosene: 0.0119213 kg; = 53.34/1303000* ore_mined; source Ma X. 2017; lognormal variance with pedigree 0.6564, pedigree (3,4,3,1,2)
  Calculated value based on input of ore (1303000 Kg) and kerosene (53.34 Kg) provided by Ma et al. (2017). The amount was adjusted according to the input of ore calculated with the ore grade and recovery rate as defined in the parameter section.
  The purpose of the use of kerosene is not specified in the publication from Ma et al. (2017). It is assumed to be used for flotation.
  properties: carbon content, fossil 0.85, dry mass 1 kg, heating value, net 43 MJ, wet mass 1 kg
- light fuel oil: 0.00196676 kg; = 8.8/1303000* ore_mined; source Ma X. 2017; lognormal variance with pedigree 0.6564, pedigree (3,4,3,1,2)
  Represents the use of number 2 fuel oil. Calculated value based on input of ore (1303000 Kg) and number 2 fuel oil (8.8 Kg) provided by Ma et al. (2017). The amount was adjusted according to the ore grade and recovery rate as defined in the parameter section.
  The purpose of the use of light fuel oil is not specified in the publication from Ma et al. (2017). It is assumed to be used for flotation.
  properties: carbon content, fossil 0.862, dry mass 1 kg, heating value, net 42.6 MJ, wet mass 1 kg
- mine infrastructure, underground, non-ferrous metal: 1.45607e-8 unit; = 1/(400000000*50)* ore_mined; source Classen M. 2009; lognormal variance with pedigree 0.7459, pedigree (5,5,5,3,3)
  Approximation: Assuming an annual production of 400'000'000Kg and a lifetime of 50 years yielding 5.00E-011 units per tonne of ore mined.
- non-sulfidic tailing, off-site: -145.264 kg; name Amount_non_sulfidic_tailings; = proportion_tailings_nonsulfidic*(ore_mined-ore_mined*( ore_grade/100)); source Ma X. 2017; lognormal variance with pedigree 0.6546, pedigree (3,4,2,1,2)
  Calculated value based on value provided by Ma et al. (2017) and adjusted with an ore grade and recovery rate as defined in the parameter section. Assuming that 50 % of tailings are sulfidic (Furberg et al. 2019) .
  production volume; name PV_non_sulfidic_tailings; = PV_tungsten_concentrate * ( Amount_non_sulfidic_tailings / Amount_tungsten_concentrate)
    Calculated from production volume of reference product using the relative outputs.
  properties: dry mass 1 kg, tungsten content 0.000593736, wet mass 1 kg
- sodium hydroxide, without water, in 50% solution state: 0.0119213 kg; = 53.34/1303000* ore_mined; source Ma X. 2017; lognormal variance with pedigree 0.6564, pedigree (3,4,3,1,2)
  Calculated value based on input of ore (1303000 Kg) and NaOH (53.34 Kg) provided by Ma et al. (2017). The amount was adjusted according to the input of ore calculated with the ore grade and recovery rate as defined in the parameter section.
  properties: dry mass 1 kg, heating value, net 3.03 MJ, wet mass 1 kg
- sodium silicate, solid: 0.0335243 kg; = 150/1303000* ore_mined; source Ma X. 2017; lognormal variance with pedigree 0.6564, pedigree (3,4,3,1,2)
  Calculated value based on input of ore (1303000 Kg) and sodium silicate (150 Kg) provided by Ma et al. (2017). The amount was adjusted according to the input of ore calculated with the ore grade and recovery rate as defined in the parameter section.
  properties: dry mass 1 kg, wet mass 1 kg
- sulfidic tailings, generic: -145.264 kg; name Amount_sulfidic_tailings; = proportion_tailings_sulfidic*(ore_mined-ore_mined*( ore_grade/100)); source Ma X. 2017; lognormal variance with pedigree 0.6592, pedigree (4,3,2,1,2)
  (same comment as for non-sulfidic tailing, off-site)
  production volume; name PV_sulfidic_tailings; = PV_tungsten_concentrate * ( Amount_sulfidic_tailings / Amount_tungsten_concentrate)
    Calculated from production volume of reference product using the relative outputs.
  properties: aluminium content 0.014738, calcium content 0.0045972, copper content 0.0009285, dry mass 1 kg, fluorine content 0.0011041, iron content 0.015374, magnesium content 0.0022359, oxygen content 0.89157, potassium content 0.0025181, silicon content 0.053273, sodium content 0.0014472, wet mass 1 kg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
- tap water: 15.6546 kg; name water_tap; = 0.07*(((46/140)*0.3* ore_mined)+((153/160)*0.7* ore_mined)); source Furberg A.  2019; lognormal variance with pedigree 0.6584, pedigree (3,4,3,5,2)
  Calculated value based on total water consumption documented by Furberg et al. (2019) assuming 70 % input of scheelite (153 L per 160 Kg of scheelte ore) and 30 % input of wolframite (46 L per 140 Kg of wolframite ore). The subdivision of total water consumption in freshwater (1 %), tap water (7 %) and pit water (92 %) was based on values from Ma et al. (2017).
  properties: carbon content, fossil 0.00178991, dry mass 0.000337476 kg, water content 2962.17, wet mass 1 kg
  note on carbon content, fossil: Bicarbonate content is 2.93 mol/m3. CO2 content is 0.1 mol/m3 (ecoinvent v2.2 report 8, Tab 93.1).

## Inputs from nature
- Gangue [natural resource, in ground]: 290.527 kg; = ore_mined-ore_mined*( ore_grade/100); lognormal variance with pedigree 0.7024, pedigree (4,4,3,4,4)
  Calculated value based on the ore grade and recovery rate as defined in the parameter section.
- Tungsten [natural resource, in ground]: 0.687267 kg; = ore_grade* ore_mined/100; source U.S. Geological Surve 2018; lognormal variance with pedigree 0.6564, pedigree (3,4,3,1,2)
  Calculated value based on Ma et al. (2017) and adjusted with an ore grade and recovery rate as defined in the parameter section.
- Water, unspecified natural origin [natural resource, in ground]: 0.00223637 m3; name water_unspecified; = 0.01*(((46/140)*0.3* ore_mined)+((153/160)*0.7* ore_mined))/1000; source Furberg A.  2019; lognormal variance with pedigree 0.6584, pedigree (3,4,3,5,2)
  Represents the use of undermine water. Calculated value based on total water consumption documented by Furberg et al. (2019) assuming 70 % input of scheelite (153 L per 160 Kg of scheelte ore) and 30 % input of wolframite (46 L per 140 Kg of wolframite ore). The subdivision of total water consumption in freshwater (1 %), tap water (7 %) and pit water (92 %) was based on values from Ma et al. (2017).
- Water, well, in ground [natural resource, in water]: 0.205746 m3; name water_well; = 0.92*(((46/140)*0.3* ore_mined)+((153/160)*0.7* ore_mined))/1000; source Furberg A.  2019; lognormal variance with pedigree 0.6584, pedigree (3,4,3,5,2)
  Represents the use of freshwater. Calculated value based on total water consumption documented by Furberg et al. (2019) assuming 70 % input of scheelite (153 L per 160 Kg of scheelte ore) and 30 % input of wolframite (46 L per 140 Kg of wolframite ore). The subdivision of total water consumption in freshwater (1 %), tap water (7 %) and pit water (92 %) was based on values from Ma et al. (2017).

## Emissions to nature
- Carbon dioxide, non-fossil [air, non-urban air or from high stacks]: 0.152888 kg; = 0.12/160*0.7* ore_mined; source Furberg A.  2019; lognormal variance with pedigree 0.6644, pedigree (4,4,3,5,2)
  Stoichiometric calculation: Removal of organics from flotation process by roasting results in CO2 emissions. Based on input of ore (160 Kg) and output of CO2 (0.12 Kg) taken from (Furberg et al. 2019). Assuming 70 % of ore input origins from scheelite.
- Carbon disulfide [air, non-urban air or from high stacks]: 3.36599e-6 kg; = decomposition_coefficient*0.002*76/144* chemicals_org*0.3; source NPI 2012; lognormal variance with pedigree 0.7024, pedigree (4,4,3,4,4)
  Calculated value: Emissions (CS2)=D*0.002*(MW(CS2)/(MW(Xanthate) *M(Xanthate).
  D: Decomposition coefficient (0.5, under alkaline conditions)
  0.2 % : Proportion of xanthate decomposed hydrolytically
  MW(CS2): Molecular weight of CS2 (76 g/m)
  MW(Xanthate): Molecular weight of xanthate (144 g/mol).
  M(Xanthate): Mass of xanthate consumed (6.36E-03 Kg = 30 %* chemical, organic)
- Particulate Matter, < 2.5 um [air, non-urban air or from high stacks]: 0.00527972 kg; = 0.049*0.37/1000* ore_mined; source Classen M. 2009, p. Part IV Nickel, page 21; lognormal variance with pedigree 0.7418, pedigree (3,5,5,5,4)
  Approximation: Values based on default assumptions for underground mining from ecoinvent v2 (Classen et al., 2007): Total dust emissions= 0.37 Kg/t of ore mined. Proportion of PM<2.5, PM2.5-10 and PM>10 are 4.9 %, 44.2 % and 50.8 %, respectively.
- Particulate Matter, > 10 um [air, non-urban air or from high stacks]: 0.0547367 kg; = 0.508*0.37/1000* ore_mined; source Classen M. 2009; lognormal variance with pedigree 0.7418, pedigree (3,5,5,5,4)
  (same comment as for Particulate Matter, < 2.5 um)
- Particulate Matter, > 2.5 um and < 10um [air, non-urban air or from high stacks]: 0.0476253 kg; = 0.442*0.37/1000* ore_mined; source Classen M. 2009; lognormal variance with pedigree 0.7418, pedigree (3,5,5,5,4)
  (same comment as for Particulate Matter, < 2.5 um)
- Water [air, unspecified]: 0.111819 m3; = fraction_PW_to_air*( water_tap/1000+ water_unspecified+ water_well); lognormal variance with pedigree 0.7418, pedigree (4,4,5,5,4)
  Calculated value based on the fraction, process water, to air from 'copper mine operation, sulfide ore, GLO, 1994-2003'.
- Aluminium III [water, surface water]: 4.02547e-6 kg; = proportion_tailings_nonsulfidic*7.20E-05* effluent; source IPCC 2000; lognormal variance with pedigree 0.6944, pedigree (1,4,5,5,2)
  Calculated value: Effluent * concentration measured in discharge from tailings management facility of Mittersill site (7.20E-05 Kg/m3). Value represents the emissions for non-sulfidic tailings (50 % of total tailings).
- BOD5, Biological Oxygen Demand [water, surface water]: 0.000902936 kg; = 0.5*COD; source Weidema B P 2013; lognormal variance with pedigree 0.7478, pedigree (4,5,5,5,4)
  approximation
- COD, Chemical Oxygen Demand [water, surface water]: 0.00180587 kg; name COD; = proportion_tailings_nonsulfidic*3.23E-02* effluent; source IPPC 2009; lognormal variance with pedigree 0.6944, pedigree (1,4,5,5,2)
  Calculated value: Effluent * concentration measured in discharge from tailings management facility of Mittersill site (3.23E-02 Kg/m3). Value represents the emissions for non-sulfidic tailings (50 % of total tailings).
- DOC, Dissolved Organic Carbon [water, surface water]: 0.000668841 kg; = TOC; source Weidema B P 2013; lognormal variance with pedigree 0.7478, pedigree (4,5,5,5,4)
  approximation
- Hydrocarbons, unspecified [water, surface water]: 5.59093e-6 kg; = proportion_tailings_nonsulfidic*1.00E-04* effluent; source IPPC 2009; lognormal variance with pedigree 0.6944, pedigree (1,4,5,5,2)
  Calculated value: Effluent * concentration measured in discharge from tailings management facility of Mittersill site (< 1.00E-04 Kg/m3). Value represents the emissions for non-sulfidic tailings (50 % of total tailings).
- Iron ion [water, surface water]: 1.59342e-5 kg; = proportion_tailings_nonsulfidic*2.85E-04* effluent; source IPPC 2009; lognormal variance with pedigree 0.6944, pedigree (1,4,5,5,2)
  Calculated value: Effluent * concentration measured in discharge from tailings management facility of Mittersill site (2.85E-04 Kg/m3). Value represents the emissions for non-sulfidic tailings (50 % of total tailings).
- Nitrite [water, surface water]: 5.59093e-6 kg; = proportion_tailings_nonsulfidic*1.00E-04* effluent; source IPPC 2009; lognormal variance with pedigree 0.6944, pedigree (1,4,5,5,2)
  (same comment as for Hydrocarbons, unspecified)
- Phosphorus [water, surface water]: 5.59093e-6 kg; = proportion_tailings_nonsulfidic*1.00E-04* effluent; source IPPC 2009; lognormal variance with pedigree 0.6944, pedigree (1,4,5,5,2)
  (same comment as for Hydrocarbons, unspecified)
- TOC, Total Organic Carbon [water, surface water]: 0.000668841 kg; name TOC; = COD/2.7; source Weidema B P 2013; lognormal variance with pedigree 0.7478, pedigree (4,5,5,5,4)
  approximation: COD(g O2) =2.7*TOC (g C)
- Tungsten [water, surface water]: 5.59093e-6 kg; = proportion_tailings_nonsulfidic*1.00E-04* effluent; source IPPC 2009; lognormal variance with pedigree 0.6944, pedigree (1,4,5,5,2)
  (same comment as for Hydrocarbons, unspecified)
- Water [water, surface water]: 0.111819 m3; name effluent; = (1- fraction_PW_to_air)*( water_tap/1000+ water_unspecified+ water_well); lognormal variance with pedigree 0.7418, pedigree (4,4,5,5,4)
  (same comment as for Water)

## Sampling procedure
Literature review

## Review by Louis Brimacombe 2020-03-09
The data source and extrapolation from CN to GLO data is transparent and clear
The data source and extrapolation from CN to GLO data is transparent and clear
