# solid manure loading and spreading, by hydraulic loader and spreader

Dataset: EcoSpold 2, unit process
Geography: US
Time period: 2021-01-01 to 2023-12-31
Technology level: current
Classification: ISIC rev.4 ecoinvent: 0161:Support activities for crop production
Scenario: Business-as-Usual
System model: Allocation, cut-off by classification
Generated by: Juanita Barrera
Database: ecoinvent
isCopyrightProtected: true
accessRestrictedTo: 1

## General comment
This dataset represents the service of loading 1 kg of solid manure with hydraulic loader (power take-off driven) from dung slab on manure spreader and spreading the manure onto field with the manure spreader. Working load 5 t (5.8 m3, dry matter content 22%), solid manure production and any emission from manure are not included. (Manure is excluded)

## Included activities start
Solid manure loading and spreading process starting from preliminary work at farm, like attaching the adequate machinery to the tractor

## Included activities end
This activity ends with transfer back to farm and concluding work, like uncoupling the machine; The dataset includes transfer to field; solid manure loading with an hydraulic loader from manure slab into a manure spreader; field spreading of 1 kg of solid manure, including field turning, idling and overlapping. The inventory takes into account the diesel fuel consumption and the amount of agricultural machinery and of the shed, which has to be attributed to the manure loading and spreading. Also taken into consideration is the amount of emissions to the air from combustion and the emission to the soil from tyre abrasion during the work process. The amount of spread material is not taken into account, nor dust other than from combustion and noise.

## Geography
The inventory is a copy of the geography of Quebec, Canada. Data quality indicators were adjusted accordingly.

## Technology
Created to proxy farm machinery/fieldwork representative of the US context. Data quality indicators adjusted accordingly.

## Reference product
- solid manure loading and spreading, by hydraulic loader and spreader: 1 kg; By-product classification allocatable product; CPC 86119: Other support services to crop production
  This dataset represents the service of loading 1 kg of solid manure with hydraulic loader (power take-off driven) from dung slab on manure spreader and spreading the manure onto field with the manure spreader
  production volume 1.22689e9 kg
    FAOSTAT data year 2020: manure applied to soils, 50% assumed and solid, total N content 15.1 kg N/t solid manure.
  property price 22.1532 EUR2005
    The price is from the year 2023. The price is estimated as a proxy based on the source: https://ag.purdue.edu/commercialag/home/resource/2023/03/indiana-farm-custom-rates/. The prices were adjusted for inflation relative to 2005 using the producer price index (PPI) of the euro area, published by eurostat (https://ec.europa.eu/eurostat/databrowser/view/STS_INPP_A__custom_6416181/default/table?lang=en, last accessed on 2023-06-01).
  properties: carbon allocation 0 kg, carbon content 0

## Inputs from technosphere
- agricultural machinery, unspecified: 0.000189 kg; lognormal variance with pedigree 0.3042, pedigree (1,4,2,5,1)
  proxy from "solid manure loading and spreading, by hydraulic loader and spreader, CA-QC"
- diesel: 0.001468 kg; lognormal variance with pedigree 0.0048, pedigree (1,4,2,5,1)
  proxy from "solid manure loading and spreading, by hydraulic loader and spreader, CA-QC"
  properties: carbon content, fossil 0.865, dry mass 1 kg, heating value, net 42.8 MJ, wet mass 1 kg
- shed: 4.4e-7 m2; lognormal variance with pedigree 0.3042, pedigree (1,4,2,5,1)
  proxy from "solid manure loading and spreading, by hydraulic loader and spreader, CA-QC"
- tractor, 4-wheel, agricultural: 5.88e-5 kg; lognormal variance with pedigree 0.3042, pedigree (1,4,2,5,1)
  proxy from "solid manure loading and spreading, by hydraulic loader and spreader, CA-QC"

## Emissions to nature
- Ammonia [air, non-urban air or from high stacks]: 2.93047e-8 kg; lognormal variance with pedigree 0.0603, pedigree (1,2,2,5,3)
  proxy from "solid manure loading and spreading, by hydraulic loader and spreader, CA-QC"
- Benzene [air, non-urban air or from high stacks]: 1.07266e-8 kg; lognormal variance with pedigree 0.0603, pedigree (1,2,2,5,3)
  proxy from "solid manure loading and spreading, by hydraulic loader and spreader, CA-QC"
- Benzo(a)pyrene [air, non-urban air or from high stacks]: 4.39571e-11 kg; lognormal variance with pedigree 0.6603, pedigree (1,2,2,5,3)
  proxy from "solid manure loading and spreading, by hydraulic loader and spreader, CA-QC"
- Cadmium II [air, non-urban air or from high stacks]: 1.468e-11 kg; lognormal variance with pedigree 0.6603, pedigree (1,2,2,5,3)
  proxy from "solid manure loading and spreading, by hydraulic loader and spreader, CA-QC"
- Carbon dioxide, fossil [air, non-urban air or from high stacks]: 0.00456158 kg; lognormal variance with pedigree 0.0203, pedigree (1,2,2,5,3)
  proxy from "solid manure loading and spreading, by hydraulic loader and spreader, CA-QC"
- Carbon monoxide, fossil [air, non-urban air or from high stacks]: 8.76377e-6 kg; lognormal variance with pedigree 0.6542, pedigree (1,4,2,5,1)
  proxy from "solid manure loading and spreading, by hydraulic loader and spreader, CA-QC"
- Chromium III [air, non-urban air or from high stacks]: 7.32618e-11 kg; lognormal variance with pedigree 0.6603, pedigree (1,2,2,5,3)
  proxy from "solid manure loading and spreading, by hydraulic loader and spreader, CA-QC"
- Copper ion [air, non-urban air or from high stacks]: 2.49643e-9 kg; lognormal variance with pedigree 0.6603, pedigree (1,2,2,5,3)
  proxy from "solid manure loading and spreading, by hydraulic loader and spreader, CA-QC"
- Dinitrogen monoxide [air, non-urban air or from high stacks]: 1.76105e-7 kg; lognormal variance with pedigree 0.0603, pedigree (1,2,2,5,3)
  proxy from "solid manure loading and spreading, by hydraulic loader and spreader, CA-QC"
- Methane, fossil [air, non-urban air or from high stacks]: 1.89375e-7 kg; lognormal variance with pedigree 0.0603, pedigree (1,2,2,5,3)
  proxy from "solid manure loading and spreading, by hydraulic loader and spreader, CA-QC"
- NMVOC, non-methane volatile organic compounds [air, non-urban air or from high stacks]: 4.39571e-6 kg; lognormal variance with pedigree 0.0442, pedigree (1,4,2,5,1)
  proxy from "solid manure loading and spreading, by hydraulic loader and spreader, CA-QC"
- Nickel II [air, non-urban air or from high stacks]: 1.02843e-10 kg; lognormal variance with pedigree 0.6603, pedigree (1,2,2,5,3)
  proxy from "solid manure loading and spreading, by hydraulic loader and spreader, CA-QC"
- Nitrogen oxides [air, non-urban air or from high stacks]: 6.66267e-5 kg; lognormal variance with pedigree 0.0442, pedigree (1,4,2,5,1)
  proxy from "solid manure loading and spreading, by hydraulic loader and spreader, CA-QC"
- PAH, polycyclic aromatic hydrocarbons [air, non-urban air or from high stacks]: 4.83804e-9 kg; lognormal variance with pedigree 0.3203, pedigree (1,2,2,5,3)
  proxy from "solid manure loading and spreading, by hydraulic loader and spreader, CA-QC"
- Particulate Matter, < 2.5 um [air, non-urban air or from high stacks]: 6.22034e-6 kg; lognormal variance with pedigree 0.3203, pedigree (1,2,2,5,3)
  proxy from "solid manure loading and spreading, by hydraulic loader and spreader, CA-QC"
- Selenium IV [air, non-urban air or from high stacks]: 1.468e-11 kg; lognormal variance with pedigree 0.0603, pedigree (1,2,2,5,3)
  proxy from "solid manure loading and spreading, by hydraulic loader and spreader, CA-QC"
- Sulfur dioxide [air, non-urban air or from high stacks]: 1.47906e-6 kg; lognormal variance with pedigree 0.0203, pedigree (1,2,2,5,3)
  proxy from "solid manure loading and spreading, by hydraulic loader and spreader, CA-QC"
- Zinc II [air, non-urban air or from high stacks]: 1.468e-9 kg; lognormal variance with pedigree 0.6603, pedigree (1,2,2,5,3)
  proxy from "solid manure loading and spreading, by hydraulic loader and spreader, CA-QC"
- Cadmium II [soil, agricultural]: 3.58e-11 kg; lognormal variance with pedigree 0.0442, pedigree (1,4,2,5,1)
  proxy from "solid manure loading and spreading, by hydraulic loader and spreader, CA-QC"
- Lead II [soil, agricultural]: 1.61e-10 kg; lognormal variance with pedigree 0.0442, pedigree (1,4,2,5,1)
  proxy from "solid manure loading and spreading, by hydraulic loader and spreader, CA-QC"
- Zinc II [soil, agricultural]: 9.33e-8 kg; lognormal variance with pedigree 0.0442, pedigree (1,4,2,5,1)
  proxy from "solid manure loading and spreading, by hydraulic loader and spreader, CA-QC"

## Extrapolations
The dataset is modeled for agricultural production system in US. Data Quality indicators are adjusted accordingly. Created to proxy farm machinery/fieldwork representative of the US context.
