# hydrogen production, steam methane reforming

Dataset: EcoSpold 2, unit process
Geography: RER
Time period: 2020-01-01 to 2025-12-31
Technology level: current
Classification: ISIC rev.4 ecoinvent: 3520:Manufacture of gas; distribution of gaseous fuels through mains
Synonyms: SMR
Scenario: Business-as-Usual
System model: Allocation, cut-off by classification
Generated by: Daria Dellenbach
Published in: Cristina Antonini 2020
Database: ecoinvent
isCopyrightProtected: true
accessRestrictedTo: 1

## General comment
This activity models the production of 1 kg of gaseous hydrogen, at 25 bar, from steam methane refoming of natural gas. This process does not include further compression or liquefaction of hydrogen after its production. This dataset does not cover any carbon dioxide capture and storage function.
In steam reforming, methane is treated with steam to form carbon monoxide and hydrogen.The yield of the hydrogen production is increased further by a water gas shift reaction, where the formed carbon monoxide reacts with water to form carbon dioxide and hydrogen. In this process, full water gas shift is assumed and therefore no synthesis gas (mixture of CO and H2) is co-produced, Subseqently, the raw hydrogen is purified in a PSA unit. The endothermic reforming reaction requires heat in the form of high-pressure steam as input. This heat is provided by an external natural gas industrial furnace, where natural gas is burned resulting in the usual emissions to air from burning natural gas. As such, natural gas is usually used both as feedstock to the reaction and as fuel for the furnace. The natural gas origin (country or mix) is important with regards to the sum of methane emissions over the whole natural gas supply chain. The users of this dataset are asked to carefully consider a change of the natural gas supplying dataset if this seems to be appropriate.
In Europe, over 90% of hydrogen is produced by steam methane reforming.
Hydrogen is an inorganic substance with a CAS no. : 001333-74-0. It is called 'molecular hydrogen' under IUPAC naming and its molecular formula is: H2. It is gaseous and it has no odour. The substance is modelled as a pure substance. On a consumer level, is used in the following products: fuels and related products, water treatment products. On industrial sites, the substance is used for the manufacture of products in the following sectors: Fuels and fuel additives, functional fluids (closed systems), intermediates, laboratory chemicals, odour agents, oxidizing/reducing agents, processing aids, specific to petroleum production.
References:
Antonini C., Treyer K., Streb A., van der Spek M., Bauer C., Mazzotti M. (2020): Hydrogen production from natural gas and biomethane with carbon capture and storage – A techno-environmental analysis, Sustainable Energy Fuels.
Häussinger P., Lohmüller R., Watson A. M. (2012): Hydrogen, Ullmann's Encyclopedia of Industrial Chemistry.

## Included activities start
The activity starts when the raw materials enter the process.

## Included activities end
Production of hydrogen at a pressure of 25 bar including materials, energy uses, infrastructure and emissions.

## Geography
This activity originates from literature data, based on robust process simulation, for steam methane reforming without a specific geographical region. The material and energy inputs reflect well the production technology and are, therefore, considered to be valid for the chosen geography.
References:
Antonini C., Treyer K., Streb A., van der Spek M., Bauer C., Mazzotti M. (2020): Hydrogen production from natural gas and biomethane with carbon capture and storage – A techno-environmental analysis, Sustainable Energy Fuels.

## Technology
In steam methane reforming, methane reacts with steam to produce hydrogen and carbon dioxide. In a first step, the natural gas feedstock is desulfurized and pre-treated with some steam to break down higher hydrocarbons into methane. The steam to carbon ratio at the pre-reformer inlet is set to 2.6. The pre-treated feedstock is then led into the main reforming reactor, and methane is coverted into hydrogen and carbon monoxide. This reaction is endothermic (consumes energy), and therefore heat is provided by an external furnace (often fuelled with natural gas). The hydrogen yield is improved by a water gas shift section, where a part of the formed carbon monoxide reacts with water to produce carbon dioxide and hydrogen. In this process, full water gas shift is assumed and therefore no synthesis gas (mixture of CO and H2) is co-produced, Technical details of the SMR plant which serves as model for this dataset are presented in Antonini, Treyer et al. (2020). Hydrogen production from natural gas and biomethane with carbon capture and storage - A techno-environmmental analysis. Sustainable Energy & Fuels.
SMR: CH4 + H2O --> 3 H2 + CO
WGS: CO + H2O --> H2 + CO2
Carbon dioxide is not captured in this modelling, it exits the plant with the flue gas from the furnace.
The high pressure steam required in steam methane reforming as well as the water gas shift is co-generated by heat integration. The excess steam is sent to a turbine to genereate electricity, which can be used to run utilities in the plant. If there is a surplus of electricity, it is sold to be fed to the grid.
The catalysts used in the desulfurization is ZnO, reforming needs a Nickel based catalyst and the water gas shift is conducted on Fe-Cr and Cu-Zn beds.
The purity of the produced hydrogen is at least 99.97%
.The electricity and heat needed in all processes is produced internally from natural gas. In the technical modelling of Antonini/Treyer et al. an amount of excess electricity results from this internal electricity production, it is assumed to be sold to the grid.
References:
Antonini C., Treyer K., Streb A., van der Spek M., Bauer C., Mazzotti M. (2020): Hydrogen production from natural gas and biomethane with carbon capture and storage – A techno-environmental analysis, Sustainable Energy Fuels.
Häussinger P., Lohmüller R., Watson A. M. (2012): Hydrogen, Ullmann's Encyclopedia of Industrial Chemistry.

## Time period
This activity originates from literature data, based on robust process simulation, for steam methane reforming published in 2020. The material and energy inputs reflect well the production technology and not expected to change significantly over time.
References:
Antonini C., Treyer K., Streb A., van der Spek M., Bauer C., Mazzotti M. (2020): Hydrogen production from natural gas and biomethane with carbon capture and storage – A techno-environmental analysis, Sustainable Energy Fuels.

## Reference product
- hydrogen, gaseous, low pressure: 1 kg; name RP; By-product classification allocatable product; CPC 34210: Hydrogen, nitrogen, oxygen, carbon dioxide and rare gases; inorganic oxygen compounds of non-metals n.e.c.; HS2017 280410: Hydrogen; CAS 1333-74-0
  production volume 1.0721e9 kg; name PV_RP; = 8.27E9*0.909-6445331769
    The European production volume of pure hydrogen in 2021 is 8.27 Mt, over 90% are produced by steam methane refoming.
    Hydrogen, which is used directly in ammonia production, is integrated in the datasets 'ammonia production, steam reforming, liquid, RER and RU' and therefore it's production volume (6.45E+09 kg) is subtracted.
    References:
    Hydrogen Europe (2022): Clean hydrogen monitor 2022, available here: https://hydrogeneurope.eu/clean-hydrogen-monitor-2022/.
    Hydrogen Europe (2021): Clean hydrogen monitor 2021, available here: https://hydrogeneurope.eu/product/clean-hydrogen-monitor-report-2021/
  property heating value, net 120.21 MJ
    LHV is calculated based on the elemental composition of the substance. Based on the CAS number of the substance (001333-74-0), the chemical formula of the substance is found to be: H2, (PubChem 2020). Reference: Kim, S., Chen, J., Cheng, T., Gindulyte, A., He, J., He, S., Li, Q., Shoemaker, B. A., Thiessen, P. A., Yu, B., Zaslavsky, L., Zhang, J., & Bolton, E. E. (2019). PubChem 2019 update: improved access to chemical data. Nucleic acids research, 47(D1), D1102–D1109. https://doi.org/10.1093/nar/gky1033
  property price 1.90471 EUR2005
    Price for 2021.
    Price based on HydrogenEurope: Clean Hydrogen Monitor 2022, available here: https://hydrogeneurope.eu/wp-content/uploads/2022/10/Clean_Hydrogen_Monitor_10-2022_DIGITAL.pdf, last accessed 2023-07-25.
    The prices were converted to EUR based on the annual exchange rates published by the European Central Bank (https://sdw.ecb.europa.eu/quickview.do?SERIES_KEY=120.EXR.A.USD.EUR.SP00.A, last accessed on 2022-02-15) and adjusted for inflation relative to 2005 using the producer price index (PPI) of the euro area, published by eurostat (https://ec.europa.eu/eurostat/databrowser/view/STS_INPP_A__custom_6416181/default/table?lang=en, last accessed on 2022-05-04).
  properties: allocation factor 0.93207, carbon allocation 0 kg, carbon content 0, carbon content, fossil 0, carbon content, non-fossil 0, dry mass 1 kg, true value 1.90471, water content 0, water in wet mass 0 kg, wet mass 1 kg

## Inputs from technosphere
- aluminium oxide, metallurgical: 0.00049654 kg; lognormal variance with pedigree 0.0039, pedigree (2,4,1,3,2)
  Al2O3 used in the catalytic system. This information is taken from a model for an authothermal reformer (ATR). In general, similar catalytic systems are used in SMR and ATR.
  properties: dry mass 1 kg, wet mass 1 kg
- chemical factory, organics: 4.98658e-10 unit; lognormal variance with pedigree 0.3033, pedigree (2,4,1,3,2)
  Calculated based on literature data published by the industry. For this activity, no information was readily available concerning infrastructure and land-use. Therefore, the infrastructure is estimated based on data from two chemical factories, the BASF site of Ludwigshafen and the chemical factory in Gendorf (which are both located in Germany), which produce a wide range of chemical substances. Based on this data, the following assumptions are made: the built area amounts to about 4.2 ha, the plant has an average output of 50'000 t/a and a lifespan of fifty years. The estimated infrastructure amount is therefore 4.00 E-10 units per kg of produced chemical.
  References:
  Althaus H.-J., Chudacoff M., Hischier R., Jungbluth N., Osses M. and Primas A. (2007) Life Cycle Inventories of Chemicals. ecoinvent report No. 8, v2.0. EMPA Dübendorf, Swiss Centre for Life Cycle Inventories, Dübendorf, CH.
  Gendorf (2000) Umwelterklärung 2000, Werk Gendorf. Werk Gendorf, Burgkirchen.
- chromium trioxide, flakes: 3.35545e-5 kg; lognormal variance with pedigree 0.0039, pedigree (2,4,1,3,2)
  The hydrogen yield is improved by a water gas shift section, where a part of the formed carbon monoxide reacts with water to produce carbon dioxide and hydrogen.The water gas shift is conducted on Fe-Cr and Cu-Zn beds at high- and low-temperatures, respectively. This flow represents part of the materials that make up these beds.
  Cr2O3 used as a catalyst. This information is taken from a model for an authothermal reformer (ATR). In general, similar catalysts are used in SMR and ATR.
  See more in Antonini C., Treyer K., Streb A., van der Spek M., Bauer C., Mazzotti M. (2020): Hydrogen production from natural gas and biomethane with carbon capture and storage - A techno-environmental analysis, Sustainable Energy Fuels.
  properties: dry mass 1 kg, wet mass 1 kg
- copper oxide: 0.000337782 kg; lognormal variance with pedigree 0.0039, pedigree (2,4,1,3,2)
  The hydrogen yield is improved by a water gas shift section, where a part of the formed carbon monoxide reacts with water to produce carbon dioxide and hydrogen. The water gas shift is conducted on Fe-Cr and Cu-Zn beds at high- and low-temperatures, respectively. This flow represents part of the materials that make up these beds.
  See more in Antonini C., Treyer K., Streb A., van der Spek M., Bauer C., Mazzotti M. (2020): Hydrogen production from natural gas and biomethane with carbon capture and storage - A techno-environmental analysis, Sustainable Energy Fuels.
  properties: dry mass 1 kg, wet mass 1 kg
- magnesium oxide: 2.6098e-5 kg; lognormal variance with pedigree 0.0039, pedigree (2,4,1,3,2)
  MgO used in the catalytic system. This information is taken from a model for an authothermal reformer (ATR). In general, similar catalytic systems are used in SMR and ATR.
  For more information, see Antonini C., Treyer K., Streb A., van der Spek M., Bauer C., Mazzotti M. (2020): Hydrogen production from natural gas and biomethane with carbon capture and storage - A techno-environmental analysis, Sustainable Energy Fuels.
  properties: dry mass 1 kg, wet mass 1 kg
- molybdenum trioxide: 1.55656e-5 kg; lognormal variance with pedigree 0.0039, pedigree (2,4,1,3,2)
  MoO3 used in the catalytic system. This information is taken from a model for an authothermal reformer (ATR). In general, similar catalytic systems are used in SMR and ATR.
  properties: bismuth content 8e-5, copper content 0.0006, iron content 0.0044, lead content 0.00015, molecular weight 143.9 g/mol, molybdenum content 0.62, oxygen content 0.29, sulfur content 0.0003
- natural gas, high pressure: 0.0294223, 4.21977 m3 (2 suppliers, which the file names only by identifier); sum of these 4.24919 m3; lognormal variance with pedigree 0.0039, pedigree (2,4,1,3,2)
  In steam methane reforming, methane is reacted with steam to produce hydrogen and carbon dioxide.
  SMR: CH4 + H2O --> 3 H2 + CO
  WGS: CO + H2O --> H2 + CO2
  See more in Antonini C., Treyer K., Streb A., van der Spek M., Bauer C., Mazzotti M. (2020): Hydrogen production from natural gas and biomethane with carbon capture and storage - A techno-environmental analysis, Sustainable Energy Fuels.
  properties: carbon content, fossil 0.741, dry mass 0.735 kg, heating value, gross 40 MJ, heating value, net 36 MJ, wet mass 0.735 kg
  note on heating value, gross: At standard conditions; based on Meili et al. (2022) section 5.2
- nickel, class 1: 0.000189136 kg; lognormal variance with pedigree 0.0039, pedigree (2,4,1,3,2)
  The pre-treated feedstock is led into the main reforming reactor, and methane is coverted into hydrogen and carbon monoxide. This step requires a Nickel based catalyst.
  Nickel is used as a proxy, but the energy consumption for producing NiO is not considered.
  See more in Antonini C., Treyer K., Streb A., van der Spek M., Bauer C., Mazzotti M. (2020): Hydrogen production from natural gas and biomethane with carbon capture and storage - A techno-environmental analysis, Sustainable Energy Fuels.
  properties: dry mass 1 kg, wet mass 1 kg
- portafer: 0.000291141 kg; lognormal variance with pedigree 0.0039, pedigree (2,4,1,3,2)
  The hydrogen yield is improved by a water gas shift section, where a part of the formed carbon monoxide reacts with water to produce carbon dioxide and hydrogen. The water gas shift is conducted on Fe-Cr and Cu-Zn beds at high- and low-temperatures, respectively. Portafer (ferric oxide) represents part of the materials that make up these beds.
  See more in Antonini C., Treyer K., Streb A., van der Spek M., Bauer C., Mazzotti M. (2020): Hydrogen production from natural gas and biomethane with carbon capture and storage - A techno-environmental analysis, Sustainable Energy Fuels.
  properties: dry mass 1 kg, wet mass 1 kg
- quicklime, milled, packed: 4.47394e-5 kg; lognormal variance with pedigree 0.0039, pedigree (2,4,1,3,2)
  CaO used in the catalytic system. This information is taken from a model for an authothermal reformer (ATR). In general, similar catalytic systems are used in SMR and ATR.
  properties: dry mass 0.99 kg, water content 0.010101, wet mass 1 kg
- silica sand: 1.0812e-5 kg; lognormal variance with pedigree 0.0039, pedigree (2,4,1,3,2)
  SiO2 used in the catalytic system. This information is taken from a model for an authothermal reformer (ATR). In general, similar catalytic systems are used in SMR and ATR.
  See more in Antonini C., Treyer K., Streb A., van der Spek M., Bauer C., Mazzotti M. (2020): Hydrogen production from natural gas and biomethane with carbon capture and storage - A techno-environmental analysis, Sustainable Energy Fuels.
  properties: dry mass 0.99 kg, water content 0.010101, wet mass 1 kg
- water, deionised: 4.11503, 0.0148131 kg (2 suppliers, which the file names only by identifier); sum of these 4.12984 kg; lognormal variance with pedigree 0.0039, pedigree (2,4,1,3,2)
  Raw surface water input for steam production, with demineralisation.
  properties: wet mass 1 kg
- zeolite, powder: 0.000822927 kg; lognormal variance with pedigree 0.0039, pedigree (2,4,1,3,2)
  Adsorbent used in the Pressure Swing Adsorption process. Zeolite 13 X. Amount is estimated based on expert estimates.
  properties: dry mass 1 kg, wet mass 1 kg
- zinc oxide: 0.000346171 kg; lognormal variance with pedigree 0.0039, pedigree (2,4,1,3,2)
  Initially, sulfur and a wide variety of sulfur compounds are removed from the natural gas feedstock, prior to the reforming step, in a treatment stage. Notably, the presence of sulfur decreases the lifetime of most metal catalysts, and thus, an effective treatment of the feed gas is vital. The catalysts used in the desulfurization is ZnO.
  See more in Antonini C., Treyer K., Streb A., van der Spek M., Bauer C., Mazzotti M. (2020): Hydrogen production from natural gas and biomethane with carbon capture and storage - A techno-environmental analysis, Sustainable Energy Fuels.
  properties: dry mass 1 kg, wet mass 1 kg

## Inputs from nature
- Oxygen [natural resource, in air]: 6.06869 kg; = (CO2_emission*31.999)/44.01; lognormal variance with pedigree 0.0039, pedigree (2,4,1,3,2)
  Calculated value. This value is estimated based on the CO2 output of this dataset to ensure the mass balance and the completeness of the dataset. It was assumed that all oxygen in CO2 originates from air.
- Water, cooling, unspecified natural origin [natural resource, in water]: 0.354541 m3; lognormal variance with pedigree 0.0039, pedigree (2,4,1,3,2)
  Once-through cooling water. This amount was calculated assuming a temperature difference of cooling water equal to 11°C.

## Emissions to nature
- Acetaldehyde [air, unspecified]: 1.94803e-8 kg; lognormal variance with pedigree 0.0433, pedigree (2,4,1,3,2)
  Emission from burning natural gas used as a fuel in the production process. These emissions have been calculated as a proxy based on the dataset “heat production, natural gas, at industrial furnace >100kW, Europe without Switzerland”, ecoinvent version 3.9.1 (2022) cut-off. In this activity, emissions in kg per MJ heat produced are shown, which were turned into kg of emissions per MJ natural gas burned. The carbon dioxide emissions of the above mentioned dataset have been discarded, as these are calculated for the specific case of hydrogen production.
- Acetic acid [air, unspecified]: 2.9267e-6 kg; lognormal variance with pedigree 0.0433, pedigree (2,4,1,3,2)
  (same comment as for Acetaldehyde)
- Benzene [air, unspecified]: 7.80143e-6 kg; lognormal variance with pedigree 0.0433, pedigree (2,4,1,3,2)
  (same comment as for Acetaldehyde)
- Benzo(a)pyrene [air, unspecified]: 1.94803e-10 kg; lognormal variance with pedigree 0.0433, pedigree (2,4,1,3,2)
  (same comment as for Acetaldehyde)
- Butane [air, unspecified]: 1.36082e-5 kg; lognormal variance with pedigree 0.0433, pedigree (2,4,1,3,2)
  (same comment as for Acetaldehyde)
- Carbon dioxide, fossil [air, unspecified]: 8.34661 kg; name CO2_emission; lognormal variance with pedigree 0.0039, pedigree (2,4,1,3,2)
  These emissions of CO2 stem from the flue gas of the natural gas furnace and from the reforming of the natural gas feedstock and the water gas shift of syngas to hydrogen.
- Carbon monoxide, fossil [air, unspecified]: 4.09179e-5 kg; lognormal variance with pedigree 0.0433, pedigree (2,4,1,3,2)
  (same comment as for Acetaldehyde)
- Dinitrogen monoxide [air, unspecified]: 1.94803e-6 kg; lognormal variance with pedigree 0.0433, pedigree (2,4,1,3,2)
  (same comment as for Acetaldehyde)
- Formaldehyde [air, unspecified]: 1.94803e-6 kg; lognormal variance with pedigree 0.0433, pedigree (2,4,1,3,2)
  (same comment as for Acetaldehyde)
- Mercury II [air, unspecified]: 5.8534e-10 kg; lognormal variance with pedigree 0.0433, pedigree (2,4,1,3,2)
  (same comment as for Acetaldehyde)
- Methane, fossil [air, unspecified]: 3.89605e-5 kg; lognormal variance with pedigree 0.0433, pedigree (2,4,1,3,2)
  (same comment as for Acetaldehyde)
- Nitrogen oxides [air, unspecified]: 0.000349026 kg; lognormal variance with pedigree 0.0433, pedigree (2,4,1,3,2)
  (same comment as for Acetaldehyde)
- PAH, polycyclic aromatic hydrocarbons [air, unspecified]: 1.94803e-7 kg; lognormal variance with pedigree 0.3033, pedigree (2,4,1,3,2)
  (same comment as for Acetaldehyde)
- Particulate Matter, < 2.5 um [air, unspecified]: 3.89605e-6 kg; lognormal variance with pedigree 0.3033, pedigree (2,4,1,3,2)
  (same comment as for Acetaldehyde)
- Pentane [air, unspecified]: 2.3395e-5 kg; lognormal variance with pedigree 0.0433, pedigree (2,4,1,3,2)
  (same comment as for Acetaldehyde)
- Propane [air, unspecified]: 3.89605e-6 kg; lognormal variance with pedigree 0.0433, pedigree (2,4,1,3,2)
  (same comment as for Acetaldehyde)
- Propionic acid [air, unspecified]: 3.89605e-7 kg; lognormal variance with pedigree 0.0433, pedigree (2,4,1,3,2)
  (same comment as for Acetaldehyde)
- Sulfur dioxide [air, unspecified]: 1.07188e-5 kg; lognormal variance with pedigree 0.0513, pedigree (2,4,5,3,3)
  (same comment as for Acetaldehyde)
- Toluene [air, unspecified]: 3.89605e-6 kg; lognormal variance with pedigree 0.0433, pedigree (2,4,1,3,2)
  (same comment as for Acetaldehyde)
- Water [air, unspecified]: 0.031935 m3; lognormal variance with pedigree 0.0433, pedigree (2,4,1,3,2)
  Exchange added to ensure water balance. Share of water emission to water and air based on emission shares from a big chemical park (Gendorf).
- Water [water, unspecified]: 0.326736 m3; lognormal variance with pedigree 0.0433, pedigree (2,4,1,3,2)
  (same comment as for Water)

## Sampling procedure
Data obtained from the literature.
References:
Antonini C., Treyer K., Streb A., van der Spek M., Bauer C., Mazzotti M. (2020): Hydrogen production from natural gas and biomethane with carbon capture and storage - A techno-environmental analysis, Sustainable Energy Fuels.

## Extrapolations
This dataset is based on literature data. The technology is representative for steam reforming Globally and regionalised through the input feedstocks.
The emissions to air stem from burning natural gas in the furnace. These emissions in kg per MJ natural gas burned are extrapolated from the activity "heat production, natural gas, at industrial furnace > 100kW, Europe without Switzerland" (ecoinvent version v3.9.1, 2022), with 1.0526 MJ natural gas burned per MJ heat. The CO2 emissions from that dataset are omitted, as CO2 emissions have been modelled separately in Antonini, Treyer et al. 2020.
