# grape production

Dataset: EcoSpold 2, unit process
Geography: IN
Time period: 2015-01-01 to 2023-12-31
Technology level: current
Classification: ISIC rev.4 ecoinvent: 0121:Growing of grapes
Scenario: Business-as-Usual
System model: Allocation, cut-off by classification
Generated by: Sanjeevan Bajaj
Database: ecoinvent
isCopyrightProtected: true
accessRestrictedTo: 1

## General comment
This dataset represents the production of 1 kg of fresh Grape which is a peripheral crop harvested in the month of March, 2017 at a farm located in village Vadner Bhairav, District Nashik of Maharashtra. The farm has a yield of 22,500 kg fresh matter per ha for this crop cycle. Harvesting date is 02-March, 2017. Mineral NPK fertilizer input is 49.63-115.63-226.41 kg/ha. Organic fertilizer applied amounts to 32,500 kg of manure from cattle dung and Geogreen. Herbicides used has active ingredient as Oxyfluorfen 150g/ha. The fungicides used have active ingredients as Copper (Cu) 487.50 g/ha, Cymoxanil 195.00 g/ha, Dimethomorph 203.13 g/ha, Fluopicolide 111.00 g/ha, Fluopyram 88.50 g/ha, Fosetyl 1,666.75 g/ha, Hexaconazole 40.63 g/ha, Mancozeb 7,349.06 g/ha, Metalaxil 81.25 g/ha, Propineb 1,137.50 g/ha, Sulfur 650.00 g/ha, Tebuconazole 88.50 g/ha, Zineb 2,437.50 g/ha, and Ziram 548.44 g/ha. Insecticides used have active ingredients Abamectin 7.72 g/ha, Alphamethrin 121.88 g/ha, Buprofezin 357.50 g/ha, Dichlorvos 617.50 g/ha, Imidacloprid 180.78 g/ha, Lambda-cyhalothrin 40.63 g/ha, and Thiamethoxam 50.78 g/ha. Machinery is used for plant protection with fuel consumption of 71.76 kg/ha for pesticides spray.

## Included activities start
This is a perennial crop with periodic harvesting.

## Included activities end
The activity ends with the harvesting of the mature Grapes from the Grape plant.

## Geography
village -Vadner Bhairav , District Nashik of Maharashtra

## Technology
Cultivation of Grape follows conventional production standards

## Time period
Harvesting date main crop: 02-March, 2017. The soil cultivation, sowing and harvesting dates are taken as the middle date of the week or fortnight told to the data collector by the farmer. The data is collected for one crop cycle. The cycle of one year is considered for entry in ecoeditor.

## Parameters
- LUC_crop_specific: 1 dimensionless
  This parameter allows to switch between a "crop specific" and a "country specific" approach when calculating the LUC of a crop. By default, the chosen approach is "crop specific", so the value of the parameter is 1. If you want to apply a "country specific" approach, turn the parameter to 0.

## Reference product
- grape: 1 kg; By-product classification allocatable product; CPC 01330: Grapes; HS2017 080610: Fruit, edible; grapes, fresh
  production volume 2.59002e9 kg; = 2590.02*1000*1000
    The data was given in thousand tonnes so multipled with 1000*1000 to convert into kgs. Given data was for a year 2015-16. Source: http://agriexchange.apeda.gov.in/India%20Production/India_Productions.aspx?cat=fruit&hscode=1045
  property price 0.775 EUR2005
    Calculated from the trade statistics for the year 2005 published by the UN (COMTRADE database, accessed 20151105) as an average of 5 biggest importers of grape in the world; JP, NL, FR, BL and DE. Comtrade cathegory: 80540: Grapefruit, fresh or dried.
  properties: carbon allocation 0 kg, carbon content 0

## Inputs from technosphere
- [sulfonyl]urea-compound: 6.66667e-6 kg; lognormal variance with pedigree 0.0376, pedigree (2,4,3,1,1)
  Calculated Value. This value has been calculated by using the ecoinvent LCI calculation tool for crop production.
  properties: carbon content, fossil 0.540853, dry mass 1 kg, wet mass 1 kg
- [thio]carbamate-compound: 8.66667e-6 kg; lognormal variance with pedigree 0.0376, pedigree (2,4,3,1,1)
  (same comment as for [sulfonyl]urea-compound)
  properties: carbon content, fossil 0.626349, dry mass 1 kg, wet mass 1 kg
- acetamide-anillide-compound, unspecified: 3.61111e-6 kg; lognormal variance with pedigree 0.0376, pedigree (2,4,3,1,1)
  (same comment as for [sulfonyl]urea-compound)
  properties: carbon content, fossil 0.659175, dry mass 1 kg, wet mass 1 kg
- borax, anhydrous, powder: 0.000317333 kg; lognormal variance with pedigree 0.0376, pedigree (2,4,3,1,1)
  (same comment as for [sulfonyl]urea-compound)
  properties: dry mass 1 kg, wet mass 1 kg
- compost: 1.32889 kg; lognormal variance with pedigree 0.0376, pedigree (2,4,3,1,1)
  Home made
  property cadmium content 3.6e-7; name Cd_content
  property chromium content 2.23e-5; name Cr_content
  property copper content 5.77e-5; name Cu_content
  property dry mass 0.5 kg; name DM
  property lead content 4.9e-5; name Pb_content
  property mercury content 1.2e-7; name Hg_content
  property nickel content 1.63e-5; name Ni_content
  property nitrogen content 0.014; name N_content
  property phosphorus content 0.0035; name P_content
  property potassium content 0.01; name K_content
  property zinc content 0.000184; name Zn_content
  properties: carbon content, non-fossil 0.183645, water content 1, wet mass 1 kg
- copper oxide: 2.16667e-5 kg; lognormal variance with pedigree 0.0376, pedigree (2,4,3,1,1)
  (same comment as for [sulfonyl]urea-compound)
  properties: dry mass 1 kg, wet mass 1 kg
- cyclic N-compound: 4.09472e-5 kg; lognormal variance with pedigree 0.0376, pedigree (2,4,3,1,1)
  This exchange is an aggregation of amounts:
  1.5888888888888887E-5. Comment:
  2.2569444444444443E-6. Comment:
  9.027777777777777E-6. Comment:
  1.8055555555555555E-6. Comment:
  3.9333333333333335E-6. Comment:
  8.034722222222222E-6. Comment:
  properties: carbon content, fossil 0.641962, dry mass 1 kg, wet mass 1 kg
- dithiocarbamate-compound: 0.000183264 kg; lognormal variance with pedigree 0.0376, pedigree (2,4,3,1,1)
  This exchange is an aggregation of amounts:
  1.0833333333333333E-4. Comment:
  5.055555555555555E-5. Comment:
  2.4375E-5. Comment:
  properties: carbon content, fossil 0.179339, dry mass 1 kg, wet mass 1 kg
- dolomite: 0.00303478 kg; lognormal variance with pedigree 0.0376, pedigree (2,4,3,1,1)
  (same comment as for [sulfonyl]urea-compound)
  properties: carbon content, fossil 0.130435, dry mass 1 kg, heating value, net 3.95 MJ, wet mass 1 kg
- establishing orchard: 0.00751111 unit; lognormal variance with pedigree 0.0052, pedigree (2,4,3,1,1)
  (same comment as for [sulfonyl]urea-compound)
- fosetyl-Al: 7.40778e-5 kg; lognormal variance with pedigree 0.0376, pedigree (2,4,3,1,1)
  (same comment as for [sulfonyl]urea-compound)
  properties: carbon content, fossil 0.20339, dry mass 1 kg, wet mass 1 kg
- fruit tree seedling, for planting: 0.00751111 unit; lognormal variance with pedigree 0.0052, pedigree (2,4,3,1,1)
  (same comment as for [sulfonyl]urea-compound)
  properties: carbon content, non-fossil 1, dry mass 0.03 kg, wet mass 0.03 kg
- inorganic nitrogen fertiliser, as N: 0.00184843 kg; lognormal variance with pedigree 0.0052, pedigree (2,4,3,1,1)
  This exchange is an aggregation of amounts:
  9.289356725146196E-4. Comment:
  2.744582668793193E-4. Comment:
  4.2835490640476677E-4. Comment:
  2.1667757911525223E-4. Comment:
  properties: dry mass 1 kg, wet mass 1 kg
- inorganic phosphorus fertiliser, as P2O5: 0.00467861 kg; lognormal variance with pedigree 0.0052, pedigree (2,4,3,1,1)
  This exchange is an aggregation of amounts:
  0.003341866666666667. Comment:
  0.0013367466666666667. Comment:
  properties: dry mass 1 kg, wet mass 1 kg
- inorganic potassium fertiliser, as K2O: 0.0007547 kg; lognormal variance with pedigree 0.0376, pedigree (2,4,3,1,1)
  (same comment as for [sulfonyl]urea-compound)
  properties: dry mass 1 kg, wet mass 1 kg
- irrigation: 0.461702 m3; lognormal variance with pedigree 0.0052, pedigree (2,4,3,1,1)
  The data was collected for a hectare area through interview
  properties: dry mass 0.11 kg, water content 9089.91, wet mass 1000 kg
- land use change, perennial crop: 3.32658e-5 ha; = (0.748480161398789 * LUC_crop_specific + 0.0769954146475059 * (1-LUC_crop_specific))/22500
  (same comment as for [sulfonyl]urea-compound)
- lime: 0.00113766 kg; lognormal variance with pedigree 0.0376, pedigree (2,4,3,1,1)
  (same comment as for [sulfonyl]urea-compound)
  properties: carbon content, fossil 0.120005, dry mass 1 kg, wet mass 1 kg
- mancozeb: 0.000326625 kg; lognormal variance with pedigree 0.0376, pedigree (2,4,3,1,1)
  (same comment as for [sulfonyl]urea-compound)
  properties: carbon content, fossil 0.17759, dry mass 1 kg, wet mass 1 kg
- organophosphorus-compound, unspecified: 2.74444e-5 kg; lognormal variance with pedigree 0.0052, pedigree (2,4,3,1,1)
  The data was collected for a hectare area through interview
  properties: carbon content, fossil 0.260898, dry mass 1 kg, wet mass 1 kg
- packaging, for fertilisers: 0.0431653 kg; lognormal variance with pedigree 0.0532, pedigree (4,3,3,5,4)
  Total amount of active substance/s of fertilisers needed for the production of 'grape' is calculated to be circa 2.16E-02 kg. Fertiliser/s used in this dataset is/are: 'dolomite', 'lime', 'nitrogen fertiliser, as N', 'phosphate fertiliser, as P2O5', 'phosphate rock, as P2O5, beneficiated, dry', 'potassium chloride, as K2O', 'potassium fertiliser, as K2O', 'potassium sulfate, as K2O', 'urea, as N'. The total amount of active substance/s is doubled in order to account for the packaging of the dilluted product of fertiliser/s that is/are applied. Therefore, 4.32E-02 kg of packaging for fertilisers is justified with this exchange.
  properties: carbon content, fossil 0.825301, dry mass 1 kg, heating value, net 25.01 MJ, price 0.0642 EUR2005, wet mass 1 kg
  note on carbon content, fossil: Considering a chemical formula (C2H4)n for polyethylene, carbon content-fossil is calculated to be 0.856286 kg of Carbon per kg of dry mass.
- packaging, for pesticides: 0.00344322 kg; lognormal variance with pedigree 0.0532, pedigree (4,3,3,5,4)
  Total amount of active substance/s of pesticides needed for the production of grape is calculated to be circa 1.72E-03 kg. Pesticide/s used in this dataset is/are: '[sulfonyl]urea-compound', '[thio]carbamate-compound', 'acetamide-anillide-compound, unspecified', 'borax, anhydrous, powder', 'copper oxide', 'cyclic N-compound', 'dithiocarbamate-compound', 'fosetyl-Al', 'mancozeb', 'organophosphorus-compound, unspecified', 'pesticide, unspecified', 'portafer', 'pyrethroid-compound', 'sulfite', 'sulfur', 'zinc monosulfate'. The total amount of active substance/s is doubled in order to account for the packaging of the dilluted product of pesticide/s that is/are applied. Therefore, 3.44E-03 kg of packaging for pesticides is justified with this exchange.
  properties: carbon content, fossil 0.85714, dry mass 1 kg, heating value, net 25.97 MJ, price 0.0642 EUR2005, wet mass 1 kg
- pesticide, unspecified: 1.46264e-5 kg; lognormal variance with pedigree 0.0376, pedigree (2,4,3,1,1)
  This exchange is an aggregation of amounts:
  5.416666666666667E-6. Comment:
  3.4305555555555554E-7. Comment:
  8.866666666666668E-6. Comment:
  properties: carbon content, fossil 0.486978, dry mass 1 kg, wet mass 1 kg
- phosphate rock, beneficiated: 0.001446 kg; lognormal variance with pedigree 0.0376, pedigree (2,4,3,1,1)
  The exchange has been updated from 'phosphate rock, as P2O5, beneficiated, dry' into 'phosphate rock, beneficiated' and therefore its amount has been scaled (multiplied) from 0.0005 kg by 3.125 kg of 'phosphate rock, beneficiated' per kg of 'phosphate rock, as P2O5, beneficiated, dry'. Original comment of the exchange is: Calculated Value. This value has been calculated by using the ecoinvent LCI calculation tool for crop production.
  properties: dry mass 1 kg, wet mass 1 kg
- planting tree: 0.00751111 unit; lognormal variance with pedigree 0.0052, pedigree (2,4,3,1,1)
  (same comment as for [sulfonyl]urea-compound)
- portafer: 0.000195556 kg; lognormal variance with pedigree 0.0376, pedigree (2,4,3,1,1)
  (same comment as for [sulfonyl]urea-compound)
  properties: dry mass 1 kg, wet mass 1 kg
- potassium chloride: 0.000796408 kg; lognormal variance with pedigree 0.0376, pedigree (2,4,3,1,1)
  The exchange has been updated from 'potassium chloride, as K2O' into 'potassium chloride' and therefore its amount has been scaled (multiplied) from 0.0005 kg by 1.5829 kg of 'potassium chloride' per kg of 'potassium chloride, as K2O'. Original comment of the exchange is: Calculated Value. This value has been calculated by using the ecoinvent LCI calculation tool for crop production.
  properties: dry mass 1 kg, wet mass 1 kg
- potassium sulfate: 0.0162886 kg; lognormal variance with pedigree 0.0376, pedigree (2,4,3,1,1)
  The exchange has been updated from 'potassium sulfate, as K2O' into 'potassium sulfate' and therefore its amount has been scaled (multiplied) from 0.0088 kg by 1.85 kg of 'potassium sulfate' per kg of 'potassium sulfate, as K2O'. Original comment of the exchange is: Calculated Value. This value has been calculated by using the ecoinvent LCI calculation tool for crop production.
  properties: dry mass 1 kg, wet mass 1 kg
- pyrethroid-compound: 1.80556e-6 kg; lognormal variance with pedigree 0.0376, pedigree (2,4,3,1,1)
  (same comment as for [sulfonyl]urea-compound)
  properties: carbon content, fossil 0.623, dry mass 1 kg, wet mass 1 kg
- sulfite: 0.000149333 kg; lognormal variance with pedigree 0.0376, pedigree (2,4,3,1,1)
  (same comment as for [sulfonyl]urea-compound)
  properties: dry mass 1 kg, wet mass 1 kg
- sulfur: 2.88889e-5 kg; lognormal variance with pedigree 0.0376, pedigree (2,4,3,1,1)
  (same comment as for [sulfonyl]urea-compound)
  properties: dry mass 1 kg, wet mass 1 kg
- trellis system, wooden poles, soft wood, tar impregnated: 4.44444e-5 ha; lognormal variance with pedigree 0.0376, pedigree (2,4,3,1,1)
  (same comment as for [sulfonyl]urea-compound)
- urea: 0.000767042 kg; lognormal variance with pedigree 0.0052, pedigree (2,4,3,1,1)
  The exchange has been updated from 'urea, as N' into 'urea' and therefore its amount has been scaled (multiplied) from 0.0004 kg by 2.1438 kg of 'urea' per kg of 'urea, as N'. Original comment of the exchange is: The data was collected for a hectare area through interview
  properties: carbon content, fossil 0.2, dry mass 1 kg, wet mass 1 kg
- vinasse, from fermentation of sugar beet: 0.115556 kg; lognormal variance with pedigree 0.0376, pedigree (2,4,3,1,1)
  Geogreen
  properties: carbon content, non-fossil 0.12867, dry mass 0.025 kg, water content 39, wet mass 1 kg
- zinc monosulfate: 0.000321097 kg; lognormal variance with pedigree 0.0376, pedigree (2,4,3,1,1)
  (same comment as for [sulfonyl]urea-compound)
  properties: dry mass 1 kg, wet mass 1 kg

## Inputs from nature
- Carbon dioxide, in air [natural resource, in air]: 0.556957 kg; lognormal variance with pedigree 0.0052, pedigree (2,4,3,1,1)
  (same comment as for [sulfonyl]urea-compound)
- Energy, gross calorific value, in biomass [natural resource, biotic]: 6.4429 MJ; lognormal variance with pedigree 0.0052, pedigree (2,4,3,1,1)
  The data was collected for a hectare area through interview
- Occupation, permanent crop, irrigated [natural resource, land]: 0.444444 m2*year; lognormal variance with pedigree 0.0066, pedigree (2,4,3,1,1)
  The data was collected for a hectare area through interview
- Transformation, from permanent crop, irrigated [natural resource, land]: 0.0222222 m2; lognormal variance with pedigree 0.0126, pedigree (2,4,3,1,1)
  The data was collected for a hectare area through interview
- Transformation, to permanent crop, irrigated [natural resource, land]: 0.0222222 m2; lognormal variance with pedigree 0.0126, pedigree (2,4,3,1,1)
  The data was collected for a hectare area through interview

## Emissions to nature
- Ammonia [air, non-urban air or from high stacks]: 0.00108206 kg; lognormal variance with pedigree 0.0126, pedigree (2,4,3,1,1)
  (same comment as for [sulfonyl]urea-compound)
- Carbon dioxide, fossil [air, non-urban air or from high stacks]: 0.00251092 kg; lognormal variance with pedigree 0.0052, pedigree (2,4,3,1,1)
  (same comment as for [sulfonyl]urea-compound)
- Dinitrogen monoxide [air, non-urban air or from high stacks]: 0.000238459 kg; lognormal variance with pedigree 0.0346, pedigree (2,4,3,1,1)
  (same comment as for [sulfonyl]urea-compound)
- Nitrogen oxides [air, non-urban air or from high stacks]: 0.000730596 kg; lognormal variance with pedigree 0.0446, pedigree (2,4,3,1,1)
  (same comment as for [sulfonyl]urea-compound)
- Water [air, non-urban air or from high stacks]: 0.235468 m3; lognormal variance with pedigree 0.0052, pedigree (2,4,3,1,1)
  (same comment as for [sulfonyl]urea-compound)
- Abamectin [soil, agricultural]: 3.43056e-7 kg; lognormal variance with pedigree 0.0376, pedigree (2,4,3,1,1)
  The data was collected for a hectare area through interview
- Buprofezin [soil, agricultural]: 1.58889e-5 kg; lognormal variance with pedigree 0.0376, pedigree (2,4,3,1,1)
  The data was collected for a hectare area through interview
- Cadmium II [soil, agricultural]: 4.60749e-7 kg; lognormal variance with pedigree 0.0446, pedigree (2,4,3,1,1)
  (same comment as for [sulfonyl]urea-compound)
- Chromium III [soil, agricultural]: 1.64581e-5 kg; lognormal variance with pedigree 0.0446, pedigree (2,4,3,1,1)
  (same comment as for [sulfonyl]urea-compound)
- Copper ion [soil, agricultural]: 8.16109e-5 kg; lognormal variance with pedigree 0.0446, pedigree (2,4,3,1,1)
  This exchange is an aggregation of amounts:
  5.9944233099570435E-5. Comment:
  2.1666666666666667E-5. Comment:
- Cymoxanil [soil, agricultural]: 8.66667e-6 kg; lognormal variance with pedigree 0.0376, pedigree (2,4,3,1,1)
  The data was collected for a hectare area through interview
- Dichlorvos [soil, agricultural]: 2.74444e-5 kg; lognormal variance with pedigree 0.0376, pedigree (2,4,3,1,1)
  The data was collected for a hectare area through interview
- Dimethomorph [soil, agricultural]: 9.02778e-6 kg; lognormal variance with pedigree 0.0376, pedigree (2,4,3,1,1)
  The data was collected for a hectare area through interview
- Fosetyl [soil, agricultural]: 7.40778e-5 kg; lognormal variance with pedigree 0.0376, pedigree (2,4,3,1,1)
  The data was collected for a hectare area through interview
- Hexaconazole [soil, agricultural]: 1.80556e-6 kg; lognormal variance with pedigree 0.0376, pedigree (2,4,3,1,1)
  The data was collected for a hectare area through interview
- Imidacloprid [soil, agricultural]: 8.03472e-6 kg; lognormal variance with pedigree 0.0376, pedigree (2,4,3,1,1)
  The data was collected for a hectare area through interview
- Lambda-cyhalothrin [soil, agricultural]: 1.80556e-6 kg; lognormal variance with pedigree 0.0376, pedigree (2,4,3,1,1)
  The data was collected for a hectare area through interview
- Lead II [soil, agricultural]: 0.00015459 kg; lognormal variance with pedigree 0.0446, pedigree (2,4,3,1,1)
  (same comment as for [sulfonyl]urea-compound)
- Mancozeb [soil, agricultural]: 0.000326625 kg; lognormal variance with pedigree 0.0376, pedigree (2,4,3,1,1)
  The data was collected for a hectare area through interview
- Mercury II [soil, agricultural]: 7.84982e-8 kg; lognormal variance with pedigree 0.0446, pedigree (2,4,3,1,1)
  (same comment as for [sulfonyl]urea-compound)
- Metalaxil [soil, agricultural]: 3.61111e-6 kg; lognormal variance with pedigree 0.0376, pedigree (2,4,3,1,1)
  The data was collected for a hectare area through interview
- Nickel II [soil, agricultural]: 1.09305e-5 kg; lognormal variance with pedigree 0.0446, pedigree (2,4,3,1,1)
  (same comment as for [sulfonyl]urea-compound)
- Oxyfluorfen [soil, agricultural]: 6.66667e-6 kg; lognormal variance with pedigree 0.0376, pedigree (2,4,3,1,1)
  The data was collected for a hectare area through interview
- Propineb [soil, agricultural]: 5.05556e-5 kg; lognormal variance with pedigree 0.0376, pedigree (2,4,3,1,1)
  The data was collected for a hectare area through interview
- Sulfur [soil, agricultural]: 2.88889e-5 kg; lognormal variance with pedigree 0.0376, pedigree (2,4,3,1,1)
  The data was collected for a hectare area through interview
- Tebuconazole [soil, agricultural]: 3.93333e-6 kg; lognormal variance with pedigree 0.0376, pedigree (2,4,3,1,1)
  The data was collected for a hectare area through interview
- Thiamethoxam [soil, agricultural]: 2.25694e-6 kg; lognormal variance with pedigree 0.0376, pedigree (2,4,3,1,1)
  The data was collected for a hectare area through interview
- Zinc II [soil, agricultural]: 0.000198348 kg; lognormal variance with pedigree 0.0446, pedigree (2,4,3,1,1)
  (same comment as for [sulfonyl]urea-compound)
- Zineb [soil, agricultural]: 0.000108333 kg; lognormal variance with pedigree 0.0376, pedigree (2,4,3,1,1)
  The data was collected for a hectare area through interview
- Ziram [soil, agricultural]: 2.4375e-5 kg; lognormal variance with pedigree 0.0376, pedigree (2,4,3,1,1)
  The data was collected for a hectare area through interview
- Cadmium II [water, ground-]: 2.09619e-9 kg; lognormal variance with pedigree 0.0946, pedigree (2,4,3,1,1)
  (same comment as for [sulfonyl]urea-compound)
- Cadmium II [water, surface water]: 5.82994e-9 kg; lognormal variance with pedigree 0.0946, pedigree (2,4,3,1,1)
  (same comment as for [sulfonyl]urea-compound)
- Chromium III [water, ground-]: 9.33896e-7 kg; lognormal variance with pedigree 0.0946, pedigree (2,4,3,1,1)
  (same comment as for [sulfonyl]urea-compound)
- Chromium III [water, surface water]: 5.38754e-7 kg; lognormal variance with pedigree 0.0946, pedigree (2,4,3,1,1)
  (same comment as for [sulfonyl]urea-compound)
- Copper ion [water, ground-]: 1.59726e-7 kg; lognormal variance with pedigree 0.0946, pedigree (2,4,3,1,1)
  (same comment as for [sulfonyl]urea-compound)
- Copper ion [water, surface water]: 7.87816e-7 kg; lognormal variance with pedigree 0.0946, pedigree (2,4,3,1,1)
  (same comment as for [sulfonyl]urea-compound)
- Lead II [water, ground-]: 2.65254e-8 kg; lognormal variance with pedigree 0.0946, pedigree (2,4,3,1,1)
  (same comment as for [sulfonyl]urea-compound)
- Lead II [water, surface water]: 4.98625e-7 kg; lognormal variance with pedigree 0.0946, pedigree (2,4,3,1,1)
  (same comment as for [sulfonyl]urea-compound)
- Mercury II [water, ground-]: 5.63852e-11 kg; lognormal variance with pedigree 0.0946, pedigree (2,4,3,1,1)
  (same comment as for [sulfonyl]urea-compound)
- Mercury II [water, surface water]: 1.51278e-9 kg; lognormal variance with pedigree 0.0946, pedigree (2,4,3,1,1)
  (same comment as for [sulfonyl]urea-compound)
- Nickel II [water, surface water]: 4.89237e-7 kg; lognormal variance with pedigree 0.0946, pedigree (2,4,3,1,1)
  (same comment as for [sulfonyl]urea-compound)
- Nitrate [water, ground-]: 0.0126402 kg; lognormal variance with pedigree 0.0446, pedigree (2,4,3,1,1)
  (same comment as for [sulfonyl]urea-compound)
- Phosphate [water, ground-]: 8.1765e-6 kg; lognormal variance with pedigree 0.0446, pedigree (2,4,3,1,1)
  (same comment as for [sulfonyl]urea-compound)
- Phosphate [water, surface water]: 4.39214e-5 kg; lognormal variance with pedigree 0.0446, pedigree (2,4,3,1,1)
  (same comment as for [sulfonyl]urea-compound)
- Phosphorus [water, surface water]: 4.13637e-5 kg; lognormal variance with pedigree 0.0446, pedigree (2,4,3,1,1)
  (same comment as for [sulfonyl]urea-compound)
- Water [water, ground-]: 0.180064 m3; lognormal variance with pedigree 0.0052, pedigree (2,4,3,1,1)
  (same comment as for [sulfonyl]urea-compound)
- Water [water, surface water]: 0.0461702 m3; lognormal variance with pedigree 0.0052, pedigree (2,4,3,1,1)
  (same comment as for [sulfonyl]urea-compound)
- Zinc II [water, ground-]: 1.43929e-6 kg; lognormal variance with pedigree 0.0946, pedigree (2,4,3,1,1)
  (same comment as for [sulfonyl]urea-compound)
- Zinc II [water, surface water]: 1.38489e-6 kg; lognormal variance with pedigree 0.0946, pedigree (2,4,3,1,1)
  (same comment as for [sulfonyl]urea-compound)

## Sampling procedure
The farmer was identified and contacted by agriculture science faculty familiar with the local farmers in the region. Data was collected directly from the farmer through semi-structured interview using a questionnaire based on the input requirements of the ecoinvent LCI calculation tool for crop production.

## Extrapolations
Ecoinvent LCI calculation tool for crop production was used to calculate field emissions from the cultivation process.
