# aluminium melting furnace production

Dataset: EcoSpold 2, unit process
Geography: RER
Time period: 2002-01-01 to 2023-12-31
Technology level: current
Classification: ISIC rev.4 ecoinvent: 2815:Manufacture of ovens, furnaces and furnace burners
Classification: EcoSpold01Categories: metals/extraction
Tags: ConvertedDataset
Scenario: Business-as-Usual
System model: Allocation, cut-off by classification
Generated by: Hans-Jörg Althaus
Published in: Althaus H.-J. 2000
Database: ecoinvent
isCopyrightProtected: true
accessRestrictedTo: 1

## General comment
Medium sized plant. Output: 10'000 t/a, life time: 50 years. Assumption is based on data for casting plant.
[This dataset was already contained in the ecoinvent database version 2. It was not individually updated during the transfer to ecoinvent version 3. Life Cycle Impact Assessment results may still have changed, as they are affected by changes in the supply chain, i.e. in other datasets. This dataset was generated following the ecoinvent quality guidelines for version 2. It may have been subject to central changes described in the ecoinvent version 3 change report (http://www.ecoinvent.org/database/ecoinvent-version-3/reports-of-changes/), and the results of the central updates were reviewed extensively. The changes added e.g. consistent water flows and other information throughout the database. The documentation of this dataset can be found in the ecoinvent reports of version 2, which are still available via the ecoinvent website. The change report linked above covers all central changes that were made during the conversion process.]

## Included activities start
The activity starts from the transformation of unspecified land to industrial area.

## Included activities end
Production hall and machinery (including disposal). Does not include administrative buildings because they are included in casting plant.

## Geography
Some Swiss datasets are used for European processes.

## Technology
Assumed technology

## Reference product
- aluminium melting furnace: 1 unit; By-product classification allocatable product; CPC 43420: Industrial or laboratory furnaces and ovens, except non-electric bakery ovens; other industrial or laboratory […]; HS2017 8417: Furnaces and ovens; industrial or laboratory, including incinerators, non-electric
  production volume 1.32237 unit
    This is a placeholder value that does not reflect real-world production volumes. This dataset does not currently require a real-world production volume to work in the database framework, and no actual data were collected yet. This has no negative effect on the results of the ecoinvent database. The placeholder value of this activity was scaled according to the nominal GDP of 2005 (source: United Nations, http://data.un.org/Glossary.aspx?q=GDP+%28current+US%24%29, accessed 20130726) to reflect an appropriate share of the global production volume, which is also a placeholder value.
  property price 228000 EUR2005
    Calculated based on inputs: The price of the product has been calculated as a sum of the values of the material and energy inputs for this product. This value is therefore a rough estimation. It may underestimate the real price since there are additional expenses when producing any product. These expences can include for example labour costs, treatment of waste materials and profit for the producer. Please consider carefully whether this level of data quality is acceptable for your application.
  properties: carbon allocation 0 kg, carbon content 0

## Inputs from technosphere
- building, hall: 938 m2; lognormal variance with pedigree 0.5, pedigree (5,5,5,5,5)
- concrete, normal strength: 43.2394, 23.7606 m3 (2 suppliers, which the file names only by identifier); sum of these 67 m3; lognormal variance with pedigree 0.5, pedigree (5,5,5,5,5)
  properties: dry mass 2190 kg, water content 0.086758, wet mass 2380 kg
- industrial machine, heavy, unspecified: 154000 kg; lognormal variance with pedigree 0.5, pedigree (5,5,5,5,5)
  activityLink introduced to establish a direct link to the corresponding regional supply of this product
- waste concrete, not reinforced: -152385, -1614.64 kg (2 suppliers, which the file names only by identifier); sum of these -154000 kg; lognormal variance with pedigree 0.5, pedigree (5,5,5,5,5)
  production volume
    Calculated from the production volume of aluminium melting furnace in proportion to the respective output amounts.
  properties: dry mass 1 kg, wet mass 1 kg

## Inputs from nature
- Occupation, industrial area [natural resource, land]: 1.875e6 m2*year; lognormal variance with pedigree 0.24, pedigree (5,5,5,5,5)
- Transformation, from unspecified [natural resource, land]: 37500 m2; lognormal variance with pedigree 0.32, pedigree (5,5,5,5,5)
- Transformation, to industrial area [natural resource, land]: 37510 m2; lognormal variance with pedigree 0.32, pedigree (5,5,5,5,5)

## Sampling procedure
Internet search

## Extrapolations
see Geography

## Review by Roland Hischier 2003-08-20
Passed.
