# heat production, natural gas, at boiler condensing modulating <100kW

Dataset: EcoSpold 2, unit process
Geography: Europe without Switzerland
Time period: 2000-01-01 to 2023-12-31
Technology level: current
Classification: ISIC rev.4 ecoinvent: 3530:Steam and air conditioning supply
Classification: EcoSpold01Categories: natural gas/heating systems
Synonyms: Brennwerttechnik
Tags: ConvertedDataset
Scenario: Business-as-Usual
System model: Allocation, cut-off by classification
Generated by: Thomas Heck
Published in: Faist Emmenegger, M. 2007
Database: ecoinvent
isCopyrightProtected: true
accessRestrictedTo: 1

## General comment
NOx and CO emissions derived from measurements under controlled conditions; no adjustment to real operation made due to lack of information. Other emission data from different references.
[This dataset was already contained in the ecoinvent database version 2. It was not individually updated during the transfer to ecoinvent version 3. Life Cycle Impact Assessment results may still have changed, as they are affected by changes in the supply chain, i.e. in other datasets. This dataset was generated following the ecoinvent quality guidelines for version 2. It may have been subject to central changes described in the ecoinvent version 3 change report (http://www.ecoinvent.org/database/ecoinvent-version-3/reports-of-changes/), and the results of the central updates were reviewed extensively. The changes added e.g. consistent water flows and other information throughout the database. The documentation of this dataset can be found in the ecoinvent reports of version 2, which are still available via the ecoinvent website. The change report linked above covers all central changes that were made during the conversion process.]

## Included activities end
The module includes fuel input from low pressure (CH) network, infrastructure (boiler), emissions to air and water, and electricity needed for operation.

## Geography
Natural gas input (low pressure) and emission data extrapolated from Switzerland to Europe.

## Technology
Models on market

## Reference product
- heat, central or small-scale, natural gas: 1 MJ; By-product classification allocatable product; CPC 17300: Steam and hot water
  EcoSpold01Location=RER
  production volume 9.8e11 MJ
    38.9% = 7.47 EJ of the natural gas consumption in EU27 (eurogas.org), divided evenly over 7 boiler types, multiplied by the conversion efficiency of the boiler type on a gross calorific value basis (91.8%)
  property price 0.01 EUR2005
    Temporary price data. Calculated as 90% of purchasers price based on: Average European district heat price from Ecoheatcool and Euroheat 2005-2006, Ecoheat Work package 1: The European heat market. Final report. http://www.solarthermalworld.org/files/Ecoheatcool%20WP1%20Web.pdf?download
  properties: Corresponding fuel use 0.98 MJ, carbon allocation 0 kg, carbon content 0, heating value, net 1 MJ

## Inputs from technosphere
- electricity, low voltage: 0.0027244 kWh; lognormal variance with pedigree 0.16, pedigree (1,1,5,1,1)
  range of electricity for pumps etc., different literature
  EcoSpold01Location=UCTE
- gas boiler: 6.468e-7 unit; lognormal variance with pedigree 0.08, pedigree (1,1,5,1,1)
  uncertainty of life time and extrapolation to range of capacity
  EcoSpold01Location=RER
- natural gas, low pressure: 0.00150484, 0.00281977, 0.00508834, 0.00122895, 0.00225246, 0.00279536, 0.00512485, 0.00640766 m3 (8 suppliers, which the file names only by identifier); sum of these 0.0272222 m3; = 1/NG_LHV; lognormal variance with pedigree 0.05, pedigree (1,1,5,1,1)
  CH module used for RER. Adjusted with a LHV of 36 MJ/m3
  EcoSpold01Location=CH
  properties: carbon content, fossil 0.695187, dry mass 1 kg, heating value, gross 40 MJ, heating value, net 36 MJ, wet mass 1 kg
  note on carbon content, fossil: C content considered the same as in high pressure (consumption mix)
  note on heating value, net: Literature value, Source: Christoph Meili;Niels Jungbluth;Maresa Bussa (2021) Life cycle inventories of crude oil and natural gas extraction. ESU-services Ltd. commissioned by BAFU & VSG, Schaffhausen, Switzerland, http://esu-services.ch/data/public-lci-reports/

## Emissions to nature
- Acetaldehyde [air, urban air close to ground]: 9.8e-10 kg; lognormal variance with pedigree 1.12, pedigree (1,1,5,1,1)
  rough estimate, high uncertainty
- Acetic acid [air, urban air close to ground]: 1.47e-7 kg; lognormal variance with pedigree 1.12, pedigree (1,1,5,1,1)
  rough estimate, high uncertainty
- Benzene [air, urban air close to ground]: 3.92e-7 kg; lognormal variance with pedigree 1.12, pedigree (1,1,5,1,1)
  rough estimate, high uncertainty
- Benzo(a)pyrene [air, urban air close to ground]: 9.8e-12 kg; lognormal variance with pedigree 1.12, pedigree (1,1,5,1,1)
  rough estimate, high uncertainty
- Butane [air, urban air close to ground]: 6.86e-7 kg; lognormal variance with pedigree 1.12, pedigree (1,1,5,1,1)
  rough estimate, high uncertainty
- Carbon dioxide, fossil [air, urban air close to ground]: 0.05488 kg; lognormal variance with pedigree 0.04, pedigree (1,1,5,1,1)
  composition of natural gas
- Carbon monoxide, fossil [air, urban air close to ground]: 5.782e-6 kg; lognormal variance with pedigree 1.04, pedigree (1,1,5,1,1)
  calculated based on (SVGW 2002)
- Dinitrogen monoxide [air, urban air close to ground]: 4.9e-7 kg; lognormal variance with pedigree 1.12, pedigree (1,1,5,1,1)
  rough estimate, high uncertainty
- Dioxins, measured as 2,3,7,8-tetrachlorodibenzo-p-dioxin [air, urban air close to ground]: 2.94e-17 kg; lognormal variance with pedigree 1.12, pedigree (1,1,5,1,1)
  rough estimate, high uncertainty
- Formaldehyde [air, urban air close to ground]: 9.8e-8 kg; lognormal variance with pedigree 1.12, pedigree (1,1,5,1,1)
  rough estimate, high uncertainty
- Mercury II [air, urban air close to ground]: 2.94e-11 kg; lognormal variance with pedigree 0.69, pedigree (1,1,5,1,1)
  trace element in natural gas
- Methane, fossil [air, urban air close to ground]: 1.96e-6 kg; lognormal variance with pedigree 1.12, pedigree (1,1,5,1,1)
  rough estimate, high uncertainty
- Nitrogen oxides [air, urban air close to ground]: 9.702e-6 kg; lognormal variance with pedigree 0.45, pedigree (1,1,5,1,1)
  calculated based on (SVGW 2002)
- PAH, polycyclic aromatic hydrocarbons [air, urban air close to ground]: 9.8e-9 kg; lognormal variance with pedigree 1.12, pedigree (1,1,5,1,1)
  rough estimate, high uncertainty
- Particulate Matter, < 2.5 um [air, urban air close to ground]: 9.8e-8 kg; lognormal variance with pedigree 0.16, pedigree (1,1,5,1,1)
  literature
- Pentane [air, urban air close to ground]: 1.176e-6 kg; lognormal variance with pedigree 1.12, pedigree (1,1,5,1,1)
  rough estimate, high uncertainty
- Propane [air, urban air close to ground]: 1.96e-7 kg; lognormal variance with pedigree 1.12, pedigree (1,1,5,1,1)
  rough estimate, high uncertainty
- Propionic acid [air, urban air close to ground]: 1.96e-8 kg; lognormal variance with pedigree 1.12, pedigree (1,1,5,1,1)
  rough estimate, high uncertainty
- Sulfur dioxide [air, urban air close to ground]: 4.9e-7 kg; lognormal variance with pedigree 0.04, pedigree (1,1,5,1,1)
  composition of natural gas
- Toluene [air, urban air close to ground]: 1.96e-7 kg; lognormal variance with pedigree 1.12, pedigree (1,1,5,1,1)
  rough estimate, high uncertainty
- Nitrate [water, surface water]: 1.274e-7 kg; lognormal variance with pedigree 0.34, pedigree (1,1,5,1,1)
  literature, range of values
- Nitrite [water, surface water]: 2.94e-9 kg; lognormal variance with pedigree 0.34, pedigree (1,1,5,1,1)
  literature, range of values
- Sulfate [water, surface water]: 4.9e-8 kg; lognormal variance with pedigree 0.34, pedigree (1,1,5,1,1)
  literature, range of values
- Sulfite [water, surface water]: 4.9e-8 kg; lognormal variance with pedigree 0.34, pedigree (1,1,5,1,1)
  literature, range of values

## Sampling procedure
Literature, manufacturers; CO and NOx emissions from (SVGW 2002), sample size (number of selected devices for which emission values are given in SVGW list): CO 402 , NOx 402 .

## Extrapolations
see Geography

## Review by Michael Spielmann (obsolete) 2003-07-06
Preliminary passed, based on a review of a first draft of the final report. Data have to be validated again after review of the written report.
