# coffee green bean production, arabica

Dataset: EcoSpold 2, unit process
Geography: RoW
Time period: 2001-01-01 to 2023-12-31
Technology level: current
Classification: ISIC rev.4 ecoinvent: 0127:Growing of beverage crops
Tags: WFLDB
Scenario: Business-as-Usual
System model: Allocation, cut-off by classification
Generated by: [System]
Database: ecoinvent
isCopyrightProtected: true
accessRestrictedTo: 1

## General comment
This dataset is a weighted average of the regional datasets, with weights based on production volume of the reference product. Detailed comments and sources about the exchanges can be found in the regional datasets.
The geographicalCorrelation score of every pedigree matrix of was changed to '5'.
Sum of regional production volumes: 2.923e+9 kg
BR: PV = 2.072e+9 kg; weight = 0.7087
CO: PV = 4.837e+8 kg; weight = 0.1655
HN: PV = 2.758e+8 kg; weight = 0.09437
IN: PV = 9.197e+7 kg; weight = 0.03146
Yield of the global dataset = 1523.71374324 kg/ha, calculated as a weighted average of the regional yields.
The comments below were part of the BR regional dataset.
This dataset represents the production of 1 kg of green coffee beans (Arabica). Arabica is a variety of coffee that has a sweeter, softer taste, with tones of sugar, fruit, and berries. It has a higher acidity but twice less caffeine compared to Robusta beans, and is generally considered to be of higher quality compared to Robusta. Arabica is mostly grown in Latin America and India. The reference flow is the average yield per ha and year, from 2001 - 2014: yield (1800 kg/ha) obtained under irrigated conditions (total amount of water 1987 m3/ha). The data are representative for Arabica green coffee beans production in Brazil used for the export market. Mineral NPK fertiliser input is 173-35-247 kg/ha. No organic fertilisers are applied. Total active ingredients (a.i.) applied as pesticides amount to 7.8 kg a.i./ha.
The dataset was modelled within the project 'World Food LCA database (WFLDB)'. The aim of this project was to provide inventories of a broad variety of agricultural products and processes and to cover for each product at least 50% of the global export market. The export share of coffee produced in Brazil amounts to 34.5% of the global export (tonnage exported in 2010), 70% of which is Arabica (expert estimate). The production system regarded in this dataset aimed at representing Arabica green coffee beans produced in Brazil for the export market.
PEF-Quality: data quality rating (DQR) = 1.5 (i.e. excellent quality).
This dataset refers to an average situation; for specific situations exchanges might differ substantially due to site specific parameters

## Included activities start
This activity starts with the nursery producing fruit tree seedlings, i.e.grafted young trees to be planted.

## Included activities end
This activity ends with the waste treatment after the clearing of the orchard (rooting up the trees). The dataset includes all activities during a year in the productive phase of the orchard including the establishment phase per year of lifetime (20 years), the clearing of the orchard including waste treatment.
The establishment phase of the orchard includes tree nursery, soil cultivation, planting trees, installation of trellis system (posts and wires) and irrigation. Fertiliser and pesticide use in a year of the establishment phase is assumed to be half of the amount of a year in the productive phase.
The productive phase of the orchard includes machine operations, corresponding infrastructure, fuel use and sheds. Machine operations in the productive phase are: soil cultivation (mulching, mowing), fertiliser and pesticide application, harvesting and irrigation. Further, direct field emissions and land use change are included. At the end of the productive phase the orchard is cleared by rooting up the trees.
The inputs of seedlings, fertilisers and pesticides as well as packaging of fertilisers and pesticides are considered. Green coffee beans are dried using wood a fuel. Heavy metal uptake by the crop is considered.

## Reference product
- coffee, green bean: 1 kg; By-product classification allocatable product; CPC 01610: Coffee, green; HS2017 090111: Coffee; not roasted or decaffeinated
  production volume 6.84593e8 kg; name pv_coffee
    The production volume is a 3-year-average from the season 2019/20 to 2021/22. The total production volume of coffee green bean in BR-MG has been substracted from the global production volume. Source: USDA (2023). Coffee: World Markets and Trade, https://apps.fas.usda.gov/psdonline/circulars/coffee.pdf.
  property carbon content, non-fossil 0.490083
    calculation: C-content of components according to ecoinvent report No. 15a. Source of composition: Souci, S.W., Fachmann, W., Kraut, H. (Hg.: Bundesminsiterium fur Ernahrung, Landwirtschaft und Forsten, Bonn) 'Die Zusammensetzung der Lebensmittel - Nahrwerttabellen', medpharm Scientific Publishers Stuttgart, CRC Press; 2000.
  property price 1.6 EUR2005
    Calculated value based on data from United Nations Commodity Trade Statistics Database (comtrade.un.org). UN comtrade category: 90111 Coffee, not roasted, not decaffeinated. Year: 2005. Using exchange rate of 1EURO = 1.209 USD. Average of price of import into 5 main markets (EU, US, JP, IN and CN).
  properties: carbon allocation 0.444722 kg, carbon content 0.490083, carbon content, fossil 0, dry mass 0.907441 kg, water content 0.102, water in wet mass 0.092559 kg, wet mass 1 kg

## Inputs from technosphere
- [thio]carbamate-compound: 0.000166295 kg; lognormal variance with pedigree 0.0158498, pedigree (2,2,4,5,1)
  Literature value or expert estimation (Personal written communication, FNC., 2015).
  properties: carbon content, fossil 0.626349, dry mass 1 kg, wet mass 1 kg
- ammonium nitrate: 0.00416746, 0.0022215, 0.00754135, 0.00289029 kg (4 suppliers, which the file names only by identifier); sum of these 0.0168206 kg; lognormal variance with pedigree 0.126177, pedigree (2,1,4,5,1)
  The exchange has been updated from 'ammonium nitrate, as N' into 'ammonium nitrate' and therefore its amount has been scaled (multiplied) from 0.0059 kg by 2.8573 kg of 'ammonium nitrate' per kg of 'ammonium nitrate, as N'. Original comment of the exchange is: Calculated based on literature values or expert estimation: The total amount of nutrient (Personal written communication, FNC., 2015) multiplied by the share of fertiliser type (Personal written communication, FNC., 2015). See supporting documentation 'WFLDB-Documentation.pdf' chapter 'Fertiliser application' for L3 and L4 data (https://ecoquery.ecoinvent.org/File/Reports).
  Corresponds to 21.2 kg/ha
  properties: dry mass 1 kg, wet mass 1 kg
- application of plant protection product, by field sprayer: 0.000203835 ha; lognormal variance with pedigree 0.126664, pedigree (2,2,4,5,1)
  Proxy: Extrapolated using a modified MEXALCA-approach (Roches et al. 2010; Nemecek et al. 2012). See supporting documentation 'WFLDB-Documentation.pdf' chapter 'Machinery processes' for L1 data (https://ecoquery.ecoinvent.org/File/Reports). Field sprayer used as a proxy for pesticide application in orchards.
- biowaste: -1.51604, -1.83396 kg (2 suppliers, which the file names only by identifier); sum of these -3.35 kg; lognormal variance with pedigree 0.325577, pedigree (5,5,5,5,5)
  production volume; = pv_coffee*m_biowaste
    Calculated based on the production volume of the reference product (coffee, green bean) and mass of by-product (biowaste)
  properties: carbon content, non-fossil 0.1624, dry mass 0.4 kg, heating value, net 4.29 MJ, water content 1.5, wet mass 1 kg
  note on heating value, net: Value taken from the general comment of the treatment dataset.
- bipyridylium-compound: 0.00081501 kg; lognormal variance with pedigree 0.0157498, pedigree (2,1,4,5,1)
  Literature value or expert estimation (Coltro et al. 2006).
  properties: carbon content, fossil 0.418929, dry mass 1 kg, wet mass 1 kg
- boric acid, anhydrous, powder: 0.00405536 kg; lognormal variance with pedigree 0.0157498, pedigree (2,1,4,5,1)
  Literature value or expert estimation (Coltro et al. 2006).
  properties: dry mass 1 kg, wet mass 1 kg
- compost: 0.0252214 kg; lognormal variance with pedigree 0.126177, pedigree (2,1,4,5,1)
  Literature value or expert estimation (Personal written communication, FNC., 2015). Corresponds to 91.0 kg/ha
  properties: cadmium content 3.6e-7, carbon content, non-fossil 0.183645, chromium content 2.23e-5, copper content 5.77e-5, dry mass 0.5 kg, lead content 4.9e-5, mercury content 1.2e-7, nickel content 1.63e-5, nitrogen content 0.014, phosphorus content 0.0035, potassium content 0.01, water content 1, wet mass 1 kg, zinc content 0.000184
- copper oxide: 0.00191155 kg; lognormal variance with pedigree 0.0158498, pedigree (2,2,4,5,1)
  Literature value or expert estimation (Personal written communication, FNC., 2015).
  properties: dry mass 1 kg, wet mass 1 kg
- cyclic N-compound: 0.00050798 kg; lognormal variance with pedigree 0.0158498, pedigree (2,2,4,5,1)
  Literature value or expert estimation (Personal written communication, FNC., 2015).
  properties: carbon content, fossil 0.641962, dry mass 1 kg, wet mass 1 kg
- diesel, burned in agricultural machinery: 3.02755 MJ; lognormal variance with pedigree 0.126177, pedigree (2,1,4,5,1)
  Literature value or expert estimation (Personal written communication, Herma Mulder, Nedcoffee., 2014).
- electricity, low voltage: 4.89474e-5, 0.000902179, 0.00488164, 0.000189716, 7.37629e-5, 0.00514902, 0.00122729, 7.40152e-5, 0.000252949, 0.00057578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 kWh (70 suppliers, which the file names only by identifier); sum of these 0.127173 kWh; lognormal variance with pedigree 0.126177, pedigree (2,1,4,5,1)
  Literature value or expert estimation (Sreejith et al. 2013).
- establishing orchard: 0.227081 unit
  Literature value or expert estimation (Personal written communication, FNC., 2015). This is the number of trees per ha divided by the lifetime years of the orchard.
- fertilising, by broadcaster: 0.00013589 ha; lognormal variance with pedigree 0.126177, pedigree (2,1,4,5,1)
  Proxy: Extrapolated using a modified MEXALCA-approach (Roches et al. 2010; Nemecek et al. 2012). See supporting documentation 'WFLDB-Documentation.pdf' chapter 'Machinery processes' for L1 data (https://ecoquery.ecoinvent.org/File/Reports).
- fruit tree seedling, for planting: 0.227081 unit
  (same comment as for establishing orchard)
  properties: carbon content, non-fossil 0.439481, dry mass 0.578035 kg, water content 0.73, wet mass 1 kg
  note on carbon content, non-fossil: calculation: C-content of components according to ecoinvent report No. 15a. Source of composition: https://ndb.nal.usda.gov/ndb/search/. Unspecific seedling used as proxy.
- glyphosate: 2.3592e-5 kg; lognormal variance with pedigree 0.0158498, pedigree (2,2,4,5,1)
  Literature value or expert estimation (ECLAC 2014).
  properties: carbon content, fossil 0.214286, dry mass 1 kg, wet mass 1 kg
- gypsum, mineral: 0.0960853, 0.000202223, 0.000450554 kg (3 suppliers, which the file names only by identifier); sum of these 0.0967381 kg; lognormal variance with pedigree 0.126177, pedigree (2,1,4,5,1)
  Calculated based on literature values or expert estimation: The total amount of nutrient (Coltro et al. 2006) multiplied by the share of fertiliser type (Coltro et al. 2006). See supporting documentation 'WFLDB-Documentation.pdf' chapter 'Fertiliser application' for L3 and L4 data (https://ecoquery.ecoinvent.org/File/Reports).
  properties: dry mass 1 kg, wet mass 1 kg
- heat, central or small-scale, other than natural gas: 4.0504 MJ; lognormal variance with pedigree 0.126177, pedigree (2,1,4,5,1)
  properties: heating value, net 1 MJ
- heat, district or industrial, other than natural gas: 0.181428 MJ; lognormal variance with pedigree 0.126177, pedigree (2,1,4,5,1)
  Literature value or expert estimation (Coltro et al. 2006). Light fuel oil used at the farm for other activities than depulping and drying.
  properties: heating value, net 1 MJ
- inorganic nitrogen fertiliser, as N: 1.46398e-6, 0.000343533, 4.07511e-5, 0.000437599, 0.000100097, 4.23899e-5, 0.000390686, 3.66869e-5, 0.000257376, 2.63298e-5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 kg (27 suppliers, which the file names only by identifier); sum of these 0.0394224 kg; lognormal variance with pedigree 0.126177, pedigree (2,1,4,5,1)
  Calculated based on literature values or expert estimation: The total amount of nutrient (Personal written communication, FNC., 2015) multiplied by the share of fertiliser type (Personal written communication, FNC., 2015). See supporting documentation 'WFLDB-Documentation.pdf' chapter 'Fertiliser application' for L3 and L4 data (https://ecoquery.ecoinvent.org/File/Reports).
  Corresponds to 24.2 kg/ha
  properties: dry mass 1 kg, wet mass 1 kg
- inorganic phosphorus fertiliser, as P2O5: 1.65751e-5, 3.6791e-5, 0.000318303, 1.02723e-5, 2.5227e-6, 3.5723e-6, 8.91233e-6, 1.1706e-6, 1.36789e-7, 8.77107e-5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 kg (27 suppliers, which the file names only by identifier); sum of these 0.00202882 kg; lognormal variance with pedigree 0.126177, pedigree (2,1,4,5,1)
  Calculated based on literature values or expert estimation: The total amount of nutrient (Personal written communication, FNC., 2015) multiplied by the country-share of fertiliser type (IFA 2014). See supporting documentation 'WFLDB-Documentation.pdf' chapter 'Fertiliser application' for L3 and L4 data (https://ecoquery.ecoinvent.org/File/Reports).
  Corresponds to 0.685 kg/ha
  properties: dry mass 1 kg, wet mass 1 kg
- inorganic potassium fertiliser, as K2O: 4.12244e-5, 1.33807e-5, 4.63406e-6, 0.000198212, 5.96229e-6, 2.29637e-5, 9.92731e-6, 3.73873e-7, 1.25936e-5, 8.26456e-6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 kg (27 suppliers, which the file names only by identifier); sum of these 0.00629538 kg; lognormal variance with pedigree 0.126177, pedigree (2,1,4,5,1)
  Calculated based on literature values or expert estimation: The total amount of nutrient (Personal written communication, FNC., 2015) multiplied by the share of fertiliser type (Personal written communication, FNC., 2015). See supporting documentation 'WFLDB-Documentation.pdf' chapter 'Fertiliser application' for L3 and L4 data (https://ecoquery.ecoinvent.org/File/Reports).
  Corresponds to 22.7 kg/ha
  properties: dry mass 1 kg, wet mass 1 kg
- irrigation: 0.000123476, 0.150685, 0.00190239, 0.00510069, 0.00701131, 0.543574, 0.00111282, 2.86201e-5, 0.0668753, 0.00114122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 m3 (14 suppliers, which the file names only by identifier); sum of these 0.815977 m3; lognormal variance with pedigree 0.126177, pedigree (2,1,4,5,1)
  Calculated value: The total amount of water used for irrigation (Personal written communication, FNC., 2015) multiplied by the country-share of irrigation technique (Personal written communication, FNC., 2015). See supporting documentation 'WFLDB-Documentation.pdf' chapter 'Water use for irrigation' (https://ecoquery.ecoinvent.org/File/Reports).
  properties: dry mass 0.11 kg, water content 9089.91, wet mass 1000 kg
- lime: 0.303594, 0.026221 kg (2 suppliers, which the file names only by identifier); sum of these 0.329815 kg; lognormal variance with pedigree 0.126177, pedigree (2,1,4,5,1)
  Calculated based on literature values or expert estimation: The total amount of nutrient (Coltro et al. 2006) multiplied by the share of fertiliser type (Coltro et al. 2006). See supporting documentation 'WFLDB-Documentation.pdf' chapter 'Fertiliser application' for L3 and L4 data (https://ecoquery.ecoinvent.org/File/Reports).
  Corresponds to 614.0 kg/ha
  properties: carbon content, fossil 0.120005, dry mass 1 kg, wet mass 1 kg
- manganese(III) oxide: 0.0017442 kg; lognormal variance with pedigree 0.0157498, pedigree (2,1,4,5,1)
  Literature value or expert estimation (Coltro et al. 2006).
  properties: dry mass 1 kg, wet mass 1 kg
- nickel, class 1: 1.41552e-5 kg; lognormal variance with pedigree 0.126177, pedigree (2,1,4,5,1)
  Literature value or expert estimation (ECLAC 2014).
  properties: dry mass 1 kg, wet mass 1 kg
- nitrile-compound: 0.000208152 kg; lognormal variance with pedigree 0.0158498, pedigree (2,2,4,5,1)
  Literature value or expert estimation (Personal written communication, FNC., 2015).
  properties: carbon content, fossil 0.344995, dry mass 1 kg, wet mass 1 kg
- organophosphorus-compound, unspecified: 0.00107624 kg; lognormal variance with pedigree 0.0158498, pedigree (2,2,4,5,1)
  Literature value or expert estimation (ECLAC 2014).
  properties: carbon content, fossil 0.260898, dry mass 1 kg, wet mass 1 kg
- packaging, for fertilisers: 1.50834 kg; lognormal variance with pedigree 0.0592, pedigree (4,3,4,5,4)
  Total amount of active substance/s of fertilisers needed for the production of 'coffee, green bean' is calculated to be circa 7.54E-01 kg. Fertiliser/s used in this dataset is/are: 'ammonium nitrate, as N', 'gypsum, mineral', 'lime', 'nitrogen fertiliser, as N', 'phosphate fertiliser, as P2O5', 'phosphate rock, as P2O5, beneficiated, dry', 'potassium chloride, as K2O', 'potassium fertiliser, as K2O', 'potassium sulfate, as K2O', 'urea, as N'. The total amount of active substance/s is doubled in order to account for the packaging of the dilluted product of fertiliser/s that is/are applied. Therefore, 1.51E+00 kg of packaging for fertilisers is justified with this exchange.
  properties: carbon content, fossil 0.825301, dry mass 1 kg, heating value, net 25.01 MJ, price 0.0642 EUR2005, wet mass 1 kg
  note on carbon content, fossil: Considering a chemical formula (C2H4)n for polyethylene, carbon content-fossil is calculated to be 0.856286 kg of Carbon per kg of dry mass.
- packaging, for pesticides: 0.0316048 kg; lognormal variance with pedigree 0.0592, pedigree (4,3,4,5,4)
  Total amount of active substance/s of pesticides needed for the production of coffee, green bean is calculated to be circa 1.58E-02 kg. Pesticide/s used in this dataset is/are: '[thio]carbamate-compound', 'bipyridylium-compound', 'boric acid, anhydrous, powder', 'copper oxide', 'cyclic N-compound', 'glyphosate', 'manganese(III) oxide', 'nickel, 99.5%', 'nitrile-compound', 'organophosphorus-compound, unspecified', 'portafer', 'sulfite', 'zinc monosulfate'. The total amount of active substance/s is doubled in order to account for the packaging of the dilluted product of pesticide/s that is/are applied. Therefore, 3.16E-02 kg of packaging for pesticides is justified with this exchange.
  properties: carbon content, fossil 0.85714, dry mass 1 kg, heating value, net 25.97 MJ, price 0.0642 EUR2005, wet mass 1 kg
- petrol, unleaded, burned in machinery: 0.00545046 MJ; lognormal variance with pedigree 0.126177, pedigree (2,1,4,5,1)
  Literature value or expert estimation (ECLAC 2014).
  properties: heating value, net 1 MJ
- phosphate rock, beneficiated: 0.00118195, 0.00118195, 0.000403162, 0.0890299 kg (4 suppliers, which the file names only by identifier); sum of these 0.091797 kg; lognormal variance with pedigree 0.126177, pedigree (2,1,4,5,1)
  The exchange has been updated from 'phosphate rock, as P2O5, beneficiated, dry' into 'phosphate rock, beneficiated' and therefore its amount has been scaled (multiplied) from 0.0294 kg by 3.125 kg of 'phosphate rock, beneficiated' per kg of 'phosphate rock, as P2O5, beneficiated, dry'. Original comment of the exchange is: Calculated based on literature values or expert estimation: The total amount of nutrient (Personal written communication, FNC., 2015) multiplied by the country-share of fertiliser type (IFA 2014). See supporting documentation 'WFLDB-Documentation.pdf' chapter 'Fertiliser application' for L3 and L4 data (https://ecoquery.ecoinvent.org/File/Reports).
  Corresponds to 0.28 kg/ha
  properties: dry mass 1 kg, wet mass 1 kg
- planting tree: 0.227081 unit
  Literature value expert estimation. This is the number of trees per ha (i.e. 4698 trees/ha) divided by the lifetime years of the orchard (i.e. 20 years).
- portafer: 0.000645708 kg; lognormal variance with pedigree 0.0157498, pedigree (2,1,4,5,1)
  Literature value or expert estimation (Coltro et al. 2006).
  properties: dry mass 1 kg, wet mass 1 kg
- potassium chloride: 0.00350824, 0.0423024 kg (2 suppliers, which the file names only by identifier); sum of these 0.0458107 kg; lognormal variance with pedigree 0.126177, pedigree (2,1,4,5,1)
  The exchange has been updated from 'potassium chloride, as K2O' into 'potassium chloride' and therefore its amount has been scaled (multiplied) from 0.0289 kg by 1.5829 kg of 'potassium chloride' per kg of 'potassium chloride, as K2O'. Original comment of the exchange is: Calculated based on literature values or expert estimation: The total amount of nutrient (Personal written communication, FNC., 2015) multiplied by the share of fertiliser type (Personal written communication, FNC., 2015). See supporting documentation 'WFLDB-Documentation.pdf' chapter 'Fertiliser application' for L3 and L4 data (https://ecoquery.ecoinvent.org/File/Reports).
  Corresponds to 48.3 kg/ha
  properties: dry mass 1 kg, wet mass 1 kg
- potassium sulfate: 0.0312534, 0.148364 kg (2 suppliers, which the file names only by identifier); sum of these 0.179618 kg; lognormal variance with pedigree 0.126177, pedigree (2,1,4,5,1)
  The exchange has been updated from 'potassium sulfate, as K2O' into 'potassium sulfate' and therefore its amount has been scaled (multiplied) from 0.0971 kg by 1.85 kg of 'potassium sulfate' per kg of 'potassium sulfate, as K2O'. Original comment of the exchange is: Calculated based on literature values or expert estimation: The total amount of nutrient (Coltro et al. 2006) multiplied by the share of fertiliser type (Coltro et al. 2006). See supporting documentation 'WFLDB-Documentation.pdf' chapter 'Fertiliser application' for L3 and L4 data (https://ecoquery.ecoinvent.org/File/Reports).
  Corresponds to 247.0 kg/ha
  properties: dry mass 1 kg, wet mass 1 kg
- rape oil, crude: 2.60699e-7, 0.000160316 kg (2 suppliers, which the file names only by identifier); sum of these 0.000160577 kg; lognormal variance with pedigree 0.0157498, pedigree (2,1,4,5,1)
  (same comment as for diesel, burned in agricultural machinery)
  properties: carbon content, non-fossil 0.776, dry mass 1 kg, heating value, net 23.51 MJ, wet mass 1 kg
- sulfite: 0.00177377, 0.000875992 kg (2 suppliers, which the file names only by identifier); sum of these 0.00264977 kg; lognormal variance with pedigree 0.0157498, pedigree (2,1,4,5,1)
  Literature value or expert estimation (Coltro et al. 2006).
  properties: dry mass 1 kg, wet mass 1 kg
- transport, tractor and trailer, agricultural: 0.000250645, 1.01924e-6 metric ton*km (2 suppliers, which the file names only by identifier); sum of these 0.000251665 metric ton*km; lognormal variance with pedigree 0.164439, pedigree (4,1,4,5,1)
  On-farm transport: Yield (in tonnes) multiplied by the average distance from field to farm. The distance was assumed to be 2 km (proxy).
- trellis system, wooden poles, soft wood, tar impregnated: 0.000784706 ha; lognormal variance with pedigree 0.135577, pedigree (3,1,4,5,3)
  Used to attach trees in orchards with a tree density of more than 500 trees per ha.
- urea: 0.118942, 0.0150428, 0.0186481, 0.101568 kg (4 suppliers, which the file names only by identifier); sum of these 0.254201 kg; lognormal variance with pedigree 0.126177, pedigree (2,1,4,5,1)
  The exchange has been updated from 'urea, as N' into 'urea' and therefore its amount has been scaled (multiplied) from 0.1186 kg by 2.1438 kg of 'urea' per kg of 'urea, as N'. Original comment of the exchange is: Calculated based on literature values or expert estimation: The total amount of nutrient (Personal written communication, FNC., 2015) multiplied by the share of fertiliser type (Personal written communication, FNC., 2015). See supporting documentation 'WFLDB-Documentation.pdf' chapter 'Fertiliser application' for L3 and L4 data (https://ecoquery.ecoinvent.org/File/Reports).
  Corresponds to 48.4 kg/ha
  properties: carbon content, fossil 0.2, dry mass 1 kg, wet mass 1 kg
- waste wood, untreated: -0.000787168, -0.586593, -0.0045686, -0.185338, -0.00722258 kg (5 suppliers, which the file names only by identifier); sum of these -0.78451 kg; lognormal variance with pedigree 0.118177, pedigree (2,1,1,5,1)
  Wood from trees after 1-2 years of sorrage at the field (20% water) per lifetime year (20 years) of the orchard
  production volume; = pv_coffee*m_wastewood
    Calculated based on the production volume of the reference product (coffee, green bean) and mass of by-product (waste wood)
  properties: carbon content, non-fossil 0.48632, dry mass 0.8 kg, heating value, net 13.99 MJ, water content 0.25, wet mass 1 kg
- zinc monosulfate: 0.00166852, 0.000315848 kg (2 suppliers, which the file names only by identifier); sum of these 0.00198437 kg; lognormal variance with pedigree 0.0157498, pedigree (2,1,4,5,1)
  Literature value or expert estimation (Coltro et al. 2006).
  properties: dry mass 1 kg, wet mass 1 kg

## Inputs from nature
- Carbon dioxide, in air [natural resource, in air]: 1.48292 kg; lognormal variance with pedigree 0.0158498, pedigree (2,2,4,5,1)
  CO2 uptake by biomass
- Energy, gross calorific value, in biomass [natural resource, biotic]: 15.7089 MJ; lognormal variance with pedigree 0.0158498, pedigree (2,2,4,5,1)
- Occupation, permanent crop, irrigated [natural resource, land]: 7.86825 m2*year; lognormal variance with pedigree 0.0220616, pedigree (2,1,4,5,1)
  Related to the duration from harvest date of previous crop to harvest date of main crop.
- Transformation, from permanent crop, irrigated [natural resource, land]: 0.392353 m2
  Calculated value: 10000 m2 divided by the yield and the life time of the perennial crop (20 years).
- Transformation, to permanent crop, irrigated [natural resource, land]: 0.392353 m2
  (same comment as for Transformation, from permanent crop, irrigated)
- Water, unspecified natural origin [natural resource, in ground]: 0.00309401 m3; lognormal variance with pedigree 0.126177, pedigree (2,1,4,5,1)
  Literature data or expert estimate: water for depulping
- Water, unspecified natural origin [natural resource, in water]: 0.00810679 m3; lognormal variance with pedigree 0.126177, pedigree (2,1,4,5,1)
  Literature data or expert estimate: water for depulping

## Emissions to nature
- Ammonia [air, non-urban air or from high stacks]: 0.035948 kg; lognormal variance with pedigree 0.0467216, pedigree (2,2,4,5,1)
  Calculated value - EMEP/EEA (2013). See 'WFLDB-Guidelines.pdf', available at https://ecoquery.ecoinvent.org/File/Reports.
- Carbon dioxide, fossil [air, non-urban air or from high stacks]: 0.33128 kg; lognormal variance with pedigree 0.0158498, pedigree (2,2,4,5,1)
  Calculated value - CO2 emissions from urea and lime. See 'WFLDB-Guidelines.pdf', available at https://ecoquery.ecoinvent.org/File/Reports.
- Carbon dioxide, from soil or biomass stock [air, non-urban air or from high stacks]: 0.871555 kg; normal variance with pedigree 0.5, pedigree (3,3,5,5,2)
  Global average LUC emissions according 2nd edition of the Quantis-modified tool developed by Blonk Consultants 'WFLDB-adapted-Blonk 2014 direct-land-use-change-assessment-tool_2015-05-18a.xlsx', tab. 'Country & land use unknown'. The emission are based on the relative change in production areas in all countries for a given crop. The weighted average is used which takes into acount relative difference in crop expansion into primary forest, secondary forest, grassland, perennial and annual land.
  Uncertainty: Uncertainty estimated based on IPCC guidlines 2006.
- Dinitrogen monoxide [air, non-urban air or from high stacks]: 0.00393297 kg; lognormal variance with pedigree 0.126664, pedigree (2,2,4,5,1)
  Calculated value - IPCC (2006). See 'WFLDB-Guidelines.pdf', available at https://ecoquery.ecoinvent.org/File/Reports.
- Nitrogen oxides [air, non-urban air or from high stacks]: 0.00646173 kg; lognormal variance with pedigree 0.126664, pedigree (2,2,4,5,1)
  Calculated value - EEA/EMEP (2013). See 'WFLDB-Guidelines.pdf', available at https://ecoquery.ecoinvent.org/File/Reports.
- Water [air, non-urban air or from high stacks]: 0.533137 m3; lognormal variance with pedigree 0.126177, pedigree (2,1,4,5,1)
  Calculated value - Emission calculated from water balance. See 'WFLDB-Guidelines.pdf', available at https://ecoquery.ecoinvent.org/File/Reports.
- Azoxystrobin [soil, agricultural]: 0.000208152 kg; lognormal variance with pedigree 0.0467216, pedigree (2,2,4,5,1)
  Calculated value - 100% emission in soil. See 'WFLDB-Guidelines.pdf', available at https://ecoquery.ecoinvent.org/File/Reports.
- Cadmium II [soil, agricultural]: 3.3995e-6 kg
  Comment on mathematicalRelation:
  4.4472361809e-06 from Calculated value - Freiermuth (2006). See 'WFLDB-Guidelines.pdf', available at https://ecoquery.ecoinvent.org/File/Reports.
  -9.1183600335e-08 from Crop, default, heavy metals uptake model
  Heavy metal uptake can be excluded by setting the parameter heavyMetalUptakeSwitch to zero.
- Chlorpyrifos methyl [soil, agricultural]: 3.30288e-5 kg; lognormal variance with pedigree 0.0467216, pedigree (2,2,4,5,1)
  (same comment as for Azoxystrobin)
- Chromium III [soil, agricultural]: 5.59592e-5 kg
  Comment on mathematicalRelation:
  -8.65376884422e-06 from Calculated value - Freiermuth (2006). See 'WFLDB-Guidelines.pdf', available at https://ecoquery.ecoinvent.org/File/Reports.
  -4.89413651591e-07 from Crop, default, heavy metals uptake model
  Heavy metal uptake can be excluded by setting the parameter heavyMetalUptakeSwitch to zero.
- Copper ion [soil, agricultural]: 0.0010713 kg
  Comment on mathematicalRelation:
  0.00296365159129 from Calculated value - Freiermuth (2006). See 'WFLDB-Guidelines.pdf', available at https://ecoquery.ecoinvent.org/File/Reports.
  -5.95100060134e-06 from Crop, default, heavy metals uptake model
  Heavy metal uptake can be excluded by setting the parameter heavyMetalUptakeSwitch to zero.
- Cyproconazole [soil, agricultural]: 0.000224528 kg; lognormal variance with pedigree 0.0467216, pedigree (2,2,4,5,1)
  (same comment as for Azoxystrobin)
- Glyphosate [soil, agricultural]: 2.3592e-5 kg; lognormal variance with pedigree 0.0467216, pedigree (2,2,4,5,1)
  (same comment as for Azoxystrobin)
- Hexaconazole [soil, agricultural]: 6.29287e-6 kg; lognormal variance with pedigree 0.0467216, pedigree (2,2,4,5,1)
  (same comment as for Azoxystrobin)
- Lead II [soil, agricultural]: 1.48925e-6 kg
  Comment on mathematicalRelation:
  9.93618090452e-07 from Calculated value - Freiermuth (2006). See 'WFLDB-Guidelines.pdf', available at https://ecoquery.ecoinvent.org/File/Reports.
  -4.8561508325e-07 from Crop, default, heavy metals uptake model
  Heavy metal uptake can be excluded by setting the parameter heavyMetalUptakeSwitch to zero.
- Mercury II [soil, agricultural]: 1.00679e-7 kg
  Comment on mathematicalRelation:
  4.87956448911e-08 from Calculated value - Freiermuth (2006). See 'WFLDB-Guidelines.pdf', available at https://ecoquery.ecoinvent.org/File/Reports.
  Heavy metal uptake can be excluded by setting the parameter heavyMetalUptakeSwitch to zero.
- Nickel II [soil, agricultural]: 5.01271e-7 kg
  Comment on mathematicalRelation:
  -8.19832495812e-06 from Calculated value - Freiermuth (2006). See 'WFLDB-Guidelines.pdf', available at https://ecoquery.ecoinvent.org/File/Reports.
  -9.38057798995e-07 from Crop, default, heavy metals uptake model
  Heavy metal uptake can be excluded by setting the parameter heavyMetalUptakeSwitch to zero.
- Paraquat [soil, agricultural]: 0.00081501 kg; lognormal variance with pedigree 0.126664, pedigree (2,2,4,5,1)
  (same comment as for Azoxystrobin)
- Pyraclostrobin [soil, agricultural]: 0.000166295 kg; lognormal variance with pedigree 0.0467216, pedigree (2,2,4,5,1)
  (same comment as for Azoxystrobin)
- Terbufos [soil, agricultural]: 0.00104321 kg; lognormal variance with pedigree 0.126664, pedigree (2,2,4,5,1)
  (same comment as for Azoxystrobin)
- Thiamethoxam [soil, agricultural]: 0.000277159 kg; lognormal variance with pedigree 0.0467216, pedigree (2,2,4,5,1)
  (same comment as for Azoxystrobin)
- Zinc II [soil, agricultural]: 2.56836e-5 kg
  Comment on mathematicalRelation:
  4.43132328308e-05 from Calculated value - Freiermuth (2006). See 'WFLDB-Guidelines.pdf', available at https://ecoquery.ecoinvent.org/File/Reports.
  -2.87568685595e-05 from Crop, default, heavy metals uptake model
  Heavy metal uptake can be excluded by setting the parameter heavyMetalUptakeSwitch to zero.
- BOD5, Biological Oxygen Demand [water, ground-]: 0.5 kg; lognormal variance with pedigree 0.126177, pedigree (2,1,4,5,1)
  Calculated value - Expert estimate for organic matter in waste water (0.5 kg BOD5/kg green coffee). See 'WFLDB-Guidelines.pdf', available at https://ecoquery.ecoinvent.org/File/Reports.
- COD, Chemical Oxygen Demand [water, ground-]: 1 kg
  Calculated value - Best estimates: DOC = TOC ; COD (g O2) = 2.7*TOC (g C) and BOD5 = 0.5*COD. See 'WFLDB-Guidelines.pdf', available at https://ecoquery.ecoinvent.org/File/Reports.
- Cadmium II [water, ground-]: 3.11003e-8 kg; lognormal variance with pedigree 0.358938, pedigree (2,2,4,5,1)
  Calculated value - Freiermuth (2006). See 'WFLDB-Guidelines.pdf', available at https://ecoquery.ecoinvent.org/File/Reports.
- Cadmium II [water, surface water]: 1.27138e-7 kg; lognormal variance with pedigree 0.358938, pedigree (2,2,4,5,1)
  (same comment as for Cadmium II)
- Chromium III [water, ground-]: 1.57928e-5 kg; lognormal variance with pedigree 0.358938, pedigree (2,2,4,5,1)
  (same comment as for Cadmium II)
- Chromium III [water, surface water]: 1.31904e-5 kg; lognormal variance with pedigree 0.358938, pedigree (2,2,4,5,1)
  (same comment as for Cadmium II)
- Copper ion [water, ground-]: 2.83605e-6 kg; lognormal variance with pedigree 0.358938, pedigree (2,2,4,5,1)
  (same comment as for Cadmium II)
- Copper ion [water, surface water]: 2.01152e-5 kg; lognormal variance with pedigree 0.358938, pedigree (2,2,4,5,1)
  (same comment as for Cadmium II)
- DOC, Dissolved Organic Carbon [water, ground-]: 0.37037 kg
  (same comment as for COD, Chemical Oxygen Demand)
- Lead II [water, ground-]: 1.10278e-7 kg; lognormal variance with pedigree 0.358938, pedigree (2,2,4,5,1)
  (same comment as for Cadmium II)
- Lead II [water, surface water]: 3.0945e-6 kg; lognormal variance with pedigree 0.358938, pedigree (2,2,4,5,1)
  (same comment as for Cadmium II)
- Mercury II [water, ground-]: 5.9957e-8 kg; lognormal variance with pedigree 0.358938, pedigree (2,2,4,5,1)
  (same comment as for Cadmium II)
- Mercury II [water, surface water]: 2.82448e-8 kg; lognormal variance with pedigree 0.358938, pedigree (2,2,4,5,1)
  (same comment as for Cadmium II)
- Nickel II [water, ground-]: 1.76237e-8 kg; lognormal variance with pedigree 0.358938, pedigree (2,2,4,5,1)
  (same comment as for Cadmium II)
- Nickel II [water, surface water]: 7.87561e-6 kg; lognormal variance with pedigree 0.358938, pedigree (2,2,4,5,1)
  (same comment as for Cadmium II)
- Nitrate [water, ground-]: 0.237544 kg; lognormal variance with pedigree 0.177866, pedigree (2,2,4,5,1)
- Phosphate [water, ground-]: 0.000144679 kg; lognormal variance with pedigree 0.177866, pedigree (2,2,4,5,1)
  Calculated value - Prasuhn (2006). See 'WFLDB-Guidelines.pdf', available at https://ecoquery.ecoinvent.org/File/Reports.
- Phosphate [water, surface water]: 0.000663156 kg; lognormal variance with pedigree 0.177866, pedigree (2,2,4,5,1)
  (same comment as for Phosphate)
- Phosphorus [water, surface water]: 0.000347006 kg; lognormal variance with pedigree 0.177866, pedigree (2,2,4,5,1)
  Calculated value - Prasuhn (2006) and SQCB-Erosion. See 'WFLDB-Guidelines.pdf', available at https://ecoquery.ecoinvent.org/File/Reports.
- TOC, Total Organic Carbon [water, ground-]: 0.37037 kg
  (same comment as for COD, Chemical Oxygen Demand)
- Water [water, ground-]: 0.0564453 m3; lognormal variance with pedigree 0.126177, pedigree (2,1,4,5,1)
  (same comment as for Water)
- Water [water, surface water]: 0.236982 m3; lognormal variance with pedigree 0.126177, pedigree (2,1,4,5,1)
  (same comment as for Water)
- Zinc II [water, ground-]: 1.25256e-5 kg; lognormal variance with pedigree 0.358938, pedigree (2,2,4,5,1)
  (same comment as for Cadmium II)
- Zinc II [water, surface water]: 1.74672e-5 kg; lognormal variance with pedigree 0.358938, pedigree (2,2,4,5,1)
  (same comment as for Cadmium II)

## Sampling procedure
WFLDB Methodological Guidelines for the Life Cycle Inventory of Agricultural Products in the latest version, available at: https://ecoquery.ecoinvent.org/File/Reports. Data sources: Data were categorised from level 0 (L0) to level (L4) as follows: L0 = estimate, proxy; L1 = statistical data (e.g. FAOSTAT); L2 = L1 adapted to crop and country; L3 = literature data or L1 resp. L2 data approved by experts; medium detailing (i.e. kg of total N-fertiliser); L4 = L3 data of high detailing (i.e. portion N-fertiliser types).In this dataset data were obtained for yield: L3; Fertilisers: L4; Pesticides: L1; Machinery: L0; Irrigation: L2. For information regarding the calculation of individual exchanges see supporting documentation WFLDB-Documentation.pdf

## Extrapolations
The amount of the exchanges are weighted average of regional datasets.

## Review by Assumpció ANTON 2016-05-30
Be aware that the use of statistics in input calculations could provide some specific inputs not common for specific crops, this should be corrected if better information is available and better reflexed in DQR . Currently, I would dissent for some of good marks provided, being a revision of criteria applied advisable.
Pesticides will need to be amended periodically checking for update of pesticides' ban.
