# copper, anode to generic market for copper-rich materials

Dataset: EcoSpold 2, unit process
Geography: GLO
Time period: 1994-01-01 to 2023-12-31
Technology level: current
Classification: ISIC rev.4 ecoinvent: 2420:Manufacture of basic precious and other non-ferrous metals
Scenario: Business-as-Usual
System model: Allocation, cut-off by classification
Generated by: Johannes Müller
Database: ecoinvent
isCopyrightProtected: true
accessRestrictedTo: 1

## General comment
This is a renaming activity. It's purpose is to link 'copper, anode' to the generic 'market for nickel-rich materials'.

## Included activities start
Activity starts with the reception of 'copper, anode'.

## Included activities end
Activity ends with the 'copper, anode' being ready for transportation.

## Time period
Time period based on the years for which supplying and demanding activities are valid.

## Reference product
- copper-rich materials: 1 kg; By-product classification allocatable product; CPC 41412: Unrefined copper; copper anodes for electrolytic refining; HS2017 740200: Copper; unrefined, copper anodes for electrolytic refining
  production volume 1.9e8 kg
    Amount set equal to that of the conditional exchange, 'electrolyte, copper-rich'
  property price 3.56225 EUR2005
    Assumed to be equal to the price of 'copper, anode' minus the value of all by-product mentals (see price comment for 'copper, anode' for more details).
  properties: carbon allocation 0 kg, carbon content 0, carbon content, fossil 0, carbon content, non-fossil 0, copper content 1, dry mass 1 kg, water content 0, water in wet mass 0 kg, wet mass 1 kg

## Inputs from technosphere
- copper, anode: 1 kg
  properties: copper content 0.997, dry mass 1 kg, wet mass 1 kg
