# micro gas turbine production, 100kW electrical

Dataset: EcoSpold 2, unit process
Geography: CH
Time period: 2000-01-01 to 2023-12-31
Technology level: current
Classification: ISIC rev.4 ecoinvent: 2811:Manufacture of engines and turbines, except aircraft, vehicle and cycle eng
Classification: EcoSpold01Categories: natural gas/cogeneration
Tags: ConvertedDataset
Scenario: Business-as-Usual
System model: Allocation, cut-off by classification
Generated by: Alex Primas
Published in: Primas A. 2007
Database: ecoinvent
isCopyrightProtected: true
accessRestrictedTo: 1

## General comment
The module reflects a micro gas turbine system with 100 kW electrical output. Inventory based on information from literature and different manufacturers. Life time operation is 50'000 h.
[This dataset was already contained in the ecoinvent database version 2. It was not individually updated during the transfer to ecoinvent version 3. Life Cycle Impact Assessment results may still have changed, as they are affected by changes in the supply chain, i.e. in other datasets. This dataset was generated following the ecoinvent quality guidelines for version 2. It may have been subject to central changes described in the ecoinvent version 3 change report (http://www.ecoinvent.org/database/ecoinvent-version-3/reports-of-changes/), and the results of the central updates were reviewed extensively. The changes added e.g. consistent water flows and other information throughout the database. The documentation of this dataset can be found in the ecoinvent reports of version 2, which are still available via the ecoinvent website. The change report linked above covers all central changes that were made during the conversion process.]

## Included activities end
The module includes the most important materials used for production, the energy needed for production, planning and engineering. Also included is the transport of the raw materials and for the engine delivery and installation on the site.

## Geography
Process applicable in central European conditions.

## Technology
Radial turbine with recuperation for preheating the compressed air and fuel gas booster to increase gas pressure. Operation with connection to low pressure gas network. Electrical efficiency 29%, total efficiency 75%.

## Parameters
- fraction, process water, to air: 0.15 dimensionless; name fraction_PW_to_air; lognormal variance with pedigree 0.092025, pedigree (4,4,3,2,4)
  Literature value. In case when no industry/process specific data are available, default evaporation fraction value is used. This value is 15% and is based on literature (Statistics Canada, 2007 & Shaffer, K.H., 2008, Consumptive water use in the Great Lakes Basin, USGS & Shiklomanov, 2003, World Water Resources at the Beginning of the 21st Century) and has been approved by an expert.

## Reference product
- micro gas turbine, 100kW electrical: 1 unit; By-product classification allocatable product; CPC 43143: Gas turbines other than turbo-jets and turbo-propellers; HS2017 841181: Turbines; gas-turbines (excluding turbo-jets and turbo-propellers), of a power not exceeding 5000kW
  production volume 0.0336675 unit
    This is a placeholder value that does not reflect real-world production volumes. This dataset does not currently require a real-world production volume to work in the database framework, and no actual data were collected yet. This has no negative effect on the results of the ecoinvent database. The placeholder value of this activity was scaled according to the nominal GDP of 2005 (source: United Nations, http://data.un.org/Glossary.aspx?q=GDP+%28current+US%24%29, accessed 20130726) to reflect an appropriate share of the global production volume, which is also a placeholder value.
  property price 6982.33 EUR2005
    Calculated based on inputs: The price of the product has been calculated as a sum of the values of the material and energy inputs for this product. This value is therefore a rough estimation. It may underestimate the real price since there are additional expenses when producing any product. These expences can include for example labour costs, treatment of waste materials and profit for the producer. Please consider carefully whether this level of data quality is acceptable for your application.
  properties: carbon allocation 0 kg, carbon content 0

## Inputs from technosphere
- aluminium, wrought alloy: 68 kg; lognormal variance with pedigree 0.070625, pedigree (2,4,5,2,3)
  Data from 250kWel plant adapted
  Data from 250kWel plant adapted
  properties: dry mass 1 kg, wet mass 1 kg
- building, hall, steel construction: 0.021 m2; lognormal variance with pedigree 0.372, pedigree (4,4,5,5,1)
  Rough estimation based on company data
  This exchange has an activity link directly to the producing activity because the product is primarily consumed in the same geographical area where it is produced.
- building, multi-storey: 0.068 m3; lognormal variance with pedigree 0.372, pedigree (4,4,5,5,1)
  Rough estimation based on company data
  Rough estimation based on company data
- construction work, heat and power co-generation unit, 160kW electrical: 0.4 unit; lognormal variance with pedigree 0.370625, pedigree (2,4,5,2,3)
  Data from 160 kWel engine cogen plant adapted
  Data from 160 kWel engine cogen plant adapted
- copper, cathode: 120 kg; lognormal variance with pedigree 0.070625, pedigree (2,4,5,2,3)
  Data from 250kWel plant adapted
  Data from 250kWel plant adapted
  properties: dry mass 1 kg, wet mass 1 kg
- electricity, low voltage: 800 kWh; lognormal variance with pedigree 0.062, pedigree (3,4,5,1,3)
  Estimation based on specific energy demand of engineering hours
  Estimation based on specific energy demand of engineering hours
- electricity, medium voltage: 2120 kWh; lognormal variance with pedigree 0.122625, pedigree (2,4,5,2,4)
  Approximation with company data of similar branch
  Approximation with company data of similar branch
- heat, central or small-scale, other than natural gas: 5640 MJ; lognormal variance with pedigree 0.062, pedigree (3,4,5,1,3)
  (same comment as for electricity, low voltage)
  properties: heating value, net 1 MJ
- heat, district or industrial, natural gas: 14535 MJ; lognormal variance with pedigree 0.122625, pedigree (2,4,5,2,4)
  (same comment as for electricity, medium voltage)
  properties: heating value, net 1 MJ
- iron-nickel-chromium alloy: 36 kg; lognormal variance with pedigree 0.070625, pedigree (2,4,5,2,3)
  Data from 250kWel plant adapted
  Data from 250kWel plant adapted
  properties: dry mass 1 kg, wet mass 1 kg
- polyethylene, high density, granulate: 30 kg; lognormal variance with pedigree 0.070625, pedigree (2,4,5,2,3)
  Data from 250kWel plant adapted, assumption for material type
  Data from 250kWel plant adapted, assumption for material type
  properties: carbon content, fossil 0.857143, dry mass 1 kg, heating value, net 42.47 MJ, wet mass 1 kg
  note on carbon content, fossil: Polyethylene is formed out of a huge amount of ethylene monomers (C2H4) (ecoinvent v2.2 report 11_II). MW=28 g/mol
- polyvinylchloride, emulsion polymerised: 3.8298 kg; lognormal variance with pedigree 0.070625, pedigree (2,4,5,2,3)
  (same comment as for polyethylene, high density, granulate)
  properties: carbon content, fossil 0.387097, dry mass 1 kg, heating value, net 21.5 MJ, wet mass 1 kg
  note on carbon content, fossil: Monomer is vynyl chloride, C2H3Cl (ecoinvent v2.2 report 11_II). MW=62 g/mol
- polyvinylchloride, suspension polymerised: 26.1702 kg; lognormal variance with pedigree 0.070625, pedigree (2,4,5,2,3)
  (same comment as for polyethylene, high density, granulate)
  properties: carbon content, fossil 0.387097, dry mass 1 kg, heating value, net 21.5 MJ, wet mass 1 kg
- reinforcing steel: 1236 kg; lognormal variance with pedigree 0.070625, pedigree (2,4,5,2,3)
  Data from 250kWel plant adapted
  Data from 250kWel plant adapted
  properties: carbon content, fossil 0.004, dry mass 1 kg, wet mass 1 kg
- sheet rolling, aluminium: 68 kg; lognormal variance with pedigree 0.070625, pedigree (2,4,5,2,3)
  Data from 250kWel plant adapted, assumption for process used
  Data from 250kWel plant adapted, assumption for process used
- sheet rolling, chromium steel: 444 kg; lognormal variance with pedigree 0.070625, pedigree (2,4,5,2,3)
  (same comment as for sheet rolling, aluminium)
- sheet rolling, steel: 3272 kg; lognormal variance with pedigree 0.070625, pedigree (2,4,5,2,3)
  (same comment as for sheet rolling, aluminium)
- steel, chromium steel 18/8, hot rolled: 444 kg; lognormal variance with pedigree 0.070625, pedigree (2,4,5,2,3)
  Data from 250kWel plant adapted
  Data from 250kWel plant adapted
  properties: carbon content, fossil 0.0008, dry mass 1 kg, wet mass 1 kg
  note on carbon content, fossil: Stainless steel model is the grade 304 steel (18/8 stainless, 18% chromium 8% nickel; max. 0.08% C)
- steel, low-alloyed, hot rolled: 2036 kg; lognormal variance with pedigree 0.070625, pedigree (2,4,5,2,3)
  Data from 250kWel plant adapted
  Data from 250kWel plant adapted
  properties: carbon content, fossil 0.005, dry mass 1 kg, wet mass 1 kg
  note on carbon content, fossil: Low alloyed steel composition given in Tab. 3.2 ecoinvent v2.2 report 10_partII. Steel assumed to have a C content of 0.5%
- transport, passenger car: 2000 km; lognormal variance with pedigree 0.198, pedigree (4,4,5,1,3)
  Estimation
  Estimation
- waste polyethylene/polypropylene product: -30 kg; lognormal variance with pedigree 0.032625, pedigree (2,4,3,2,3)
  Approximation for disposal of plastic parts
  Approximation for disposal of plastic parts
  production volume
    Calculated from the production volume of micro gas turbine 100kWe in proportion to the respective output amounts.
  properties: carbon content, fossil 0.748045, dry mass 0.847 kg, heating value, net 42.47 MJ, water content 0.180638, wet mass 1 kg
  note on carbon content, fossil: Mixed various plastics was used to estimate the C content of this waste (Tab A.2, ecoinvent v2.2 report 13_I)
- waste polyvinylchloride product: -30 kg; lognormal variance with pedigree 0.032625, pedigree (2,4,3,2,3)
  Approximation for disposal of plastic parts
  Approximation for disposal of plastic parts
  production volume
    (same comment as for waste polyethylene/polypropylene product)
  properties: carbon content, fossil 0.440882, dry mass 0.998 kg, heating value, net 21.51 MJ, water content 0.00200401, wet mass 1 kg
- wastewater from pig iron production: -4.88 m3; lognormal variance with pedigree 0.100025, pedigree (4,4,1,2,4)
  Approximation for waste water treatment. Calculated to close the water balance.
  production volume
    (same comment as for waste polyethylene/polypropylene product)
  properties: carbon content, fossil 1.2149e-5, dry mass 0.337476 kg, water content 2962.17, wet mass 1000 kg
- welding, arc, steel: 4 m; lognormal variance with pedigree 0.070625, pedigree (2,4,5,2,3)
  (same comment as for polyethylene, high density, granulate)

## Inputs from nature
- Occupation, industrial area [natural resource, land]: 2.19 m2*year; lognormal variance with pedigree 0.112, pedigree (4,4,5,5,1)
  Rough estimation based on company data
- Transformation, from unspecified [natural resource, land]: 0.044 m2; lognormal variance with pedigree 0.192, pedigree (4,4,5,5,1)
  Rough estimation based on company data
- Transformation, to industrial area [natural resource, land]: 0.044 m2; lognormal variance with pedigree 0.192, pedigree (4,4,5,5,1)
  Rough estimation based on company data
- Water, unspecified natural origin [natural resource, in water]: 4.88 m3; name water_UNO_input; lognormal variance with pedigree 0.122625, pedigree (2,4,5,2,4)
  Approximation with company data of similar branch

## Sampling procedure
Literature data and manufacturer information

## Review by Rolf Frischknecht 2007-08-13
passed
none
