# batch dyeing, fibre, cotton

Dataset: EcoSpold 2, unit process
Geography: RoW
Time period: 2016-01-01 to 2023-12-31
Technology level: current
Classification: ISIC rev.4 ecoinvent: 1313:Finishing of textiles
Scenario: Business-as-Usual
System model: Allocation, cut-off by classification
Generated by: Mireille Faist Emmenegger
Published in: Cotton Inc 2017
Database: ecoinvent
isCopyrightProtected: true
accessRestrictedTo: 1

## General comment
The activity begins with untreated cotton fibres, which are pretreated before being batch dyed, and ends with cotton dyed. It includes electricity use and chemicals. Data collected from mostly vertically integrated mills on a global level. The dyes considered here are disperse dyes and reactive dyes. All fibre is dryed between steps of wet processing. Wastewater emissions have been modelled based on primary data and completed with default data, considering wastewater treatment.
This activity is modelled as a service dataset. It does not include the cotton fibres.

## Included activities start
The activity begins with the loading untreated cotton fibres. However, this is a service dataset. That means ithe loaded fibre is not considered as an input of this process.

## Included activities end
This activity delivers the service of dyeing 1 kg fibre. It has to be used with 1.1009kg of fibre (to take into account the textile/fibre loss). This dataset represents a mixture of dryed and undryed fibre.

## Geography
Eurasia, East Asia, South/Central Asia,
and Latin America

## Reference product
- batch dyeing, fibre, cotton: 1 kg; name RP_amount_1; By-product classification allocatable product; CPC 97150: Dyeing and colouring services
  production volume 6.85044e10 kg; name RP_PV_1
    Based on the Fibre Year report 2017 for the overall fibre production and assumptions on losses (17%) based on FAO World Apparel Fiber Consumption Survey 2013.
  property price 0.729209 EUR2005
    Calculated based on inputs: The price of the product has been calculated as a sum of the values of the material and energy inputs for this product. This value is therefore a rough estimation. It may underestimate the real price since there are additional expenses when producing any product. These expences can include for example labour costs, treatment of waste materials and profit for the producer. Please consider carefully whether this level of data quality is acceptable for your application.
  properties: carbon allocation 0 kg, carbon content 0

## Inputs from technosphere
- acetic acid, without water, in 98% solution state: 0.0088095 kg; lognormal variance with pedigree 0.0039, pedigree (2,3,3,3,1)
  properties: carbon content, fossil 0.400016, dry mass 1 kg, heating value, net 14.6 MJ, wet mass 1 kg
  note on heating value, net: Based on literature, page 10, Althaus H.-J., Chudacoff M., Hischier R., Jungbluth N., Osses M. and Primas A. (2007) Life Cycle Inventories of Chemicals. Final report ecoinvent data v2.0 No. 8. EMPA, Swiss Centre for Life Cycle Inventories, Dübendorf, CH, Online-Version under: www.ecoinvent.org.
- chemical, organic: 0.0123113 kg; lognormal variance with pedigree 0.0039, pedigree (2,3,3,3,1)
  Proxy for Catalase, dispersant and sequestering agentProxy for Enzymes, saccharification
  properties: carbon content, fossil 0.628, dry mass 1 kg, heating value, net 19.03 MJ, wet mass 1 kg
  note on carbon content, fossil: This dataset is an unweighted average of 20 organic substances (listed in Tab 88.1, ecoinvent v2.2 report 8, part II), being part of the top100 chemicals included in this database. The C-content has also been calculated as an unweighted average of the C content of the substances composing this dataset.
- electricity, low voltage: 0.00385096, 0.0208373, 0.000809806, 0.000314858, 0.0219786, 0.00523869, 0.000315934, 0.00107972, 0.000431414, 0.193983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 kWh (46 suppliers, which the file names only by identifier); sum of these 0.5493 kWh; lognormal variance with pedigree 0.0039, pedigree (2,3,3,3,1)
- ethoxylated alcohol (AE7): 0.00288579, 0.0136992 kg (2 suppliers, which the file names only by identifier); sum of these 0.016585 kg; lognormal variance with pedigree 0.0039, pedigree (2,3,3,3,1)
  Prox for SurfactantsSurfactants (tensides)
  properties: carbon content, fossil 0.321663, carbon content, non-fossil 0.321663, dry mass 1 kg, heating value, net 19.49 MJ, wet mass 1 kg
- heat, district or industrial, natural gas: 8.512 MJ; lognormal variance with pedigree 0.0039, pedigree (2,3,3,3,1)
  properties: heating value, net 1 MJ
- heat, district or industrial, other than natural gas: 1.611 MJ; lognormal variance with pedigree 0.0039, pedigree (2,3,3,3,1)
  Proxy for thermal energy from LPG
  properties: corresponding fuel use, propane, furnace >100kW 1.05263 MJ, heating value, net 1 MJ
  note on corresponding fuel use, propane, furnace >100kW: Lower heating value of the fuel input related to the heat/electricity output, taken directly from ecoinvent v3.0 dataset "heat production, natural gas, at industrial furnace >100kW, GLO 2000".
- hydrogen peroxide, without water, in 50% solution state: 0.0225991, 0.107281 kg (2 suppliers, which the file names only by identifier); sum of these 0.12988 kg; lognormal variance with pedigree 0.0039, pedigree (2,3,3,3,1)
  properties: dry mass 1 kg, heating value, net 7.13 MJ, wet mass 1 kg
- municipal solid waste: -3.70394e-5, -1.90202e-6, -1.43503e-6, -1.40568e-6, -0.00107312, -1.58046e-7, -5.07299e-8, -1.14664e-7, -4.77348e-6 kg (9 suppliers, which the file names only by identifier); sum of these -0.00112 kg; lognormal variance with pedigree 0.0019, pedigree (2,3,1,3,1)
  production volume; = RP_PV_1 * (BP_amount_1 / RP_amount_1)
    Calculated from production volume of reference product using the relative outputs.
  properties: carbon content, fossil 0.171549, carbon content, non-fossil 0.261655, dry mass 0.771 kg, heating value, net 11.74 MJ, water content 0.297017, wet mass 1 kg
  note on carbon content, fossil: MSW composition in tab 4.1, ecoinvent v2.2 report 13_I. C content referred to 1 kg DM
  note on heating value, net: Value taken from the general comment of the treatment dataset.
- sodium chloride, powder: 0.541 kg; lognormal variance with pedigree 0.0039, pedigree (2,3,3,3,1)
  properties: dry mass 1 kg, wet mass 1 kg
- sodium hydrosulfide: 0.00523 kg; lognormal variance with pedigree 0.0039, pedigree (2,3,3,3,1)
  properties: dry mass 1 kg, wet mass 1 kg
- sodium sulfate, anhydrite: 0.00253744, 0.0155352 kg (2 suppliers, which the file names only by identifier); sum of these 0.0180726 kg; lognormal variance with pedigree 0.0039, pedigree (2,3,3,3,1)
  properties: dry mass 1 kg, wet mass 1 kg
- steam, in chemical industry: 6.06982, 1.07018 kg (2 suppliers, which the file names only by identifier); sum of these 7.14 kg; lognormal variance with pedigree 0.0039, pedigree (2,3,3,3,1)
  properties: dry mass 1 kg, wet mass 1 kg
- tap water: 0.216575, 0.33015, 0.616043, 1.65957, 0.199768, 95.268, 71.1389 kg (7 suppliers, which the file names only by identifier); sum of these 169.429 kg; lognormal variance with pedigree 0.0039, pedigree (2,3,3,3,1)
  properties: carbon content, fossil 0.00178991, dry mass 0.000337476 kg, water content 2962.17, wet mass 1 kg
  note on carbon content, fossil: Bicarbonate content is 2.93 mol/m3. CO2 content is 0.1 mol/m3 (ecoinvent v2.2 report 8, Tab 93.1).
- waste yarn and waste textile: -0.1009 kg; name BP_amount_2; lognormal variance with pedigree 0.0019, pedigree (2,3,1,3,1)
  production volume; = RP_PV_1 * (BP_amount_2 / RP_amount_1)
    Calculated from production volume of reference product using the relative outputs.
  properties: carbon content, non-fossil 0.44455, dry mass 0.97917 kg, heating value, net 13.14 MJ, hydrogen content 0.06215, oxygen content 0.4933, water content 0.0212731, wet mass 1 kg
- wastewater, unpolluted: -0.000421137, -0.087086 m3 (2 suppliers, which the file names only by identifier); sum of these -0.0875071 m3; lognormal variance with pedigree 0.0019, pedigree (2,3,1,3,1)
  production volume; = RP_PV_1 * (ww / RP_amount_1)
    Calculated from production volume of reference product using the relative outputs.
  properties: carbon content, fossil 0.00178991, carbon content, non-fossil 0.00178991, dry mass 0.337476 kg, water content 2962.17, wet mass 1000 kg
  note on carbon content, fossil: Assumed to be like in tap water. Bicarbonate content is 2.93 mol/m3. CO2 content is 0.1 mol/m3 (ecoinvent v2.2 report 8, Tab 93.1).

## Emissions to nature
- Water [air, urban air close to ground]: 0.0819219 m3; = water/1000-ww; lognormal variance with pedigree 0.0039, pedigree (2,3,3,3,1)
  Calculated based on industry data (water input minus wastewater).
- AOX, Adsorbable Organic Halides [water, ground-]: 1.7e-5 kg; lognormal variance with pedigree 0.0039, pedigree (2,3,3,3,1)
- Ammonium [water, ground-]: 1.3693e-5 kg; lognormal variance with pedigree 0.0039, pedigree (2,3,3,3,1)
- Arsenic ion [water, ground-]: 3.8698e-6 kg; lognormal variance with pedigree 0.0039, pedigree (2,3,3,3,1)
- BOD5, Biological Oxygen Demand [water, ground-]: 0.00240654 kg; lognormal variance with pedigree 0.0039, pedigree (2,3,3,3,1)
- COD, Chemical Oxygen Demand [water, ground-]: 0.0119332 kg; lognormal variance with pedigree 0.0039, pedigree (2,3,3,3,1)
- Cadmium II [water, ground-]: 3.8698e-5 kg; lognormal variance with pedigree 0.0039, pedigree (2,3,3,3,1)
- Chlorine [water, ground-]: 1.93272e-5 kg; lognormal variance with pedigree 0.0039, pedigree (2,3,3,3,1)
- Chromium III [water, ground-]: 4.1188e-5 kg; lognormal variance with pedigree 0.0039, pedigree (2,3,3,3,1)
- Chromium VI [water, ground-]: 1.93272e-6 kg; lognormal variance with pedigree 0.0039, pedigree (2,3,3,3,1)
- Copper ion [water, ground-]: 5.981e-5 kg; lognormal variance with pedigree 0.0039, pedigree (2,3,3,3,1)
- Cyanide [water, ground-]: 3.8698e-6 kg; lognormal variance with pedigree 0.0438, pedigree (2,3,5,5,1)
- DOC, Dissolved Organic Carbon [water, unspecified]: 0.000609263 kg; lognormal variance with pedigree 0.0039, pedigree (2,3,3,3,1)
- Dissolved solids [water, ground-]: 0.0558051 kg; lognormal variance with pedigree 0.0039, pedigree (2,3,3,3,1)
- Fluoride [water, ground-]: 3.8698e-5 kg; lognormal variance with pedigree 0.0039, pedigree (2,3,3,3,1)
- Iron ion [water, ground-]: 5.7938e-5 kg; lognormal variance with pedigree 0.0039, pedigree (2,3,3,3,1)
- Lead II [water, ground-]: 1.93272e-6 kg; lognormal variance with pedigree 0.0039, pedigree (2,3,3,3,1)
- Manganese II [water, ground-]: 3.8698e-5 kg; lognormal variance with pedigree 0.0039, pedigree (2,3,3,3,1)
- Mercury II [water, ground-]: 1.93272e-7 kg; lognormal variance with pedigree 0.0039, pedigree (2,3,3,3,1)
- Nickel II [water, ground-]: 5.8565e-5 kg; lognormal variance with pedigree 0.0039, pedigree (2,3,3,3,1)
- Nitrogen [water, ground-]: 0.001391 kg; lognormal variance with pedigree 0.0039, pedigree (2,3,3,3,1)
- Oils, unspecified [water, ground-]: 0.000525919 kg; lognormal variance with pedigree 0.0039, pedigree (2,3,3,3,1)
- Phenol [water, ground-]: 1.93272e-5 kg; lognormal variance with pedigree 0.0039, pedigree (2,3,3,3,1)
- Phosphorus [water, ground-]: 0.000146172 kg; lognormal variance with pedigree 0.0039, pedigree (2,3,3,3,1)
- Selenium IV [water, ground-]: 9.6636e-7 kg; lognormal variance with pedigree 0.0039, pedigree (2,3,3,3,1)
- Sulfide [water, ground-]: 3.8698e-5 kg; lognormal variance with pedigree 0.0039, pedigree (2,3,3,3,1)
- Suspended solids, unspecified [water, ground-]: 0.00240884 kg; lognormal variance with pedigree 0.0039, pedigree (2,3,3,3,1)
- TOC, Total Organic Carbon [water, ground-]: 0.000609263 kg; lognormal variance with pedigree 0.0039, pedigree (2,3,3,3,1)
- Vanadium V [water, ground-]: 3.8698e-6 kg; lognormal variance with pedigree 0.0039, pedigree (2,3,3,3,1)
- Zinc II [water, ground-]: 9.809e-5 kg; lognormal variance with pedigree 0.0039, pedigree (2,3,3,3,1)

## Extrapolations
Extrapolated from data from mostly vertically integrated mills.
