# ethylene glycols production, thermal hydrolysis of ethylene oxide

Dataset: EcoSpold 2, unit process
Geography: RoW
Time period: 2019-01-01 to 2023-12-31
Technology level: current
Classification: ISIC rev.4 ecoinvent: 2011:Manufacture of basic chemicals
Classification: EcoSpold01Categories: chemicals/organics
Synonyms: 2-hydroxyethanol; ethylene alcohol; monoethylene glycol
Tags: combined production
Scenario: Business-as-Usual
System model: Allocation, cut-off by classification
Generated by: Thomas Fröhlich
Published in: IFEU/PlasticsEurope 2021
Database: ecoinvent
isCopyrightProtected: true
accessRestrictedTo: 1

## General comment
This dataset represents the production of monoethylene glycol (MEG), diethylene glycol (DEG) and triethylene glycol (TEG) through the oxidation of ethylene oxide.
MEG is mainly used for the manufacture of polyester fibres and polyethylene terephthalate (PET); smaller quantities are used as anti-freezing agent in cooling systems. DEG is used in the fibre industry and as tobacco humectant and TEG is used in the manufacture of cellophane for food packaging. DEG and TEG are both used for gas drying.
Infrastructure is included with a default value.
This dataset was extrapolated from the European dataset (IFEU/PlasticsEurope, 2021).
References:
IFEU/PlasticsEurope (2021): Eco-profile of Steam Cracker Products: Ethylene, Propylene, Butadiene, Pyrolysis Gasoline, Ethylene Oxide (EO), Ethylene Glycols (MEG, DEG, TEG)
Falcke H.; Holbrook S.; Clenahan I.; Lopez Carretero A.; Sanalan T.; Brinkmann T.; Roth J.; Zerger B.; Roudier S.; Delgado Sancho L. (2017): Best Available Techniques (BAT) Reference Document for the Production of Large Volume Organic Chemicals, JRC Science for Policy Report.
Rebsdat S., Mayer D. (2011): Ethylene Glycol, Ullmann's Encyclopedia of Industrial Chemistry, Wiley VCH.

## Included activities start
From the reception of ethylene oxide at the factory gate.

## Included activities end
This activity ends with the production of diethylene glycol, triethylene glycol and ethylene glycol, 100% at the factory gate. The dataset includes the input materials, energy uses, infrastructure and emissions.

## Geography
This dataset was extrapolated from the European dataset (IFEU/PlasticsEurope, 2021). Therefore the European feedstock mix was applied. Representative for minium 80% of European (EU + GB, NO, CH) production.

## Technology
This dataset was extrapolated from the European dataset (IFEU/PlasticsEurope, 2021).
Thermal hydrolysis of ethylene oxide accounts for all of the ethylene glycols manufactured in the EU.
This route involves the following sequence of process steps:
 reaction of ethylene oxide with a significant stoichiometric excess of water at a temperature of 120–250 °C and a pressure above 10–40 bar;
 separation by distillation (and subsequent recycling) of the water from the ethylene glycols mixture;
 separation by distillation of the mono-, di-, tri- and polyethylene glycols, employing progressively higher levels of vacuum.
C2H4O + H2O --> C2H6O2 (1)
C2H6O2 + C2H4O --> C4H10O3 (2)
C4H10O3 + C2H4O --> C6H14O4 (3)
(1) production of MEG from EO and water
(2) production of DEG from EO and MEG
(3) production of TEG from EO and DEG
Since about 40 % of the EO production in Europe and about 70 % of the worldwide EO production is converted into ethylene glycols, EO and ethylene glycols are mostly produced together at integrated plants.
It is assumed that waste heat is dissipated.
References:
IFEU/PlasticsEurope (2021): Eco-profile of Steam Cracker Products: Ethylene, Propylene, Butadiene, Pyrolysis Gasoline, Ethylene Oxide (EO), Ethylene Glycols (MEG, DEG, TEG)
Falcke H.; Holbrook S.; Clenahan I.; Lopez Carretero A.; Sanalan T.; Brinkmann T.; Roth J.; Zerger B.; Roudier S.; Delgado Sancho L. (2017): Best Available Techniques (BAT) Reference Document for the Production of Large Volume Organic Chemicals, JRC Science for Policy Report.

## Time period
Data collection 2019/2020. The technology is not expected to change within 5 years.

## Parameters
- efficiency: 1 dimensionless; name yield; lognormal variance with pedigree 0.0167, pedigree (4,2,4,1,1)
  Calculated value based on literature (IPPC, 2002). Output relative to input (requires additional specification).
- ethylene_oxide_input: 0.8 kg; name ethylene_oxide_input_P; lognormal variance with pedigree 0.0006, pedigree (1,1,1,1,1)
  Calculated value. The amount of ethylene oxide on the input needed for production of 1 kg ethylene glycol, 0.09 kg diethylene glycol and 0.01 kg triethylene glycol produced in the multi-output activity.
- sum_of_the_reference_products: 1.106 dimensionless; lognormal variance with pedigree 0.0006, pedigree (1,1,1,1,1)
  Calculated value; sum of the reference products.

## Reference product
- ethylene glycol: 1 kg; name ethylene_glycol; By-product classification allocatable product; CPC 34170: Ethers, alcohol peroxides, ether peroxides, epoxides, acetals and hemiacetals, and their halogenated, sulphona[…]; HS2017 290531: Alcohols; acyclic, diols; ethylene glycol (ethanediol); CAS 107-21-1
  EcoSpold01Location=RER
  production volume 3.59007e10 kg; name PV_ethylene_glycol; = 42.09E9/(triethylene_glycol+diethylene_glycol+ethylene_glycol)*ethylene_glycol
    The Global production capacity of ethylene glycols in 2020 is 42.09 Million tonnes. This amount was scaled according to the ethylene glycol's exchange amount.
    Reference:
    Statista, 2023, Market capacity of ethylene glycols worldwide from 2014 to 2022, available here: https://www.statista.com/statistics/1067418/global-ethylene-glycol-production-capacity/, accessed 07-07-2023.
  property carbon content, fossil 0.387097; name ethylene_glycol_RP_C_content_fossil
    fossil carbon content on a dry matter basis
  property carbon content, non-fossil 0; name ethylene_glycol_R_C_content_non_fossil_0
    biogene carbon content on a dry matter basis
  property dry mass 1 kg; name ethylene_glycol_RP_DM
  property heating value, net 23.44 MJ
    LHV is calculated based on the elemental composition of the substance. Based on the CAS number of the substance (000107-21-1), the chemical formula of the substance is found to be: C2H6O2, (PubChem 2020).
    Reference: Kim, S., Chen, J., Cheng, T., Gindulyte, A., He, J., He, S., Li, Q., Shoemaker, B. A., Thiessen, P. A., Yu, B., Zaslavsky, L., Zhang, J., & Bolton, E. E. (2019). PubChem 2019 update: improved access to chemical data. Nucleic acids research, 47(D1), D1102–D1109. https://doi.org/10.1093/nar/gky1033
  property price 0.642 EUR2005
    Temporary price data. Calculated as 90% of purchasers price based on: 2004 prices for Import/Export data for world-leading producing country (US$ and tonnes) from UN Commodity Trade Statistics Database (http://data.un.org/Explorer.aspxDatabase [Accessed 2 July 2010]). Commodity: Ethylene glycol (ethanediol)
  property water content 0; name ethylene_glycol_RP_water_content
  property water in wet mass 0 kg; name ethylene_glycol_RP_WWM
  property wet mass 1 kg; name ethylene_glycol_RP_WM
  properties: carbon allocation 0.387097 kg, carbon content 0.387097

## Inputs from technosphere
- chemical factory, organics: 3.54839e-10 unit; = (((4E-10/ethylene_oxide_input_P)*3*44*1/yield)/150*triethylene_glycol)+(((4E-10/ethylene_oxide_input_P)*2*44*1/yield)/106*diethylene_glycol)+(((4E-10/ethylene_oxide_input_P)*44*1/yield)/62*ethylene_glycol); lognormal variance with pedigree 0.0226, pedigree (2,4,1,5,3)
  Calculated based on literature data published by the industry. For this activity, no information was readily available concerning infrastructure and land-use. Therefore, the infrastructure is estimated based on data from two chemical factories, the BASF site of Ludwigshafen and the chemical factory in Gendorf (which are both located in Germany), which produce a wide range of chemical substances. Based on this data, the following assumptions are made: the built area amounts to about 4.2 ha, the plant has an average output of 50'000 t/a and a lifespan of fifty years. The estimated infrastructure amount is therefore 4.00 E-10 units per kg of produced chemical.
  44 g/mol is a molecular weight of ethylene oxide (C2H4O).
  62 g/mol is a molecular weight of ethylen glycol (C2H6O2).
  106 g/mol is a molecular weight of diethylene glycol (C4H10O3).
  150 g/mol is a molecular weight of triethylene glycol (C6H14O4).
  References:
  Althaus H.-J., Chudacoff M., Hischier R., Jungbluth N., Osses M. and Primas A. (2007) Life Cycle Inventories of Chemicals. ecoinvent report No. 8, v2.0. EMPA Dübendorf, Swiss Centre for Life Cycle Inventories, Dübendorf, CH.
  Gendorf (2000) Umwelterklärung 2000, Werk Gendorf. Werk Gendorf, Burgkirchen.
  EcoSpold01Location=RER
  Uncertainty: infrastructure
- electricity, medium voltage: 0.0123491, 0.246338, 0.0827687, 0.00378173, 0.000756909, 0.000162525, 0.0254382 kWh (7 suppliers, which the file names only by identifier); sum of these 0.371595 kWh; = (((0.418888888888889/ethylene_oxide_input_P)*3*44*1/yield)/150*triethylene_glycol)+(((0.418888888888889/ethylene_oxide_input_P)*2*44*1/yield)/106*diethylene_glycol)+(((0.418888888888889/ethylene_oxide_input_P)*44*1/yield)/62*ethylene_glycol); lognormal variance with pedigree 0.0226, pedigree (2,4,1,5,3)
  EcoSpold01Location=UCTE
  European average value, based on industrial survey, representative for min. 80 % of European (EU + GB, NO, CH) production.
  44 g/mol is a molecular weight of ethylene oxide (C2H4O).
  62 g/mol is a molecular weight of ethylen glycol (C2H6O2).
  106 g/mol is a molecular weight of diethylene glycol (C4H10O3).
  150 g/mol is a molecular weight of triethylene glycol (C6H14O4).
  Reference:
  IFEU/PlasticsEurope (2021): Eco-profile of Steam Cracker Products: Ethylene, Propylene, Butadiene, Pyrolysis Gasoline, Ethylene Oxide (EO), Ethylene Glycols (MEG, DEG, TEG)
  Uncertainty: power usage
- ethylene oxide: 0.712346 kg; name ethylene_oxide_input; = (((0.803008040294162/ethylene_oxide_input_P)*3*44*1/yield)/150*triethylene_glycol)+(((0.803008040294162/ethylene_oxide_input_P)*2*44*1/yield)/106*diethylene_glycol)+(((0.803008040294162/ethylene_oxide_input_P)*44*1/yield)/62*ethylene_glycol); lognormal variance with pedigree 0.0226, pedigree (2,4,1,5,3)
  European average value, based on industrial survey, representative for min. 80 % of European (EU + GB, NO, CH) production.
  44 g/mol is a molecular weight of ethylene oxide (C2H4O).
  62 g/mol is a molecular weight of ethylen glycol (C2H6O2).
  106 g/mol is a molecular weight of diethylene glycol (C4H10O3).
  150 g/mol is a molecular weight of triethylene glycol (C6H14O4).
  Reference:
  IFEU/PlasticsEurope (2021): Eco-profile of Steam Cracker Products: Ethylene, Propylene, Butadiene, Pyrolysis Gasoline, Ethylene Oxide (EO), Ethylene Glycols (MEG, DEG, TEG)
  EcoSpold01Location=RER
  Uncertainty: precursor
  properties: carbon content, fossil 0.545455, dry mass 1 kg, heating value, net 27.53 MJ, wet mass 1 kg
- wastewater, average: -0.00560295, -1.99486e-5 m3 (2 suppliers, which the file names only by identifier); sum of these -0.0056229 m3; = (((0.00633853625292558/ethylene_oxide_input_P)*3*44*1/yield)/150*triethylene_glycol)+(((0.00633853625292558/ethylene_oxide_input_P)*2*44*1/yield)/106*diethylene_glycol)+(((0.00633853625292558/ethylene_oxide_input_P)*44*1/yield)/62*ethylene_glycol); lognormal variance with pedigree 0.0132, pedigree (2,4,1,5,3)
  European average value, based on industrial survey, representative for min. 80 % of European (EU + GB, NO, CH) production.
  44 g/mol is a molecular weight of ethylene oxide (C2H4O).
  62 g/mol is a molecular weight of ethylen glycol (C2H6O2).
  106 g/mol is a molecular weight of diethylene glycol (C4H10O3).
  150 g/mol is a molecular weight of triethylene glycol (C6H14O4).
  Reference:
  IFEU/PlasticsEurope (2021): Eco-profile of Steam Cracker Products: Ethylene, Propylene, Butadiene, Pyrolysis Gasoline, Ethylene Oxide (EO), Ethylene Glycols (MEG, DEG, TEG)
  production volume; = wastewater/ ethylene_glycol*PV_ethylene_glycol
    Calculated from the production volume of the reference product in proportion to the respective output amounts.
  properties: carbon content, non-fossil 0.194039, dry mass 0.346837 kg, mass concentration, TOC 0.1091 kg/m3, mass concentration, calcium 0.039453 kg/m3, mass concentration, chlorine 0.030031 kg/m3, mass concentration, hydrogen 0.013365 kg/m3, mass concentration, nitrogen 0.031015 kg/m3, mass concentration, oxygen 0.069824 kg/m3, mass concentration, sodium 0.06456 kg/m3, mass concentration, sulfur 0.015602 kg/m3, water content 2882.2, wet mass 1000 kg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
  note on carbon content, non-fossil: 0.0673 kg TOC/m3 (Tab A.17, ecoinvent v2.2 report 13_I). TOC was considered as Total Carbon.

## Inputs from nature
- Water, unspecified natural origin [natural resource, in water]: 0.00591398 m3; = (((0.00666666666666667/ethylene_oxide_input_P)*3*44*1/yield)/150*triethylene_glycol)+(((0.00666666666666667/ethylene_oxide_input_P)*2*44*1/yield)/106*diethylene_glycol)+(((0.00666666666666667/ethylene_oxide_input_P)*44*1/yield)/62*ethylene_glycol); lognormal variance with pedigree 0.0926, pedigree (2,4,1,5,3)
  European average value, based on industrial survey, representative for min. 80 % of European (EU + GB, NO, CH) production.
  44 g/mol is a molecular weight of ethylene oxide (C2H4O).
  62 g/mol is a molecular weight of ethylen glycol (C2H6O2).
  106 g/mol is a molecular weight of diethylene glycol (C4H10O3).
  150 g/mol is a molecular weight of triethylene glycol (C6H14O4).
  Reference:
  IFEU/PlasticsEurope (2021): Eco-profile of Steam Cracker Products: Ethylene, Propylene, Butadiene, Pyrolysis Gasoline, Ethylene Oxide (EO), Ethylene Glycols (MEG, DEG, TEG)
  Uncertainty: estimated with data from a large chem. plant

## Emissions to nature
All rows: lognormal variance with pedigree 0.0226, pedigree (2,4,1,5,3)
- Ethylene [air, urban air close to ground]: 5.91398e-6 kg; = (((6.66666666666666E-06/ethylene_oxide_input_P)*3*44*1/yield)/150*triethylene_glycol)+(((6.66666666666666E-06/ethylene_oxide_input_P)*2*44*1/yield)/106*diethylene_glycol)+(((6.66666666666666E-06/ethylene_oxide_input_P)*44*1/yield)/62*ethylene_glycol)
  European average value, based on industrial survey, representative for min. 80 % of European (EU + GB, NO, CH) production.
  44 g/mol is a molecular weight of ethylene oxide (C2H4O).
  62 g/mol is a molecular weight of ethylen glycol (C2H6O2).
  106 g/mol is a molecular weight of diethylene glycol (C4H10O3).
  150 g/mol is a molecular weight of triethylene glycol (C6H14O4).
  Reference:
  IFEU/PlasticsEurope (2021): Eco-profile of Steam Cracker Products: Ethylene, Propylene, Butadiene, Pyrolysis Gasoline, Ethylene Oxide (EO), Ethylene Glycols (MEG, DEG, TEG)
  Uncertainty: emission
- Acetaldehyde [water, unspecified]: 1.37993e-6 kg; = (((1.55555555555555E-06/ethylene_oxide_input_P)*3*44*1/yield)/150*triethylene_glycol)+(((1.55555555555555E-06/ethylene_oxide_input_P)*2*44*1/yield)/106*diethylene_glycol)+(((1.55555555555555E-06/ethylene_oxide_input_P)*44*1/yield)/62*ethylene_glycol)
  (same comment as for Ethylene)
- BOD5, Biological Oxygen Demand [water, surface water]: 0.000283477 kg; = (((0.000319555555555555/ethylene_oxide_input_P)*3*44*1/yield)/150*triethylene_glycol)+(((0.000319555555555555/ethylene_oxide_input_P)*2*44*1/yield)/106*diethylene_glycol)+(((0.000319555555555555/ethylene_oxide_input_P)*44*1/yield)/62*ethylene_glycol)
  (same comment as for Ethylene)
- COD, Chemical Oxygen Demand [water, surface water]: 0.000283477 kg; = (((0.000319555555555555/ethylene_oxide_input_P)*3*44*1/yield)/150*triethylene_glycol)+(((0.000319555555555555/ethylene_oxide_input_P)*2*44*1/yield)/106*diethylene_glycol)+(((0.000319555555555555/ethylene_oxide_input_P)*44*1/yield)/62*ethylene_glycol)
  (same comment as for Ethylene)
- DOC, Dissolved Organic Carbon [water, surface water]: 7.38952e-5 kg; = (((0.0000832999999999998/ethylene_oxide_input_P)*3*44*1/yield)/150*triethylene_glycol)+(((0.0000832999999999998/ethylene_oxide_input_P)*2*44*1/yield)/106*diethylene_glycol)+(((0.0000832999999999998/ethylene_oxide_input_P)*44*1/yield)/62*ethylene_glycol)
  (same comment as for Ethylene)
- TOC, Total Organic Carbon [water, surface water]: 7.38952e-5 kg; = (((0.0000832999999999998/ethylene_oxide_input_P)*3*44*1/yield)/150*triethylene_glycol)+(((0.0000832999999999998/ethylene_oxide_input_P)*2*44*1/yield)/106*diethylene_glycol)+(((0.0000832999999999998/ethylene_oxide_input_P)*44*1/yield)/62*ethylene_glycol)
  (same comment as for Ethylene)

## Sampling procedure
Extrapolation from European dataset. Industry survey complemented with literature data and data from the Reference Document on Best Available Techniques in the Large Volume Organic Chemical Industry (2017)

## Extrapolations
Extrapolation from European dataset. Uncertainty has been adjusted accordingly.
