# bleaching, textile

Dataset: EcoSpold 2, unit process
Geography: RoW
Time period: 2017-01-01 to 2023-12-31
Technology level: current
Classification: ISIC rev.4 ecoinvent: 1313:Finishing of textiles
Scenario: Business-as-Usual
System model: Allocation, cut-off by classification
Generated by: [System]
Published in: Faist Emmenegger, M. 2018
Database: ecoinvent
isCopyrightProtected: true
accessRestrictedTo: 1

## General comment
This inventory refers to 1 kg bleached textile. This dataset only covers all relevant input and output flows for bleaching of 1 kg fabric as a service to the batch dyeing activity.
This activity bleaches greige textile. Bleaching improves whiteness by removing natural coloration and remaining trace impurities from the cotton; the degree of bleaching necessary is determined by the required whiteness and absorbency. Cotton being a vegetable fibre will be bleached using an oxidizing agent, such as dilute sodium hypochlorite or dilute hydrogen peroxide.
This activity is modeled as a service, so no input of textile is considered. Electricity consumption and chemicals used (hydrogen per oxide, sodium hydroxide, and inorganic chemicals) are considered as inputs. Wastewater discharges as output. A separate dataset is taking care of wasterwater treatment.
Cody, Roxanna (2012). Textile Engineering. First Edition. Delhi.

## Included activities start
This activity applies to scoured fabric. As it is a service, no inputs of fabric are included; this activity should be used with 1 kg fabric.

## Included activities end
This process delivers the service of bleaching 1 kg fabric.Drying is not included.

## Reference product
- bleaching, textile: 1 kg; By-product classification allocatable product; CPC 88213: Textile finishing services
  Literature Value. The annual woven and knit fabric dyeing capacity data from Bangladesh Textile Mills Association (BTMA).
  production volume 6.84822e10 kg; name PV_RP
    Based on the Fibre Year Report 2017 for the overall amount of fibre and assumptions (17% of overall fibre consumption for apparel) based on the FAO World Apparel Fiber Consumption Survey 2013 for losses.
  property price 0.301769 EUR2005
    Calculated based on inputs: The price of the product has been calculated as a sum of the values of the material and energy inputs for this product. This value is therefore a rough estimation. It may underestimate the real price since there are additional expenses when producing any product. These expences can include for example labour costs, treatment of waste materials and profit for the producer. Please consider carefully whether this level of data quality is acceptable for your application.
  properties: carbon allocation 0 kg, carbon content 0

## Inputs from technosphere
- building, hall: 4.54656e-7 m2; lognormal variance with pedigree 0.3046, pedigree (2,1,3,5,1)
  total building area (square meters) divided by production per year and life time of the plant
- chemical, inorganic: 0.0102426 kg; lognormal variance with pedigree 0.0126, pedigree (4,1,3,5,1)
  Industry data.
  properties: carbon content, fossil 0.003, dry mass 1 kg, wet mass 1 kg
  note on carbon content, fossil: This dataset is an unweighted average of 20 inorganic substances (listed in Tab 88.1, ecoinvent v2.2 report 8, part II), being part of the top100 chemicals included in this database. The C-content has also been calculated as an unweighted average of the C content of the substances composing this dataset.
- diesel, burned in diesel-electric generating set, 18.5kW: 0.224897 MJ; lognormal variance with pedigree 0.0146, pedigree (4,4,3,5,1)
  Diesel used for power backup. Forumula includes diesel consumption in liters multiplied density of fule and its calorific value
- electricity, low voltage: 6.55242e-5, 0.000354548, 1.37789e-5, 5.35731e-6, 0.000373967, 8.91366e-5, 5.37563e-6, 1.83714e-5, 7.34052e-6, 0.00330063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 kWh (46 suppliers, which the file names only by identifier); sum of these 0.00934636 kWh; lognormal variance with pedigree 0.0066, pedigree (1,4,3,5,1)
  sum of electricity used for:
  dyeing machine
  boiler
  hydro extractor
  dryer
  compactor
- hydrogen peroxide, without water, in 50% solution state: 0.00527082, 0.0250213 kg (2 suppliers, which the file names only by identifier); sum of these 0.0302921 kg; lognormal variance with pedigree 0.0126, pedigree (4,1,3,5,1)
  Industry data.
  properties: dry mass 1 kg, heating value, net 7.13 MJ, wet mass 1 kg
- sodium hydroxide, without water, in 50% solution state: 0.000829229, 0.00849198 kg (2 suppliers, which the file names only by identifier); sum of these 0.00932121 kg; lognormal variance with pedigree 0.0126, pedigree (4,1,3,5,1)
  Industry data.
  properties: dry mass 1 kg, heating value, net 3.03 MJ, wet mass 1 kg
- wastewater from textile production: -0.00609068 m3; name wastewater
  Industry data.
  production volume; = PV_RP*wastewater
    Calculated from production volume of reference product using the relative outputs.

## Inputs from nature
- Water, well, in ground [natural resource, in water]: 0.00625425 m3; lognormal variance with pedigree 0.0126, pedigree (4,1,3,5,1)
  Industry data.

## Emissions to nature
- Water [air, urban air close to ground]: 0.000163561 m3; lognormal variance with pedigree 0.0146, pedigree (4,4,3,5,1)
  Considering 20% evaporation rate

## Sampling procedure
Weighted average of data from mills in India and Bangladesh. Uncertainty has been adjusted accordingly.
