# treatment of scrap tin sheet, sanitary landfill

Dataset: EcoSpold 2, unit process
Geography: EC
Time period: 1994-01-01 to 2023-01-01
Technology level: current
Classification: ISIC rev.4 ecoinvent: 3821:Treatment and disposal of non-hazardous waste
Scenario: Business-as-Usual
System model: Allocation, cut-off by classification
Generated by: Nikolia Stoikou
Database: ecoinvent
isCopyrightProtected: true
accessRestrictedTo: 1

## General comment
This dataset represents the activity of waste disposal of 'scrap tin sheet' in a sanitary landfill. Recommended use of this dataset: for disposal of tin sheet packaging (tin cans, paint buckets) but without paper parts (please inventory any paper separately), which go to disposal as part of communal waste. Larger amounts of separated tin sheet will not be disposed in incinerators or landfills, but rather go to recycling. Inventoried waste contains several fractions: 99.8% tin sheet inert; 0.195% tin volatile. Waste composition (wet, in ppmw): H2O na; O na; H na; C na; S na; N na; P na; B na; Cl 750; Br na; F na; I na; Ag na; As na; Ba na; Cd 30; Co na; Cr na; Cu 199; Hg na; Mn na; Mo na; Ni na; Pb 380; Sb na; Se na; Sn 3900; V na; Zn 202; Be na; Sc na; Sr na; Ti na; Tl na; W na; Si na; Fe 994570; Ca na; Al na; K na; Mg na; Na na. Share of carbon in initial waste waste that is biogenic 60.4%. Also includes recursive controlled landfilling of higher order (tertiary) sewage sludge from purification in wastewater treatment from the treatment chain WWT<-SLF<-WWT<-SLF. Share of metals in waste not oxidised and bulk-recyclable (exclude very small or thin parts) Iron: 100%; Alu: 0%; Copper: 0%. Overall degradability of waste during 100 years: 50%. Degradability of composing waste fractions: tin sheet inert: 50%; tin volatile: 50%. Landfill gas capture and utilisation generates 0.000002879 kWh of electricity and 0.000005192 MJ of useful heat. 0 kg waste mass remains in the landfill even after the long term period.

## Included activities start
The activity starts with the waste being available at the gate of the treatment facility. Collection and transportation of the waste to the treatment plant is not included.

## Included activities end
The activity ends with the waste being treated and waste-specific emissions from the landfill are released to the environment (air due to landfil gas, water due to landfil leachate, and subsequent into groundwater).

## Geography
This site has mean annual temperature (MAT) of 21.39 degC, mean annual precipitation (MAP) of 2159.33 mm/year, and net infiltration of 1200.4077377702 mm/year. This infiltration was soft capped from a value of 1223.65335345399 mm/year. The implied surface runoff of water is therefore 23.2456156837909 mm/year. The leachate percolating through the landfill has an average residence time of 4.17 years.
References:
World Bank, 2021. Observed Climatology of Mean-Temperature 1991-2020 Ecuador, Climate Change Knowledge Portal for Development Practisioners and Policy Makers, The World Bank Group Available at: https://climateknowledgeportal.worldbank.org/country/ecuador/climate-data-historical;
UN data, 2020. Precipitation, Environment Statistics Database, United Nations Statistics Division Available at: http://data.un.org/Data.aspx?q=precipitation&d=ENV&f=variableID%3a6;
World Bank, 2022. Surface area (sq.km), World Bank Group Available at: https://data.worldbank.org/indicator/AG.SRF.TOTL.K2;

## Technology
This is an inventory for a sanitary (controlled) landfill for municipal solid waste. Ultimate average landfill height is 20 meters. Operation phase duration is 30 years. The total raw landfill gas mass produced in the landfill from this waste is 0.0001896 kg. The total CH4 mass in the raw landfill gas is 0.000003685 kg. Percentage of landfill gas directly emitted is 47w%. Percentage of landfill gas captured and flared is 18.02w%. Percentage of landfill gas captured and utilised is 34.98%. Conversion efficiencies are 27.8e% for electricity and 13.5e% for useful heat. Leachate collected during the first 100 years is collected and treated region-specifically before emission. Based on average waste composition and climate data the end of carbonate phase is estimated to be reached 1'911 years after waste deposition.

## Reference product
- heat, district or industrial, other than natural gas: 1 MJ; By-product classification allocatable product; CPC 17300: Steam and hot water
  Net production of heat from landfill gas utilisation.
  production volume 4.17056e-9 MJ
    calculated in proportion to incinerated waste input
  property corresponding fuel use, propane, furnace >100kW 0 MJ
    Lower heating value of the fuel input related to the heat/electricity output, taken directly from ecoinvent v3.0 dataset "heat production, natural gas, at industrial furnace >100kW, GLO 2000".
  property price 0.0106 EUR2005
    Average European district heat price from Ecoheatcool and Euroheat 2005-2006, Ecoheat Work package 1: The European heat market. Final report. 10.6 EUR/GJ i s the price of district heat. http://www.solarthermalworld.org/files/Ecoheatcool%20WP1%20Web.pdf?download
  properties: carbon allocation 0 kg, carbon content 0, carbon content, fossil 0, carbon content, non-fossil 0, dry mass 1 kg, exergy 0.169678 MJ, heating value, net 1 MJ, true value relation 0.169678, water content 0, water in wet mass 0 kg, wet mass 1 kg
