# sulfate pulp production, from softwood, bleached

Dataset: EcoSpold 2, unit process
Geography: RER
Time period: 2020-01-01 to 2023-12-31
Technology level: current
Classification: ISIC rev.4 ecoinvent: 1701:Manufacture of pulp, paper and paperboard
Synonyms: kraft pulp; Kraftzellstoff
Scenario: Business-as-Usual
System model: Allocation, cut-off by classification
Share of production covered: 86 %
Generated by: AISBL
Database: ecoinvent
isCopyrightProtected: true
accessRestrictedTo: 1

## General comment
This dataset represents an aggregation of the European production of Elemental Chlorine Free (ECF) and Totally Chlorine Free (TCF) kraft pulp, obtained from softwood for the year 2020. Industry data was used which was provided by the European Pulp Industry Sector Association AISBL (EPIS). Values represent weighted average of 16 corresponding pulp mills located in Nordic countries and Germany. The used values are a weighted average of all corresponding pulp mills. The represented technology is considered state of the art for an European average.
PULP is a wood-based raw material to make different paper, board and other products. The pulp, or fibers from the wood are separated in a kraft cooking process in a so-called fiber line. In a recovery line, the chemicals used in the cooking process are recovered to be used again and energy is produced. The third process is effluent treatment where gaseous and liquid discharges to the environment are continuously minimized and monitored.
MAIN END USES FOR MARKET PULP • Tissue (toilet paper) • Graphic papers • Specialty products • Packaging • Fluff pulp • Viscose • CMC etc.
PRODUCTS GENERATED IN THE PULPING PROCESS include crude tall oil, turpentine, biogas from sludge, electricity, heat etc.
CAPACITIES World’s total market capacities for softwood kraft pulp, hardwood kraft pulp, and eucalyptus kraft pulp were 28.9 million tons, 15 million tons, and 26.2 million tons, respectively.
SPECIES Softwood pulp is made from coniferous trees, most typically from different species of pine and spruce. Hardwood pulp is made from non-coniferous trees, in Nordic countries primarily of birch. Eucalyptus hardwood pulp is made exclusively of eucalyptus species.
CHARACTERISTICS Softwood fibers are long and slender and are used to give the paper and board products their strength properties. Hardwood fibers are short and can be rounder and their number per gram of pulp is much larger; they give the end product its smoothness, softness and optical properties like opacity (that you cannot see through the paper).

## Included activities start
This activity starts with the transport of woodchips and pulpwood to the pulp factory. Pulpwood and woodchips inputs have activity links to their supplying activities and are therefore not supplied via market datasets.

## Included activities end
The process includes transports to the pulp mill, wood handling, chemical pulping and bleaching, drying process, energy production on-site, recovery cycles of chemicals and internal wastewater treatment. The following air emissions were reported in the industry: CO2 (fossil and biogenic), SOx (as SO2), NOx, TRS (as S), SO2 (reported as S), Dust (unspecified). Next to these key emissions, additional emissions from on-site energy production from external and internal fuels were calculated, using emission profiles from ecoinvent combustion processes. Internal biogenic fuels are represented by the calculated emissions but do not have the corresponding fuel input from technosphere, because they are supplied from within the system boundaries. The amounts of internal fuels used in the process are: Biogas (55MJ/t), Bark (1952MJ/t), Black liquor(18349MJ/t), Sludge (61 MJ/t), Methanol (145 MJ/t), Biomass (6 MJ/t), tall oil pitch (229 MJ/t), Biomass (wood residuals) (84 MJ/t). Black liquor, sludge, tall oil pitch, and sodium formiate were not included in the emissions calculations because no specific emission profiles, e.g. for the black liquor recovery process, were available. Emissions from these internal energy generation processes are therefore only reflected in the key emission factors provided by the industry, other emissions constitute a data gap. The production of 8.43E-06 kg of the by-product “white liquor” per kg of pulp was excluded from the activity since no appropriate proxy could be found. The activity ends when the kraft pulp is ready to be sold.

## Geography
Representing European countries. Data is coming from mills in Nordic countries and Germany.

## Technology
Average European technology in 2020 of kraft pulp production of ECF and TCF pulp

## Time period
Data gathered in 2021 and represents data of 2020 values. Recent technology valid for the upcoming years.

## Reference product
- methanol, from biomass: 1 kg; name a_meth; By-product classification allocatable product; CPC 34139: Other alcohols, phenols, phenol-alcohols, and their halogenated, sulphonated, nitrated or nitrosated derivativ[…]; HS2017 290511: Alcohols; saturated monohydric, methanol (methyl alcohol); CAS 67-56-1
  Data provided by industry (EPIS) 2020. By-product of pulp production.
  production volume 2.3056e7 kg; = a_meth*APV_RP
    Calculated from production volume of reference product using the relative outputs.
  property heating value, net 26.48 MJ
    LHV is calculated based on the elemental composition of the substance. Based on the CAS number of the substance (000067-56-1), the chemical formula of the substance is found to be: CH4O, (PubChem 2020). Reference: Kim, S., Chen, J., Cheng, T., Gindulyte, A., He, J., He, S., Li, Q., Shoemaker, B. A., Thiessen, P. A., Yu, B., Zaslavsky, L., Zhang, J., & Bolton, E. E. (2019). PubChem 2019 update: improved access to chemical data. Nucleic acids research, 47(D1), D1102–D1109. https://doi.org/10.1093/nar/gky1033
  property price 0.216 EUR2005
    Methyl alcohol, import prices for EU-27, USA, Japan, China, and India(http://data.un.org/browse.aspx?d=Comtrade; downloaded 13 September 2010)
  properties: allocation factor 0.00133588, carbon allocation 0.375 kg, carbon content 0.375375, carbon content, fossil 0, carbon content, non-fossil 0.375375, dry mass 0.999 kg, true value 0.000579132, water content 0.001001, water in wet mass 0.001 kg, wet mass 1 kg

## Inputs from technosphere
- EDTA, ethylenediaminetetraacetic acid: 0.000326611 kg; lognormal variance with pedigree 0.0009, pedigree (1,2,2,1,1)
  Data provided by industry (EPIS) 2020
  properties: carbon content, fossil 0.410959, dry mass 1 kg, heating value, net 19.09 MJ, wet mass 1 kg
- aluminium scrap, post-consumer: -1.40756e-5 kg; name a_al_scrap; lognormal variance with pedigree 0.0007, pedigree (1,2,1,1,1)
  Data provided by industry (EPIS) 2020. Represents 9.5 % of the total metal waste.
  production volume; = a_al_scrap*APV_RP
    Calculated from production volume of reference product using the relative outputs.
  properties: dry mass 1 kg, price 0.685 EUR2005, wet mass 1 kg
- aluminium sulfate, powder: 0.000335776 kg; lognormal variance with pedigree 0.0009, pedigree (1,2,2,1,1)
  Data provided by industry (EPIS) 2020.
  properties: dry mass 1 kg, wet mass 1 kg
- bark chips, wet, measured as dry mass: 0.00624402, 8.56581e-5 kg (2 suppliers, which the file names only by identifier); sum of these 0.00632967 kg; lognormal variance with pedigree 0.0095, pedigree (2,2,2,1,3)
  Data provided by industry (EPIS) 2020, indicated in energy content and given as 0.17277 MJ/kg . Calculation into mass/volume was done by using the following conversion factor: Bark: MJ/kg 13.6
  properties: carbon content, non-fossil 0.494, dry mass 1 kg, heating value, net 4.81 MJ, water content 1.4, wet mass 2.4 kg
- biogas: 0.00194397 m3; lognormal variance with pedigree 0.0095, pedigree (2,2,2,1,3)
  Data provided by industry (EPIS) 2020, indicated in energy content and given as 0.0887 MJ/kg . Calculation into mass/volume was done by using the following conversion factor: Biogas: MJ/kg 22.73. Value taken from the general comment of "heat and power co-generation, biogas, gas engine" dataset. Source: https://ecoinvent.org/wp-content/uploads/2021/09/LHV_fuels.xlsx
  properties: carbon content, non-fossil 0.449939, dry mass 1.15 kg, heating value, net 22.73 MJ, wet mass 1.15 kg
- calcium carbonate, precipitated: 0.00102453 kg; lognormal variance with pedigree 0.0009, pedigree (1,2,2,1,1)
  Data provided by industry (EPIS) 2020. Represents make-up limestone (CaCO3)
  properties: carbon content, fossil 0.120005, dry mass 1 kg, wet mass 1 kg
- chemical, inorganic: 3.73683e-6 kg; lognormal variance with pedigree 0.002, pedigree (2,3,2,1,1)
  Data provided by industry (EPIS) 2020. Represents Sodium metabisulphite (Na2S2O5) and Biocide
  properties: carbon content, fossil 0.003, dry mass 1 kg, wet mass 1 kg
- chemical, organic: 0.000263636 kg; lognormal variance with pedigree 0.002, pedigree (2,3,2,1,1)
  Data provided by industry (EPIS) 2020. Represents Peracetic acid (C2H4O3), Polymer, Defoamer, and Antifoam
  properties: carbon content, fossil 0.628, dry mass 1 kg, heating value, net 19.03 MJ, wet mass 1 kg
- chlorine dioxide: 0.0022995 kg; lognormal variance with pedigree 0.0009, pedigree (1,2,2,1,1)
  Data provided by industry (EPIS) 2020.
  properties: dry mass 1 kg, wet mass 1 kg
- copper scrap, sorted, pressed: -1.48164e-6 kg; name a_cu_scrap; lognormal variance with pedigree 0.0007, pedigree (1,2,1,1,1)
  Data provided by industry (EPIS) 2020. Represents 1 % of the total metal waste.
  production volume; = a_cu_scrap*APV_RP
    Calculated from production volume of reference product using the relative outputs.
  properties: dry mass 1 kg, price 2.84 EUR2005, wet mass 1 kg
- digester sludge: -0.000477443 kg; name a_ds; lognormal variance with pedigree 0.0007, pedigree (1,2,1,1,1)
  Data provided by industry (EPIS) 2020. Represents water treatment sludge
  production volume; = a_ds*APV_RP
    Calculated from production volume of reference product using the relative outputs.
  properties: carbon content, non-fossil 0.3444, dry mass 0.05 kg, heating value, net 2.42 MJ, water content 19, wet mass 1 kg
- electricity, high voltage: 0.0176218 kWh; lognormal variance with pedigree 0.0009, pedigree (1,2,2,1,1)
  Data provided by industry (EPIS) 2020. Represents external supply.
- electronics scrap: -9.02085e-5 kg; name a_electr_scrap; lognormal variance with pedigree 0.0007, pedigree (1,2,1,1,1)
  Data provided by industry (EPIS) 2020. Represents electric batteries and electrical devices.
  production volume; = a_electr_scrap*APV_RP
    Calculated from production volume of reference product using the relative outputs.
  properties: carbon content, fossil 0.317311, carbon content, non-fossil 0.004557, dry mass 1 kg, price 16.1 EUR2005, wet mass 1 kg
- green liquor dregs: -0.00730641 kg; name a_gld; lognormal variance with pedigree 0.0007, pedigree (1,2,1,1,1)
  Data provided by industry (EPIS) 2020. Represents green liquor sludge
  production volume; = a_gld*APV_RP
    Calculated from the production volume of sulfate pulp in proportion to the respective output amounts.
  properties: carbon content, non-fossil 0.390667, dry mass 0.75 kg, water content 0.333333, wet mass 1 kg
- hard coal: 4.41032e-5 kg; lognormal variance with pedigree 0.0095, pedigree (2,2,2,1,3)
  Data provided by industry (EPIS) 2020, indicated in energy content and given as 0.00247 MJ/kg . Calculation into mass/volume was done by using the following conversion factor: Hard coal: MJ/kg 27.91. Based on the Characterization factor of Hard coal in the CED method. Source: https://ecoinvent.org/wp-content/uploads/2021/09/LHV_fuels.xlsx
  properties: carbon content, fossil 0.845, dry mass 0.94 kg, heating value, net 27.91 MJ, water content 0.0638298, wet mass 1 kg
- hazardous waste, for incineration: -0.000103516, -2.70584e-6 kg (2 suppliers, which the file names only by identifier); sum of these -0.000106221 kg; lognormal variance with pedigree 0.0007, pedigree (1,2,1,1,1)
  Data provided by industry (EPIS) 2020. Represents e.g. laboratory chemicals, solvents that must be disposed of in a controlled manner in a specialized external facility.
  production volume; = a_hw*APV_RP
    Calculated from production volume of reference product using the relative outputs.
  properties: carbon content, fossil 0.554667, dry mass 0.75 kg, heating value, net 17 MJ, water content 0.333333, wet mass 1 kg
- heat, district or industrial, natural gas: 0.019598 MJ; lognormal variance with pedigree 0.0009, pedigree (1,2,2,1,1)
  Data provided by industry (EPIS) 2020. Reported as external heat supply.
  properties: heating value, net 1 MJ
- heavy fuel oil: 0.00363068 kg; lognormal variance with pedigree 0.0095, pedigree (2,2,2,1,3)
  Data provided by industry (EPIS) 2020, indicated in energy content and given as 0.3002 MJ/kg . Calculation into mass/volume was done by using the following conversion factor: Heavy fuel oil: MJ/kg 41.2. Based on literature, page 21, Report6, part 4. Source: https://ecoinvent.org/wp-content/uploads/2021/09/LHV_fuels.xlsx
  properties: carbon content, fossil 0.849, dry mass 1 kg, heating value, net 41.2 MJ, wet mass 1 kg
- hydrochloric acid, without water, in 30% solution state: 0.00018178 kg; lognormal variance with pedigree 0.0009, pedigree (1,2,2,1,1)
  Data provided by industry (EPIS) 2020.
  properties: dry mass 1 kg, heating value, net 3.32 MJ, wet mass 1 kg
- hydrogen peroxide, without water, in 50% solution state: 0.00530011 kg; lognormal variance with pedigree 0.0009, pedigree (1,2,2,1,1)
  Data provided by industry (EPIS) 2020
  properties: dry mass 1 kg, heating value, net 7.13 MJ, wet mass 1 kg
- iron scrap, unsorted: -0.000132607 kg; name a_iron_scrap; lognormal variance with pedigree 0.0007, pedigree (1,2,1,1,1)
  Data provided by industry (EPIS) 2020. Represents 89.5 % of the total metal waste.
  production volume; = a_iron_scrap*APV_RP
    Calculated from production volume of reference product using the relative outputs.
  properties: dry mass 1 kg, price 0.149 EUR2005, wet mass 1 kg
- light fuel oil: 0.000268201 kg; lognormal variance with pedigree 0.0095, pedigree (2,2,2,1,3)
  Data provided by industry (EPIS) 2020, indicated in energy content and given as 0.02293 MJ/kg. Calculation into mass/volume was done by using the following conversion factor: Light fuel oil: MJ/kg 42.6. Based on literature, page 18, Report6, part 4. Source: https://ecoinvent.org/wp-content/uploads/2021/09/LHV_fuels.xlsx
  properties: carbon content, fossil 0.862, dry mass 1 kg, heating value, net 42.6 MJ, wet mass 1 kg
- limestone residue: -0.00833639 kg; name a_lsr; lognormal variance with pedigree 0.0007, pedigree (1,2,1,1,1)
  Data provided by industry (EPIS) 2020; including ash, lime mud and lime sludge
  production volume; = a_lsr*APV_RP
    (same comment as for green liquor dregs)
  properties: carbon content, fossil 0.0148226, dry mass 0.995 kg, water content 0.00502513, wet mass 1 kg
  note on carbon content, fossil: Calculated based on the carbon content of the input “calcium carbonate, precipitated”
- magnesium sulfate: 0.00134377 kg; lognormal variance with pedigree 0.0009, pedigree (1,2,2,1,1)
  Data provided by industry (EPIS) 2020
  properties: dry mass 1 kg, wet mass 1 kg
- malusil: 0.000299024 kg; lognormal variance with pedigree 0.0009, pedigree (1,2,2,1,1)
  Data provided by industry (EPIS) 2020. Represents Talc.
  properties: dry mass 1 kg, wet mass 1 kg
- methanol: 8.71928e-5 kg; lognormal variance with pedigree 0.0009, pedigree (1,2,2,1,1)
  Data provided by industry (EPIS) 2020
  properties: carbon content, fossil 0.375, dry mass 1 kg, heating value, net 20 MJ, wet mass 1 kg
  note on heating value, net: Based on literature, page 533, Report 17: Jungbluth, N., Chudacoff, M., Dauriat, A., Dinkel, F., Doka, G., Faist Emmenegger, M., Gnansounou, E., Kljun, N., Schleiss, K., Spielmann, M., Stettler, C., Sutter, J. 2007: Life Cycle Inventories of Bioenergy. ecoinvent report No. 17, Swiss Centre for Life Cycle Inventories, Dübendorf, CH.
- methanol, from biomass: 0.00225469 kg; lognormal variance with pedigree 0.0095, pedigree (2,2,2,1,3)
  Data provided by industry (EPIS) 2020 Represents biofuel from tall oil pitch. Indicated in energy content and given as 0.1198 MJ/kg. Calculated from energetic value with conversion factor 26.48 MJ/kg. The LHV is calculated based on the elemental composition of the substance. Based on the CAS number of the substance (000067-56-1), the chemical formula of the substance is found to be: CH4O, (PubChem 2020). Reference: Kim, S., Chen, J., Cheng, T., Gindulyte, A., He, J., He, S., Li, Q., Shoemaker, B. A., Thiessen, P. A., Yu, B., Zaslavsky, L., Zhang, J., & Bolton, E. E. (2019). PubChem 2019 update: improved access to chemical data. Nucleic acids research, 47(D1), D1102–D1109. https://doi.org/10.1093/nar/gky1033
  properties: carbon content, non-fossil 0.375375, dry mass 0.999 kg, heating value, net 26.48 MJ, water content 0.001001, wet mass 1 kg
- municipal solid waste: -0.00206692 kg; name a_msw; lognormal variance with pedigree 0.0007, pedigree (1,2,1,1,1)
  Data provided by industry (EPIS) 2020. Represents domestic waste and waste classified as "others"
  production volume; = a_msw*APV_RP
    (same comment as for green liquor dregs)
  properties: carbon content, fossil 0.171549, carbon content, non-fossil 0.261655, dry mass 0.771 kg, heating value, net 11.74 MJ, water content 0.297017, wet mass 1 kg
- natural gas, high pressure: 3.72538e-5, 0.00534297 m3 (2 suppliers, which the file names only by identifier); sum of these 0.00538022 m3; lognormal variance with pedigree 0.0095, pedigree (2,2,2,1,3)
  Data provided by industry (EPIS) 2020, indicated in energy content and given as 0.42113 MJ/kg. Calculation into mass/volume was done by using the following conversion factor: Natural gas: MJ/m3 39. Literature value, Source: United Nations Statistics Division (2018) International Recommendations for Energy Statistics (IRES). Available at: http://unstats.un.org/unsd/statcom/doc11/BG-IRES.pdf.
  properties: carbon content, fossil 0.75, dry mass 0.84 kg, heating value, net 36 MJ, wet mass 0.84 kg
  note on heating value, net: Literature value, Source: Christoph Meili;Niels Jungbluth;Maresa Bussa (2021) Life cycle inventories of crude oil and natural gas extraction. ESU-services Ltd. commissioned by BAFU & VSG, Schaffhausen, Switzerland, http://esu-services.ch/data/public-lci-reports/
- oxygen, liquid: 0.0107834 kg; lognormal variance with pedigree 0.0009, pedigree (1,2,2,1,1)
  Data provided by industry (EPIS) 2020
  properties: dry mass 1 kg, wet mass 1 kg
- ozone, liquid: 1.43737e-5 kg; lognormal variance with pedigree 0.0009, pedigree (1,2,2,1,1)
  Data provided by industry (EPIS) 2020
  properties: dry mass 1 kg, wet mass 1 kg
- pulp factory: 2.3851e-11 unit; lognormal variance with pedigree 0.3023, pedigree (3,2,2,1,1)
  Own estimation with yearly production volume and a lifetime of a factory of 50 years; activityLink introduced to establish a direct link to the corresponding region
- pulpwood, softwood, measured as solid wood under bark: 7.07507e-5 m3; = 1.39159820351519/dry_mass_pine_DE*0.05; lognormal variance with pedigree 0.0029, pedigree (3,2,2,1,1)
  This value represents a calculated value, i.e., it is not based on EPIS (2020) data. There was found to be an imbalance in carbon and therefore this value had to be recalculated to close the balance. It is assumed that 5% of the wood comes from Germany. The original amounts reported by EPIS (2020) are: pine (0.595 dry ton/ton), spruce and pine mix (0.988 dry ton/ton of which 68 % are assumed to be pine) and Larch (0.0004 dry ton/ton, which is approximated with the inputs of pine (68 %) and spruce (32 %)).
  property dry mass 490 kg; name dry_mass_pine_DE
  properties: basic wood density 387.2, carbon content, non-fossil 0.494, heating value, net 4483.78 MJ, water content 0.8, wet mass 882 kg
- pulpwood, softwood, measured as solid wood under bark: 3.84784e-5 m3; = 0.664159940275912/dry_mass_spruce_DE*0.05; lognormal variance with pedigree 0.0029, pedigree (3,2,2,1,1)
  This value represents a calculated value, i.e., it is not based on EPIS (2020) data. There was found to be an imbalance in carbon and therefore this value had to be recalculated to close the balance. It is assumed that 5& of the wood comes from Germany. The original amounts reported by EPIS (2020) are: spruce (0.2840 dry ton/ton), spruce and pine mix (0.988 dry ton/ton of which 32 % are assumed to be spruce) and Larch (0.0004 dry ton/ton, which is approximated with the inputs of pine (68 %) and spruce (32 %)).
  property dry mass 430 kg; name dry_mass_spruce_DE
  properties: basic wood density 387.2, carbon content, non-fossil 0.494, heating value, net 4483.78 MJ, water content 0.8, wet mass 774 kg
- pulpwood, softwood, measured as solid wood under bark: 0.00134426 m3; = 1.39159820351519/dry_mass_pine_SE*0.95; lognormal variance with pedigree 0.0029, pedigree (3,2,2,1,1)
  This value represents a calculated value, i.e., it is not based on EPIS (2020) data. There was found to be an imbalance in carbon and therefore this value had to be recalculated to close the balance. It is assumed that 95 % of the wood input comes from Finland and Sweden; wood input from Finland is approximated with wood input from Sweden. The original amounts reported by EPIS (2020) are: pine (0.595 dry ton/ton), spruce and pine mix (0.988 dry ton/ton of which 68 % are assumed to be pine) and Larch (0.0004 dry ton/ton, which is approximated with the inputs of pine (68 %) and spruce (32 %)).
  property dry mass 490 kg; name dry_mass_pine_SE
- pulpwood, softwood, measured as solid wood under bark: 0.000731089 m3; = 0.664159940275912/dry_mass_spruce_SE*0.95; lognormal variance with pedigree 0.0029, pedigree (3,2,2,1,1)
  This value represents a calculated value, i.e., it is not based on EPIS (2020) data. There was found to be an imbalance in carbon and therefore this value had to be recalculated to close the balance. It is assumed that 95 % of the wood input comes from Finland and Sweden; wood input from Finland is approximated with wood input from Sweden. The original amounts reported by EPIS (2020) are: spruce (0.2840 dry ton/ton), spruce and pine mix (0.988 dry ton/ton of which 32 % are assumed to be spruce) and Larch (0.0004 dry ton/ton, which is approximated with the inputs of pine (68 %) and spruce (32 %)).
  property dry mass 430 kg; name dry_mass_spruce_SE
- quicklime, milled, loose: 0.00673229 kg; lognormal variance with pedigree 0.0009, pedigree (1,2,2,1,1)
  Data provided by industry (EPIS) 2020. Represents calcium oxide (CaO)
  properties: dry mass 0.99 kg, water content 0.010101, wet mass 1 kg
- sludge from pulp and paper production: -0.000932839, -6.89848e-7 kg (2 suppliers, which the file names only by identifier); sum of these -0.000933529 kg; lognormal variance with pedigree 0.0007, pedigree (1,2,1,1,1)
  Data provided by industry (EPIS) 2020. Represents fibre (primary sludge) (77 %) and biological treatment sludge (23 %)
  production volume; = a_sd*APV_RP
    Calculated from production volume of reference product using the relative outputs.
  properties: carbon content, non-fossil 0.21, dry mass 0.75 kg, heating value, net 2.65 MJ, water content 0.333333, wet mass 1 kg
- sodium chlorate, powder: 0.00618949 kg; lognormal variance with pedigree 0.0009, pedigree (1,2,2,1,1)
  Data provided by industry (EPIS) 2020
  properties: dry mass 1 kg, wet mass 1 kg
- sodium formate: 0.000411933 kg; lognormal variance with pedigree 0.0095, pedigree (2,2,2,1,3)
  Data provided by industry (EPIS) 2020, indicated in energy content and given as 0.0059 MJ/kg . Calculation into mass/volume was done by using the following conversion factor 7.133 MJ/kg. LHV is calculated based on the elemental composition of the substance. Based on the CAS number of the substance (000141-53-7), the chemical formula of the substance is found to be: CHNaO2, (PubChem 2020). Reference: Kim, S., Chen, J., Cheng, T., Gindulyte, A., He, J., He, S., Li, Q., Shoemaker, B. A., Thiessen, P. A., Yu, B., Zaslavsky, L., Zhang, J., & Bolton, E. E. (2019). PubChem 2019 update: improved access to chemical data. Nucleic acids research, 47(D1), D1102–D1109. https://doi.org/10.1093/nar/gky1033
  properties: carbon content, fossil 0.176471, dry mass 1 kg, heating value, net 7.13 MJ, wet mass 1 kg
- sodium hydrogen sulfite: 0.000778701 kg; lognormal variance with pedigree 0.0009, pedigree (1,2,2,1,1)
  Data provided by industry (EPIS) 2020
  properties: dry mass 1 kg, wet mass 1 kg
- sodium hydroxide, without water, in 50% solution state: 0.0144641 kg; lognormal variance with pedigree 0.0009, pedigree (1,2,2,1,1)
  Data provided by industry (EPIS) 2020
  properties: dry mass 1 kg, heating value, net 3.03 MJ, wet mass 1 kg
- sodium hypochlorite, without water, in 15% solution state: 4.6835e-7 kg; lognormal variance with pedigree 0.0009, pedigree (1,2,2,1,1)
  Data provided by industry (EPIS) 2020
  properties: dry mass 1 kg, wet mass 1 kg
- sodium sulfate, anhydrite: 0.000188459 kg; lognormal variance with pedigree 0.0009, pedigree (1,2,2,1,1)
  Data provided by industry (EPIS) 2020
  properties: dry mass 1 kg, wet mass 1 kg
- sulfur: 2.78009e-5 kg; lognormal variance with pedigree 0.0009, pedigree (1,2,2,1,1)
  Data provided by industry (EPIS) 2020
  properties: dry mass 1 kg, wet mass 1 kg
- sulfuric acid: 0.0134236 kg; lognormal variance with pedigree 0.0009, pedigree (1,2,2,1,1)
  Data provided by industry (EPIS) 2020
  properties: dry mass 1 kg, wet mass 1 kg
- transport, freight train: 0.248769 metric ton*km; lognormal variance with pedigree 0.0009, pedigree (1,2,2,1,1)
  Data provided by industry (EPIS) 2020. Represents transport of pulpwood, wood chips and sawmill residues
- transport, freight, inland waterways, barge: 0.0158541 metric ton*km; lognormal variance with pedigree 0.0009, pedigree (1,2,2,1,1)
  (same comment as for transport, freight train)
- transport, freight, lorry >32 metric ton, EURO5: 0.161018 metric ton*km; lognormal variance with pedigree 0.0009, pedigree (1,2,2,1,1)
  (same comment as for transport, freight train)
- transport, freight, sea, bulk carrier for dry goods: 0.358537 metric ton*km; lognormal variance with pedigree 0.0009, pedigree (1,2,2,1,1)
  (same comment as for transport, freight train)
- waste mineral oil: -6.13254e-6, -0.000247719 kg (2 suppliers, which the file names only by identifier); sum of these -0.000253852 kg; lognormal variance with pedigree 0.0007, pedigree (1,2,1,1,1)
  Data provided by industry (EPIS) 2020. Represents lubricants residues and lubricants wastes: The running of the equipment and conveyors and their maintenance require lubrication. lubricants are oils and greases
  production volume; = a_wmo*APV_RP
    Calculated from production volume of reference product using the relative outputs.
  properties: carbon content, fossil 0.864444, dry mass 0.9 kg, heating value, net 34.7 MJ, water content 0.111111, wet mass 1 kg
- waste packaging paper: -3.24152e-5 kg; name a_wpp; lognormal variance with pedigree 0.0007, pedigree (1,2,1,1,1)
  Data provided by industry (EPIS) 2020. Represents waste packaging
  production volume; = a_wpp*APV_RP
    Calculated from production volume of reference product using the relative outputs.
  properties: carbon content, fossil 0.3635, carbon content, non-fossil 0.1432, dry mass 1 kg, heating value, net 14.11 MJ, price 0.1 EUR2005, wet mass 1 kg
- waste plastic, mixture: -2.27324e-6 kg; name a_plastic; lognormal variance with pedigree 0.0007, pedigree (1,2,1,1,1)
  Data provided by industry (EPIS) 2020. Represents plastic waste
  production volume; = a_plastic*APV_RP
    Calculated from production volume of reference product using the relative outputs.
  properties: carbon content, fossil 0.747344, dry mass 0.847 kg, heating value, net 30.79 MJ, water content 0.180638, wet mass 1 kg
- waste wood, untreated: -0.000518054 kg; name a_ww; lognormal variance with pedigree 0.0007, pedigree (1,2,1,1,1)
  Data provided by industry (EPIS) 2020. Represents bark waste and wood waste.
  production volume; = a_ww*APV_RP
    Calculated from production volume of reference product using the relative outputs.
  properties: carbon content, non-fossil 0.48632, dry mass 0.8 kg, heating value, net 13.99 MJ, water content 0.25, wet mass 1 kg
- wood ash mixture, pure: -0.000875311, -2.68275e-5 kg (2 suppliers, which the file names only by identifier); sum of these -0.000902138 kg; lognormal variance with pedigree 0.0007, pedigree (1,2,1,1,1)
  Data provided by industry (EPIS) 2020; Represents fiber reject.
  production volume; = a_wam*APV_RP
    (same comment as for green liquor dregs)
  properties: carbon content, non-fossil 0.012, dry mass 1 kg, wet mass 1 kg
- wood chips, wet, measured as dry mass: 0.221834 kg; lognormal variance with pedigree 0.0009, pedigree (1,2,2,1,1)
  Data provided by industry (EPIS) 2020. Represents wood chips and saw mill residues.
  properties: carbon content, non-fossil 0.494, dry mass 1 kg, heating value, net 10.84 MJ, water content 1.1, wet mass 2.1 kg
- wood pellet, measured as dry mass: 0.00472438 kg; lognormal variance with pedigree 0.0095, pedigree (2,2,2,1,3)
  Data provided by industry (EPIS) 2020, indicated in energy content and given as 0.1598 MJ/kg. Calculation into mass/volume was done by using the following conversion factor: Wood pellets: MJ/kg 16.85.
  properties: carbon content, non-fossil 0.494, dry mass 1 kg, heating value, net 13.38 MJ, water content 0.1, wet mass 1.1 kg

## Inputs from nature
- Carbon dioxide, non-fossil, resource correction [natural resource, in air]: 0.342274 kg
- Oxygen [natural resource, in air]: 0.918024 kg; name O2; = (CO2_fossil+CO2_non_fossil)/(16*2+12) * (16*2) + (CO_fossil+CO_non_fossil)/(16+12) *16; lognormal variance with pedigree 0.0494, pedigree (2,5,2,1,4)
  Oxygen is required for the combustion process. Calculated value
- Water, unspecified natural origin [natural resource, in water]: 0.035694 m3; lognormal variance with pedigree 0.0009, pedigree (1,2,2,1,1)
  Data provided by industry (EPIS) 2020. Represents surface water.

## Emissions to nature
- Acetaldehyde [air, urban air close to ground]: 9.4623e-8 kg; lognormal variance with pedigree 0.1388, pedigree (2,5,2,1,4)
  Estimation based on fuel input data and emission factors from corresponding ecoinvent fuel combustion (see "Extrapolations" comment). Apart from external fuel inputs, internal fuels such as bark, black liquor, sludge, and tall oil pitch are generated during the process and supply considerable amounts of process energy. Internal fuels are represented by the calculated emissions but do not have the corresponding fuel input from technosphere, because they are supplied from within the system boundaries. The amounts of internal fuels used in the process are: Biogas (55MJ/t), Bark (1952MJ/t), Black liquor (18349MJ/t), Sludge (61 MJ/t), Methanol (145 MJ/t), Biomass (6 MJ/t), tall oil pitch (229 MJ/t), Biomass (wood residuals) (84 MJ/t).Black liquor, sludge, tall oil pitch, and sodium formiate were not included in the emissions calculations because no specific emission profiles were available. Emissions from these internal energy generation processes are therefore only reflected in the key emission factors provided by the industry, other emissions constitute a data gap.
- Acetic acid [air, urban air close to ground]: 1.41504e-7 kg; lognormal variance with pedigree 0.1388, pedigree (2,5,2,1,4)
  (same comment as for Acetaldehyde)
- Acetone [air, urban air close to ground]: 2.21113e-8 kg; lognormal variance with pedigree 0.1388, pedigree (2,5,2,1,4)
  (same comment as for Acetaldehyde)
- Acetylene [air, urban air close to ground]: 6.15497e-10 kg; lognormal variance with pedigree 0.0888, pedigree (2,5,2,1,4)
  (same comment as for Acetaldehyde)
- Aluminium III [air, urban air close to ground]: 1.31716e-8 kg; lognormal variance with pedigree 0.6988, pedigree (2,5,2,1,4)
  (same comment as for Acetaldehyde)
- Ammonia [air, urban air close to ground]: 2.04963e-6 kg; lognormal variance with pedigree 0.1388, pedigree (2,5,2,1,4)
  (same comment as for Acetaldehyde)
- Antimony ion [air, urban air close to ground]: 1.94497e-12 kg; lognormal variance with pedigree 0.6988, pedigree (2,5,2,1,4)
  (same comment as for Acetaldehyde)
- Arsenic ion [air, urban air close to ground]: 3.13037e-9 kg; lognormal variance with pedigree 0.1388, pedigree (2,5,2,1,4)
  (same comment as for Acetaldehyde)
- Barium II [air, urban air close to ground]: 1.55105e-10 kg; lognormal variance with pedigree 0.6988, pedigree (2,5,2,1,4)
  (same comment as for Acetaldehyde)
- Benzene [air, urban air close to ground]: 1.21873e-6 kg; lognormal variance with pedigree 0.1388, pedigree (2,5,2,1,4)
  (same comment as for Acetaldehyde)
- Benzo(a)pyrene [air, urban air close to ground]: 5.99455e-10 kg; lognormal variance with pedigree 0.1388, pedigree (2,5,2,1,4)
  (same comment as for Acetaldehyde)
- Beryllium II [air, urban air close to ground]: 1.55105e-12 kg; lognormal variance with pedigree 0.6988, pedigree (2,5,2,1,4)
  (same comment as for Acetaldehyde)
- Boron [air, urban air close to ground]: 5.83491e-10 kg; lognormal variance with pedigree 0.6988, pedigree (2,5,2,1,4)
  (same comment as for Acetaldehyde)
- Bromine [air, urban air close to ground]: 7.09868e-8 kg; lognormal variance with pedigree 0.1388, pedigree (2,5,2,1,4)
  (same comment as for Acetaldehyde)
- Butane [air, urban air close to ground]: 2.51196e-7 kg; lognormal variance with pedigree 0.3988, pedigree (2,5,2,1,4)
  (same comment as for Acetaldehyde)
- Cadmium II [air, urban air close to ground]: 8.29988e-10 kg; lognormal variance with pedigree 0.6988, pedigree (2,5,2,1,4)
  (same comment as for Acetaldehyde)
- Calcium II [air, urban air close to ground]: 6.93784e-6 kg; lognormal variance with pedigree 0.3988, pedigree (2,5,2,1,4)
  (same comment as for Acetaldehyde)
- Carbon dioxide, fossil [air, urban air close to ground]: 0.0243632 kg; name CO2_fossil; lognormal variance with pedigree 0.0494, pedigree (2,5,2,1,4)
  This value represents a calculated value, i.e., it is not based on EPIS (2020) data. It was calculated based on the fossil fuel input data and emission factors from corresponding ecoinvent fuel combustion datasets (see "Extrapolations" comment).
- Carbon dioxide, non-fossil [air, urban air close to ground]: 1.23764 kg; name CO2_non_fossil; lognormal variance with pedigree 0.0009, pedigree (1,2,2,1,1)
  Key emission provided by industry (EPIS) 2020
- Carbon monoxide, fossil [air, urban air close to ground]: 1.64119e-6 kg; name CO_fossil; lognormal variance with pedigree 0.6988, pedigree (2,5,2,1,4)
  (same comment as for Acetaldehyde)
- Carbon monoxide, non-fossil [air, urban air close to ground]: 0.000355178 kg; name CO_non_fossil; lognormal variance with pedigree 0.6988, pedigree (2,5,2,1,4)
  (same comment as for Acetaldehyde)
- Chlorine [air, urban air close to ground]: 2.12925e-7 kg; lognormal variance with pedigree 0.3988, pedigree (2,5,2,1,4)
  (same comment as for Acetaldehyde)
- Chromium III [air, urban air close to ground]: 5.44173e-9 kg; lognormal variance with pedigree 0.6988, pedigree (2,5,2,1,4)
  (same comment as for Acetaldehyde)
- Chromium VI [air, urban air close to ground]: 5.81093e-11 kg; lognormal variance with pedigree 0.6988, pedigree (2,5,2,1,4)
  (same comment as for Acetaldehyde)
- Cobalt II [air, urban air close to ground]: 4.86838e-9 kg; lognormal variance with pedigree 0.6988, pedigree (2,5,2,1,4)
  (same comment as for Acetaldehyde)
- Copper ion [air, urban air close to ground]: 3.6382e-8 kg; lognormal variance with pedigree 0.6988, pedigree (2,5,2,1,4)
  (same comment as for Acetaldehyde)
- Dinitrogen monoxide [air, urban air close to ground]: 2.88208e-6 kg; lognormal variance with pedigree 0.1388, pedigree (2,5,2,1,4)
  (same comment as for Acetaldehyde)
- Dioxins, measured as 2,3,7,8-tetrachlorodibenzo-p-dioxin [air, urban air close to ground]: 3.67772e-14 kg; lognormal variance with pedigree 0.1388, pedigree (2,5,2,1,4)
  (same comment as for Acetaldehyde)
- Ethane [air, urban air close to ground]: 1.84649e-9 kg; lognormal variance with pedigree 0.0888, pedigree (2,5,2,1,4)
  (same comment as for Acetaldehyde)
- Ethanol [air, urban air close to ground]: 4.42226e-8 kg; lognormal variance with pedigree 0.1388, pedigree (2,5,2,1,4)
  (same comment as for Acetaldehyde)
- Ethyl benzene [air, urban air close to ground]: 3.54875e-8 kg; lognormal variance with pedigree 0.1388, pedigree (2,5,2,1,4)
  (same comment as for Acetaldehyde)
- Ethylene [air, urban air close to ground]: 3.69298e-9 kg; lognormal variance with pedigree 0.0888, pedigree (2,5,2,1,4)
  (same comment as for Acetaldehyde)
- Fluorine [air, urban air close to ground]: 5.91459e-8 kg; lognormal variance with pedigree 0.1388, pedigree (2,5,2,1,4)
  (same comment as for Acetaldehyde)
- Formaldehyde [air, urban air close to ground]: 2.65842e-7 kg; lognormal variance with pedigree 0.1388, pedigree (2,5,2,1,4)
  (same comment as for Acetaldehyde)
- Hexachlorobenzene [air, urban air close to ground]: 8.51701e-15 kg; lognormal variance with pedigree 0.1388, pedigree (2,5,2,1,4)
  (same comment as for Acetaldehyde)
- Hydrocarbons, aliphatic, alkanes, unspecified [air, urban air close to ground]: 1.17099e-6 kg; lognormal variance with pedigree 0.1388, pedigree (2,5,2,1,4)
  (same comment as for Acetaldehyde)
- Hydrocarbons, aliphatic, unsaturated [air, urban air close to ground]: 3.67208e-6 kg; lognormal variance with pedigree 0.1388, pedigree (2,5,2,1,4)
  (same comment as for Acetaldehyde)
- Hydrocarbons, aromatic [air, urban air close to ground]: 2.24532e-8 kg; lognormal variance with pedigree 0.1388, pedigree (2,5,2,1,4)
  (same comment as for Acetaldehyde)
- Hydrochloric acid [air, urban air close to ground]: 2.63195e-7 kg; lognormal variance with pedigree 0.1388, pedigree (2,5,2,1,4)
  (same comment as for Acetaldehyde)
- Hydrogen fluoride [air, urban air close to ground]: 8.72925e-9 kg; lognormal variance with pedigree 0.1388, pedigree (2,5,2,1,4)
  (same comment as for Acetaldehyde)
- Hydrogen sulfide [air, urban air close to ground]: 2.31838e-5 kg; lognormal variance with pedigree 0.0403, pedigree (1,2,2,1,1)
  Key emission provided by industry (EPIS) 2020. Hydrogen sulfide is expressing the total of the TRS (Total Reduced Sulphur Compounds), namely H2S, CS2, COS, C2H6S, CH4S, C2H6S2. Reported as TRS (as S)
- Iodine [air, urban air close to ground]: 1.40333e-11 kg; lognormal variance with pedigree 0.6988, pedigree (2,5,2,1,4)
  (same comment as for Acetaldehyde)
- Iron ion [air, urban air close to ground]: 1.26316e-7 kg; lognormal variance with pedigree 0.6988, pedigree (2,5,2,1,4)
  (same comment as for Acetaldehyde)
- Lead II [air, urban air close to ground]: 5.10405e-8 kg; lognormal variance with pedigree 0.6988, pedigree (2,5,2,1,4)
  (same comment as for Acetaldehyde)
- Lead-210 [air, urban air close to ground]: 5.72412e-8 kBq; lognormal variance with pedigree 0.6988, pedigree (2,5,2,1,4)
  (same comment as for Acetaldehyde)
- Magnesium [air, urban air close to ground]: 4.30516e-7 kg; lognormal variance with pedigree 0.6988, pedigree (2,5,2,1,4)
  (same comment as for Acetaldehyde)
- Manganese II [air, urban air close to ground]: 2.01123e-7 kg; lognormal variance with pedigree 0.6988, pedigree (2,5,2,1,4)
  (same comment as for Acetaldehyde)
- Mercury II [air, urban air close to ground]: 3.96794e-10 kg; lognormal variance with pedigree 0.6988, pedigree (2,5,2,1,4)
  (same comment as for Acetaldehyde)
- Methane, fossil [air, urban air close to ground]: 8.85591e-7 kg; lognormal variance with pedigree 0.1388, pedigree (2,5,2,1,4)
  (same comment as for Acetaldehyde)
- Methane, non-fossil [air, urban air close to ground]: 3.83654e-6 kg; lognormal variance with pedigree 0.1388, pedigree (2,5,2,1,4)
  (same comment as for Acetaldehyde)
- Methanol [air, urban air close to ground]: 7.51784e-8 kg; lognormal variance with pedigree 0.1388, pedigree (2,5,2,1,4)
  (same comment as for Acetaldehyde)
- Molybdenum VI [air, urban air close to ground]: 1.1851e-9 kg; lognormal variance with pedigree 0.6988, pedigree (2,5,2,1,4)
  (same comment as for Acetaldehyde)
- NMVOC, non-methane volatile organic compounds [air, urban air close to ground]: 8.28254e-6 kg; lognormal variance with pedigree 0.1388, pedigree (2,5,2,1,4)
  (same comment as for Acetaldehyde)
- Nickel II [air, urban air close to ground]: 7.93511e-8 kg; lognormal variance with pedigree 0.6988, pedigree (2,5,2,1,4)
  (same comment as for Acetaldehyde)
- Nitrogen oxides [air, urban air close to ground]: 0.000737579 kg; lognormal variance with pedigree 0.0403, pedigree (1,2,2,1,1)
  Key emission provided by industry (EPIS) 2020
- PAH, polycyclic aromatic hydrocarbons [air, urban air close to ground]: 1.67597e-8 kg; lognormal variance with pedigree 0.1388, pedigree (2,5,2,1,4)
  (same comment as for Acetaldehyde)
- Particulate Matter, < 2.5 um [air, unspecified]: 0.000107762 kg; lognormal variance with pedigree 0.3042, pedigree (3,4,2,1,1)
  Key emission provided by industry (EPIS) 2020: Represents dust (unspecified)
- Particulate Matter, > 10 um [air, urban air close to ground]: 3.66091e-7 kg; lognormal variance with pedigree 0.0888, pedigree (2,5,2,1,4)
  (same comment as for Acetaldehyde)
- Particulate Matter, > 2.5 um and < 10um [air, unspecified]: 3.15881e-6 kg; lognormal variance with pedigree 0.1688, pedigree (2,5,2,1,4)
  (same comment as for Acetaldehyde)
- Pentachlorophenol [air, urban air close to ground]: 9.58164e-12 kg; lognormal variance with pedigree 0.1388, pedigree (2,5,2,1,4)
  (same comment as for Acetaldehyde)
- Pentane [air, urban air close to ground]: 4.2686e-7 kg; lognormal variance with pedigree 0.1388, pedigree (2,5,2,1,4)
  (same comment as for Acetaldehyde)
- Phosphorus [air, urban air close to ground]: 3.54953e-7 kg; lognormal variance with pedigree 0.1388, pedigree (2,5,2,1,4)
  (same comment as for Acetaldehyde)
- Polonium-210 [air, urban air close to ground]: 1.04634e-7 kBq; lognormal variance with pedigree 0.6988, pedigree (2,5,2,1,4)
  (same comment as for Acetaldehyde)
- Potassium I [air, urban air close to ground]: 2.76818e-5 kg; lognormal variance with pedigree 0.6988, pedigree (2,5,2,1,4)
  (same comment as for Acetaldehyde)
- Potassium-40 [air, urban air close to ground]: 1.66184e-8 kBq; lognormal variance with pedigree 0.6988, pedigree (2,5,2,1,4)
  (same comment as for Acetaldehyde)
- Propane [air, urban air close to ground]: 7.66268e-8 kg; lognormal variance with pedigree 0.1388, pedigree (2,5,2,1,4)
  (same comment as for Acetaldehyde)
- Propionic acid [air, urban air close to ground]: 7.07444e-9 kg; lognormal variance with pedigree 0.1388, pedigree (2,5,2,1,4)
  (same comment as for Acetaldehyde)
- Propylene [air, urban air close to ground]: 6.15497e-10 kg; lognormal variance with pedigree 0.0888, pedigree (2,5,2,1,4)
  (same comment as for Acetaldehyde)
- Radium-226 [air, urban air close to ground]: 1.47719e-8 kBq; lognormal variance with pedigree 0.6988, pedigree (2,5,2,1,4)
  (same comment as for Acetaldehyde)
- Radium-228 [air, urban air close to ground]: 8.00146e-8 kBq; lognormal variance with pedigree 0.6988, pedigree (2,5,2,1,4)
  (same comment as for Acetaldehyde)
- Radon-220 [air, urban air close to ground]: 1.23099e-9 kBq; lognormal variance with pedigree 0.6988, pedigree (2,5,2,1,4)
  (same comment as for Acetaldehyde)
- Radon-222 [air, urban air close to ground]: 1.23099e-9 kBq; lognormal variance with pedigree 0.6988, pedigree (2,5,2,1,4)
  (same comment as for Acetaldehyde)
- Scandium [air, urban air close to ground]: 1.55105e-12 kg; lognormal variance with pedigree 0.6988, pedigree (2,5,2,1,4)
  (same comment as for Acetaldehyde)
- Selenium IV [air, urban air close to ground]: 1.78057e-9 kg; lognormal variance with pedigree 0.6988, pedigree (2,5,2,1,4)
  (same comment as for Acetaldehyde)
- Silicon [air, urban air close to ground]: 1.94497e-8 kg; lognormal variance with pedigree 0.6988, pedigree (2,5,2,1,4)
  (same comment as for Acetaldehyde)
- Sodium I [air, urban air close to ground]: 1.64913e-6 kg; lognormal variance with pedigree 0.6988, pedigree (2,5,2,1,4)
  (same comment as for Acetaldehyde)
- Strontium II [air, urban air close to ground]: 2.33889e-10 kg; lognormal variance with pedigree 0.6988, pedigree (2,5,2,1,4)
  (same comment as for Acetaldehyde)
- Sulfur dioxide [air, urban air close to ground]: 9.5115e-5 kg; lognormal variance with pedigree 0.0009, pedigree (1,2,2,1,1)
  Key emission provided by industry (EPIS) 2020. SO2 (reported as S)
- Sulfur oxides [air, unspecified]: 8.00017e-5 kg; lognormal variance with pedigree 0.0009, pedigree (1,2,2,1,1)
  Key emission provided by industry (EPIS) 2020. SOx (as SO2)
- Thallium I [air, urban air close to ground]: 1.94497e-12 kg; lognormal variance with pedigree 0.6988, pedigree (2,5,2,1,4)
  (same comment as for Acetaldehyde)
- Thorium [air, urban air close to ground]: 2.33889e-12 kg; lognormal variance with pedigree 0.6988, pedigree (2,5,2,1,4)
  (same comment as for Acetaldehyde)
- Thorium-228 [air, urban air close to ground]: 6.77047e-9 kBq; lognormal variance with pedigree 0.6988, pedigree (2,5,2,1,4)
  (same comment as for Acetaldehyde)
- Thorium-232 [air, urban air close to ground]: 4.30848e-9 kBq; lognormal variance with pedigree 0.6988, pedigree (2,5,2,1,4)
  (same comment as for Acetaldehyde)
- Tin ion [air, urban air close to ground]: 7.77988e-13 kg; lognormal variance with pedigree 0.6988, pedigree (2,5,2,1,4)
  (same comment as for Acetaldehyde)
- Titanium ion [air, urban air close to ground]: 4.66547e-10 kg; lognormal variance with pedigree 0.6988, pedigree (2,5,2,1,4)
  (same comment as for Acetaldehyde)
- Toluene [air, urban air close to ground]: 4.30507e-7 kg; lognormal variance with pedigree 0.1388, pedigree (2,5,2,1,4)
  (same comment as for Acetaldehyde)
- Uranium [air, urban air close to ground]: 3.11441e-12 kg; lognormal variance with pedigree 0.6988, pedigree (2,5,2,1,4)
  (same comment as for Acetaldehyde)
- Uranium-238 [air, urban air close to ground]: 1.23099e-8 kBq; lognormal variance with pedigree 0.6988, pedigree (2,5,2,1,4)
  (same comment as for Acetaldehyde)
- Vanadium V [air, urban air close to ground]: 1.47455e-7 kg; lognormal variance with pedigree 0.6988, pedigree (2,5,2,1,4)
  (same comment as for Acetaldehyde)
- Water [air, unspecified]: 0.000384829 m3; lognormal variance with pedigree 0.0428, pedigree (3,3,2,1,1)
  Calculated value. Represents evaporated water from the combustion process of wood. It is assumed that all hydrogen contained in the wood evaporates as water. The H content of wood is assumed to be 6 %.
- Xylenes, unspecified [air, urban air close to ground]: 1.23099e-10 kg; lognormal variance with pedigree 0.0888, pedigree (2,5,2,1,4)
  (same comment as for Acetaldehyde)
- Zinc II [air, urban air close to ground]: 3.70966e-7 kg; lognormal variance with pedigree 0.6988, pedigree (2,5,2,1,4)
  (same comment as for Acetaldehyde)
- m-Xylene [air, urban air close to ground]: 1.4195e-7 kg; lognormal variance with pedigree 0.1388, pedigree (2,5,2,1,4)
  (same comment as for Acetaldehyde)
- AOX, Adsorbable Organic Halides [water, surface water]: 4.12268e-5 kg; lognormal variance with pedigree 0.0403, pedigree (1,2,2,1,1)
  Data provided by industry (EPIS) 2020
- BOD5, Biological Oxygen Demand [water, surface water]: 0.000203059 kg; lognormal variance with pedigree 0.0403, pedigree (1,2,2,1,1)
  Data provided by industry (EPIS) 2020
- COD, Chemical Oxygen Demand [water, surface water]: 0.00568314 kg; lognormal variance with pedigree 0.0403, pedigree (1,2,2,1,1)
  Data provided by industry (EPIS) 2020
- DOC, Dissolved Organic Carbon [water, surface water]: 0.00203278 kg; lognormal variance with pedigree 0.0414, pedigree (2,3,2,1,1)
  Calculated as equal to TOC.
- Nitrogen [water, surface water]: 5.96752e-5 kg; lognormal variance with pedigree 0.0403, pedigree (1,2,2,1,1)
  Data provided by industry (EPIS) 2020
- Phosphorus [water, surface water]: 6.15671e-6 kg; lognormal variance with pedigree 0.0403, pedigree (1,2,2,1,1)
  Data provided by industry (EPIS) 2020
- Suspended solids, unspecified [water, surface water]: 0.000387647 kg; lognormal variance with pedigree 0.0403, pedigree (1,2,2,1,1)
  Data provided by industry (EPIS) 2020
- TOC, Total Organic Carbon [water, surface water]: 0.00203278 kg; lognormal variance with pedigree 0.0403, pedigree (1,2,2,1,1)
  Data provided by industry (EPIS) 2020
- Water [water, unspecified]: 0.035694 m3; lognormal variance with pedigree 0.0403, pedigree (1,2,2,1,1)
  Data provided by industry (EPIS) 2020. Reported as process water (27.56 m3/t) and cooling water (41.67 m3/t), plus the difference between water input and output (2.41 m3/t)

## Sampling procedure
Weighted average of about 16 mills providing 86% of the European capacity of bleached kraft pulp from softwood.

## Extrapolations
Industry data provided key emission factors for CO2 (biogenic), SOx (as SO2), NOx, TRS (as S), SO2 (reported as S), and Dust (unspecified). Additional air emissions resulting from on-site energy production, i.e. the combustion of fuels, were calculated based on industrial heating datasets from the ecoinvent database. The following ecoinvent combustion processes were used to estimate additional air emissions: Hard coal: heat production, at hard coal industrial furnace 1-10MW, Europe without Switzerland; Heavy fuel oil: heat production, heavy fuel oil, at industrial furnace 1MW, Europe without Switzerland; Light fuel oil: heat production, light fuel oil, at industrial furnace 1MW, Europe without Switzerland; Biofuel - Biogas: heat production, natural gas, at industrial furnace >100kW, Europe without Switzerland; Methanol: heat production, natural gas, at industrial furnace >100kW, Europe without Switzerland; Natural gas: heat production, natural gas, at industrial furnace >100kW, Europe without Switzerland; Biofuel - Bark (wet weight): heat production, wood chips from industry, at furnace 1000kW, CH; Biofuel - Biomass: heat production, wood chips from industry, at furnace 1000kW, CH; Biofuel - Biomass - wood residuals: heat production, wood chips from industry, at furnace 1000kW, CH; Biofuel - Bark: heat production, wood chips from industry, at furnace 1000kW, CH; Wood pellets: heat production, wood chips from industry, at furnace 1000kW, CH;. CO2, CO and CH4 emissions from biogas and methanol were modelled as non-fossil.
