# lath, softwood, raw, kiln drying to u=20%

Dataset: EcoSpold 2, unit process
Geography: CA-QC
Time period: 2011-01-01 to 2023-12-31
Technology level: current
Classification: ISIC rev.4 ecoinvent: 1610:Sawmilling and planing of wood
Tags: recontextualization
Scenario: Business-as-Usual
System model: Allocation, cut-off by classification
Generated by: Hugues Imbeault-Tétreault
Published in: Bauer, C. 2007
Database: ecoinvent
isCopyrightProtected: true
accessRestrictedTo: 1

## General comment
This dataset represents the service of kiln drying of one m3 sawn softwood beam. The wood chip used in the process is considered to be supplied internally which are generated from slabs and sidings when sawing. Characteristics of the of wood chips to be burned: Dry wood density 440 kg/m3; the low heating value 3007 MJ/m3, humidity when burned is estimated to be around 50%, which is achieved after some weeks of drying in the storage. Air emission factors as well as the boiler efficiency represent average annual operation including start and stop (warm-up and shut-down). The boiler used is considered to be 300 kW and emission profile refers to the facility. Shrinkage ratio of between the moisture content of u=30% - 0% is 0.004 %/%.
The data was provided by and approved by the Swiss forest industry (Holzindustrie Schweiz HIS).
Within ecoinvent, three products - boards, beams and laths - are distinguished:
After being sawn, the resulting products can either be air dried down to a moisture content of u=20% (mass of water per dry mass), kiln dried down to u=20% or kiln dried down to u=10%. The activity name indicates the respective product, drying technology and target moisture.
The exchanges of this child dataset are identical to the GLO dataset. This dataset was created to enable linking to regional markets (e.g. for electricity). Data quality indicators were adjusted accordingly.

## Included activities start
Kiln drying process starting from sawn softwood, at the sawmill site, assumed to lose some water before the start of the kiln drying process.

## Included activities end
This activity ends with kiln dried softwood beam, at sawmill. The dataset includes kiln drying of wet wood assumed as u=60% down to u=20%, shrinkage and emissions associated with wood chip incineration. The dataset does not include air emissions released from the wood, as these emissions are assumed to be similar to natural emissions from decomposition/rotting of wood

## Parameters
- emission of Fluorine: 6.66667e-8 kg/MJ; name Fluorine; = 0.00000005*scaling_factor
  updated emission profile based on personal communication, PSI, 2014
- emission of Formaldehyde: 1.73333e-7 kg/MJ; name Formaldehyde; = 0.00000013*scaling_factor
  updated emission profile based on personal communication, PSI, 2014
- emission of Hydrocarbons, aliphatic, alkanes, unspecified: 1.21333e-6 kg/MJ; name Hydrocarbons_aliphatic_alkanes; = 0.00000091*scaling_factor
  updated emission profile based on personal communication, PSI, 2014
- emission of Hydrocarbons, aliphatic, unsaturated: 4.13333e-6 kg/MJ; name Hydrocarbons_aliphatic; = 0.0000031*scaling_factor
  updated emission profile based on personal communication, PSI, 2014
- emission of Magnesium: 4.8e-7 kg/MJ; name Magnesium; = 0.00000036*scaling_factor
  updated emission profile based on personal communication, PSI, 2014
- emission of Manganese: 2.26667e-7 kg/MJ; name Manganese; = 0.00000017*scaling_factor
  updated emission profile based on personal communication, PSI, 2014
- emission of Mercury: 4e-10 kg/MJ; name Mercury; = 0.0000000003*scaling_factor
  updated emission profile based on personal communication, PSI, 2014
- emission of Methane, non-fossil: 5.33333e-7 kg/MJ; name Methane_nonfossil; = 0.0000004*scaling_factor
  updated emission profile based on personal communication, PSI, 2014
- emission of Nickel: 8e-9 kg/MJ; name Nickel; = 0.000000006*scaling_factor
  updated emission profile based on personal communication, PSI, 2014
- emission of Nitrogen oxides: 0.00024 kg/MJ; name no2; = 0.00018*scaling_factor
  updated emission profile based on personal communication, PSI, 2014
- emission of Particulates 2.5: 0.00012 kg/MJ; name Particulate2_5; = 90E-06*scaling_factor
  updated emission profile based on personal communication, PSI, 2014
- emission of Particulates >10: 6.66667e-6 kg/MJ; name Particulates_higher_10; = 5E-06 * scaling_factor
  updated emission profile based on personal communication, PSI, 2014
- emission of Particulates >2.5 to <10: 6.66667e-6 kg/MJ; name Particulates2_5_to_10; = 5E-06 * scaling_factor
  updated emission profile based on personal communication, PSI, 2014
- emission of Phenol, pentachloro-: 1.08e-11 kg/MJ; name Phenol_pentachloro; = 0.0000000000081*scaling_factor
  updated emission profile based on personal communication, PSI, 2014
- emission of Phosphorus: 4e-7 kg/MJ; name Phosphorus; = 0.0000003*scaling_factor
  updated emission profile based on personal communication, PSI, 2014
- emission of Potassium: 3.12e-5 kg/MJ; name Potassium; = 0.0000234*scaling_factor
  updated emission profile based on personal communication, PSI, 2014
- emission of acetaldehyde: 8.13333e-8 kg/MJ; name acet; = 0.000000061*scaling_factor
  updated emission profile based on personal communication, PSI, 2014
- emission of ammonia: 2.30667e-6 kg/MJ; name ammonia; = 0.00000173*scaling_factor
  updated emission profile based on personal communication, PSI, 2014
- emission of arsenic: 1.33333e-9 kg/MJ; name arsenic; = 0.000000001*scaling_factor
  updated emission profile based on personal communication, PSI, 2014
- emission of benzene: 1.21333e-6 kg/MJ; name benzene; = 0.00000091*scaling_factor
  updated emission profile based on personal communication, PSI, 2014
- emission of benzene, ethyl: 4e-8 kg/MJ; name ben_ethyl; = 0.00000003*scaling_factor
  updated emission profile based on personal communication, PSI, 2014
- emission of benzene, hexachloro: 9.6e-15 kg/MJ; name ben_hexa; = 0.0000000000000072*scaling_factor
  updated emission profile based on personal communication, PSI, 2014
- emission of benzo(a)pyrene: 6.66667e-10 kg/MJ; name benzo; = 0.0000000005*scaling_factor
  updated emission profile based on personal communication, PSI, 2014
- emission of bromine: 8e-8 kg/MJ; name bro; = 0.00000006*scaling_factor
  updated emission profile based on personal communication, PSI, 2014
- emission of cadmium: 9.33333e-10 kg/MJ; name cadmium; = 0.0000000007*scaling_factor
  updated emission profile based on personal communication, PSI, 2014
- emission of calcium: 7.8e-6 kg/MJ; name calcium; = 0.00000585*scaling_factor
  updated emission profile based on personal communication, PSI, 2014
- emission of carbon monoxide, non-fossil: 0.0004 kg/MJ; name co; = 0.0003*scaling_factor
  updated emission profile based on personal communication, PSI, 2014
- emission of chlorine: 2.4e-7 kg/MJ; name ch; = 0.00000018*scaling_factor
  updated emission profile based on personal communication, PSI, 2014
- emission of chromium: 5.28e-9 kg/MJ; name chromium; = 0.00000000396*scaling_factor
  updated emission profile based on personal communication, PSI, 2014
- emission of chromium 4: 5.33333e-11 kg/MJ; name chroIV; = 0.00000000004*scaling_factor
  updated emission profile based on personal communication, PSI, 2014
- emission of copper: 2.93333e-8 kg/MJ; name copper; = 0.000000022*scaling_factor
  updated emission profile based on personal communication, PSI, 2014
- emission of dinitrogen monoxide: 3.06667e-6 kg/MJ; name N2O; = 0.0000023*scaling_factor
  updated emission profile based on personal communication, PSI, 2014
- emission of dioxin measured as 2,3,7,8-tetrachlorodibenzo-p-dioxin: 4.13333e-14 kg/MJ; name tetrachloro; = 0.000000000000031*scaling_factor
  updated emission profile based on personal communication, PSI, 2014
- emission of lead: 3.33333e-8 kg/MJ; name lead; = 0.000000025*scaling_factor
  updated emission profile based on personal communication, PSI, 2014
- emission of m-Xylene: 1.6e-7 kg/MJ; name mXylene; = 0.00000012*scaling_factor
  updated emission profile based on personal communication, PSI, 2014
- emission of non-methane volatile organic compounds, unspecified origin: 1.4e-5 kg/MJ; name NMVOC; = 10.5E-06 * scaling_factor
  updated emission profile based on personal communication, PSI, 2014
- emission of polycyclic aromatic hydrocarbons: 1.48e-8 kg/MJ; name PAH; = 0.0000000111*scaling_factor
  updated emission profile based on personal communication, PSI, 2014
- emission of sodium: 1.73333e-6 kg/MJ; name sodium; = 0.0000013*scaling_factor
  updated emission profile based on personal communication, PSI, 2014
- emission of sulfur dioxide: 3.33333e-6 kg/MJ; name SO2; = 0.0000025*scaling_factor
  updated emission profile based on personal communication, PSI, 2014
- emission of toluene: 4e-7 kg/MJ; name toluene; = 0.0000003*scaling_factor
  updated emission profile based on personal communication, PSI, 2014
- emission of zinc: 4e-7 kg/MJ; name zinc; = 0.0000003*scaling_factor
  updated emission profile based on personal communication, PSI, 2014
- furnace, wood chip: 2.31481e-8 unit/MJ; name furnace_energy; = 1/(300*20*2000*3.6)
  inventory of furnace over MJ heating demand
- moisture content lath: 20 dimensionless; name moisture_lath
  moisture content of lath
- moisture content wood chip: 50 dimensionless; name moisture_woodchip
  moisture content of wood chip
- scaling factor: 1.33333 dimensionless; name scaling_factor; = 1/0.75; lognormal variance with pedigree 0.0016, pedigree (2,1,1,1,1)
  The scaling factor corresponds to the inverse of the average annual efficiency of the heating system, including start/stop (warm up and cool down). Therefore, this efficiency will be lower than figures provided by manufacturers. The estimated value was provided by T.Nussbaumer, Verenum, and represents the average installed boiler in this size category in Switzerland.
- shrinkage ratio (u=30% - 0%): 0.004 dimensionless; name shrinkage_ratio
  shrinkage ratio between u=30% to 0%
- total heat: 468 MJ; name heat_woodchip
  total thermal energy required for the drying process per m3 of output
- wood ash: 0.000634667 kg/MJ; name woodash; = 0.000476*scaling_factor
  generation of sawdusts per MJ
- wood density, basic: 404.8 kg/m3; name basic_wood_d; = dry_wood_d*(1-moisture_lath*shrinkage_ratio)
  kg oven-dry matter/wet volume
- wood density, dry: 440 kg/m3; name dry_wood_d
  kg oven-dry matter/oven-dry volume

## Reference product
- sawnwood, lath, softwood, raw, dried (u=20%): 1 m3; name lath_raw_kiln; By-product classification allocatable product; CPC 31101: Wood, sawn or chipped lengthwise, sliced or peeled, of a thickness exceeding 6 mm, of coniferous wood; HS2017 4407: Wood sawn or chipped lengthwise, sliced or peeled, whether or not planed, sanded or end-jointed, of a thickne[...]
  production volume 593204 m3; name p_sawnwood_dried; = 57510/1079420*1.1134E+07
    Annual production of sawn softwood (sawnwood C = coniferous from FAOStat for Switzerland), extrapolatedion to Quebec (Canada) production volume via the production volumes of sawnwood (C = coniferous) in Switzerland and Quebec according to FAOStat and Statistics Canada, respectively.
  property dry mass 404.8 kg; = basic_wood_d
  property heating value, net 5860.46 MJ
    LHV is calculated based on the Carbon content of the product. More details can be found on the respective documentation.The property is based on a value of 12.06MJ/kg
  property price 160 EUR2005
    Expert judgement (Urs Luginbühl, Swiss Sawmilling industry, personal communication in June 2014). Cross-reference; FAOSTAT (accessed 20140428). The price is calculated by using data on total world import quantity (m3) and import value (1000 USD), year 2005. 109432798 m3 of Sawnwood (C) - coniferous was imported in the world in 2005. The import value was 22249842000 USD. The calculated price is thus (22249842000/109432798=203*0.8=) 164 Euro.
  property water content 0.2; name water_content
  property water in wet mass 80.96 kg; name WWM_dried; = basic_wood_d* water_content
  property wet mass 485.76 kg; = basic_wood_d*(1+ water_content)
  properties: carbon allocation 199.971 kg, carbon content 0.494, carbon content, fossil 0, carbon content, non-fossil 0.494

## Inputs from technosphere
- electricity, medium voltage: 13.3 kWh; name elec_midvol; lognormal variance with pedigree 0.0106, pedigree (2,1,4,5,1)
  used to run the kiln; industry data
- furnace, wood chips, with silo, 300kW: 1.08333e-5 unit; name furnace; = furnace_energy* heat_woodchip; lognormal variance with pedigree 0.4406, pedigree (2,1,4,5,1)
  infrastructure for the production of heat from wood chips
- sawnwood, softwood, raw: 1.04167 m3; name sawnwood; = lath_raw_kiln/(1- (30-moisture_lath)*shrinkage_ratio); source Rudi Wagenführ 2000; lognormal variance with pedigree 0.0106, pedigree (2,1,4,5,1)
  Processed internally within the sawmill
  property water in wet mass 271.04 kg; name WWM_raw
  properties: carbon content, non-fossil 0.494, dry mass 387.2 kg, heating value, net 5130.57 MJ, water content 0.7, wet mass 658.24 kg
- technical wood drying facility: 3.66e-6 unit; name wooddrying; lognormal variance with pedigree 0.4406, pedigree (2,1,4,5,1)
  infrastructure, data from ecoinvent 2.2
- wood ash mixture, pure: -0.297024 kg; name wood_ash; = woodash* heat_woodchip; lognormal variance with pedigree 0.0032, pedigree (2,1,1,5,1)
  calculated from the amount of wood ash per MJ heat produced times the amount of heat needed for drying; according to updated emission profiles by PSI and heat requirements from industry.
  production volume; = wood_ash*p_sawnwood_dried/lath_raw_kiln
    Calculated from production volume of reference product using the relative outputs.
  properties: carbon content, non-fossil 0.012, dry mass 1 kg, wet mass 1 kg
- wood chips, wet, measured as dry mass: 33.5124 kg; name woodchip_soft; = heat_woodchip/woodchip_soft_Net_Heat_Value/(1+moisture_woodchip/100)* scaling_factor; lognormal variance with pedigree 0.0106, pedigree (2,1,4,5,1)
  used as a fuel to produce heat for the drying process
  property carbon content, fossil 0; name woodchip_soft_C_content_fossil
  property carbon content, non-fossil 0.494; name woodchip_soft_C_content_non_fossil
  property dry mass 1 kg; name woodchip_soft_DM
  property heating value, gross 20.4 MJ; name woodchip_soft_Gross_Heat_Value
  property heating value, net 12.4133 MJ; name woodchip_soft_Net_Heat_Value; = woodchip_soft_Gross_Heat_Value - 1.32 - 20* woodchip_soft_water_content/(1+ woodchip_soft_water_content)
  property water content 0.5; name woodchip_soft_water_content; = moisture_woodchip/100
  property water in wet mass 0.5 kg; name woodchip_soft_WWM; = woodchip_soft_DM*woodchip_soft_water_content
  property wet mass 1.5 kg; name woodchip_soft_WM; = woodchip_soft_DM + woodchip_soft_WWM
  note on heating value, gross: gross (upper) heating (calorific) value according to ecoinvent guidelines 2.2
  note on heating value, net: Value based on the dataset 'softwood forestry, mixed species, sustainable forest management'

## Emissions to nature
- Acetaldehyde [air, urban air close to ground]: 3.8064e-5 kg; = acet* heat_woodchip; lognormal variance with pedigree 0.0112, pedigree (2,1,4,5,1)
  calculated from the emission profile per MJ heat produced times the amount of heat needed for drying; according to updated emission profiles by PSI and heat requirements from industry.
- Ammonia [air, urban air close to ground]: 0.00107952 kg; = ammonia* heat_woodchip; lognormal variance with pedigree 0.0112, pedigree (2,1,4,5,1)
  (same comment as for Acetaldehyde)
- Arsenic ion [air, urban air close to ground]: 6.24e-7 kg; = arsenic* heat_woodchip; lognormal variance with pedigree 0.0112, pedigree (2,1,4,5,1)
  (same comment as for Acetaldehyde)
- Benzene [air, urban air close to ground]: 0.00056784 kg; = benzene* heat_woodchip; lognormal variance with pedigree 0.0112, pedigree (2,1,4,5,1)
  (same comment as for Acetaldehyde)
- Benzo(a)pyrene [air, urban air close to ground]: 3.12e-7 kg; = benzo* heat_woodchip; lognormal variance with pedigree 0.0112, pedigree (2,1,4,5,1)
  (same comment as for Acetaldehyde)
- Bromine [air, urban air close to ground]: 3.744e-5 kg; = bro* heat_woodchip; lognormal variance with pedigree 0.0112, pedigree (2,1,4,5,1)
  (same comment as for Acetaldehyde)
- Cadmium II [air, urban air close to ground]: 4.368e-7 kg; = cadmium* heat_woodchip; lognormal variance with pedigree 0.0112, pedigree (2,1,4,5,1)
  (same comment as for Acetaldehyde)
- Calcium II [air, urban air close to ground]: 0.0036504 kg; = calcium* heat_woodchip; lognormal variance with pedigree 0.0112, pedigree (2,1,4,5,1)
  (same comment as for Acetaldehyde)
- Carbon dioxide, non-fossil [air, urban air close to ground]: 60.702 kg; = woodchip_soft*0.494/12*44; lognormal variance with pedigree 0.0112, pedigree (2,1,4,5,1)
  calculated from parameters based on wood input oven-dry x carbon content x molar relationship of CO2/C
- Carbon monoxide, non-fossil [air, urban air close to ground]: 0.1872 kg; = co* heat_woodchip; lognormal variance with pedigree 0.0112, pedigree (2,1,4,5,1)
  (same comment as for Acetaldehyde)
- Chlorine [air, urban air close to ground]: 0.00011232 kg; = ch* heat_woodchip; lognormal variance with pedigree 0.0112, pedigree (2,1,4,5,1)
  (same comment as for Acetaldehyde)
- Chromium III [air, urban air close to ground]: 2.47104e-6 kg; = chromium* heat_woodchip; lognormal variance with pedigree 0.0112, pedigree (2,1,4,5,1)
  (same comment as for Acetaldehyde)
- Chromium VI [air, urban air close to ground]: 2.496e-8 kg; = chroIV* heat_woodchip; lognormal variance with pedigree 0.0112, pedigree (2,1,4,5,1)
  (same comment as for Acetaldehyde)
- Copper ion [air, urban air close to ground]: 1.3728e-5 kg; = copper* heat_woodchip; lognormal variance with pedigree 0.0112, pedigree (2,1,4,5,1)
  (same comment as for Acetaldehyde)
- Dinitrogen monoxide [air, urban air close to ground]: 0.0014352 kg; = N2O* heat_woodchip; lognormal variance with pedigree 0.0112, pedigree (2,1,4,5,1)
  (same comment as for Acetaldehyde)
- Dioxins, measured as 2,3,7,8-tetrachlorodibenzo-p-dioxin [air, urban air close to ground]: 1.9344e-11 kg; = tetrachloro* heat_woodchip; lognormal variance with pedigree 0.0112, pedigree (2,1,4,5,1)
  (same comment as for Acetaldehyde)
- Ethyl benzene [air, urban air close to ground]: 1.872e-5 kg; = ben_ethyl* heat_woodchip; lognormal variance with pedigree 0.0112, pedigree (2,1,4,5,1)
  (same comment as for Acetaldehyde)
- Fluorine [air, urban air close to ground]: 3.12e-5 kg; = Fluorine* heat_woodchip; lognormal variance with pedigree 0.0112, pedigree (2,1,4,5,1)
  (same comment as for Acetaldehyde)
- Formaldehyde [air, urban air close to ground]: 8.112e-5 kg; = Formaldehyde* heat_woodchip; lognormal variance with pedigree 0.0112, pedigree (2,1,4,5,1)
  (same comment as for Acetaldehyde)
- Hexachlorobenzene [air, urban air close to ground]: 4.4928e-12 kg; = ben_hexa* heat_woodchip; lognormal variance with pedigree 0.0112, pedigree (2,1,4,5,1)
  (same comment as for Acetaldehyde)
- Hydrocarbons, aliphatic, alkanes, unspecified [air, urban air close to ground]: 0.00056784 kg; = Hydrocarbons_aliphatic_alkanes* heat_woodchip; lognormal variance with pedigree 0.0112, pedigree (2,1,4,5,1)
  (same comment as for Acetaldehyde)
- Hydrocarbons, aliphatic, unsaturated [air, urban air close to ground]: 0.0019344 kg; = Hydrocarbons_aliphatic* heat_woodchip; lognormal variance with pedigree 0.0112, pedigree (2,1,4,5,1)
  (same comment as for Acetaldehyde)
- Lead II [air, urban air close to ground]: 1.56e-5 kg; = lead* heat_woodchip; lognormal variance with pedigree 0.0112, pedigree (2,1,4,5,1)
  (same comment as for Acetaldehyde)
- Magnesium [air, urban air close to ground]: 0.00022464 kg; = magnesium* heat_woodchip; lognormal variance with pedigree 0.0112, pedigree (2,1,4,5,1)
  (same comment as for Acetaldehyde)
- Manganese II [air, urban air close to ground]: 0.00010608 kg; = manganese* heat_woodchip; lognormal variance with pedigree 0.0112, pedigree (2,1,4,5,1)
  (same comment as for Acetaldehyde)
- Mercury II [air, urban air close to ground]: 1.872e-7 kg; = mercury* heat_woodchip; lognormal variance with pedigree 0.0112, pedigree (2,1,4,5,1)
  (same comment as for Acetaldehyde)
- Methane, non-fossil [air, urban air close to ground]: 0.0002496 kg; = Methane_nonfossil* heat_woodchip; lognormal variance with pedigree 0.0112, pedigree (2,1,4,5,1)
  (same comment as for Acetaldehyde)
- NMVOC, non-methane volatile organic compounds [air, urban air close to ground]: 0.006552 kg; = nmvoc* heat_woodchip; lognormal variance with pedigree 0.0112, pedigree (2,1,4,5,1)
  (same comment as for Acetaldehyde)
- Nickel II [air, urban air close to ground]: 3.744e-6 kg; = nickel* heat_woodchip; lognormal variance with pedigree 0.0112, pedigree (2,1,4,5,1)
  (same comment as for Acetaldehyde)
- Nitrogen oxides [air, urban air close to ground]: 0.11232 kg; = no2* heat_woodchip; lognormal variance with pedigree 0.0112, pedigree (2,1,4,5,1)
  (same comment as for Acetaldehyde)
- PAH, polycyclic aromatic hydrocarbons [air, urban air close to ground]: 6.9264e-6 kg; = pah* heat_woodchip; lognormal variance with pedigree 0.0112, pedigree (2,1,4,5,1)
  (same comment as for Acetaldehyde)
- Particulate Matter, < 2.5 um [air, urban air close to ground]: 0.05616 kg; = Particulate2_5* heat_woodchip; lognormal variance with pedigree 0.0112, pedigree (2,1,4,5,1)
  (same comment as for Acetaldehyde)
- Particulate Matter, > 2.5 um and < 10um [air, unspecified]: 0.00312 kg; = Particulates2_5_to_10*heat_woodchip; lognormal variance with pedigree 0.0166, pedigree (2,1,4,5,1)
  (same comment as for Acetaldehyde)
- Pentachlorophenol [air, urban air close to ground]: 5.0544e-9 kg; = Phenol_pentachloro* heat_woodchip; lognormal variance with pedigree 0.0112, pedigree (2,1,4,5,1)
  (same comment as for Acetaldehyde)
- Phosphorus [air, urban air close to ground]: 0.0001872 kg; = Phosphorus* heat_woodchip; lognormal variance with pedigree 0.0112, pedigree (2,1,4,5,1)
  (same comment as for Acetaldehyde)
- Potassium I [air, urban air close to ground]: 0.0146016 kg; = Potassium* heat_woodchip; lognormal variance with pedigree 0.0112, pedigree (2,1,4,5,1)
  (same comment as for Acetaldehyde)
- Sodium I [air, urban air close to ground]: 0.0008112 kg; = sodium* heat_woodchip; lognormal variance with pedigree 0.0112, pedigree (2,1,4,5,1)
  (same comment as for Acetaldehyde)
- Sulfur dioxide [air, urban air close to ground]: 0.00156 kg; = so2* heat_woodchip; lognormal variance with pedigree 0.0112, pedigree (2,1,4,5,1)
  (same comment as for Acetaldehyde)
- Toluene [air, urban air close to ground]: 0.0001872 kg; = toluene* heat_woodchip; lognormal variance with pedigree 0.0112, pedigree (2,1,4,5,1)
  (same comment as for Acetaldehyde)
- Water [air, unspecified]: 0.201373 m3; = (sawnwood*WWM_raw-lath_raw_kiln*WWM_dried)/1000; lognormal variance with pedigree 0.0086, pedigree (1,1,4,1,1)
  difference in water contained in the sawnwood before and after drying, converted from kg to m3
- Zinc II [air, urban air close to ground]: 0.0001872 kg; = zinc* heat_woodchip; lognormal variance with pedigree 0.0112, pedigree (2,1,4,5,1)
  (same comment as for Acetaldehyde)
- m-Xylene [air, urban air close to ground]: 7.488e-5 kg; = mxylene* heat_woodchip; lognormal variance with pedigree 0.0112, pedigree (2,1,4,5,1)
  (same comment as for Acetaldehyde)

## Sampling procedure
complementary literature and sampling from sawmills

## Extrapolations
Extrapolated from CH data. The exchanges of this child dataset are identical to the GLO dataset. This dataset was created to enable linking to regional markets (e.g. for electricity). Data quality indicators were adjusted accordingly.
