# kerosene, import from Europe

Dataset: EcoSpold 2, unit process
Geography: CH
Time period: 2010-01-01 to 2023-12-31
Technology level: current
Classification: ISIC rev.4 ecoinvent: 1920:Manufacture of refined petroleum products
Scenario: Business-as-Usual
System model: Allocation, cut-off by classification
Generated by: [System]
Database: ecoinvent
isCopyrightProtected: false
accessRestrictedTo: 1

## General comment
This dataset represents the import of a refined petroleum product from Europe (without Switzerland) into Switzerland..

## Included activities start
This activity starts with the supply of the finished petroleum product from petroleum refinery operation in Europe without Switzerland.

## Included activities end
This activity covers the transport requirements for import of the finished petroleum product to Switzerland.

## Reference product
- kerosene: 1 kg; By-product classification allocatable product; CPC 3334: Kerosenes; HS2017 270900: Oils; petroleum oils and oils obtained from bituminous minerals, crude; CAS 8008-20-6
  production volume 1.144e9 kg
    From International Energy Agency: http://www.iea.org/stats/oildata.asp?COUNTRY_CODE=CH
  property price 0.297 EUR2005
    Temporary price data. Calculated as 90% of purchasers price based on: Source: U.S. energy information administration_Independent statistics and analysis: Average daily data of Amsterdam-Rotterdam-Antwerp (ARA) Kerosene-Type Jet Fuel Spot Price FOB (Cents per Gallon) (http://tonto.eia.doe.gov/dnav/pet/pet_pri_spt_s1_d.htm; accessed 2010-07-06). Conversion factors: 0.0038 m3/US gallon; 803 kg/m3.
  properties: carbon allocation 0.85 kg, carbon content 0.85, carbon content, fossil 0.85, carbon content, non-fossil 0, dry mass 1 kg, heating value, net 43 MJ, water content 0, water in wet mass 0 kg, wet mass 1 kg

## Inputs from technosphere
- kerosene: 1 kg
  A direct link is set to petroleum refinery operation in Europe without Switzerland for consistency with modelling found in v2.2.
  properties: carbon content, fossil 0.85, dry mass 1 kg, heating value, net 43 MJ, wet mass 1 kg
- transport, freight train: 0.224 metric ton*km; source Jungbluth, N. 2007; lognormal variance with pedigree 0.16, pedigree (1,1,5,1,1)
  Amount based on transport requirements (in year 2000) stated for import from Europe to Switzerland from ecoinvent Report No. 6 (Jungbluth 2007), table 10.16.
- transport, freight, inland waterways, barge tanker: 0.396 metric ton*km; source Jungbluth, N. 2007; lognormal variance with pedigree 0.16, pedigree (1,1,5,1,1)
  (same comment as for transport, freight train)
- transport, freight, lorry, unspecified: 0.1 metric ton*km; source Jungbluth, N. 2007; lognormal variance with pedigree 0.16, pedigree (1,1,5,1,1)
  (same comment as for transport, freight train)
- transport, pipeline, onshore, petroleum: 0.08 metric ton*km; source Jungbluth, N. 2007; lognormal variance with pedigree 0.16, pedigree (1,1,5,1,1)
  (same comment as for transport, freight train)
