# heat production, lignite briquette, at stove 5-15kW

Dataset: EcoSpold 2, unit process
Geography: RoW
Time period: 1988-01-01 to 2023-12-31
Technology level: current
Classification: EcoSpold01Categories: lignite/heating systems
Classification: ISIC rev.4 ecoinvent: 3530:Steam and air conditioning supply
Tags: ConvertedDataset
Scenario: Business-as-Usual
System model: Allocation, cut-off by classification
Generated by: Christian Bauer
Published in: Röder, A. 2004
Database: ecoinvent
isCopyrightProtected: true
accessRestrictedTo: 1

## General comment
The stove is assumed to fire lignite briquettes. The heating value (19.5 MJ/kg) and the composition of the briquettes are average values available from the literature. The emission data are also taken from literature reporting measurements performed at the end of the 1980s in Germany. Size distribution of particles has been estimated on the basis of recent information from EPA. Emissions of trace elements were calculated using the ash content in the coal and average transfer coefficients for coal power plants with ash retention of 98 %, as first approximation.
[This dataset was already contained in the ecoinvent database version 2. It was not individually updated during the transfer to ecoinvent version 3. Life Cycle Impact Assessment results may still have changed, as they are affected by changes in the supply chain, i.e. in other datasets. This dataset was generated following the ecoinvent quality guidelines for version 2. It may have been subject to central changes described in the ecoinvent version 3 change report (http://www.ecoinvent.org/database/ecoinvent-version-3/reports-of-changes/), and the results of the central updates were reviewed extensively. The changes added e.g. consistent water flows and other information throughout the database. The documentation of this dataset can be found in the ecoinvent reports of version 2, which are still available via the ecoinvent website. The change report linked above covers all central changes that were made during the conversion process.]

## Included activities end
House heating. The module describes the combustion process and includes coal transport and ash disposal.

## Geography
German conditions.

## Technology
Average used in early 1990s.

## Reference product
- heat, central or small-scale, other than natural gas: 1 MJ; By-product classification allocatable product; CPC 17300: Steam and hot water
  EcoSpold01Location=RER
  production volume 2.2574e12 MJ; name heat_apv
    Assumption. This production volume does not represent a realistic value, but reflects the share of heat from coal sources on the market for heat, central or small-scale, other than natural gas.
    See talk pages for further discussion.
    A relation of 1:100 between the geographies RER and RoW was assumed.
    //Original comment //:
    IEA coal and Peat statistics for 2007 (http://www.iea.org/stats/coaldata.asp?COUNTRY_CODE=29), residential, commercial and agriculture. All brown coal briquettes and lignite in kg converted to MJ heat out by multiplying with 0.67 (conversion efficiency on a gross heating value basis) and dividing by 0.10545 (kg/MJ gross heating value)
  property price 0.0106 EUR2005
    Average European district heat price from Ecoheatcool and Euroheat 2005-2006, Ecoheat Work package 1: The European heat market. Final report. 10.6 EUR/GJ i s the price of district heat. http://www.solarthermalworld.org/files/Ecoheatcool%20WP1%20Web.pdf?download
  properties: Corresponding fuel use 1.42857 MJ, carbon allocation 0 kg, carbon content 0, heating value, net 1 MJ

## Inputs from technosphere
- coal stove, 5-15kW: 8.27143e-7 unit; lognormal variance with pedigree 0.3532, pedigree (2,3,5,5,1)
  Infrastructure
  EcoSpold01Location=RER
  Uncertainty: infrastructure
- lignite ash: -1.0398e-6, -0.00342753 kg (2 suppliers, which the file names only by identifier); sum of these -0.00342857 kg; lognormal variance with pedigree 0.0722, pedigree (5,1,2,5,1)
  EcoSpold01Location=DE
  Assumption: no reuse
  Uncertainty: assumption: no reuse
  production volume; = heat_apv*lignite_ash
    Calculated from the production volume of lignite briquette, burned in stove 5-15kW in proportion to the respective output amounts.
  properties: dry mass 1 kg, heating value, net 21.7 MJ, wet mass 1 kg
  note on heating value, net: Based on literature, page 52, Report 5: Dones, R., Bauer, C., Bolliger, R., Burger, B., faist Emmenegger, M., Frischknecht, R., Heck, T., Jungbluth, N., Röder, A., Tuchschmid, M. (2007) Life Cycle Inventories of Energy Systems: Resulst for current Systems in Switzerland and other UCTE Countries. ecoinvent report No. 5. Paul Scherrer Institut Villigen, Swiss Centre for Life Cycle Inventories, Dübendorf, CH
- lignite briquettes: 1.42857 MJ; lognormal variance with pedigree 0.0601, pedigree (4,2,5,5,1)
  Fuel input
  EcoSpold01Location=DE
  Uncertainty: fuel input
  properties: carbon content, fossil 0.65679, dry mass 0.0415385 kg, heating value, net 19.5 MJ, water content 0.234568, wet mass 0.0512821 kg
  note on carbon content, fossil: 53.2% C and 19% water in wet mass (ecoinvent v2.1 report 6_VI Table 7.1)

## Emissions to nature
- Acetylene [air, urban air close to ground]: 7.14286e-6 kg; lognormal variance with pedigree 0.0932, pedigree (2,3,5,5,1)
  Total NMVOC and profile estimate
  Uncertainty: total NMVOC and profile estimate
- Aluminium III [air, urban air close to ground]: 1.7e-5 kg; lognormal variance with pedigree 0.728, pedigree (4,5,5,5,1)
  From trace element balance; see report for details
  Uncertainty: from trace element balance; see report for details
- Antimony ion [air, urban air close to ground]: 3.61429e-8 kg; lognormal variance with pedigree 0.728, pedigree (4,5,5,5,1)
  (same comment as for Aluminium III)
- Arsenic ion [air, urban air close to ground]: 7.21429e-8 kg; lognormal variance with pedigree 0.728, pedigree (4,5,5,5,1)
  (same comment as for Aluminium III)
- Barium II [air, urban air close to ground]: 3.61429e-7 kg; lognormal variance with pedigree 0.728, pedigree (4,5,5,5,1)
  (same comment as for Aluminium III)
- Benzene [air, urban air close to ground]: 7.14286e-6 kg; lognormal variance with pedigree 0.0932, pedigree (2,3,5,5,1)
  Total NMVOC and profile estimate
  Uncertainty: total NMVOC and profile estimate
- Benzo(a)pyrene [air, urban air close to ground]: 2.85714e-8 kg; lognormal variance with pedigree 0.0932, pedigree (2,3,5,5,1)
  Total NMVOC and profile estimate
  Uncertainty: total NMVOC and profile estimate
- Beryllium II [air, urban air close to ground]: 3.61429e-9 kg; lognormal variance with pedigree 0.728, pedigree (4,5,5,5,1)
  (same comment as for Aluminium III)
- Boron [air, urban air close to ground]: 1.62857e-5 kg; lognormal variance with pedigree 0.728, pedigree (4,5,5,5,1)
  (same comment as for Aluminium III)
- Bromine [air, urban air close to ground]: 2.17143e-8 kg; lognormal variance with pedigree 0.728, pedigree (4,5,5,5,1)
  (same comment as for Aluminium III)
- Cadmium II [air, urban air close to ground]: 1.10143e-8 kg; lognormal variance with pedigree 0.728, pedigree (4,5,5,5,1)
  (same comment as for Aluminium III)
- Calcium II [air, urban air close to ground]: 7.21429e-5 kg; lognormal variance with pedigree 0.728, pedigree (4,5,5,5,1)
  (same comment as for Aluminium III)
- Carbon dioxide, fossil [air, urban air close to ground]: 0.130714 kg; lognormal variance with pedigree 0.0427, pedigree (2,2,5,5,1)
  From carbon balance
  Uncertainty: from carbon balance
- Carbon monoxide, fossil [air, urban air close to ground]: 0.00571429 kg; lognormal variance with pedigree 0.6932, pedigree (2,3,5,5,1)
  Typical value
  Uncertainty: typical value
- Chromium III [air, urban air close to ground]: 1.00143e-7 kg; lognormal variance with pedigree 0.728, pedigree (4,5,5,5,1)
  (same comment as for Aluminium III)
- Chromium VI [air, urban air close to ground]: 1.01143e-9 kg; lognormal variance with pedigree 0.522, pedigree (1,1,5,5,1)
  based on range of data
- Cobalt II [air, urban air close to ground]: 5.41429e-8 kg; lognormal variance with pedigree 0.728, pedigree (4,5,5,5,1)
  (same comment as for Aluminium III)
- Copper ion [air, urban air close to ground]: 3.78571e-8 kg; lognormal variance with pedigree 0.728, pedigree (4,5,5,5,1)
  (same comment as for Aluminium III)
- Dinitrogen monoxide [air, urban air close to ground]: 7.14286e-7 kg; lognormal variance with pedigree 0.0932, pedigree (2,3,5,5,1)
  Typical value
  Uncertainty: typical value
- Dioxins, measured as 2,3,7,8-tetrachlorodibenzo-p-dioxin [air, urban air close to ground]: 2.85714e-15 kg; lognormal variance with pedigree 0.3532, pedigree (2,3,5,5,1)
- Ethane [air, urban air close to ground]: 2.14286e-5 kg; lognormal variance with pedigree 0.0932, pedigree (2,3,5,5,1)
  Total NMVOC and profile estimate
  Uncertainty: total NMVOC and profile estimate
- Ethylene [air, urban air close to ground]: 4.28571e-5 kg; lognormal variance with pedigree 0.0932, pedigree (2,3,5,5,1)
  Total NMVOC and profile estimate
  Uncertainty: total NMVOC and profile estimate
- Formaldehyde [air, urban air close to ground]: 1.42857e-7 kg; lognormal variance with pedigree 0.0932, pedigree (2,3,5,5,1)
  Total NMVOC and profile estimate
  Uncertainty: total NMVOC and profile estimate
- Hydrocarbons, aliphatic, alkanes, unspecified [air, urban air close to ground]: 7.14286e-6 kg; lognormal variance with pedigree 0.0932, pedigree (2,3,5,5,1)
  Total NMVOC and profile estimate
  Uncertainty: total NMVOC and profile estimate
- Hydrocarbons, aliphatic, unsaturated [air, urban air close to ground]: 7.14286e-6 kg; lognormal variance with pedigree 0.0932, pedigree (2,3,5,5,1)
  Total NMVOC and profile estimate
  Uncertainty: total NMVOC and profile estimate
- Hydrochloric acid [air, urban air close to ground]: 4.72857e-6 kg; lognormal variance with pedigree 0.118, pedigree (4,5,5,5,1)
  (same comment as for Aluminium III)
- Hydrogen fluoride [air, urban air close to ground]: 1.77143e-7 kg; lognormal variance with pedigree 0.118, pedigree (4,5,5,5,1)
  (same comment as for Aluminium III)
- Hydrogen sulfide [air, urban air close to ground]: 1.42857e-7 kg; lognormal variance with pedigree 0.0932, pedigree (2,3,5,5,1)
  Typical value
  Uncertainty: typical value
- Iodine [air, urban air close to ground]: 6.5e-8 kg; lognormal variance with pedigree 0.728, pedigree (4,5,5,5,1)
  (same comment as for Aluminium III)
- Iron ion [air, urban air close to ground]: 1.94286e-5 kg; lognormal variance with pedigree 0.728, pedigree (4,5,5,5,1)
  (same comment as for Aluminium III)
- Lead II [air, urban air close to ground]: 5.41429e-8 kg; lognormal variance with pedigree 0.728, pedigree (4,5,5,5,1)
  (same comment as for Aluminium III)
- Lead-210 [air, urban air close to ground]: 8.85714e-5 kBq; lognormal variance with pedigree 0.728, pedigree (4,5,5,5,1)
  From radioactivity of the elements; see report for details
  Uncertainty: from radioactivity of the elements; see report for details
- Magnesium [air, urban air close to ground]: 1.08286e-5 kg; lognormal variance with pedigree 0.728, pedigree (4,5,5,5,1)
  (same comment as for Aluminium III)
- Manganese II [air, urban air close to ground]: 3.61429e-8 kg; lognormal variance with pedigree 0.728, pedigree (4,5,5,5,1)
  (same comment as for Aluminium III)
- Mercury II [air, urban air close to ground]: 1.62857e-8 kg; lognormal variance with pedigree 0.728, pedigree (4,5,5,5,1)
  (same comment as for Aluminium III)
- Methane, fossil [air, urban air close to ground]: 0.000428571 kg; lognormal variance with pedigree 0.0932, pedigree (2,3,5,5,1)
  Typical value
  Uncertainty: typical value
- Molybdenum VI [air, urban air close to ground]: 6.31429e-8 kg; lognormal variance with pedigree 0.728, pedigree (4,5,5,5,1)
  (same comment as for Aluminium III)
- NMVOC, non-methane volatile organic compounds [air, urban air close to ground]: 2.48571e-5 kg; lognormal variance with pedigree 0.0932, pedigree (2,3,5,5,1)
  Total NMVOC and profile estimate
  Uncertainty: total NMVOC and profile estimate
- Nickel II [air, urban air close to ground]: 8.12857e-8 kg; lognormal variance with pedigree 0.728, pedigree (4,5,5,5,1)
  (same comment as for Aluminium III)
- Nitrogen oxides [air, urban air close to ground]: 0.000142857 kg; lognormal variance with pedigree 0.0932, pedigree (2,3,5,5,1)
  Typical value
  Uncertainty: typical value
- Particulate Matter, < 2.5 um [air, urban air close to ground]: 2.85714e-5 kg; lognormal variance with pedigree 0.378, pedigree (4,5,5,5,1)
  Total PM and profile estimates
  Uncertainty: total PM and profile estimates
- Particulate Matter, > 10 um [air, urban air close to ground]: 0.0002 kg; lognormal variance with pedigree 0.118, pedigree (4,5,5,5,1)
  Total PM and profile estimates
  Uncertainty: total PM and profile estimates
- Particulate Matter, > 2.5 um and < 10um [air, urban air close to ground]: 5.71429e-5 kg; lognormal variance with pedigree 0.198, pedigree (4,5,5,5,1)
  Total PM and profile estimates
  Uncertainty: total PM and profile estimates
- Phenol [air, urban air close to ground]: 7.14286e-7 kg; lognormal variance with pedigree 0.0932, pedigree (2,3,5,5,1)
  Total NMVOC and profile estimate
  Uncertainty: total NMVOC and profile estimate
- Phosphorus [air, urban air close to ground]: 1.44286e-7 kg; lognormal variance with pedigree 0.728, pedigree (4,5,5,5,1)
  (same comment as for Aluminium III)
- Polonium-210 [air, urban air close to ground]: 0.000162857 kBq; lognormal variance with pedigree 0.728, pedigree (4,5,5,5,1)
  (same comment as for Lead-210)
- Potassium I [air, urban air close to ground]: 2.17143e-6 kg; lognormal variance with pedigree 0.728, pedigree (4,5,5,5,1)
  (same comment as for Aluminium III)
- Potassium-40 [air, urban air close to ground]: 2.38571e-5 kBq; lognormal variance with pedigree 0.728, pedigree (4,5,5,5,1)
  (same comment as for Lead-210)
- Propane [air, urban air close to ground]: 1.42857e-5 kg; lognormal variance with pedigree 0.0932, pedigree (2,3,5,5,1)
  Total NMVOC and profile estimate
  Uncertainty: total NMVOC and profile estimate
- Propylene [air, urban air close to ground]: 7.14286e-6 kg; lognormal variance with pedigree 0.0932, pedigree (2,3,5,5,1)
  Total NMVOC and profile estimate
  Uncertainty: total NMVOC and profile estimate
- Radium-226 [air, urban air close to ground]: 2.28571e-5 kBq; lognormal variance with pedigree 0.728, pedigree (4,5,5,5,1)
  (same comment as for Lead-210)
- Radium-228 [air, urban air close to ground]: 1.22857e-5 kBq; lognormal variance with pedigree 0.728, pedigree (4,5,5,5,1)
  (same comment as for Lead-210)
- Radon-220 [air, urban air close to ground]: 5.71429e-6 kBq; lognormal variance with pedigree 0.728, pedigree (4,5,5,5,1)
  (same comment as for Lead-210)
- Radon-222 [air, urban air close to ground]: 5.71429e-6 kBq; lognormal variance with pedigree 0.728, pedigree (4,5,5,5,1)
  (same comment as for Lead-210)
- Scandium [air, urban air close to ground]: 9.02857e-10 kg; lognormal variance with pedigree 0.728, pedigree (4,5,5,5,1)
  (same comment as for Aluminium III)
- Selenium IV [air, urban air close to ground]: 1.08286e-7 kg; lognormal variance with pedigree 0.728, pedigree (4,5,5,5,1)
  (same comment as for Aluminium III)
- Silicon [air, urban air close to ground]: 0.000172857 kg; lognormal variance with pedigree 0.728, pedigree (4,5,5,5,1)
  (same comment as for Aluminium III)
- Sodium I [air, urban air close to ground]: 3.24286e-6 kg; lognormal variance with pedigree 0.728, pedigree (4,5,5,5,1)
  (same comment as for Aluminium III)
- Strontium II [air, urban air close to ground]: 3.78571e-7 kg; lognormal variance with pedigree 0.728, pedigree (4,5,5,5,1)
  (same comment as for Aluminium III)
- Sulfur dioxide [air, urban air close to ground]: 0.000142857 kg; lognormal variance with pedigree 0.078, pedigree (4,5,5,5,1)
  From S-balance
  Uncertainty: from S-balance
- Thallium I [air, urban air close to ground]: 1.8e-10 kg; lognormal variance with pedigree 0.728, pedigree (4,5,5,5,1)
  (same comment as for Aluminium III)
- Thorium [air, urban air close to ground]: 4.32857e-9 kg; lognormal variance with pedigree 0.728, pedigree (4,5,5,5,1)
  (same comment as for Aluminium III)
- Thorium-228 [air, urban air close to ground]: 1.05714e-5 kBq; lognormal variance with pedigree 0.728, pedigree (4,5,5,5,1)
  (same comment as for Lead-210)
- Thorium-232 [air, urban air close to ground]: 6.57143e-6 kBq; lognormal variance with pedigree 0.728, pedigree (4,5,5,5,1)
  (same comment as for Lead-210)
- Tin ion [air, urban air close to ground]: 2.88571e-9 kg; lognormal variance with pedigree 0.728, pedigree (4,5,5,5,1)
  (same comment as for Aluminium III)
- Titanium ion [air, urban air close to ground]: 3.61429e-7 kg; lognormal variance with pedigree 0.728, pedigree (4,5,5,5,1)
  (same comment as for Aluminium III)
- Toluene [air, urban air close to ground]: 1.42857e-6 kg; lognormal variance with pedigree 0.0932, pedigree (2,3,5,5,1)
  Total NMVOC and profile estimate
  Uncertainty: total NMVOC and profile estimate
- Uranium [air, urban air close to ground]: 7.21429e-9 kg; lognormal variance with pedigree 0.728, pedigree (4,5,5,5,1)
  (same comment as for Aluminium III)
- Uranium-238 [air, urban air close to ground]: 1.91429e-5 kBq; lognormal variance with pedigree 0.728, pedigree (4,5,5,5,1)
  (same comment as for Lead-210)
- Vanadium V [air, urban air close to ground]: 1.9e-7 kg; lognormal variance with pedigree 0.728, pedigree (4,5,5,5,1)
  (same comment as for Aluminium III)
- Xylenes, unspecified [air, urban air close to ground]: 4.71429e-6 kg; lognormal variance with pedigree 0.0932, pedigree (2,3,5,5,1)
  Total NMVOC and profile estimate
  Uncertainty: total NMVOC and profile estimate
- Zinc II [air, urban air close to ground]: 1.44286e-8 kg; lognormal variance with pedigree 0.728, pedigree (4,5,5,5,1)
  (same comment as for Aluminium III)

## Sampling procedure
literature

## Extrapolations
see Geography/Text This dataset has been copied from an original dataset covering the geography RER. The uncertainty has been adjusted accordingly.

## Review by Hans-Jörg Althaus 2005-07-19
passed
