# seed-cotton production, organic

Dataset: EcoSpold 2, unit process
Geography: IN-OR
Time period: 2015-01-01 to 2023-12-31
Technology level: current
Classification: ISIC rev.4 ecoinvent: 0116:Growing of fibre crops
Scenario: Business-as-Usual
System model: Allocation, cut-off by classification
Generated by: Archana Datta
Published in: Faist Emmenegger, M. 2018
Database: ecoinvent
isCopyrightProtected: true
accessRestrictedTo: 1

## General comment
This inventory dataset exclusively covers the field activity for the production of 1kg seed-cotton in India in 2016-17.
The farm has a yield of 1430 kg seeds per ha for this crop cycle. Organic fertilizer applied amounts to 5000 kg/ha of manure from cattle dung and 2500 kg/ha of compost. Harvesting is done manually.
The production of seed cotton involved inputs of land tillage (ridge tillage), irrigation, seeds, compost.
Cotton requires 6 to 8 months to mature. Its time of sowing and harvesting differs in different parts of the country depending upon the climatic conditions. In Punjab and Haryana it is sown in April-May and is harvested in December-January that is before the winter frost can damage the crop. In the peninsular part of India, it is sown upto October and harvested between January and May because there is no danger of winter frost in these areas.
The seed cotton activity culminates in the harvesting of seed cotton from the field. Since picking of cotton is not yet mechanized, and mostly done manually. Normally the picking season is spread over a period of about three months. Cotton plants demand water during the active growth phase and dry weather is need at the maturity as the cotton boll opens.The activity for this dataset ends here right after the harvesting operation. The harvested seed cotton then goes to the ginning process where cotton fibre (lint) and cotton seeds get separated.
This dataset is from a farm that practices organic farming, certified by EPIDA.

## Included activities start
The activity starts after the harvest of the previous crop and receipt of the inputs of seeds, compost, and irrigation water at the field. Machinery and fixed overhead are excluded.The crop is not irrigated.

## Included activities end
The activity ends at the harvesting of seed-cotton in the field.

## Geography
The data has been collected from state of Orissa in India

## Time period
The data were collected for 2015-2016 cropping season. The same cultivation practice has been practised over the last couple of decades with increased mechanization in tillage and irrigation. In the near future, the scope of changes in the current cultivation paradigm is low.

## Parameters
- LUC_crop_specific: 1 dimensionless
  This parameter allows to switch between a "crop specific" and a "country specific" approach when calculating the LUC of a crop. By default, the chosen approach is "crop specific", so the value of the parameter is 1. If you want to apply a "country specific" approach, turn the parameter to 0.

## Reference product
- seed-cotton, organic: 1 kg; By-product classification allocatable product; CPC 01921: Cotton, whether or not ginned; HS2017 120721: Oil seeds; cotton seeds, seed, whether or not broken
  production volume 2.48328e8 kg; = 75251*1000*3.3
    Source: The value in the source represents cotton fibre and was multiplied by 3.3 scaling factor to represent seed-cotton. http://textileexchange.org/wp-content/uploads/2017/02/TE-Organic-Cotton-Market-Report-Oct2016.pdf
  property carbon content, fossil 0
    Carbon content fossil is considered zero in all agricultural products and by-products.
  property carbon content, non-fossil 0.475
    Biogenic carbon content of vegetation on a dry mass basis (47.5% DM) derived from FAOSTAT.
    Reference: http://www.fao.org/forestry/17111/en
  property price 0.411019 EUR2005
    Literature value. Price from FAOSTAT data Producer Prices - Annual (retrieved from: http://www.fao.org/faostat/en/#data/PP, accessed 15Feb2018). Data from 2005.
  properties: carbon allocation 0.438425 kg, carbon content 0.475, dry mass 0.923 kg, water content 0.0834236, water in wet mass 0.077 kg, wet mass 1 kg

## Inputs from technosphere
- compost: 1.74825 kg; lognormal variance with pedigree 0.0046, pedigree (1,4,3,1,1)
  The data was collected for a hectare area through interview
  property cadmium content 3.6e-7; name Cd_content
  property chromium content 2.23e-5; name Cr_content
  property copper content 5.77e-5; name Cu_content
  property dry mass 0.5 kg; name DM
  property lead content 4.9e-5; name Pb_content
  property mercury content 1.2e-7; name Hg_content
  property nickel content 1.63e-5; name Ni_content
  property nitrogen content 0.014; name N_content
  property phosphorus content 0.0035; name P_content
  property potassium content 0.01; name K_content
  property zinc content 0.000184; name Zn_content
  properties: carbon content, non-fossil 0.183645, water content 1, wet mass 1 kg
- cottonseed, organic, for sowing: 0.00132867 kg; lognormal variance with pedigree 0.0126, pedigree (4,4,3,1,1)
  The data was collected for a hectare area through interview
  properties: carbon content, non-fossil 0.475, dry mass 0.98 kg, water content 0.0204082, wet mass 1 kg
  note on carbon content, non-fossil: Biogenic carbon content of vegetation on a dry mass basis (47.5% DM) derived from FAOSTAT. Reference: http://www.fao.org/forestry/17111/en
- land use change, annual crop: 0.000225286 ha; = (0.322158786797502/1430) * LUC_crop_specific + (0.0769954146475059/1430) * (1-LUC_crop_specific); lognormal variance with pedigree 0.0046, pedigree (1,4,3,1,1)
  The data was collected for a hectare area through interview
- manure, solid, cattle: 3.4965 kg; lognormal variance with pedigree 0.0046, pedigree (1,4,3,1,1)
  The data was collected for a hectare area through interview
  properties: carbon content, non-fossil 0.441, dry mass 0.22 kg, water content 3.5454, wet mass 1 kg

## Inputs from nature
- Carbon dioxide, in air [natural resource, in air]: 1.50049 kg; lognormal variance with pedigree 0.0046, pedigree (1,4,3,1,1)
  Calculated Value. This value has been calculated by using the Ecoinvent LCI calculation tool for crop production.
- Energy, gross calorific value, in biomass [natural resource, biotic]: 17.3446 MJ; lognormal variance with pedigree 0.0046, pedigree (1,4,3,1,1)
  (same comment as for Carbon dioxide, in air)
- Occupation, annual crop, non-irrigated [natural resource, land]: 6.99301 m2*year; lognormal variance with pedigree 0.006, pedigree (1,4,3,1,1)
  (same comment as for Carbon dioxide, in air)
- Transformation, from annual crop, non-irrigated [natural resource, land]: 6.99301 m2; lognormal variance with pedigree 0.012, pedigree (1,4,3,1,1)
  (same comment as for Carbon dioxide, in air)
- Transformation, to annual crop, non-irrigated [natural resource, land]: 6.99301 m2; lognormal variance with pedigree 0.012, pedigree (1,4,3,1,1)
  (same comment as for Carbon dioxide, in air)

## Emissions to nature
- Ammonia [air, non-urban air or from high stacks]: 0.00455673 kg; lognormal variance with pedigree 0.012, pedigree (1,4,3,1,1)
  (same comment as for Carbon dioxide, in air)
- Dinitrogen monoxide [air, non-urban air or from high stacks]: 0.00100898 kg; lognormal variance with pedigree 0.034, pedigree (1,4,3,1,1)
  (same comment as for Carbon dioxide, in air)
- Nitrogen oxides [air, non-urban air or from high stacks]: 0.00184413 kg; lognormal variance with pedigree 0.044, pedigree (1,4,3,1,1)
  (same comment as for Carbon dioxide, in air)
- Cadmium II [soil, agricultural]: -2.5273e-7 kg
  (same comment as for Carbon dioxide, in air)
- Chromium III [soil, agricultural]: -5.75874e-5 kg
  (same comment as for Carbon dioxide, in air)
- Copper ion [soil, agricultural]: -1.55169e-5 kg
  (same comment as for Carbon dioxide, in air)
- Lead II [soil, agricultural]: -1.0916e-5 kg
  (same comment as for Carbon dioxide, in air)
- Mercury II [soil, agricultural]: -1.16024e-7 kg
  (same comment as for Carbon dioxide, in air)
- Nickel II [soil, agricultural]: -4.18011e-5 kg
  (same comment as for Carbon dioxide, in air)
- Zinc II [soil, agricultural]: -3.27713e-5 kg
  (same comment as for Carbon dioxide, in air)
- Cadmium II [water, ground-]: 1.36881e-8 kg; lognormal variance with pedigree 0.094, pedigree (1,4,3,1,1)
  (same comment as for Carbon dioxide, in air)
- Cadmium II [water, surface water]: 2.69924e-7 kg; lognormal variance with pedigree 0.094, pedigree (1,4,3,1,1)
  (same comment as for Carbon dioxide, in air)
- Chromium III [water, ground-]: 1.3109e-5 kg; lognormal variance with pedigree 0.094, pedigree (1,4,3,1,1)
  (same comment as for Carbon dioxide, in air)
- Chromium III [water, surface water]: 6.12219e-5 kg; lognormal variance with pedigree 0.094, pedigree (1,4,3,1,1)
  (same comment as for Carbon dioxide, in air)
- Copper ion [water, ground-]: 2.43645e-6 kg; lognormal variance with pedigree 0.094, pedigree (1,4,3,1,1)
  (same comment as for Carbon dioxide, in air)
- Copper ion [water, surface water]: 5.58866e-5 kg; lognormal variance with pedigree 0.132, pedigree (1,4,5,1,1)
  (same comment as for Carbon dioxide, in air)
- Lead II [water, ground-]: 3.21447e-7 kg; lognormal variance with pedigree 0.094, pedigree (1,4,3,1,1)
  (same comment as for Carbon dioxide, in air)
- Lead II [water, surface water]: 4.29191e-5 kg; lognormal variance with pedigree 0.094, pedigree (1,4,3,1,1)
  (same comment as for Carbon dioxide, in air)
- Mercury II [water, ground-]: 6.82349e-10 kg; lognormal variance with pedigree 0.094, pedigree (1,4,3,1,1)
  (same comment as for Carbon dioxide, in air)
- Mercury II [water, surface water]: 1.57414e-7 kg; lognormal variance with pedigree 0.094, pedigree (1,4,3,1,1)
  (same comment as for Carbon dioxide, in air)
- Nickel II [water, surface water]: 5.20851e-5 kg; lognormal variance with pedigree 0.094, pedigree (1,4,3,1,1)
  (same comment as for Carbon dioxide, in air)
- Nitrate [water, ground-]: 0.176132 kg; lognormal variance with pedigree 0.044, pedigree (1,4,3,1,1)
  (same comment as for Carbon dioxide, in air)
- Phosphate [water, ground-]: 0.000150093 kg; lognormal variance with pedigree 0.044, pedigree (1,4,3,1,1)
  (same comment as for Carbon dioxide, in air)
- Phosphate [water, surface water]: 0.000400561 kg; lognormal variance with pedigree 0.044, pedigree (1,4,3,1,1)
  (same comment as for Carbon dioxide, in air)
- Phosphorus [water, surface water]: 0.00590282 kg; lognormal variance with pedigree 0.044, pedigree (1,4,3,1,1)
  (same comment as for Carbon dioxide, in air)
- Zinc II [water, ground-]: 1.65563e-5 kg; lognormal variance with pedigree 0.094, pedigree (1,4,3,1,1)
  (same comment as for Carbon dioxide, in air)
- Zinc II [water, surface water]: 0.000102233 kg; lognormal variance with pedigree 0.094, pedigree (1,4,3,1,1)
  (same comment as for Carbon dioxide, in air)

## Sampling procedure
Primary data from farmers and supplemented with literature data. Standardized questionnaires were developed and adapted to cotton-specific cultivation and post-harvest situation. The secondary data from literature and the primary data from surveys were compared and matched to obtain the highest data quality

## Extrapolations
The data on inputs to the field activites are collected directly from the farmers and farming experts. However, the emission data were not readily available for India. Hence, Ecoinvent LCI calculation tool for crop production was used to calculate field emissions from the cultivation process.
