# miscanthus production

Dataset: EcoSpold 2, unit process
Geography: RoW
Time period: 2005-01-01 to 2023-12-31
Technology level: current
Classification: ISIC rev.4 ecoinvent: 0129:Growing of other perennial crops
Scenario: Business-as-Usual
System model: Allocation, cut-off by classification
Generated by: Julian Schnetzer
Published in: Hölscher T. 2007
Database: ecoinvent
isCopyrightProtected: true
accessRestrictedTo: 1

## General comment
This dataset represents the production of 1 kg of miscanthus (dry matter) on a plantation with a lifetime of 20 years. The moisture content at storage is 13% (= 15% water on a dry mass basis). Miscanthus is harvested annually from the second year on. Dry matter yield at first harvest is 6'000 kg/ha, from second harvest onwards 17'000 kg/ha.
This dataset has been copied from an original dataset covering the geography DE.

## Included activities start
This activity assumes miscanthus production on a plantation with a lifetime of 20 years and represents the average operation expenditures of the production of 1 kg of miscanthus averaged across the whole lifetime including establishment, operation and clearing of the plantation. The inputs of seed, mineral fertilisers and pesticides are considered. It is assumed that no organic fertilisers are applied.

## Included activities end
The dataset includes all machine operations and corresponding machine infrastructure and sheds. Machine operations are: soil cultivation, planting, fertilisation, weed control, pest and pathogen control, harvest and chopping of miscanthus and transport from field to farm (2 km) and clearing of the plantation by rotary tiller including growing of oil radish (not harvested) for shading the field and inhibiting regrowth of miscanthus. Further, direct field emissions are included. This activity ends after mulching of the oil radish and with provision of chopped miscanthus at the farm gate.

## Technology
conventional production

## Reference product
- miscanthus, chopped: 1 kg; name REF_PRODUCT; By-product classification allocatable product; CPC 01990: Other raw vegetable materials, n.e.c.; HS2017 121300: Cereal straw and husks; unprepared, whether or not chopped, ground, pressed or in the form of pellets
  This exchange refers to the variety Miscanthus giganteus, which is mainly grown as a biofuel.
  production volume 4.84375e8 kg; = 31200000*(1/0.060515)
    Calculated production volume (PV) based on knowledge of the regional production volumes. The PV of the global activity has been extrapolated using the nominal GDP of 2005 (source: United Nations, http://data.un.org/Glossary.aspx?q=GDP+%28current+US%24%29, accessed 20130726 and 20130312).
  property carbon content, non-fossil 0.48; name REF_PRODUCT_C_content_non_fossil
    biogene carbon content on a dry matter basis; obtained from BIOBIB - A Database for biofuels. http://www.vt.tuwien.ac.at/biobib/biobib.html.
  property dry mass 1 kg; name REF_PRODUCT_DM
  property energy content 19.2123 MJ; name REF_PRODUCT_energy_content
    as gross calorific value (when relevant). Average of all entries for "miscanthus" > gross calorific value in BIOBIB - A Database for biofuels (http://www.vt.tuwien.ac.at/biobib/biobib.html).
  property price 0.175 EUR2005
    Price for rhizome lays between 0,15 and 0.20 EUR/rhizome. Information based on prices at producer in Germany (Fachagentur Nachwachsende Rohstoffe) http://www.bio-energie.de/heizen-mit-holz/miscanthus/
  property water content 0.149425; name REF_PRODUCT_water_content; = REF_PRODUCT_WWM/ REF_PRODUCT_DM
  property water in wet mass 0.149425 kg; name REF_PRODUCT_WWM; = REF_PRODUCT_WM- REF_PRODUCT_DM
  property wet mass 1.14943 kg; name REF_PRODUCT_WM; = REF_PRODUCT_DM/0.87
  properties: carbon allocation 0.48 kg, carbon content 0.48

## Inputs from technosphere
- application of plant protection product, by field sprayer: 6.4103e-6 ha; source Hölscher T. 2007; lognormal variance with pedigree 0.0413, pedigree (2,2,5,1,1)
  Application of glyphosate before planting and at clearing of plantation.
- beet seed, Swiss integrated production, for sowing: 6.4103e-5 kg; source Hölscher T. 2007; lognormal variance with pedigree 0.0412, pedigree (2,1,5,1,1)
  Approximation for oil radish seed which is sown after the clearing of the plantation in order to prevent the regrowth of miscanthus through shading by oil radish leaves.
  properties: carbon content, non-fossil 0.464601, dry mass 0.85 kg, water content 0.176471, wet mass 1 kg
  note on carbon content, non-fossil: Wheat values are used to model sugar beet seeds. Composition data obtained from Wheat, soft red winter, in (http://www.nal.usda.gov/fnic/foodcomp/search/). First, composition data were refered to 1 kg dry mass. Then, C-contents were calculated considering a C-content/dry mass of 46% in carbohydrates (including fibres), 53% in proteins and 75% in fats. All data from "Evolutionary and Biochemical Aspects", A.D. Kay and T. Vrede (in Global Ecology, 2010, Elsevier B.V., S.E. Jørgensen Ed.).
- combine harvesting: 6.0897e-5 ha; source Hölscher T. 2007; lognormal variance with pedigree 0.0412, pedigree (2,1,5,1,1)
  Approximation for the harvest of miscanthus above ground biomass. One pass per year from second to last year.
- fertilising, by broadcaster: 5.4487e-5 ha; source Hölscher T. 2007; lognormal variance with pedigree 0.0412, pedigree (2,1,5,1,1)
  One application per year from third to 19th year.
- fodder loading, by self-loading trailer: 0.010673 m3; source Hölscher T. 2007; lognormal variance with pedigree 0.0412, pedigree (2,1,5,1,1)
  Approximation for the loading and transport to the farm of chopped miscanthus.
- glyphosate: 1.1538e-5 kg; source Hölscher T. 2007; lognormal variance with pedigree 0.0413, pedigree (2,2,5,1,1)
  Application before planting and at clearing of plantation.
  properties: carbon content, fossil 0.214286, dry mass 1 kg, wet mass 1 kg
- hoeing: 9.6154e-6 ha; source Hölscher T. 2007; lognormal variance with pedigree 0.0412, pedigree (2,1,5,1,1)
  Two passes in the year of establishment, one pass in the second year.
- inorganic nitrogen fertiliser, as N: 9.09412e-8, 2.49749e-6, 1.66952e-6, 4.43848e-7, 2.134e-5, 2.53142e-6, 1.65052e-6, 3.21688e-7, 2.71833e-5, 1.39127e-6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 kg (63 suppliers, which the file names only by identifier); sum of these 0.0027244 kg; source Hölscher T. 2007; lognormal variance with pedigree 0.0412, pedigree (2,1,5,1,1)
  50 kg N/(ha*a) from the third to the 19th year.
  properties: dry mass 1 kg, wet mass 1 kg
- magnesium oxide: 0.0012986 kg; source Hölscher T. 2007; lognormal variance with pedigree 0.0412, pedigree (2,1,5,1,1)
  24 kg of magnesium oxide ha and year from the third to 19th year.
  properties: dry mass 1 kg, wet mass 1 kg
- miscanthus rhizome, for planting: 0.032051 unit; name SEED; source Hölscher T. 2007; lognormal variance with pedigree 0.0413, pedigree (2,2,5,1,1)
  10000 pcs/ha.
  property carbon content, non-fossil 0.46; name SEED_C_content_non_fossil
  property dry mass 0.01827 kg; name SEED_DM; = SEED_WM*0.261
  property water content 2.83142; name SEED_water_content; = SEED_WWM/ SEED_DM
  property water in wet mass 0.05173 kg; name SEED_WWM; = SEED_WM- SEED_DM
  property wet mass 0.07 kg; name SEED_WM
- mulching: 6.4103e-6 ha; source Hölscher T. 2007; lognormal variance with pedigree 0.0412, pedigree (2,1,5,1,1)
  One pass before establishment and one at clearing of the plantation.
- packaging, for fertilisers: 0.0256454 kg; lognormal variance with pedigree 0.0912, pedigree (4,3,5,5,4)
  Total amount of active substance/s of fertilisers needed for the production of 'miscanthus, chopped' is calculated to be circa 1.28E-02 kg. Fertiliser/s used in this dataset is/are: 'magnesium oxide', 'nitrogen fertiliser, as N', 'phosphate rock, as P2O5, beneficiated, dry', 'potassium sulfate, as K2O'. The total amount of active substance/s is doubled in order to account for the packaging of the dilluted product of fertiliser/s that is/are applied. Therefore, 2.56E-02 kg of packaging for fertilisers is justified with this exchange.
  properties: carbon content, fossil 0.825301, dry mass 1 kg, heating value, net 25.01 MJ, price 0.0642 EUR2005, wet mass 1 kg
  note on carbon content, fossil: Considering a chemical formula (C2H4)n for polyethylene, carbon content-fossil is calculated to be 0.856286 kg of Carbon per kg of dry mass.
- packaging, for pesticides: 2.3076e-5 kg; lognormal variance with pedigree 0.0912, pedigree (4,3,5,5,4)
  Total amount of active substance/s of pesticides needed for the production of miscanthus, chopped is calculated to be circa 1.15E-05 kg. Pesticide/s used in this dataset is/are: 'glyphosate'. The total amount of active substance/s is doubled in order to account for the packaging of the dilluted product of pesticide/s that is/are applied. Therefore, 2.31E-05 kg of packaging for pesticides is justified with this exchange.
  properties: carbon content, fossil 0.85714, dry mass 1 kg, heating value, net 25.97 MJ, price 0.0642 EUR2005, wet mass 1 kg
- phosphate rock, beneficiated: 9.35865e-5, 9.35865e-5, 0.00704939 kg (3 suppliers, which the file names only by identifier); sum of these 0.00723656 kg; source Hölscher T. 2007; lognormal variance with pedigree 0.0412, pedigree (2,1,5,1,1)
  The exchange has been updated from 'phosphate rock, as P2O5, beneficiated, dry' into 'phosphate rock, beneficiated' and therefore its amount has been scaled (multiplied) from 0.0023 kg by 3.125 kg of 'phosphate rock, beneficiated' per kg of 'phosphate rock, as P2O5, beneficiated, dry'. Original comment of the exchange is: 42.5 kg P2O5/(ha*a) from the third to 19th year.
  properties: dry mass 1 kg, wet mass 1 kg
- potassium sulfate: 0.0119952 kg; source Hölscher T. 2007; lognormal variance with pedigree 0.0412, pedigree (2,1,5,1,1)
  The exchange has been updated from 'potassium sulfate, as K2O' into 'potassium sulfate' and therefore its amount has been scaled (multiplied) from 0.0065 kg by 1.85 kg of 'potassium sulfate' per kg of 'potassium sulfate, as K2O'. Original comment of the exchange is: 119 kg K2O/(ha*a) from the third to 19th year.
  properties: dry mass 1 kg, wet mass 1 kg
- potato planting: 3.2051e-6 ha; source Hölscher T. 2007; lognormal variance with pedigree 0.0412, pedigree (2,1,5,1,1)
  Approximation for planting of miscanthus rhizome pieces. 10000 pcs/ha.
- sowing: 3.2051e-6 ha; source Hölscher T. 2007; lognormal variance with pedigree 0.0412, pedigree (2,1,5,1,1)
  Sowing of oil radish for shading (against regrowth of miscanthus) after clearing of the plantation.
- tillage, cultivating, chiselling: 6.4103e-6 ha; source Hölscher T. 2007; lognormal variance with pedigree 0.0412, pedigree (2,1,5,1,1)
  Two passes at clearing of plantation.
- tillage, currying, by weeder: 3.2051e-6 ha; source Hölscher T. 2007; lognormal variance with pedigree 0.0412, pedigree (2,1,5,1,1)
  One pass in the year of establishment.
- tillage, harrowing, by rotary harrow: 3.2051e-6 ha; source Hölscher T. 2007; lognormal variance with pedigree 0.0412, pedigree (2,1,5,1,1)
  One pass in combination with sowing of oilr adish at clearing of the plantation.
- tillage, harrowing, by spring tine harrow: 6.4103e-6 ha; source Hölscher T. 2007; lognormal variance with pedigree 0.0412, pedigree (2,1,5,1,1)
  Two passes in the year of establishment.
- tillage, ploughing: 3.2051e-6 ha; source Hölscher T. 2007; lognormal variance with pedigree 0.0412, pedigree (2,1,5,1,1)
  One pass in the year of establishment.
- tillage, rolling: 3.2051e-6 ha; source Hölscher T. 2007; lognormal variance with pedigree 0.0412, pedigree (2,1,5,1,1)
  One pass in the year of establishment.
- tillage, rotary cultivator: 3.2051e-6 ha; source Hölscher T. 2007; lognormal variance with pedigree 0.0412, pedigree (2,1,5,1,1)
  One pass at clearing of plantation.
- transport, tractor and trailer, agricultural: 4.46903e-6, 1.81732e-8 metric ton*km (2 suppliers, which the file names only by identifier); sum of these 4.4872e-6 metric ton*km; source Hölscher T. 2007; lognormal variance with pedigree 0.1684, pedigree (4,1,5,1,1)
  Transport of miscanthus rhizomes to field for planting. Distance: 2 km.

## Inputs from nature
- Carbon dioxide, in air [natural resource, in air]: 1.75901 kg; = 44/12 * (REF_PRODUCT_C_content_non_fossil * REF_PRODUCT * REF_PRODUCT_DM - SEED_C_content_non_fossil * SEED * SEED_DM); lognormal variance with pedigree 0.0818, pedigree (2,2,5,1,1)
  Modelled, see chapter 'Release of fossil CO2 after urea applications' in "01_crop production_assessment methods of direct field emissions_v1.0.pdf" - pdf-document on the dedicated talk page of ecoinvent (www.ecoinvent.org/documentation)
- Energy, gross calorific value, in biomass [natural resource, biotic]: 19.212 MJ; lognormal variance with pedigree 0.0819, pedigree (2,3,5,3,4)
  Average of all entries for "miscanthus" > gross calorific value in BIOBIB - A Database for biofuels (http://www.vt.tuwien.ac.at/biobib/biobib.html).
- Occupation, permanent crop, non-irrigated, intensive [natural resource, land]: 0.64656 m2*year; lognormal variance with pedigree 0.0429, pedigree (2,1,5,1,1)
  Modelled, see chapter 'Land use' in "01_crop production_direct field emissions and natural resources_v1.0.pdf" - pdf-document on the dedicated talk page of ecoinvent (www.ecoinvent.org/documentation)
- Transformation, from arable land, unspecified use [natural resource, land]: 0.033654 m2; lognormal variance with pedigree 0.0489, pedigree (2,1,5,1,1)
  (same comment as for Occupation, permanent crop, non-irrigated, intensive)
- Transformation, to permanent crop, non-irrigated, intensive [natural resource, land]: 0.033654 m2; lognormal variance with pedigree 0.0489, pedigree (2,1,5,1,1)
  (same comment as for Occupation, permanent crop, non-irrigated, intensive)

## Emissions to nature
- Ammonia [air, non-urban air or from high stacks]: 3.8971e-6 kg; lognormal variance with pedigree 0.049, pedigree (2,2,5,1,1)
  Modelled with the 'AGRAMMON model' described in "01_crop production_direct field emissions and natural resources_v1.0.pdf" - pdf-document on the dedicated talk page of ecoinvent (www.ecoinvent.org/documentation)
- Dinitrogen monoxide [air, non-urban air or from high stacks]: 4.7399e-6 kg; lognormal variance with pedigree 0.0818, pedigree (2,2,5,1,1)
  Modelled, see chapter 'Emissions of N2O to the air' in "01_crop production_direct field emissions and natural resources_v1.0.pdf" - pdf-document on the dedicated talk page of ecoinvent (www.ecoinvent.org/documentation)
- Nitrogen oxides [air, non-urban air or from high stacks]: 1.6519e-6 kg; lognormal variance with pedigree 0.0818, pedigree (2,2,5,1,1)
  Modelled, see chapter 'Emissions of NOx to the air' in "01_crop production_direct field emissions and natural resources_v1.0.pdf" - pdf-document on the dedicated talk page of ecoinvent (www.ecoinvent.org/documentation)
- Cadmium II [soil, agricultural]: 5.8419e-8 kg; lognormal variance with pedigree 0.0818, pedigree (2,2,5,1,1)
  Modelled, see chapter 'Emissions of heavy metals to agricultural soil, surface water and ground water' in "01_crop production_direct field emissions and natural resources_v1.0.pdf" - pdf-document on the dedicated talk page of ecoinvent (www.ecoinvent.org/documentation)
- Chromium III [soil, agricultural]: -5.2562e-8 kg
  (same comment as for Cadmium II)
- Copper ion [soil, agricultural]: -1.6025e-6 kg
  (same comment as for Cadmium II)
- Glyphosate [soil, agricultural]: 1.1538e-5 kg; lognormal variance with pedigree 0.049, pedigree (2,2,5,1,1)
  Modelled, see chapter 'Emissions of pesticides to agricultural soil' in "01_crop production_direct field emissions and natural resources_v1.0.pdf" - pdf-document on the dedicated talk page of ecoinvent (www.ecoinvent.org/documentation)
- Lead II [soil, agricultural]: 7.0326e-9 kg; lognormal variance with pedigree 0.0818, pedigree (2,2,5,1,1)
  (same comment as for Cadmium II)
- Mercury II [soil, agricultural]: 5.5528e-12 kg; lognormal variance with pedigree 0.0818, pedigree (2,2,5,1,1)
  (same comment as for Cadmium II)
- Nickel II [soil, agricultural]: -1.0578e-6 kg
  (same comment as for Cadmium II)
- Zinc II [soil, agricultural]: -3.9254e-5 kg
  (same comment as for Cadmium II)
- Cadmium II [water, ground-]: 2.0658e-9 kg; lognormal variance with pedigree 0.1271, pedigree (2,2,5,1,1)
  (same comment as for Cadmium II)
- Cadmium II [water, surface water]: 2.0568e-9 kg; lognormal variance with pedigree 0.1271, pedigree (2,2,5,1,1)
  (same comment as for Cadmium II)
- Chromium III [water, ground-]: 1.04e-6 kg; lognormal variance with pedigree 0.1271, pedigree (2,2,5,1,1)
  (same comment as for Cadmium II)
- Chromium III [water, surface water]: 2.4524e-7 kg; lognormal variance with pedigree 0.1271, pedigree (2,2,5,1,1)
  (same comment as for Cadmium II)
- Copper ion [water, ground-]: 1.4423e-7 kg; lognormal variance with pedigree 0.1271, pedigree (2,2,5,1,1)
  (same comment as for Cadmium II)
- Copper ion [water, surface water]: 1.6703e-7 kg; lognormal variance with pedigree 0.1271, pedigree (2,2,5,1,1)
  (same comment as for Cadmium II)
- Lead II [water, ground-]: 3.4244e-9 kg; lognormal variance with pedigree 0.1271, pedigree (2,2,5,1,1)
  (same comment as for Cadmium II)
- Lead II [water, surface water]: 2.3085e-8 kg; lognormal variance with pedigree 0.1271, pedigree (2,2,5,1,1)
  (same comment as for Cadmium II)
- Mercury II [water, ground-]: 2.4134e-12 kg; lognormal variance with pedigree 0.1271, pedigree (2,2,5,1,1)
  (same comment as for Cadmium II)
- Mercury II [water, surface water]: 3.234e-12 kg; lognormal variance with pedigree 0.1271, pedigree (2,2,5,1,1)
  (same comment as for Cadmium II)
- Nickel II [water, surface water]: 1.1773e-7 kg; lognormal variance with pedigree 0.1271, pedigree (2,2,5,1,1)
  (same comment as for Cadmium II)
- Nitrate [water, ground-]: 0.00081582 kg; lognormal variance with pedigree 0.0818, pedigree (2,2,5,1,1)
  Modelled with the 'SALCA-NO3 model' described in "01_crop production_direct field emissions and natural resources_v1.0.pdf" - pdf-document on the dedicated talk page of ecoinvent (www.ecoinvent.org/documentation)
- Phosphate [water, ground-]: 1.387e-5 kg; lognormal variance with pedigree 0.0818, pedigree (2,2,5,1,1)
  Modelled, see chapter 'Emissions of phosphorous to the water' in "01_crop production_direct field emissions and natural resources_v1.0.pdf" - pdf-document on the dedicated talk page of ecoinvent (www.ecoinvent.org/documentation)
- Phosphate [water, surface water]: 5.397e-5 kg; lognormal variance with pedigree 0.0818, pedigree (2,2,5,1,1)
  (same comment as for Phosphate)
- Phosphorus [water, surface water]: 1.2741e-5 kg; lognormal variance with pedigree 0.0818, pedigree (2,2,5,1,1)
  (same comment as for Phosphate)
- Zinc II [water, ground-]: 7.0345e-7 kg; lognormal variance with pedigree 0.1271, pedigree (2,2,5,1,1)
  (same comment as for Cadmium II)
- Zinc II [water, surface water]: 2.1932e-7 kg; lognormal variance with pedigree 0.1271, pedigree (2,2,5,1,1)
  (same comment as for Cadmium II)

## Sampling procedure
The inventories were generated on the basis of data from the 'GruBE' project (Hölscher et al. 2007) and complemented with information from expert estimates, extension service documents and literature. The sources used in the project were KTBL (2006) and personal communications from producers. --- Sources: Hölscher T., Deinmling S., Freiermuth Knuchel R., Gaillard G., Kägi T. & Müller-Sämann K. (2007) Energieoptionen aus landwirtschaftlicher Biomasse am Oberrhein - Auswirkungen für Landwirtschaft und Umwelt - Endbericht zum Projekt. Agentur für Nachhaltige Nutzung von Agrarlandschaften (ANNA). Müllheim, Germany. --- KTBL (2006) Energiepflanzen. Daten für die Planung des Energiepflanzenanbaus. Kuratorium für Technik und Bauwesen in der Landwirtschaft, Darmstadt, 372 p.

## Extrapolations
[This dataset has been copied from an original dataset covering the geography DE.] The amounts of the flows are averages across all years of the plantation lifetime.
