# degreasing, metal part in alkaline bath

Dataset: EcoSpold 2, unit process
Geography: RoW
Time period: 2007-01-01 to 2023-12-31
Technology level: current
Classification: EcoSpold01Categories: metals/general manufacturing
Classification: ISIC rev.4 ecoinvent: 2592:Treatment and coating of metals; machining
Tags: ConvertedDataset
Scenario: Business-as-Usual
System model: Allocation, cut-off by classification
Share of production covered: 0 %
Generated by: Roland Steiner
Published in: Steiner, R. 2007
Database: ecoinvent
isCopyrightProtected: true
accessRestrictedTo: 1

## General comment
The reference unit of degreasing is 1 m2 of degreased metal surface. As there is a large variation from factory to factory with regard to the LCI, it is advised that in case this dataset becomes important in the results, it has to be investigated further if the rough estimations made are applicable or not.
[This dataset was already contained in the ecoinvent database version 2. It was not individually updated during the transfer to ecoinvent version 3. Life Cycle Impact Assessment results may still have changed, as they are affected by changes in the supply chain, i.e. in other datasets. This dataset was generated following the ecoinvent quality guidelines for version 2. It may have been subject to central changes described in the ecoinvent version 3 change report (http://www.ecoinvent.org/database/ecoinvent-version-3/reports-of-changes/), and the results of the central updates were reviewed extensively. The changes added e.g. consistent water flows and other information throughout the database. The documentation of this dataset can be found in the ecoinvent reports of version 2, which are still available via the ecoinvent website. The change report linked above covers all central changes that were made during the conversion process.]

## Included activities start
The activity starts with the reception of the workpiece at the degreasing station. The material on which this activity is applied it is not included as input.

## Included activities end
The dataset of degreasing encompasses the energy consumption as well as the operating materials needed to operate the degreasing baths. Softening of the water is considered. Transport of the materials is also included. The degreasing facility (infrastructure) is not included.

## Geography
Geographical coverage encompasses the industrialised countries.

## Technology
Average technology

## Parameters
- fraction, process water, to air: 0.15 dimensionless; name fraction_PW_to_air; lognormal variance with pedigree 0.092025, pedigree (4,4,3,2,4)
- fraction, tap water, to air: 0.15 dimensionless; name fraction_TW_to_air; lognormal variance with pedigree 0.092025, pedigree (4,4,3,2,4)

## Reference product
- degreasing, metal part in alkaline bath: 1 m2; By-product classification allocatable product; CPC 88731: Metal treatment and coating services
  EcoSpold01Location=RER
  production volume 2.67763 m2
    This is a placeholder value that does not reflect real-world production volumes. This dataset does not currently require a real-world production volume to work in the database framework, and no actual data were collected yet. This has no negative effect on the results of the ecoinvent database.
  property price 0.00684732 EUR2005
    Calculated based on inputs: The price of the product has been calculated as a sum of the values of the material and energy inputs for this product. This value is therefore a rough estimation. It may underestimate the real price since there are additional expenses when producing any product. These expences can include for example labour costs, treatment of waste materials and profit for the producer. Please consider carefully whether this level of data quality is acceptable for your application.
  properties: carbon allocation 0 kg, carbon content 0

## Inputs from technosphere
- electricity, low voltage: 1.16516e-6, 1.83229e-5, 0.000380315, 3.7539e-5, 2.33823e-7, 0.000130937, 6.48671e-6 kWh (7 suppliers, which the file names only by identifier); sum of these 0.000575 kWh; lognormal variance with pedigree 0.056, pedigree (3,4,5,5,1)
  EcoSpold01Location=UCTE
  Industry value from one factory
  Uncertainty: industry value from one factory
- ethoxylated alcohol (AE3): 1.825e-5 kg; = 3.65E-05*0.5; lognormal variance with pedigree 0.056, pedigree (3,4,5,5,1)
  Measured value; industry value from one factory. The value of 3.65E-05 kg of ethoxylated alcohol, production mix has been allocated to the concrete ethoxylated alcohols. The ratio between (AE3) and (AE7) is used the same as in case of the original eiv2 "ethoxylated alcohol, production mix" dataset.
  Uncertainty: industry value from one factory
  property carbon content, fossil 0.207952; name C_content_fossil
  property carbon content, non-fossil 0.485221; name C_content_non_fossil
  property dry mass 1 kg; name DM
  property water content 0; name water_content
  property water in wet mass 0 kg; name WWM
  property wet mass 1 kg; name WM
  properties: heating value, net 21 MJ
- ethoxylated alcohol (AE7): 1.825e-5 kg; = 3.65E-05*0.5; lognormal variance with pedigree 0.056, pedigree (3,4,5,5,1)
  (same comment as for ethoxylated alcohol (AE3))
  properties: carbon content, fossil 0.321663, carbon content, non-fossil 0.321663, dry mass 1 kg, heating value, net 19.49 MJ, wet mass 1 kg
- heat, district or industrial, natural gas: 0.000132544, 0.00806596 MJ (2 suppliers, which the file names only by identifier); sum of these 0.0081985 MJ; lognormal variance with pedigree 0.056, pedigree (3,4,5,5,1)
  Industry value from one factory
  EcoSpold01Location=RER
  Uncertainty: industry value from one factory
  properties: heating value, net 1 MJ
- soda ash, light: 0.000393 kg; lognormal variance with pedigree 0.056, pedigree (3,4,5,5,1)
  (same comment as for heat, district or industrial, natural gas)
  properties: carbon content, fossil 0.0517241, dry mass 1 kg, heating value, net 3.43 MJ, wet mass 1 kg
- sodium chloride, powder: 0.0048 kg; lognormal variance with pedigree 0.056, pedigree (3,4,5,5,1)
  EcoSpold01Location=RER
  Industry value from one factory
  Uncertainty: industry value from one factory
  properties: dry mass 1 kg, wet mass 1 kg
- sodium metasilicate pentahydrate, 58% active substance, powder: 0.000393 kg; lognormal variance with pedigree 0.056, pedigree (3,4,5,5,1)
  (same comment as for heat, district or industrial, natural gas)
  properties: dry mass 1 kg, heating value, net 5.71 MJ, wet mass 1 kg
- sodium tripolyphosphate: 9.13e-5 kg; lognormal variance with pedigree 0.056, pedigree (3,4,5,5,1)
  (same comment as for sodium chloride, powder)
  properties: dry mass 1 kg, wet mass 1 kg
- sulfuric acid: 0.000201 kg; lognormal variance with pedigree 0.056, pedigree (3,4,5,5,1)
  (same comment as for sodium chloride, powder)
  properties: dry mass 1 kg, wet mass 1 kg
- tap water: 0.0264078, 0.0402564, 0.0751165, 0.202358, 0.0243585, 1.01511, 11.6164 kg (7 suppliers, which the file names only by identifier); sum of these 13 kg; lognormal variance with pedigree 0.056, pedigree (3,4,5,5,1)
  (same comment as for sodium chloride, powder)
  properties: carbon content, fossil 0.00178991, dry mass 0.000337476 kg, water content 2962.17, wet mass 1 kg
  note on carbon content, fossil: Bicarbonate content is 2.93 mol/m3. CO2 content is 0.1 mol/m3 (ecoinvent v2.2 report 8, Tab 93.1).
- wastewater, average: -0.0129539, -4.61207e-5 m3 (2 suppliers, which the file names only by identifier); sum of these -0.013 m3; lognormal variance with pedigree 0.016, pedigree (3,4,1,5,1)
  EcoSpold01Location=CH
  Industry value from one factory
  Uncertainty: industry value from one factory
  production volume
    Calculated from the production volume of degreasing, metal part in alkaline bath in proportion to the respective output amounts.
  properties: carbon content, non-fossil 0.194039, dry mass 0.346837 kg, water content 2882.2, wet mass 1000 kg
  note on carbon content, non-fossil: 0.0673 kg TOC/m3 (Tab A.17, ecoinvent v2.2 report 13_I). TOC was considered as Total Carbon.

## Emissions to nature
- Water [air, unspecified]: 0.00195 m3; name water_to_air_unspecified; lognormal variance with pedigree 0.0827, pedigree (2,2,5,5,1)
  Calculated value based on literature values and expert opinion. See comments in the parametres' comment field.
  property fraction, origin: fresh water 1; name fraction_origin_fresh_water
  property fraction, origin: salt water 0; name fraction_origin_salt_water
  property fraction, origin: unspecified 0; name fraction_origin_unspecified

## Extrapolations
none This dataset has been copied from an original dataset covering the geography RER. The uncertainty has been adjusted accordingly.

## Review by Sébastien Humbert 2010-02-24
passed
none

## Review by Bo Weidema 2012-07-24
input of ethoxylated alchohols (degreaser) specified
