# coke, import from CN

Dataset: EcoSpold 2, unit process
Geography: GLO
Time period: 2015-01-01 to 2023-12-31
Technology level: current
Classification: ISIC rev.4 ecoinvent: 1910:Manufacture of coke oven products
Scenario: Business-as-Usual
System model: Allocation, cut-off by classification
Generated by: Johannes Müller
Database: ecoinvent
isCopyrightProtected: true
accessRestrictedTo: 1

## General comment
This dataset represents the amount of imported coke from China to the Global supply. The import value is valid for 2015 and includes all imports, independently whether used within the importing region, or re-exported.

## Included activities start
This activity represents the point of 'handing over' the coke from China to the global market at the border.

## Included activities end
This dataset doesn't include any losses, transport or infrastructure.

## Reference product
- coke: 1 MJ; = LHV_coke; By-product classification allocatable product; CPC 33100: Coke and semi-coke of coal, of lignite or of peat; retort carbon; HS2017 270400: Coke and semi-coke; of coal, lignite or peat, whether or not agglomerated; retort carbon
  1 kg of coke
  production volume 1.96579e11 MJ
    Net import from China calculated as average from the years 2015-2020. Source: National Bureau of Statistics Database Year 2020. Annual data. Energy. Coke Balance Sheet. Accessible via: https://data.stats.gov.cn/english/adv.htm?m=advquery&cn=E0101
  property heating value, net 28.6 MJ; name LHV_coke
  property price 0.00791364 EUR2005
    Calculated as price based on: 2018 to 2022 prices calculated from Import/Export data (total trades (USD) divided by total weight (kg) in Germany and China) from UN Trade data statistics (http://data.un.org/Explorer.aspx, Accessed 13 September 2023). Data from UN trade are in mass unit. Calorific value (lower) of 28.6 MJ/kg has been used to convert to MJ.
  properties: carbon allocation 0.0285664 kg, carbon content 0.869149, carbon content, fossil 0.869149, carbon content, non-fossil 0, dry mass 0.0328671 kg, water content 0.0638298, water in wet mass 0.0020979 kg, wet mass 0.034965 kg

## Inputs from technosphere
- coke: 1 MJ; = LHV_coke
  1 kg of coke from Market China
  properties: carbon content, fossil 0.869149, dry mass 0.0328671 kg, heating value, net 28.6 MJ, water content 0.0638298, wet mass 0.034965 kg
