# tellurium production, semiconductor-grade

Dataset: EcoSpold 2, unit process
Geography: RoW
Time period: 1992-01-01 to 2023-12-31
Technology level: current
Classification: ISIC rev.4 ecoinvent: 2011:Manufacture of basic chemicals
Classification: EcoSpold01Categories: metals/extraction
Tags: ConvertedDataset
Scenario: Business-as-Usual
System model: Allocation, cut-off by classification
Generated by: Matthias Tuchschmid (obsolete)
Published in: Classen M. 2009
Database: ecoinvent
isCopyrightProtected: true
accessRestrictedTo: 1

## General comment
This datasets describes the production of high-grade tellurium (99.999%) from copper-telluride cementate by hydrometallurgical processes. These hydrometallurgical processes are the dissolving of copper-telluride cementate with sulphuric acid, the following electrolysis and subsequent purification with zone-melting. This purity of tellurium can be used in the production of thin film solar cells.
[This dataset was already contained in the ecoinvent database version 2. It was not individually updated during the transfer to ecoinvent version 3. Life Cycle Impact Assessment results may still have changed, as they are affected by changes in the supply chain, i.e. in other datasets. This dataset was generated following the ecoinvent quality guidelines for version 2. It may have been subject to central changes described in the ecoinvent version 3 change report (http://www.ecoinvent.org/database/ecoinvent-version-3/reports-of-changes/), and the results of the central updates were reviewed extensively. The changes added e.g. consistent water flows and other information throughout the database. The documentation of this dataset can be found in the ecoinvent reports of version 2, which are still available via the ecoinvent website. The change report linked above covers all central changes that were made during the conversion process.]

## Included activities start
The activity starts with the reception of the copper telluride cement at the facility.

## Included activities end
This datasets describes the production of high-grade tellurium (99.999%) from copper-telluride cementate by hydrometallurgical processes. The energy consumption, emissions as well as transports are considered.

## Geography
Production in GLO.

## Technology
Production of tellurium from copper-telluride cementate (from copper production), purification to 99.999% (5N)

## Time period
based on literature and patents

## Parameters
- fraction, process water, to air: 0.15 dimensionless; name fraction_PW_to_air; lognormal variance with pedigree 0.092025, pedigree (4,4,3,2,4)
  Literature value. In case when no industry/process specific data are available, default evaporation fraction value is used. This value is 15% and is based on literature (Statistics Canada, 2007 & Shaffer, K.H., 2008, Consumptive water use in the Great Lakes Basin, USGS & Shiklomanov, 2003, World Water Resources at the Beginning of the 21st Century) and has been approved by an expert.

## Reference product
- tellurium, semiconductor-grade: 1 kg; By-product classification allocatable product; CPC 34231: Chemical elements n.e.c.; inorganic acids except phosphoric, nitric and sulphonitric; inorganic oxygen compoun[…]; HS2017 280450: Boron; tellurium; CAS 13494-80-9
  EcoSpold01Location=GLO
  production volume 3366.93 kg
    200 - 300 t in 2005
    Total Te semiconductor grade production was calculated from the Te contained in CdTe semiconductor grade
  property price 37.3061 EUR2005
    Price calculated as 5-year market average (2015-2019; USD/kg; USGS [2020]) and converted to EUR2005 (USD2019/EUR2005 exchange rate: 0.62; Official Data Foundation [2020] and Macrotrends [2020]).
    References:
    Official Data Foundation (2020). Inflation Calculator [Online]. Available from: https://www.officialdata.org/us/inflation/2005?endYear=2019&amount=1 [Accessed 28/07/2020]
    USGS (2020). Mineral Commodity Summaries 2020 [Online]. Available from: https://pubs.usgs.gov/periodicals/mcs2020/mcs2020.pdf [Accessed 28/07/2020]
    Macrotrends (2020). Euro Dollar Exchange Rate (EUR USD) - Historical Chart [Online]. Available from: https://www.macrotrends.net/2548/euro-dollar-exchange-rate-historical-chart [Accessed 28/07/2020]
  properties: carbon allocation 0 kg, carbon content 0, carbon content, fossil 0, carbon content, non-fossil 0, dry mass 1 kg, water content 0, water in wet mass 0 kg, wet mass 1 kg

## Inputs from technosphere
- chemical factory, organics: 4e-10 unit; lognormal variance with pedigree 0.5861, pedigree (4,5,5,3,5)
  EcoSpold01Location=RER
  Estimation
  Uncertainty: Estimation
- copper telluride cement: 2.775 kg; lognormal variance with pedigree 0.0512, pedigree (2,3,5,1,1)
  EcoSpold01Location=GLO
  Literature (Shibasaki, 1992)
  Uncertainty: Literature (Shibasaki, 1992)
  properties: dry mass 1 kg, wet mass 1 kg
- electricity, medium voltage: 0.306483, 6.11364, 0.153047, 0.0938555, 1.32338, 0.0187851, 0.00403358, 0.426897, 0.631328, 1.81454 kWh (10 suppliers, which the file names only by identifier); sum of these 10.886 kWh; lognormal variance with pedigree 0.0767, pedigree (4,3,5,3,3)
  Literature, personal communication (Fthenakis)
  EcoSpold01Location=UCTE
  Uncertainty: Literature, personal communication (Fthenakis)
- sulfuric acid: 0.0331625, 0.00433753 kg (2 suppliers, which the file names only by identifier); sum of these 0.0375 kg; lognormal variance with pedigree 0.2861, pedigree (4,5,5,3,5)
  Estimation
  EcoSpold01Location=RER
  Uncertainty: Estimation
  properties: dry mass 1 kg, wet mass 1 kg
- wastewater, average: -7.81871e-5, -0.0130107, -0.00311112 m3 (3 suppliers, which the file names only by identifier); sum of these -0.0162 m3; lognormal variance with pedigree 0.0847, pedigree (2,4,3,3,4)
  Literature, Xiao in Althaus 2004 (extrapolation from zinc)
  EcoSpold01Location=CH
  Uncertainty: Literature, Xiao in Althaus 2004 (extrapolation from zinc)
  production volume
    Calculated from the production volume of tellurium, semiconductor-grade in proportion to the respective output amounts.
  properties: carbon content, non-fossil 0.194039, dry mass 0.346837 kg, water content 2882.2, wet mass 1000 kg
  note on carbon content, non-fossil: 0.0673 kg TOC/m3 (Tab A.17, ecoinvent v2.2 report 13_I). TOC was considered as Total Carbon.

## Inputs from nature
- Water, river [natural resource, in water]: 0.0162 m3; name water_river_input; lognormal variance with pedigree 0.4326, pedigree (2,4,5,1,4)
  Literature, Xiao in Althaus 2004 (extrapolation from zinc)
  Uncertainty: Literature, Xiao in Althaus 2004 (extrapolation from zinc)

## Emissions to nature
- Sulfur dioxide [air, non-urban air or from high stacks]: 0.00955 kg; lognormal variance with pedigree 0.1226, pedigree (2,4,5,1,4)
  (same comment as for Water, river)
- Water [air, unspecified]: 0.00243 m3; name water_to_air_unspecified; = (water_river_input*fraction_PW_to_air); lognormal variance with pedigree 0.0807, pedigree (2,2,5,1,1)
  Calculated value based on literature values and expert opinion. See comments in the parametres' comment field.
- Water [water, unspecified]: 0.01377 m3; name water_to_water_unspecified; = water_river_input*(1-fraction_PW_to_air); lognormal variance with pedigree 0.0807, pedigree (2,2,5,1,1)
  (same comment as for Water)
  property carbon content, fossil 0; name C_content_fossil
  property carbon content, non-fossil 0; name C_content_non_fossil
  property dry mass 0 kg; name DM
  property water in wet mass 1000 kg; name WWM
  property wet mass 1000 kg; name WM

## Sampling procedure
Analysis based on literature.

## Extrapolations
Some data available only for zinc are used as proxy

## Review by Mischa Classen 2007-08-13
passed
