# metal working, average for metal product manufacturing

Dataset: EcoSpold 2, unit process
Geography: RER
Time period: 2006-01-01 to 2023-12-31
Technology level: current
Classification: ISIC rev.4 ecoinvent: 259:Manufacture of other fabricated metal products; metalworking service activit
Classification: EcoSpold01Categories: metals/general manufacturing
Tags: ConvertedDataset
Scenario: Business-as-Usual
System model: Allocation, cut-off by classification
Share of production covered: 0 %
Generated by: Roland Steiner
Published in: Steiner, R. 2007
Database: ecoinvent
isCopyrightProtected: true
accessRestrictedTo: 1

## General comment
1 kg of this process is needed to produce 1 kg of final product.
[This dataset was already contained in the ecoinvent database version 2. It was not individually updated during the transfer to ecoinvent version 3. Life Cycle Impact Assessment results may still have changed, as they are affected by changes in the supply chain, i.e. in other datasets. This dataset was generated following the ecoinvent quality guidelines for version 2. It may have been subject to central changes described in the ecoinvent version 3 change report (http://www.ecoinvent.org/database/ecoinvent-version-3/reports-of-changes/), and the results of the central updates were reviewed extensively. The changes added e.g. consistent water flows and other information throughout the database. The documentation of this dataset can be found in the ecoinvent reports of version 2, which are still available via the ecoinvent website. The change report linked above covers all central changes that were made during the conversion process.]

## Included activities start
The activity starts with the workpiece entering the process. The material on which this activity is applied it is not included as input.

## Included activities end
This dataset encompasses manufacturing processes to make a semi-manufactured product into a final product. It includes average values for the processing by machines as well as the factory infrastructure and operation. Furthermore, an additional metal input is considered for the loss during processsing. Degreasing is not included and has to be added if necessary.

## Geography
Average data from several local to global sized companies. The main focus is on Germany and Europe.

## Technology
The data is an average of mostly European companies and their production technologies.

## Reference product
- metal working, average for metal product manufacturing: 1 kg; By-product classification allocatable product; CPC 893: Casting, forging, stamping and similar metal manufacturing services
  EcoSpold01Location=RER
  production volume 1.32237 kg
    This is a placeholder value that does not reflect real-world production volumes. This dataset does not currently require a real-world production volume to work in the database framework, and no actual data were collected yet. This has no negative effect on the results of the ecoinvent database. The placeholder value of this activity was scaled according to the nominal GDP of 2005 (source: United Nations, http://data.un.org/Glossary.aspx?q=GDP+%28current+US%24%29, accessed 20130726) to reflect an appropriate share of the global production volume, which is also a placeholder value.
  property price 0.416517 EUR2005
    Calculated based on inputs: The price of the product has been calculated as a sum of the values of the material and energy inputs for this product. This value is therefore a rough estimation. It may underestimate the real price since there are additional expenses when producing any product. These expences can include for example labour costs, treatment of waste materials and profit for the producer. Please consider carefully whether this level of data quality is acceptable for your application.
  properties: carbon allocation 0 kg, carbon content 0

## Inputs from technosphere
- aluminium, cast alloy: 0.0023776 kg; lognormal variance with pedigree 0.0593, pedigree (2,3,5,3,3)
  EcoSpold01Location=RER
  properties: dry mass 1 kg, wet mass 1 kg
- aluminium, wrought alloy: 0.0050524 kg; lognormal variance with pedigree 0.0593, pedigree (2,3,5,3,3)
  EcoSpold01Location=RER
  properties: dry mass 1 kg, wet mass 1 kg
- copper, cathode: 0.0278 kg; lognormal variance with pedigree 0.0593, pedigree (2,3,5,3,3)
  EcoSpold01Location=RER
  properties: dry mass 1 kg, wet mass 1 kg
- energy and auxilliary inputs, metal working factory: 1 kg; lognormal variance with pedigree 0.0586, pedigree (1,3,5,1,3)
  EcoSpold01Location=RER
- energy and auxilliary inputs, metal working machine: 1 kg; lognormal variance with pedigree 0.0586, pedigree (1,3,5,1,3)
- metal working factory: 4.58e-10 unit; lognormal variance with pedigree 0.3586, pedigree (1,3,5,1,3)
  activityLink introduced to establish a direct link to the corresponding regional supply of this product
  EcoSpold01Location=RER
- metal working machine, unspecified: 3.95e-5 kg; lognormal variance with pedigree 0.3586, pedigree (1,3,5,1,3)
  EcoSpold01Location=RER
- steel, chromium steel 18/8, hot rolled: 0.00447 kg; lognormal variance with pedigree 0.0593, pedigree (2,3,5,3,3)
  EcoSpold01Location=RER
  properties: carbon content, fossil 0.0008, dry mass 1 kg, wet mass 1 kg
  note on carbon content, fossil: Stainless steel model is the grade 304 steel (18/8 stainless, 18% chromium 8% nickel; max. 0.08% C)
- steel, low-alloyed, hot rolled: 0.187 kg; lognormal variance with pedigree 0.0593, pedigree (2,3,5,3,3)
  EcoSpold01Location=RER
  properties: carbon content, fossil 0.005, dry mass 1 kg, wet mass 1 kg
  note on carbon content, fossil: Low alloyed steel composition given in Tab. 3.2 ecoinvent v2.2 report 10_partII. Steel assumed to have a C content of 0.5%

## Review by Sébastien Humbert 2007-09-05
passed
none
