# electricity production, natural gas, aluminium industry

Dataset: EcoSpold 2, unit process
Geography: CA
Time period: 2015-01-01 to 2023-12-31
Technology level: current
Classification: ISIC rev.4 ecoinvent: 3510:Electric power generation, transmission and distribution
Classification: EcoSpold01Categories: hard coal/power plants
Tags: re-labelling activity; electricity, primary aluminium industry
Scenario: Business-as-Usual
System model: Allocation, cut-off by classification
Share of production covered: 100 %
Generated by: François Saunier
Database: ecoinvent
isCopyrightProtected: true
accessRestrictedTo: 1

## General comment
This is a dataset used to create an aluminium industry specific electricity market for 'aluminium production Canada".The production volume represents the total amount of electricity from natural gas used in the region for aluminium production (electrolysis and ingot casting). The dataset also identifies the provinces providing the electricity from natural gas fired power plants.
Electricity markets specific to the aluminium-industry are needed in an LCI database because primary aluminium production is very energy intensive, and hence the location of production plants is often determined by access to large amounts of cheap electricity, which often results in an electricity mix that is different from the general grid mix of the countries where the production plants are located.
It is assumed that the production of electricity in general and in aluminium industry specific power plants is identical. Details on actual electricity generation with each technology can be found in the corresponding datasets.
Calculations are detailed in the report 'Calculating grid mixes for the aluminium industry in ecoinvent v3', available on the ecoinvent website.
[This dataset is meant to replace the following datasets:
- electricity production, natural gas, aluminium industry, RNA, 2015 - 2015]

## Included activities start
Re-labelling dataset, not representing a real transformation activity. Conceptually, the activity can be said to start with the production of electricity.

## Included activities end
Re-labelling dataset, not representing a real transformation activity. Conceptually, the activity can be said to end with a given amount of high voltage electricity labelled as specifically used for the production of electricity.

## Geography
Canada

## Time period
Production volume updated with 2016 data from AAC

## Reference product
- electricity, high voltage, aluminium industry: 1 kWh; = BC; By-product classification allocatable product; CPC 17100: Electrical energy; HS2017 271600: Electrical energy
  Expressed as sum of contributing technologies (inputs) to allow uncertainty analysis: each technology share is uncertain, and in a Monte Carlo analysis will always be normalized by the sum contribution of each technology
  production volume 1.73397e9 kWh
    The electricity production volume, which is ultimately used to determine the share of natural gas-based electricity in the downstream market for aluminium industry specific high voltage electricity, is calculated by multiplying the following data:
    (1) estimates of the electricity mix used to produce aluminium in Canada provided by the Aluminium Association of Canada (personnal communication).
    (2) primary aluminium production volumes in each of the Canadian provinces defined in ecoinvent, The aluminium production volumes for Canadian provinces was communicated directly by the Aluminium Association of Canada (personnal communication).
    (3) Canadian electricity requirements, per tonne primary aluminium, for prebake electrolysis technologies
    (4) electricity compensating line and transformation losses from production to consumption as medium voltage electricity, Losses estimated using country-level ecoinvent v3 data.
    (5) electricity consumed in ingot casting.
  property price 0.0977 EUR2005
    Calculated in temporary price data. 94% of the average price (to account for a 6% loss in transformation and transmission) for electricity for industrial consumersin 2005 (excluded taxes). From IEA.
  properties: carbon allocation 0 kg, carbon content 0

## Inputs from technosphere
- electricity, high voltage: 1 kWh; name BC; lognormal variance with pedigree 0.0112, pedigree (3,1,4,1,2)
  Calculated amount (see general comments).

## Sampling procedure
IAI and AAC data used for total electricity used in the production of aluminium that is from natural gas power plants. Data based on 100% of regional aluminium production.

## Extrapolations
Although there are different types of natural gas power plants, all electricity generation modelled using 'electricity production, natural gas, at conventional power plant'.
