# methanol to generic market for solvent for chromatography analysis

Dataset: EcoSpold 2, unit process
Geography: GLO
Time period: 2001-01-01 to 2023-12-31
Technology level: current
Classification: EcoSpold01Categories: chemicals/organics
Classification: ISIC rev.4 ecoinvent: 2022:Manufacture of paints, varnishes and similar coatings, printing ink and mas
Scenario: Business-as-Usual
System model: Allocation, cut-off by classification
Generated by: Sofia Parada Tur
Database: ecoinvent
isCopyrightProtected: true
accessRestrictedTo: 1

## General comment
This process involves the conversion of methanol to the generic market for solvent for chromatography applications. When obtaining chromatography solvent from this generic market, the only driving force for the choice of a solvent will be the market price.
When the use of methanol is mandatory, this will be obtained from the market for methanol. In such case, the user will be accessing a niche market, because it defines specific product features aimed at satisfying specific market needs. When there are no specific product attributes to be fulfilled, these will be satisfied in the generic market. In the generic market the consumption of one product over another wil only be driven by best available price and not by the product attributes.

## Geography
based on geographical validity of dataset methanol production

## Technology
based on technology level of dataset methanol production

## Time period
based on temporal validity of dataset methanol production

## Reference product
- solvent for chromatography analysis: 1 kg; By-product classification allocatable product; CPC 34139: Other alcohols, phenols, phenol-alcohols, and their halogenated, sulphonated, nitrated or nitrosated derivativ[…]; HS2017 290511: Alcohols; saturated monohydric, methanol (methyl alcohol)
  production volume 1.52e9 kg; = 0.04*38000000000
    based on total produced methanol from methanol production.
    Source of assumptions:
    - the Metcall company states that of global methanol production in 2006, 4% is used as solvent. It is assumed the percentage is the same in 2005.
  property heating value, net 11.36 MJ
    LHV is calculated based on the Carbon content of the product. More details can be found on the respective documentation.
  properties: carbon allocation 0.375 kg, carbon content 0.375, carbon content, fossil 0.375, carbon content, non-fossil 0, dry mass 1 kg, price 0.968 EUR2005, water content 0, water in wet mass 0 kg, wet mass 1 kg

## Inputs from technosphere
- methanol: 0.0906324, 0.291182, 0.564702, 0.0534834 kg (4 suppliers, which the file names only by identifier); sum of these 1 kg
  properties: carbon content, fossil 0.375, dry mass 1 kg, heating value, net 20 MJ, wet mass 1 kg
  note on heating value, net: Based on literature, page 533, Report 17: Jungbluth, N., Chudacoff, M., Dauriat, A., Dinkel, F., Doka, G., Faist Emmenegger, M., Gnansounou, E., Kljun, N., Schleiss, K., Spielmann, M., Stettler, C., Sutter, J. 2007: Life Cycle Inventories of Bioenergy. ecoinvent report No. 17, Swiss Centre for Life Cycle Inventories, Dübendorf, CH.

## Review by Bo Weidema 2012-02-17
This dataset has only been reviewed by two reviewers. Considering the simple nature of the dataset, this may be seen as acceptable.
