# compressed air production, 800 kPa gauge, >30kW, optimized generation

Dataset: EcoSpold 2, unit process
Geography: RoW
Time period: 2003-01-01 to 2023-12-31
Technology level: modern
Classification: EcoSpold01Categories: mechanical engineering/compressed air generation
Classification: ISIC rev.4 ecoinvent: 2011:Manufacture of basic chemicals
Scenario: Business-as-Usual
System model: Allocation, cut-off by classification
Share of production covered: 0 %
Generated by: Tereza Levova
Published in: Steiner, R. 2007
Database: ecoinvent
isCopyrightProtected: true
accessRestrictedTo: 1

## General comment
As there is some variation from factory to factory with regard to the LCI, it is advised that in case this dataset becomes important in the results, it is recommended to investigated further if the assumptions made for this dataset are applicable or not.
[This dataset was already contained in the ecoinvent database version 2. It was not individually updated during the transfer to ecoinvent version 3. Life Cycle Impact Assessment results may still have changed, as they are affected by changes in the supply chain, i.e. in other datasets. This dataset was generated following the ecoinvent quality guidelines for version 2. It may have been subject to central changes described in the ecoinvent version 3 change report (http://www.ecoinvent.org/database/ecoinvent-version-3/reports-of-changes/), and the results of the central updates were reviewed extensively. The changes added e.g. consistent water flows and other information throughout the database. The documentation of this dataset can be found in the ecoinvent reports of version 2, which are still available via the ecoinvent website. The change report linked above covers all central changes that were made during the conversion process.]

## Included activities end
This dataset includes the compressor, operating materials (lubricating oil), the electricity consumption as well as the transports of the compressor and the lubricant to the installation site. The material for the supply and the energy needed to hold the pressure in the supply installation is included. The installation at the site is not included.

## Geography
Geographical coverage encompasses the industrialised countries.

## Technology
Average technology

## Time period
Estimated value based on literature (ISI Fraunhofer, 2000, Compressed Air Systems in the European Union).
The figure shows the development in old/upgraded/new CAS installations.

## Parameters
- losses during supply: 0.15 % (obsolete); name losses; lognormal variance with pedigree 0.0132, pedigree (4,3,3,5,1)
  Literature value (ecoinvent v2.2 no.23_MechanicalEngineering). The fraction of air lost between compressor and final consumer, i.e in case of this technology 15% of the air produced (and measured) at the compressor leaks during the supply and does not reach the consumer. This loss is accounted for in the market of this product.

## Reference product
- compressed air, 800 kPa gauge: 1 m3; name CA_800_RP; = 1-(1*losses); By-product classification allocatable product; CPC 34250: Salts of oxometallic or peroxometallic acids; colloidal precious metals and compounds thereof; inorganic and o[…]; HS2017 285390: Phosphides, chemically defined or not, not ferrophosphorus; other inorganic compounds n.e.c. (including dis[...]
  In v2 of the ecoinvent database supply network and losses during the distribution were modelled in a separate datasets. In v3 those two datasets are merged in this one dataset, the losses are included and the flows are adjusted accordingly.
  EcoSpold01Location=RER
  production volume 5.83731e10 m3; name RP_PV_1
    Estimated. The global production volume is extrapolated from the european production volume using the nominal GDP of 2010 (source: United Nations, http://data.un.org/Glossary.aspx?q=GDP+%28current+US%24%29, accessed 20130726 and 20130312).
    Gross domestic product (GDP) at current prices is GDP at prices of the current reporting period. Also known as nominal GDP.
  property price 0.080606 EUR2005
    Calculated based on inputs: The price of the product has been calculated as a sum of the values of the material and energy inputs for this product. This value is therefore a rough estimation. It may underestimate the real price since there are additional expenses when producing any product. These expences can include for example labour costs, treatment of waste materials and profit for the producer. Please consider carefully whether this level of data quality is acceptable for your application.
  properties: carbon allocation 0 kg, carbon content 0

## Inputs from technosphere
- air compressor, screw-type compressor, 300kW: 9e-8 unit; lognormal variance with pedigree 0.322, pedigree (1,4,4,5,1)
  EcoSpold01Location=RER
  manufacturer value
  Uncertainty: manufacturer value
- electricity, low voltage: 0.000326602, 0.00513604, 0.106605, 0.0105224, 6.55421e-5, 0.0367025, 0.00181827 kWh (7 suppliers, which the file names only by identifier); sum of these 0.161176 kWh; lognormal variance with pedigree 0.0432, pedigree (1,3,5,5,1)
  average value
  EcoSpold01Location=UCTE
  Uncertainty: average value
- lubricating oil: 2.44706e-6 kg; lognormal variance with pedigree 0.022, pedigree (1,4,4,5,1)
  manufacturer value
  EcoSpold01Location=RER
  Uncertainty: manufacturer value
  properties: carbon content, fossil 0.75, dry mass 1 kg, heating value, net 40.2 MJ, wet mass 1 kg
  note on carbon content, fossil: Lubricating oil is produced from diesel. C-content/dry mass of fats and oils considered 75%, from: ecoinvent v2.2 report, n 15a, pg 40
  note on heating value, net: Literature value, Source: IPCC 2006, 2006 IPCC Guidelines for National Greenhouse Gas Inventories, Prepared by the National Greenhouse Gas Inventories Programme, Eggleston H.S., Buendia L., Miwa K., Ngara T. and Tanabe K. (eds). Published: IGES, Japan
- section bar rolling, steel: 9.79e-5 kg; = (CA_800_RP/1)*9.79E-05; lognormal variance with pedigree 0.0706, pedigree (4,3,5,5,1)
  average value of one distribution network
  Uncertainty: average value of one distribution network
- steel, low-alloyed, hot rolled: 9.79e-5 kg; = (CA_800_RP/1)*9.79E-05; lognormal variance with pedigree 0.0706, pedigree (4,3,5,5,1)
  (same comment as for section bar rolling, steel)
  properties: carbon content, fossil 0.005, dry mass 1 kg, wet mass 1 kg
  note on carbon content, fossil: Low alloyed steel composition given in Tab. 3.2 ecoinvent v2.2 report 10_partII. Steel assumed to have a C content of 0.5%
- waste mineral oil: -2.44706e-6 kg; name BP_amount_1; lognormal variance with pedigree 0.014, pedigree (1,4,1,5,1)
  EcoSpold01Location=CH
  manufacturer value
  Uncertainty: manufacturer value
  production volume; = BP_amount_1* RP_PV_1
    Calculated from the production volume of compressed air, 800 kPa gauge in proportion to the respective output amounts.
  properties: carbon content, fossil 0.864444, dry mass 0.9 kg, heating value, net 34.7 MJ, water content 0.111111, wet mass 1 kg
  note on carbon content, fossil: Tab A.6, ecoinvent v2.2 report 13_I. C content has been calculated after data in the tables, and then referred to 1 kg DM
  note on heating value, net: Value taken from the general comment of the treatment dataset.

## Extrapolations
Extrapolated from European dataset.

## Review by Bo Weidema 2012-04-19
In v2 of the ecoinvent database supply network and losses during the distribution were modelled in a separate datasets. In v3 those two datasets are merged in this one dataset, the losses are included and the flows are adjusted accordingly.
