# tillage, field cultivator with amendment

Dataset: EcoSpold 2, unit process
Geography: US
Time period: 2021-01-01 to 2023-12-31
Technology level: current
Classification: ISIC rev.4 ecoinvent: 0161:Support activities for crop production
Scenario: Business-as-Usual
System model: Allocation, cut-off by classification
Generated by: Juanita Barrera
Database: ecoinvent
isCopyrightProtected: true
accessRestrictedTo: 1

## General comment
This dataset represents a tillage process using a field cultivator with amendment. The functional unit (FU) is one ha cultivated and the operation time is 1.5 h/FU.

## Included activities start
The activity starts from the agricultural field foreseen to be processed.

## Included activities end
This activity ends with cultivating. The dataset includes the diesel fuel consumption and the amount of agricultural machinery and of the shed, which has to be attributed to cultivating. Also taken into consideration is the amount of emissions to the air from combustion and the emission to the soil from tyre abrasion during the work process. The following activities were considered part of the work process: preliminary work at the farm, like attaching the adequate machine to the tractor; transfer to field (with an assumed distance of 1 km); field work (for a parcel of land of 1 ha surface); transfer to farm and concluding work, like uncoupling the machine. The overlapping during the field work is considered. The dataset doesn't include the dust other than from combustion and noise.

## Geography
The inventory is extrapolated from the Global geography. Data quality indicators are adjusted accordingly.

## Technology
Fuel consumption, emissions per kg diesel and the machinery weight have been extrapolated to the US, but others inputs were taken from the original values.

## Reference product
- tillage, field cultivator with amendment: 1 ha; By-product classification allocatable product; CPC 86119: Other support services to crop production
  production volume 7.88684e7 ha
    FAOSTAT data year 2020: area of arable land, 0.5 passes/year assumed (own estimation)
  property price 13.3221 EUR2005
    The price is from the year 2020. Price information has been directly provided by the data provider based on the following reference: University of Minnesota, Machinery cost estimates, W.F. Lazarus, 2020. The prices were adjusted for inflation relative to 2005 using the producer price index (PPI) of the euro area, published by eurostat (https://ec.europa.eu/eurostat/databrowser/view/STS_INPP_A__custom_6416181/default/table?lang=en, last accessed on 2023-06-01).
  properties: carbon allocation 0 kg, carbon content 0

## Inputs from technosphere
- agricultural machinery, tillage: 4.3575 kg; lognormal variance with pedigree 0.3023, pedigree (1,4,2,3,1)
  upscaled to match the weight of an average field cultivator of 3500kg (https://www.greatplainsag.com/en/products/717/field-cultivator) based on the input of a 300 kg machinery in "tillage, harrowing, by spring tine harrow, GLO"
- diesel: 2.90826 kg; lognormal variance with pedigree 0.0048, pedigree (1,4,2,5,1)
  UMN Farm Machinery Economic Cost Estimation Spreadsheet (MACHDATA.XLSM) Lazarus, 2022 - 2021 Nebraska Crop budget projections, Robert Klein and Glennis McClure, UNL Extension
  properties: carbon content, fossil 0.865, dry mass 1 kg, heating value, net 42.8 MJ, wet mass 1 kg
- shed: 0.00584 m2; lognormal variance with pedigree 0.3022, pedigree (1,4,2,1,1)
  proxy from "tillage, harrowing, by spring tine harrow, GLO"
- tractor, 4-wheel, agricultural: 0.411 kg; lognormal variance with pedigree 0.3042, pedigree (1,4,2,5,1)
  proxy from "tillage, harrowing, by spring tine harrow, GLO"

## Emissions to nature
- Ammonia [air, non-urban air or from high stacks]: 5.80997e-5 kg; lognormal variance with pedigree 0.058325, pedigree (1,2,2,2,3)
  adapted from "tillage, harrowing, by spring tine harrow, GLO" to match the diesel consumption
- Benzene [air, non-urban air or from high stacks]: 2.12225e-5 kg; lognormal variance with pedigree 0.058325, pedigree (1,2,2,2,3)
  (same comment as for Ammonia)
- Benzo(a)pyrene [air, non-urban air or from high stacks]: 8.71169e-8 kg; lognormal variance with pedigree 0.658325, pedigree (1,2,2,2,3)
  (same comment as for Ammonia)
- Cadmium II [air, non-urban air or from high stacks]: 2.90826e-8 kg; lognormal variance with pedigree 0.658325, pedigree (1,2,2,2,3)
  (same comment as for Ammonia)
- Carbon dioxide, fossil [air, non-urban air or from high stacks]: 9.03919 kg; lognormal variance with pedigree 0.018325, pedigree (1,2,2,2,3)
  (same comment as for Ammonia)
- Carbon monoxide, fossil [air, non-urban air or from high stacks]: 0.0172924 kg; lognormal variance with pedigree 0.652225, pedigree (1,4,2,2,1)
  (same comment as for Ammonia)
- Chromium III [air, non-urban air or from high stacks]: 1.45413e-7 kg; lognormal variance with pedigree 0.658325, pedigree (1,2,2,2,3)
  (same comment as for Ammonia)
- Copper ion [air, non-urban air or from high stacks]: 4.93881e-6 kg; lognormal variance with pedigree 0.658325, pedigree (1,2,2,2,3)
  (same comment as for Ammonia)
- Dinitrogen monoxide [air, non-urban air or from high stacks]: 0.000348467 kg; lognormal variance with pedigree 0.058325, pedigree (1,2,2,2,3)
  (same comment as for Ammonia)
- Methane, fossil [air, non-urban air or from high stacks]: 0.000374668 kg; lognormal variance with pedigree 0.058325, pedigree (1,2,2,2,3)
  (same comment as for Ammonia)
- NMVOC, non-methane volatile organic compounds [air, non-urban air or from high stacks]: 0.00746716 kg; lognormal variance with pedigree 0.042225, pedigree (1,4,2,2,1)
  (same comment as for Ammonia)
- Nickel II [air, non-urban air or from high stacks]: 2.03054e-7 kg; lognormal variance with pedigree 0.658325, pedigree (1,2,2,2,3)
  (same comment as for Ammonia)
- Nitrogen oxides [air, non-urban air or from high stacks]: 0.129693 kg; lognormal variance with pedigree 0.042225, pedigree (1,4,2,2,1)
  (same comment as for Ammonia)
- PAH, polycyclic aromatic hydrocarbons [air, non-urban air or from high stacks]: 9.5632e-6 kg; lognormal variance with pedigree 0.318325, pedigree (1,2,2,2,3)
  (same comment as for Ammonia)
- Particulate Matter, < 2.5 um [air, non-urban air or from high stacks]: 0.0136898 kg; lognormal variance with pedigree 0.318325, pedigree (1,2,2,2,3)
  (same comment as for Ammonia)
- Selenium IV [air, non-urban air or from high stacks]: 2.90826e-8 kg; lognormal variance with pedigree 0.058325, pedigree (1,2,2,2,3)
  (same comment as for Ammonia)
- Sulfur dioxide [air, non-urban air or from high stacks]: 0.00292791 kg; lognormal variance with pedigree 0.018325, pedigree (1,2,2,2,3)
  (same comment as for Ammonia)
- Zinc II [air, non-urban air or from high stacks]: 2.90826e-6 kg; lognormal variance with pedigree 0.658325, pedigree (1,2,2,2,3)
  (same comment as for Ammonia)
- Cadmium II [soil, agricultural]: 1.97e-7 kg; lognormal variance with pedigree 0.0442, pedigree (1,4,2,5,1)
  proxy from "tillage, harrowing, by spring tine harrow, GLO"
- Lead II [soil, agricultural]: 8.63e-7 kg; lognormal variance with pedigree 0.0442, pedigree (1,4,2,5,1)
  proxy from "tillage, harrowing, by spring tine harrow, GLO"
- Zinc II [soil, agricultural]: 0.000523 kg; lognormal variance with pedigree 0.0442, pedigree (1,4,2,5,1)
  proxy from "tillage, harrowing, by spring tine harrow, GLO"

## Extrapolations
The dataset is modeled for agricultural production system in US. Data Quality indicators are adjusted accordingly.
