# cadmium production, semiconductor-grade

Dataset: EcoSpold 2, unit process
Geography: RoW
Time period: 2004-01-01 to 2023-12-31
Technology level: current
Classification: ISIC rev.4 ecoinvent: 2011:Manufacture of basic chemicals
Classification: EcoSpold01Categories: metals/extraction
Tags: ConvertedDataset
Scenario: Business-as-Usual
System model: Allocation, cut-off by classification
Share of production covered: 0 %
Generated by: Matthias Tuchschmid (obsolete)
Published in: Classen M. 2009
Database: ecoinvent
isCopyrightProtected: true
accessRestrictedTo: 1

## General comment
This datasets describes the production of high-grade cadmium (99.9999%) from metalurgical cadmium. This purity of cadmium can be used in the production of various cadmium compounds.
[This dataset was already contained in the ecoinvent database version 2. It was not individually updated during the transfer to ecoinvent version 3. Life Cycle Impact Assessment results may still have changed, as they are affected by changes in the supply chain, i.e. in other datasets. This dataset was generated following the ecoinvent quality guidelines for version 2. It may have been subject to central changes described in the ecoinvent version 3 change report (http://www.ecoinvent.org/database/ecoinvent-version-3/reports-of-changes/), and the results of the central updates were reviewed extensively. The changes added e.g. consistent water flows and other information throughout the database. The documentation of this dataset can be found in the ecoinvent reports of version 2, which are still available via the ecoinvent website. The change report linked above covers all central changes that were made during the conversion process.]

## Included activities start
The activity starts with the reception of the raw materials at the plant gate.

## Included activities end
The activity ends with the produced cadmium, including the energy consumption and transports. The emissions are estimated.

## Geography
Production in GLO.

## Technology
Production of high-purity cadmium by vacuum distillation

## Reference product
- cadmium, semiconductor-grade: 1 kg; By-product classification allocatable product; CPC 41601: Tungsten, molybdenum, tantalum, magnesium, cobalt, cadmium, titanium, zirconium, beryllium, gallium, hafnium, […]; HS2017 810790: Cadmium; other than unwrought, n.e.c. in heading no. 8107; CAS 7440-43-9
  EcoSpold01Location=US
  production volume 2991.89 kg
    Total Cd semiconductor grade production was calculated as the sum of Cd contained in CdTe semiconductor grade and in CdCl semiconductor grade
  property price 1.23738 EUR2005
    Price calculated as 5-year market average (2015-2019; USD/kg; USGS [2020]) and converted to EUR2005 (USD2019/EUR2005 exchange rate: 0.62; Official Data Foundation [2020] and Macrotrends [2020]).
    References:
    Official Data Foundation (2020). Inflation Calculator [Online]. Available from: https://www.officialdata.org/us/inflation/2005?endYear=2019&amount=1 [Accessed 28/07/2020]
    USGS (2020). Mineral Commodity Summaries 2020 [Online]. Available from: https://pubs.usgs.gov/periodicals/mcs2020/mcs2020.pdf [Accessed 28/07/2020]
    Macrotrends (2020). Euro Dollar Exchange Rate (EUR USD) - Historical Chart [Online]. Available from: https://www.macrotrends.net/2548/euro-dollar-exchange-rate-historical-chart [Accessed 28/07/2020]
  properties: carbon allocation 0 kg, carbon content 0, carbon content, fossil 0, carbon content, non-fossil 0, dry mass 1 kg, water content 0, water in wet mass 0 kg, wet mass 1 kg

## Inputs from technosphere
- cadmium: 1 kg; lognormal variance with pedigree 0.334, pedigree (5,4,5,5,5)
  Calculated based on formula and loss of air emissions
  EcoSpold01Location=GLO
  Uncertainty: calculated based on formula and loss of air emissions
  properties: dry mass 1 kg, wet mass 1 kg
- chemical factory, organics: 4e-10 unit; lognormal variance with pedigree 0.634, pedigree (5,4,5,5,5)
  Assumption, based on annual production of 50'000 t
  EcoSpold01Location=RER
  Uncertainty: assumption, based on annual production of 50'000 t
- electricity, medium voltage: 0.129031, 2.57389, 0.0395139, 0.557155, 0.00790866, 0.00169817, 0.179727, 0.265794, 0.100883 kWh (9 suppliers, which the file names only by identifier); sum of these 3.8556 kWh; lognormal variance with pedigree 0.334, pedigree (5,4,5,5,5)
  Personal communication from Fthenakis
  EcoSpold01Location=US
  Uncertainty: personal communication from Fthenakis

## Emissions to nature
- Cadmium II [air, urban air close to ground]: 6e-6 kg; lognormal variance with pedigree 0.984, pedigree (5,4,5,5,5)
  Literature and estimation
  Uncertainty: literature and estimation

## Sampling procedure
literature and own estimations

## Extrapolations
none This dataset has been copied from an original dataset covering the geography US. The uncertainty has been adjusted accordingly.

## Review by Hans-Jörg Althaus 2009-01-29
automatic validation in Excel
none
