# corrugated board box production

Dataset: EcoSpold 2, unit process
Geography: RoW
Time period: 2008-01-01 to 2023-12-31
Technology level: current
Classification: ISIC rev.4 ecoinvent: 1702:Manufacture of corrugated paper and paperboard and of containers of paper a
Scenario: Business-as-Usual
System model: Allocation, cut-off by classification
Generated by: Nora Minas
Database: ecoinvent
isCopyrightProtected: true
accessRestrictedTo: 1

## General comment
This dataset was built as a weighted average of regional datasets of the same activityName. Weights are based on production volumes.
US: production volume = 2.68e+10 kg/year, weight = 0.48031
RER: production volume = 2.80e+10 kg/year, weight = 0.50181
CA-QC: production volume = 9.97e+08 kg/year, weight = 0.01786

## Included activities start
The process starts with the feeding of linerboard and corrugated medium to converting facilities.

## Included activities end
This activity ends with a mix of folded and unfolded boxes which are then ready for delivery.

## Geography
This dataset is a weighted average built from the following geographies: US, RER, CA-QC.

## Technology
Average of present used technology

## Reference product
- corrugated board box: 1 kg; name corrugatedBoardAmount; By-product classification allocatable product; CPC 32153: Cartons, boxes, cases, record sleeves and other packing containers (except bags) of paper, paperboard, cellulo[…]; HS2017 481910: Paper and paperboard; cartons, boxes and cases, of corrugated paper or paperboard
  Calculated as weighted average of regional datasets of the same activity name.
  production volume 7.64714e10 kg; name corrugatedBoardProductionVolume; = 183685954000*0.72
    Estimation cross-checked with industry information: The total shipment of corrugated board in Europe in 2021 was 28019000000 kg (https://www.fefco.org/sites/default/files/documents/Fefco_AnnualEvaluation_2021_0.pdf, last accessed March 2023). This amount corresponds to 72 % of the 38947712000 kg of “case materials” produced in Europe in 2021 (FAOSTAT http://www.fao.org/faostat/en/#data/FO)
    The same share is applied to global production volume of "case materials, i.e., it is assumed that 72 % of the 183685954000 kg of global “case material” production consist of corrugated board (FAOSTAT http://www.fao.org/faostat/en/#data/FO),
  property heating value, net 12.86 MJ
    LHV is calculated based on the Carbon content of the product. More details can be found on the respective documentation.
  properties: Quebec production volume 0 kg, carbon allocation 0.428937 kg, carbon content 0.453902, carbon content, fossil 0.00365437, carbon content, non-fossil 0.450248, dry mass 0.945 kg, price 0.844 EUR2005, water content 0.0582011, water in wet mass 0.055 kg, wet mass 1 kg

## Inputs from technosphere
- acrylic varnish, with water, in 53% solution state: 0.000502291 kg; lognormal variance with pedigree 0.0029, pedigree (1,2,2,5,1)
  Calculated as weighted average of regional datasets of the same activity name.
  properties: carbon content, fossil 0.609815, dry mass 0.53 kg, heating value, net 20.44 MJ, water content 0.8868, wet mass 1 kg
- borax, anhydrous, powder: 0.000272145 kg; lognormal variance with pedigree 0.0066, pedigree (1,4,3,5,1)
  Calculated as weighted average of regional datasets of the same activity name.
  properties: dry mass 1 kg, wet mass 1 kg
- butadiene: 8.20055e-7 kg; lognormal variance with pedigree 0.0046, pedigree (1,4,1,5,1)
  Calculated as weighted average of regional datasets of the same activity name.
  properties: carbon content, fossil 0.857143, dry mass 1 kg, heating value, net 40.35 MJ, wet mass 1 kg
- carbon dioxide, liquid: 3.70751e-6 kg; lognormal variance with pedigree 0.0046, pedigree (1,4,1,5,1)
  Calculated as weighted average of regional datasets of the same activity name.
  properties: carbon content, fossil 0.272727, dry mass 1 kg, heating value, net 8.27 MJ, wet mass 1 kg
- coating powder: 0.000246156 kg; lognormal variance with pedigree 0.0052, pedigree (1,3,3,5,1)
  Calculated as weighted average of regional datasets of the same activity name.
  properties: carbon content, fossil 0.339435, dry mass 1 kg, heating value, net 10.28 MJ, wet mass 1 kg
- containerboard, fluting medium: 0.243938 kg; lognormal variance with pedigree 0.0048, pedigree (1,4,2,5,1)
  Calculated as weighted average of regional datasets of the same activity name.
  properties: carbon content, non-fossil 0.46, dry mass 0.92592 kg, heating value, net 15.92 MJ, water content 0.08, wet mass 1 kg
- containerboard, linerboard: 0.338576 kg; lognormal variance with pedigree 0.0048, pedigree (1,4,2,5,1)
  Calculated as weighted average of regional datasets of the same activity name.
  properties: carbon content, non-fossil 0.46, dry mass 0.925926 kg, heating value, net 15.92 MJ, water content 0.08, wet mass 1 kg
- containerboard, unspecified: 0.528577 kg; lognormal variance with pedigree 0.0052, pedigree (1,3,3,5,1)
  Calculated as weighted average of regional datasets of the same activity name.
  properties: carbon content, non-fossil 0.496, dry mass 0.918 kg, water content 0.0893246, wet mass 1 kg
  note on carbon content, non-fossil: 0.496 kg carbon/kg dry containerboard. Assumed to be 100% non-fossil.
- diesel, low-sulfur: 1.85528e-7, 8.26827e-7, 9.87278e-6, 4.13551e-7, 2.74279e-8, 4.09651e-7 kg (6 suppliers, which the file names only by identifier); sum of these 1.17358e-5 kg; lognormal variance with pedigree 0.0046, pedigree (2,3,2,5,2)
  Calculated as weighted average of regional datasets of the same activity name.
  properties: carbon content, fossil 0.865, dry mass 1 kg, heating value, net 42.8 MJ, wet mass 1 kg
- electricity, medium voltage: 0.00552917, 0.110295, 0.00276108, 0.00169322, 0.000338896, 7.27686e-5, 0.0113896 kWh (7 suppliers, which the file names only by identifier); sum of these 0.132079 kWh; lognormal variance with pedigree 0.0066, pedigree (1,4,3,5,1)
  Calculated as weighted average of regional datasets of the same activity name.
- ethylene vinyl acetate copolymer: 0.000553891 kg; lognormal variance with pedigree 0.0046, pedigree (2,3,2,5,2)
  Calculated as weighted average of regional datasets of the same activity name.
  properties: carbon content, fossil 0.79734, dry mass 1 kg, heating value, net 35.99 MJ, wet mass 1 kg
- hard coal: 1.71568e-5, 4.07119e-6, 0.000121423, 2.85161e-5, 1.75082e-5, 3.78375e-5, 7.44553e-6 kg (7 suppliers, which the file names only by identifier); sum of these 0.000233958 kg; lognormal variance with pedigree 0.0046, pedigree (2,3,2,5,2)
  Calculated as weighted average of regional datasets of the same activity name.
  properties: carbon content, fossil 0.845, dry mass 0.94 kg, heating value, net 27.91 MJ, water content 0.0638298, wet mass 1 kg
  note on carbon content, fossil: C content 75-94% (specified in Tab 1.1, report 6, part VI). A mean content of 0.845 kg C/ kg dry hard coal was considered
  note on heating value, net: Based on the Characterization factor of Hard coal in the CED method
- heat, district or industrial, natural gas: 0.0160733 MJ; lognormal variance with pedigree 0.0029, pedigree (1,2,2,5,1)
  Calculated as weighted average of regional datasets of the same activity name.
  properties: heating value, net 1 MJ
- heat, district or industrial, other than natural gas: 1.15508e-6 MJ; lognormal variance with pedigree 0.0058, pedigree (1,3,3,5,2)
  Calculated as weighted average of regional datasets of the same activity name.
  properties: heating value, net 1 MJ
- heavy fuel oil: 1.5564e-6, 9.06315e-7, 4.60753e-6, 0.000107708, 1.16267e-6, 5.97437e-6 kg (6 suppliers, which the file names only by identifier); sum of these 0.000121915 kg; lognormal variance with pedigree 0.0046, pedigree (2,3,2,5,2)
  Calculated as weighted average of regional datasets of the same activity name.
  properties: carbon content, fossil 0.849, dry mass 1 kg, heating value, net 41.2 MJ, wet mass 1 kg
- light fuel oil: 1.35607e-5, 0.0014209, 6.98803e-5, 0.000141035, 1.00779e-5, 9.35892e-6 kg (6 suppliers, which the file names only by identifier); sum of these 0.00166481 kg; lognormal variance with pedigree 0.0064, pedigree (2,3,3,5,2)
  Calculated as weighted average of regional datasets of the same activity name.
  properties: carbon content, fossil 0.862, dry mass 1 kg, heating value, net 42.6 MJ, wet mass 1 kg
- liquefied petroleum gas: 3.17728e-6, 3.0513e-5, 9.57878e-6, 2.13201e-6, 0.000108377, 0.00045357 kg (6 suppliers, which the file names only by identifier); sum of these 0.000607348 kg; lognormal variance with pedigree 0.0064, pedigree (2,3,3,5,2)
  Calculated as weighted average of regional datasets of the same activity name.
  properties: carbon content, fossil 0.821863, dry mass 1 kg, heating value, net 45.5 MJ, wet mass 1 kg
  note on heating value, net: Indicative value. Reference: Fuels - Higher and Lower Calorific Values, available at: https://www.engineeringtoolbox.com/fuels-higher-calorific-values-d_169.html
- maize starch: 0.0140354 kg; lognormal variance with pedigree 0.0078, pedigree (2,4,3,5,2)
  Calculated as weighted average of regional datasets of the same activity name.
  properties: carbon content, non-fossil 0.46, dry mass 0.86 kg, heating value, net 11.64 MJ, water content 0.162791, wet mass 1 kg
  note on carbon content, non-fossil: C-content of starch is considered 46% on dry mass basis (from "Evolutionary and Biochemical Aspects", A.D. Kay and T. Vrede (in Global Ecology, 2010, Elsevier B.V., S.E. Jørgensen Ed.)).
- municipal solid waste: -3.21361e-6, -3.81602e-7, -0.00181311, -2.6703e-7, -8.57118e-8, -1.93732e-7, -8.06513e-6 kg (7 suppliers, which the file names only by identifier); sum of these -0.00182532 kg; lognormal variance with pedigree 0.0078, pedigree (2,4,3,5,2)
  Calculated as weighted average of regional datasets of the same activity name.
  production volume; = corrugatedBoardProductionVolume * mswAmount / corrugatedBoardAmount
    Calculated Value. Based on the production volume of the reference product and the ratio of the exchange amounts.
  properties: carbon content, fossil 0.171549, carbon content, non-fossil 0.261655, dry mass 0.771 kg, heating value, net 11.74 MJ, water content 0.297017, wet mass 1 kg
  note on carbon content, fossil: MSW composition in tab 4.1, ecoinvent v2.2 report 13_I. C content referred to 1 kg DM
  note on heating value, net: Value taken from the general comment of the treatment dataset.
- natural gas, high pressure: 0.000290841, 0.000490612, 0.00107017, 0.000358142, 8.36964e-5, 0.000498144, 0.000478007, 0.00125693, 0.000485259, 0.000750559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 m3 (35 suppliers, which the file names only by identifier); sum of these 0.0261925 m3; lognormal variance with pedigree 0.0064, pedigree (2,3,3,5,2)
  Calculated as weighted average of regional datasets of the same activity name.
  properties: carbon content, fossil 0.741, dry mass 0.735 kg, heating value, gross 40 MJ, heating value, net 36 MJ, wet mass 0.735 kg
  note on heating value, gross: At standard conditions; based on Meili et al. (2022) section 5.2
- packaging box factory: 1.42857e-9 unit; lognormal variance with pedigree 0.51, pedigree (5,5,5,5,5)
  Calculated as weighted average of regional datasets of the same activity name.
- perlite: 1.91284e-5 kg; lognormal variance with pedigree 0.0046, pedigree (1,4,1,5,1)
  Calculated as weighted average of regional datasets of the same activity name.
  properties: dry mass 1 kg, wet mass 1 kg
- petrol, unleaded: 2.7534e-9, 3.05167e-9, 8.47482e-8, 7.36008e-10, 7.38407e-10, 1.51612e-10 kg (6 suppliers, which the file names only by identifier); sum of these 9.21793e-8 kg; lognormal variance with pedigree 0.0052, pedigree (1,3,3,5,1)
  Calculated as weighted average of regional datasets of the same activity name.
  properties: carbon content, fossil 0.865, dry mass 1 kg, heating value, net 43.2 MJ, wet mass 1 kg
  note on heating value, net: Assumed equal to "petroleum". LHV for petroleum: Based on literature, page 7, Report6, part 4
- phenolic resin: 0.000176231 kg; lognormal variance with pedigree 0.0052, pedigree (1,3,3,5,1)
  Calculated as weighted average of regional datasets of the same activity name.
  properties: carbon content, fossil 0.772277, dry mass 1 kg, heating value, net 33.57 MJ, wet mass 1 kg
- potato starch: 0.00160419 kg; lognormal variance with pedigree 0.0046, pedigree (2,3,2,5,2)
  Calculated as weighted average of regional datasets of the same activity name.
  properties: carbon content, non-fossil 0.46, dry mass 0.8 kg, heating value, net 10.66 MJ, water content 0.25, wet mass 1 kg
- printing ink, offset, without solvent, in 47.5% solution state: 0.00113353 kg; lognormal variance with pedigree 0.0066, pedigree (1,4,3,5,1)
  Calculated as weighted average of regional datasets of the same activity name.
  properties: carbon content, fossil 0.455266, carbon content, non-fossil 0.221773, dry mass 1 kg, heating value, net 20.51 MJ, wet mass 1 kg
  note on carbon content, fossil: C content was calculated as an addition of C content in the raw materials.
- propane, burned in building machine: 3.91922e-5 MJ; lognormal variance with pedigree 0.002, pedigree (1,1,1,5,1)
  Calculated as weighted average of regional datasets of the same activity name.
  properties: heating value, net 1 MJ
- sludge from pulp and paper production: -0.000255469 kg; name organicSludgesAmount; lognormal variance with pedigree 0.0048, pedigree (1,4,2,5,1)
  Calculated as weighted average of regional datasets of the same activity name.
  production volume; = corrugatedBoardProductionVolume * organicSludgesAmount / corrugatedBoardAmount
    (same comment as for municipal solid waste)
  properties: carbon content, non-fossil 0.21, dry mass 0.75 kg, heating value, net 2.65 MJ, water content 0.333333, wet mass 1 kg
- sodium hydroxide, without water, in 50% solution state: 0.000862776 kg; lognormal variance with pedigree 0.0066, pedigree (1,4,3,5,1)
  Calculated as weighted average of regional datasets of the same activity name.
  properties: dry mass 1 kg, heating value, net 3.03 MJ, wet mass 1 kg
- styrene: 8.20055e-7 kg; lognormal variance with pedigree 0.0046, pedigree (1,4,1,5,1)
  Calculated as weighted average of regional datasets of the same activity name.
  properties: carbon content, fossil 0.923077, dry mass 1 kg, heating value, net 37.26 MJ, wet mass 1 kg
- tap water: 0.00032148, 0.000490069, 0.000914443, 0.00246344, 0.0123576, 0.141414 kg (6 suppliers, which the file names only by identifier); sum of these 0.157961 kg; lognormal variance with pedigree 0.0048, pedigree (1,4,2,5,1)
  Calculated as weighted average of regional datasets of the same activity name.
  properties: carbon content, fossil 0.00178991, dry mass 0.000337476 kg, water content 2962.17, wet mass 1 kg
  note on carbon content, fossil: Bicarbonate content is 2.93 mol/m3. CO2 content is 0.1 mol/m3 (ecoinvent v2.2 report 8, Tab 93.1).
- vinyl acetate: 0.00077894 kg; lognormal variance with pedigree 0.0066, pedigree (1,4,3,5,1)
  Calculated as weighted average of regional datasets of the same activity name.
  properties: carbon content, fossil 0.55814, dry mass 1 kg, heating value, net 25.35 MJ, wet mass 1 kg
- waste mineral oil: -2.24207e-5 kg; name wasteLubricantsAmount; lognormal variance with pedigree 0.2106, pedigree (5,5,5,5,5)
  Calculated as weighted average of regional datasets of the same activity name.
  production volume; = corrugatedBoardProductionVolume * wasteLubricantsAmount / corrugatedBoardAmount
    (same comment as for municipal solid waste)
  properties: carbon content, fossil 0.864444, dry mass 0.9 kg, heating value, net 34.7 MJ, water content 0.111111, wet mass 1 kg
  note on carbon content, fossil: Tab A.6, ecoinvent v2.2 report 13_I. C content has been calculated after data in the tables, and then referred to 1 kg DM
- waste paint: -0.00100458 kg; name inkResiduesAmount; lognormal variance with pedigree 0.0046, pedigree (2,3,2,5,2)
  Calculated as weighted average of regional datasets of the same activity name.
  production volume; = corrugatedBoardProductionVolume * inkResiduesAmount / corrugatedBoardAmount
    (same comment as for municipal solid waste)
  properties: carbon content, fossil 0.65, dry mass 1 kg, heating value, net 19.7 MJ, wet mass 1 kg
- waste paperboard, sorted: -0.127695 kg; name wastePaperBoardAmount; lognormal variance with pedigree 0.0072, pedigree (2,4,3,5,1)
  Calculated as weighted average of regional datasets of the same activity name.
  production volume; = corrugatedBoardProductionVolume * wastePaperBoardAmount / corrugatedBoardAmount
    (same comment as for municipal solid waste)
  properties: heating value, net 15.92 MJ, price 0.0436 EUR2005
- waste plastic, mixture: -4.33771e-8, -4.11906e-8, -1.57178e-6, -1.0502e-7, -1.75239e-8, -7.94251e-9 kg (6 suppliers, which the file names only by identifier); sum of these -1.78683e-6 kg; lognormal variance with pedigree 0.0126, pedigree (4,4,1,5,1)
  Calculated as weighted average of regional datasets of the same activity name.
  production volume; = corrugatedBoardProductionVolume * wastePlasticAmount / corrugatedBoardAmount
    (same comment as for municipal solid waste)
  properties: carbon content, fossil 0.747344, dry mass 0.847 kg, heating value, net 30.79 MJ, water content 0.180638, wet mass 1 kg
- wastewater from maize starch production: -2.59502e-8 m3; name wasteWaterMaizStarchAmount; lognormal variance with pedigree 0.002, pedigree (1,1,1,5,1)
  Calculated as weighted average of regional datasets of the same activity name.
  production volume; = corrugatedBoardProductionVolume * wasteWaterMaizStarchAmount / corrugatedBoardAmount
    (same comment as for municipal solid waste)
  properties: carbon content, non-fossil 0.825003, dry mass 3.85149 kg, water content 258.64, wet mass 1000 kg
- wastewater, average: -0.000127696 m3; name wasteWaterAverage; lognormal variance with pedigree 0.0052, pedigree (1,3,3,5,1)
  Calculated as weighted average of regional datasets of the same activity name.
  production volume; = corrugatedBoardProductionVolume * wasteWaterAverage / corrugatedBoardAmount
    (same comment as for municipal solid waste)
  properties: carbon content, non-fossil 0.194039, dry mass 0.346837 kg, mass concentration, TOC 0.1091 kg/m3, mass concentration, calcium 0.039453 kg/m3, mass concentration, chlorine 0.030031 kg/m3, mass concentration, hydrogen 0.013365 kg/m3, mass concentration, nitrogen 0.031015 kg/m3, mass concentration, oxygen 0.069824 kg/m3, mass concentration, sodium 0.06456 kg/m3, mass concentration, sulfur 0.015602 kg/m3, water content 2882.2, wet mass 1000 kg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
  note on carbon content, non-fossil: 0.0673 kg TOC/m3 (Tab A.17, ecoinvent v2.2 report 13_I). TOC was considered as Total Carbon.
- wax, lost-wax casting: 0.00180418 kg; lognormal variance with pedigree 0.0052, pedigree (1,3,3,5,1)
  Calculated as weighted average of regional datasets of the same activity name.
  properties: carbon content, fossil 0.84706, dry mass 1 kg, heating value, net 25.76 MJ, wet mass 1 kg
- wood chips, dry, measured as dry mass: 0.000295465 kg; lognormal variance with pedigree 0.0046, pedigree (2,3,2,5,2)
  Calculated as weighted average of regional datasets of the same activity name.
  properties: carbon content, non-fossil 0.494, dry mass 1 kg, heating value, net 9.99 MJ, water content 0.4, wet mass 1.4 kg
  note on carbon content, non-fossil: C content of dry mass is 0.494 kgC/kg dry wood (ecoinvent v2.2 report 9).

## Inputs from nature
- Oxygen [natural resource, in air]: 0.0445 kg; lognormal variance with pedigree 0.0212, pedigree (4,3,3,5,3)
  Calculated as weighted average of regional datasets of the same activity name.
- Water, river [natural resource, in water]: 5.02291e-6 m3; lognormal variance with pedigree 0.0029, pedigree (1,2,2,5,1)
  Calculated as weighted average of regional datasets of the same activity name.
- Water, unspecified natural origin [natural resource, in water]: 0.000218805 m3; lognormal variance with pedigree 0.0052, pedigree (1,3,3,5,1)
  Calculated as weighted average of regional datasets of the same activity name.
- Water, well, in ground [natural resource, in water]: 5.02291e-5 m3; lognormal variance with pedigree 0.0046, pedigree (2,3,2,5,2)
  Calculated as weighted average of regional datasets of the same activity name.

## Emissions to nature
- Acetaldehyde [air, unspecified]: 1.95862e-9 kg; lognormal variance with pedigree 0.0546, pedigree (3,3,3,5,3)
  Calculated as weighted average of regional datasets of the same activity name.
- Acetic acid [air, unspecified]: 1.48624e-7 kg; lognormal variance with pedigree 0.0546, pedigree (3,3,3,5,3)
  Calculated as weighted average of regional datasets of the same activity name.
- Acetone [air, unspecified]: 7.4248e-10 kg; lognormal variance with pedigree 0.0528, pedigree (3,3,2,5,3)
  Calculated as weighted average of regional datasets of the same activity name.
- Acetylene [air, unspecified]: 3.26509e-9 kg; lognormal variance with pedigree 0.0528, pedigree (3,3,2,5,3)
  Calculated as weighted average of regional datasets of the same activity name.
- Aluminium III [air, unspecified]: 6.98728e-8 kg; lognormal variance with pedigree 0.6628, pedigree (3,3,2,5,3)
  Calculated as weighted average of regional datasets of the same activity name.
- Ammonia [air, unspecified]: 1.77365e-8 kg; lognormal variance with pedigree 0.0546, pedigree (3,3,3,5,3)
  Calculated as weighted average of regional datasets of the same activity name.
- Antimony ion [air, unspecified]: 1.03177e-11 kg; lognormal variance with pedigree 0.4128, pedigree (3,3,2,5,3)
  Calculated as weighted average of regional datasets of the same activity name.
- Arsenic ion [air, unspecified]: 2.3358e-10 kg; lognormal variance with pedigree 0.0528, pedigree (3,3,2,5,3)
  Calculated as weighted average of regional datasets of the same activity name.
- Barium II [air, unspecified]: 8.22802e-10 kg; lognormal variance with pedigree 0.0528, pedigree (3,3,2,5,3)
  Calculated as weighted average of regional datasets of the same activity name.
- Benzene [air, unspecified]: 3.96406e-7 kg; lognormal variance with pedigree 0.0546, pedigree (3,3,3,5,3)
  Calculated as weighted average of regional datasets of the same activity name.
- Benzo(a)pyrene [air, unspecified]: 1.39273e-11 kg; lognormal variance with pedigree 0.0546, pedigree (3,3,3,5,3)
  Calculated as weighted average of regional datasets of the same activity name.
- Beryllium II [air, unspecified]: 8.22802e-12 kg; lognormal variance with pedigree 0.0528, pedigree (3,3,2,5,3)
  Calculated as weighted average of regional datasets of the same activity name.
- Boron [air, unspecified]: 3.0953e-9 kg; lognormal variance with pedigree 0.6628, pedigree (3,3,2,5,3)
  Calculated as weighted average of regional datasets of the same activity name.
- Bromine [air, unspecified]: 3.03006e-10 kg; lognormal variance with pedigree 0.0528, pedigree (3,3,2,5,3)
  Calculated as weighted average of regional datasets of the same activity name.
- Butane [air, unspecified]: 7.02263e-7 kg; lognormal variance with pedigree 0.0546, pedigree (3,3,3,5,3)
  Calculated as weighted average of regional datasets of the same activity name.
- Cadmium II [air, unspecified]: 1.31305e-11 kg; lognormal variance with pedigree 0.6628, pedigree (3,3,2,5,3)
  Calculated as weighted average of regional datasets of the same activity name.
- Calcium II [air, unspecified]: 3.22797e-8 kg; lognormal variance with pedigree 0.0528, pedigree (3,3,2,5,3)
  Calculated as weighted average of regional datasets of the same activity name.
- Carbon dioxide, fossil [air, unspecified]: 0.0605161 kg; lognormal variance with pedigree 0.0138, pedigree (2,3,3,5,3)
  Calculated as weighted average of regional datasets of the same activity name.
- Carbon dioxide, non-fossil [air, unspecified]: 0.000668047 kg; lognormal variance with pedigree 0.0029, pedigree (1,2,2,5,1)
  Calculated as weighted average of regional datasets of the same activity name.
- Carbon monoxide, fossil [air, unspecified]: 3.0131e-6 kg; lognormal variance with pedigree 0.6706, pedigree (4,3,3,5,3)
  Calculated as weighted average of regional datasets of the same activity name.
- Carbon monoxide, non-fossil [air, unspecified]: 1.2055e-6 kg; lognormal variance with pedigree 0.6688, pedigree (4,3,2,5,3)
  Calculated as weighted average of regional datasets of the same activity name.
- Chlorine [air, unspecified]: 7.23299e-10 kg; lognormal variance with pedigree 0.0528, pedigree (3,3,2,5,3)
  Calculated as weighted average of regional datasets of the same activity name.
- Chromium III [air, unspecified]: 1.87343e-10 kg; lognormal variance with pedigree 0.6628, pedigree (3,3,2,5,3)
  Calculated as weighted average of regional datasets of the same activity name.
- Chromium VI [air, unspecified]: 1.85621e-11 kg; lognormal variance with pedigree 0.6628, pedigree (3,3,2,5,3)
  Calculated as weighted average of regional datasets of the same activity name.
- Cobalt II [air, unspecified]: 1.83981e-10 kg; lognormal variance with pedigree 0.6628, pedigree (3,3,2,5,3)
  Calculated as weighted average of regional datasets of the same activity name.
- Copper ion [air, unspecified]: 5.03741e-8 kg; lognormal variance with pedigree 0.6646, pedigree (3,3,3,5,3)
  Calculated as weighted average of regional datasets of the same activity name.
- Dinitrogen monoxide [air, unspecified]: 1.59776e-7 kg; lognormal variance with pedigree 0.0546, pedigree (3,3,3,5,3)
  Calculated as weighted average of regional datasets of the same activity name.
- Dioxins, measured as 2,3,7,8-tetrachlorodibenzo-p-dioxin [air, unspecified]: 3.18736e-16 kg; lognormal variance with pedigree 0.0546, pedigree (3,3,3,5,3)
  Calculated as weighted average of regional datasets of the same activity name.
- Ethane [air, unspecified]: 9.79526e-9 kg; lognormal variance with pedigree 0.0528, pedigree (3,3,2,5,3)
  Calculated as weighted average of regional datasets of the same activity name.
- Ethanol [air, unspecified]: 1.48496e-9 kg; lognormal variance with pedigree 0.0528, pedigree (3,3,2,5,3)
  Calculated as weighted average of regional datasets of the same activity name.
- Ethyl benzene [air, unspecified]: 1.2055e-10 kg; lognormal variance with pedigree 0.0528, pedigree (3,3,2,5,3)
  Calculated as weighted average of regional datasets of the same activity name.
- Ethylene [air, unspecified]: 1.95905e-8 kg; lognormal variance with pedigree 0.0528, pedigree (3,3,2,5,3)
  Calculated as weighted average of regional datasets of the same activity name.
- Fluorine [air, unspecified]: 2.00916e-10 kg; lognormal variance with pedigree 0.0528, pedigree (3,3,2,5,3)
  Calculated as weighted average of regional datasets of the same activity name.
- Formaldehyde [air, unspecified]: 1.64787e-7 kg; lognormal variance with pedigree 0.0546, pedigree (3,3,3,5,3)
  Calculated as weighted average of regional datasets of the same activity name.
- Hexachlorobenzene [air, unspecified]: 2.89319e-17 kg; lognormal variance with pedigree 0.0528, pedigree (3,3,2,5,3)
  Calculated as weighted average of regional datasets of the same activity name.
- Hydrocarbons, aliphatic, alkanes, unspecified [air, unspecified]: 4.42447e-8 kg; lognormal variance with pedigree 0.0546, pedigree (3,3,3,5,3)
  Calculated as weighted average of regional datasets of the same activity name.
- Hydrocarbons, aliphatic, unsaturated [air, unspecified]: 1.58704e-8 kg; lognormal variance with pedigree 0.0528, pedigree (3,3,2,5,3)
  Calculated as weighted average of regional datasets of the same activity name.
- Hydrocarbons, aromatic [air, unspecified]: 2.88954e-9 kg; lognormal variance with pedigree 0.0546, pedigree (3,3,3,5,3)
  Calculated as weighted average of regional datasets of the same activity name.
- Hydrochloric acid [air, unspecified]: 2.78327e-7 kg; lognormal variance with pedigree 0.0546, pedigree (3,3,3,5,3)
  Calculated as weighted average of regional datasets of the same activity name.
- Hydrogen fluoride [air, unspecified]: 9.10973e-9 kg; lognormal variance with pedigree 0.0546, pedigree (3,3,3,5,3)
  Calculated as weighted average of regional datasets of the same activity name.
- Iodine [air, unspecified]: 7.44439e-11 kg; lognormal variance with pedigree 0.0528, pedigree (3,3,2,5,3)
  Calculated as weighted average of regional datasets of the same activity name.
- Iron ion [air, unspecified]: 3.29222e-8 kg; lognormal variance with pedigree 0.6628, pedigree (3,3,2,5,3)
  Calculated as weighted average of regional datasets of the same activity name.
- Lead II [air, unspecified]: 1.31318e-9 kg; lognormal variance with pedigree 0.6628, pedigree (3,3,2,5,3)
  Calculated as weighted average of regional datasets of the same activity name.
- Lead-210 [air, unspecified]: 3.03653e-7 kBq; lognormal variance with pedigree 0.3128, pedigree (3,3,2,5,3)
  Calculated as weighted average of regional datasets of the same activity name.
- Magnesium [air, unspecified]: 2.61959e-8 kg; lognormal variance with pedigree 0.0528, pedigree (3,3,2,5,3)
  Calculated as weighted average of regional datasets of the same activity name.
- Manganese II [air, unspecified]: 8.27432e-10 kg; lognormal variance with pedigree 0.0528, pedigree (3,3,2,5,3)
  Calculated as weighted average of regional datasets of the same activity name.
- Mercury II [air, unspecified]: 8.54088e-11 kg; lognormal variance with pedigree 0.6646, pedigree (3,3,3,5,3)
  Calculated as weighted average of regional datasets of the same activity name.
- Methane, fossil [air, non-urban air or from high stacks]: 1.19089e-6 kg; lognormal variance with pedigree 0.0532, pedigree (2,3,3,5,3)
  Calculated as weighted average of regional datasets of the same activity name.
- Methane, fossil [air, unspecified]: 9.02885e-7 kg; lognormal variance with pedigree 0.0528, pedigree (3,3,2,5,3)
  Calculated as weighted average of regional datasets of the same activity name.
- Methane, non-fossil [air, unspecified]: 1.2055e-8 kg; lognormal variance with pedigree 0.0528, pedigree (3,3,2,5,3)
  Calculated as weighted average of regional datasets of the same activity name.
- Methanol [air, unspecified]: 2.52443e-9 kg; lognormal variance with pedigree 0.0528, pedigree (3,3,2,5,3)
  Calculated as weighted average of regional datasets of the same activity name.
- Molybdenum VI [air, unspecified]: 7.05519e-11 kg; lognormal variance with pedigree 0.6628, pedigree (3,3,2,5,3)
  Calculated as weighted average of regional datasets of the same activity name.
- NMVOC, non-methane volatile organic compounds [air, unspecified]: 6.67365e-5 kg; lognormal variance with pedigree 0.0546, pedigree (3,3,3,5,3)
  Calculated as weighted average of regional datasets of the same activity name.
- Nickel II [air, unspecified]: 2.57362e-9 kg; lognormal variance with pedigree 0.6628, pedigree (3,3,2,5,3)
  Calculated as weighted average of regional datasets of the same activity name.
- Nitrogen oxides [air, unspecified]: 3.35128e-5 kg; lognormal variance with pedigree 0.0446, pedigree (1,3,3,5,1)
  Calculated as weighted average of regional datasets of the same activity name.
- PAH, polycyclic aromatic hydrocarbons [air, unspecified]: 9.79925e-9 kg; lognormal variance with pedigree 0.3146, pedigree (3,3,3,5,3)
  Calculated as weighted average of regional datasets of the same activity name.
- Particulate Matter, < 2.5 um [air, unspecified]: 5.05853e-7 kg; lognormal variance with pedigree 0.3132, pedigree (2,3,3,5,3)
  Calculated as weighted average of regional datasets of the same activity name.
- Particulate Matter, > 10 um [air, unspecified]: 1.15527e-7 kg; lognormal variance with pedigree 0.0423, pedigree (1,2,2,5,1)
  Calculated as weighted average of regional datasets of the same activity name.
- Particulate Matter, > 2.5 um and < 10um [air, unspecified]: 2.11333e-5 kg; lognormal variance with pedigree 0.1246, pedigree (1,3,3,5,1)
  Calculated as weighted average of regional datasets of the same activity name.
- Pentachlorophenol [air, unspecified]: 3.25484e-14 kg; lognormal variance with pedigree 0.0528, pedigree (3,3,2,5,3)
  Calculated as weighted average of regional datasets of the same activity name.
- Pentane [air, unspecified]: 1.18026e-6 kg; lognormal variance with pedigree 0.0546, pedigree (3,3,3,5,3)
  Calculated as weighted average of regional datasets of the same activity name.
- Phosphorus [air, unspecified]: 1.6182e-9 kg; lognormal variance with pedigree 0.0528, pedigree (3,3,2,5,3)
  Calculated as weighted average of regional datasets of the same activity name.
- Polonium-210 [air, unspecified]: 5.55065e-7 kBq; lognormal variance with pedigree 0.3128, pedigree (3,3,2,5,3)
  Calculated as weighted average of regional datasets of the same activity name.
- Potassium I [air, unspecified]: 1.02257e-7 kg; lognormal variance with pedigree 0.0528, pedigree (3,3,2,5,3)
  Calculated as weighted average of regional datasets of the same activity name.
- Potassium-40 [air, unspecified]: 8.81573e-8 kBq; lognormal variance with pedigree 0.3128, pedigree (3,3,2,5,3)
  Calculated as weighted average of regional datasets of the same activity name.
- Propane [air, unspecified]: 2.02322e-7 kg; lognormal variance with pedigree 0.0546, pedigree (3,3,3,5,3)
  Calculated as weighted average of regional datasets of the same activity name.
- Propionic acid [air, unspecified]: 1.94205e-8 kg; lognormal variance with pedigree 0.0546, pedigree (3,3,3,5,3)
  Calculated as weighted average of regional datasets of the same activity name.
- Propylene [air, unspecified]: 3.26509e-9 kg; lognormal variance with pedigree 0.0528, pedigree (3,3,2,5,3)
  Calculated as weighted average of regional datasets of the same activity name.
- Radium-226 [air, unspecified]: 7.83621e-8 kBq; lognormal variance with pedigree 0.3128, pedigree (3,3,2,5,3)
  Calculated as weighted average of regional datasets of the same activity name.
- Radium-228 [air, unspecified]: 4.24461e-7 kBq; lognormal variance with pedigree 0.3128, pedigree (3,3,2,5,3)
  Calculated as weighted average of regional datasets of the same activity name.
- Radon-220 [air, unspecified]: 6.53017e-9 kBq; lognormal variance with pedigree 0.3128, pedigree (3,3,2,5,3)
  Calculated as weighted average of regional datasets of the same activity name.
- Radon-222 [air, unspecified]: 6.53017e-9 kBq; lognormal variance with pedigree 0.3128, pedigree (3,3,2,5,3)
  Calculated as weighted average of regional datasets of the same activity name.
- Scandium [air, unspecified]: 8.22802e-12 kg; lognormal variance with pedigree 0.0528, pedigree (3,3,2,5,3)
  Calculated as weighted average of regional datasets of the same activity name.
- Selenium IV [air, unspecified]: 1.21304e-10 kg; lognormal variance with pedigree 0.0528, pedigree (3,3,2,5,3)
  Calculated as weighted average of regional datasets of the same activity name.
- Silicon [air, unspecified]: 1.03177e-7 kg; lognormal variance with pedigree 0.0528, pedigree (3,3,2,5,3)
  Calculated as weighted average of regional datasets of the same activity name.
- Sodium I [air, unspecified]: 1.30633e-8 kg; lognormal variance with pedigree 0.0528, pedigree (3,3,2,5,3)
  Calculated as weighted average of regional datasets of the same activity name.
- Strontium II [air, unspecified]: 1.24073e-9 kg; lognormal variance with pedigree 0.0528, pedigree (3,3,2,5,3)
  Calculated as weighted average of regional datasets of the same activity name.
- Sulfur dioxide [air, unspecified]: 6.02423e-6 kg; lognormal variance with pedigree 0.0446, pedigree (1,3,3,5,1)
  Calculated as weighted average of regional datasets of the same activity name.
- Thallium I [air, unspecified]: 1.03177e-11 kg; lognormal variance with pedigree 0.0528, pedigree (3,3,2,5,3)
  Calculated as weighted average of regional datasets of the same activity name.
- Thorium [air, unspecified]: 1.24073e-11 kg; lognormal variance with pedigree 0.0528, pedigree (3,3,2,5,3)
  Calculated as weighted average of regional datasets of the same activity name.
- Thorium-228 [air, unspecified]: 3.59159e-8 kBq; lognormal variance with pedigree 0.3128, pedigree (3,3,2,5,3)
  Calculated as weighted average of regional datasets of the same activity name.
- Thorium-232 [air, unspecified]: 2.28556e-8 kBq; lognormal variance with pedigree 0.3128, pedigree (3,3,2,5,3)
  Calculated as weighted average of regional datasets of the same activity name.
- Tin ion [air, unspecified]: 4.12707e-12 kg; lognormal variance with pedigree 0.6628, pedigree (3,3,2,5,3)
  Calculated as weighted average of regional datasets of the same activity name.
- Titanium ion [air, unspecified]: 2.47493e-9 kg; lognormal variance with pedigree 0.6628, pedigree (3,3,2,5,3)
  Calculated as weighted average of regional datasets of the same activity name.
- Toluene [air, unspecified]: 1.98359e-7 kg; lognormal variance with pedigree 0.0546, pedigree (3,3,3,5,3)
  Calculated as weighted average of regional datasets of the same activity name.
- Uranium [air, unspecified]: 1.65213e-11 kg; lognormal variance with pedigree 0.0528, pedigree (3,3,2,5,3)
  Calculated as weighted average of regional datasets of the same activity name.
- Uranium-238 [air, unspecified]: 6.53017e-8 kBq; lognormal variance with pedigree 0.3128, pedigree (3,3,2,5,3)
  Calculated as weighted average of regional datasets of the same activity name.
- Vanadium V [air, unspecified]: 5.19736e-9 kg; lognormal variance with pedigree 0.0528, pedigree (3,3,2,5,3)
  Calculated as weighted average of regional datasets of the same activity name.
- Water [air, non-urban air or from high stacks]: 1.03597e-5 m3; lognormal variance with pedigree 0.0052, pedigree (3,3,1,5,1)
  Calculated as weighted average of regional datasets of the same activity name.
- Water [air, unspecified]: 0.000208945 m3; lognormal variance with pedigree 0.0458, pedigree (2,3,3,5,2)
  Calculated as weighted average of regional datasets of the same activity name.
- Xylenes, unspecified [air, unspecified]: 6.53017e-10 kg; lognormal variance with pedigree 0.0528, pedigree (3,3,2,5,3)
  Calculated as weighted average of regional datasets of the same activity name.
- Zinc II [air, unspecified]: 5.15965e-8 kg; lognormal variance with pedigree 0.6646, pedigree (3,3,3,5,3)
  Calculated as weighted average of regional datasets of the same activity name.
- m-Xylene [air, unspecified]: 4.82199e-10 kg; lognormal variance with pedigree 0.0528, pedigree (3,3,2,5,3)
  Calculated as weighted average of regional datasets of the same activity name.
- BOD5, Biological Oxygen Demand [water, surface water]: 2.17365e-6 kg; lognormal variance with pedigree 0.0446, pedigree (1,3,3,5,1)
  Calculated as weighted average of regional datasets of the same activity name.
- BOD5, Biological Oxygen Demand [water, unspecified]: 7.78551e-5 kg; lognormal variance with pedigree 0.0922, pedigree (4,4,2,5,4)
  Calculated as weighted average of regional datasets of the same activity name.
- COD, Chemical Oxygen Demand [water, unspecified]: 0.000166578 kg; lognormal variance with pedigree 0.25, pedigree (5,5,5,5,5)
  Calculated as weighted average of regional datasets of the same activity name.
- DOC, Dissolved Organic Carbon [water, unspecified]: 6.16957e-5 kg; lognormal variance with pedigree 0.25, pedigree (5,5,5,5,5)
  Calculated as weighted average of regional datasets of the same activity name.
- Nitrogen [water, unspecified]: 3.06397e-6 kg; lognormal variance with pedigree 0.0423, pedigree (1,2,2,5,1)
  Calculated as weighted average of regional datasets of the same activity name.
- Phosphorus [water, unspecified]: 6.02749e-7 kg; lognormal variance with pedigree 0.0423, pedigree (1,2,2,5,1)
  Calculated as weighted average of regional datasets of the same activity name.
- Suspended solids, unspecified [water, surface water]: 1.20919e-6 kg; lognormal variance with pedigree 0.0446, pedigree (1,3,3,5,1)
  Calculated as weighted average of regional datasets of the same activity name.
- TOC, Total Organic Carbon [water, unspecified]: 6.16957e-5 kg; lognormal variance with pedigree 0.25, pedigree (5,5,5,5,5)
  Calculated as weighted average of regional datasets of the same activity name.
- Water [water, surface water]: 6.40388e-6 m3; lognormal variance with pedigree 0.0052, pedigree (1,3,3,5,1)
  Calculated as weighted average of regional datasets of the same activity name.
- Water [water, unspecified]: 9.05932e-5 m3; lognormal variance with pedigree 0.0458, pedigree (2,3,3,5,2)
  Calculated as weighted average of regional datasets of the same activity name.

## Sampling procedure
Inventory data for the RER dataset were collected for the year 2021 ("corrugated board box production, RER" with main reference: FEFCO. 2021. European Database for Corrugated Board Life Cycle Studies. 2021. <https://www.fefco.org/sites/default/files/documents/Fefco_AnnualEvaluation_2021_0.pdf >, accessed March 2023). Data for the CA-QC dataset represent the year 2008 ("corrugated board box production, CA-QC", main data source is data from a manufacturing plant located in the region of Québec,) and data for the US represent the year 2014 ("corrugated board box production, US", main source NCASI, 2017).
