# methyl acrylate production

Dataset: EcoSpold 2, unit process
Geography: GLO
Time period: 2000-01-01 to 2023-12-31
Technology level: current
Classification: ISIC rev.4 ecoinvent: 2011:Manufacture of basic chemicals
Classification: EcoSpold01Categories: chemicals/organics
Tags: ConvertedDataset
Scenario: Business-as-Usual
System model: Allocation, cut-off by classification
Share of production covered: 100 %
Generated by: Jürgen Sutter
Published in: Sutter, J. 2007
Database: ecoinvent
isCopyrightProtected: true
accessRestrictedTo: 1

## General comment
This dataset represents the production of 1 kg methyl acrylate, at plant, global. For this study the production of methyl acrylate by means of the esterification of acrylic acid is considered. All data in the present report are referred to 1 kg methyl acrylate 100%. The system includes the process with consumption of raw materials, energy, infrastructure and land use as well as the generation of emissions to air and water. It also includes transportation of the raw materials. Transient or unstable operations like starting-up or shutting-down, are not included, but the production during stable operation conditions. Storage and transportation of the final product are also not included. It is assumed that the manufacturing plants are located in an urban/industrial area and consequently the emissions are categorised as emanating in a high population density area. The emissions into water are assumed to be emitted into rivers.
[This dataset was already contained in the ecoinvent database version 2. It was not individually updated during the transfer to ecoinvent version 3. Life Cycle Impact Assessment results may still have changed, as they are affected by changes in the supply chain, i.e. in other datasets. This dataset was generated following the ecoinvent quality guidelines for version 2. It may have been subject to central changes described in the ecoinvent version 3 change report (http://www.ecoinvent.org/database/ecoinvent-version-3/reports-of-changes/), and the results of the central updates were reviewed extensively. The changes added e.g. consistent water flows and other information throughout the database. The documentation of this dataset can be found in the ecoinvent reports of version 2, which are still available via the ecoinvent website. The change report linked above covers all central changes that were made during the conversion process.]

## Included activities start
From the reception of acrylic acid and methanol to the factory gate.

## Included activities end
This activity ends with the production of methyl acrylate including materials, energy uses, infrastructure and emissions.

## Geography
The inventory is modelled for the world.

## Technology
Although acrylic acid can be esterified in the vapor phase, the liquid phase esterification is industrially more important. Two types of acid catalyst are used: a strong acid, such as sulfuric acid or p-toluenesulfonic acid, or a solid acid, such as a cation-exchange resin.
C3H4O2 + CH3OH → C4H6O2 + H2O
Although sulfuric acid is superior to ion-exchange resins, its use causes problems in waste disposal. In general, cation-exchange resins are favored for esterification using such alcohols as methanol and ethanol, whereas sulfuric acid is favored for higher alcohols having slower rates of esterification (e.g., pentanols and octanols).
Acrylic acid and a small excess (10 – 30 %) of an alcohol are fed into the fixed-bed reactor (a) which is packed with a cation-exchange resin and operated at a temperature of 60 to 80 °C. The reaction liquid then goes to the ester stripper (b) where the desired ester, water, and unreacted alcohol are removed overhead using part of the bottoms from the light-ends column (e) as reflux. The bottom liquid from b contains unreacted acid and is recycled to the reactor. Part of the recycled liquid is fed into the bottom stripper (c), where high-boiling materials, such as inhibitors, impurities, and polymers, are removed to prevent their accumulation in the reaction system.
The acid-free mixture of ester and alcohol distilled from the ester stripper (b) is fed into the extraction column (d), where the alcohol is extracted with water fed from the top of the column. The raffinate from the top of the column goes into the light-ends cut column (e), where light-ends such as water, acetate, and alcohol are separated overhead.
The extract from the bottom of the extraction column is fed into the alcohol recovery column (f), where the alcohol is recovered for reuse in the reaction. Part of the bottom liquid is reused as extracting water; the rest is taken out as waste, concentrated, and either treated biologically or incinerated.
Crude ester from the bottom of the light-ends column is distilled in the product column (g) to obtain acrylate of high purity. The bottom liquid from the product column is recycled (via the inhibitor tank) to the ester stripper (b) and light-ends cut column (e) to be reused as an inhibitor. However, a part of it is sent to the bottom stripper (c) to recover ester and separate high-boiling materials such as polymers.
Polymerization inhibitors, such as hydroquinone or phenothiazine, are added to each column. The light-ends cut column and the product column are operated at reduced pressure to permit lower distillation temperatures.
Esterification – lower alkyl acrylate process
a) Esterification reactor; b) Ester stripper; c) Bottom stripper; d) Extraction column; e) Light-ends cut column; f) Alcohol-recovery column; g) Product column
This process for making alkyl acrylates is quite economical because only a small excess of alcohol is applied and the inhibitor is reused; this leads to low energy and inhibitor consumptions. The yield reaches 95 % based on acrylic acid and 97 % based on alcohol. The purity of the product exceeds 99.5 wt %.
Western world production capacities of acrylic acid esters in 1993 were around 1.200.500 t/a. Plants based on other processes, such as the ketene and cyanohydrin methods, were shut down during the past decade because of inefficiency.
Ohara, T., Sato, T., Shimizu, N., Prescher, G., Schwind, H., Weiberg, O., Marten, K., Greim, H.: Acrylic acid and derivatives. Published online: 2003. In: Ullmann's Encyclopedia of Industrial Chemistry, Seventh Edition, 2004 Electronic Release (ed. Fiedler E., Grossmann G., Kersebohm D., Weiss G. and Witte C.). 7 th Electronic Release Edition. Wiley InterScience, New York, Online-Version under: http://www.mrw.interscience.wiley.com/emrw/9783527306732/home

## Time period
Time of publications

## Parameters
- fraction, cooling water, cooling pond system, to air: 0.032 dimensionless; name fraction_CW_CP_to_air; lognormal variance with pedigree 0.0413, pedigree (2,3,1,3,1)
  Calculated based on literature value (Scown, C.D., 2011, Water Footprint of U.S. Transportation Fuels and supplying information of the article) (Vionnet, S., Quantis Water Database - Technical Report, 2012).
- fraction, cooling water, once-through system, to air: 0.004 dimensionless; name fraction_CW_OT_to_air; lognormal variance with pedigree 0.0413, pedigree (2,3,1,3,1)
  (same comment as for fraction, cooling water, cooling pond system, to air)
- fraction, cooling water, recirculating system, to air: 0.771 dimensionless; name fraction_CW_R_to_air; lognormal variance with pedigree 0.0413, pedigree (2,3,1,3,1)
  (same comment as for fraction, cooling water, cooling pond system, to air)
- fraction, cooling water, to air: 0.3875 dimensionless; name fraction_CW_to_air; = (0.5*fraction_CW_OT_to_air)+(0.5*fraction_CW_R_to_air); lognormal variance with pedigree 0.092025, pedigree (4,4,3,2,4)
  Calculated value based on literature value (see comments of the other parametres present in this dataset) and expert opinion. In the case when no industry/literature data are available about the type of cooling or directly fraction, cooling water, to air specific for the process a default assumption is applied. It is assumed that the once-through cooling system is used in 50% of all cases and recirculating system is used in another 50% of all cases.

## Reference product
- methyl acrylate: 1 kg; By-product classification allocatable product; CPC 34140: Carboxylic acids and their anhydrides, halides, peroxides and peroxyacids and their halogenated, sulphonated, […]; HS2017 291614: Acids; unsaturated acyclic monocarboxylic acids; esters of methacrylic acid; CAS 96-33-3
  Methyl acrylate (C4H6O2; CAS 96-33-3) is a flammable, volatile, mildly toxic, colorless liquid. It is soluble in water and foorms azeotropes with water.
  Acrylic esters are used exclusively for the production of polymers. The polymers are used mainly for coatings, paints, adhesives, and binders for leather, paper, and textiles. About 80 % of the methyl ester produced is used as a copolymer component of acrylic fibers.
  EcoSpold01Location=GLO
  production volume 1 kg
    Unknown
    Dummy value to be replaced by measured, estimated or calculated value
  property heating value, net 25.35 MJ
    LHV is calculated based on the elemental composition of the substance. Based on the CAS number of the substance (000096-33-3), the chemical formula of the substance is found to be: C4H6O2, (PubChem 2020).
    Reference: Kim, S., Chen, J., Cheng, T., Gindulyte, A., He, J., He, S., Li, Q., Shoemaker, B. A., Thiessen, P. A., Yu, B., Zaslavsky, L., Zhang, J., & Bolton, E. E. (2019). PubChem 2019 update: improved access to chemical data. Nucleic acids research, 47(D1), D1102–D1109. https://doi.org/10.1093/nar/gky1033
  property price 1.44756 EUR2005
    Calculated based on inputs: The price of the product has been calculated as a sum of the values of the material and energy inputs for this product. This value is therefore a rough estimation. It may underestimate the real price since there are additional expenses when producing any product. These expences can include for example labour costs, treatment of waste materials and profit for the producer. Please consider carefully whether this level of data quality is acceptable for your application.
  properties: carbon allocation 0.55814 kg, carbon content 0.55814, carbon content, fossil 0.55814, carbon content, non-fossil 0, dry mass 1 kg, water content 0, water in wet mass 0 kg, wet mass 1 kg

## Inputs from technosphere
- acrylic acid: 0.731512, 0.149758 kg (2 suppliers, which the file names only by identifier); sum of these 0.88127 kg; source Ohara, T. 2004; lognormal variance with pedigree 0.076, pedigree (4,5,5,1,1)
  Stoechiometric calculation. Based on an yield of 95 % kg per kg acrylic acid.
  EcoSpold01Location=RER
  Uncertainty: Stoechiometric calculation
  properties: carbon content, fossil 0.5, dry mass 1 kg, heating value, net 21.88 MJ, wet mass 1 kg
- chemical factory, organics: 4e-10 unit; lognormal variance with pedigree 0.448, pedigree (4,5,5,5,5)
  Estimation. The infrastructure is estimated based on the module "chemical plant, organics". This module assumes a built area of about 4.2 ha, an average output of 50'000 t/a, and plant life of fifty years.
  EcoSpold01Location=RER
  Uncertainty: Estimation
- electricity, medium voltage: 0.00725 kWh; source Kim S. 2003; lognormal variance with pedigree 0.0706, pedigree (3,3,5,1,3)
  Estimation. This has been estimated with literature data, which gives data for the production of ethyl acetate from ethanol esterification. This process is considered to be similar to the esterification of acrylic acid with methanol.
  EcoSpold01Location=UCTE
  Uncertainty: Estimation
- heat, district or industrial, natural gas: 8.84 MJ; source Kim S. 2003; lognormal variance with pedigree 0.0706, pedigree (3,3,5,1,3)
  Estimation. The values for the energy use have been estimated with literature data, which gives data for the production of ethyl acetate from ethanol esterification. This process is considered to be similar to the esterification of acrylic acid with methanol.
  The value for the steam input used in this inventory is the difference between the steam (10.5 MJ) and the potential recovered energy (-1.66 MJ), because this recovered energy is usually fed into the heating systems.
  EcoSpold01Location=RER
  Uncertainty: Estimation
  properties: heating value, net 1 MJ
- methanol: 0.0347666, 0.111697, 0.21662, 0.0205162 kg (4 suppliers, which the file names only by identifier); sum of these 0.3836 kg; source Ohara, T. 2004; lognormal variance with pedigree 0.076, pedigree (4,5,5,1,1)
  Stoechiometric calculation. Based on an yield of 97 % per kg methanol.
  EcoSpold01Location=GLO
  Uncertainty: Stoechiometric calculation
  properties: carbon content, fossil 0.375, dry mass 1 kg, heating value, net 20 MJ, wet mass 1 kg
  note on heating value, net: Based on literature, page 533, Report 17: Jungbluth, N., Chudacoff, M., Dauriat, A., Dinkel, F., Doka, G., Faist Emmenegger, M., Gnansounou, E., Kljun, N., Schleiss, K., Spielmann, M., Stettler, C., Sutter, J. 2007: Life Cycle Inventories of Bioenergy. ecoinvent report No. 17, Swiss Centre for Life Cycle Inventories, Dübendorf, CH.
- wastewater, average: -1.09589e-8, -1.82361e-6, -4.36062e-7, -6.49273e-9 m3 (4 suppliers, which the file names only by identifier); sum of these -2.27712e-6 m3; lognormal variance with pedigree 0.0452, pedigree (2,4,1,5,4)
  Calculated based on literature data published by the GENDORF Chemical Park. The factory produced an average of 2462760 tonnes of chemical substances (including intermediates) per year in the years 2015-2019. The average ouput of wastewater going to an external wastewater treatment plant in the years 2015-2019 was 5608 m3 per year. This equals 0.000002277 m3/kg chemical produced.
  References:
  Chemiepark GENDORF, Umwelterklärung 2016, https://www.gendorf.de/Nachbarn/Umweltschutz/Industrie%20und%20Nachhaltigkeit
  Chemiepark GENDORF, Umwelterklärung 2017, https://www.gendorf.de/Nachbarn/Umweltschutz/Industrie%20und%20Nachhaltigkeit
  Chemiepark GENDORF, Umwelterklärung 2020, https://www.gendorf.de/Nachbarn/Umweltschutz/Industrie%20und%20Nachhaltigkeit
  properties: carbon content, non-fossil 0.194039, dry mass 0.346837 kg, mass concentration, TOC 0.1091 kg/m3, mass concentration, calcium 0.039453 kg/m3, mass concentration, chlorine 0.030031 kg/m3, mass concentration, hydrogen 0.013365 kg/m3, mass concentration, nitrogen 0.031015 kg/m3, mass concentration, oxygen 0.069824 kg/m3, mass concentration, sodium 0.06456 kg/m3, mass concentration, sulfur 0.015602 kg/m3, water content 2882.2, wet mass 1000 kg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
  note on carbon content, non-fossil: 0.0673 kg TOC/m3 (Tab A.17, ecoinvent v2.2 report 13_I). TOC was considered as Total Carbon.

## Inputs from nature
- Water, cooling, unspecified natural origin [natural resource, in water]: 0.014707 m3; source Gendorf 2000; lognormal variance with pedigree 0.0852, pedigree (2,4,5,5,4)
  Calculated based on literature data published by the GENDORF Chemical Park. The factory produced an average of 2462760 tonnes of chemical substances (including intermediates) per year in the years 2015-2019. The average amount of cooling water released in the years 2015-2019 was 34408800 t per year. It was assumed that 5% of the cooling water was emitted to air during its use, therefore, to calculate the input of cooling water, the output value reported by GENDORF was scaled up by the factor 1/0.95. This equals 0.014707 m3/kg chemical produced.
  References:
  Chemiepark GENDORF, Umwelterklärung 2016, https://www.gendorf.de/Nachbarn/Umweltschutz/Industrie%20und%20Nachhaltigkeit
  Chemiepark GENDORF, Umwelterklärung 2017, https://www.gendorf.de/Nachbarn/Umweltschutz/Industrie%20und%20Nachhaltigkeit
  Chemiepark GENDORF, Umwelterklärung 2020, https://www.gendorf.de/Nachbarn/Umweltschutz/Industrie%20und%20Nachhaltigkeit
  Uncertainty: Estimation
- Water, river [natural resource, in water]: 0.000965426 m3; lognormal variance with pedigree 0.0852, pedigree (2,4,5,5,4)
  Calculated based on literature data published by the GENDORF Chemical Park. The factory produced an average of 2462760 tonnes of chemical substances (including intermediates) per year in the years 2015-2019. The average consumption of river water in the years 2015-2019 was 22000820 t per year. However, since the cooling water is modelled as an input, the amount of river water was adjusted to avoid double counting. 55% of the input amount of cooling water was deducted from the amount of river water, as that is the share of river water versus well water. This equals 0.00096543 m3/kg chemical produced.
  References:
  Chemiepark GENDORF, Umwelterklärung 2016, https://www.gendorf.de/Nachbarn/Umweltschutz/Industrie%20und%20Nachhaltigkeit
  Chemiepark GENDORF, Umwelterklärung 2017, https://www.gendorf.de/Nachbarn/Umweltschutz/Industrie%20und%20Nachhaltigkeit
  Chemiepark GENDORF, Umwelterklärung 2020, https://www.gendorf.de/Nachbarn/Umweltschutz/Industrie%20und%20Nachhaltigkeit
- Water, well, in ground [natural resource, in water]: 0.000816522 m3; lognormal variance with pedigree 0.0852, pedigree (2,4,5,5,4)
  Calculated based on literature data published by the GENDORF Chemical Park. The factory produced an average of 2462760 tonnes of chemical substances (including intermediates) per year in the years 2015-2019. The average consumption of well water in the years 2015-2019 was 18607480 t per year. However, since the cooling water is modelled as an input, the amount of well water was adjusted to avoid double counting. 45% of the input amount of cooling water was deducted from the amount of well water, as that is the share of well water versus river water. This equals 0.00081652 m3/kg chemical produced.
  References:
  Chemiepark GENDORF, Umwelterklärung 2016, https://www.gendorf.de/Nachbarn/Umweltschutz/Industrie%20und%20Nachhaltigkeit
  Chemiepark GENDORF, Umwelterklärung 2017, https://www.gendorf.de/Nachbarn/Umweltschutz/Industrie%20und%20Nachhaltigkeit
  Chemiepark GENDORF, Umwelterklärung 2020, https://www.gendorf.de/Nachbarn/Umweltschutz/Industrie%20und%20Nachhaltigkeit

## Emissions to nature
- Acrylic acid [air, urban air close to ground]: 0.0017625 kg; lognormal variance with pedigree 0.188, pedigree (4,5,5,5,5)
  Estimation. As approximation the air emissions occurring from the purge vent, the distillation vent and fugitive emission sources were estimated to 0.2% of the input of acrylic acid and methanol.
  Uncertainty: Estimation
- Carbon dioxide, fossil [air, urban air close to ground]: 0.083089 kg; lognormal variance with pedigree 0.1786, pedigree (4,5,5,5,5)
  Estimation. The carbon contained in the removed acrylic acid and methanol is accounted as CO2 emissions to air during the waste water treatment process.
  Uncertainty: Estimation
- Methanol [air, urban air close to ground]: 0.0007672 kg; lognormal variance with pedigree 0.188, pedigree (4,5,5,5,5)
  (same comment as for Acrylic acid)
- Water [air, unspecified]: 0.00147008 m3; lognormal variance with pedigree 0.1246, pedigree (2,4,5,5,4)
  Calculated based on literature data published by the GENDORF Chemical Park. The factory produced an average of 2462760 tonnes of chemical substances (including intermediates) per year in the years 2015-2019. To determine the emissions of water to air, the difference of all water inputs (from river, well, tap water and cooling) and outputs (wastewater, emissions to water) was calculated. The average ouput of water to air in the years 2015-2019 was 3620444 m3 per year. This equals 0.00147 m3/kg chemical produced. For more information on the other water exchanges please consult the respective exchange comment.
  References:
  Chemiepark GENDORF, Umwelterklärung 2016, https://www.gendorf.de/Nachbarn/Umweltschutz/Industrie%20und%20Nachhaltigkeit
  Chemiepark GENDORF, Umwelterklärung 2017, https://www.gendorf.de/Nachbarn/Umweltschutz/Industrie%20und%20Nachhaltigkeit
  Chemiepark GENDORF, Umwelterklärung 2020, https://www.gendorf.de/Nachbarn/Umweltschutz/Industrie%20und%20Nachhaltigkeit
  property fraction, origin: fresh water 0; name fraction_origin_fresh_water
  property fraction, origin: salt water 0; name fraction_origin_salt_water
  property fraction, origin: unspecified 1; name fraction_origin_unspecified
- Acrylate [water, surface water]: 0.0041714 kg; lognormal variance with pedigree 0.828, pedigree (4,5,5,5,5)
  Estimation. The remaining amount of unreacted acrylic acid is assumed to leave the production process with the wastewater. Further it is assumed that this wastewater is treated in a internal wastewater plant. The removal efficiency for acrylic acid is assumed with 90%. The acrylic cid is calculated as acrylate emission.
  Uncertainty: Estimation
- BOD5, Biological Oxygen Demand [water, surface water]: 0.0065 kg; lognormal variance with pedigree 0.188, pedigree (4,5,5,5,5)
  Calculated value from the water emissions. The worst case scenario BOD = COD was used.
  Uncertainty: Calculated from the water emissions
- COD, Chemical Oxygen Demand [water, surface water]: 0.0065 kg; lognormal variance with pedigree 0.188, pedigree (4,5,5,5,5)
  Calculated value from the water emissions. The values for COD, BOD, TOC and DOC used in this inventory are calculated from the amount of acrylic acid and methanol in the treated waste water assuming a carbon conversion of 96% for COD.
  Uncertainty: Calculated from the water emissions
- DOC, Dissolved Organic Carbon [water, surface water]: 0.00252 kg; lognormal variance with pedigree 0.188, pedigree (4,5,5,5,5)
  Calculated value from the water emissions. The worst case scenario TOC = DOC was used.
  Uncertainty: Calculated from the water emissions
- Methanol [water, surface water]: 0.0010741 kg; lognormal variance with pedigree 0.448, pedigree (4,5,5,5,5)
  Estimation. The remaining amount of unreacted methanol is assumed to leave the production process with the wastewater. Further it is assumed that this wastewater is treated in a internal wastewater plant. The removal efficiency for methanol is assumed with 90%.
  Uncertainty: Estimation
- TOC, Total Organic Carbon [water, surface water]: 0.00252 kg; lognormal variance with pedigree 0.188, pedigree (4,5,5,5,5)
  (same comment as for COD, Chemical Oxygen Demand)
- Water [water, unspecified]: 0.0150391 m3; lognormal variance with pedigree 0.1246, pedigree (2,4,5,5,4)
  Calculated based on literature data published by the GENDORF Chemical Park. The factory produced an average of 2462760 tonnes of chemical substances (including intermediates) per year in the years 2015-2019. The amount of water released back to the environment consists of the sum of the amount of process water treated in the internal WWTP that is then released back to the environment and the amount of cooling water released back to the environment. The average ouput of the internal WWTP in the years 2015-2019 was 2628800 m3 and that of cooling water released back to the environment was 34408800 m3. This gives a yearly average of 37037600 m3 emissions of water to water. This equals 0.01504 m3/kg chemical produced.
  References:
  Chemiepark GENDORF, Umwelterklärung 2016, https://www.gendorf.de/Nachbarn/Umweltschutz/Industrie%20und%20Nachhaltigkeit
  Chemiepark GENDORF, Umwelterklärung 2017, https://www.gendorf.de/Nachbarn/Umweltschutz/Industrie%20und%20Nachhaltigkeit
  Chemiepark GENDORF, Umwelterklärung 2020, https://www.gendorf.de/Nachbarn/Umweltschutz/Industrie%20und%20Nachhaltigkeit
  property carbon content, fossil 0; name C_content_fossil
  property carbon content, non-fossil 0; name C_content_non_fossil
  property dry mass 0 kg; name DM
  property fraction, origin: fresh water 0; name fraction_origin_fresh_water_Ww
  property fraction, origin: salt water 0; name fraction_origin_salt_water_Ww
  property fraction, origin: unspecified 1; name fraction_origin_unspecified_Ww
  property water in wet mass 1000 kg; name WWM
  property wet mass 1000 kg; name WM

## Sampling procedure
Standard values

## Extrapolations
Energy consumptions and emissions are estimated. Infrastructure and transports are calculated with standard values.

## Review by Roland Hischier 2007-09-20
passed.
none

## Review by Roland Hischier 2011-09-23
Transfer of documentation done.
