# electricity production, natural gas, combined cycle power plant

Dataset: EcoSpold 2, unit process
Geography: CO
Time period: 2014-01-01 to 2023-12-31
Technology level: modern
Classification: ISIC rev.4 ecoinvent: 3510:Electric power generation, transmission and distribution
Classification: EcoSpold01Categories: natural gas/power plants
Synonyms: CCGT; GCC; CCPP; GuD
Tags: fossil fuels
Scenario: Business-as-Usual
System model: Allocation, cut-off by classification
Share of production covered: 76 %
Generated by: Germán Santa María
Published in: Suppen, N. 2017
Database: ecoinvent
isCopyrightProtected: true
accessRestrictedTo: 1

## General comment
This dataset represents the production of high voltage electricity in a natural gas, combined cycle power plant in Colombia in 2014. This dataset was created from the "electricity production, natural gas, combined cycle, power plant, GLO" dataset, retrieved on November 20 of 2017. Some of the exchanges and parameters were regionalized with data from Colombian power plants, including: efficiency, total net electricity production, carbon dioxide fossil, methane fossil, dinitrogen monoxide, nitrogen oxide and sulfur dioxide. The regional data was obtained from power plants that represent 76% of the natural gas combined cycle, electricity production in Colombia in 2014.combined cycle, electricity production in Colombia in 2014.
['text', ' - Emissions of NOx, CO, CO2, SO2, particles, N2O and CH4 are mainly taken from CORINAIR 2001, EPA, and a variety of other data sources ']
['text', '-\tNOx emissions are a major challenge in natural gas power plants. With rising temperature, emissions also rise; band widths of NOx emissions in literature are correspondingly large. There are several methods to diminish these emissions.']
['text', '-\tCO is a result of uncomplete burning. For economic and technical reasons, plant combustion is optimized and CO emissions are low. ']
['text', '-\tCO2 and SO2 emissions are dependent on the composition of the used fuel. Due to the low sulfur content of the used natural gas, no desulfurization has to take place.']
['text', '-\tParticles are assumed to be smaller than 2.5 micro-m']
['text', 'former UCTE: Union for the Coordination of the Transmission of Electricity, since 2009 replaced by ENTSO-E European Network of Transmission System Operators for Electricity.']
['text', 'Sources:']
['text', '-\tCORINAIR 2001. EMEP/CORINAIR 2001: Joint EMEP/CORINAIR Atmospheric Emission Inventory Guidebook, Third Edition. Copenhagen: European Environment Agency, 2001. http://reports.eea.eu.int/technical_report_2001_3/en.']
['text', '-\tEPA 1998. US Environmental Protection Agency (1998). Compilation of Air Pollutant Emission Factors, AP-42, Fifth Edition, Volume I: Chapter 1: External Combustion Sources, Natural Gas Combustion - Final Section - Supplement D , July 1998. CHIEF (Clearinghouse for Inventories and Emission Factors). Research Triangle Park, North Carolina. http://www.epa.gov/ttn/chief/ap42/.']
['text', '-\tRentz O., Karl U., Peter H. (2002). Ermittlung und Evaluierung von Emissionsfaktoren f\xfcr Feuerungsanlagen in Deutschland f\xfcr die Jahre 1995, 2000 und 2010. Deutsch- Franz\xf6sisches Institut f\xfcr Umweltforschung, Uni Karsruhe. Endbericht. Im Auftrag des Umweltbundesamtes. Forschungsbericht 299 43 142. Umweltbundesamt. Berlin.']

## Included activities start
From the constructed combined cycle natural gas power plant ready to produce electricity.

From reception of natural gas and operating materials at power plant/factory gate

## Included activities end
This activity ends with 1kWh of high voltage electricity produced at the power plant and arrived at the busbar.

This dataset includes:
- all operation and maintenance activities and materials of the power plants.
- Cooling: It is a assumed that all plants use wet cooling with a cooling tower. No cooling tower is included in this dataset (will be implemented in future versions)
- decarbonised water use for reduction of NOx emissions

This dataset doesn't include
- raw materials extraction, decommissioning and waste treatment as these activities are already included in the infrastructure datasets.
- transformation of the electricity produced.

## Geography
This dataset is based on the GLO dataset with adjustments to the regional context with data from combined cycle natural gas power plants in Colombia.

## Technology
Combined cycle power plant of 400MWe class with a gas turbine 265MWe and a steam turbine 140MWe. The plant is used for middle load with 5000 hours of operation at full capacity per year. The plant is assumed to operate 180000 hours during its lifetime.

## Time period
The Annual Production Volume is valid for the year 2014.

## Parameters
- efficiency: 0.398 dimensionless; lognormal variance with pedigree 0.017225, pedigree (4,3,1,2,3)
  Literature value/calculated value. Net electrical efficiency based on the lower heating value (LHV).
  Data on net electricity production (kWh) and fuel consumption (mmBTU) for the year 2014 in power plants in Colombia was obtained from XM Portal BI.
  Power plants:
  TEBSAB
  FLORES 4B
  TERMOCENTRO CC
  TERMOVALLE 1
  TERMOSIERRAB
  FLORES 1
  PROELECTRICA 1
  PROELECTRICA 2
  TERMOEMCALI 1
  XM Información inteligente, histórico de oferta, generación 2014
  XM Información inteligente, histórico de oferta, combustible 2014
  http://www.xm.com.co/Paginas/Home.aspx accessed on 21/07/2017
- factor: input of MJ for the production of 1 kWh: 9.04523 MJ/kWh; name factor_MJ_kWh; = 1*3.6/efficiency; lognormal variance with pedigree 0.0532, pedigree (4,4,3,4,4)
  Calculated value. 3.6 MJ = 1kWh.
  nan
- fraction, cooling water, to air: 0.0130022 dimensionless; name fraction_CW_to_air; = (WConsumption_EP_NG_recirculatingCS*recirculating_CS_fraction_from_allCS+WConsumption_EP_NG_onceT_andCP_CS*once_through_andCP_CS_fractio_from_allCS)/(WWithdrawal_EP_NG_recirculating_CS*recirculating_CS_fraction_from_allCS+WWithdrawal_EP_NG_onceT_andCP_CS*once_through_andCP_CS_fractio_from_allCS); lognormal variance with pedigree 0.092025, pedigree (4,4,3,2,4)
  Calculated
  nan
- fraction, process water, to air: 0.86755 dimensionless; name fraction_PW_to_air; = WConsumption_EP_NG_recirculatingCS/WWithdrawal_EP_NG_recirculating_CS; lognormal variance with pedigree 0.092025, pedigree (4,4,3,2,4)
  Calculated value: water consumption/water withdrawal
- fraction, water, completely softened, to air: 0.86755 dimensionless; name fraction_WCS_to_air; = fraction_PW_to_air; lognormal variance with pedigree 0.092025, pedigree (4,4,3,2,4)
  Calculated value. See comment in the other parametres present in this dataset. Water, completely softened is considered to be always used as process water, thus process water fractions to air are applied to all water, completely softened input flows to calculate the amount of water consumed in the processes.
  nan
- fraction, water, decarbonised, to air: 0.0130022 dimensionless; name fraction_WDC_to_air; = fraction_CW_to_air; lognormal variance with pedigree 0.092025, pedigree (4,4,3,2,4)
  Calculated value. See comments in the other parametres present in this dataset. Decarbonised water is considered to be always used as cooling water, thus cooling water fractions to air are applied to all carbonised water input flows to calculate the amount of water consumed in the processes.
  nan
- losses from gross electricity production: 0.07 dimensionless; name losses_gross_net; lognormal variance with pedigree 0.017225, pedigree (4,3,1,2,3)
  Literature value. Own use of electricity plants in this country in 2012. The default loss as described by the IEA in the electricity statistic is applied, which is 0.07 (IEA electricity information 2014: The difference between gross and net electricity production is generally observed to be about 7% for conventional thermal stations, 1% for hydro stations and 6% for nuclear.)
  IEA. 2014. Electricity Information 2014. ISBN 978-92-64-21692-1. International Energy Agency (IEA), Paris Cedex (FR).
  nan
  Uncertainty: generic IEA value used
- once-through and cooling pond cooling systems as a fraction of all cooling syste: 0.625 dimensionless; name once_through_andCP_CS_fractio_from_allCS; lognormal variance with pedigree 0.092025, pedigree (4,4,3,2,4)
  Calculated as an average of data available for Europe (Floerke, 2008, Future changes of freshwater needs in the electricity production sector) and USA (NERL, 2011, Estimating freshwater needs to meet future thermoelectric generation requirements).
  nan
- recirculating cooling system as a fraction of all cooling systems: 0.375 dimensionless; name recirculating_CS_fraction_from_allCS; lognormal variance with pedigree 0.092025, pedigree (4,4,3,2,4)
  (same comment as for once-through and cooling pond cooling systems as a fraction of all coo)
- total net electricity: 1.14503e10 kWh; name totalElectricity; lognormal variance with pedigree 0.0067, pedigree (2,2,1,1,1)
  Literature value/statistics for Colombian combined cycle natural gas power plants that provide electricity to the national interconnected network.
  Power plants included:
  TEBSAB
  FLORES 4B
  TERMOCENTRO CC
  TERMOVALLE 1
  TERMOSIERRAB
  FLORES 1
  PROELECTRICA 1
  PROELECTRICA 2
  TERMOEMCALI 1
  Taken from XM National Statistics for Colombia in 2014. URL: http://informacioninteligente10.xm.com.co/oferta/Paginas/HistoricoOferta.aspx accessed 21/07/2017 File: "Generacion_(kWh)_2014"
- water consumption, electricity production from NG, once-T and coolingP CS: 0.00131 m3/kWh; name WConsumption_EP_NG_recirculatingCS; lognormal variance with pedigree 0.0413, pedigree (2,2,1,1,2)
  Literature value. Water footprint of: Celsia Zona Franca 2015 1306 L/MWh (natural gas combined cycle power plant in Colombia).
  Source: <http://www.celsia.com/Portals/0/contenidos-celsia/sostenibilidad/pdf/huella-hidrica-celsia-2015.pdf> accessed on 21/07/2017
- water consumption, electricity production from NG, recirculating CS: 0.0005 m3/kWh; name WConsumption_EP_NG_onceT_andCP_CS; lognormal variance with pedigree 0.092025, pedigree (4,4,3,2,4)
  Estimated based on literature (Scown, 2011, Water Footprint of U.S. Transportation Fuels, SI).
  nan
- water withdrawal, electricity production from NG, once-T and coolingP CS: 0.00151 m3/kWh; name WWithdrawal_EP_NG_recirculating_CS; lognormal variance with pedigree 0.0413, pedigree (2,2,1,1,2)
  (same comment as for water consumption, electricity production from NG, once-T and coolingP)
- water withdrawal, electricity production from NG, recirculating CS: 0.098 m3/kWh; name WWithdrawal_EP_NG_onceT_andCP_CS; lognormal variance with pedigree 0.092025, pedigree (4,4,3,2,4)
  (same comment as for water consumption, electricity production from NG, recirculating CS)

## Reference product
- electricity, high voltage: 1 kWh; name electricity; By-product classification allocatable product; CPC 17100: Electrical energy; HS2017 271600: Electrical energy
  production volume 7.88484e9 kWh; name electricity_apv; = totalElectricity
    Literature value/statistics for Colombian combined cycle natural gas power plants that provide electricity to the national interconnected network.
    Taken from XM National Statistics for Colombia in 2014. URL: http://informacioninteligente10.xm.com.co/oferta/Paginas/HistoricoOferta.aspx accessed 21/07/2017 File: "Generacion_(kWh)_2014"
  property price 0.0977 EUR2005
    Temporary price data. Calculated as 90% of purchasers price based on: 94% of the average price (to account for a 6% loss in transformation and transmission) for electricity for industrial consumersin 2005 (excluded taxes). From IEA.
  properties: carbon allocation 0 kg, carbon content 0

## Inputs from technosphere
- gas power plant, combined cycle, 400MW electrical: 1.38889e-11 unit; name gas_power_plant; = 1/(400*1000*180000); lognormal variance with pedigree 0.1726, pedigree (3,3,5,5,3)
  Amount of power plant infrastructure input calculated based on expected full load hours during power plant lifetime (180000h) and power plant capacity (400MW). See "gas power plant construction, combined cycle, 400MW electrical" dataset and corresponding documentation.
- natural gas, high pressure: 0.251256 m3; name natural_gas; = factor_MJ_kWh/ natural_gas_Net_Heat_Value; lognormal variance with pedigree 0.004, pedigree (1,1,3,5,1)
  Calculated value.
  property heating value, net 36 MJ; name natural_gas_Net_Heat_Value
  properties: carbon content, fossil 0.602381, dry mass 0.84 kg, wet mass 0.84 kg
  note on carbon content, fossil: An average C content of 0.506 kg C/ m3 has been assumed (this average has been calculated using data in Tab 3.5, ecoinvent v2.2 report 6_V
  note on heating value, net: Literature value, Source: Christoph Meili;Niels Jungbluth;Maresa Bussa (2021) Life cycle inventories of crude oil and natural gas extraction. ESU-services Ltd. commissioned by BAFU & VSG, Schaffhausen, Switzerland, http://esu-services.ch/data/public-lci-reports/
- residue from cooling tower: -9.04523e-6 kg; name cooling_tower_residue; = factor_MJ_kWh*0.000001; lognormal variance with pedigree 1.0766, pedigree (4,3,4,5,3)
  Literature value/calculated value. Value taken over from the dataset of natural gas burned in a normal power plant (electricity production, natural gas, GLO 2008).
  Mass share of cooling tower needed for producing 1kWh of electricity, based on the value for burning 1MJ of natural gas. Weighted average with electricity production data (Itten&Frischknecht 2012) and values of 11 countries
  (AT, BE, DE, ES, FR, GB, IT, JP, LU, NL, US) (Faist Emmenegger et al. 2007, JP and US in the appendix)
  Source:
  Itten R. and Frischknecht R. (2012) Life Cycle Inventories of Electricity Mixes and Grid. ESU-services Ltd., Uster, Switzerland.
  production volume; = electricity_apv*cooling_tower_residue
    Calculated from the production volume of electricity produced.
  properties: carbon content, fossil 0.0544233, dry mass 0.7 kg, water content 0.428571, wet mass 1 kg
- water, completely softened: 0.0542714 kg; name water_completely_softened; = factor_MJ_kWh*0.006; lognormal variance with pedigree 0.2686, pedigree (4,3,5,5,3)
  Literature value/calculated value. Feed water for the steam circuit lost when producing 1kWh of electricity, based on the value for burning 1MJ of natural gas. Röder et al. 2007, Tab. 9.65 and Tab. 9.66, p. 160f. For natural gas burned in a combined cycle plant (Tab. 11.25), the feed water was taken into account in Röder et al. 2007 by modelling it with decorbonised water being treated with sodium hydroxide and hydrochloric acid directly in the dataset. For consistency reasons, now also the completely softened water is taken into account.
  properties: wet mass 1 kg
- water, decarbonised: 1.80905 kg; name water_decarbonised_user; = factor_MJ_kWh*0.2; lognormal variance with pedigree 0.2672, pedigree (4,3,5,4,3)
  Literature value/calculated value. Cooling water, decarbonised, for the cooling water circuit lost and NOx reduction when producing 1kWh of electricity, based on the value for burning 1MJ of natural gas. Tab. 11.25, p. 143. For natural gas burned in a combined cycle plant (Tab. 11.25), an amount of 0.5 kg water per MJ burned was taken into account in Röder et al. 2007. As the reasons for this are not documented any more, the cooling water use has been taken over to the combined cycle plant dataset for consistency reasons.
  Röder et al. 2007 state that CC plants have a lower cooling water need than conventional plants. However, as written above, water use for NOx reduction is also taken into account.
  properties: wet mass 1 kg

## Inputs from nature
- Water, cooling, unspecified natural origin [natural resource, in water]: 0.0532516 m3; name water_cooling_UNO_input; = ((recirculating_CS_fraction_from_allCS*WWithdrawal_EP_NG_recirculating_CS)+(once_through_andCP_CS_fractio_from_allCS*WWithdrawal_EP_NG_onceT_andCP_CS))/10.5*factor_MJ_kWh; lognormal variance with pedigree 0.130025, pedigree (4,4,5,2,4)
  Calculated based on literature data.

## Emissions to nature
- Acenaphthene [air, non-urban air or from high stacks]: 7.17286e-12 kg; name acenaphthene; = factor_MJ_kWh*0.000000000000793; lognormal variance with pedigree 0.6826, pedigree (3,3,5,5,3)
  Literature value/calculated value. Value taken over from the dataset of natural gas burned in a normal power plant (electricity production, natural gas, GLO 2008).
  Emissions when producing 1kWh of electricity, based on the value for burning 1MJ of natural gas. Weighted average with electricity production data (Itten&Frischknecht 2012) and emission values of 11 countries
  (AT, BE, DE, ES, FR, GB, IT, JP, LU, NL, US) (Faist Emmenegger et al. 2007, JP and US in the appendix)
  Country emissions values estimate from range of values from different references. See Tab. 11.19, p. 138 in Faist Emmenegger et al. 2007.
  Source:
  Itten R. and Frischknecht R. (2012) Life Cycle Inventories of Electricity Mixes and Grid. ESU-services Ltd., Uster, Switzerland.
- Acetaldehyde [air, non-urban air or from high stacks]: 7.23618e-9 kg; name acetaldehyde; = factor_MJ_kWh*0.0000000008; lognormal variance with pedigree 1.1086, pedigree (4,3,5,5,3)
  (same comment as for Acenaphthene)
- Acetic acid [air, non-urban air or from high stacks]: 1.09447e-6 kg; name acetic_acid; = factor_MJ_kWh*0.000000121; lognormal variance with pedigree 1.1026, pedigree (3,3,5,5,3)
  (same comment as for Acenaphthene)
- Arsenic ion [air, non-urban air or from high stacks]: 3.71759e-10 kg; name arsenic; = factor_MJ_kWh*0.0000000000411; lognormal variance with pedigree 0.098, pedigree (3,5,5,5,4)
  Literature value/calculated value. Value taken over from the dataset of natural gas burned in a normal power plant (electricity production, natural gas, GLO 2008).
  Emissions when producing 1kWh of electricity, based on the value for burning 1MJ of natural gas. Weighted average with electricity production data (Itten&Frischknecht 2012) and emission values of 11 countries
  (AT, BE, DE, ES, FR, GB, IT, JP, LU, NL, US) (Faist Emmenegger et al. 2007, JP and US in the appendix. Only the US dataset contains heavy metals emissions - see Tab. 16.10)
  Source:
  Itten R. and Frischknecht R. (2012) Life Cycle Inventories of Electricity Mixes and Grid. ESU-services Ltd., Uster, Switzerland.
- Benzene [air, non-urban air or from high stacks]: 8.15879e-9 kg; name benzene; = factor_MJ_kWh*0.000000000902; lognormal variance with pedigree 0.6826, pedigree (3,3,5,5,3)
  (same comment as for Acenaphthene)
- Benzo(a)pyrene [air, non-urban air or from high stacks]: 4.78492e-12 kg; name benzo_a_pyrene; = factor_MJ_kWh*0.000000000000529; lognormal variance with pedigree 0.6826, pedigree (3,3,5,5,3)
  (same comment as for Acenaphthene)
- Beryllium II [air, non-urban air or from high stacks]: 2.23417e-11 kg; name beryllium; = factor_MJ_kWh*0.00000000000247; lognormal variance with pedigree 0.098, pedigree (3,5,5,5,4)
  (same comment as for Arsenic ion)
- Butane [air, non-urban air or from high stacks]: 8.37588e-6 kg; name butane; = factor_MJ_kWh*0.000000926; lognormal variance with pedigree 0.6826, pedigree (3,3,5,5,3)
  (same comment as for Acenaphthene)
- Cadmium II [air, non-urban air or from high stacks]: 2.04422e-9 kg; name cadmium; = factor_MJ_kWh*0.000000000226; lognormal variance with pedigree 0.098, pedigree (3,5,5,5,4)
  (same comment as for Arsenic ion)
- Carbon dioxide, fossil [air, non-urban air or from high stacks]: 0.503014 kg; name carbon_dioxide_fossil; = factor_MJ_kWh*0.055611; lognormal variance with pedigree 0.0039, pedigree (2,2,3,1,2)
  Literature value/calculated value. Emissions when producing 1kWh of electricity from natural gas power plants, based on the value for burning 1MJ of natural gas. Weighted average with electricity production data and emission values of Colombia.
  Source of electricity production and fuel consumption data: XM National Statistics
  XM Información inteligente, histórico de oferta, generación 2014
  XM Información inteligente, histórico de oferta, combustible 2014
  http://informacioninteligente10.xm.com.co/oferta/Paginas/HistoricoOferta.aspx accessed on 21/07/2017
  Fuel name: “Gas Natural Generico”
  Emission factor: 55539.11496 (kg CO2/TJ), (Updated on December 7 of 2016)
  Source of emission factors for Colombian fuels: Unidad de Planeación Minero Energética (UPME), Factores de Emisión para Combustibles Colombianos (FECOC). Page 31 of the report "Investigacion e Innovacion en Combustion Avanzada de uso Industrial"
  http://www.upme.gov.co/calculadora_emisiones/aplicacion/Informe_Final_FECOC_Correcciones_UPME_FunNatura.pdf accessed 17/07/2017
- Carbon monoxide, fossil [air, non-urban air or from high stacks]: 1.98995e-5 kg; name carbon_monoxide_fossil; = factor_MJ_kWh*0.0000022; lognormal variance with pedigree 0.3426, pedigree (3,3,5,5,3)
  Literature value/calculated value. Value taken over from the dataset of natural gas burned in a normal power plant (electricity production, natural gas, GLO 2008).
  Emissions when producing 1kWh of electricity, based on the value for burning 1MJ of natural gas in a combined cycle power plant. Measurement of a single combined cycle plant in Europe. Tab. 11.25 p. 143
- Chromium III [air, non-urban air or from high stacks]: 2.59598e-9 kg; name chromium; = factor_MJ_kWh*0.000000000287; lognormal variance with pedigree 0.066, pedigree (3,5,5,5,3)
  (same comment as for Arsenic ion)
- Cobalt II [air, non-urban air or from high stacks]: 1.55578e-10 kg; name cobalt; = factor_MJ_kWh*0.0000000000172; lognormal variance with pedigree 0.098, pedigree (3,5,5,5,4)
  (same comment as for Arsenic ion)
- Dinitrogen monoxide [air, non-urban air or from high stacks]: 9.05698e-7 kg; name dinitrogen_monoxide; = factor_MJ_kWh*0.00000010013; lognormal variance with pedigree 0.2933, pedigree (2,2,3,1,2)
  Literature value/calculated value. Emissions when producing 1kWh of electricity from natural gas power plants, based on the value for burning 1MJ of natural gas. Weighted average with electricity production data and emission values of Colombia.
  Source of electricity production and fuel consumption data: XM National Statistics
  XM Información inteligente, histórico de oferta, generación 2014
  XM Información inteligente, histórico de oferta, combustible 2014
  http://informacioninteligente10.xm.com.co/oferta/Paginas/HistoricoOferta.aspx accessed on 21/07/2017
  Fuel name: “Gas Natural Generico”
  Emission factor: 0.0001 ton N2O/TJ (Updated on December 7 of 2016)
  Source of emission factors for Colombian fuels: Unidad de Planeación Minero Energética (UPME), Factores de Emisión para Combustibles Colombianos (FECOC).
  http://www.upme.gov.co/calculadora_emisiones/aplicacion/ayuda.html) accessed 17/07/2017
- Dioxins, measured as 2,3,7,8-tetrachlorodibenzo-p-dioxin [air, non-urban air or from high stacks]: 2.62312e-16 kg; name dioxins; = factor_MJ_kWh*2.9E-17; lognormal variance with pedigree 1.1086, pedigree (4,3,5,5,3)
  Literature value/calculated value. Value taken over from the dataset of natural gas burned in a normal power plant (electricity production, natural gas, GLO 2008).
  Emissions when producing 1kWh of electricity, based on the value for burning 1MJ of natural gas. Weighted average with electricity production data (Itten&Frischknecht 2012) and emission values of 11 countries
  (AT, BE, DE, ES, FR, GB, IT, JP, LU, NL, US) (Faist Emmenegger et al. 2007)
  Country emissions values estimate from range of values from different references. See Tab. 11.19, p. 138 in Faist Emmenegger et al. 2007.
  Source:
  Itten R. and Frischknecht R. (2012) Life Cycle Inventories of Electricity Mixes and Grid. ESU-services Ltd., Uster, Switzerland.
- Ethane [air, non-urban air or from high stacks]: 1.2392e-5 kg; name ethane; = factor_MJ_kWh*0.00000137; lognormal variance with pedigree 0.6826, pedigree (3,3,5,5,3)
  (same comment as for Acenaphthene)
- Formaldehyde [air, non-urban air or from high stacks]: 2.92161e-7 kg; name formaldehyde; = factor_MJ_kWh*0.0000000323; lognormal variance with pedigree 0.6826, pedigree (3,3,5,5,3)
  (same comment as for Acenaphthene)
- Hexane [air, non-urban air or from high stacks]: 7.17286e-6 kg; name hexane; = factor_MJ_kWh*0.000000793; lognormal variance with pedigree 0.6826, pedigree (3,3,5,5,3)
  (same comment as for Acenaphthene)
- Lead II [air, non-urban air or from high stacks]: 9.31658e-10 kg; name lead; = factor_MJ_kWh*0.000000000103; lognormal variance with pedigree 0.098, pedigree (3,5,5,5,4)
  (same comment as for Arsenic ion)
- Manganese II [air, non-urban air or from high stacks]: 7.06432e-10 kg; name manganese; = factor_MJ_kWh*0.0000000000781; lognormal variance with pedigree 0.098, pedigree (3,5,5,5,4)
  (same comment as for Arsenic ion)
- Mercury II [air, non-urban air or from high stacks]: 6.22312e-10 kg; name mercury; = factor_MJ_kWh*0.0000000000688; lognormal variance with pedigree 0.6826, pedigree (3,3,5,5,3)
  (same comment as for Arsenic ion)
- Methane, fossil [air, non-urban air or from high stacks]: 9.05698e-6 kg; name methane_fossil; = factor_MJ_kWh*0.0000010013; lognormal variance with pedigree 0.6333, pedigree (2,2,3,1,2)
  Literature value/calculated value. Emissions when producing 1kWh of electricity from natural gas power plants, based on the value for burning 1MJ of natural gas. Weighted average with electricity production data and emission values of Colombia.
  Source of electricity production and fuel consumption data: XM National Statistics
  XM Información inteligente, histórico de oferta, generación 2014
  XM Información inteligente, histórico de oferta, combustible 2014
  http://informacioninteligente10.xm.com.co/oferta/Paginas/HistoricoOferta.aspx accessed on 21/07/2017
  Fuel name: “Gas Natural Generico”
  Emission factor: 0.001 ton CH4/TJ (Updated on December 7 of 2016)
  Source of emission factors for Colombian fuels: Unidad de Planeación Minero Energética (UPME), Factores de Emisión para Combustibles Colombianos (FECOC).
  http://www.upme.gov.co/calculadora_emisiones/aplicacion/ayuda.html) accessed 17/07/2017
- Nickel II [air, non-urban air or from high stacks]: 3.89849e-9 kg; name nickel; = factor_MJ_kWh*0.000000000431; lognormal variance with pedigree 0.098, pedigree (3,5,5,5,4)
  (same comment as for Arsenic ion)
- Nitrogen oxides [air, non-urban air or from high stacks]: 0.000220658 kg; name nitrogen_oxides; = factor_MJ_kWh*0.000024395; lognormal variance with pedigree 0.293325, pedigree (2,2,3,2,2)
  Literature value/calculated value. Emissions when producing 1kWh of electricity from natural gas, based on the value for burning 1MJ of natural gas. Weighted average with electricity production data and emission values of Colombia.
  The emissions data were collected from “Environmental Compliance Reports” that are reported by power plants to the Ministry of Environment in order to obtain licenses, and are available under request at the National Environmental Licensing Authority. This exchange is a weighted average of the emissions from TebsaB, Flores IV, Termovalle and Termosierra power plants (based on net electricity production) that account for 76% of the natural gas, combined cycle net electricity production in Colombia in 2014.
  TebsaB: 1.00E-04 (kg NOx/kWh) // 5.61E+09 kWh
  Flores IV: 4.46E-04 (kg NOx/kWh) // 2.09E+09 kWh
  Termovalle: 3.89E-04 (kg NOx/kWh) // 5.81E+08 kWh
  Termosierra: 4.22E-04 (kg NOx/kWh) // 4.21E+08 kWh
  Soruce of emissions: Environmental Compliance Reports (ICA)
  TebsaB, ICA #13, 2016
  Flores IV, ICA #19, 2015
  Termovalle ICA #13, 2015
  Termosierra ICA #16, 2016
  Source of electricity production: XM National Statistics
  XM Información inteligente, histórico de oferta, generación 2014
  http://www.xm.com.co/Paginas/Home.aspx accessed on 21/07/2017
- PAH, polycyclic aromatic hydrocarbons [air, non-urban air or from high stacks]: 7.23618e-8 kg; name pah; = factor_MJ_kWh*0.000000008; lognormal variance with pedigree 1.1086, pedigree (4,3,5,5,3)
  (same comment as for Dioxins, measured as 2,3,7,8-tetrachlorodibenzo-p-dioxin)
- Particulate Matter, < 2.5 um [air, non-urban air or from high stacks]: 4.44121e-6 kg; name particulates_lt_2_5um; = factor_MJ_kWh*0.000000491; lognormal variance with pedigree 0.3746, pedigree (3,3,5,5,4)
  Literature value/calculated value. Value taken over from the dataset of natural gas burned in a normal power plant (electricity production, natural gas, GLO 2008).
  Emissions when producing 1kWh of electricity, based on the value for burning 1MJ of natural gas. Weighted average with electricity production data (Itten&Frischknecht 2012) and emission values of 11 countries
  (AT, BE, DE, ES, FR, GB, IT, JP, LU, NL, US) (Faist Emmenegger et al. 2007)
  Country emissions values estimate from range of values from different references. See Tab. 11.15, p. 133f in Faist Emmenegger et al. 2007.
  Source:
  Itten R. and Frischknecht R. (2012) Life Cycle Inventories of Electricity Mixes and Grid. ESU-services Ltd., Uster, Switzerland.
- Pentane [air, non-urban air or from high stacks]: 1.0402e-5 kg; name pentane; = factor_MJ_kWh*0.00000115; lognormal variance with pedigree 0.6826, pedigree (3,3,5,5,3)
  (same comment as for Acenaphthene)
- Propane [air, non-urban air or from high stacks]: 6.37688e-6 kg; name propane; = factor_MJ_kWh*0.000000705; lognormal variance with pedigree 0.6826, pedigree (3,3,5,5,3)
  (same comment as for Acenaphthene)
- Propionic acid [air, non-urban air or from high stacks]: 1.44724e-7 kg; name propionic_acid; = factor_MJ_kWh*0.000000016; lognormal variance with pedigree 1.1086, pedigree (4,3,5,5,3)
  (same comment as for Acenaphthene)
- Selenium IV [air, non-urban air or from high stacks]: 4.44121e-11 kg; name selenium; = factor_MJ_kWh*0.00000000000491; lognormal variance with pedigree 0.6826, pedigree (3,3,5,5,3)
  (same comment as for Arsenic ion)
- Sulfur dioxide [air, non-urban air or from high stacks]: 4.10994e-5 kg; name sulfur_dioxide; = factor_MJ_kWh*0.00000454376351552269; lognormal variance with pedigree 0.0536, pedigree (3,3,5,5,3)
  Literature value/calculated value. Emissions when producing 1kWh of electricity from natural gas, based on the value for burning 1MJ of natural gas. Weighted average with electricity production data and emission values of Colombia.
  The emissions data were collected from “Environmental Compliance Reports” that are reported by power plants to the Ministry of Environment in order to obtain licenses, and are available under request at the National Environmental Licensing Authority. This exchange is a weighted average (net electricity production weighted mean) of the emissions from: Flores IV and Termovalle power plants that account for 23,3% of the natural gas, combined cycle electricity production in Colombia in 2014.
  Termovalle: 1,26 E-05 (kg SO2/kWh) // 5.81E+08 kWh
  Flores IV: 4,91 E-05 (kg SO2/kWh) // 2.09E+09 kWh
  Weighted average: 4,11 E-05 kg SO2/kWh
  Soruce of emissions: Environmental Compliance Reports (ICA)
  Flores IV, ICA #19, 2015
  Termovalle ICA #13, 2015
  Source of electricity production: XM National Statistics
  XM Información inteligente, histórico de oferta, generación 2014
  http://www.xm.com.co/Paginas/Home.aspx accessed on 21/07/2017
- Toluene [air, non-urban air or from high stacks]: 1.35678e-8 kg; name toluene; = factor_MJ_kWh*0.0000000015; lognormal variance with pedigree 0.6826, pedigree (3,3,5,5,3)
  (same comment as for Acenaphthene)
- Water [air, unspecified]: 0.000762995 m3; name water_to_air_unspecified; = (water_completely_softened/1000)*fraction_WCS_to_air+(water_decarbonised_user/1000)*fraction_WDC_to_air+water_cooling_UNO_input*fraction_CW_to_air; lognormal variance with pedigree 0.130025, pedigree (4,4,5,2,4)
  Calculated value based on literature values and expert opinion. See comments in the parametres' comment field.
  property fraction, origin: fresh water 0.0416136; name fraction_origin_fresh_water
  property fraction, origin: salt water 0; name fraction_origin_salt_water
  property fraction, origin: unspecified 0.958386; name fraction_origin_unspecified
- Water [water, unspecified]: 0.0543519 m3; name water_to_water_unspecified; = (water_completely_softened/1000)*(1-fraction_WCS_to_air)+(water_decarbonised_user/1000)*(1-fraction_WDC_to_air)+water_cooling_UNO_input*(1-fraction_CW_to_air); lognormal variance with pedigree 0.130025, pedigree (4,4,5,2,4)
  (same comment as for Water)
  property fraction, origin: fresh water 0.0335624; name fraction_origin_fresh_water_Ww
  property fraction, origin: salt water 0; name fraction_origin_salt_water_Ww
  property fraction, origin: unspecified 0.966438; name fraction_origin_unspecified_Ww

## Sampling procedure
A literature review was carried out with a bottom-up approach of the natural gas, combined cycle, power plants in Colombia.

## Extrapolations
This dataset is based on: electricity production, natural gas, combined cycle power plant, GLO. The following parameters and exchanges were regionalized with data from Colombian power plants that account for 76% of the natural gas combined cycle, electricity production in Colombia in 2014.

Exchange amounts regionalizated: carbon dioxide, methane fossil, dinitrogen monoxide, nitrogen oxide, sulfur dioxide.

Parameters regionalizated: net electricity production and efficiency.

The cooling and feed water use has been taken over from datasets for electricity production with hard coal or lignite.
