# electric scooter production, without battery

Dataset: EcoSpold 2, unit process
Geography: GLO
Time period: 2005-01-01 to 2023-12-31
Technology level: current
Classification: ISIC rev.4 ecoinvent: 3091:Manufacture of motorcycles
Classification: EcoSpold01Categories: transport systems/road
Scenario: Business-as-Usual
System model: Allocation, cut-off by classification
Generated by: Andrea Del Duce
Database: ecoinvent
isCopyrightProtected: true
accessRestrictedTo: 1

## General comment
This dataset describes the assembly of the electric scooter without battery. It takes as input the two modules glider and drivetrain. The production efforts and disposal for the components are described in the respective datasets.

## Included activities start
The datset takes as input the two modules (glider and drivetrain) which build the vehicle without battery.

## Included activities end
The activity ends with the assembly of the scooter without battery and also includes the manual dismantling for the end of life of the used vehicle.

## Technology
The dataset is based on averages over passenger car technologies spanning from 2000 to 2010 which are expected to be representative up to 2015.

## Parameters
- glider weight: 80 kg; name glider_weight
- powertrain weight: 10.1 kg; name powertrain_weight

## Reference product
- electric scooter, without battery: 1 kg; = (glider_weight+powertrain_weight); By-product classification allocatable product; CPC 49913: Motorcycles and cycles fitted with an auxiliary motor, other than those with reciprocating internal combustion[…]; HS2017 8501: Electric motors and generators (excluding generating sets)
  Assembly of the scooter from glider and powertrain.
  production volume 6.998e7 kg
    Rough estimate based on 1% electric scooters out of 466E6 world two wheeler production projection between 2010 and 2016.(www.electric-bicycle-guide.com)
  property price 23.4651 EUR2005
    Calculated based on inputs: The price of the product has been calculated as a sum of the values of the material and energy inputs for this product. This value is therefore a rough estimation. It may underestimate the real price since there are additional expenses when producing any product. These expences can include for example labour costs, treatment of waste materials and profit for the producer. Please consider carefully whether this level of data quality is acceptable for your application.
  properties: carbon allocation 0 kg, carbon content 0

## Inputs from technosphere
- glider, for electric scooter: 0.887902 kg; = glider_weight; lognormal variance with pedigree 0.0444, pedigree (2,4,5,4,2)
  Estimate based on currently available scooters.
- manual dismantling of electric scooter: 1 unit; = (glider_weight+powertrain_weight); lognormal variance with pedigree 0.0838, pedigree (2,4,5,4,4)
  Manual dismantling of the used scooter.
- powertrain, for electric scooter: 0.112098 kg; = powertrain_weight; lognormal variance with pedigree 0.0444, pedigree (2,4,5,4,2)
  Estimate based on currently available scooters.

## Sampling procedure
Own assumptions based on currently available models.

## Extrapolations
No major changes are expected in commercially available scooter models until 2015.

## Review by Christian Bauer 2012-05-25
passed
