# flattened bamboo production

Dataset: EcoSpold 2, unit process
Geography: EC
Time period: 2010-01-01 to 2028-12-31
Technology level: current
Classification: ISIC rev.4 ecoinvent: 162:Manufacture of products of wood, cork, straw and plaiting materials
Scenario: Business-as-Usual
System model: Allocation, cut-off by classification
Generated by: K.Padron;E.Barros;J.Aguirre;S.Martines
Database: ecoinvent
isCopyrightProtected: true
accessRestrictedTo: 1

## General comment
This dataset represents the production of 1 kg of flattened bamboo. The input of bamboo pole is assumed to have a water content of u=16%. The production of flattened bamboo takes generally place at the same location where bamboo pole is produced. This process does generally not make use of power tools. It is usually done with hatchets or machetes instead. To produce flattened bamboo, a bamboo pole is cracked open and its internodes are removed. The innermost part of the bamboo is then trimmed down. During this process, some fibres are broken, rendering the material flexible but still able to maintain its shape. The main application of flattened bamboo is in load-bearing wall systems, where it is used between bamboo poles to support the soil-cement mortar with which the walls are plastered (Murphy et al., 2004; Zea Escamilla et al., 2013). Flattened bamboo is also used to produce woven bamboo mats. The figures origin from mainly calculations, a literature values and visits to production sites in Ecuador. This dataset was developed by Estefania Barros, Kristi Padrón, Jonnathan Aguirre and Juan Sebastian Martines, under the lead of Prof. Paul Vanegas and Prof. Dolores Sucozhañay from the Inclusive Circular Economy and Sustainable Development Research Group of the University of Cuenca (ECI) in the frame of the CEELA (Strengthening capacities for energy efficiency in buildings in Latin America) project with the support of the Swiss Agency for Development and Cooperation (SDC).
Ref:
Murphy, R.J., Trujillo, D., Londoño, X., 2004. Life cycle assessment (LCA) of a Guadua house. In: International Symposium of Bamboo - Guadua. Pereira, Colombia.
Zea Escamilla, E. and G. Habert, Environmental impacts from the production of bamboo based construction materials representing the global production diversity. Journal of Cleaner Production, 2013.

## Included activities start
From reception of bamboo pole at the processing facility.

## Included activities end
This activity ends with flattened bamboo (u=16%) at the processing facility. The dataset includes the inputs for trimming and processing. The dataset does not include infrastructure. This process is considered to be handcrafted, without use of power tools.

## Geography
Data for Ecuador, provided by a bamboo pole factory "Unodec ", located in Portoviejo, Ecuador.

## Technology
Current production technology

## Time period
Time period referring to the data source: 2010-2023. Based on expert opinion data is considered to be valid at least up to 2028.

## Parameters
- residue_fraction: 0.1 dimensionless

## Reference product
- flattened bamboo: 1 kg; name RP; By-product classification allocatable product; CPC 31212: Wood, continuously shaped along any of its edges or faces (including strips and friezes for parquet flooring, […]; HS2017 140110: Bamboo used primarily for plaiting
  production volume 213000 kg; name PV_RP; = 2.13E+05
    Production volume is expressed in kg. The production volume is a rough estimate based on the global production volume of woven bamboo mats assuming that all flattened bamboo is further processed into mats. 1.0697 kg of flattened bamboo is required to produce 1 kg of bamboo mat. The PV was scaled according to the global GDP and the Ecuadorian GDP for 2018 (retrieved from <https://unstats.un.org/unsd/snaama/Basic>, filtered for GDP, At current price- US Dollar, last accessed in February 2023).
    The PV for bamboo mats (540072 kg) is calculated based on the Chinese production volumes of woven bamboo mat panels. These are based on export data retrieved from INBAR (at <http://trade.inbar.int:10444/>, last accessed in December 2020). For more details, please refer to the documentation of the PV of “woven bamboo mat, CN”.
  property heating value, net 17.68 MJ
    Jetsada P. & Panmanas S. (2017),Evaluation of lower heating value and elemental composition of bamboo using near infrared spectroscopy,Energy,Volume 121,Pages 147-158,ISSN 0360-5442,https://doi.org/10.1016/j.energy.2017.01.020.
  property price 0.529363 EUR2005
    Based on expert judgement, price given as 0.64 USD/kg. Converted with an exchange rate of 1EURO = 1.209 USD.
  properties: carbon allocation 0.425862 kg, carbon content 0.494, carbon content, fossil 0, carbon content, non-fossil 0.494, dry mass 0.862069 kg, water content 0.16, water in wet mass 0.137931 kg, wet mass 1 kg

## Inputs from technosphere
- bamboo pole: 1.1 kg; = RP+ bamboo_residues; lognormal variance with pedigree 0.0046, pedigree (3,4,1,1,1)
  Refers to the round bamboo used, usually 3 to 6m in length
  properties: carbon content, non-fossil 0.494, dry mass 0.862069 kg, heating value, net 17.68 MJ, water content 0.16, wet mass 1 kg
  note on heating value, net: Jetsada P. & Panmanas S. (2017),Evaluation of lower heating value and elemental composition of bamboo using near infrared spectroscopy,Energy,Volume 121,Pages 147-158,ISSN 0360-5442,https://doi.org/10.1016/j.energy.2017.01.020.
- waste bamboo residues: -0.1 kg; name bamboo_residues; = residue_fraction * RP; lognormal variance with pedigree 0.0046, pedigree (3,4,1,1,1)
  Calculated value. Approximately 10% of waste is produced in bamboo pole production.
  production volume; = PV_RP*(bamboo_residues/RP)
    Calculated from production volume of reference product using the relative outputs.
  properties: carbon content, non-fossil 0.494, dry mass 0.862069 kg, heating value, net 17.68 MJ, water content 0.16, wet mass 1 kg

## Sampling procedure
This dataset has been copied and adjusted from the dataset "bamboo forestry, sustainable forest management, CO, 2010-2020" available in ecoinvent v.3.9.1. The uncertainty has been adjusted accordingly.

## Review by Fabio Valebona 2023-02-23
Dataset is very well documented, and the assumptions considered are reasonable.
