# softwood forestry, spruce, sustainable forest management

Dataset: EcoSpold 2, unit process
Geography: SE
Time period: 2010-01-01 to 2023-12-31
Technology level: current
Classification: ISIC rev.4 ecoinvent: 0220:Logging
Tags: Swiss brush-up completed; combined production,; combined production
Scenario: Business-as-Usual
System model: Allocation, cut-off by classification
Generated by: Frank Werner
Database: ecoinvent
isCopyrightProtected: true
accessRestrictedTo: 1

## General comment
This dataset covers the production and harvesting of 1 m3 of stemwood, spruce, solid, under bark, plus the relative share of enery wood from slash from sustainable forest management as the prevailing management practices in Sweden.
For Sweden forestry processes for the 3 main tree species are modelled:• hardwood: birch
• softwood: spruce
• softwood: pine
Table 1-1 lists the parameters of the inventoried tree species and their sources:

## Included activities start
The activity starts with site preparation assuming natural regeneration and/or planting including seedling production (as applicable for the species see general comments field) and includes all process related to forest management, including site preparation, planting, tending, young growth tending, clearing, thinnings and harvesting operations including the processing of wood fuel to chips, bundles and chopped wood (logs for energy) over one rotation period. It covers also the maintenance and construction of forest roads.

## Included activities end
This activity ends with the assortments at the forest road and includes eventual drying before transportation.

## Parameters
- Bark ratio: 0.12 dimensionless; name bark; lognormal variance with pedigree 0.025, pedigree (1,1,1,1,1)
  share of bark of total volume of trunk (solid wood + bark) for hardwood; U. Luginbühl, personal written communication, HIS
- area forest per m3 wood: 18.3803 m2/m3; name a_transformation_forest; = (10000-a_forest_road)*share_revenues_wood/yield_wood_ub
  area of forest per ha divided by total harvest over one rotation period per hectare
- area forest road: 37.9 m2/ha; name a_forest_road; lognormal variance with pedigree 0.2506, pedigree (2,1,1,1,1)
  213 000 km of forest roads (SLU 2008) at 4 m width, attributed to productive forest area of 22'477'000 ha (Skogsstyrelsen (2012): Swedish Statistical Yearbook of Forestry 2012. Skogsstyrelsen/Swedish Forst Agency, Jönköping.)
- area forest road in gravel: 37.9 m2/ha; name a_forest_road_gravel; = a_forest_road; lognormal variance with pedigree 0.2506, pedigree (2,1,1,1,1)
  assumed
- area forest road per m3 wood: 0.0699262 m2/m3; name a_transformation_road; = a_forest_road/yield_wood_ub
  area of forest road per ha divided by total harvest over one rotation period per hectare
- diesel consumption per m3 of harvested wood for maintenance of forest roads: 2.00582 MJ/m3; name diesel_for_maintenance_forest_roads
  diesel consumption per m3 of harvested wood for the maintenance of forest roads, attributing total diesel consumption over 1 rotation to total year over 1 rotation period; based on Svaeskog 2007 personal communicationl
- forwarding with forwarder per m3: 0.0445 PMH/m3; name forwarding_forwarder; lognormal variance with pedigree 0.2506, pedigree (2,1,1,1,1)
  referring to stemwood; IMPORTANT NOTE: When considering several harvesting systems, e.g. in datasets on national forestry, this parameter is NOT the inverse productivity of the harvesting system but the inverse productivity of the system weighted with the share of the amount harvested by the respective system. This has to be calculated outside EcoEditor. Own calculations based on Klvac, R. and A. Skoupy (2009): Characteristic fuel consumption and exhaust emissions in fully mechanized logging operations. Journal of Forest Research, 14(6): 328-334: referring to Freitas 2004; Skogforsk (2006): Fuel consumption in forestry continues to fall. Results from Skogforsk, Skogforsk, Uppsala; Berg, S. and T. Karjalainen (2003): Comparison of greenhouse gas emissions from forest operations in Finand and Sweden. Forestry, 76(3): 271-284.
- harvesting with forestry harvester: 0.0979 year; name harvesting; lognormal variance with pedigree 0.2506, pedigree (2,1,1,1,1)
  (same comment as for forwarding with forwarder per m3)
- moisture content bundles: 0.5 dimensionless; name moisture_bundles; lognormal variance with pedigree 0.2506, pedigree (2,1,1,1,1)
  kg water/kg dry mass. Eriksson, L. N. (2008): Comparative analyses of forest fuels in a life cycle perspective with a focus on transport systems. Resources, Conservation and Recycling, 52(2008): 1190–1197.
- moisture content cleft timber: 0.35 dimensionless; name moisture_cleft_timber; lognormal variance with pedigree 0.2506, pedigree (2,1,1,1,1)
  kg water/kg dry mass.
- moisture content pulpwood: 0.8 dimensionless; name moisture_pulpwood; lognormal variance with pedigree 0.2506, pedigree (2,1,1,1,1)
  kg water/kg dry mass. Schweinle, J. and C. Thoroe (2001): Vergleichende Ökobilanzierung der Rohholzproduktion in verschiedenen Forstbetrieben. Mitteilungen der Bundesforschungsanstalt für Forst- und Holzwirtschaft Nr. 204, Kommissionsverlag Max Wiedebusch, Hamburg.
- moisture content sawlogs and veneer logs: 0.7 dimensionless; name moisture_sawlogs; lognormal variance with pedigree 0.2506, pedigree (2,1,1,1,1)
  (same comment as for moisture content pulpwood)
- moisture content wood chips: 0.8 dimensionless; name moisture_wood_chips; lognormal variance with pedigree 0.2506, pedigree (2,1,1,1,1)
  kg water/kg dry mass. Based on Schweinle, J. and C. Thoroe (2001): Vergleichende Ökobilanzierung der Rohholzproduktion in verschiedenen Forstbetrieben. Mitteilungen der Bundesforschungsanstalt für Forst- und Holzwirtschaft Nr. 204, Kommissionsverlag Max Wiedebusch, Hamburg.
- planting density: 3000 unit; name planting_density; lognormal variance with pedigree 0.2506, pedigree (2,1,1,1,1)
  number of trees per hectare
- power sawing without catalytic converter per m3: 0.00276 PMH/m3; name power_sawing; lognormal variance with pedigree 0.2506, pedigree (2,1,1,1,1)
  referring to stemwod; IMPORTANT NOTE: When considering several harvesting systems, e.g. in datasets on national forestry, this parameter is NOT the inverse productivity of the harvesting system but the inverse productivity of the system weighted with the share of the amount harvested by the respective system. This has to be calculated outside EcoEditor. Own calculations based on Klvac, R. and A. Skoupy (2009): Characteristic fuel consumption and exhaust emissions in fully mechanized logging operations. Journal of Forest Research, 14(6): 328-334: referring to Freitas 2004; Skogforsk (2006): Fuel consumption in forestry continues to fall. Results from Skogforsk, Skogforsk, Uppsala; Berg, S. and T. Karjalainen (2003): Comparison of greenhouse gas emissions from forest operations in Finand and Sweden. Forestry, 76(3): 271-284.
- productivity energy wood harvester: 14.67 m3/PMH; name productivity_wood_fuel_harvester; = 9.0*ratio_bulk_solid_bundle; lognormal variance with pedigree 0.2506, pedigree (2,1,1,1,1)
  as m3 bulked/ productive machine hour; Kallio, M. and A. Leinonen (2005): Production technology of forest chips in Finland. VTT, Jyväskyla.
- productivity forwarding bundles of slash: 88 m3/PMH; name productivity_forwarding_bundles; lognormal variance with pedigree 0.2506, pedigree (2,1,1,1,1)
  as m3 bulked/ productive machine hour
- productivity forwarding wood chips from terrain chipper: 70 m3/PMH; name productivity_forwarding_chips_in_stand; lognormal variance with pedigree 0.2506, pedigree (2,1,1,1,1)
  as m3 bulked/ productive machine hour
- productivity mobile chipper: 120 m3/PMH; name productivity_mobile_chipper; lognormal variance with pedigree 0.2506, pedigree (2,1,1,1,1)
  as m3 bulked/ productive machine hour
- productivity terrain chipper: 25 m3/PMH; name productivity_terrain_chipper; lognormal variance with pedigree 0.2506, pedigree (2,1,1,1,1)
  as m3 bulked/ productive machine hour; based on Cremer, T. and B. Velazques-Marti (2007): Evaluation of two harvesting systems for the supply of wood-chips in Norway spurce forest affected by bark beetle. Croation Journal of Forest Engineering, 28(2): 145-155;
  referring to Lechner et al 2007
- productivity, clefting device: 5.26 m3/PMH; name productivity_clefting_device; lognormal variance with pedigree 0.2506, pedigree (2,1,1,1,1)
  as m3 bulked/ productive machine hour
- ratio bulk density / solid density of bundles: 1.63 dimensionless; name ratio_bulk_solid_bundle; lognormal variance with pedigree 0.2506, pedigree (2,1,1,1,1)
  as m3 bulked / m3 solid
- ratio bulk density / solid density of chips: 2.8 dimensionless; name ratio_bulk_solid_chips; lognormal variance with pedigree 0.2506, pedigree (2,1,1,1,1)
  as m3 bulked / m3 solid
- ratio bulk density / solid density of cleft timber: 1.4 dimensionless; name ratio_bulk_solid_cleft_timber; lognormal variance with pedigree 0.2506, pedigree (2,1,1,1,1)
  as m3 bulked / m3 solid
- rotation period: 80 year; name rotation_period; lognormal variance with pedigree 0.252, pedigree (3,1,1,1,1)
  number of years from planting to final harvest. Source: Sveaskog, personal communication
- share of area with mechanical site preparation: 1 dimensionless; name share_area_mechanical_site_preparation; lognormal variance with pedigree 0.2506, pedigree (2,1,1,1,1)
  e.g. forest area with and without mechanical site preparation for the establishment of a plantation
- share of bundles of total wood fuel: 0.102 dimensionless; name share_bundles; lognormal variance with pedigree 0.2506, pedigree (2,1,1,1,1)
  Share of bundles of total wood fuel harvested (referring consistently to volume under bark or volume over bark for all types of wood fuel); share_bundles + share_chopped_wood+share_chips = 100% wood fuel; calculated based on info from Swedish Forest Agency (http://www.skogsstyrelsen.se/en/AUTHORITY/Statistics/Subject-Areas/Wood-Fuel/Tables-and-figures/), confirmed as 10% of total chips from forest residues (Kärhä, K. (2011): Industrial supply chains and production machinery of forest chips in Finland. Biomass and Bioenergy, 35: 3404-3413.)
- share of chips of total wood fuel: 0.78 dimensionless; name share_chips; lognormal variance with pedigree 0.2506, pedigree (2,1,1,1,1)
  Share of chips of total wood fuel harvested (referring consistently to volume under bark or volume over bark for all types of wood fuel)share_bundles + share_chopped_wood+share_chips = 100% wood fuel; calculated based on info from Swedish Forest Agency (http://www.skogsstyrelsen.se/en/AUTHORITY/Statistics/Subject-Areas/Wood-Fuel/Tables-and-figures/), confirmed as 10% of total chips from forest residues (Kärhä, K. (2011): Industrial supply chains and production machinery of forest chips in Finland. Biomass and Bioenergy, 35: 3404-3413.)
- share of chips processed at forest road (from above-ground biomass): 0.889 dimensionless; name share_chips_at_forest_road; lognormal variance with pedigree 0.2506, pedigree (2,1,1,1,1)
  Share of chips processed at forest road of total amount of chips processed in the forest; share_chips_at _forest_road+share_chips_in_stand = 100% chips from forestry; Kärhä, K. (2011): Industrial supply chains and production machinery of forest chips in Finland. Biomass and Bioenergy, 35: 3404-3413.
- share of chips processed in stand (from above-ground biomass): 0.111 dimensionless; name share_chips_in_stand; lognormal variance with pedigree 0.2506, pedigree (2,1,1,1,1)
  Share of chips processed in the stand of total amount of chips processed in the forest; share_chips_at _forest_road+share_chips_in_stand = 100% chips from forestry; Kärhä, K. (2011): Industrial supply chains and production machinery of forest chips in Finland. Biomass and Bioenergy, 35: 3404-3413.
- share of cleft timber of total wood fuel: 0.118 dimensionless; name share_cleft_timber; lognormal variance with pedigree 0.2506, pedigree (2,1,1,1,1)
  Share of cleft timber as wood fuel of total wood fuel harvested (referring consistently to volume under bark or volume over bark for all types of wood fuel); share_bundles + share_cleft_timber+share_chips = 100% wood fuel; calculated based on info from Swedish Forest Agency (http://www.skogsstyrelsen.se/en/AUTHORITY/Statistics/Subject-Areas/Wood-Fuel/Tables-and-figures/), confirmed as 10% of total chips from forest residues (Kärhä, K. (2011): Industrial supply chains and production machinery of forest chips in Finland. Biomass and Bioenergy, 35: 3404-3413.)
- share of planted area: 1 dimensionless; name share_area_planted; lognormal variance with pedigree 0.2506, pedigree (2,1,1,1,1)
  Share of forest area that is planted instead of being restocked by natural regeneration
- share of pulpwood of total wood harvest: 0.43 dimensionless; name share_pulpwood; lognormal variance with pedigree 0.2506, pedigree (2,1,1,1,1)
  Share of pulpwood of total wood harvest (referring to volume below bark); share_sawlogs + share_pulpwood + share_wood_fuel = 100%; Own calculations based on Svaeskog, personal information, and Skogsstyrelsen (2012): Swedish Statistical Yearbook of Forestry 2012. Skogsstyrelsen/Swedish Forst Agency, Jönköping.
- share of sawlogs and veneer logs of total wood harvest: 0.498 dimensionless; name share_sawlogs; lognormal variance with pedigree 0.2506, pedigree (2,1,1,1,1)
  Share of sawlogs and veneer logs of total wood harvest (referring to volume below bark); share_sawlogs + share_pulpwood + share_wood_fuel = 100%; Own calculations based on Svaeskog, personal information, and Skogsstyrelsen (2012): Swedish Statistical Yearbook of Forestry 2012. Skogsstyrelsen/Swedish Forst Agency, Jönköping.
- share of seedlings from heated greenhouses: 0.296 dimensionless; name seedlings_heated
  share of seedlings from heated greenhouses of total amount of seedlings used in replanting
- share of wood fuel of total wood harvest: 0.072 dimensionless; name share_wood_fuel; lognormal variance with pedigree 0.2506, pedigree (2,1,1,1,1)
  Share of wood fuel of total wood harvest (referring to volume below bark); share_sawlogs + share_pulpwood + share_wood_fuel = 100%; Own calculations based on Svaeskog, personal information, and Skogsstyrelsen (2012): Swedish Statistical Yearbook of Forestry 2012. Skogsstyrelsen/Swedish Forst Agency, Jönköping.
- share, revenues wood production: 1 dimensionless; name share_revenues_wood; lognormal variance with pedigree 0.252, pedigree (3,1,1,1,1)
  Used to determine the share of land used for the productive function of forestry covered in this dataset
- shrinkage ratio: 0.004 dimensionless; name shrinkage_ratio; lognormal variance with pedigree 0.25, pedigree (1,1,1,1,1)
  for wood: % of volume lost per % of humidity lowered; usually applicable for humidity u < 30%; as oak according to Kollmann 1982
- skidding with skidder per m3: 0.00134 PMH/m3; name skidding; lognormal variance with pedigree 0.2506, pedigree (2,1,1,1,1)
  referring to stemwood; IMPROTANT NOTE: When considering several harvesting systems, e.g. in datasets on national forestry, this parameter is NOT the productivity of the harvesting system but the productivity of the system weighted with the share of the amount harvested by the respective system. This has to be calculated outside EcoEditor. Own calculations based on Klvac, R. and A. Skoupy (2009): Characteristic fuel consumption and exhaust emissions in fully mechanized logging operations. Journal of Forest Research, 14(6): 328-334: referring to Freitas 2004; Skogforsk (2006): Fuel consumption in forestry continues to fall. Results from Skogforsk, Skogforsk, Uppsala; Berg, S. and T. Karjalainen (2003): Comparison of greenhouse gas emissions from forest operations in Finand and Sweden. Forestry, 76(3): 271-284.
- sum of reference products in volume: 1 m3; name sum_RP_m3; lognormal variance with pedigree 0.005, pedigree (1,1,1,1,1)
  as solid under bark; DO NOT CHANGE; dataset might calculate misleading results
- wood density, basic: 378.4 kg/m3; name basic_wood_d; = dry_wood_d*(1-30*shrinkage_ratio); lognormal variance with pedigree 0.46, pedigree (5,5,5,5,5)
  kg oven-dry matter/wet volume
- wood density, dry: 430 kg/m3; name dry_wood_d; lognormal variance with pedigree 0.2506, pedigree (2,1,1,1,1)
  kg oven-dry matter/dry volume; Schweinle, J. (2000): Analyse und Bewertung der forstlichen Produktion als Grundlage für weiterführende forst- und holzwirtschaftliche Produktlinien-Analysen. Mitteilungen der Bundesforschungsanstalt für Forst- und Holzwirtschaft Hamburg, Komissionsverl. Max Wiedebusch, Hamburg.
- yield wood over rotation period: 542 m3; name yield_wood_ub; lognormal variance with pedigree 0.2506, pedigree (2,1,1,1,1)
  yield of wood under bark per ha over one rotation period

## Reference product
- wood chips, wet, measured as dry mass: 1 kg; name wood_chips; = share_wood_fuel*basic_wood_d/(1-bark)*share_chips; By-product classification allocatable product; CPC 31230: Wood in chips or particles; HS2017 4401: Fuel wood, in logs, billets, twigs, faggots or similar forms; wood in chip or particles; sawdust and wood was[...]
  average composition of 1 m3 solid wood under bark, harvested in Sweden; see general comment for details; calculated as the share of wood fuel from the total amount of wood harvested, of which a share is chips, converted from wet volume to dry matter via basic wood density, including the percentage of bark (as share of wood fuel relates to 1 m3 under bark)
  production volume 8.31229e8 kg; = 1933090* basic_wood_d/(1-bark)
    see general comments field
  property apparent wood density 681.12 kg/m3; name wood_chips_apparent_wood_d; = wood_chips_basic_wood_d*(1+moisture_wood_chips)
    wet mass/wet volume
  property basic wood density 378.4; name wood_chips_basic_wood_d; = dry_wood_d*(1-30*shrinkage_ratio)
    dry mass/wet volume
  property carbon content, non-fossil 0.494; name chips_C_content_non_fossil
  property dry mass 1 kg; name wood_chips_DM
  property dry wood density 430 kg/m3; name wood_chips_dry_wood_d; = dry_wood_d
    kg dry matter/ dry volume
  property heating value, gross 20.4 MJ; name wood_chips_Gross_Heat_Value
    gross (upper) heating (calorific) value
  property heating value, net 10.1911 MJ; name wood_chips_Net_Heat_Value; = wood_chips_Gross_Heat_Value-1.32-(20*moisture_wood_chips/(1+moisture_wood_chips))
    net (lower) heating (calorific) value
  property price 0.107 EUR2005
    Expert judgement (Urs Luginbühl, Swiss Sawmilling industry, personal communication in June 2014). Wood chips from softwood should have a price of 0.101 EUR/kg. Woodchips from hardwood should have a price of 0.112 EUR/kg. Average of these two values is used. Cross-reference; FAOSTAT database; http://faostat.fao.org/site/626/DesktopDefault.aspx?PageID=626#ancor; Average import/export prices of EU for 'chips and particles'. Price: 48.76 Euro/m3. The density of the wood chips is 650 kg/m3. The price is recalculated accordingly.
  property water content 0.8; = moisture_wood_chips
  property water in wet mass 0.8 kg; = wood_chips_WM-wood_chips_DM
  property wet mass 1.8 kg; name wood_chips_WM; = wood_chips_DM*(1+moisture_wood_chips)
  properties: carbon allocation 0.494 kg, carbon content 0.494, carbon content, fossil 0

## Inputs from technosphere
- diesel, burned in building machine: 0.024932 MJ; = saw_veneer_logs*diesel_for_maintenance_forest_roads/sum_RP_m3+pulpwood*diesel_for_maintenance_forest_roads/sum_RP_m3+wood_chips*(1-bark)/basic_wood_d*diesel_for_maintenance_forest_roads/sum_RP_m3+bundles*(1-bark)/basic_wood_d*diesel_for_maintenance_forest_roads/sum_RP_m3+cleft_timber*(1-bark)/cleft_timber_basic_wood_d*diesel_for_maintenance_forest_roads/sum_RP_m3+saw_veneer_logs*(share_area_planted*planting_density)/yield_wood_ub/500*7*0.84*42.6/sum_RP_m3+pulpwood*(share_area_planted*planting_density)/yield_wood_ub/500*7*0.84*42.6/sum_RP_m3+wood_chips*(1-bark)/basic_wood_d*(share_area_planted*planting_density)/yield_wood_ub/500*7*0.84*42.6/sum_RP_m3+bundles*(1-bark)/basic_wood_d*(share_area_planted*planting_density)/yield_wood_ub/500*7*0.84*42.6/sum_RP_m3+cleft_timber*(1-bark)/ cleft_timber_basic_wood_d*(share_area_planted*planting_density)/yield_wood_ub/500*7*0.84*42.6/sum_RP_m3+saw_veneer_logs*1*15*6*0.84*42.6/yield_wood_ub/sum_RP_m3+pulpwood*1*15*6*0.84*42.6/yield_wood_ub/sum_RP_m3+wood_chips*(1-bark)/basic_wood_d*1*15*6*0.84*42.6/yield_wood_ub/sum_RP_m3+bundles*(1-bark)/basic_wood_d*1*15*6*0.84*42.6/yield_wood_ub/sum_RP_m3+cleft_timber*(1-bark)/ cleft_timber_basic_wood_d*1*15*6*0.84*42.6/yield_wood_ub/sum_RP_m3; lognormal variance with pedigree 0.0336, pedigree (2,1,4,1,1)
  63.9 MJ diesel/m3 of wood for distribution of gravel for maintenance construction of forest roads over rotation period PLUS diesel for planting activities, productivity 500 seedlings/PMH, diesel consumption 7l/PMH, converted to MJ
  properties: UVEK_link_1 732, UVEK_relative_amount_1 1, heating value, net 1 MJ
  note on UVEK_link_1: to be used only in special submissions in coordination with ecoinvent and the Swiss FOEN
- forwarding, forwarder: 0.000109944 hour; = saw_veneer_logs*forwarding_forwarder/sum_RP_m3+pulpwood*forwarding_forwarder/sum_RP_m3+wood_chips*share_chips_at_forest_road*(1-bark)/basic_wood_d*forwarding_forwarder/sum_RP_m3+cleft_timber*(1-bark)/ cleft_timber_basic_wood_d*forwarding_forwarder/sum_RP_m3+wood_chips*share_chips_in_stand/basic_wood_d/(productivity_forwarding_chips_in_stand/ ratio_bulk_solid_chips)/11*9.5/sum_RP_m3+bundles/basic_wood_d/( productivity_forwarding_bundles/ ratio_bulk_solid_bundle)/11*9.5/sum_RP_m3+saw_veneer_logs*(1.1/11*18.2*share_area_mechanical_site_preparation)/yield_wood_ub/sum_RP_m3+pulpwood*(1.1/11*18.2*share_area_mechanical_site_preparation)/yield_wood_ub/sum_RP_m3+wood_chips*(1-bark)/basic_wood_d*(1.1/11*18.2*share_area_mechanical_site_preparation)/yield_wood_ub/sum_RP_m3+bundles*(1-bark)/basic_wood_d*(1.1/11*18.2*share_area_mechanical_site_preparation)/yield_wood_ub/sum_RP_m3+cleft_timber*(1-bark)/ cleft_timber_basic_wood_d*(1.1/11*18.2*share_area_mechanical_site_preparation)/yield_wood_ub/sum_RP_m3; lognormal variance with pedigree 0.0336, pedigree (2,1,4,1,1)
  average input per m3; see general comment for details; covers the forwarding of stemwood, the forwarding of chips chipped in the stand as well as bundles of energy wood plus mechanical site preparation
- gravel, crushed: 0.0170729 kg; = saw_veneer_logs*3979/yield_wood_ub/sum_RP_m3+pulpwood*3979/yield_wood_ub/sum_RP_m3+wood_chips*(1-bark)/basic_wood_d*3979/yield_wood_ub/sum_RP_m3+bundles*(1-bark)/basic_wood_d*3979/yield_wood_ub/sum_RP_m3+cleft_timber*(1-bark)/cleft_timber_basic_wood_d*3979/yield_wood_ub/sum_RP_m3; lognormal variance with pedigree 0.0336, pedigree (2,1,4,1,1)
  3979 kg gravel /ha of wood for maintenance and construction of forest roads over rotation period
  properties: UVEK_link_1 2312, UVEK_relative_amount_1 1, dry mass 1 kg, wet mass 1 kg
- harvesting, forestry harvester: 0.000227674 hour; = saw_veneer_logs*harvesting/sum_RP_m3+pulpwood*harvesting/sum_RP_m3+wood_chips*(1-bark)/basic_wood_d*harvesting/sum_RP_m3+bundles*(1-bark)/basic_wood_d*harvesting/sum_RP_m3+cleft_timber*(1-bark)/ cleft_timber_basic_wood_d*harvesting/sum_RP_m3; lognormal variance with pedigree 0.0336, pedigree (2,1,4,1,1)
  average input per m3; see general comment for details
- power sawing, without catalytic converter: 0.00013085 hour; = saw_veneer_logs*power_sawing/sum_RP_m3+pulpwood*power_sawing/sum_RP_m3+wood_chips*(1-bark)/basic_wood_d*power_sawing/sum_RP_m3+bundles*(1-bark)/basic_wood_d*power_sawing/sum_RP_m3+ cleft_timber*(1-bark)/cleft_timber_basic_wood_d*power_sawing/sum_RP_m3+saw_veneer_logs*(1*14+0*15+1*15)/yield_wood_ub/sum_RP_m3+pulpwood*(1*14+0*15+1*15)/yield_wood_ub/sum_RP_m3+wood_chips*(1-bark)/basic_wood_d*(1*14+0*15+1*15)/yield_wood_ub/sum_RP_m3+bundles*(1-bark)/basic_wood_d*(1*14+0*15+1*15)/yield_wood_ub/sum_RP_m3+ cleft_timber*(1-bark)/cleft_timber_basic_wood_d*(1*14+0*15+1*15)/yield_wood_ub/sum_RP_m3; lognormal variance with pedigree 0.0336, pedigree (2,1,4,1,1)
  average input per m3 covering hand-held gasoline-driven equipment used for site preparation, tending and pruning (attributing per ha values to total amount of wood harvested) as well as the amount of power sawing per harvested m3; see general comment for details
- skidding, skidder: 2.77037e-6 hour; = saw_veneer_logs*skidding/sum_RP_m3+pulpwood*skidding/sum_RP_m3+wood_chips*share_chips_at_forest_road*(1-bark)/basic_wood_d*skidding/sum_RP_m3+cleft_timber*(1-bark)/ cleft_timber_basic_wood_d*skidding/sum_RP_m3; lognormal variance with pedigree 0.0336, pedigree (2,1,4,1,1)
  average input per m3; see general comment for details
- tree seedling, for planting: 0.00381018 unit; = saw_veneer_logs*(share_area_planted*planting_density*seedlings_heated/yield_wood_ub)/sum_RP_m3+pulpwood*(share_area_planted*planting_density*seedlings_heated/yield_wood_ub)/sum_RP_m3+wood_chips*(1-bark)/basic_wood_d*(share_area_planted*planting_density*seedlings_heated/yield_wood_ub)/sum_RP_m3+bundles*(1-bark)/basic_wood_d*(share_area_planted*planting_density*seedlings_heated/yield_wood_ub)/sum_RP_m3+cleft_timber*(1-bark)/ cleft_timber_basic_wood_d*(share_area_planted*planting_density*seedlings_heated/yield_wood_ub)/sum_RP_m3; lognormal variance with pedigree 0.035, pedigree (3,1,4,1,1)
  calculated as 29.6% of the seedlings coming from heated greenhouses in Sweden
  properties: carbon content, non-fossil 0.494, dry mass 0.2 kg, water content 0.5, wet mass 0.3 kg
- tree seedling, for planting: 0.00906204 unit; = saw_veneer_logs*(share_area_planted*planting_density*(1-seedlings_heated)/yield_wood_ub)/sum_RP_m3+pulpwood*(share_area_planted*planting_density*(1-seedlings_heated)/yield_wood_ub)/sum_RP_m3+wood_chips*(1-bark)/basic_wood_d*(share_area_planted*planting_density*(1-seedlings_heated)/yield_wood_ub)/sum_RP_m3+bundles*(1-bark)/basic_wood_d*(share_area_planted*planting_density*(1-seedlings_heated)/yield_wood_ub)/sum_RP_m3+cleft_timber*(1-bark)/ cleft_timber_basic_wood_d*(share_area_planted*planting_density*(1-seedlings_heated)/yield_wood_ub)/sum_RP_m3; lognormal variance with pedigree 0.035, pedigree (3,1,4,1,1)
  calculated as 29.6% of the seedlings coming from heated greenhouses in Sweden
- wood chipping, chipper, mobile, diesel, at forest road: 5.48185e-5 hour; name chipping_mobile; = wood_chips*share_chips_at_forest_road/basic_wood_d*ratio_bulk_solid_chips/productivity_mobile_chipper; lognormal variance with pedigree 0.0336, pedigree (2,1,4,1,1)
  no comment
- wood chipping, forwarder with terrain chipper, in forest: 3.28541e-5 hour; name chipping_terrain; = wood_chips*share_chips_in_stand/basic_wood_d*ratio_bulk_solid_chips/productivity_terrain_chipper; lognormal variance with pedigree 0.0336, pedigree (2,1,4,1,1)
  no comment

## Inputs from nature
- Carbon dioxide, in air [natural resource, in air]: 1.81133 kg; = saw_veneer_logs/(1-bark)*basic_wood_d* saw_veneer_logs_C_content_non_fossil/12*44/sum_RP_m3+pulpwood/(1-bark)*basic_wood_d* pulpwood_C_content_non_fossil/12*44/sum_RP_m3+wood_chips* chips_C_content_non_fossil/12*44/sum_RP_m3+bundles* bundles_C_content_non_fossil/12*44/sum_RP_m3+cleft_timber* cleft_timber_C_content_non_fossil/12*44/sum_RP_m3; lognormal variance with pedigree 0.033, pedigree (1,1,4,1,1)
  Resource input, referring to total biomass harvested, i.e. wood including bark
- Energy, gross calorific value, in biomass [natural resource, biotic]: 20.4 MJ; = saw_veneer_logs/(1-bark)*saw_veneer_logs_basic_wood_d*saw_veneer_logs_Gross_Heat_Value/sum_RP_m3+pulpwood/(1-bark)*pulpwood_basic_wood_d*pulpwood_Gross_Heat_Value/sum_RP_m3+wood_chips*wood_chips_Gross_Heat_Value/sum_RP_m3+bundles*bundles_Gross_Heat_Value/sum_RP_m3+cleft_timber*cleft_timber_Gross_Heat_Value/sum_RP_m3
  Energy content of wood
- Occupation, forest, intensive [natural resource, land]: 3.41958 m2*year; = saw_veneer_logs*(a_transformation_forest*rotation_period)/sum_RP_m3+pulpwood*(a_transformation_forest*rotation_period)/sum_RP_m3+wood_chips*(1-bark)/basic_wood_d*(a_transformation_forest*rotation_period)/sum_RP_m3+bundles*(1-bark)/basic_wood_d*(a_transformation_forest*rotation_period)/sum_RP_m3+cleft_timber*(1-bark)/ cleft_timber_basic_wood_d*(a_transformation_forest*rotation_period)/sum_RP_m3; lognormal variance with pedigree 0.208, pedigree (1,1,4,1,1)
  Area occupied for the production of wood over one rotation period
- Occupation, traffic area, rail/road embankment [natural resource, land]: 0.0130095 m2*year; = saw_veneer_logs*a_transformation_road*rotation_period/sum_RP_m3+pulpwood*a_transformation_road*rotation_period/sum_RP_m3+wood_chips*(1-bark)/basic_wood_d*a_transformation_road*rotation_period/sum_RP_m3+bundles*(1-bark)/basic_wood_d*a_transformation_road*rotation_period/sum_RP_m3+cleft_timber*(1-bark)/ cleft_timber_basic_wood_d*a_transformation_road*rotation_period/sum_RP_m3; lognormal variance with pedigree 0.208, pedigree (1,1,4,1,1)
  Area occupied by forest roads over one roation period
- Transformation, from forest, intensive [natural resource, land]: 0.0427448 m2; = saw_veneer_logs*((10000-a_forest_road)/yield_wood_ub*share_revenues_wood)/sum_RP_m3+pulpwood*((10000-a_forest_road)/yield_wood_ub*share_revenues_wood)/sum_RP_m3+wood_chips*(1-bark)/basic_wood_d*((10000-a_forest_road)/yield_wood_ub*share_revenues_wood)/sum_RP_m3+bundles*(1-bark)/basic_wood_d*((10000-a_forest_road)/yield_wood_ub*share_revenues_wood)/sum_RP_m3+cleft_timber*(1-bark)/ cleft_timber_basic_wood_d*((10000-a_forest_road)/yield_wood_ub*share_revenues_wood)/sum_RP_m3; lognormal variance with pedigree 0.358, pedigree (1,1,4,1,1)
  Area of forest, excluding forest roads per ha
- Transformation, from traffic area, rail/road embankment [natural resource, land]: 0.000162619 m2; = saw_veneer_logs*a_forest_road/yield_wood_ub/sum_RP_m3+pulpwood*a_forest_road/yield_wood_ub/sum_RP_m3+wood_chips*(1-bark)/basic_wood_d*a_forest_road/yield_wood_ub/sum_RP_m3+bundles*(1-bark)/basic_wood_d*a_forest_road/yield_wood_ub/sum_RP_m3+cleft_timber*(1-bark)/ cleft_timber_basic_wood_d*a_forest_road/yield_wood_ub/sum_RP_m3; lognormal variance with pedigree 0.358, pedigree (1,1,4,1,1)
  Area of forest roads per ha
- Transformation, to forest, intensive [natural resource, land]: 0.0427448 m2; = saw_veneer_logs*((10000-a_forest_road)/yield_wood_ub*share_revenues_wood)/sum_RP_m3+pulpwood*((10000-a_forest_road)/yield_wood_ub*share_revenues_wood)/sum_RP_m3+wood_chips*(1-bark)/basic_wood_d*((10000-a_forest_road)/yield_wood_ub*share_revenues_wood)/sum_RP_m3+bundles*(1-bark)/basic_wood_d*((10000-a_forest_road)/yield_wood_ub*share_revenues_wood)/sum_RP_m3+cleft_timber*(1-bark)/ cleft_timber_basic_wood_d*((10000-a_forest_road)/yield_wood_ub*share_revenues_wood)/sum_RP_m3; lognormal variance with pedigree 0.358, pedigree (1,1,4,1,1)
  no comment
- Transformation, to traffic area, rail/road embankment [natural resource, land]: 0.000162619 m2; = saw_veneer_logs*a_forest_road/yield_wood_ub/sum_RP_m3+pulpwood*a_forest_road/yield_wood_ub/sum_RP_m3+wood_chips*(1-bark)/basic_wood_d*a_forest_road/yield_wood_ub/sum_RP_m3+bundles*(1-bark)/basic_wood_d*a_forest_road/yield_wood_ub/sum_RP_m3+cleft_timber*(1-bark)/ cleft_timber_basic_wood_d*a_forest_road/yield_wood_ub/sum_RP_m3; lognormal variance with pedigree 0.358, pedigree (1,1,4,1,1)
  no comment
- Wood, soft, standing [natural resource, biotic]: 0.00232558 m3; name v_wood_standing; = saw_veneer_logs/sum_RP_m3+pulpwood/sum_RP_m3+wood_chips*(1-bark)/basic_wood_d/sum_RP_m3+bundles*(1-bark)/basic_wood_d/sum_RP_m3+cleft_timber*(1-bark)/ cleft_timber_basic_wood_d/sum_RP_m3; lognormal variance with pedigree 0.033, pedigree (1,1,4,1,1)
  Resource input, referring to wood under bark

## Sampling procedure
Literature

## Extrapolations
see Geography and Technology
