# photovoltaic panel production, multi-Si wafer

Dataset: EcoSpold 2, unit process
Geography: RoW
Time period: 2005-01-01 to 2023-12-31
Technology level: current
Classification: EcoSpold01Categories: photovoltaic/production of components
Classification: ISIC rev.4 ecoinvent: 2610:Manufacture of electronic components and boards
Synonyms: polycrystalline; silicon; multi-crystalline; Solarmodul; PV-module
Tags: ConvertedDataset
Scenario: Business-as-Usual
System model: Allocation, cut-off by classification
Share of production covered: 5 %
Generated by: Niels Jungbluth
Published in: Jungbluth, N. 2007
Database: ecoinvent
isCopyrightProtected: true
accessRestrictedTo: 1

## General comment
Unit process raw data for 1 m2 of PV panel. Investigated for the production of solar panels and laminates with 60 solar cells a 156*156cm2 with a capacity of 210Wp. Cell size and amount and capacity might differ between different producers.
[This dataset was already contained in the ecoinvent database version 2. It was not individually updated during the transfer to ecoinvent version 3. Life Cycle Impact Assessment results may still have changed, as they are affected by changes in the supply chain, i.e. in other datasets. This dataset was generated following the ecoinvent quality guidelines for version 2. It may have been subject to central changes described in the ecoinvent version 3 change report (http://www.ecoinvent.org/database/ecoinvent-version-3/reports-of-changes/), and the results of the central updates were reviewed extensively. The changes added e.g. consistent water flows and other information throughout the database. The documentation of this dataset can be found in the ecoinvent reports of version 2, which are still available via the ecoinvent website. The change report linked above covers all central changes that were made during the conversion process.]

## Included activities end
Production of the cell matrix, cutting of foils and washing of glass, production of laminate, isolation. Aluminium frame of the panel. Disposal after end of life. Data for direct air and water emissions were not available. It can be expected that small amount of NMVOC will be emitted from the lamination process.

## Geography
Production plants in Western Europe.

## Technology
Modern production plant.

## Time period
Date of data investigation. Some older data from 2001.

## Parameters
- fraction, process water, to air: 0.15 dimensionless; name fraction_PW_to_air; lognormal variance with pedigree 0.092025, pedigree (4,4,3,2,4)
- fraction, tap water, to air: 0.15 dimensionless; name fraction_TW_to_air; lognormal variance with pedigree 0.092025, pedigree (4,4,3,2,4)

## Reference product
- photovoltaic panel, multi-Si wafer: 1 m2; By-product classification allocatable product; CPC 47150: Diodes, transistors and similar semi-conductor devices; photosensitive semi-conductor devices; light emitting […]; HS2017 854140: Electrical apparatus; photosensitive, including photovoltaic cells, whether or not assembled in modules or [...]
  EcoSpold01Location=RER
  production volume 5.78501e6 m2
    156*156cm2 with a capacity of 210 Wp (Tab 8.4, ecoinvent v2 report 6_XII). Total production worldwide of panels is 1500MW in 2005. Tab 12.6 (ecoinvent v2 report 6_XII) gives the share of the different types of photovoltaic cells, that was assumed as the share of the different panels.
  property price 488 EUR2005
    The production volume of this product is small compared to other products supplied by the activities within the same ISIC 3 category. Therefore, an average price of products supplied by the activities in the same ISIC 3 code has been applied.This price is obtained as '_69 Radio, television and communication equipment, EU27' in the 'EU & DK Input Output Database' (available in SimaPro, 19.28 EUR2003 per kg DS). The price is assumed to be valid for both RER2005, world 2005. Weight of product according to Ecoinvent: approx 25.5 kg per m2.
  properties: carbon allocation 0 kg, carbon content 0

## Inputs from technosphere
- 1-propanol: 0.0081386 kg; lognormal variance with pedigree 0.044, pedigree (1,4,5,5,1)
  De Wild 2007, soldering flux, 95% propanol
  EcoSpold01Location=RER
  Uncertainty: de Wild 2007, soldering flux, 95% propanol
  properties: carbon content, fossil 0.6, dry mass 1 kg, heating value, net 34.3 MJ, wet mass 1 kg
- acetone, liquid: 0.012959 kg; lognormal variance with pedigree 0.044, pedigree (1,4,5,5,1)
  De Wild 2007, cleaning fluid
  EcoSpold01Location=RER
  Uncertainty: de Wild 2007, cleaning fluid
  properties: carbon content, fossil 0.62069, dry mass 1 kg, heating value, net 31.32 MJ, wet mass 1 kg
- aluminium alloy, AlMg3: 2.6294 kg; lognormal variance with pedigree 0.044, pedigree (1,4,5,5,1)
  EcoSpold01Location=RER
  De Wild 2007, profile for frame
  Uncertainty: de Wild 2007, profile for frame
  properties: dry mass 1 kg, wet mass 1 kg
- brazing solder, cadmium free: 0.0087647 kg; lognormal variance with pedigree 0.044, pedigree (1,4,5,5,1)
  De Wild 2007, Sn60Pb40 plating on tabbing material, Sn plating on interconnect/terminal ribbons
  EcoSpold01Location=RER
  Uncertainty: de Wild 2007, Sn60Pb40 plating on tabbing material, Sn plating on interconnect/terminal ribbons
  properties: dry mass 1 kg, wet mass 1 kg
- copper, cathode: 0.11269 kg; lognormal variance with pedigree 0.044, pedigree (1,4,5,5,1)
  EcoSpold01Location=RER
  De Wild 2007, copper ribbons for cell interconnection
  Uncertainty: de Wild 2007, copper ribbons for cell interconnection
  properties: dry mass 1 kg, wet mass 1 kg
- corrugated board box: 0.340283, 0.0126756, 0.742641 kg (3 suppliers, which the file names only by identifier); sum of these 1.0956 kg; lognormal variance with pedigree 0.044, pedigree (1,4,5,5,1)
  De Wild 2007, packaging estimation
  EcoSpold01Location=RER
  Uncertainty: de Wild 2007, packaging estimation
  properties: carbon content, fossil 0.000656085, carbon content, non-fossil 0.432275, dry mass 0.945 kg, heating value, net 12.86 MJ, water content 0.0582011, wet mass 1 kg
  note on carbon content, fossil: Fossil C content was calculated after fossil C contents of chemicals used in the production of board (Tab 10-15 & 10.16 ecoinvent v2.2 report 11_III, part 10)
  note on carbon content, non-fossil: Biogenic C content was calculated after biogenic C contents of chemicals used in the production of board (Tab 10.15 & 10.16, ecoinvent v2.2 report 11_III, part 10).
- electricity, medium voltage: 0.15655, 3.12282, 1.04926, 0.0479409, 0.00959532, 0.00206033, 0.322479 kWh (7 suppliers, which the file names only by identifier); sum of these 4.7107 kWh; lognormal variance with pedigree 0.0446, pedigree (3,3,5,5,1)
  Calculated mean figure of 3 companies
  EcoSpold01Location=UCTE
  Uncertainty: calculated mean figure of 3 companies
- ethylvinylacetate, foil: 1.0017 kg; lognormal variance with pedigree 0.044, pedigree (1,4,5,5,1)
  EcoSpold01Location=RER
  De Wild 2007, EVA consumption 0.96 kg/m2, 6% more than glass area
  Uncertainty: de Wild 2007, EVA consumption 0.96 kg/m2, 6% more than glass area
  properties: carbon content, fossil 0.79734, dry mass 1 kg, heating value, net 35.99 MJ, wet mass 1 kg
  note on carbon content, fossil: Ethylene vinyl acetate copolymer contains 20% of vinyl acetate (ecoinvent v2.2 report 11_II)
- glass fibre reinforced plastic, polyamide, injection moulded: 0.18781 kg; lognormal variance with pedigree 0.044, pedigree (1,4,5,5,1)
  De Wild 2007, polyphenylenoxid for junction box
  EcoSpold01Location=RER
  Uncertainty: de Wild 2007, polyphenylenoxid for junction box
  properties: carbon content, fossil 0.446018, dry mass 1 kg, wet mass 1 kg
  note on carbon content, fossil: Polyamide resin assimilate to Nylon 66 (ecoinvent v2.2 report 7_XIII). Nylon 66 is derived from hexamethylene diamine and adipic acid and has the following structure: -(HN-(CH2)6-NH-CO-(CH2)4-CO)n- (ecoinvent v2.2 report 11_II), C12H22N2O2. MW=226 g/mol. Here Nylon 66 is – mainly for improved stiffness and stability – modified with glass fibres. The glass fibre content in the product is assumed of 30%. (ecoinvent v2.2 report 11_II)
- heat, district or industrial, natural gas: 0.0786745, 4.78772 MJ (2 suppliers, which the file names only by identifier); sum of these 4.86639 MJ; lognormal variance with pedigree 0.0446, pedigree (3,3,5,5,1)
  EcoSpold01Location=RER
  Calculated mean figure of 3 companies
  Uncertainty: calculated mean figure of 3 companies
  properties: heating value, net 1 MJ
- lubricating oil: 0.0016069 kg; lognormal variance with pedigree 0.044, pedigree (1,4,5,5,1)
  GSS 2001, auxiliary material
  EcoSpold01Location=RER
  Uncertainty: GSS 2001, auxiliary material
  properties: carbon content, fossil 0.75, dry mass 1 kg, heating value, net 40.2 MJ, wet mass 1 kg
  note on carbon content, fossil: Lubricating oil is produced from diesel. C-content/dry mass of fats and oils considered 75%, from: ecoinvent v2.2 report, n 15a, pg 40
  note on heating value, net: Literature value, Source: IPCC 2006, 2006 IPCC Guidelines for National Greenhouse Gas Inventories, Prepared by the National Greenhouse Gas Inventories Programme, Eggleston H.S., Buendia L., Miwa K., Ngara T. and Tanabe K. (eds). Published: IGES, Japan
- methanol: 0.000690229, 0.00133859, 0.000126779 kg (3 suppliers, which the file names only by identifier); sum of these 0.0021556 kg; lognormal variance with pedigree 0.044, pedigree (1,4,5,5,1)
  GSS 2001, auxiliary material
  EcoSpold01Location=CH
  Uncertainty: GSS 2001, auxiliary material
  properties: carbon content, fossil 0.375, dry mass 1 kg, heating value, net 20 MJ, wet mass 1 kg
  note on heating value, net: Based on literature, page 533, Report 17: Jungbluth, N., Chudacoff, M., Dauriat, A., Dinkel, F., Doka, G., Faist Emmenegger, M., Gnansounou, E., Kljun, N., Schleiss, K., Spielmann, M., Stettler, C., Sutter, J. 2007: Life Cycle Inventories of Bioenergy. ecoinvent report No. 17, Swiss Centre for Life Cycle Inventories, Dübendorf, CH.
- municipal solid waste: -5.27485e-5, -6.26365e-6, -3.89834e-5, -0.0297607, -4.38306e-6, -1.40688e-6, -3.17994e-6, -0.000132382 kg (8 suppliers, which the file names only by identifier); sum of these -0.03 kg; lognormal variance with pedigree 0.004, pedigree (1,4,1,5,1)
  Alsema (personal communication) 2007, production waste
  EcoSpold01Location=CH
  Uncertainty: Alsema (personal communication) 2007, production waste
  production volume
    Calculated from the production volume of photovoltaic panel, multi-Si wafer in proportion to the respective output amounts.
  properties: carbon content, fossil 0.171549, carbon content, non-fossil 0.261655, dry mass 0.771 kg, heating value, net 11.74 MJ, water content 0.297017, wet mass 1 kg
  note on carbon content, fossil: MSW composition in tab 4.1, ecoinvent v2.2 report 13_I. C content referred to 1 kg DM
  note on heating value, net: Value taken from the general comment of the treatment dataset.
- nickel, class 1: 0.00016277 kg; lognormal variance with pedigree 0.044, pedigree (1,4,5,5,1)
  EcoSpold01Location=GLO
  De Wild 2007, plating on interconnect ribbons
  Uncertainty: de Wild 2007, plating on interconnect ribbons
  properties: dry mass 1 kg, wet mass 1 kg
- photovoltaic cell, multi-Si wafer: 0.93241 m2; lognormal variance with pedigree 0.044, pedigree (1,4,5,5,1)
  EcoSpold01Location=RER
  De Wild 2007, Estimation 60 cells a 1.56dm2 +2% cell loss
  Uncertainty: de Wild 2007, Estimation 60 cells a 1.56dm2 +2% cell loss
  properties: carbon content, fossil 0.0139333, dry mass 0.68 kg, wet mass 0.68 kg
  note on carbon content, fossil: C content was calculated as the addition of C content in the components
- photovoltaic panel factory: 4e-6 unit; lognormal variance with pedigree 0.344, pedigree (1,4,5,5,1)
  EcoSpold01Location=GLO
  Literature
  Uncertainty: Literature
- polyethylene terephthalate, granulate, amorphous: 0.37297 kg; lognormal variance with pedigree 0.044, pedigree (1,4,5,5,1)
  De Wild 2007, back foil, for solar cell module, 350 micron thickness: 2x37 micron polyvinyl fluoride, 250 micron polyethylene terephthalate; 0.488 g/m2, 7% cutting loss
  EcoSpold01Location=RER
  Uncertainty: de Wild 2007, back foil, for solar cell module, 350 micron thickness: 2x37 micron polyvinyl fluoride, 250 micron polyethylene terephthalate; 0.488 g/m2, 7% cutting loss
  properties: carbon content, fossil 0.625, dry mass 1 kg, heating value, net 22.95 MJ, wet mass 1 kg
  note on carbon content, fossil: Polymer of the ethylen terephtalate monomer (C10H8O4)n (ecoinvent v2.2 report 11_II), MW=192 g/mol
- polyvinylfluoride, film: 0.1104 kg; lognormal variance with pedigree 0.044, pedigree (1,4,5,5,1)
  EcoSpold01Location=US
  De Wild 2007, back foil, for solar cell module, 350 micron thickness: 2x37 micron polyvinyl fluoride, 250 micron polyethylene terephthalate; 0.488 g/m2, 7% cutting loss
  Uncertainty: de Wild 2007, back foil, for solar cell module, 350 micron thickness: 2x37 micron polyvinyl fluoride, 250 micron polyethylene terephthalate; 0.488 g/m2, 7% cutting loss
  properties: carbon content, fossil 0.521739, dry mass 1 kg, heating value, net 23.7 MJ, wet mass 1 kg
- silicone product: 0.12195 kg; lognormal variance with pedigree 0.044, pedigree (1,4,5,5,1)
  EcoSpold01Location=RER
  De Wild 2007, kit to attach frame and junction box and for diaphragm of laminator
  Uncertainty: de Wild 2007, kit to attach frame and junction box and for diaphragm of laminator
  properties: carbon content, fossil 0.324324, dry mass 1 kg, heating value, net 9.83 MJ, wet mass 1 kg
  note on carbon content, fossil: The term silicones is used for compounds in which silicon atoms are linked via oxygen atoms, each silicon atom bearing one or several organic groups. In industrially important silicones, these groups are usually methyl or phenyl (ecoinvent v2.2 report 8_part71 & Ullmann). The chemical formula was considered to be [Si(CH3)2O]n (Ullmann).
- solar glass, low-iron: 10.079 kg; lognormal variance with pedigree 0.062, pedigree (1,4,5,5,3)
  EcoSpold01Location=RER
  De Wild 2007, 4mm thickness (3.2-4 mm for different producers), 1% losses, density 2.5 g/cm3
  Uncertainty: de Wild 2007, 4mm thickness (3.2-4 mm for different producers), 1% losses, density 2.5 g/cm3
  properties: dry mass 1 kg, wet mass 1 kg
- tap water: 0.0432397, 0.0659152, 0.122995, 0.331338, 0.0398842, 1.66212, 19.0205 kg (7 suppliers, which the file names only by identifier); sum of these 21.286 kg; lognormal variance with pedigree 0.044, pedigree (1,4,5,5,1)
  De Wild 2007, glass rinsing and general use
  EcoSpold01Location=RER
  Uncertainty: de Wild 2007, glass rinsing and general use
  properties: carbon content, fossil 0.00178991, dry mass 0.000337476 kg, water content 2962.17, wet mass 1 kg
  note on carbon content, fossil: Bicarbonate content is 2.93 mol/m3. CO2 content is 0.1 mol/m3 (ecoinvent v2.2 report 8, Tab 93.1).
- tempering, flat glass: 10.079 kg; lognormal variance with pedigree 0.044, pedigree (1,4,5,5,1)
  De Wild 2007
  EcoSpold01Location=RER
  Uncertainty: de Wild 2007
- vinyl acetate: 0.0016434 kg; lognormal variance with pedigree 0.044, pedigree (1,4,5,5,1)
  EcoSpold01Location=RER
  GSS 2001, ethylacetat, auxiliary material
  Uncertainty: GSS 2001, ethylacetat, auxiliary material
  properties: carbon content, fossil 0.55814, dry mass 1 kg, heating value, net 25.35 MJ, wet mass 1 kg
  note on carbon content, fossil: Vinyl acetate (CH3CO2CH=CH2) (ecoinvent v2.2 report 11_II), C4H6O2. MW=86 g/mol
- waste mineral oil: -0.0016069 kg; lognormal variance with pedigree 0.004, pedigree (1,4,1,5,1)
  Calculation, oil used during production
  EcoSpold01Location=CH
  Uncertainty: Calculation, oil used during production
  production volume
    (same comment as for municipal solid waste)
  properties: carbon content, fossil 0.864444, dry mass 0.9 kg, heating value, net 34.7 MJ, water content 0.111111, wet mass 1 kg
  note on carbon content, fossil: Tab A.6, ecoinvent v2.2 report 13_I. C content has been calculated after data in the tables, and then referred to 1 kg DM
- waste plastic, mixture: -0.000446887, -0.000424361, -1.66769, -0.016193, -0.00108196, -0.000180537, -8.18266e-5 kg (7 suppliers, which the file names only by identifier); sum of these -1.6861 kg; lognormal variance with pedigree 0.004, pedigree (1,4,1,5,1)
  Calculation, including disposal of the panel after life time
  EcoSpold01Location=CH
  Uncertainty: Calculation, including disposal of the panel after life time
  production volume
    (same comment as for municipal solid waste)
  properties: carbon content, fossil 0.747344, dry mass 0.847 kg, heating value, net 30.79 MJ, water content 0.180638, wet mass 1 kg
  note on carbon content, fossil: C content in 1 kg DM was calculated using data in Tab A.2, ecoinvent v2.2 report 13_I
- waste polyvinylfluoride: -0.1104 kg; lognormal variance with pedigree 0.004, pedigree (1,4,1,5,1)
  EcoSpold01Location=CH
  Calculation, including disposal of the panel after life time
  Uncertainty: Calculation, including disposal of the panel after life time
  production volume
    (same comment as for municipal solid waste)
  properties: carbon content, fossil 0.571142, dry mass 0.998 kg, heating value, net 27.89 MJ, water content 0.00200401, wet mass 1 kg
- wastewater, average: -0.0212105, -7.55174e-5 m3 (2 suppliers, which the file names only by identifier); sum of these -0.021286 m3; lognormal variance with pedigree 0.004, pedigree (1,4,1,5,1)
  Calculation, water use
  EcoSpold01Location=CH
  Uncertainty: Calculation, water use
  production volume
    (same comment as for municipal solid waste)
  properties: carbon content, non-fossil 0.194039, dry mass 0.346837 kg, mass concentration, TOC 0.1091 kg/m3, mass concentration, calcium 0.039453 kg/m3, mass concentration, chlorine 0.030031 kg/m3, mass concentration, hydrogen 0.013365 kg/m3, mass concentration, nitrogen 0.031015 kg/m3, mass concentration, oxygen 0.069824 kg/m3, mass concentration, sodium 0.06456 kg/m3, mass concentration, sulfur 0.015602 kg/m3, water content 2882.2, wet mass 1000 kg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
  note on carbon content, non-fossil: 0.0673 kg TOC/m3 (Tab A.17, ecoinvent v2.2 report 13_I). TOC was considered as Total Carbon.
- wire drawing, copper: 0.11269 kg; lognormal variance with pedigree 0.044, pedigree (1,4,5,5,1)
  EcoSpold01Location=RER
  Estimation for use of copper wires
  Uncertainty: estimation for use of copper wires

## Emissions to nature
- Water [air, unspecified]: 0.0031929 m3; name water_to_air_unspecified; lognormal variance with pedigree 0.0827, pedigree (2,2,5,5,1)
  Calculated value based on literature values and expert opinion. See comments in the parametres' comment field.
  property fraction, origin: fresh water 1; name fraction_origin_fresh_water
  property fraction, origin: salt water 0; name fraction_origin_salt_water
  property fraction, origin: unspecified 0; name fraction_origin_unspecified

## Sampling procedure
Environmental reports, direct contacts with factory representatives and publication of plant data.

## Extrapolations
Rough assumption for the use of heat in the process. This dataset has been copied from an original dataset covering the geography RER. The uncertainty has been adjusted accordingly.

## Review by Roberto Dones 2007-08-23
Passed.
none
