# battery management system production, for Li-ion battery

Dataset: EcoSpold 2, unit process
Geography: GLO
Time period: 2014-01-01 to 2023-12-31
Technology level: current
Classification: ISIC rev.4 ecoinvent: 2720:Manufacture of batteries and accumulators
Scenario: Business-as-Usual
System model: Allocation, cut-off by classification
Generated by: Eleonora Crenna
Published in: Ellingsen, L.A.W. 2014
Database: ecoinvent
isCopyrightProtected: true
accessRestrictedTo: 1

## General comment
This dataset represents the production of 1 kg of Battery Managment System (BMS), which is part of the Li-ion battery pack. The BMS is modelled according to the publication of Ellingsen et al. (2014). See technology comment for further details.
Reference:
Ellingsen, L. A. W., Majeau‐Bettez, G., Singh, B., Srivastava, A. K., Valøen, L. O., & Strømman, A. H. (2014). Life cycle assessment of a lithium‐ion battery vehicle pack. Journal of Industrial Ecology, 18(1), 113-124.

## Included activities start
The activity starts when the battery module boards, the integrated battery interface system, the low and the high voltage systems enter the factory.

## Included activities end
The activity ends with the production of the battery management system at the factory gate.

## Geography
Original data were provided by the battery producer Miljøbil Grenland, located in Norway, for a Li-ion battery for use in electric vehicles. (Ellingsen et al. 2014, Life cycle assessment of a lithium‐ion battery vehicle pack. Journal of Industrial Ecology, 18(1), 113-124). This dataset can be considered representative of the global production of battery management systems. Geography uncertainty has been adjusted accordingly.

## Technology
The battery management system is an electronic component in a lithium-ion battery. It includes battery module boards (BMB), the integrated battery interface system (IBIS) and fasteners, high voltage (HV) system, and low voltage system. BMB are placed under module lids, situated between two rows of busbars and their functions is to monitor the battery cells for voltage and temperature limits, whereas the IBIS acts as a master controller for the BMB.

## Time period
The time period is from 2014 (year of the publication of data) and 2020 (year of the dataset)

## Reference product
- battery management system, for Li-ion battery: 1 kg; By-product classification allocatable product; CPC 46430: Parts of primary cells, primary batteries and electric accumulators (including separators); HS2017 850690: Cells and batteries; primary, parts thereof
  production volume 4.79806e6 kg; = 191922359 *0.025
    The PV is expressed in kg. According to UN Comtrade (https://comtrade.un.org/data/, HS code: 850760) 191922359 kg Li-ion batteries were exported from China in 2019. The battery management system represents on average 2.5% weight of a Li-ion battery battery.
  property price 69.5489 EUR2005
    Calculated based on inputs: The price of the product has been calculated as a sum of the values of the material and energy inputs for this product. This value is therefore a rough estimation. It may underestimate the real price since there are additional expenses when producing any product. These expences can include for example labour costs, treatment of waste materials and profit for the producer. Please consider carefully whether this level of data quality is acceptable for your application.
  properties: carbon allocation 0.258227 kg, carbon content 0.258227, carbon content, fossil 0.257652, carbon content, non-fossil 0.000574587, copper content 0.081, dry mass 1 kg, water content 0, water in wet mass 0 kg, wet mass 1 kg

## Inputs from technosphere
- electronic component factory: 2e-8 unit; source Ellingsen, L.A.W. 2014; lognormal variance with pedigree 0.366, pedigree (4,5,4,5,4)
  Literature.
- high voltage system, for Li-ion battery: 0.3 kg; source Ellingsen, L.A.W. 2014; lognormal variance with pedigree 0.0192, pedigree (2,5,4,5,1)
  Literature.
  properties: carbon content, fossil 0.632352, copper content 0.27, dry mass 1 kg, wet mass 1 kg
- integrated battery interface system, for Li-ion battery: 0.48 kg; source Ellingsen, L.A.W. 2014; lognormal variance with pedigree 0.0132, pedigree (2,5,3,5,1)
  Literature.
  properties: carbon content, fossil 0.0285893, dry mass 1 kg, wet mass 1 kg
- low voltage system, for Li-ion battery: 0.13 kg; source Ellingsen, L.A.W. 2014; lognormal variance with pedigree 0.0192, pedigree (2,5,4,5,1)
  Literature.
  properties: carbon content, fossil 0.326269, carbon content, non-fossil 0.0044199, dry mass 1 kg, wet mass 1 kg
- metal working, average for steel product manufacturing: 0.003 kg; source Ellingsen, L.A.W. 2014; lognormal variance with pedigree 0.0192, pedigree (2,5,4,5,1)
  Literature. Proxy for the production of the fasteners used to stabilize the IBIS within the Li-ion battery BMS
- printed wiring board, through-hole mounted, unspecified, Pb free: 0.089 kg; lognormal variance with pedigree 0.0192, pedigree (2,5,4,5,1)
  Literature. Proxy for the battery module boards (BMB)
  properties: carbon content, fossil 0.255344, carbon content, non-fossil 0.00192028, dry mass 1 kg, wet mass 1 kg
- steel, low-alloyed: 0.003 kg; source Ellingsen, L.A.W. 2014; lognormal variance with pedigree 0.0192, pedigree (2,5,4,5,1)
  Literature. Proxy for the fasteners used to stabilize the IBIS within the Li-ion battery BMS
  properties: carbon content, fossil 0.005, dry mass 1 kg, wet mass 1 kg

## Sampling procedure
From Literature.
