# hydrocarbons purification, molecular sieve separation of naphtha

Dataset: EcoSpold 2, unit process
Geography: RoW
Time period: 1998-01-01 to 2023-12-31
Technology level: current
Classification: ISIC rev.4 ecoinvent: 1920:Manufacture of refined petroleum products
Classification: EcoSpold01Categories: chemicals/organics
Scenario: Business-as-Usual
System model: Allocation, cut-off by classification
Share of production covered: 0 %
Generated by: Tereza Levova
Published in: Jungbluth N. 2007
Database: ecoinvent
isCopyrightProtected: true
accessRestrictedTo: 1

## General comment
The multioutput-process "naphta, to melecular sieve separations" delivers the co-products hexane, heptane, 2,3-dimethylbutane, 2-methylpentane, methylcyclopentane, 1,1-dimethylcyclopentane, methylcyclohexane, fraction 1 from naphta, fraction 7 from naphta, and fraction 8 from naphta. The allocation is based on mass balance.

## Included activities end
Molecular sieve separation of naphta including materials, energy uses, infrastructure and emissions.

## Geography
The inventory is modelled with data from plants in the USA.

## Technology
Separation of naphta with a zeolith 5a molecular sieve.

## Time period
Time of publications.

## Parameters
- fraction, cooling water, cooling pond system, to air: 0.032 dimensionless; name fraction_CW_CP_to_air; lognormal variance with pedigree 0.0413, pedigree (2,3,1,3,1)
  Calculated based on literature value (Scown, C.D., 2011, Water Footprint of U.S. Transportation Fuels and supplying information of the article) (Vionnet, S., Quantis Water Database - Technical Report, 2012).
- fraction, cooling water, once-through system, to air: 0.004 dimensionless; name fraction_CW_OT_to_air; lognormal variance with pedigree 0.0413, pedigree (2,3,1,3,1)
  (same comment as for fraction, cooling water, cooling pond system, to air)
- fraction, cooling water, recirculating system, to air: 0.771 dimensionless; name fraction_CW_R_to_air; lognormal variance with pedigree 0.0413, pedigree (2,3,1,3,1)
  (same comment as for fraction, cooling water, cooling pond system, to air)
- fraction, cooling water, to air: 0.3875 dimensionless; name fraction_CW_to_air; = (0.5*fraction_CW_OT_to_air)+(0.5*fraction_CW_R_to_air); lognormal variance with pedigree 0.092025, pedigree (4,4,3,2,4)
  Calculated value based on literature value (see comments of the other parametres present in this dataset) and expert opinion. In the case when no industry/literature data are available about the type of cooling or directly fraction, cooling water, to air specific for the process a default assumption is applied. It is assumed that the once-through cooling system is used in 50% of all cases and recirculating system is used in another 50% of all cases.

## Reference product
- methylcyclohexane: 1 kg; name BP_amount_6; By-product classification allocatable product; CPC 34110: Hydrocarbons and their halogenated, sulphonated, nitrated or nitrosated derivatives; HS2017 290219: Cyclic hydrocarbons; cyclanes, cyclenes and cycloterpenes, excluding cyclohexane; CAS 108-87-2
  EcoSpold01Location=RER
  production volume 3.94884e8 kg; = RP_PV_1 * (BP_amount_6 / RP_amount_1)
    Calculated from production volume of reference product using the relative outputs.
  property heating value, net 43.22 MJ
    LHV is calculated based on the elemental composition of the substance. Based on the CAS number of the substance (000108-87-2), the chemical formula of the substance is found to be: C7H14, (PubChem 2020).
    Reference: Kim, S., Chen, J., Cheng, T., Gindulyte, A., He, J., He, S., Li, Q., Shoemaker, B. A., Thiessen, P. A., Yu, B., Zaslavsky, L., Zhang, J., & Bolton, E. E. (2019). PubChem 2019 update: improved access to chemical data. Nucleic acids research, 47(D1), D1102–D1109. https://doi.org/10.1093/nar/gky1033
  property price 0.522 EUR2005
    Temporary price data. Calculated as 90% of purchasers price based on: Source: 28 August 2006 issue of Chemical Market Reporter (ICIS) in USD/gal (conversion 3.7854 litre/gal; density 0.77 kg/litre). For comparison, UN Commodity Trade Statistics Database (http://data.un.org/Explorer.aspxDatabase [Accessed 2 July 2010]) has import and export prices (total trades (USD) divided by total weight (kg) in EU27, USA, China, Japan and India) for 'Cyclohexane' resulting in a price of 0.88 USD/kg.
  properties: allocation factor 0.191105, carbon allocation 0.857143 kg, carbon content 0.857143, carbon content, fossil 0.857143, carbon content, non-fossil 0, dry mass 1 kg, true value 0.0874768, water content 0, water in wet mass 0 kg, wet mass 1 kg

## Inputs from technosphere
- chemical factory, organics: 4.56151e-10 unit; lognormal variance with pedigree 0.448, pedigree (4,5,5,5,5)
  Estimation
  EcoSpold01Location=RER
  Uncertainty: Estimation
- electricity, medium voltage: 0.000953106, 0.0190123, 0.00638808, 0.000291874, 5.84182e-5, 1.25437e-5, 0.00196332 kWh (7 suppliers, which the file names only by identifier); sum of these 0.0286797 kWh; lognormal variance with pedigree 0.0427, pedigree (2,2,5,5,1)
  EcoSpold01Location=UCTE
  Overcash 1998 - 2004
  Uncertainty: Overcash 1998 - 2004
- heat, district or industrial, natural gas: 0.0435944, 2.65293 MJ (2 suppliers, which the file names only by identifier); sum of these 2.69652 MJ; lognormal variance with pedigree 0.0427, pedigree (2,2,5,5,1)
  Uncertainty: Overcash 1998 - 2004
  properties: heating value, net 1 MJ
- heat, district or industrial, other than natural gas: 1.50439, 0.000696956 MJ (2 suppliers, which the file names only by identifier); sum of these 1.50509 MJ; lognormal variance with pedigree 0.0427, pedigree (2,2,5,5,1)
  Uncertainty: Overcash 1998 - 2004
  properties: heating value, net 1 MJ
- naphtha: 0.00156255, 0.0195703, 0.922579, 0.149632, 0.00644852, 0.0405856 kg (6 suppliers, which the file names only by identifier); sum of these 1.14038 kg; lognormal variance with pedigree 0.0427, pedigree (2,2,5,5,1)
  EcoSpold01Location=RER
  Overcash 1998 - 2004
  Uncertainty: Overcash 1998 - 2004
  properties: carbon content, fossil 0.919743, dry mass 1 kg, heating value, net 45 MJ, wet mass 1 kg
  note on carbon content, fossil: C-content was calculated using data from Tab 3.20, ecoinvent v2.2 report 6_IV CO2 emmissions and High heating value.

## Inputs from nature
- Water, cooling, unspecified natural origin [natural resource, in water]: 0.0286919 m3; name water_cooling_UNO_input; lognormal variance with pedigree 0.0427, pedigree (2,2,5,5,1)
  Overcash 1998 - 2004
  Uncertainty: Overcash 1998 - 2004

## Emissions to nature
- Carbon dioxide, fossil [air, urban air close to ground]: 0.0631769 kg; lognormal variance with pedigree 0.0601, pedigree (4,2,5,5,1)
  Estimation
  Uncertainty: Estimation
- Heptane [air, urban air close to ground]: 0.00229558 kg; lognormal variance with pedigree 0.0827, pedigree (2,2,5,5,1)
  Overcash 1998 - 2004
  Uncertainty: Overcash 1998 - 2004
- Hexane [air, urban air close to ground]: 0.00191584 kg; lognormal variance with pedigree 0.0827, pedigree (2,2,5,5,1)
  Overcash 1998 - 2004
  Uncertainty: Overcash 1998 - 2004
- Hydrocarbons, aliphatic, alkanes, cyclic [air, urban air close to ground]: 0.0117459 kg; lognormal variance with pedigree 0.0827, pedigree (2,2,5,5,1)
  Overcash 1998 - 2004
  Uncertainty: Overcash 1998 - 2004
- Water [air, unspecified]: 0.0111181 m3; name water_to_air_unspecified; = water_cooling_UNO_input*fraction_CW_to_air; lognormal variance with pedigree 0.130025, pedigree (4,4,5,2,4)
  Calculated value based on literature values and expert opinion. See comments in the parametres' comment field.
  property fraction, origin: fresh water 0; name fraction_origin_fresh_water
  property fraction, origin: salt water 0; name fraction_origin_salt_water
  property fraction, origin: unspecified 1; name fraction_origin_unspecified
- BOD5, Biological Oxygen Demand [water, surface water]: 0.0215988 kg; lognormal variance with pedigree 0.0827, pedigree (2,2,5,5,1)
  Calculated from water emissions
  Uncertainty: Calculated from water emissions
- COD, Chemical Oxygen Demand [water, surface water]: 0.00540539 kg; lognormal variance with pedigree 0.0827, pedigree (2,2,5,5,1)
  Calculated from water emissions
  Uncertainty: Calculated from water emissions
- DOC, Dissolved Organic Carbon [water, surface water]: 0.0215988 kg; lognormal variance with pedigree 0.0827, pedigree (2,2,5,5,1)
  Calculated from water emissions
  Uncertainty: Calculated from water emissions
- Hydrocarbons, unspecified [water, surface water]: 0.00159653 kg; lognormal variance with pedigree 0.0827, pedigree (2,2,5,5,1)
  Overcash 1998 - 2004
  Uncertainty: Overcash 1998 - 2004
- TOC, Total Organic Carbon [water, surface water]: 0.00540539 kg; lognormal variance with pedigree 0.0827, pedigree (2,2,5,5,1)
  Calculated from water emissions
  Uncertainty: Calculated from water emissions
- Water [water, unspecified]: 0.0175738 m3; name water_to_water_unspecified; = water_cooling_UNO_input*(1-fraction_CW_to_air); lognormal variance with pedigree 0.130025, pedigree (4,4,5,2,4)
  (same comment as for Water)
  property fraction, origin: fresh water 0; name fraction_origin_fresh_water_Ww
  property fraction, origin: salt water 0; name fraction_origin_salt_water_Ww
  property fraction, origin: unspecified 1; name fraction_origin_unspecified_Ww

## Sampling procedure
Literature data

## Extrapolations
This dataset has been extrapolated from european data. The uncertainty has been adjusted accordingly. Some data are derived from other or unknown plants or have been estimated.
