# natural gas, liquefied, import from TT

Dataset: EcoSpold 2, unit process
Geography: RoE
Time period: 2021-01-01 to 2023-12-31
Technology level: current
Classification: ISIC rev.4 ecoinvent: 3520:Manufacture of gas; distribution of gaseous fuels through mains
Scenario: Business-as-Usual
System model: Allocation, cut-off by classification
Share of production covered: 100 %
Generated by: Maresa Bussa
Published in: Bussa, M. 2023
Database: ecoinvent
isCopyrightProtected: true
accessRestrictedTo: 1

## General comment
;This dataset describes the import of 1 m3 of ‘natural gas, liquefied’ (LNG) from production in Trinidad and Tobago to the geography 'Region of Europe'. The reference flow refers to 1 standard cubic meter of natural gas in the gaseous state. At a density of 410-500 kg/m3, the volume of liquified natural gas is around 1/600th of the gaseous volume at standard conditions. (Engineering Tool Box 2008)
As a general trend, the share of liquefied natural gas (LNG) in inter-regional trade of natural gas has increased steadily over the past decades, and it equaled the volume exported in pipelines around 2019-2020. (BP 2022)
References:
BP (2022). Statistical Review of World Energy 2022 (71st edition). [online] Availble at: https://www.bp.com/en/global/corporate/energy-economics/statistical-review-of-world-energy.html [Accessed June 14, 2022]
Engineering ToolBox (2008). LNG - Liquefied Natural Gas. [online] Available at: https://www.engineeringtoolbox.com/liquefied-natural-gas-lng-d_1092.html [Accessed Aug 16, 2022]

## Included activities start
This activity starts at the gate of the activities that produce "natural gas, liquefied" at the place of produciton. This dataset describes the transfer of liquefied natural gas (LNG) via tanker ship, modelled separately, between the liquefaction plant in the place of origin and the evaporation plant at the destination.

## Included activities end
This activity ends with the supply of "natural gas, liquefied", to the consumers of this product.

## Geography
Region of Europe

## Technology
This dataset describes the transport of natural gas on a freight ship between the liquefaction plant in TT and a EU-28 evaporation plant. The process is normalized on the gaseous form of gas. The net calorific value of natural gas is 36.0 MJ/Nm³.

## Time period
Transport modes investigated for 2021.

## Reference product
- natural gas, liquefied: 1 m3; By-product classification allocatable product; CPC 12020: Natural gas, liquefied or in the gaseous state; HS2017 271111: Petroleum gases and other gaseous hydrocarbons; liquefied, natural gas; CAS 8006-14-2
  Output
  production volume 8.32879e8 m3
    Annual production volume (expressed in m3 at standard conditions, i.e., in gaseous form) based on LNG trade movements in 2021, from bp Statistical Review of World Energy June 2022.
  property carbon content, fossil 0.741
    Set equal to that of 'natural gas, high pressure' (based on composition in Bussa et al. (2021), tab. 3.1).
  property heating value, gross 40 MJ
    Set equal to that of 'natural gas, high pressure' (at standard conditions; based on Meili et al. 2022, section 5.2)
  property heating value, net 36 MJ
    (same comment as for natural gas, liquefied)
  property price 0.23326 EUR2005
    Calculated value based on data from the United Nations Commodity Trade Statistics Database (http://data.un.org/Data.aspx?q=natural+gas&d=ComTrade&f=_l1Code%3a28%3bcmdCode%3a271111; accessed 12 October 2023). UN comtrade category: 271111 Natural gas, liquified. An average for 2019-2021 was used and adjusted for inflation to the year 2005. The average price of imports and exports into the five main markets (EU, US, JP, IN and CN) was determined. Density of natural gas of 0.735 kg/m³ for unit conversion was used.
  properties: carbon allocation 0.544635 kg, carbon content 0.741, carbon content, non-fossil 0, dry mass 0.735 kg, water content 0, water in wet mass 0 kg, wet mass 0.735 kg

## Inputs from technosphere
- natural gas, liquefied: 1 m3; lognormal variance with pedigree 0.130713, pedigree (4,3,3,1,1)
  Based on data from Faist-Emmenegger (2015), as described in Bussa et al. 2023
  properties: carbon content, fossil 0.741, dry mass 0.735 kg, heating value, gross 40 MJ, heating value, net 36 MJ, wet mass 0.735 kg
  note on carbon content, fossil: Set equal to that of 'natural gas, high pressure' (based on composition in Bussa et al. (2021), tab. 3.1).
  note on heating value, gross: Set equal to that of 'natural gas, high pressure' (at standard conditions; based on Meili et al. 2022, section 5.2)
- transport, freight, sea, tanker for liquefied natural gas: 5.5125 metric ton*km; lognormal variance with pedigree 0.0131951, pedigree (3,3,3,1,3)
  Average weighted distance based on BP statistics for 2021, as described in Bussa et al. 2023

## Sampling procedure
Literature. Online calculators for distances.

## Extrapolations
A default inventory, established based on literature, is assumed representative for all geographies.
