# treatment of bottom ash, MSWI, waste rubber, unspecified, slag compartment

Dataset: EcoSpold 2, unit process
Geography: RoW
Time period: 1994-01-01 to 2023-12-31
Technology level: current
Classification: ISIC rev.4 ecoinvent: 3821:Treatment and disposal of non-hazardous waste
Scenario: Business-as-Usual
System model: Allocation, cut-off by classification
Generated by: Mattia Clementi
Database: ecoinvent
isCopyrightProtected: true
accessRestrictedTo: 1

## General comment
The process represents the treatment of controlled landfilling in slag compartment of a waste (bottom ash) that is exclusively generated in another waste treatment. Bottom ash is the by-product that is generated during the municipal solid waste incineration (MSWI) of 'waste rubber, unspecified'. Recommended use of this dataset: to be used within the specific chain of treatments for 'waste rubber, unspecified'. Share of biogenic carbon in the sludge: 0%.

## Included activities start
The activity starts with the waste being available at the gate of the treatment facility. Collection and transportation of the waste to the treatment plant is not included.

## Included activities end
The activity ends with the waste being treated and waste-specific emissions from the slag compartment landfill are released to water (short-term emissions to surface water and long-term emissions to ground water).

## Geography
Modelling parameters affecting the treatment technology are not specific to this geography.

## Technology
Slag compartment for bottom ash from incineration with base seal and leachate collection system (Landfill type D). Recultivation after closure.

## Reference product
- bottom ash, MSWI, waste rubber, unspecified: -1 kg; By-product classification Waste; CPC 3932: Ash and residue (except from the manufacture of iron or steel), containing metals or metallic compounds, except[…]; HS2017 262110: Slag and ash; ash and residues from the incineration of municipal waste
  main reference product of this activity (supply of disposal service).
  production volume 4.61141e7 kg
    calculated in proportion to incinerated waste reference product
  property price 0 EUR2005
    Waste products are assigned a price of zero as they are assumed to require further treatment.
  properties: bromine content 0.00175479, cadmium content 2.46555e-5, carbon allocation 0.143872 kg, carbon content 0.157994, carbon content, fossil 0.157994, carbon content, non-fossil 0, chlorine content 0.0101593, dry mass 0.910617 kg, lead content 0.00155577, mercury content 8.90538e-10, nickel content 0.000867908, oxygen content 0.515372, sulfur content 0.0937315, water content 0.0981567, water in wet mass 0.0893831 kg, wet mass 1 kg, zinc content 0.218539

## Inputs from technosphere
- process-specific burdens, slag landfill: 0.0116981, 0.988302 kg (2 suppliers, which the file names only by identifier); sum of these 1 kg
  mass-specific expenditures required for landfilling of bottom ash.
- slag landfill: 1.7778e-9 unit
  slag compartment infrastructure required for landfilling of bottom ash.

## Inputs from nature
- Organic carbon, placed in landfill [inventory indicator, waste]: 0.071936 kg
  Mass of organic carbon in waste (without inorganic carbon), initially put in slag compartment. The exchange represents a flow that is within the technosphere. This exchange should only be used to apply ecofactors for the Swiss LCIA method of Ecological Scarcity and not any other purpose.
- Waste mass, total, placed in landfill [inventory indicator, waste]: 1 kg
  Mass of waste initially put in a slag compartment. The exchange represents a flow that is within the technosphere. This exchange should only be used to apply ecofactors for the Swiss LCIA method of Ecological Scarcity and not any other purpose.

## Emissions to nature
- Non-hazardous waste disposed [inventory indicator, waste]: 1 kg
  Inventory indicator for waste mass disposed. To be used in EN15804 "other data" results.
- BOD5, Biological Oxygen Demand [water, ground-, long-term]: 0.05925 kg
  complement of long-term emissions from incinerator bottom ash in slag compartment
- BOD5, Biological Oxygen Demand [water, surface water]: 0.00021387 kg; lognormal variance with pedigree 0.46595, pedigree (1,1,5,1,1)
  short-term emissions from incinerator bottom ash in slag compartment
  Uncertainty: Uncertainty calculated from uncertainty of composition of incinerated waste, and incinerator model uncertainty and slag compartment transfer coefficient uncertainty.
- Bromine [water, ground-, long-term]: 1.4381e-10 kg; lognormal variance with pedigree 0.86196, pedigree (1,1,5,1,1)
  complement of long-term emissions from incinerator bottom ash in slag compartment
  Uncertainty: Uncertainty calculated from uncertainty of composition of incinerated waste, and incinerator model uncertainty and slag compartment transfer coefficient uncertainty.
- Bromine [water, surface water]: 0.0015979 kg; lognormal variance with pedigree 0.83365, pedigree (1,1,5,1,1)
  (same comment as for BOD5, Biological Oxygen Demand)
- COD, Chemical Oxygen Demand [water, ground-, long-term]: 0.18114 kg
  complement of long-term emissions from incinerator bottom ash in slag compartment
- COD, Chemical Oxygen Demand [water, surface water]: 0.00065383 kg; lognormal variance with pedigree 0.46595, pedigree (1,1,5,1,1)
  (same comment as for BOD5, Biological Oxygen Demand)
- Cadmium II [water, ground-, long-term]: 2.244e-5 kg; lognormal variance with pedigree 1.2632, pedigree (1,1,5,1,1)
  (same comment as for Bromine)
- Cadmium II [water, surface water]: 1.1551e-8 kg; lognormal variance with pedigree 2.0027, pedigree (1,1,5,1,1)
  (same comment as for BOD5, Biological Oxygen Demand)
- Chloride [water, ground-, long-term]: 0.0012601 kg; lognormal variance with pedigree 0.27742, pedigree (1,1,5,1,1)
  (same comment as for Bromine)
- Chloride [water, surface water]: 0.0079911 kg; lognormal variance with pedigree 0.25867, pedigree (1,1,5,1,1)
  (same comment as for BOD5, Biological Oxygen Demand)
- DOC, Dissolved Organic Carbon [water, ground-, long-term]: 0.071677 kg
  complement of long-term emissions from incinerator bottom ash in slag compartment
- DOC, Dissolved Organic Carbon [water, surface water]: 0.00025872 kg; lognormal variance with pedigree 0.46595, pedigree (1,1,5,1,1)
  (same comment as for BOD5, Biological Oxygen Demand)
- Lead II [water, ground-, long-term]: 0.0014167 kg; lognormal variance with pedigree 0.97229, pedigree (1,1,5,1,1)
  (same comment as for Bromine)
- Lead II [water, surface water]: 2.586e-8 kg; lognormal variance with pedigree 2.1529, pedigree (1,1,5,1,1)
  (same comment as for BOD5, Biological Oxygen Demand)
- Mercury II [water, ground-, long-term]: 7.8969e-10 kg; lognormal variance with pedigree 1.8914, pedigree (1,1,5,1,1)
  (same comment as for Bromine)
- Mercury II [water, surface water]: 2.1245e-11 kg; lognormal variance with pedigree 2.1454, pedigree (1,1,5,1,1)
  (same comment as for BOD5, Biological Oxygen Demand)
- Nickel II [water, ground-, long-term]: 0.00078983 kg; lognormal variance with pedigree 1.1386, pedigree (1,1,5,1,1)
  (same comment as for Bromine)
- Nickel II [water, surface water]: 4.9769e-7 kg; lognormal variance with pedigree 1.8517, pedigree (1,1,5,1,1)
  (same comment as for BOD5, Biological Oxygen Demand)
- Sulfate [water, ground-, long-term]: 0.23271 kg; lognormal variance with pedigree 0.45298, pedigree (1,1,5,1,1)
  (same comment as for Bromine)
- Sulfate [water, surface water]: 0.023351 kg; lognormal variance with pedigree 0.58081, pedigree (1,1,5,1,1)
  (same comment as for BOD5, Biological Oxygen Demand)
- TOC, Total Organic Carbon [water, ground-, long-term]: 0.071677 kg
  complement of long-term emissions from incinerator bottom ash in slag compartment
- TOC, Total Organic Carbon [water, surface water]: 0.00025872 kg; lognormal variance with pedigree 0.46595, pedigree (1,1,5,1,1)
  (same comment as for BOD5, Biological Oxygen Demand)
- Zinc II [water, ground-, long-term]: 0.199 kg; lognormal variance with pedigree 0.2753, pedigree (1,1,5,1,1)
  (same comment as for Bromine)
- Zinc II [water, surface water]: 5.9239e-6 kg; lognormal variance with pedigree 1.3913, pedigree (1,1,5,1,1)
  (same comment as for BOD5, Biological Oxygen Demand)
