# deep well drilling, for geothermal power, onshore, 6000m

Dataset: EcoSpold 2, unit process
Geography: GLO
Time period: 2008-01-01 to 2023-12-31
Technology level: current
Classification: ISIC rev.4 ecoinvent: 0990:Support activities for other mining and quarrying
Synonyms: deep borehole drilling
Tags: Infrastructure; Geothermal power
Scenario: Business-as-Usual
System model: Allocation, cut-off by classification
Generated by: Niels Jungbluth
Published in: Jungbluth, N. 2007
Database: ecoinvent
isCopyrightProtected: true
accessRestrictedTo: 1

## General comment
This datasets represents the drilling of a borehole of 5500m depth and 6000 m length for geothermal power generation in an unspecific rock formation. Rotary drilling technology used for the exploitation of the deep rock formations is nearly the same as for oil and gas production, therefore this dataset is heavily based on a dataset comprised in Jungbluth N., 2007, Erdöl (see field "published source" for details). Energy requirement (diesel use) for drilling, which is the most important factor concerning environmental burdens, is site dependent (geology, depth) and can vary over an order of magnitude according to various sources. A diesel use of 7 GJ/m is assumed for the drilling in this dataset. This value is in the middle of different literature data and corresponds to approximate drilling costs for geothermal projects.

## Included activities start
This is an onshore rotary drilling service starting with the receipt of chemicals, reinforcing materials and energy for the drilling.

## Included activities end
This activity ends with the reinforcement of the well.

This dataset includes all energy uses, materials and emissions for drilling of an onshore borehole and finishing of the well.

This dataset doesn't include needed materials and energy use for closure of the well after its use. This is accounted for in a separate dataset called "deep well closure, for geothermal power, 6000m".
The dataset does not take into account different rock characteristics.
The dataset doesn't include any land use, neither for the wells nor for the deposit of the extracted materials. Land use of the whole geothermal power plant is accounted for in the corresponding dataset.

## Geography
Data have originally been investigated for oil drilling in Nigeria, India and multinational companies. Data have been adjusted for an onshore 6000m depth well without taking into account rock characteristics.

## Technology
Onshore rotary drilling, 6000 m depth, no specific rock characteristics.

## Time period
Most data have been gathered in the end of the 90ties but are still valid for 2008.

## Parameters
- fraction, process water, to air: 0.15 dimensionless; name fraction_PW_to_air; lognormal variance with pedigree 0.092025, pedigree (4,4,3,2,4)
  Literature value. In case when no industry/process specific data are available, default evaporation fraction value is used. This value is 15% and is based on literature (Statistics Canada, 2007 & Shaffer, K.H., 2008, Consumptive water use in the Great Lakes Basin, USGS & Shiklomanov, 2003, World Water Resources at the Beginning of the 21st Century) and has been approved by an expert.

## Reference product
- deep well, for geothermal power, onshore, 6000m: 1 m; By-product classification allocatable product; CPC 86219: Support services to other mining
  EcoSpold01Location=GLO
  production volume 13156.8 m; name APV_borehole; = LiveLink('C:\Documents and Settings\treyer_k\My Documents\Documents\ecoinvent LCI electricity\Geothermal\electricity production geothermal power_datasets_v2_20120105.xls','Data','Q24','', 'Automatic')
    Estimation. This value is an estimation considering the electricity produced with new installed geothermal capacity in 2008, an estimated capacity of a power plant and an estimated amount of metres of well needed for one geothermal plant.It is also estimated that only about 9% of all geothermal power plants need a deep well [Ruggero, B. 2010. Geothermal Power Generation in the World. 2005-2010 Update Report. Proceedings World Geothermal Congress 2010; Bali, Indonesia, 25-29 April 2010].
  property lifetime 20 year; name lifetime
  property price 1104.27 EUR2005
    Calculated based on inputs: The price of the product has been calculated as a sum of the values of the material and energy inputs for this product. This value is therefore a rough estimation. It may underestimate the real price since there are additional expenses when producing any product. These expences can include for example labour costs, treatment of waste materials and profit for the producer. Please consider carefully whether this level of data quality is acceptable for your application.
  properties: carbon allocation 0 kg, carbon content 0

## Inputs from technosphere
- activated bentonite: 20 kg; source Jungbluth, N. 2007; lognormal variance with pedigree 0.18, pedigree (1,1,5,1,1)
  Literature value. Used in the drilling solution.
  EcoSpold01Location=DE
  Uncertainty: High variations of figures in literature. In comparison to the original dataset by Jungbluth, N. 2007, the uncertainty was slightly raised. Emission figures were not adapted while assuming a diesel use of 7 GJ/m instead of 9 GJ/m in the original source.
  properties: dry mass 1 kg, wet mass 1 kg
- barite: 270 kg; source Jungbluth, N. 2007; lognormal variance with pedigree 0.7, pedigree (1,1,5,1,1)
  EcoSpold01Location=RER
  Literature value. Used in the drilling solution.
  Uncertainty: High variations of figures in literature. In comparison to the original dataset by Jungbluth, N. 2007, the uncertainty was slightly raised. Emission figures were not adapted while assuming a diesel use of 7 GJ/m instead of 9 GJ/m in the original source.
  properties: dry mass 1 kg, wet mass 1 kg
- cement, Portland: 173.251, 6.5653, 8.75891, 9.60203, 0.397562, 0.0241562, 0.362466, 0.35327, 0.450585, 0.234572 kg (10 suppliers, which the file names only by identifier); sum of these 200 kg; lognormal variance with pedigree 0.18, pedigree (1,1,5,1,1)
  Literature value. Cement is used for backfill of the steel reinforcement.
  Uncertainty: In comparison to the original dataset by Jungbluth, N. 2007, the uncertainty was slightly raised. Emission figures were not adapted while assuming a diesel use of 7 GJ/m instead of 9 GJ/m in the original source.
  properties: dry mass 1 kg, wet mass 1 kg
- chemical, inorganic: 42.2 kg; source Jungbluth, N. 2007; lognormal variance with pedigree 1.39, pedigree (1,1,5,1,1)
  Literature value. Used in the drilling solution. The most important inorganic chemicals for the drilling fluid are natrium chloride, calcium chloride, calcium sulphate and potassium sulphate.
  EcoSpold01Location=GLO
  Uncertainty: High variations of figures in literature. In comparison to the original dataset by Jungbluth, N. 2007, the uncertainty was slightly raised. Emission figures were not adapted while assuming a diesel use of 7 GJ/m instead of 9 GJ/m in the original source.
  properties: carbon content, fossil 0.003, dry mass 1 kg, wet mass 1 kg
  note on carbon content, fossil: This dataset is an unweighted average of 20 inorganic substances (listed in Tab 88.1, ecoinvent v2.2 report 8, part II), being part of the top100 chemicals included in this database. The C-content has also been calculated as an unweighted average of the C content of the substances composing this dataset.
- chemical, organic: 9.05 kg; source Jungbluth, N. 2007; lognormal variance with pedigree 0.7, pedigree (1,1,5,1,1)
  Literature value.Used in the drilling solution.
  EcoSpold01Location=GLO
  Uncertainty: High variations of figures in literature. In comparison to the original dataset by Jungbluth, N. 2007, the uncertainty was slightly raised. Emission figures were not adapted while assuming a diesel use of 7 GJ/m instead of 9 GJ/m in the original source.
  properties: carbon content, fossil 0.628, dry mass 1 kg, heating value, net 19.03 MJ, wet mass 1 kg
  note on carbon content, fossil: This dataset is an unweighted average of 20 organic substances (listed in Tab 88.1, ecoinvent v2.2 report 8, part II), being part of the top100 chemicals included in this database. The C-content has also been calculated as an unweighted average of the C content of the substances composing this dataset.
- diesel, burned in diesel-electric generating set, 10MW: 7000 MJ; source Jungbluth, N. 2007; lognormal variance with pedigree 1.39, pedigree (1,1,5,1,1)
  Literature value/calculated value/estimated value. Diesel use values vary largely in different sources, depending on the estimated rock characteristics and drilling depth.
  EcoSpold01Location=GLO
  Uncertainty: High variations of figures in literature. In comparison to the original dataset by Jungbluth, N. 2007, the uncertainty was slightly raised. Emission figures were not adapted while assuming a diesel use of 7 GJ/m instead of 9 GJ/m in the original source.
  properties: heating value, net 1 MJ
- drilling waste: -391.84, -3.16 kg (2 suppliers, which the file names only by identifier); sum of these -395 kg; source Jungbluth, N. 2007
  EcoSpold01Location=CH
  Literature value, e.g. environmental reports.
  production volume; = drilling_waste* APV_borehole
    Calculated value
  properties: carbon content, fossil 0.105263, dry mass 0.285 kg, water content 2.50877, wet mass 1 kg
  note on carbon content, fossil: C content was calculated for 1 kg DM, using data in Tab A.9, ecoinvent v2.2 report 13_I.
- hazardous waste, for incineration: -3.34792, -1.61, -0.0420844 kg (3 suppliers, which the file names only by identifier); sum of these -5 kg; source Jungbluth, N. 2007
  EcoSpold01Location=CH
  Literature value, e.g. environmental reports.
  production volume; = hazardous_waste* APV_borehole
    Calculated value
  properties: carbon content, fossil 0.554667, dry mass 0.75 kg, heating value, net 17 MJ, water content 0.333333, wet mass 1 kg
  note on carbon content, fossil: Tab A.6, ecoinvent v2.2 report 13_I. C content has been calculated after data in the tables, and then referred to 1 kg DM
  note on heating value, net: Value taken from the general comment of the treatment dataset.
- lignite: 0.08664, 0.104591, 0.0087686 kg (3 suppliers, which the file names only by identifier); sum of these 0.2 kg; source Jungbluth, N. 2007; lognormal variance with pedigree 0.18, pedigree (1,1,5,1,1)
  EcoSpold01Location=RER
  Literature value. Used in the drilling solution. Lignite undergoes a treatment process (alkaline, reaction with Na2CrO4) and results in an appropriate additive improving filtration characteristics and thermal stability. This treatment process is not accounted for in this dataset.
  Uncertainty: High variations of figures in literature. In comparison to the original dataset by Jungbluth, N. 2007, the uncertainty was slightly raised. Emission figures were not adapted while assuming a diesel use of 7 GJ/m instead of 9 GJ/m in the original source.
  properties: carbon content, fossil 0.655, dry mass 0.42 kg, heating value, net 8.8 MJ, water content 1.38095, wet mass 1 kg
  note on carbon content, fossil: C content of dry lignite is 58-73% (specified in Tab 1.1, report 6, part VI). A mean content of 0.655 kg C/kg dry lignite was considered.
  note on heating value, net: Based on literature, page 52, Dones R., Bauer C., Bolliger R., Burger B., Faist Emmenegger M., Frischknecht R., Heck T., Jungbluth N., Röder A., Tuchschmid M. (2007) Life Cycle Inventories of Energy Systems: Results for Current Systems in Switzerland and other UCTE Countries. ecoinvent report No. 5. Paul Scherrer Institut Villigen, Swiss Centre for Life Cycle Inventories, Dübendorf, CH.
- lubricating oil: 10.44, 49.56 kg (2 suppliers, which the file names only by identifier); sum of these 60 kg; source Jungbluth, N. 2007; lognormal variance with pedigree 0.18, pedigree (1,1,5,1,1)
  Literature value. Lubricating oil is a very important factor for the quality of the drilling, e.g. for the lubrication of the borehole, pressure issues or damages to the rock.
  EcoSpold01Location=RER
  Uncertainty: In comparison to the original dataset by Jungbluth, N. 2007, the uncertainty was slightly raised. Emission figures were not adapted while assuming a diesel use of 7 GJ/m instead of 9 GJ/m in the original source.
  properties: carbon content, fossil 0.75, dry mass 1 kg, heating value, net 40.2 MJ, wet mass 1 kg
  note on carbon content, fossil: Lubricating oil is produced from diesel. C-content/dry mass of fats and oils considered 75%, from: ecoinvent v2.2 report, n 15a, pg 40
  note on heating value, net: Literature value, Source: IPCC 2006, 2006 IPCC Guidelines for National Greenhouse Gas Inventories, Prepared by the National Greenhouse Gas Inventories Programme, Eggleston H.S., Buendia L., Miwa K., Ngara T. and Tanabe K. (eds). Published: IGES, Japan
- reinforcing steel: 210 kg; source Jungbluth, N. 2007; lognormal variance with pedigree 0.18, pedigree (1,1,5,1,1)
  EcoSpold01Location=RER
  Literature value. Steel reinforcement is installed by stages in the borehole and backfilled with cement.
  Uncertainty: In comparison to the original dataset by Jungbluth, N. 2007, the uncertainty was slightly raised. Emission figures were not adapted while assuming a diesel use of 7 GJ/m instead of 9 GJ/m in the original source.
  properties: carbon content, fossil 0.004, dry mass 1 kg, wet mass 1 kg

## Inputs from nature
- Water, well, in ground [natural resource, in water]: 3.34 m3; name water_well_in_ground_input; source Jungbluth, N. 2007; lognormal variance with pedigree 0.1713, pedigree (2,3,5,3,1)
  Literature value. Used in the drilling solution.
  Uncertainty: In comparison to the original dataset by Jungbluth, N. 2007, the uncertainty was slightly raised. Emission figures were not adapted while assuming a diesel use of 7 GJ/m instead of 9 GJ/m in the original source.

## Emissions to nature
- Particulate Matter, > 10 um [air, non-urban air or from high stacks]: 0.0148 kg; source Jungbluth, N. 2007; lognormal variance with pedigree 0.1901, pedigree (3,5,5,3,1)
  Literature value. Emissions into the air resulting from diesel use is accounted for in the according dataset.
  Uncertainty: In comparison to the original dataset by Jungbluth, N. 2007, the uncertainty was slightly raised. Emission figures were not adapted while assuming a diesel use of 7 GJ/m instead of 9 GJ/m in the original source.
- Water [air, unspecified]: 0.501 m3; name water_to_air_unspecified; = water_well_in_ground_input*fraction_PW_to_air; lognormal variance with pedigree 0.130025, pedigree (4,4,5,2,4)
  Calculated value based on literature values and expert opinion. See comments in the parametres' comment field.
  property fraction, origin: fresh water 1; name fraction_origin_fresh_water
  property fraction, origin: salt water 0; name fraction_origin_salt_water
  property fraction, origin: unspecified 0; name fraction_origin_unspecified
- AOX, Adsorbable Organic Halides [water, surface water]: 4.78e-7 kg; source Jungbluth, N. 2007; lognormal variance with pedigree 0.7026, pedigree (3,3,5,1,1)
  Literature value/measured value. Effluent sludge pond.
  Uncertainty: In comparison to the original dataset by Jungbluth, N. 2007, the uncertainty was slightly raised. Emission figures were not adapted while assuming a diesel use of 7 GJ/m instead of 9 GJ/m in the original source.
- Aluminium III [water, surface water]: 0.06 kg; source Jungbluth, N. 2007; lognormal variance with pedigree 0.714, pedigree (3,4,5,5,3)
  (same comment as for AOX, Adsorbable Organic Halides)
- Arsenic ion [water, surface water]: 0.00042 kg; source Jungbluth, N. 2007; lognormal variance with pedigree 0.714, pedigree (3,4,5,5,3)
  (same comment as for AOX, Adsorbable Organic Halides)
- BOD5, Biological Oxygen Demand [water, surface water]: 0.3 kg; source Jungbluth, N. 2007; lognormal variance with pedigree 0.714, pedigree (3,4,5,5,3)
  (same comment as for AOX, Adsorbable Organic Halides)
- Barium II [water, surface water]: 0.006 kg; source Jungbluth, N. 2007; lognormal variance with pedigree 0.714, pedigree (3,4,5,5,3)
  (same comment as for AOX, Adsorbable Organic Halides)
- Boron [water, surface water]: 0.009 kg; source Jungbluth, N. 2007; lognormal variance with pedigree 0.714, pedigree (3,4,5,5,3)
  (same comment as for AOX, Adsorbable Organic Halides)
- COD, Chemical Oxygen Demand [water, surface water]: 3 kg; source Jungbluth, N. 2007; lognormal variance with pedigree 0.714, pedigree (3,4,5,5,3)
  (same comment as for AOX, Adsorbable Organic Halides)
- Calcium II [water, surface water]: 0.6 kg; source Jungbluth, N. 2007; lognormal variance with pedigree 0.104, pedigree (3,4,5,5,3)
  (same comment as for AOX, Adsorbable Organic Halides)
- Chloride [water, surface water]: 6 kg; source Jungbluth, N. 2007; lognormal variance with pedigree 0.374, pedigree (3,4,5,5,3)
  (same comment as for AOX, Adsorbable Organic Halides)
- Chromium III [water, surface water]: 0.0006 kg; source Jungbluth, N. 2007; lognormal variance with pedigree 0.714, pedigree (3,4,5,5,3)
  (same comment as for AOX, Adsorbable Organic Halides)
- DOC, Dissolved Organic Carbon [water, surface water]: 0.3 kg; source Jungbluth, N. 2007; lognormal variance with pedigree 0.0561, pedigree (3,5,5,3,1)
  Estimated value. Extrapolation for sum parameter.
  Uncertainty: In comparison to the original dataset by Jungbluth, N. 2007, the uncertainty was slightly raised. Emission figures were not adapted while assuming a diesel use of 7 GJ/m instead of 9 GJ/m in the original source.
- Dichloromethane [water, surface water]: 0.06 kg; source Jungbluth, N. 2007; lognormal variance with pedigree 0.714, pedigree (3,4,5,5,3)
  Literature value/measured value. Methane emissions from the geological formations the drilling takes place.
  Uncertainty: In comparison to the original dataset by Jungbluth, N. 2007, the uncertainty was slightly raised. Emission figures were not adapted while assuming a diesel use of 7 GJ/m instead of 9 GJ/m in the original source.
- Fluoride [water, surface water]: 0.003 kg; source Jungbluth, N. 2007; lognormal variance with pedigree 0.714, pedigree (3,4,5,5,3)
  (same comment as for AOX, Adsorbable Organic Halides)
- Hydrocarbons, aromatic [water, surface water]: 0.003 kg; source Jungbluth, N. 2007; lognormal variance with pedigree 0.384, pedigree (3,4,5,5,3)
  (same comment as for AOX, Adsorbable Organic Halides)
- Iron ion [water, surface water]: 0.18 kg; source Jungbluth, N. 2007; lognormal variance with pedigree 0.714, pedigree (3,4,5,5,3)
  (same comment as for AOX, Adsorbable Organic Halides)
- Magnesium [water, surface water]: 0.12 kg; source Jungbluth, N. 2007; lognormal variance with pedigree 0.714, pedigree (3,4,5,5,3)
  (same comment as for AOX, Adsorbable Organic Halides)
- Manganese II [water, surface water]: 0.003 kg; source Jungbluth, N. 2007; lognormal variance with pedigree 0.714, pedigree (3,4,5,5,3)
  (same comment as for AOX, Adsorbable Organic Halides)
- Phosphorus [water, surface water]: 0.0012 kg; source Jungbluth, N. 2007; lognormal variance with pedigree 0.714, pedigree (3,4,5,5,3)
  (same comment as for AOX, Adsorbable Organic Halides)
- Potassium I [water, surface water]: 0.9 kg; source Jungbluth, N. 2007; lognormal variance with pedigree 0.374, pedigree (3,4,5,5,3)
  (same comment as for AOX, Adsorbable Organic Halides)
- Silicon [water, surface water]: 0.03 kg; source Jungbluth, N. 2007; lognormal variance with pedigree 0.714, pedigree (3,4,5,5,3)
  (same comment as for AOX, Adsorbable Organic Halides)
- Sodium I [water, surface water]: 6 kg; source Jungbluth, N. 2007; lognormal variance with pedigree 0.374, pedigree (3,4,5,5,3)
  (same comment as for AOX, Adsorbable Organic Halides)
- Strontium II [water, surface water]: 0.018 kg; source Jungbluth, N. 2007; lognormal variance with pedigree 0.714, pedigree (3,4,5,5,3)
  (same comment as for AOX, Adsorbable Organic Halides)
- Sulfur [water, surface water]: 0.12 kg; source Jungbluth, N. 2007; lognormal variance with pedigree 0.104, pedigree (3,4,5,5,3)
  (same comment as for AOX, Adsorbable Organic Halides)
- TOC, Total Organic Carbon [water, surface water]: 0.3 kg; source Jungbluth, N. 2007; lognormal variance with pedigree 0.104, pedigree (3,4,5,5,3)
  (same comment as for AOX, Adsorbable Organic Halides)
- Water [water, unspecified]: 2.839 m3; name water_to_water_unspecified; = water_well_in_ground_input*(1-fraction_PW_to_air); lognormal variance with pedigree 0.130025, pedigree (4,4,5,2,4)
  (same comment as for Water)
  property fraction, origin: fresh water 1; name fraction_origin_fresh_water_Ww
  property fraction, origin: salt water 0; name fraction_origin_salt_water_Ww
  property fraction, origin: unspecified 0; name fraction_origin_unspecified_Ww
- Zinc II [water, surface water]: 0.0012 kg; source Jungbluth, N. 2007; lognormal variance with pedigree 0.714, pedigree (3,4,5,5,3)
  (same comment as for AOX, Adsorbable Organic Halides)

## Sampling procedure
Publication in environmental reports and other literature, mainly the report of N. Jungbluth, 2007, Erdöl (see Published Source).

## Extrapolations
Dataset extrapolated from an oil and gas exploitation dataset.

## Review by Bo Weidema 2012-01-12
Passed final review.

## Review by Bo Weidema 2012-01-12
As an exception, this dataset was only reviewed by one reviewer.

## Review by Emilia Moreno Ruiz 2013-02-26
cement flows corrected
