# treatment of waste gypsum, inert material landfill

Dataset: EcoSpold 2, unit process
Geography: Europe without Switzerland
Time period: 1995-01-01 to 2023-12-31
Technology level: current
Classification: ISIC rev.4 ecoinvent: 3821:Treatment and disposal of non-hazardous waste
Scenario: Business-as-Usual
System model: Allocation, cut-off by classification
Generated by: [System]
Database: ecoinvent
isCopyrightProtected: true
accessRestrictedTo: 1

## General comment
This dataset represents the activity of waste disposal of 'waste gypsum' in an inert material landfill.

## Included activities start
The activity starts with the waste being available at the gate of the treatment facility. Collection and transportation of the waste to the treatment plant is not included.

## Included activities end
The activity ends with the waste being treated and no direct emissions from inert material landfill (leachate) are inventoried, as they are considered negligible. The dataset contains only exchanges to process-specific burdens (energy, land use) and infrastructure.

## Geography
Modelling parameters affecting the treatment technology are not specific to this geography.

## Technology
Inert material landfill with leachate collection system and renaturation after closure. 50% of the sites is equipped with a base seal.

## Reference product
- waste gypsum: -1 kg; By-product classification Waste; CPC 39290: Other non-metal waste or scrap
  production volume 1.8468e9 kg; = 4.32E+10*0.15*0.95*0.3
    Estimated value. EU production of gypsum in 2014 was of 43202668 tonnes (BGS 2016). The waste generation is estimated to be 15% (taken from the estimated value for gypsum (WRAP, n.d)). Reta of recycling is assumed to 5% (Marlet n.d.), of the remaining 70% of waste goes to inert material landfill, and 30% goes directly to sanitary landfill. References: BGS (2016) World Mineral Production 2010-2014. Marlet, C. (n.d.) GtoG - GtoG: From Production to Recycling, a Circular Economy for the European Gypsum Industry with the Demolition and Recycling Industry LIFE11 ENV/BE/001039 WRAP (n.d.) International practice in plasterboard recycling: Canada. Retrieved from: http://www.wrap.org.uk/sites/files/wrap/Case%20study%20-%20Plasterboard%20recycling%20in%20Canada.pdf, accessed 3 May 2016
  property heating value, net 0 MJ
    Non combustible products are assumed to have an LHV equal to zero (0).
  property price 0 EUR2005
    Waste products are assigned a price of zero as they are assumed to require further treatment.
  properties: carbon allocation 0 kg, carbon content 0, carbon content, fossil 0, carbon content, non-fossil 0, dry mass 0.806 kg, water content 0.240695, water in wet mass 0.194 kg, wet mass 1 kg

## Inputs from technosphere
- inert material landfill: 1.48e-9 unit; lognormal variance with pedigree 0.042, pedigree (1,1,5,5,1)
  landfill infrastructure per kg waste, uncerteinty heeded in module.
- process-specific burdens, inert material landfill: 1 kg; lognormal variance with pedigree 0.042, pedigree (1,1,5,5,1)
  process-specific burdens per kg waste, uncerteinty heeded in module.

## Extrapolations
This dataset has been copied from an original dataset covering the geography CH. The uncertainty has been adjusted accordingly.

## Review by Niels Jungbluth 2003-05-28
Passed.
