# tomato production, fresh grade, open field

Dataset: EcoSpold 2, unit process
Geography: RoW
Time period: 2009-01-01 to 2023-12-31
Technology level: current
Classification: ISIC rev.4 ecoinvent: 0113:Growing of vegetables and melons, roots and tubers
Tags: WFLDB
Scenario: Business-as-Usual
System model: Allocation, cut-off by classification
Generated by: [System]
Database: ecoinvent
isCopyrightProtected: true
accessRestrictedTo: 1

## General comment
The dataset represents the production of tomatoes, fresh grade in an open field cultivation.
[This dataset is meant to replace the following datasets:]

## Included activities start
This activity starts with soil cultivation after the harvest of the previous crop.

## Included activities end
This activity ends with harvest and transport to the farm gate. Storage is not included.

## Technology
Conventional production

## Reference product
- tomato, fresh grade: 1 kg; By-product classification allocatable product; CPC 01234: Tomatoes; HS2017 070200: Vegetables; tomatoes, fresh or chilled
  production volume 5.20097e10 kg
    Source: FAOSTAT. Average, 2009-2012. Global open field was calculated with the share from MX to fresh grade production of NL & ES & MX
  property carbon content, non-fossil 0.383276
    calculation: C-content of components according to ecoinvent report No. 15a. Source of composition: Souci, S.W., Fachmann, W., Kraut, H. (Hg.: Bundesminsiterium fur Ernahrung, Landwirtschaft und Forsten, Bonn) 'Die Zusammensetzung der Lebensmittel - Nahrwerttabellen', medpharm Scientific Publishers Stuttgart, CRC Press; 2000.
  property price 1.09 EUR2005
    Calculated from the trade statistics for the year 2005 published by the UN (COMTRADE database, accessed 20151105) as an average of 5 biggest importers of tomato in the world; USA, DE, UK, FR and NL. Comtrade cathegory: 702: Tomatoes, fresh or chilled.
  properties: carbon allocation 0.197361 kg, carbon content 0.383276, carbon content, fossil 0, dry mass 0.514933 kg, water content 0.942, water in wet mass 0.485067 kg, wet mass 1 kg

## Inputs from technosphere
- [thio]carbamate-compound: 1.44269e-6 kg; lognormal variance with pedigree 0.132, pedigree (4,4,5,5,4)
  properties: carbon content, fossil 0.626349, dry mass 1 kg, wet mass 1 kg
- acetamide-anillide-compound, unspecified: 6.19317e-8 kg; lognormal variance with pedigree 0.132, pedigree (4,4,5,5,4)
  properties: carbon content, fossil 0.659175, dry mass 1 kg, wet mass 1 kg
- ammonia, anhydrous, liquid: 9.51129e-6, 4.76371e-5, 2.01365e-6, 4.50443e-7, 1.65546e-5, 1.42307e-6, 4.38657e-6 kg (7 suppliers, which the file names only by identifier); sum of these 8.19767e-5 kg; lognormal variance with pedigree 0.132, pedigree (4,4,5,5,4)
  Calculated based on literature values: The nutrient content of the crop multiplied by the country-share of the fertiliser type (IFA 2014). See supporting documentation 'WFLDB-Documentation.pdf' chapter 'Fertiliser application' for L1 data and appendix for the source of nutrient content (https://ecoquery.ecoinvent.org/File/Reports).
  Corresponds to 4.05 kg/ha
  properties: dry mass 1 kg, wet mass 1 kg
- ammonium nitrate: 3.50821e-6, 1.87008e-6, 6.34837e-6, 2.43307e-6 kg (4 suppliers, which the file names only by identifier); sum of these 1.41597e-5 kg; lognormal variance with pedigree 0.132, pedigree (4,4,5,5,4)
  The exchange has been updated from 'ammonium nitrate, as N' into 'ammonium nitrate' and therefore its amount has been scaled (multiplied) from 0 kg by 2.8573 kg of 'ammonium nitrate' per kg of 'ammonium nitrate, as N'. Original comment of the exchange is: Calculated based on literature values: The nutrient content of the crop multiplied by the country-share of the fertiliser type (IFA 2014). See supporting documentation 'WFLDB-Documentation.pdf' chapter 'Fertiliser application' for L1 data and appendix for the source of nutrient content (https://ecoquery.ecoinvent.org/File/Reports).
  Corresponds to 0.245 kg/ha
  properties: dry mass 1 kg, wet mass 1 kg
- ammonium sulfate: 0.000189738, 5.82241e-5 kg (2 suppliers, which the file names only by identifier); sum of these 0.000247962 kg; lognormal variance with pedigree 0.132, pedigree (4,4,5,5,4)
  Calculated based on literature values: The nutrient content of the crop multiplied by the country-share of the fertiliser type (IFA 2014). See supporting documentation 'WFLDB-Documentation.pdf' chapter 'Fertiliser application' for L1 data and appendix for the source of nutrient content (https://ecoquery.ecoinvent.org/File/Reports).
  Corresponds to 12.2 kg/ha
  properties: dry mass 1 kg, wet mass 1 kg
- application of plant protection product, by field sprayer: 0.000100569 ha; lognormal variance with pedigree 0.132, pedigree (4,4,5,5,4)
  Proxy: Extrapolated using a modified MEXALCA-approach (Roches et al. 2010; Nemecek et al. 2012). See supporting documentation 'WFLDB-Documentation.pdf' chapter 'Machinery processes' for L1 data (https://ecoquery.ecoinvent.org/File/Reports).
- benzimidazole-compound: 2.17729e-6 kg; lognormal variance with pedigree 0.132, pedigree (4,4,5,5,4)
  properties: carbon content, fossil 0.529668, dry mass 1 kg, wet mass 1 kg
- compost: 0.119646 kg; lognormal variance with pedigree 0.132, pedigree (4,4,5,5,4)
  properties: cadmium content 3.6e-7, carbon content, non-fossil 0.183645, chromium content 2.23e-5, copper content 5.77e-5, dry mass 0.5 kg, lead content 4.9e-5, mercury content 1.2e-7, nickel content 1.63e-5, nitrogen content 0.014, phosphorus content 0.0035, potassium content 0.01, water content 1, wet mass 1 kg, zinc content 0.000184
- copper oxide: 4.46623e-6 kg; lognormal variance with pedigree 0.132, pedigree (4,4,5,5,4)
  properties: dry mass 1 kg, wet mass 1 kg
- cyclic N-compound: 2.95587e-6 kg; lognormal variance with pedigree 0.132, pedigree (4,4,5,5,4)
  properties: carbon content, fossil 0.641962, dry mass 1 kg, wet mass 1 kg
- dolomite: 0.000959887, 0.000508464 kg (2 suppliers, which the file names only by identifier); sum of these 0.00146835 kg; lognormal variance with pedigree 0.132, pedigree (4,4,5,5,4)
  properties: carbon content, fossil 0.130435, dry mass 1 kg, heating value, net 3.95 MJ, wet mass 1 kg
- fertilising, by broadcaster: 1.64847e-5 ha; lognormal variance with pedigree 0.132, pedigree (4,4,5,5,4)
  (same comment as for application of plant protection product, by field sprayer)
- inorganic nitrogen fertiliser, as N: 2.58128e-8, 7.18521e-7, 7.71572e-6, 1.7649e-6, 7.47416e-7, 6.88856e-6, 6.46862e-7, 4.53805e-6, 4.64246e-7, 1.68824e-6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 kg (28 suppliers, which the file names only by identifier); sum of these 0.000707669 kg; lognormal variance with pedigree 0.132, pedigree (4,4,5,5,4)
  properties: dry mass 1 kg, wet mass 1 kg
- inorganic phosphorus fertiliser, as P2O5: 7.51482e-6, 1.66803e-5, 0.000144312, 1.14374e-6, 1.6196e-6, 4.04066e-6, 5.30725e-7, 2.60115e-6, 6.20173e-8, 3.97662e-5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 kg (28 suppliers, which the file names only by identifier); sum of these 0.000978896 kg; lognormal variance with pedigree 0.132, pedigree (4,4,5,5,4)
  properties: dry mass 1 kg, wet mass 1 kg
- inorganic potassium fertiliser, as K2O: 2.35694e-6, 7.65022e-7, 2.64945e-7, 1.13325e-5, 3.40885e-7, 1.31291e-6, 5.67579e-7, 2.13756e-8, 3.29241e-5, 1.91818e-6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 kg (28 suppliers, which the file names only by identifier); sum of these 0.000392979 kg; lognormal variance with pedigree 0.132, pedigree (4,4,5,5,4)
  properties: dry mass 1 kg, wet mass 1 kg
- irrigation: 1.7447e-5, 0.000348912, 0.0212915, 0.000268805, 0.000720719, 0.000990687, 0.0768061, 0.000157239, 4.04397e-6, 0.00944938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 m3 (16 suppliers, which the file names only by identifier); sum of these 0.118027 m3; lognormal variance with pedigree 0.132, pedigree (4,4,5,5,4)
  Calculated value: The total amount of water used for irrigation (calculated from evapotranspiration, Pfister et al. 2011) multiplied by the country-share of irrigation technique (WFLDB-Guidelines.pdf, Appendix 6.1). See supporting documentation 'WFLDB-Documentation.pdf' chapter 'Water use for irrigation' for L2 data (https://ecoquery.ecoinvent.org/File/Reports).
  properties: dry mass 0.11 kg, water content 9089.91, wet mass 1000 kg
- lime: 3.21693e-5, 2.77841e-6 kg (2 suppliers, which the file names only by identifier); sum of these 3.49477e-5 kg; lognormal variance with pedigree 0.132, pedigree (4,4,5,5,4)
  properties: carbon content, fossil 0.120005, dry mass 1 kg, wet mass 1 kg
- liquid manure spreading, by vacuum tanker: 5.30329e-5 m3; lognormal variance with pedigree 0.132, pedigree (4,4,5,5,4)
  This amount corresponds to the input of liquid manure.
- mancozeb: 2.47429e-6 kg; lognormal variance with pedigree 0.132, pedigree (4,4,5,5,4)
  properties: carbon content, fossil 0.17759, dry mass 1 kg, wet mass 1 kg
- manure, liquid, cattle: 0.0248974 kg; lognormal variance with pedigree 0.132, pedigree (4,4,5,5,4)
  Calculated based on literature values: The total amount of manure multiplied by the country-share of manure per animal category (FAOSTAT 2015). See supporting documentation 'WFLDB-Documentation.pdf' chapter 'Fertiliser application' (https://ecoquery.ecoinvent.org/File/Reports).
  Corresponds to 1.23 m3/ha
  properties: carbon content, non-fossil 0.68, dry mass 0.075 kg, water content 12.333, wet mass 1 kg
- manure, liquid, swine: 0.0247867 kg; lognormal variance with pedigree 0.132, pedigree (4,4,5,5,4)
  Calculated based on literature values: The total amount of manure multiplied by the country-share of manure per animal category (FAOSTAT 2015). See supporting documentation 'WFLDB-Documentation.pdf' chapter 'Fertiliser application' (https://ecoquery.ecoinvent.org/File/Reports).
  Corresponds to 1.22 m3/ha
  properties: carbon content, non-fossil 0.64, dry mass 0.05 kg, water content 19, wet mass 1 kg
- manure, solid, cattle: 0.0151412 kg; lognormal variance with pedigree 0.132, pedigree (4,4,5,5,4)
  Calculated based on literature values: The total amount of manure multiplied by the country-share of manure per animal category (FAOSTAT 2015). See supporting documentation 'WFLDB-Documentation.pdf' chapter 'Fertiliser application' (https://ecoquery.ecoinvent.org/File/Reports).
  Corresponds to 747.0 kg/ha
  properties: carbon content, non-fossil 0.441, dry mass 0.22 kg, water content 3.5454, wet mass 1 kg
- mulching: 2.47253e-5 ha; lognormal variance with pedigree 0.132, pedigree (4,4,5,5,4)
  (same comment as for application of plant protection product, by field sprayer)
- packaging, for fertilisers: 0.0112558 kg; lognormal variance with pedigree 0.0592, pedigree (4,3,4,5,4)
  Total amount of active substance/s of fertilisers needed for the production of 'tomato, fresh grade' is calculated to be circa 5.63E-03 kg. Fertiliser/s used in this dataset is/are: 'ammonia, liquid', 'ammonium nitrate, as N', 'ammonium sulfate, as N', 'dolomite', 'lime', 'nitrogen fertiliser, as N', 'phosphate fertiliser, as P2O5', 'potassium chloride, as K2O', 'potassium fertiliser, as K2O', 'potassium sulfate, as K2O', 'urea, as N'. The total amount of active substance/s is doubled in order to account for the packaging of the dilluted product of fertiliser/s that is/are applied. Therefore, 1.13E-02 kg of packaging for fertilisers is justified with this exchange.
  properties: carbon content, fossil 0.825301, dry mass 1 kg, heating value, net 25.01 MJ, price 0.0642 EUR2005, wet mass 1 kg
  note on carbon content, fossil: Considering a chemical formula (C2H4)n for polyethylene, carbon content-fossil is calculated to be 0.856286 kg of Carbon per kg of dry mass.
- packaging, for pesticides: 0.00163825 kg; lognormal variance with pedigree 0.0592, pedigree (4,3,4,5,4)
  Total amount of active substance/s of pesticides needed for the production of tomato, fresh grade is calculated to be circa 8.19E-04 kg. Pesticide/s used in this dataset is/are: '[thio]carbamate-compound', 'acetamide-anillide-compound, unspecified', 'benzimidazole-compound', 'copper oxide', 'cyclic N-compound', 'mancozeb', 'pesticide, unspecified', 'pyrethroid-compound'. The total amount of active substance/s is doubled in order to account for the packaging of the dilluted product of pesticide/s that is/are applied. Therefore, 1.64E-03 kg of packaging for pesticides is justified with this exchange.
  properties: carbon content, fossil 0.85714, dry mass 1 kg, heating value, net 25.97 MJ, price 0.0642 EUR2005, wet mass 1 kg
- pesticide, unspecified: 0.000805089 kg; lognormal variance with pedigree 0.132, pedigree (4,4,5,5,4)
  Proxy: Extrapolated using a modified MEXALCA-approach (Roches et al. 2010; Nemecek et al. 2012). See supporting documentation 'WFLDB-Documentation.pdf' chapter 'Pesticide application' for L1 data (https://ecoquery.ecoinvent.org/File/Reports).
  Corresponds to 39.7 kg/ha
  properties: carbon content, fossil 0.486978, dry mass 1 kg, wet mass 1 kg
- plastic tunnel: 5.24615e-7 m2; lognormal variance with pedigree 0.132, pedigree (4,4,5,5,4)
- polyethylene, high density, granulate: 0.000532225 kg; lognormal variance with pedigree 0.132, pedigree (4,4,5,5,4)
  properties: carbon content, fossil 0.857143, dry mass 1 kg, heating value, net 42.47 MJ, wet mass 1 kg
  note on carbon content, fossil: Polyethylene is formed out of a huge amount of ethylene monomers (C2H4) (ecoinvent v2.2 report 11_II). MW=28 g/mol
- potassium chloride: 9.76465e-5, 0.00117742 kg (2 suppliers, which the file names only by identifier); sum of these 0.00127507 kg; lognormal variance with pedigree 0.132, pedigree (4,4,5,5,4)
  The exchange has been updated from 'potassium chloride, as K2O' into 'potassium chloride' and therefore its amount has been scaled (multiplied) from 0.0008 kg by 1.5829 kg of 'potassium chloride' per kg of 'potassium chloride, as K2O'. Original comment of the exchange is: Calculated based on literature values: The nutrient content of the crop multiplied by the country-share of the fertiliser type (IFA 2014). See supporting documentation 'WFLDB-Documentation.pdf' chapter 'Fertiliser application' for L1 data and appendix for the source of nutrient content (https://ecoquery.ecoinvent.org/File/Reports).
  Corresponds to 35.9 kg/ha
  properties: dry mass 1 kg, wet mass 1 kg
- potassium sulfate: 0.000114741, 0.000544688 kg (2 suppliers, which the file names only by identifier); sum of these 0.000659429 kg; lognormal variance with pedigree 0.132, pedigree (4,4,5,5,4)
  The exchange has been updated from 'potassium sulfate, as K2O' into 'potassium sulfate' and therefore its amount has been scaled (multiplied) from 0.0004 kg by 1.85 kg of 'potassium sulfate' per kg of 'potassium sulfate, as K2O'. Original comment of the exchange is: Calculated based on literature values: The nutrient content of the crop multiplied by the country-share of the fertiliser type (IFA 2014). See supporting documentation 'WFLDB-Documentation.pdf' chapter 'Fertiliser application' for L1 data and appendix for the source of nutrient content (https://ecoquery.ecoinvent.org/File/Reports).
  Corresponds to 8.07 kg/ha
  properties: dry mass 1 kg, wet mass 1 kg
- poultry manure, dried: 0.0188235 kg; lognormal variance with pedigree 0.132, pedigree (4,4,5,5,4)
  Calculated based on literature values: The total amount of manure multiplied by the country-share of manure per animal category (FAOSTAT 2015). See supporting documentation 'WFLDB-Documentation.pdf' chapter 'Fertiliser application' (https://ecoquery.ecoinvent.org/File/Reports).
  Corresponds to 929.0 kg/ha
  properties: cadmium content 2.92e-7, carbon content, non-fossil 0.33389, copper content 4.38e-5, dry mass 0.865 kg, lead content 2.92e-6, mercury content 2e-7, nickel content 4e-5, nitrogen content 0.532, phosphorus content 0.0167, potassium content 0.024, water content 0.156069, wet mass 1 kg, zinc content 0.000349
- poultry manure, fresh: 0.00167441 kg; lognormal variance with pedigree 0.132, pedigree (4,4,5,5,4)
  Calculated based on literature values: The total amount of manure multiplied by the country-share of manure per animal category (FAOSTAT 2015). See supporting documentation 'WFLDB-Documentation.pdf' chapter 'Fertiliser application' (https://ecoquery.ecoinvent.org/File/Reports).
  Corresponds to 0.165 m3/ha
  properties: carbon content, non-fossil 0.33389, dry mass 0.38 kg, water content 1.63158, wet mass 1 kg
- pyrethroid-compound: 4.55395e-7 kg; lognormal variance with pedigree 0.132, pedigree (4,4,5,5,4)
  properties: carbon content, fossil 0.623, dry mass 1 kg, wet mass 1 kg
- solid manure loading and spreading, by hydraulic loader and spreader: 0.0339646 kg; lognormal variance with pedigree 0.132, pedigree (4,4,5,5,4)
  This amount corresponds the input of solid manure.
- sowing: 2.02617e-5 ha; lognormal variance with pedigree 0.132, pedigree (4,4,5,5,4)
  Expert estimation. One crop cycle per year.
- tillage, cultivating, chiselling: 0.000107983 ha; lognormal variance with pedigree 0.132, pedigree (4,4,5,5,4)
  (same comment as for application of plant protection product, by field sprayer)
- tillage, currying, by weeder: 4.62776e-5 ha; lognormal variance with pedigree 0.132, pedigree (4,4,5,5,4)
  (same comment as for application of plant protection product, by field sprayer)
- tillage, harrowing, by rotary harrow: 1.05532e-6 ha; lognormal variance with pedigree 0.132, pedigree (4,4,5,5,4)
- tillage, harrowing, by spring tine harrow: 0.000200536 ha; lognormal variance with pedigree 0.132, pedigree (4,4,5,5,4)
  (same comment as for application of plant protection product, by field sprayer)
- tillage, hoeing and earthing-up, potatoes: 4.21397e-6 ha; lognormal variance with pedigree 0.132, pedigree (4,4,5,5,4)
- tillage, ploughing: 2.21244e-6 ha; lognormal variance with pedigree 0.132, pedigree (4,4,5,5,4)
- tillage, rolling: 7.71301e-5 ha; lognormal variance with pedigree 0.132, pedigree (4,4,5,5,4)
  (same comment as for application of plant protection product, by field sprayer)
- tillage, rotary cultivator: 0.000124257 ha; lognormal variance with pedigree 0.132, pedigree (4,4,5,5,4)
  (same comment as for application of plant protection product, by field sprayer)
- tomato seedling, for planting: 0.466018 unit; source Martínez-Blanco J. 2011; lognormal variance with pedigree 0.132, pedigree (4,4,5,5,4)
  Literature value or expert estimation (Martínez-Blanco et al. 2011). 2.5 plants per m2 is considered.
  properties: carbon content, non-fossil 0.439481, dry mass 0.578035 kg, water content 0.73, wet mass 1 kg
  note on carbon content, non-fossil: calculation: C-content of components according to ecoinvent report No. 15a. Source of composition: https://ndb.nal.usda.gov/ndb/search/. Unspecific seedling used as proxy.
- transport, freight train: 6.14922e-5, 5.6294e-5, 3.94937e-6, 1.30163e-5, 7.76641e-5 metric ton*km (5 suppliers, which the file names only by identifier); sum of these 0.000212416 metric ton*km; lognormal variance with pedigree 0.132, pedigree (4,4,5,5,4)
- transport, freight, inland waterways, barge: 3.59164e-5 metric ton*km; lognormal variance with pedigree 0.132, pedigree (4,4,5,5,4)
- transport, freight, lorry, unspecified: 0.000114455 metric ton*km; lognormal variance with pedigree 0.132, pedigree (4,4,5,5,4)
- transport, freight, sea, container ship with reefer, cooling: 0.000648114 metric ton*km; lognormal variance with pedigree 0.132, pedigree (4,4,5,5,4)
- transport, tractor and trailer, agricultural: 0.00170875, 6.94857e-6 metric ton*km (2 suppliers, which the file names only by identifier); sum of these 0.0017157 metric ton*km; lognormal variance with pedigree 0.132, pedigree (4,4,5,5,4)
  On-farm transport: Yield (in tonnes) multiplied by the average distance from field to farm. The distance was obtained by extrapolation (modified MEXALCA approach). See supporting documentation 'WFLDB-Documentation.pdf' chapter 'Machinery processes' (https://ecoquery.ecoinvent.org/File/Reports).
- urea: 0.000549891, 6.95457e-5, 8.62136e-5, 0.000469568 kg (4 suppliers, which the file names only by identifier); sum of these 0.00117522 kg; lognormal variance with pedigree 0.132, pedigree (4,4,5,5,4)
  The exchange has been updated from 'urea, as N' into 'urea' and therefore its amount has been scaled (multiplied) from 0.0005 kg by 2.1438 kg of 'urea' per kg of 'urea, as N'. Original comment of the exchange is: Calculated based on literature values: The nutrient content of the crop multiplied by the country-share of the fertiliser type (IFA 2014). See supporting documentation 'WFLDB-Documentation.pdf' chapter 'Fertiliser application' for L1 data and appendix for the source of nutrient content (https://ecoquery.ecoinvent.org/File/Reports).
  Corresponds to 14.7 kg/ha
  properties: carbon content, fossil 0.2, dry mass 1 kg, wet mass 1 kg

## Inputs from nature
All rows: lognormal variance with pedigree 0.132, pedigree (4,4,5,5,4)
- Carbon dioxide, in air [natural resource, in air]: 0.093216 kg
  CO2 uptake by biomass
- Energy, gross calorific value, in biomass [natural resource, biotic]: 0.916342 MJ
- Occupation, annual crop [natural resource, land]: 0.203164 m2*year
  Related to the duration from harvest date of previous crop to harvest date of main crop.
- Occupation, annual crop, irrigated [natural resource, land]: 0.0381444 m2*year
- Transformation, from annual crop, irrigated [natural resource, land]: 0.0589201 m2
- Transformation, from arable land, unspecified use [natural resource, land]: 0.202617 m2
  Land transformation: 1 ha divided by yield
- Transformation, to annual crop, irrigated [natural resource, land]: 0.0589201 m2
- Transformation, to arable land, unspecified use [natural resource, land]: 0.202617 m2
  Land transformation: 1 ha divided by yield

## Emissions to nature
All rows: lognormal variance with pedigree 0.132, pedigree (4,4,5,5,4)
- Ammonia [air, non-urban air or from high stacks]: 0.0004804 kg; source EEA 2013
  Calculated value - EMEP/EEA (2013). See 'WFLDB-Guidelines.pdf', available at https://ecoquery.ecoinvent.org/File/Reports.
- Carbon dioxide, fossil [air, non-urban air or from high stacks]: 0.00181058 kg
  Calculated value - CO2 emissions from urea and lime. See 'WFLDB-Guidelines.pdf', available at https://ecoquery.ecoinvent.org/File/Reports.
- Carbon dioxide, from soil or biomass stock [air, non-urban air or from high stacks]: 0.044482 kg
  Global average LUC emissions according 2nd edition of the Quantis-modified tool developed by Blonk Consultants 'WFLDB-adapted-Blonk 2014 direct-land-use-change-assessment-tool_2015-05-18a.xlsx', tab. 'Country & land use unknown'. The emission are based on the relative change in production areas in all countries for a given crop. The weighted average is used which takes into acount relative difference in crop expansion into primary forest, secondary forest, grassland, perennial and annual land.
- Dinitrogen monoxide [air, non-urban air or from high stacks]: 6.80823e-5 kg; source IPCC 2006
  Calculated value - IPCC (2006). See 'WFLDB-Guidelines.pdf', available at https://ecoquery.ecoinvent.org/File/Reports.
- Nitrogen oxides [air, non-urban air or from high stacks]: 0.000131004 kg; source EEA 2013
  Calculated value - EEA/EMEP (2013). See 'WFLDB-Guidelines.pdf', available at https://ecoquery.ecoinvent.org/File/Reports.
- Water [air, non-urban air or from high stacks]: 0.0889186 m3
  Calculated value - Emission calculated from water balance. See 'WFLDB-Guidelines.pdf', available at https://ecoquery.ecoinvent.org/File/Reports.
- Abamectin [soil, agricultural]: 9.30464e-8 kg
- Cadmium II [soil, agricultural]: 8.09271e-8 kg; source Freiermuth R.  2006
  Comment on mathematicalRelation:
  8.60400170845e-09 from Calculated value - Freiermuth (2006). See 'WFLDB-Guidelines.pdf', available at https://ecoquery.ecoinvent.org/File/Reports.
  -5.56456681013e-09 from Crop, default, heavy metals uptake model
  Heavy metal uptake can be excluded by setting the parameter heavyMetalUptakeSwitch to zero.
- Carbendazim [soil, agricultural]: 2.17729e-6 kg
- Carbofuran [soil, agricultural]: 1.44269e-6 kg
- Chromium III [soil, agricultural]: 9.44395e-7 kg; source Freiermuth R.  2006
  Comment on mathematicalRelation:
  -6.53776653415e-07 from Calculated value - Freiermuth (2006). See 'WFLDB-Guidelines.pdf', available at https://ecoquery.ecoinvent.org/File/Reports.
  -2.98669382659e-08 from Crop, default, heavy metals uptake model
  Heavy metal uptake can be excluded by setting the parameter heavyMetalUptakeSwitch to zero.
- Clothianidin [soil, agricultural]: 1.78649e-7 kg
- Copper ion [soil, agricultural]: 1.15924e-5 kg; source Freiermuth R.  2006
  Comment on mathematicalRelation:
  2.41469264382e-07 from Calculated value - Freiermuth (2006). See 'WFLDB-Guidelines.pdf', available at https://ecoquery.ecoinvent.org/File/Reports.
  Heavy metal uptake can be excluded by setting the parameter heavyMetalUptakeSwitch to zero.
- Cypermethrin [soil, agricultural]: 4.55395e-7 kg
- Difenoconazole [soil, agricultural]: 1.67483e-7 kg
- Dimethomorph [soil, agricultural]: 2.23311e-6 kg
- Imidacloprid [soil, agricultural]: 1.08648e-7 kg
- Lead II [soil, agricultural]: 2.54433e-6 kg; source Freiermuth R.  2006
  Comment on mathematicalRelation:
  8.77221802412e-09 from Calculated value - Freiermuth (2006). See 'WFLDB-Guidelines.pdf', available at https://ecoquery.ecoinvent.org/File/Reports.
  -2.96351269836e-08 from Crop, default, heavy metals uptake model
  Heavy metal uptake can be excluded by setting the parameter heavyMetalUptakeSwitch to zero.
- Mancozeb [soil, agricultural]: 2.47429e-6 kg
- Mercury II [soil, agricultural]: 1.06825e-8 kg; source Freiermuth R.  2006
  Comment on mathematicalRelation:
  8.35167723494e-09 from Calculated value - Freiermuth (2006). See 'WFLDB-Guidelines.pdf', available at https://ecoquery.ecoinvent.org/File/Reports.
  -2.22253862076e-09 from Crop, default, heavy metals uptake model
  Heavy metal uptake can be excluded by setting the parameter heavyMetalUptakeSwitch to zero.
- Metalaxil [soil, agricultural]: 6.19317e-8 kg
- Nickel II [soil, agricultural]: 5.74996e-7 kg; source Freiermuth R.  2006
  Comment on mathematicalRelation:
  -8.58724578638e-08 from Calculated value - Freiermuth (2006). See 'WFLDB-Guidelines.pdf', available at https://ecoquery.ecoinvent.org/File/Reports.
  -5.72458783717e-08 from Crop, default, heavy metals uptake model
  Heavy metal uptake can be excluded by setting the parameter heavyMetalUptakeSwitch to zero.
- Pesticides, unspecified [soil, agricultural]: 0.000804996 kg
  Calculated value - 100% emission in soil. See 'WFLDB-Guidelines.pdf', available at https://ecoquery.ecoinvent.org/File/Reports.
- Thiamethoxam [soil, agricultural]: 2.67974e-7 kg
- Zinc II [soil, agricultural]: 1.38938e-5 kg; source Freiermuth R.  2006
  Comment on mathematicalRelation:
  6.4891415054e-06 from Calculated value - Freiermuth (2006). See 'WFLDB-Guidelines.pdf', available at https://ecoquery.ecoinvent.org/File/Reports.
  -1.75491553044e-06 from Crop, default, heavy metals uptake model
  Heavy metal uptake can be excluded by setting the parameter heavyMetalUptakeSwitch to zero.
- Cadmium II [water, ground-]: 5.23021e-10 kg; source Freiermuth R.  2006
  Calculated value - Freiermuth (2006). See 'WFLDB-Guidelines.pdf', available at https://ecoquery.ecoinvent.org/File/Reports.
- Cadmium II [water, surface water]: 6.84274e-9 kg; source Freiermuth R.  2006
  (same comment as for Cadmium II)
- Chromium III [water, ground-]: 3.61142e-7 kg; source Freiermuth R.  2006
  (same comment as for Cadmium II)
- Chromium III [water, surface water]: 7.42e-7 kg; source Freiermuth R.  2006
  (same comment as for Cadmium II)
- Copper ion [water, ground-]: 8.21026e-8 kg; source Freiermuth R.  2006
  (same comment as for Cadmium II)
- Copper ion [water, surface water]: 1.2373e-6 kg; source Freiermuth R.  2006
  (same comment as for Cadmium II)
- Lead II [water, ground-]: 3.20115e-9 kg; source Freiermuth R.  2006
  (same comment as for Cadmium II)
- Lead II [water, surface water]: 4.08889e-7 kg; source Freiermuth R.  2006
  (same comment as for Cadmium II)
- Mercury II [water, ground-]: 2.71876e-11 kg; source Freiermuth R.  2006
  (same comment as for Cadmium II)
- Mercury II [water, surface water]: 2.25959e-9 kg; source Freiermuth R.  2006
  (same comment as for Cadmium II)
- Nickel II [water, surface water]: 6.32353e-7 kg; source Freiermuth R.  2006
  (same comment as for Cadmium II)
- Nitrate [water, ground-]: 0.00621761 kg; source Faist Emmenegger M. 2009
- Phosphate [water, ground-]: 5.1936e-6 kg; source Prasuhn V.  2006
  Calculated value - Prasuhn (2006). See 'WFLDB-Guidelines.pdf', available at https://ecoquery.ecoinvent.org/File/Reports.
- Phosphate [water, surface water]: 1.42184e-5 kg; source Prasuhn V.  2006
  (same comment as for Phosphate)
- Phosphorus [water, surface water]: 4.73471e-5 kg; source Prasuhn V.  2006
  Calculated value - Prasuhn (2006) and SQCB-Erosion. See 'WFLDB-Guidelines.pdf', available at https://ecoquery.ecoinvent.org/File/Reports.
- Water [water, ground-]: 0.0134517 m3
  (same comment as for Water)
- Water [water, surface water]: 0.0156563 m3
  (same comment as for Water)
- Zinc II [water, ground-]: 6.04851e-7 kg; source Freiermuth R.  2006
  (same comment as for Cadmium II)
- Zinc II [water, surface water]: 1.87247e-6 kg; source Freiermuth R.  2006
  (same comment as for Cadmium II)

## Sampling procedure
The dataset is a weighted average based on the production volumes of the regional datasets present in the database.

## Extrapolations
The dataset is a weighted average of the respective geographies present in the database. Uncertainty has been adjusted accordingly.

## Review by Assumpció ANTON 2016-05-30
Be aware that the use of statistics in input calculations could provide some specific inputs not common for specific crops, this should be corrected if better information is available and better reflexed in DQR . Currently, I would dissent for some of good marks provided, being a revision of criteria applied advisable.
Pesticides will need to be amended periodically checking for update of pesticides' ban.
