# liquefied petroleum gas, import from Europe

Dataset: EcoSpold 2, unit process
Geography: CH
Time period: 2010-01-01 to 2023-12-31
Technology level: current
Classification: ISIC rev.4 ecoinvent: 1920:Manufacture of refined petroleum products
Tags: ConvertedDataset
Scenario: Business-as-Usual
System model: Allocation, cut-off by classification
Generated by: [System]
Database: ecoinvent
isCopyrightProtected: false
accessRestrictedTo: 1

## General comment
This dataset represents the import of a refined petroleum product from Europe (without Switzerland) into Switzerland.

## Included activities start
This activity starts with the supply of the finished petroleum product from petroleum refinery operation in Europe without Switzerland.

## Included activities end
This activity covers the transport requirements for import of the finished petroleum product to Switzerland.

## Reference product
- liquefied petroleum gas: 1 kg; By-product classification allocatable product; CPC 334: Petroleum gases and other gaseous hydrocarbons, except natural gas; HS2017 2711: Petroleum gases and other gaseous hydrocarbons; CAS 68476-85-7
  production volume 4.9e7 kg
    From International Energy Agency: http://www.iea.org/stats/oildata.asp?COUNTRY_CODE=CH
  property heating value, net 45.5 MJ
    Indicative value. Reference: Fuels - Higher and Lower Calorific Values, available at: https://www.engineeringtoolbox.com/fuels-higher-calorific-values-d_169.html
  property price 0.276 EUR2005
    Temporary price data. Calculated as 90% of purchasers price based on: Average 2004 prices for EU27 from UN Commodity Trade Statistics Database - Average of Propane and butane (http://data.un.org/Data.aspx?q=Butanes+&d=ComTrade&f=_l1Code%3a28%3bcmdCode%3a271113 and http://data.un.org/Data.aspx?q=propane&d=ComTrade&f=_l1Code%3a28%3bcmdCode%3a271112; accessed 1 June 2010).
  properties: carbon allocation 0.821863 kg, carbon content 0.821863, carbon content, fossil 0.821863, carbon content, non-fossil 0, dry mass 1 kg, water content 0, water in wet mass 0 kg, wet mass 1 kg

## Inputs from technosphere
- liquefied petroleum gas: 1 kg
  activityLink added to better reflect the reality of the supply chain
  properties: carbon content, fossil 0.821863, dry mass 1 kg, heating value, net 45.5 MJ, wet mass 1 kg
  note on heating value, net: Indicative value. Reference: Fuels - Higher and Lower Calorific Values, available at: https://www.engineeringtoolbox.com/fuels-higher-calorific-values-d_169.html
- transport, freight train: 0.12 metric ton*km
  LPG Transport from European refineries to Switzerland. ESU services.
- transport, freight, lorry, unspecified: 0.02 metric ton*km
  LPG Transport from European refineries to Switzerland. ESU services.
