# treatment of used liquid crystal display, manual dismantling

Dataset: EcoSpold 2, unit process
Geography: RoW
Time period: 2005-01-01 to 2023-12-31
Technology level: current
Classification: ISIC rev.4 ecoinvent: 3830:Materials recovery
Scenario: Business-as-Usual
System model: Allocation, cut-off by classification
Share of production covered: 100 %
Generated by: Roland Hischier
Published in: Hischier R. 2007
Database: ecoinvent
isCopyrightProtected: true
accessRestrictedTo: 1

## General comment
The process represents the treatment 'used liquid crystal display' by manual dismantling in various fractions.

## Included activities start
The activity starts with the waste being available at the gate of the treatment facility. Collection and transportation of the waste to the treatment plant is not included.

## Included activities end
This activity ends when the used liquid crystal display has been dismantled manually.

## Geography
Modelling parameters are not specific to this geography.

## Technology
Commonly performed manual dismantling activities

## Reference product
- used liquid crystal display: -1 kg; name RP_amount_1; By-product classification Waste; CPC 39990: Other wastes n.e.c.; HS2017 852852: Monitors; other than cathode-ray tube; capable of directly connecting to and designed for use with an autom[...]
  production volume 47.5612 kg; name RP_PV_1
    calculated from the swiss PV and scaled up based on swiss GDP (0.23/0.481%)
  property carbon content, fossil 0.307481
    Composition data from LCD screen, divided by its weight, 5.14 kg (Tab 4.12, ecoinvent v2.2 report 18_V)
  property carbon content, non-fossil 7.44321e-5
    (same comment as for used liquid crystal display)
  property price 0 EUR2005
    Waste products are assigned a price of zero as they are assumed to require further treatment.
  properties: carbon allocation 0.307556 kg, carbon content 0.307556, dry mass 1 kg, water content 0, water in wet mass 0 kg, wet mass 1 kg

## Inputs from technosphere
- manual treatment facility, waste electric and electronic equipment: 1.6e-8 unit; lognormal variance with pedigree 0.578, pedigree (4,5,5,5,5)
  Rough estimation of infrastructure
  Uncertainty: rough estimation of infrastructure
- used cable: -0.0126 kg; name BP_amount_1; lognormal variance with pedigree 0.016, pedigree (3,4,1,5,1)
  Calculated - based on composition data
  Uncertainty: calculated - based on composition data
  production volume; = ABS(RP_PV_1 * (BP_amount_1 / RP_amount_1))
    Calculated from production volume of reference product using the relative outputs.
  properties: carbon content, fossil 0.27472, dry mass 1 kg, wet mass 1 kg
  note on carbon content, fossil: According to the European company, 1 kg cable is split up into 0.66 kg of copper and 0.34 kg of plastics (ecoinvent v2.2 report 18_V, pg 97). Plastic C content (0.808) was calculated using data in Tab A.2, ecoinvent v2.2 report 13_I.
- used fluorescent lamp: -0.0111 kg; lognormal variance with pedigree 0.016, pedigree (3,4,1,5,1)
  Calculated - based on composition data
  Uncertainty: calculated - based on composition data
  production volume
    Calculated from the production volume of used liquid crystal display in proportion to the respective output amounts.
  properties: carbon content, fossil 0.554974, dry mass 1 kg, wet mass 1 kg
  note on carbon content, fossil: CCFL backlight lamps is used as a specific example of fluorescent lamps (ecoinvent v2.2 report 18_V)
- used liquid crystal display module: -0.4415 kg; lognormal variance with pedigree 0.016, pedigree (3,4,1,5,1)
  Calculated - based on composition data
  Uncertainty: calculated - based on composition data
  production volume
    (same comment as for used fluorescent lamp)
  properties: carbon content, fossil 0.327872, carbon content, non-fossil 4.20542e-5, dry mass 1 kg, wet mass 1 kg
- used printed wiring boards: -0.0428 kg; lognormal variance with pedigree 0.016, pedigree (3,4,1,5,1)
  Calculated - based on composition data
  Uncertainty: calculated - based on composition data
  production volume
    (same comment as for used fluorescent lamp)
  properties: carbon content, fossil 0.193742, carbon content, non-fossil 0.000960142, dry mass 1 kg, wet mass 1 kg
  note on carbon content, fossil: Composition of printed wiring boards used to calculate C content
- waste plastic, consumer electronics: -0.3769 kg; lognormal variance with pedigree 0.016, pedigree (3,4,1,5,1)
  Calculated - based on composition data
  Uncertainty: calculated - based on composition data
  production volume
    (same comment as for used fluorescent lamp)
  properties: carbon content, fossil 0.830215, dry mass 0.847 kg, heating value, net 34.78 MJ, water content 0.180638, wet mass 1 kg
  note on carbon content, fossil: C content in 1 kg DM was calculated using data in Tab A.2, ecoinvent v2.2 report 13_I
  note on heating value, net: Assumed equal to "waste plastic, consumer electronics, sorted".

## Sampling procedure
own experiences

## Extrapolations
This dataset has been copied from an original dataset covering the geography CH. The uncertainty and Production Volume (PV) has been adjusted accordingly.

## Review by Jürgen Sutter 2007-08-31
passed.

## Review by Emilia Moreno Ruiz 2012-12-19
correction of exchange "used cable"
