# sugarcane production

Dataset: EcoSpold 2, unit process
Geography: BR-GO
Time period: 2012-01-01 to 2023-12-31
Technology level: current
Classification: ISIC rev.4 ecoinvent: 0114:Growing of sugar cane
Synonyms: sugarcane cultivation, cane production
Tags: No
Scenario: Business-as-Usual
System model: Allocation, cut-off by classification
Generated by: Otavio Cavalett
Published in: Folegatti Matsuura, M. 2017
Database: ecoinvent
isCopyrightProtected: true
accessRestrictedTo: 1

## General comment
The raw data from IDEA (2014) were organized in electronic spreadsheets and checked for completeness and consistency. Agricultural inputs were detailed as to their composition and physical characteristics. Agricultural operations were characterized in terms of machinery (tractor and implement), type of fuel and specific consumption. Precipitation is enought to supply water to the crop, no extra water needed. Emissions from the agricultural process were estimated using the BRCalc/ICVCalc tool, developed by Embrapa Environment, which includes specific climate and soil databases for the 137 Brazilian agricultural mesoregions, in addition to databases of parameters related to agricultural crops, fertilizers and pesticides.
The main emission models adopted by BRCalc/ICVCalc derive from the references: Nemecek et al. (2015), IPCC (2019), Nemecek & Kagi (2007). It was used the model BRLUC (Donke et al., 2020) to estimate the LUC emissions; and the PestLCI Consensus V1.0, parameterized for Brazil, to estimate pesticide emissions.

## Included activities start
This activity starts after the harvesting and transportation of the previous crop.

## Included activities end
The dataset includes the inputs of mineral fertilisers, industrial residues as fertilisers and pesticides. The amount of sugarcane used as seedlings in the planting operation is considered by reducing sugarcane yield; therefore there is no input of seedlings in the dataset. The dataset also includes all machine operations. Infrastructure for machinery shelter and maintenance is included in the dataset of those operations. Some agricultural operations are done either manually or mechanically, values in the inventory represent national averages. Further, direct field emissions are included, with important regionalizations added. The dataset also includes the transportation of products inside the farm: fertilisers, lime and gypsum from sheds to field.The dataset doesn't include the transport of sugarcane to the industry. Sugarcane straw recovery and transportation are considered in separeted datasets. Seedling treatment and biologic control of pests are also not considered. The activity ends when sugarcane is loaded at the truck at the farm gate.

## Allocation
It is not a multifunctional process.

## Geography
The inventory is modelled for Brazil, Goiás

## Technology
Cultivation of sugarcane with 94% mechanical harvest and 94% mechanized planting.The percentage of total area are: 18% plant cane (i.e. fist year cane); 71% for ratoon cane (second to fifth year cane) and 11% for reforming (fallow period).

## Time period
Time period of the most of the data collected for this dataset.

## Reference product
- sugarcane: 1 kg; By-product classification allocatable product; CPC 01802: Sugar cane; HS2017 121293: Sugar cane; fit for human consumption, fresh, chilled, frozen or dried, whether or not ground
  Cultivation of sugarcane with 94% mechanical harvest and 94% mechanized planting.The percentage of total area are: 18% plant cane (i.e. fist year cane); 71% for ratoon cane (second to fifth year cane) and 11% for reforming (fallow period).
  production volume 7.20668e10 kg
    IBGE, 2021. Brazilian Institute of Geography and Statistic. Municipal Agricultural Production – PAM. Produção Agrícola Municipal [in Portuguese]. Available at: https://sidra.ibge.gov.br/home/ipp/brasil
  property price 0.0281 EUR2005
    Average 2005 prices for main producers of sugarcane, namely Brasil, India, China, Thailand, Pakistan and Mexico. from Import/Export data (US$ and tonnes) in FAO Producer prices Statistics Database; Comodity: sugar cane (Producer Prices)
  properties: carbon allocation 0.312602 kg, carbon content 0.4196, carbon content, fossil 0, carbon content, non-fossil 0.4196, dry mass 0.745 kg, water content 0.342282, water in wet mass 0.255 kg, wet mass 1 kg

## Inputs from technosphere
- application of plant protection product, by field sprayer: 1.93e-5 ha; lognormal variance with pedigree 1.1287, pedigree (2,2,4,1,1)
  Agricultural operation. Amount for typical system based in Cavalett et al. (2016) and IDEA (2014).
  Uncertainty: Agricultural operation. Amount for typical system based in Cavalett et al. (2016) and IDEA (2014).
- ash, from combustion of bagasse from sugarcane: 0.009 kg; lognormal variance with pedigree 1.1287, pedigree (2,2,4,1,1)
  Amount for typical system based in Cavalett et al. (2016) and IDEA (2014). The industrial residues production adopted was based on the standards of an Annexed Distilleries. It was considered that all ashes was applied in the plant cane area.
  Uncertainty: Amount for typical system based in Cavalett et al. (2016) and IDEA (2014). The industrial residues production adopted was based on the standards of an Annexed Distilleries. It was considered that all ashes was applied in the plant cane area.
  properties: dry mass 1 kg, wet mass 1 kg
- fertilising, by rig fertiliser, sugarcane: 1.1e-5 ha; lognormal variance with pedigree 1.1287, pedigree (2,2,4,1,1)
  (same comment as for application of plant protection product, by field sprayer)
- fertilising, by stool splitter, sugarcane: 2.92e-6 ha; lognormal variance with pedigree 1.1287, pedigree (2,2,4,1,1)
  (same comment as for application of plant protection product, by field sprayer)
- field leveling, sugarcane: 2.76e-6 ha; lognormal variance with pedigree 1.1287, pedigree (2,2,4,1,1)
  (same comment as for application of plant protection product, by field sprayer)
- filter cake, from sugarcane juice filtration: 0.0352 kg; lognormal variance with pedigree 1.1287, pedigree (2,2,4,1,1)
  Amount for typical system based in Cavalett et al. (2016) and IDEA (2014). The industrial residues production adopted was based on the standards of an Annexed Distilleries. Value in wet basis (moisture content 65%). It was considered that all the filter cake was applied in plant cane area.
  Uncertainty: Amount for typical system based in Cavalett et al. (2016) and IDEA (2014). The industrial residues production adopted was based on the standards of an Annexed Distilleries. Value in wet basis (moisture content 65%). It was considered that all the filter cake was applied in plant cane area.
  properties: carbon content, non-fossil 0.6514, dry mass 0.35 kg, water content 1.85714, wet mass 1 kg
- furrow covering, sugarcane: 1.6e-7 ha; lognormal variance with pedigree 1.1287, pedigree (2,2,4,1,1)
  Agricultural operation related to the semi-mechanized planting of sugarcane. Amount for typical system based in Cavalett et al. (2016) and IDEA (2014).
  Uncertainty: Agricultural operation related to the semi-mechanized planting of sugarcane. Amount for typical system based in Cavalett et al. (2016) and IDEA (2014).
- furrowing, sugarcane: 1.6e-7 ha; lognormal variance with pedigree 1.1287, pedigree (2,2,4,1,1)
  (same comment as for furrow covering, sugarcane)
- glyphosate: 2.65e-6 kg; lognormal variance with pedigree 1.1287, pedigree (2,2,4,1,1)
  Amount for typical system from May (2015).
  Uncertainty: Amount for typical system from May (2015).
  properties: carbon content, fossil 0.214286, dry mass 1 kg, wet mass 1 kg
- gypsum, mineral: 0.0009199 kg; lognormal variance with pedigree 1.1287, pedigree (2,2,4,1,1)
  Amount for typical system based in Cavalett et al. (2016) and IDEA (2014). It was considered that all gypsum was applied in the plant cane area (every 3 years).
  Uncertainty: Amount for typical system based in Cavalett et al. (2016) and IDEA (2014). It was considered that all gypsum was applied in the plant cane area (every 3 years).
  properties: dry mass 1 kg, wet mass 1 kg
- harvesting, sugarcane: 1.29e-5 ha; lognormal variance with pedigree 1.1287, pedigree (2,2,4,1,1)
  Agricultural operation related to the mechanized harvesting of sugarcane. Amount for typical system based in Cavalett et al. (2016) and IDEA (2014).
  Uncertainty: Agricultural operation related to the mechanized harvesting of sugarcane. Amount for typical system based in Cavalett et al. (2016) and IDEA (2014).
- land use change, perennial crop: 1.35e-5 ha; lognormal variance with pedigree 1.22882, pedigree (2,1,2,2,3)
  Calculated value. Land use change (LUC) based on Donke et al, 2020.
- lime: 0.00184 kg; lognormal variance with pedigree 1.1287, pedigree (2,2,4,1,1)
  Amount for typical system based in Cavalett et al. (2016) and IDEA (2014). It was considered that all lime was applied in the plant cane area (every 3 years).
  Uncertainty: Amount for typical system based in Cavalett et al. (2016) and IDEA (2014). It was considered that all lime was applied in the plant cane area (every 3 years).
  properties: carbon content, fossil 0.120005, dry mass 1 kg, wet mass 1 kg
- limestone and gypsum application, by spreader: 1.84e-6 ha; lognormal variance with pedigree 1.1287, pedigree (2,2,4,1,1)
  (same comment as for application of plant protection product, by field sprayer)
- packaging, for fertilisers: 0.01074 kg; lognormal variance with pedigree 1.6586, pedigree (4,3,4,5,4)
  Total amount of active substance/s of fertilisers needed for the production of 'sugarcane' is calculated to be circa 2.69E-03 kg. Fertiliser/s used in this dataset is/are:, 'phosphate fertiliser, as P2O5', 'potassium chloride, as K2O', 'urea, as N'. The total amount of active substance/s is doubled in order to account for the packaging of the dilluted product of fertiliser/s that is/are applied. Therefore, 1,074E-02 kg of packaging for fertilisers is justified with this exchange. Soil correctives, i.e. “Lime” and “Gypsum”, were not considered in the packaging calculation since these are transported in bulk.
  Uncertainty: Total amount of active substance/s of fertilisers needed for the production of 'sugarcane' is calculated to be circa 2.69E-03 kg. Fertiliser/s used in this dataset is/are:, 'phosphate fertiliser, as P2O5', 'potassium chloride, as K2O', 'urea, as N'. The total amount of active substance/s is doubled in order to account for the packaging of the dilluted product of fertiliser/s that is/are applied. Therefore, 1,074E-02 kg of packaging for fertilisers is justified with this exchange. Soil correctives, i.e. “Lime” and “Gypsum”, were not considered in the packaging calculation since these are transported in bulk.
  properties: carbon content, fossil 0.825301, dry mass 1 kg, price 0.0642 EUR2005, wet mass 1 kg
  note on carbon content, fossil: Considering a chemical formula (C2H4)n for polyethylene, carbon content-fossil is calculated to be 0.856286 kg of Carbon per kg of dry mass.
- packaging, for pesticides: 2.85e-5 kg; lognormal variance with pedigree 1.6586, pedigree (4,3,4,5,4)
  Total amount of active substance/s of pesticides needed for the production of sugarcane is calculated to be circa 1.42E-05 kg. Pesticide/s used in this dataset is/are: 'glyphosate', 'pesticide, unspecified'. The total amount of active substance/s is doubled in order to account for the packaging of the dilluted product of pesticide/s that is/are applied. Therefore, 2.85E-05 kg of packaging for pesticides is justified with this exchange.
  Uncertainty: Total amount of active substance/s of pesticides needed for the production of sugarcane is calculated to be circa 1.42E-05 kg. Pesticide/s used in this dataset is/are: 'glyphosate', 'pesticide, unspecified'. The total amount of active substance/s is doubled in order to account for the packaging of the dilluted product of pesticide/s that is/are applied. Therefore, 2.85E-05 kg of packaging for pesticides is justified with this exchange.
  properties: carbon content, fossil 0.85714, dry mass 1 kg, price 0.0642 EUR2005, wet mass 1 kg
- pesticide, unspecified: 1.16e-5 kg; lognormal variance with pedigree 1.1287, pedigree (2,2,4,1,1)
  Amount for typical system from May (2015). This exchange represents the input of sulfentrazone (71%), fipronil (5%) and tebuthiuron(24%).
  Uncertainty: Amount for typical system from May (2015). This exchange represents the input of sulfentrazone (71%), fipronil (5%) and tebuthiuron(24%).
  properties: carbon content, fossil 0.486978, dry mass 1 kg, wet mass 1 kg
- planting, sugarcane: 2.6e-6 ha; lognormal variance with pedigree 1.1287, pedigree (2,2,4,1,1)
  Agricultural operation related to the mechanized planting of sugarcane. Amount for typical system based in Cavalett et al. (2016) and IDEA (2014).
  Uncertainty: Agricultural operation related to the mechanized planting of sugarcane. Amount for typical system based in Cavalett et al. (2016) and IDEA (2014).
- potassium chloride: 0.00209273 kg; lognormal variance with pedigree 1.1287, pedigree (2,2,4,1,1)
  Amount for typical system based in Cavalett et al. (2016) and IDEA (2014).
  Uncertainty: Amount for typical system based in Cavalett et al. (2016) and IDEA (2014).
  properties: dry mass 1 kg, wet mass 1 kg
- single superphosphate: 0.00171958 kg; lognormal variance with pedigree 1.1287, pedigree (2,2,4,1,1)
  (same comment as for potassium chloride)
  properties: dry mass 1 kg, phosphorus content 0.0916484, wet mass 1 kg
- sugarcane loading, by loader: 8.97e-7 ha; lognormal variance with pedigree 1.1287, pedigree (2,2,4,1,1)
  Agricultural operation related to the manual harvesting of sugarcane. Amount for typical system based in Cavalett et al. (2016) and IDEA (2014).
  Uncertainty: Agricultural operation related to the manual harvesting of sugarcane. Amount for typical system based in Cavalett et al. (2016) and IDEA (2014).
- sugarcane transfer, by dump cart: 1.29e-5 ha; lognormal variance with pedigree 1.1287, pedigree (2,2,4,1,1)
  Agricultural operation operation related to the mechanized harvesting of sugarcane. Amount for typical system based in Cavalett et al. (2016) and IDEA (2014). The transfers of sugarcane from the harvester to the dump cart and from the dump cart to the truck are included in this operation.
  Uncertainty: Agricultural operation operation related to the mechanized harvesting of sugarcane. Amount for typical system based in Cavalett et al. (2016) and IDEA (2014). The transfers of sugarcane from the harvester to the dump cart and from the dump cart to the truck are included in this operation.
- sugarcane vinasse application, by wheel reel irrigation: 1.2e-6 ha; lognormal variance with pedigree 1.1287, pedigree (2,2,4,1,1)
  Agricultural operation. This operation besides providing water and nutrients, is seen as a soil fertility recovery strategy. It is performed with a tractor plus an aspersion system of vinasse. Amount for typical system based in Cavalett et al. (2016) and IDEA (2014).
  Uncertainty: Agricultural operation. This operation besides providing water and nutrients, is seen as a soil fertility recovery strategy. It is performed with a tractor plus an aspersion system of vinasse. Amount for typical system based in Cavalett et al. (2016) and IDEA (2014).
- tap water: 0.012455 kg; lognormal variance with pedigree 1.1701, pedigree (3,2,4,1,1)
  Water is used to dilute pesticides in a rate of 200 liters per application per ha. Amount for typical system from May (2015).
  Uncertainty: Water is used to dilute pesticides in a rate of 200 liters per application per ha. Amount for typical system from May (2015).
  properties: carbon content, fossil 0.00178991, dry mass 0.000337476 kg, water content 2962.17, wet mass 1 kg
  note on carbon content, fossil: Bicarbonate content is 2.93 mol/m3. CO2 content is 0.1 mol/m3 (ecoinvent v2.2 report 8, Tab 93.1).
- tillage, harrowing, by offset disc harrow: 2.76e-6 ha; lognormal variance with pedigree 1.1287, pedigree (2,2,4,1,1)
  (same comment as for application of plant protection product, by field sprayer)
- tillage, harrowing, by offset leveling disc harrow: 2.76e-6 ha; lognormal variance with pedigree 1.1287, pedigree (2,2,4,1,1)
  (same comment as for application of plant protection product, by field sprayer)
- tillage, subsoiling, by subsoiler plow: 2.76e-6 ha; lognormal variance with pedigree 1.1287, pedigree (2,2,4,1,1)
  (same comment as for application of plant protection product, by field sprayer)
- transport, tractor and trailer, agricultural: 0.0002388 metric ton*km; lognormal variance with pedigree 1.1287, pedigree (2,2,4,1,1)
  Average transport of water for pesticide spray , fertilisers, limestone and gypsum from shed to field. Calculation based on consultation to experts.
  Uncertainty: Average transport of fertilisers, limestone and gypsum from shed to field.. Transport of sugarcane from field to warehouse and transport of tapwater for pesticide spray from source to mixing point. are also included. Calculation based on consultation to experts.
- urea: 0.00246878 kg; lognormal variance with pedigree 1.1287, pedigree (2,2,4,1,1)
  It was assumed that all nitrogen fertiliser comes from urea. Amount for typical system based in Cavalett et al. (2016) and IDEA (2014).
  Uncertainty: It was assumed that all nitrogen fertiliser comes from urea. Amount for typical system based in Cavalett et al. (2016) and IDEA (2014).
  properties: carbon content, fossil 0.2, dry mass 1 kg, wet mass 1 kg
- vinasse, from fermentation of sugarcane: 1.04001 kg; lognormal variance with pedigree 1.1287, pedigree (2,2,4,1,1)
  Amount for typical system based in Cavalett et al. (2016) and IDEA (2014). The industrial residues production adopted was based on the standards of an Annexed Distilleries. It was considered that all vinasse was applied in the ratoon cane area.
  Uncertainty: Amount for typical system based in Cavalett et al. (2016) and IDEA (2014). The industrial residues production adopted was based on the standards of an Annexed Distilleries. It was considered that all vinasse was applied in the ratoon cane area.
  properties: carbon content, non-fossil 0.1288, dry mass 0.0554348 kg, water content 17.0392, wet mass 1 kg

## Inputs from nature
- Carbon dioxide, in air [natural resource, in air]: 1.15 kg; lognormal variance with pedigree 1.1287, pedigree (2,2,4,1,1)
  Carbon dioxide (CO2) absorption from air during photosynthesis was also included, according to Nemecek and Schnetzer (2012). It considers the carbon content of the reference product based on the ecoinvent database (Jungbluth et al., 2007).
  Uncertainty: CO2 absorbed during photosyntesis and present at the product. See "3.1 CO2 from the Atmosphere" in Nemececk & Schnetzer (2011).
- Energy, gross calorific value, in biomass [natural resource, biotic]: 4.9478 MJ; lognormal variance with pedigree 1.128, pedigree (1,1,4,1,1)
  The calorific value of the reference product was based on the ecoinvent database (Jungbluth et al., 2007).
  Uncertainty: Calorific value present in sugarcane. Based on Ecoinvent database.
- Occupation, permanent crop, non-irrigated [natural resource, land]: 0.156 m2*year; lognormal variance with pedigree 1.1287, pedigree (2,2,4,1,1)
  Area occupied by sugarcane. Amount for typical system based in Cavalett et al. (2016) and IDEA (2014).
  Uncertainty: Amount for typical system based in Cavalett et al. (2016) and IDEA (2014).
- Transformation, from permanent crop, non-irrigated [natural resource, land]: 0.00778 m2; lognormal variance with pedigree 1.1287, pedigree (2,2,4,1,1)
  Total area transformed from permanent crop cultivated area and it was calculated considering sugarcane as a perennial crop (1/(20*yield)). Amount for typical system based in Cavalett et al. (2016) and IDEA (2014).
  Uncertainty: Amount for typical system based in Cavalett et al. (2016) and IDEA (2014).
- Transformation, to permanent crop, non-irrigated [natural resource, land]: 0.00778 m2; lognormal variance with pedigree 1.1287, pedigree (2,2,4,1,1)
  Total area transformed to sugarcane cultivated area. Amount for typical system based in Cavalett et al. (2016) and IDEA (2014).
  Uncertainty: Amount for typical system based in Cavalett et al. (2016) and IDEA (2014).

## Emissions to nature
- Ammonia [air, non-urban air or from high stacks]: 0.000325 kg; lognormal variance with pedigree 1.11233, pedigree (3,2,2,2,1)
  Ammonia releases to air, according to the AGRAMMON model: 'Plant production' (Nemecek & Schnetzer, 2011)
  Uncertainty: NH3 emissions from applied mineral fertilisers are calculated by constant emission factors for each group of fertiliser. For Urea, EMEP/EEA 2019. For Recycling Fertiliser (vinasse application), see Nemecek (2012). Amount of N in vinasse:0.375 kg N/m3 (CGEE, 2012).
- Carbon dioxide, fossil [air, non-urban air or from high stacks]: 0.00269 kg; lognormal variance with pedigree 1.11233, pedigree (3,2,2,2,1)
  Pesticide emissions are calculated using the PestLCI model, adapted to the Brazilian conditions (Embrapa, 2021; PestLCI, 2022).
  Uncertainty: Emissions of carbon dioxide to air from limestone and urea application based on IPCC (2006).
- Carbon monoxide, non-fossil [air, non-urban air or from high stacks]: 0.000845 kg; lognormal variance with pedigree 1.11233, pedigree (3,2,2,2,1)
  Emissions from sugarcane straw burning on the field, according to IPCC (2019)
  Uncertainty: Emissions of straw burning in the field. Based on IPCC (2006,2019)
- Dinitrogen monoxide [air, non-urban air or from high stacks]: 5.94e-5 kg; lognormal variance with pedigree 1.11233, pedigree (3,2,2,2,1)
  Direct and indirect N2O emissions according to IPCC (2019) plus emissions from sugarcane straw burning on the field according to IPCC (2019)
  Uncertainty: Emissions of N2O to the air after nitrogen fertiliser application and straw burning in the field. Based on IPCC (2006,2019).
- Fipronil [air, non-urban air or from high stacks]: 5.8e-8 kg; lognormal variance with pedigree 1.1123, pedigree (3,2,2,1,1)
  Pesticide emissions are calculated using the PestLCI model, adapted to the Brazilian conditions (Embrapa, 2021; PestLCI, 2022).
  Uncertainty: Based on PestLCI model Consensus v 1.0 adapted for Brasil (Embrapa 2021).
- Glyphosate [air, non-urban air or from high stacks]: 2.65e-7 kg; lognormal variance with pedigree 1.1123, pedigree (3,2,2,1,1)
  (same comment as for Fipronil)
- Methane, non-fossil [air, non-urban air or from high stacks]: 2.48e-5 kg; lognormal variance with pedigree 1.11233, pedigree (3,2,2,2,1)
  (same comment as for Carbon monoxide, non-fossil)
- Nitrogen oxides [air, non-urban air or from high stacks]: 3.63e-5 kg; lognormal variance with pedigree 1.11233, pedigree (3,2,2,2,1)
  Emissions of NOx from applied mineral fertilisers, according to WFLDB (2019) plus emissions from sugarcane straw burning on the field, according to IPCC (2019)
  Uncertainty: Emissions of NOx to the air after nitrogen fertiliser application and straw burning in the field. Based on WFLDB (2019) and IPCC (2006,2019).
- Sulfentrazone [air, non-urban air or from high stacks]: 8.24e-7 kg; lognormal variance with pedigree 1.1123, pedigree (3,2,2,1,1)
  (same comment as for Fipronil)
- Tebuthiuron [air, non-urban air or from high stacks]: 2.78e-7 kg; lognormal variance with pedigree 1.1123, pedigree (3,2,2,1,1)
  (same comment as for Fipronil)
- Water [air, unspecified]: 1.2455e-5 m3; lognormal variance with pedigree 0.0587, pedigree (4,4,4,3,4)
- Arsenic ion [soil, agricultural]: 1.4236e-8 kg; normal variance with pedigree 1.21, pedigree (5,5,5,5,5)
  Heavy metals emissions to agricultural soil through erosion are estimated by using the SALCA-heavy metal model (Nemecek et al., 2015).
  Uncertainty: Emissions of heavy metals to soil estimated based on WFLDB adapted to Brazil
- Cadmium II [soil, agricultural]: -1.80902e-8 kg; normal variance with pedigree 1.21, pedigree (5,5,5,5,5)
  (same comment as for Arsenic ion)
- Chromium III [soil, agricultural]: -3.34639e-8 kg; normal variance with pedigree 1.21, pedigree (5,5,5,5,5)
  (same comment as for Arsenic ion)
- Copper ion [soil, agricultural]: -7.2411e-7 kg; normal variance with pedigree 1.21, pedigree (5,5,5,5,5)
  (same comment as for Arsenic ion)
- Fipronil [soil, agricultural]: 5.15e-7 kg; lognormal variance with pedigree 1.1123, pedigree (3,2,2,1,1)
  Pesticide emissions are calculated using the PestLCI model, adapted to the Brazilian conditions (Embrapa, 2021; PestLCI, 2022).
  Uncertainty: Based on PestLCI model Consensus v 1.0 adapted for Brasil (Embrapa 2021)
- Fipronil [soil, forestry]: 2.29e-9 kg; lognormal variance with pedigree 1.1123, pedigree (3,2,2,1,1)
  (same comment as for Fipronil)
- Glyphosate [soil, agricultural]: 2.26e-6 kg; lognormal variance with pedigree 1.1123, pedigree (3,2,2,1,1)
  (same comment as for Fipronil)
- Glyphosate [soil, forestry]: 1.05e-8 kg; lognormal variance with pedigree 1.1123, pedigree (3,2,2,1,1)
  (same comment as for Fipronil)
- Lead II [soil, agricultural]: 8.75558e-8 kg; normal variance with pedigree 1.21, pedigree (5,5,5,5,5)
  (same comment as for Arsenic ion)
- Sulfentrazone [soil, agricultural]: 7.29e-6 kg; lognormal variance with pedigree 1.1123, pedigree (3,2,2,1,1)
  (same comment as for Fipronil)
- Sulfentrazone [soil, forestry]: 3.34e-8 kg; lognormal variance with pedigree 1.1123, pedigree (3,2,2,1,1)
  (same comment as for Fipronil)
- Tebuthiuron [soil, agricultural]: 2.47e-6 kg; lognormal variance with pedigree 1.1123, pedigree (3,2,2,1,1)
  (same comment as for Fipronil)
- Tebuthiuron [soil, forestry]: 1.12e-8 kg; lognormal variance with pedigree 1.1123, pedigree (3,2,2,1,1)
  (same comment as for Fipronil)
- Arsenic ion [water, surface water]: 1.42374e-12 kg; lognormal variance with pedigree 1.11233, pedigree (3,2,2,2,1)
  Emissions of heavy metals to surface water are calculated according to Schmidt (2007)
  Uncertainty: Emissions of heavy metals to surface water estimated from Schmidt (2007)
- Cadmium II [water, surface water]: 7.41052e-13 kg; lognormal variance with pedigree 1.11233, pedigree (3,2,2,2,1)
  Emissions of heavy metals to surface water are calculated according to Schmidt (2007)
  Uncertainty: Emissions of heavy metals surface water estimated from Schmidt (2007)
- Chromium III [water, surface water]: 9.40455e-12 kg; lognormal variance with pedigree 1.11233, pedigree (3,2,2,2,1)
  (same comment as for Arsenic ion)
- Copper ion [water, surface water]: 9.18996e-12 kg; lognormal variance with pedigree 1.11233, pedigree (3,2,2,2,1)
  (same comment as for Arsenic ion)
- Fipronil [water, ground-]: 3.94e-11 kg; lognormal variance with pedigree 1.1123, pedigree (3,2,2,1,1)
  (same comment as for Fipronil)
- Fipronil [water, unspecified]: 6.79e-11 kg; lognormal variance with pedigree 1.1123, pedigree (3,2,2,1,1)
  (same comment as for Fipronil)
- Glyphosate [water, ground-]: 1.46e-10 kg; lognormal variance with pedigree 1.1123, pedigree (3,2,2,1,1)
  (same comment as for Fipronil)
- Glyphosate [water, unspecified]: 3.1e-10 kg; lognormal variance with pedigree 1.1123, pedigree (3,2,2,1,1)
  (same comment as for Fipronil)
- Lead II [water, surface water]: 1.89575e-11 kg; lognormal variance with pedigree 1.11233, pedigree (3,2,2,2,1)
  (same comment as for Arsenic ion)
- Nitrate [water, ground-]: 0.00303 kg; lognormal variance with pedigree 1.11233, pedigree (3,2,2,2,1)
  The SQCB-NO3 model was used according to Nemecek et al. (2015), considering only the quantity of water from precipitation (no irrigation was applied). Technical parameters are available in the BRCalc/ICVCalc tool (Folegatti-Matsuura et al., 2022).
  Uncertainty: Based on The SQCB-NO3 model in Nemececk & Schnetzer (2011).
- Phosphorus [water, surface water]: 1.13e-6 kg; lognormal variance with pedigree 1.11233, pedigree (3,2,2,2,1)
  Only the phosphorus emission to surface water caused by soil erosion was calculated, according to Nemecek et al., 2015. Required technical parameters are available in the BRCalc/ICVCalc tool (Folegatti-Matsuura et al., 2022).
  Uncertainty: Due to phosphorus low mobility in Brazilian soils, its emissions through leaching and run-off were disregarded (Novais & Smyth, 1999). Calculations based on WFLDB (2019), only considered P emission by water erosion through surface water.
- Sulfentrazone [water, ground-]: 9.47e-8 kg; lognormal variance with pedigree 1.1123, pedigree (3,2,2,1,1)
  (same comment as for Fipronil)
- Sulfentrazone [water, unspecified]: 9.9e-10 kg; lognormal variance with pedigree 1.1123, pedigree (3,2,2,1,1)
  (same comment as for Fipronil)
- Tebuthiuron [water, ground-]: 2.02e-8 kg; lognormal variance with pedigree 1.1123, pedigree (3,2,2,1,1)
  (same comment as for Fipronil)
- Tebuthiuron [water, unspecified]: 3.32e-10 kg; lognormal variance with pedigree 1.1123, pedigree (3,2,2,1,1)
  (same comment as for Fipronil)

## Sampling procedure
The main source of data for agricultural inputs and operations is the Performance Indicators of Sugarcane Agroindustry Report (2014), as well as consultation with relevant experts. Information on agricultural inputs and operations modelling procedures is detailed in Cavalett et al. (2016). The main emission models adopted by BRCalc/ICVCalc derive from the references: Nemecek et al. (2015), IPCC (2019), Nemecek & Kagi (2007). Land use change (LUC) modeling was based on Donke et al, 2020 ; and the PestLCI Consensus V1.0, parameterized for Brazil, to estimate pesticide emissions.

## Review by Simone Fazio 2022-07-29
all the review comments have been addressed, solved or better explained
agricultural operations with minor consumption (fertilizer distribution, pesticide application, etc) should be better defined in the future updates, for the sake of precision even if the overall impact don't change significantly
