# electricity production, coal, aluminium industry

Dataset: EcoSpold 2, unit process
Geography: IAI Area, Asia, without China and GCC
Time period: 2015-01-01 to 2023-12-31
Technology level: current
Classification: ISIC rev.4 ecoinvent: 3510:Electric power generation, transmission and distribution
Classification: EcoSpold01Categories: hard coal/power plants
Tags: re-labelling activity; electricity, primary aluminium industry
Scenario: Business-as-Usual
System model: Allocation, cut-off by classification
Generated by: Pascal Lesage
Database: ecoinvent
isCopyrightProtected: true
accessRestrictedTo: 1

## General comment
This is a dataset used to create an aluminium industry specific electricity market for 'aluminium production Area 4/5' (Asia without China). The production volume represents the total amount of electricity from coal used in 'aluminium production Area 4/5' (Asia without China) for aluminium production (electrolysis and ingot casting).
Electricity markets specific to the aluminium-industry are needed in an LCI database because primary aluminium production is very energy intensive, and hence the location of production plants is often determined by access to large amounts of cheap electricity, which often results in an electricity mix that is different from the general grid mix of the countries where the production plants are located.
It is assumed that the production of electricity in general and in aluminium industry specific power plants is identical. Details on actual electricity generation with each technology can be found in the corresponding datasets.
The share of electricity produced using lignite and hard coal is calculated using both (1) estimates of the share of coal electricity coming from each country within Area 4/5; and (2) ecoinvent v3.2 country-specific split of coal power plants between hard coal and lignite. The share of coal electricity in each country was calculated by distributing the total coal electricity used in aluminium production in the Area 4/5 region as reported by the International Aluminium Institute (IAI). The distribution is weighted by country-specific aluminium production volumes (source: IAI personal communication) and general grid mix in the respective countries (source: International Energy Agency). ecoinvent v3.2 country-specific split of coal types used in coal power plants for IN, ID, JP MY and TR. For countries whose electricity production is not modelled in ecoinvent (AZ, KZ and TJ), coal-based electricity is assumed to be 78% hard coal, 22% lignite (based on 'rest of world' data, i.e. on data representing all regions not covered in ecoinvent v3.2).
Calculations are detailed in the report 'Calculating grid mixes for the aluminium industry in ecoinvent v3', available on the ecoinvent website.

## Included activities start
Re-labelling dataset, not representing a real transformation activity. Conceptually, the activity can be said to start with the production of electricity.

## Included activities end
Re-labelling dataset, not representing a real transformation activity. Conceptually, the activity can be said to end with a given amount of high voltage electricity labelled as specifically used for the production of electricity.

## Geography
Aluminium producing Asian countries (without China) (AZ, IN, ID, IR, JP, KZ, MY, TJ, TR)

## Time period
Production volume updated with 2015 data from IAI

## Reference product
- electricity, high voltage, aluminium industry: 1 kWh; = hard_IN_JH+hard_IN_KA+hard_IN_MP+hard_IN_OR+hard_IN_UP+hard_IN_CT+hard_JP+ hard_MY+ hard_RoW+ hard_TR+ lig_ID+ lig_RoW+ lig_TR; By-product classification allocatable product; CPC 17100: Electrical energy; HS2017 271600: Electrical energy
  Expressed as sum of contributing technologies (inputs) to allow uncertainty analysis: each technology share is uncertain, and in a Monte Carlo analysis will always be normalized by the sum contribution of each technology
  production volume 5.8e10 kWh
    The production volume, which is ultimately used to determine the share of coal-based electricity in the downstream market for aluminium industry specific high voltage electricity, is calculated by multiplying the following data:
    (1) public estimates of the electricity mix used to produce aluminium in the 'aluminium production region 4/5' (Asia, without China), provided by the International Aluminium Institute (IAI), see http://www.world-aluminium.org/statistics/. These estimates are based on the subset of aluminium producers that provide information to the IAI.
    (2) primary aluminium production volumes of each aluminium producing country in Area 4/5, also provided by IAI.
    (3) global average electricity requirements, per tonne primary aluminium, for both Söderberg and prebake electrolysis technologies, as well as the Area 4/5-specific proportion of aluminium produced by each technology.
    (4) electricity compensating line and transformation losses from production to consumption as medium voltage electricity, Losses estimated using country-level ecoinvent v3.2 data for India, Indonesia, Japan, Malaysia and Turkey and ROW data for other Area 4/5 aluminium producing countries (AZ, KZ and TJ).
    (5) electricity consumed in ingot casting.
  property price 0.0977 EUR2005
    Calculated in temporary price data. 94% of the average price (to account for a 6% loss in transformation and transmission) for electricity for industrial consumersin 2005 (excluded taxes). From IEA.
  properties: carbon allocation 0 kg, carbon content 0

## Inputs from technosphere
- electricity, high voltage: 0.0049894 kWh; name lig_TR; lognormal variance with pedigree 0.0113, pedigree (3,2,4,1,2)
  Calculated amount (see general comments).
- electricity, high voltage: 0.110267 kWh; name hard_RoW; lognormal variance with pedigree 0.0252, pedigree (4,5,4,1,2)
  Calculated amount (see general comments). Activity link to GLO due to the electricity production of some aluminium producing countries not being modeled in ecoinvent, see general comments.
- electricity, high voltage: 0.0318585 kWh; name lig_RoW; lognormal variance with pedigree 0.0252, pedigree (4,5,4,1,2)
  (same comment as for electricity, high voltage)
- electricity, high voltage: 2.07734e-7 kWh; name hard_MY; lognormal variance with pedigree 0.0113, pedigree (3,2,4,1,2)
  Calculated amount (see general comments).
- electricity, high voltage: 0.242766 kWh; name hard_IN_UP; lognormal variance with pedigree 0.0252, pedigree (4,5,4,1,2)
  Calculated amount (see general comments).
- electricity, high voltage: 0.0919516 kWh; name lig_ID; lognormal variance with pedigree 0.0113, pedigree (3,2,4,1,2)
  Calculated amount (see general comments).
- electricity, high voltage: 0.00088148 kWh; name hard_JP; lognormal variance with pedigree 0.0113, pedigree (3,2,4,1,2)
  Calculated amount (see general comments).
- electricity, high voltage: 0.0972057 kWh; name hard_IN_OR; lognormal variance with pedigree 0.0252, pedigree (4,5,4,1,2)
  Calculated amount (see general comments).
- electricity, high voltage: 0.176809 kWh; name hard_IN_CT; lognormal variance with pedigree 0.0252, pedigree (4,5,4,1,2)
  Calculated amount (see general comments).
- electricity, high voltage: 0.0522271 kWh; name hard_IN_JH; lognormal variance with pedigree 0.0252, pedigree (4,5,4,1,2)
  Calculated amount (see general comments).
- electricity, high voltage: 0.113375 kWh; name hard_IN_MP; lognormal variance with pedigree 0.0252, pedigree (4,5,4,1,2)
  Calculated amount (see general comments).
- electricity, high voltage: 0.00458168 kWh; name hard_TR; lognormal variance with pedigree 0.0113, pedigree (3,2,4,1,2)
  Calculated amount (see general comments).
- electricity, high voltage: 0.0730871 kWh; name hard_IN_KA; lognormal variance with pedigree 0.0252, pedigree (4,5,4,1,2)
  Calculated amount (see general comments).

## Sampling procedure
International Aluminium Institute (IAI) data used for total electricity used in the production of aluminium that is from coal power plants. ecoinvent data used to split coal-based electricity production to the respective fuels (lignite, hard coal). The cited 84% representativeness is for IAI data (data based on 84% of regional aluminium production). The percent representativeness of data used to split coal based electricity production to different types of fuels (national grid proxy) is 86%. Only 14% of coal-based electricity is from countries whose electricity production is not modelled in ecoinvent (AZ, KZ, TJ).

## Extrapolations
For the split of coal-based electricity production to the respective fuels (lignite, hard coal), shares of different types of coal power plants in the countries, when available, were used as a proxy for the split relevant for the aluminium industry, else 'Rest-of-world' split (33% lignite, 67% hard coal) was used, see general comments.

## Review by Emilia Moreno Ruiz 2017-08-15
The electric mix has been adapted to the database newest developments
