# photovoltaic panel production, CIS

Dataset: EcoSpold 2, unit process
Geography: RoW
Time period: 1998-01-01 to 2023-12-31
Technology level: current
Classification: ISIC rev.4 ecoinvent: 2610:Manufacture of electronic components and boards
Classification: EcoSpold01Categories: photovoltaic/production of components
Synonyms: copper indium selenide; CIGS; PV-module; thin film; Solarmodul
Tags: ConvertedDataset
Scenario: Business-as-Usual
System model: Allocation, cut-off by classification
Share of production covered: 50 %
Generated by: Niels Jungbluth
Published in: Jungbluth, N. 2007
Database: ecoinvent
isCopyrightProtected: true
accessRestrictedTo: 1

## General comment
Production of photovoltaic thin film modules by thermal vaporization in vacuum. The modules produced at Würth Solar have a size of 1.2m by 0.6m. The weight is 12.6kg. The efficiency is 10%. The rated nominal power is about 75-80Wp per module.
[This dataset was already contained in the ecoinvent database version 2. It was not individually updated during the transfer to ecoinvent version 3. Life Cycle Impact Assessment results may still have changed, as they are affected by changes in the supply chain, i.e. in other datasets. This dataset was generated following the ecoinvent quality guidelines for version 2. It may have been subject to central changes described in the ecoinvent version 3 change report (http://www.ecoinvent.org/database/ecoinvent-version-3/reports-of-changes/), and the results of the central updates were reviewed extensively. The changes added e.g. consistent water flows and other information throughout the database. The documentation of this dataset can be found in the ecoinvent reports of version 2, which are still available via the ecoinvent website. The change report linked above covers all central changes that were made during the conversion process.]

## Included activities end
Electricity use, materials, transport of materials, treatment of production wastes. Disposal after end of life. Process emissions not known (except Cd).

## Geography
Data for Würth Solar in Germany.

## Technology
Production technology of thin film CIS cells with thermal vaporization in vacuum.

## Time period
Data refer to 2007. Production in 2006 was ramped up.

## Reference product
- photovoltaic panel, CIS: 1 m2; By-product classification allocatable product; CPC 47150: Diodes, transistors and similar semi-conductor devices; photosensitive semi-conductor devices; light emitting […]; HS2017 854140: Electrical apparatus; photosensitive, including photovoltaic cells, whether or not assembled in modules or [...]
  EcoSpold01Location=DE
  production volume 17837.4 m2
    75-80 W/0.72 m2 (77.5 W considered) (from Tab 9.7, ecoinvent v2 report 6_XII). Total production worldwide of panels is 1500MW in 2005. Tab 12.6 (ecoinvent v2 report 6_XII) gives the share of the different types of photovoltaic cells, that was assumed as the share of the different panels.
  property price 244.767 EUR2005
    Calculated based on inputs: The price of the product has been calculated as a sum of the values of the material and energy inputs for this product. This value is therefore a rough estimation. It may underestimate the real price since there are additional expenses when producing any product. These expences can include for example labour costs, treatment of waste materials and profit for the producer. Please consider carefully whether this level of data quality is acceptable for your application.
  properties: carbon allocation 0 kg, carbon content 0

## Inputs from technosphere
- aluminium alloy, AlMg3: 1.57 kg; lognormal variance with pedigree 0.042, pedigree (1,1,5,5,1)
  Company information
  EcoSpold01Location=RER
  Uncertainty: company information
  properties: dry mass 1 kg, wet mass 1 kg
- glass fibre reinforced plastic, polyamide, injection moulded: 0.04 kg; lognormal variance with pedigree 0.042, pedigree (1,1,5,5,1)
  EcoSpold01Location=RER
  Raugei, literature
  Uncertainty: Raugei, literature
  properties: carbon content, fossil 0.446018, dry mass 1 kg, wet mass 1 kg
  note on carbon content, fossil: Polyamide resin assimilate to Nylon 66 (ecoinvent v2.2 report 7_XIII). Nylon 66 is derived from hexamethylene diamine and adipic acid and has the following structure: -(HN-(CH2)6-NH-CO-(CH2)4-CO)n- (ecoinvent v2.2 report 11_II), C12H22N2O2. MW=226 g/mol. Here Nylon 66 is – mainly for improved stiffness and stability – modified with glass fibres. The glass fibre content in the product is assumed of 30%. (ecoinvent v2.2 report 11_II)
- heat, district or industrial, other than natural gas: 10.2542, 0.00475058, 0.00104415 MJ (3 suppliers, which the file names only by identifier); sum of these 10.26 MJ; lognormal variance with pedigree 0.042, pedigree (1,1,5,5,1)
  Raugei, literature
  EcoSpold01Location=RER
  Uncertainty: Raugei, literature
  properties: heating value, net 1 MJ
- photovoltaic laminate, CIS: 1 m2; lognormal variance with pedigree 0.042, pedigree (1,1,5,5,1)
  Assumption
  EcoSpold01Location=DE
  Uncertainty: Assumption
- waste plastic, mixture: -2.88216e-5, -1.05011e-5, -1.85149e-6, -1.09217e-6, -7.24637e-6, -6.53171e-7, -6.7447e-7, -1.74807e-6, -6.24786e-7, -7.54258e-7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 kg (42 suppliers, which the file names only by identifier); sum of these -0.04 kg; lognormal variance with pedigree 0.002, pedigree (1,1,1,5,1)
  EcoSpold01Location=CH
  Calculation for plastic parts burned after recycling
  Uncertainty: Calculation for plastic parts burned after recycling
  production volume
    Calculated from the production volume of photovoltaic panel, CIS in proportion to the respective output amounts.
  properties: carbon content, fossil 0.747344, dry mass 0.847 kg, heating value, net 30.79 MJ, water content 0.180638, wet mass 1 kg
  note on carbon content, fossil: C content in 1 kg DM was calculated using data in Tab A.2, ecoinvent v2.2 report 13_I
  note on heating value, net: Value taken from the general comment of the treatment dataset.

## Sampling procedure
Literature data based on producer information.

## Extrapolations
none This dataset has been copied from an original dataset covering the geography DE. The uncertainty has been adjusted accordingly.

## Review by Roberto Dones 2007-08-23
Passed.
none
