# light olefins production, from methanol-to-olefins conversion, ethylene-to-propylene ratio of 1.51

Dataset: EcoSpold 2, unit process
Geography: CN
Time period: 2022-01-01 to 2026-12-31
Technology level: current
Classification: ISIC rev.4 ecoinvent: 2011:Manufacture of basic chemicals
Tags: combined production
Scenario: Business-as-Usual
System model: Allocation, cut-off by classification
Generated by: Iasonas Ioannou
Published in: Iasonas Ioannou 2023
Database: ecoinvent
isCopyrightProtected: true
accessRestrictedTo: 1

## General comment
This dataset represents the combined production of light olefins via the catalytic dehydration of methanol. Namely, this dataset covers the production of 1.00 kg of ethylene and 0.66 kg of propylene as reference products. At the same time, the formed butenes, pentane, and hydrogen (0.2, 0.05, and 0.02 kg, respectively) are treated as valuable by-products. This inventory is represented with an excess of electricity as valuable output due to the modularity of the auxiliary services used. Overall, the production of light olefins from methanol is a net consumer of electricity. The process includes, feedstock, materials, energy and registers all relevant direct emissions.
Light olefins are crucial building blocks for the chemicals and plastics sector and are predominantly generated through steam cracking of hydrocarbons. The annual production volume of ethylene and propylene are extremely high and constitutes them as the most highly produced petrochemicals. The high production volume of light olefins is driven by a high demand, which in 2007 amounted to 115 and 73 Mt for ethylene and propylene, respectively.
Notably, methanol may be used to cover part of the ethylene and propylene demand. Besides, such pathway may be appealing to decouple the production of light olefins from the petroleum feedstocks, e.g., naphtha.
The share of the produced light olefins, through the methanol-to-olefins (MTO) process, depends on the operating conditions of the reactor and the used catalyst. The latter process variables are able to modify the weight ratio of propylene-to-ethylene, to either maximize the yield towards ethylene or propylene (i.e., amount of ethylene < propylene, or vice versa). In this dataset, a SAPO-34 catalyst (zeolite-based) is considered which has a high selectivity toward ethylene, while concomitantly producing propylene at high shares. A fluidised-bed system is preferred due to the strong exothermicity of the reaction system and the hight coking tendency of the SAPO-34 catalyst, i.e., requires frequent regeneration.
In the present dataset, there are two reference products (ethylene and propylene), thus allocation (subdivision) of the Life Cycle Inventory (LCI) is required. The allocation is based on mass content. For more information, consult the ''Modelling & Administrative'' section.
References:
Olah, G.A. (2005), Beyond Oil and Gas: The Methanol Economy. Angewandte Chemie International Edition, 44: 2636-2639. https://doi.org/10.1002/anie.200462121
Yang, M., Fan, D., Wei, Y., Tian, P., Liu, Z., Recent Progress in Methanol-to-Olefins (MTO) Catalysts. Adv. Mater. 2019, 31, 1902181. https://doi.org/10.1002/adma.201902181
Bertau, M., Offermanns, H., Plass, L., Schmidt, F., & Wernicke, H. J. (Eds.). (2014). Methanol: the basic chemical and energy feedstock of the future (Vol. 1). Heidelberg: Springer.

## Included activities start
The activity starts with the raw materials entering the methano-to-olefins facility.

## Included activities end
The activity ends with the final products being ready for further processing or transportation at the production site gate. The dataset includes the consumption of raw materials and energy, estimated catalyst use, emissions to air and water from the process, as well as the infrastructure use.

## Geography
This inventory is modelled for China, where the coal-to- and methanol-to-olefins technologies are important technological pathways to produce light olefins.
According to Lv et al (2021), in 2019, 24% of propylene produced in China was supplied from methanol conversion plants. Furthermore, based on Wood Mackenzie, in 2019, the installed capacity of ethylene from CTO/MTO accounted for 21% of China’s total ethylene capacity.
This activity originates from literature data, based on robust process simulation, for the conversion of methanol to olefins (MTO). Since the specific technology is modelled, the inventory is not linked to any specific geographical region. The material and energy inputs reflect well the production technology and are, therefore, considered to be valid for the chosen geography.
References:
Ioannou, I., Javaloyes-Antón, J., Caballero, J. A., & Guillén-Gosálbez, G. (2023). Economic and Environmental Performance of an Integrated CO2 Refinery. ACS Sustainable Chemistry & Engineering, 11(5), 1949-1961.
2021, Lin Lv, Guobao Song, Xinyue Zhao, Jingwen Chen, Environmental Burdens of China’s Propylene manufacturing: Comparative life-cycle assessment and scenario analysis, Science of the Total Environment, 799
https://www.woodmac.com/news/can-chinas-cto-and-mto-industries-survive-the-threat-of-massive-steam-cracker-investment/, assessed in 2023-10-09.

## Technology
In this dataset, the catalytic conversion of methanol to light olefins is based on the work by Ioannou et al. (2023). The synthesis take place in a reactor that operates at 450 °C and 1.5 bar, while considering a SAPO-34 catalyst.
The methanol feedstock, before being fed into the synthesis reactor, is pumped and heated to the reaction conditions. In the reactor, methanol is first dehydrated to dimethyl ether (DME), and DME, in turn, dehydrates further to yield ethylene, propylene, and smaller amounts of butenes. Hence, the conversion of methanol into olefins covers the following reaction steps:
1) Dehydration of methanol to DME:
2 CH3OH <--> CH3OCH3 + H2O
2) Production of light olefins through DME dehydration:
CH3OCH3 --> C2H4 + H2O
CH3OCH3 --> 2/3 C3H6 + H2O
CH3OCH3 --> 2/4 C4H8 + H2O
Other reactions take place simultaneously, which give yield to methane, ethane, hydrogen, coke, and CO2.
The water generated from the dehydration stages should be removed prior the separation and purification stages. Notably, a significant amount of water at the reactor's outlet, amounting to 56.1% wt. of the total. Hence, the reactor outlet is first cooled to 25 °C and sent to a flash unit for the bulk water removal, and then compressed to 30.4 bar using a multistage compressor with intermediate cooling. At the same time, the remaining condensed water is removed.
The released heat from the latter exothermic reactor is used in a two-stage Rankine cycle to generate electricity. The two-stage Rankine cycle first partly consumes the reactor's heat by evaporating water at 55 bar from 45 to 430 °C. Subsequently, the pressure is released to 2 bar via a turbine, and then the stream's temperature increases to 430 °C by utilising the remaining heat of the reactor. The stream enters next to a second turbine where its pressure reduces to 0.1 bar. Finally, the steam temperature is reduced to 44 °C (1.5 °C lower than saturation temperature) and then pumped to 55 bar.
The stream enters a CO2 capture unit based on amine scrubbing and afterward, a dehydration unit that reduces the water content below 0.01 ppm to prevent the formation of hydrates in the cryogenic separations that follow.
First, since the dry stream contains a small portion of H2, a series of three cryogenic knockout drums and a pressure swing adsorption unit are used for recovery. The three knockout drums operate at -60, -80, and -100 °C, respectively, and all liquid streams are mixed and sent to a demethaniser distillation column while the vapour stream is fed to the pressure swing adsorption unit. Finally, the purification of ethylene, propylene, butenes, and the remaining by-products is carried out via a
sequence of distillation columns with 99.9 % wt. purity.
Streams containing residual combustible gases (e.g., methane, ethane, etc), are combusted to generate electricity and heat, which covers partly the requirements of the light olefins production process.
References:
Dutta, Arnab, Iftekhar A. Karimi, and Shamsuzzaman Farooq. "Techno-economic perspective on natural gas liquids and methanol as potential feedstocks for producing olefins." Industrial & Engineering Chemistry Research 58.2 (2018): 963-972.
Ioannou, Iasonas, et al. "Hybridization of Fossil‐and CO2‐Based Routes for Ethylene Production using Renewable Energy." ChemSusChem 13.23 (2020): 6370-6380.
Ioannou, Iasonas, et al. "Economic and Environmental Performance of an Integrated CO2 Refinery." ACS Sustainable Chemistry & Engineering 11.5 (2023): 1949-1961.
Olah, G.A. (2005), Beyond Oil and Gas: The Methanol Economy. Angewandte Chemie International Edition, 44: 2636-2639. https://doi.org/10.1002/anie.200462121

## Time period
This activity originates from literature data, based on robust process simulation, for conversion of methanol to olefins (MTO) published in 2023. The material and energy inputs reflect well the production technology and not expected to change significantly over the next 5 years.
References:
Ioannou, I., Javaloyes-Antón, J., Caballero, J. A., & Guillén-Gosálbez, G. (2023). Economic and Environmental Performance of an Integrated CO2 Refinery. ACS Sustainable Chemistry & Engineering, 11(5), 1949-1961.

## Parameters
- fraction of cooling water which evaporates to air, once-through cooling system: 0.04 dimensionless; name fraction_CW_OT_to_air

## Reference product
- propylene: 1 kg; name RP_propene; By-product classification allocatable product; CPC 33421: Ethylene, propylene, butylene, butadiene; HS2017 290122: Acyclic hydrocarbons; unsaturated, propene (propylene); CAS 115-07-1
  Value reported by Ioannou, I., Javaloyes-Antón, J., Caballero, J. A., & Guillén-Gosálbez, G. (2023). Economic and Environmental Performance of an Integrated CO2 Refinery. ACS Sustainable Chemistry & Engineering, 11(5), 1949-1961.
  production volume 2.82e9 kg; name RP_PV_propene; = 2.82*1e9
    According to Lv et al (2021), the installed capacity for propylene in 2019 in China was 3.79E10 kg. According to the same publication, 24% of propylene in China are produced from methanol.
    According to Wood Mackenzie, in 2019, the installed capcaity of ethylene from CTO/MTO units reached 5.21E+09 kg, accounting for 21% of China’s total ethylene capacity.
    The latter information was used to identify the production volume of the following activites available in the ecoinvent Database (since v3.10);
    1) light olefins production, from methanol-to-olefins conversion, ethylene-to-propylene ratio of 0.67
    2) light olefins production, from methanol-to-olefins conversion, ethylene-to-propylene ratio of 1.51
    3) propylene production, from methanol-to-propylene conversion
    An average capacity factor of 81% was assumed.
    Reference:
    Lv, L.; Song, G.; Zhao, X.; Chen, J. (2021): Environmental Burdens of China’s Propylene manufacturing: Comparative life-cycle assessment and scenario analysis, Science of the Total Environment, 799, 149451.
    https://www.woodmac.com/news/can-chinas-cto-and-mto-industries-survive-the-threat-of-massive-steam-cracker-investment/, assessed in 2023-10-09.
  property heating value, net 43.22 MJ
    LHV is calculated based on the elemental composition of the substance. Based on the CAS number of the substance (000115-07-1), the chemical formula of the substance is found to be: C3H6, (PubChem 2020). Reference: Kim, S., Chen, J., Cheng, T., Gindulyte, A., He, J., He, S., Li, Q., Shoemaker, B. A., Thiessen, P. A., Yu, B., Zaslavsky, L., Zhang, J., & Bolton, E. E. (2019). PubChem 2019 update: improved access to chemical data. Nucleic acids research, 47(D1), D1102–D1109. https://doi.org/10.1093/nar/gky1033
  property price 0.693977 EUR2005
    Calculated value based on data from United Nations Commodity Trade Statistics Database (comtrade.un.org). UN comtrade category: 290122. Propylene. Average price from the year 2015-2019. Average of price of import into 5 main markets (EU, US, MX, CO and CN).
    The prices were converted to EUR based on the annual exchange rates published by the European Central Bank (https://sdw.ecb.europa.eu/quickview.do?SERIES_KEY=120.EXR.A.USD.EUR.SP00.A, last accessed on 2022-02-15) and adjusted for inflation relative to 2005 using the producer price index (PPI) of the euro area, published by eurostat (https://ec.europa.eu/eurostat/databrowser/view/STS_INPP_A__custom_6416181/default/table?lang=en, last accessed on 2022-05-04).
  properties: allocation factor 0.823979, carbon allocation 0.857143 kg, carbon content 0.857143, carbon content, fossil 0.857143, carbon content, non-fossil 0, dry mass 1 kg, true value 0.458025, water content 0, water in wet mass 0 kg, wet mass 1 kg

## Inputs from technosphere
- chemical factory, organics: 3.832e-10 unit; = 1.93 * 4.0e-10 * ( IF(RP_ethene;0.602409639) + IF(RP_propene;0.397590361)); lognormal variance with pedigree 0.3432, pedigree (2,4,1,4,4)
  Calculated based on literature data published by the industry. For this activity, no information was readily available concerning infrastructure and land-use. Therefore, the infrastructure is estimated based on data from two chemical factories, the BASF site of Ludwigshafen and the chemical factory in Gendorf (which are both located in Germany), which produce a wide range of chemical substances. Based on this data, the following assumptions are made: the built area amounts to about 4.2 ha, the plant has an average output of 50'000 t/a and a lifespan of fifty years. The estimated infrastructure amount is therefore 4.00 E-10 units per kg of produced chemical.
- cooling energy, at -100 °C: 0.764414 MJ; = 1.54 * ( IF(RP_ethene;0.602409639) + IF(RP_propene;0.397590361)); lognormal variance with pedigree 0.0018, pedigree (2,3,1,1,1)
  Cooling requirements, at temperatures below ambient, for the production of light olefins from methanol.
  Value reported by Ioannou, I., Javaloyes-Antón, J., Caballero, J. A., & Guillén-Gosálbez, G. (2023). Economic and Environmental Performance of an Integrated CO2 Refinery. ACS Sustainable Chemistry & Engineering, 11(5), 1949-1961.
  A value of 1.51 and 0.03 MJ per kg were reported for the cooling needs at -75 and -100 °C As there is not available dataset for cooling at -75, this exchange was proxied with the cooling energy at -100 °C.
- cooling energy, at -160 °C: 0.0148912 MJ; = 0.03 * ( IF(RP_ethene;0.602409639) + IF(RP_propene;0.397590361)); lognormal variance with pedigree 0.0018, pedigree (2,3,1,1,1)
  Cooling requirements, at temperatures below ambient, for the production of light olefins from methanol.
  Value reported by Ioannou, I., Javaloyes-Antón, J., Caballero, J. A., & Guillén-Gosálbez, G. (2023). Economic and Environmental Performance of an Integrated CO2 Refinery. ACS Sustainable Chemistry & Engineering, 11(5), 1949-1961.
  A value of 0.03 MJ per kg was reported for the cooling needs at -125°C As there is not available dataset for cooling at -125°C, these exchanges were proxied with the cooling energy at -160 °C.
- cooling energy, at -25 °C: 0.21344 MJ; = 0.43 * ( IF(RP_ethene;0.602409639) + IF(RP_propene;0.397590361)); lognormal variance with pedigree 0.0018, pedigree (2,3,1,1,1)
  Cooling requirements, at temperatures below ambient (-25 °C), for the production of light olefins from methanol.
  Value reported by Ioannou, I., Javaloyes-Antón, J., Caballero, J. A., & Guillén-Gosálbez, G. (2023). Economic and Environmental Performance of an Integrated CO2 Refinery. ACS Sustainable Chemistry & Engineering, 11(5), 1949-1961.
- heat, from steam, in chemical industry: 0.411989 MJ; = 0.83 * ( IF(RP_ethene;0.602409639) + IF(RP_propene;0.397590361)); lognormal variance with pedigree 0.0018, pedigree (2,3,1,1,1)
  Low-pressure steam requirements for the production of light olefins from methanol.
  Reference:
  Ioannou, I., Javaloyes-Antón, J., Caballero, J. A., & Guillén-Gosálbez, G. (2023). Economic and Environmental Performance of an Integrated CO2 Refinery. ACS Sustainable Chemistry & Engineering, 11(5), 1949-1961.
  properties: heating value, net 1 MJ
- methanol: 1.36403 kg; = 4.58 *0.6 * ( IF(RP_ethene;0.602409639) + IF(RP_propene;0.397590361)); lognormal variance with pedigree 0.0018, pedigree (2,3,1,1,1)
  Main raw material for the production of light olefins. According to the operating rates of methanol-to- and coal-to-olefins plants in China, 60% of capacity is covered by coal-based methanol, according to https://infogram.com/methanol_asia_ctotable_october22-1ho16vod7o5yx4n, accessed 15-09-2023. The remaining 40% is covered by the methanol market.
  Reference:
  Lv, L.; Song, G.; Zhao, X.; Chen, J. (2021): Environmental Burdens of China’s Propylene manufacturing: Comparative life-cycle assessment and scenario analysis, Science of the Total Environment, 799, 149451.
  properties: carbon content, fossil 0.375, dry mass 1 kg, heating value, net 20 MJ, wet mass 1 kg
  note on heating value, net: Based on literature, page 533, Report 17: Jungbluth, N., Chudacoff, M., Dauriat, A., Dinkel, F., Doka, G., Faist Emmenegger, M., Gnansounou, E., Kljun, N., Schleiss, K., Spielmann, M., Stettler, C., Sutter, J. 2007: Life Cycle Inventories of Bioenergy. ecoinvent report No. 17, Swiss Centre for Life Cycle Inventories, Dübendorf, CH.
- methanol: 0.909355 kg; = 4.58 * (1-0.6) * ( IF(RP_ethene;0.602409639) + IF(RP_propene;0.397590361)); lognormal variance with pedigree 0.0018, pedigree (2,3,1,1,1)
  (same comment as for methanol)
- methylamine: 1.87629e-5 kg; = 3.78e-5 * ( IF(RP_ethene;0.602409639) + IF(RP_propene;0.397590361)); lognormal variance with pedigree 0.0018, pedigree (2,3,1,1,1)
  (same comment as for propylene)
  properties: carbon content, fossil 0.386735, dry mass 1 kg, heating value, net 31.23 MJ, wet mass 1 kg
- wastewater, average: -0.00128561 m3; name WW; = 0.00259 * ( IF(RP_ethene;0.602409639) + IF(RP_propene;0.397590361)); lognormal variance with pedigree 0.0018, pedigree (2,3,1,1,1)
  Wastewater output, as a result of the conversion of methnaol-to-olefins. Value reported by Ioannou, I., Javaloyes-Antón, J., Caballero, J. A., & Guillén-Gosálbez, G. (2023). Economic and Environmental Performance of an Integrated CO2 Refinery. ACS Sustainable Chemistry & Engineering, 11(5), 1949-1961.
  production volume; = RP_PV_propene * (WW / RP_propene)
    Calculated from production volume of reference product using the relative outputs.
  properties: carbon content, non-fossil 0.194039, dry mass 0.346837 kg, mass concentration, TOC 0.1091 kg/m3, mass concentration, calcium 0.039453 kg/m3, mass concentration, chlorine 0.030031 kg/m3, mass concentration, hydrogen 0.013365 kg/m3, mass concentration, nitrogen 0.031015 kg/m3, mass concentration, oxygen 0.069824 kg/m3, mass concentration, sodium 0.06456 kg/m3, mass concentration, sulfur 0.015602 kg/m3, water content 2882.2, wet mass 1000 kg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
  note on carbon content, non-fossil: 0.0673 kg TOC/m3 (Tab A.17, ecoinvent v2.2 report 13_I). TOC was considered as Total Carbon.

## Inputs from nature
- Nitrogen [natural resource, in air]: 1.08621 kg; = 2.1883 * ( IF(RP_ethene;0.602409639) + IF(RP_propene;0.397590361)); lognormal variance with pedigree 0.0018, pedigree (2,3,1,1,1)
  (same comment as for propylene)
- Oxygen [natural resource, in air]: 0.28874 kg; = 0.5817 * ( IF(RP_ethene;0.602409639) + IF(RP_propene;0.397590361)); lognormal variance with pedigree 0.0018, pedigree (2,3,1,1,1)
  Oxygen input for the combustion of waste residual gas streams with high calorific value. Value reported by Ioannou, I., Javaloyes-Antón, J., Caballero, J. A., & Guillén-Gosálbez, G. (2023). Economic and Environmental Performance of an Integrated CO2 Refinery. ACS Sustainable Chemistry & Engineering, 11(5), 1949-1961.
- Water, cooling, unspecified natural origin [natural resource, in water]: 0.0436808 m3; = 0.088 * ( IF(RP_ethene;0.602409639) + IF(RP_propene;0.397590361)); lognormal variance with pedigree 0.0018, pedigree (2,3,1,1,1)
  Cooling water input, obtained from the heat exchange network (HEN) analysis, being water heated up from 20 to 35 °C, to satisfy the requirements of the facilities. A value of 5.52 MJ of cooling water was reported by Ioannou, I., Javaloyes-Antón, J., Caballero, J. A., & Guillén-Gosálbez, G. (2023). Economic and Environmental Performance of an Integrated CO2 Refinery. ACS Sustainable Chemistry & Engineering, 11(5), 1949-1961.

## Emissions to nature
- Carbon dioxide, fossil [air, unspecified]: 0.109202 kg; name CO2out; = 0.22 * ( IF(RP_ethene;0.602409639) + IF(RP_propene;0.397590361)); lognormal variance with pedigree 0.0018, pedigree (2,3,1,1,1)
  Direct process emissions. Value reported by Ioannou, I., Javaloyes-Antón, J., Caballero, J. A., & Guillén-Gosálbez, G. (2023). Economic and Environmental Performance of an Integrated CO2 Refinery. ACS Sustainable Chemistry & Engineering, 11(5), 1949-1961.
- Carbon monoxide, fossil [air, unspecified]: 1.02812e-5 kg; = 2.542E-05/0.27*0.22* ( IF(RP_ethene;0.602409639) + IF(RP_propene;0.397590361)); lognormal variance with pedigree 0.25, pedigree (5,5,5,5,5)
  This elementary exchange is added for completion based on a similar process. Namely, the methanol-to-olefins conversion, with an ethylene-to-propylene ratio of 0.67 (instead of 1.51 of this dataset), available in the ecoinvent Database v.3.10. The value was scaled according to the direct CO2 output and the value of this elementary flow in the existing and reference technology.
- Nitrogen [air, unspecified]: 1.08621 kg; = 2.1883 * ( IF(RP_ethene;0.602409639) + IF(RP_propene;0.397590361)); lognormal variance with pedigree 0.0018, pedigree (2,3,1,1,1)
  (same comment as for propylene)
- Nitrogen oxides [air, unspecified]: 5.35211e-5 kg; = 0.00013233/0.27*0.22* ( IF(RP_ethene;0.602409639) + IF(RP_propene;0.397590361)); lognormal variance with pedigree 0.25, pedigree (5,5,5,5,5)
  (same comment as for Carbon monoxide, fossil)
- Particulate Matter, > 2.5 um and < 10um [air, unspecified]: 3.21135e-6 kg; = 7.94E-06/0.27*0.22* ( IF(RP_ethene;0.602409639) + IF(RP_propene;0.397590361)); lognormal variance with pedigree 0.25, pedigree (5,5,5,5,5)
  (same comment as for Carbon monoxide, fossil)
- Water [air, unspecified]: 0.00181672 m3; = ( 0.00014+ fraction_CW_OT_to_air * 0.088 ) * ( IF(RP_ethene;0.602409639) + IF(RP_propene;0.397590361)); lognormal variance with pedigree 0.0412, pedigree (2,3,1,1,1)
  Calculated as a fraction of the input of cooling water and the amount of water generated by the combusion of waste residual gas streams with high calorific value. Value reported by Ioannou, I., Javaloyes-Antón, J., Caballero, J. A., & Guillén-Gosálbez, G. (2023). Economic and Environmental Performance of an Integrated CO2 Refinery. ACS Sustainable Chemistry & Engineering, 11(5), 1949-1961.
  For more details, refer to the mathematical relation and the parameters.
- Methylamine [water, unspecified]: 1.87629e-5 kg; = 3.78e-5 * ( IF(RP_ethene;0.602409639) + IF(RP_propene;0.397590361)); lognormal variance with pedigree 0.0018, pedigree (2,3,1,1,1)
  (same comment as for propylene)
- Water [water, unspecified]: 0.0419336 m3; = (1-fraction_CW_OT_to_air)* 0.088 * ( IF(RP_ethene;0.602409639) + IF(RP_propene;0.397590361)); lognormal variance with pedigree 0.0412, pedigree (2,3,1,1,1)
  Calculated as a fraction of the input of cooling water. For more details, refer to the mathematical relation and the parameters.

## Sampling procedure
Data obtained from the literature.
References:
Ioannou, I., Javaloyes-Antón, J., Caballero, J. A., & Guillén-Gosálbez, G. (2023). Economic and Environmental Performance of an Integrated CO2 Refinery. ACS Sustainable Chemistry & Engineering, 11(5), 1949-1961.

Due to the fact that that there are two reference products in this dataset, subdivision of the exchange amounts between ethylene and propylene is required first. This subdivision is based on the shares of mass from the respective products. The ethylene contribution is 1 kg while propylene contribute roughly 0.66 kg. The resulting fractions for the subdivision are approximately 60.24 and 39.76% for ethylene, propylene, and butenes, respectively. Meaning that 60.24% of the exchanges are allocated to ethylene production and the remaining 37.76% are allocated to propylene production.

## Extrapolations
Literature data.
