# heat production, light fuel oil, at boiler 100kW, non-modulating

Dataset: EcoSpold 2, unit process
Geography: CH
Time period: 1991-01-01 to 2023-12-31
Technology level: current
Classification: EcoSpold01Categories: oil/heating systems
Classification: ISIC rev.4 ecoinvent: 3530:Steam and air conditioning supply
Tags: ConvertedDataset
Scenario: Business-as-Usual
System model: Allocation, cut-off by classification
Generated by: Niels Jungbluth
Published in: Jungbluth, N. 2007
Database: ecoinvent
isCopyrightProtected: true
accessRestrictedTo: 1

## General comment
Inventory for the operation of a light fuel oil boiler. Data related to input.
[This dataset was already contained in the ecoinvent database version 2. It was not individually updated during the transfer to ecoinvent version 3. Life Cycle Impact Assessment results may still have changed, as they are affected by changes in the supply chain, i.e. in other datasets. This dataset was generated following the ecoinvent quality guidelines for version 2. It may have been subject to central changes described in the ecoinvent version 3 change report (http://www.ecoinvent.org/database/ecoinvent-version-3/reports-of-changes/), and the results of the central updates were reviewed extensively. The changes added e.g. consistent water flows and other information throughout the database. The documentation of this dataset can be found in the ecoinvent reports of version 2, which are still available via the ecoinvent website. The change report linked above covers all central changes that were made during the conversion process.]

## Included activities end
Direct air emissions from combustion, waste and electricity use.

## Geography
Assumption for operation in Switzerland.

## Technology
Non-modulating boiler sold in 2000.

## Time period
New data for regulated emissions like NOx, particles, other figures are partly based on older literature data.

## Parameters
- scaling factor: 1.06383 dimensionless; name scaling_factor

## Reference product
- heat, central or small-scale, other than natural gas: 1 MJ; = 0.94 * scaling_factor; By-product classification allocatable product; CPC 17300: Steam and hot water
  Amount was scaled to 1.
  production volume 3.62e10 MJ
    Assumption. The original value from the dataset was altered in order to model the correct shares of central or small-scale heat producing datasets on the market for heat, central or small-scale, other than natural gas according to the BFE Gesamtenergiestatistik for the year 2012. See talk pages for further discussion.
    BFE. 2013. Gesamtenergiestatistik_2013_Tabellen.xlsx. http://www.bfe.admin.ch/themen/00526/00541/00542/00631/index.html?lang=de&dossier_id=05071
    //Original comment from global dataset//:
    Total heat from oil calculated from IEA Oil statistics for 2007 (http://www.iea.org/stats/oildata.asp?COUNTRY_CODE=CH ; residential, commercial and agriculture), using default IEA MJ/kg conversion factors, dividing the total evenly over 4 boiler types, multiplied by conversion efficiency of specific boiler type (1.0), all on a net heat value basis.
  property price 0.0106 EUR2005
    Average European district heat price from Ecoheatcool and Euroheat 2005-2006, Ecoheat Work package 1: The European heat market. Final report. 10.6 EUR/GJ i s the price of district heat. http://www.solarthermalworld.org/files/Ecoheatcool%20WP1%20Web.pdf?download
  properties: Corresponding fuel use 1.06383 MJ, carbon allocation 0 kg, carbon content 0, heating value, net 1 MJ

## Inputs from technosphere
- chimney: 3.16617e-7 m; = 2.9762E-07 * scaling_factor; lognormal variance with pedigree 0.3526, pedigree (3,3,5,1,1)
  Calculated
  Amount was scaled to the amount of reference product.
  This exchange has an activity link directly to the producing activity because the product is primarily consumed in the same geographical area where it is produced.
- electricity, low voltage: 0.00176894 kWh; = 0.0016628 * scaling_factor; lognormal variance with pedigree 0.0426, pedigree (3,3,5,1,1)
  Literature
  Amount was scaled to the amount of reference product.
  Literature
  Amount was scaled to the amount of reference product.
- light fuel oil: 0.0249149 kg; = 0.02342 * scaling_factor; lognormal variance with pedigree 0.0426, pedigree (3,3,5,1,1)
  (same comment as for electricity, low voltage)
  properties: carbon content, fossil 0.862, dry mass 1 kg, heating value, net 42.6 MJ, wet mass 1 kg
- oil boiler, 100kW: 7.03596e-8 unit; = 6.6138E-08 * scaling_factor; lognormal variance with pedigree 0.3526, pedigree (3,3,5,1,1)
  Estimation 2100h use per year
  Amount was scaled to the amount of reference product.
  Estimation 2100h use per year
  Amount was scaled to the amount of reference product.
- oil storage, 3000l: 1.87628e-7 unit; = 1.7637E-07 * scaling_factor; lognormal variance with pedigree 0.3526, pedigree (3,3,5,1,1)
  (same comment as for chimney)

## Emissions to nature
- Acetaldehyde [air, urban air close to ground]: 2.18085e-8 kg; = 2.05E-08 * scaling_factor; lognormal variance with pedigree 0.8526, pedigree (3,3,5,1,1)
  Literature, basic uncertainity estimated = 6
  Amount was scaled to the amount of reference product.
- Acetone [air, urban air close to ground]: 5.31915e-8 kg; = 5E-08 * scaling_factor; lognormal variance with pedigree 0.8526, pedigree (3,3,5,1,1)
  (same comment as for Acetaldehyde)
- Acetylene [air, urban air close to ground]: 1.06383e-8 kg; = 1E-08 * scaling_factor; lognormal variance with pedigree 0.8526, pedigree (3,3,5,1,1)
  (same comment as for Acetaldehyde)
- Acrolein [air, urban air close to ground]: 1.2234e-8 kg; = 1.15E-08 * scaling_factor; lognormal variance with pedigree 0.8526, pedigree (3,3,5,1,1)
  (same comment as for Acetaldehyde)
- Benzaldehyde [air, urban air close to ground]: 6.38298e-9 kg; = 6E-09 * scaling_factor; lognormal variance with pedigree 0.8526, pedigree (3,3,5,1,1)
  (same comment as for Acetaldehyde)
- Benzene [air, urban air close to ground]: 2.12766e-8 kg; = 2E-08 * scaling_factor; lognormal variance with pedigree 0.8526, pedigree (3,3,5,1,1)
  (same comment as for Acetaldehyde)
- Butane [air, urban air close to ground]: 1.59574e-7 kg; = 1.5E-07 * scaling_factor; lognormal variance with pedigree 0.8526, pedigree (3,3,5,1,1)
  (same comment as for Acetaldehyde)
- Carbon dioxide, fossil [air, urban air close to ground]: 0.0787234 kg; = 0.074 * scaling_factor; lognormal variance with pedigree 0.0426, pedigree (3,3,5,1,1)
  Literature
  Amount was scaled to the amount of reference product.
- Carbon monoxide, fossil [air, urban air close to ground]: 7.97872e-6 kg; = 7.5E-06 * scaling_factor; lognormal variance with pedigree 0.93, pedigree (1,1,5,1,1)
  Deviation calculated
  Amount was scaled to the amount of reference product.
- Copper ion [air, urban air close to ground]: 7.44681e-10 kg; = 7E-10 * scaling_factor; lognormal variance with pedigree 0.6926, pedigree (3,3,5,1,1)
  Literature
  Amount was scaled to the amount of reference product.
- Dinitrogen monoxide [air, urban air close to ground]: 7.44681e-7 kg; = 7E-07 * scaling_factor; lognormal variance with pedigree 0.5226, pedigree (3,3,5,1,1)
  Literature, basic uncertainty estimated = 4
  Amount was scaled to the amount of reference product.
- Dioxins, measured as 2,3,7,8-tetrachlorodibenzo-p-dioxin [air, urban air close to ground]: 6.06383e-17 kg; = 5.7E-17 * scaling_factor; lognormal variance with pedigree 0.3526, pedigree (3,3,5,1,1)
  Literature
  Amount was scaled to the amount of reference product.
- Ethane [air, urban air close to ground]: 2.12766e-8 kg; = 2E-08 * scaling_factor; lognormal variance with pedigree 0.8526, pedigree (3,3,5,1,1)
  (same comment as for Acetaldehyde)
- Ethylene [air, urban air close to ground]: 5.31915e-8 kg; = 5E-08 * scaling_factor; lognormal variance with pedigree 0.8526, pedigree (3,3,5,1,1)
  (same comment as for Acetaldehyde)
- Formaldehyde [air, urban air close to ground]: 6.38298e-9 kg; = 6E-09 * scaling_factor; lognormal variance with pedigree 0.8526, pedigree (3,3,5,1,1)
  (same comment as for Acetaldehyde)
- Hydrocarbons, aliphatic, alkanes, unspecified [air, urban air close to ground]: 2.65957e-7 kg; = 2.5E-07 * scaling_factor; lognormal variance with pedigree 0.8526, pedigree (3,3,5,1,1)
  (same comment as for Acetaldehyde)
- Hydrocarbons, aliphatic, unsaturated [air, urban air close to ground]: 2.12766e-8 kg; = 2E-08 * scaling_factor; lognormal variance with pedigree 0.8526, pedigree (3,3,5,1,1)
  (same comment as for Acetaldehyde)
- Hydrocarbons, aromatic [air, urban air close to ground]: 2.12766e-8 kg; = 2E-08 * scaling_factor; lognormal variance with pedigree 0.8526, pedigree (3,3,5,1,1)
  (same comment as for Acetaldehyde)
- Hydrochloric acid [air, urban air close to ground]: 1e-7 kg; = 9.4E-08 * scaling_factor; lognormal variance with pedigree 0.0926, pedigree (3,3,5,1,1)
  Literature
  Amount was scaled to the amount of reference product.
- Hydrogen fluoride [air, urban air close to ground]: 9.57447e-9 kg; = 9E-09 * scaling_factor; lognormal variance with pedigree 0.0926, pedigree (3,3,5,1,1)
  Literature
  Amount was scaled to the amount of reference product.
- Mercury II [air, urban air close to ground]: 5.31915e-10 kg; = 5E-10 * scaling_factor; lognormal variance with pedigree 0.6926, pedigree (3,3,5,1,1)
  Literature
  Amount was scaled to the amount of reference product.
- Methane, fossil [air, urban air close to ground]: 2.12766e-7 kg; = 2E-07 * scaling_factor; lognormal variance with pedigree 0.8526, pedigree (3,3,5,1,1)
  (same comment as for Acetaldehyde)
- Nitrogen oxides [air, urban air close to ground]: 2.92553e-5 kg; = 2.75E-05 * scaling_factor; lognormal variance with pedigree 0.11, pedigree (1,1,5,1,1)
  Deviation calculated
  Amount was scaled to the amount of reference product.
- PAH, polycyclic aromatic hydrocarbons [air, urban air close to ground]: 4.89362e-10 kg; = 4.6E-10 * scaling_factor; lognormal variance with pedigree 0.3526, pedigree (3,3,5,1,1)
  Literature
  Amount was scaled to the amount of reference product.
- Particulate Matter, < 2.5 um [air, urban air close to ground]: 5.31915e-7 kg; = 5E-07 * scaling_factor; lognormal variance with pedigree 0.3526, pedigree (3,3,5,1,1)
  Literature, basic uncertainty estimated = 3
  Amount was scaled to the amount of reference product.
- Pentane [air, urban air close to ground]: 1.06383e-7 kg; = 1E-07 * scaling_factor; lognormal variance with pedigree 0.8526, pedigree (3,3,5,1,1)
  (same comment as for Acetaldehyde)
- Propanal [air, urban air close to ground]: 6.38298e-9 kg; = 6E-09 * scaling_factor; lognormal variance with pedigree 0.8526, pedigree (3,3,5,1,1)
  (same comment as for Acetaldehyde)
- Propane [air, urban air close to ground]: 3.19149e-8 kg; = 3E-08 * scaling_factor; lognormal variance with pedigree 0.8526, pedigree (3,3,5,1,1)
  (same comment as for Acetaldehyde)
- Propylene [air, urban air close to ground]: 2.12766e-8 kg; = 2E-08 * scaling_factor; lognormal variance with pedigree 0.8526, pedigree (3,3,5,1,1)
  (same comment as for Acetaldehyde)
- Sulfur dioxide [air, urban air close to ground]: 4.98298e-5 kg; = 4.684E-05 * scaling_factor; lognormal variance with pedigree 0.0426, pedigree (3,3,5,1,1)
  Calculated
  Amount was scaled to the amount of reference product.
- Toluene [air, urban air close to ground]: 1.06383e-8 kg; = 1E-08 * scaling_factor; lognormal variance with pedigree 0.8526, pedigree (3,3,5,1,1)
  (same comment as for Acetaldehyde)
- Zinc II [air, urban air close to ground]: 7.44681e-10 kg; = 7E-10 * scaling_factor; lognormal variance with pedigree 0.6926, pedigree (3,3,5,1,1)
  Literature
  Amount was scaled to the amount of reference product.

## Sampling procedure
Data published in literature based on measurements.

## Extrapolations
Some information from other European countries has been used to determine the emission factors.

## Review by Michael Spielmann (obsolete) 2006-02-16
passed
none
