# soybean, feed production

Dataset: EcoSpold 2, unit process
Geography: CA-QC
Time period: 1996-01-01 to 2023-12-31
Technology level: current
Classification: EcoSpold01Categories: agricultural means of production/feed
Classification: ISIC rev.4 ecoinvent: 1080:Manufacture of prepared animal feeds
Scenario: Business-as-Usual
System model: Allocation, cut-off by classification
Generated by: Dominique Maxime
Published in: Nemecek, T. 2007
Database: ecoinvent
isCopyrightProtected: true
accessRestrictedTo: 1

## General comment
The inventory refers to 1 kg processed feedstuff (fresh weight). This dataset has been created as a proxy for roasted soybeans used in swine diet in Québec.

## Included activities start
The dataset starts with the reception of feedstuff at the processing centre.

## Included activities end
The activities end with the storage of the feed mixes. The inventory includes processing feedstuff (crushing or milling, heat treatment, dosing, mixing squeezing and pelleting) and the storage of the feed mixes. It also includes water use and wastewater treatment, the transformation and use of land related to the storage buildings. No process emissions (e.g. dust and particulate matter) were included except heat waste from the use of electricity. Packaging is not included.

## Geography
This dataset is extrapolated from an original dataset covering the geography of Switzerland.

## Technology
This dataset is extrapolated from an original dataset which technology refers to non expanded feedstuff from protein peas and broad beans.

## Time period
Years of the publications of the main sources

## Parameters
- fraction, process water, to air: 0.9 dimensionless; lognormal variance with pedigree 0.092025, pedigree (4,4,3,2,4)
- fraction, tap water, to air: 0.9 dimensionless; lognormal variance with pedigree 0.092025, pedigree (4,4,3,2,4)

## Reference product
- soybean, feed: 1 kg; name REF_PRODUCT; By-product classification allocatable product; CPC 23319: Preparations used in animal feeding n.e.c.; HS2017 120110: Soya beans; seed, whether or not broken
  Processed soybeans used for animal feed (e.g. swine diet). This is not protein meal as no oil extraction is involved.
  production volume 760770 kg; name REF_PRODUCT_PV
    1996-1999 annual average of feed beans in Québec, expressed as crop primary equivalent. This is estimated as 6.8% of Québec beans production (11"250"000 kg; Statistics Canada, 2013).
    Statistics Canada (2013). Table 001-0010 Estimated areas, yield, production and average farm price of principal field crops, in metric units, annual.
  property price 0.244 EUR2005
    Calculated value. The price of soybean is 0.238 EUR/kg. The price for soybean, feed is calculated as the price of soybean plus the value of water and energy added to produce the soybean, feed.
  properties: carbon allocation 0.466812 kg, carbon content 0.524508, carbon content, fossil 0, carbon content, non-fossil 0.524508, dry mass 0.89 kg, water content 0.123596, water in wet mass 0.11 kg, wet mass 1 kg

## Inputs from technosphere
- building, multi-storey: 8.5e-6 m3; source UFA 2002; lognormal variance with pedigree 0.3446, pedigree (3,3,5,5,1)
  Estimation. The typical storage capacity of the cereal silo found in some feed processing centres in Switzerland is 10,000 tonnes, with an effective storage volume of about 80% of the building volume. With an average grain specific weight of 750 kg/m3, this gives a building volume of about 16,650 m3. Assuming that these feed processing centres process 25,000 tonnes of grain per year, the cereals will be stored for about three months before being processed.
  The largest feed processing centre in Switzerland (UFA-Biblis) has a feedstuff storage compound of 29,440 m3 (80 m length * 23 m * 16 m height) with an effective storage capacity of 4,140 tonnes (5520 palettes of 750 kg), or about 150 kg/m3 (UFA 2002). This centre processes 275,000 tonnes of concentrate feeds yearly. After processing, the feedstuff must therefore be stored for approx. one week in the processing centre before being sent to the regional storehouse.
  The average length of storage of the raw materials is set at 3 months in the calculations. The storage volume required was estimated as 1.7 m3/tonne of raw material (grain specific weight 750 kg/m3 and 80% of the building volume used for storage). The lifetime of the storage silo was assumed to be 50 years, the length of the construction phase 2 years. Land use was estimated from the height of Biblis’s storage silo (UFA 2002). Taking the height of 16 m, the area used is 0.1 m2/tonne of feedstuff for 3 months.
- electricity, low voltage: 0.025 kWh; lognormal variance with pedigree 0.0612, pedigree (2,3,5,5,3)
  Literature Value. According to Cederberg (1998) for protein mixes from legumes such as “protein peas” and “broad beans” the energy usage is 70% of the expanded feedstuff value of InfoMil (1996) since this is not expanded. This resulted into 25 kWh electricity electricity per tonne of feedstuff.
  Cederberg C. (1998) Life cycle assessment of milk production. A comparison of conventional and organic farming. The Swedish Institute for Food and Biotechnology. SIK-Rapport 1998 No. 643, 86 p.
- heat, district or industrial, natural gas: 0.095 MJ; lognormal variance with pedigree 0.0612, pedigree (2,3,5,5,3)
  Literature Value. See ecoinvent dataset "protein pea, feed production, Swiss integrated production" for details.
  Cederberg C. (1998) Life cycle assessment of milk production. A comparison of conventional and organic farming. The Swedish Institute for Food and Biotechnology. SIK-Rapport 1998 No. 643, 86 p.
  Salzgeber Ch. & Lörcher M. (1996) Produktökobilanz Brot unter verschiedenen Landbaubedingungen. In: Umweltverträgliche Pflanzenproduktion: Indikatoren, Bilanzierungsansätze und ihre Einbindung in Ökobilanzen. 11-12 July 1996, Wittenberg, 249-269.
  Higler J., Kühl R., Fries R., Pfeffer E. & Schulze Lammers P. (1997) Oekonomische und energetische Bewertung einer umweltgerechten Verwertung von Koppelprodukten der Ernährungsbranche und sonstigen organischen Reststoffen in der Landwirtschaft sowie Ansätze zur Entwicklung eines Recyclingkonzeptes. Forschungsberichte / Lehr- und Forschungsschwerpunkt "Umweltverträgliche und Standortgerechte Landwirtschaft" an der Landwirtschaftlichen Fakultät der Rheinischen Friedrich-Wilhelms-Universität 1364765. Bonn Institut für Landwirtschaftliche Betriebslehre.
  properties: heating value, net 1 MJ
- soybean: 1 kg; lognormal variance with pedigree 0.06, pedigree (1,1,5,5,3)
  Grain input for feed production. Due to lack of representative data, no loss is considered. Since Québec is a net exporter of soybean (production higher than domestic demand), a direct link to Quebec soybean production is considered as long as a regional market is not available (source: Monographie du secteur des grains au Québec, 2013.
  https://www.mapaq.gouv.qc.ca/fr/Publications/Monographiegrain.pdf)
  properties: carbon content, non-fossil 0.524508, dry mass 0.89 kg, water content 0.123596, wet mass 1 kg
- tap water: 0.056 kg; source Salzgeber Ch. 1996; lognormal variance with pedigree 0.1246, pedigree (3,3,5,5,4)
  Literature Value. Salzgeber & Lörcher (1996) give the total energy and water consumption of a mill processing about 30,000 tonnes of cereals per year. The mill consumes 1800 m3 water and produces 1200 m3 wastewater per year. Water consumption and wastewater output was completed from Salzgeber and Lörcher (1996), namely 56 litres tap water and 38 litres wastewater per tonne of feedstuff produced.
  properties: carbon content, fossil 0.00178991, dry mass 0.000337476 kg, water content 2962.17, wet mass 1 kg
  note on carbon content, fossil: Bicarbonate content is 2.93 mol/m3. CO2 content is 0.1 mol/m3 (ecoinvent v2.2 report 8, Tab 93.1).
- wastewater, average: -3.8e-5 m3; name WW; source Salzgeber Ch. 1996; lognormal variance with pedigree 0.0866, pedigree (3,3,3,5,4)
  (same comment as for tap water)
  production volume; = WW/ REF_PRODUCT* REF_PRODUCT_PV
    Calculated from the production volume of soybean, feed, in proportion to the respective output amounts.
  properties: carbon content, non-fossil 0.194039, dry mass 0.346837 kg, water content 2882.2, wet mass 1000 kg
  note on carbon content, non-fossil: 0.0673 kg TOC/m3 (Tab A.17, ecoinvent v2.2 report 13_I). TOC was considered as Total Carbon.

## Inputs from nature
- Occupation, construction site [natural resource, land]: 2e-6 m2*year; source UFA 2002; lognormal variance with pedigree 0.0846, pedigree (3,3,5,5,1)
  Estimation. Corresponds to land use Transformation*2 years (the length of the construction phase is 2 years).
- Occupation, industrial area [natural resource, land]: 5e-5 m2*year; source UFA 2002; lognormal variance with pedigree 0.0846, pedigree (3,3,5,5,1)
  Estimation. Corresponds to 0.2m2/tonne (because the total area occupied as “industrial area” was estimated as twice as high, namely 0.2 m2/tonne) multiplied by 3 months (because the average length of storage of the raw materials is set at 3 months in the calculations).
- Transformation, from unspecified [natural resource, land]: 1e-6 m2; source UFA 2002; lognormal variance with pedigree 0.1646, pedigree (3,3,5,5,1)
  Estimation. Corresponds to occupation industrial area/50 years (the lifetime of the storage silo was assumed to be 50 years).
- Transformation, to industrial area [natural resource, land]: 1e-6 m2; source UFA 2002; lognormal variance with pedigree 0.1646, pedigree (3,3,5,5,1)
  (same comment as for Transformation, from unspecified)

## Emissions to nature
- Water [air, unspecified]: 1.8e-5 m3; lognormal variance with pedigree 0.0827, pedigree (2,2,5,5,1)
  Emission calculated from tap water input and wastewater generation for water balance.

## Sampling procedure
Data based on literature, trade statistics and information from feedstuff processing enterprises.

## Extrapolations
This dataset originates from an dataset covering the geography CH and the technology of Swiss Integrated Production (SIP), Uncertainty and production volume have been adjusted. The technology of grain processing can be assumed the same for conventional grain as for SIP grain, hence no change is made to the technology-related uncertainty index. Note that properties of the reference product (carbon and water contents) are the same as the input grain, as it is also the case for the original dataset. No loss of grain is considered, due to lack of comprehensive data.
