# planting with starter fertiliser, by no till planter

Dataset: EcoSpold 2, unit process
Geography: AU
Time period: 2012-01-01 to 2023-01-01
Technology level: current
Classification: ISIC rev.4 ecoinvent: 0161:Support activities for crop production
Scenario: Business-as-Usual
System model: Allocation, cut-off by classification
Generated by: Dominique Maxime
Published in: Nemecek, T. 2007
Database: ecoinvent
isCopyrightProtected: true
accessRestrictedTo: 1

## General comment
This dataset represents the service of planting broad acre crops over 1 ha of agricultural land. The planter is assumed to be 20 metres wide and 22kW.
Dataset exchanges scaled from GLO parent dataset based on diesel consumption in AUtralia with other flows on capital infrastructure being kept the same as global process.
This inventory has been developed as part of the AUAgLCI initiative funded by a partnership of AUtralian Research and Development Corporations (RIRDC, CRDC, GRDC, SRDC, HAL, MLA, DA, FWPA) and Research Agencies (CSIRO, USQ and Q DAFF), with technical support from Life Cycle Strategies. More detail on inventory development can be found in the 'AUAgLCI Methodology for developing Life Cycle Inventory' documents located at www.AUlci.alcas.asn.au. Energy use from WA farm energy calculator.
Fuel consumption data have been derived from the Western AUtralia Farm Energy Calculator for broadacre crop. Soil clay content effects fuel consumption. For clay content 0-10% fuel consumption was modelled at 3.4 l/ha and above 20% fuel consumption rises to 6.2 l/ha. This inventory is based on 10-20% clay with a resulting 4.4 l/ha.

## Included activities start
Planting process starting from preliminary work at farm, like attaching the adequate machinery to the tractor.

## Included activities end
This activity ends with transfer back to farm and concluding work, like uncoupling the machine; The dataset includes transfer to field; field work for an area of land of 1 ha, including turning, idling and overlapping. The inventory takes into account the diesel fuel consumption and the amount of agricultural machinery and of the shed, which has to be attributed to the planting. Also taken into consideration is the amount of emissions to the air from combustion and the emission to the soil from tyre abrasion during the work process. The dataset does not include dust other than from combustion and noise. The planting material is not taken into account.

## Geography
Fuel consumption data have been derived from the Western AUtralia Farm Energy Calculator for broadacre crop other data are from global defaults.

## Technology
Fuel use is from current technology used in AUtralia

## Time period
Model is based on data in 2010

## Parameters
- AUtralia diesel consumption: 3.7048 kg/ha; name AU_diesel; lognormal variance with pedigree 0.000125, pedigree (1,2,1,2,1)
  Diesel consumption of tractor and machinery within the AUtralian context; kg diesel/ha
- ecoinvent diesel consumption: 8.9 kg/ha; name EI_diesel; lognormal variance with pedigree 0.004, pedigree (1,4,1,5,1)
  Diesel consumption in the parent dataset (ecoinvent); kg diesel/ha
- farm machinery diesel consumption ratio: 0.41627 dimensionless; name machine_diesel_ratio; = AU_diesel/ EI_diesel
  Ratio of diesel consumption for tractor and its machinery: kg diesel per ha of the Australia machinery/kg diesel per ha of the ecoinvent"s parent machinery
- quebec cropped area: 1.87476e6 ha; name qc_crop_area; lognormal variance with pedigree 0.0006, pedigree (1,1,1,1,1)
  Not adapted to AU values. Original values: Land in crops, Canada, Quebec in 2011. Source: Statistics Canada, 2013. Table 004-0002 - Census of Agriculture, total area of farms and use of farm land, CANSIM (database). (accessed: 2013-11-15) ("Land in crops" includes field crops, vegetables, fruits and nursery crops, and sod.) Statistics Canada
- quebec potatoes harvest area: 16950 ha; name qc_potatoes_harvest_area; lognormal variance with pedigree 3.093e-5, pedigree (1,1,1,1,1)
  Harvested area for potatoes in Australia (2008-2011 average). Source: MAPAQ (2013) Statistiques principales du secteur de la pomme de terre, Québec, 2008-2011. http://www.mapaq.gouv.qc.ca/SiteCollectionDocuments/Statistiques/secteurpommedeterre.pdf
- world arable land area: 1.39628e9 ha; name world_arable_area; lognormal variance with pedigree 0.0006, pedigree (1,1,1,1,1)
  Arable land area, World, in 2011. Source: FAOSTAT, 2013
- world potatoes harvest area: 1.86701e7 ha; name world_potatoes_harvest_area; lognormal variance with pedigree 6.963e-5, pedigree (1,1,1,1,1)
  Harvested area for potatoes in the world (2008-2011 average). Source: FAOSTAT, 2013

## Reference product
- planting with starter fertiliser, by no till planter: 1 ha; By-product classification allocatable product; CPC 86119: Other support services to crop production
  production volume 17413.5 ha
    Gross approximation of Australia production volume using relative value of Australia harvested area to world harvested area.
  property price 10.5345 EUR2005
    The price was calculated from the Department of Primary Industries NSW “Wheat ASW-AH1, flood irrigated, Murray Valley, 2012, NSW Gross Margin Budget”. The prices were converted to EUR based on the annual exchange rates published by the European Central Bank (https://sdw.ecb.europa.eu/quickview.do?SERIES_KEY=120.EXR.A.AUD.EUR.SP00.A, last accessed on 2023-06-01) and adjusted for inflation relative to 2005 using the producer price index (PPI) of the euro area, published by eurostat (https://ec.europa.eu/eurostat/databrowser/view/STS_INPP_A__custom_6416181/default/table?lang=en, last accessed on 2023-06-01).
  properties: carbon allocation 0 kg, carbon content 0

## Inputs from technosphere
- agricultural machinery, unspecified: 1.99 kg; lognormal variance with pedigree 0.046, pedigree (1,4,1,5,1)
- diesel: 10.75 kg; lognormal variance with pedigree 0.046, pedigree (1,4,1,5,1)
  Scaling to Australia diesel consumption
  property calculation property, kg 0 kg; name m_diesel
  properties: carbon content, fossil 0.865, dry mass 1 kg, heating value, net 42.8 MJ, wet mass 1 kg
  note on calculation property, kg: Mass output. Defined here for use in the combined production calculations.
  note on carbon content, fossil: C-content of diesel is 86.5% (ecoinvent v2.2 report 6_IV, Tab 3.14)
- shed: 0.0132 m2; lognormal variance with pedigree 0.304, pedigree (1,4,1,5,1)
- tractor, 4-wheel, agricultural: 2.43 kg; lognormal variance with pedigree 0.046, pedigree (1,4,1,5,1)
  Scaling to Australia diesel consumption

## Emissions to nature
- Ammonia [air, non-urban air or from high stacks]: 0.000215 kg; lognormal variance with pedigree 0.0601, pedigree (1,2,1,5,3)
  Scaling to Australia diesel consumption
- Benzene [air, non-urban air or from high stacks]: 7.85112e-5 kg; lognormal variance with pedigree 0.0601, pedigree (1,2,1,5,3)
  Scaling to Australia diesel consumption
- Benzo(a)pyrene [air, non-urban air or from high stacks]: 3.225e-7 kg; lognormal variance with pedigree 0.6601, pedigree (1,2,1,5,3)
  Scaling to Australia diesel consumption
- Cadmium II [air, non-urban air or from high stacks]: 1.075e-7 kg; lognormal variance with pedigree 0.6601, pedigree (1,2,1,5,3)
  Scaling to Australia diesel consumption
- Carbon dioxide, fossil [air, non-urban air or from high stacks]: 33.4579 kg; lognormal variance with pedigree 0.0201, pedigree (1,2,1,5,3)
  Scaling to Australia diesel consumption
- Carbon monoxide, fossil [air, non-urban air or from high stacks]: 0.0640169 kg; lognormal variance with pedigree 0.654, pedigree (1,4,1,5,1)
  Scaling to Australia diesel consumption
- Chromium III [air, non-urban air or from high stacks]: 5.375e-7 kg; lognormal variance with pedigree 0.6601, pedigree (1,2,1,5,3)
  Scaling to Australia diesel consumption
- Copper ion [air, non-urban air or from high stacks]: 1.82388e-5 kg; lognormal variance with pedigree 0.6601, pedigree (1,2,1,5,3)
  Scaling to Australia diesel consumption
- Dinitrogen monoxide [air, non-urban air or from high stacks]: 0.00129242 kg; lognormal variance with pedigree 0.0601, pedigree (1,2,1,5,3)
  Scaling to Australia diesel consumption
- Methane, fossil [air, non-urban air or from high stacks]: 0.00138904 kg; lognormal variance with pedigree 0.0601, pedigree (1,2,1,5,3)
  Scaling to Australia diesel consumption
- NMVOC, non-methane volatile organic compounds [air, non-urban air or from high stacks]: 0.0433624 kg; lognormal variance with pedigree 0.044, pedigree (1,4,1,5,1)
  Scaling to Australia diesel consumption
- Nickel II [air, non-urban air or from high stacks]: 7.525e-7 kg; lognormal variance with pedigree 0.6601, pedigree (1,2,1,5,3)
  Scaling to Australia diesel consumption
- Nitrogen oxides [air, non-urban air or from high stacks]: 0.48677 kg; lognormal variance with pedigree 0.044, pedigree (1,4,1,5,1)
  Scaling to Australia diesel consumption
- PAH, polycyclic aromatic hydrocarbons [air, non-urban air or from high stacks]: 3.53904e-5 kg; lognormal variance with pedigree 0.3201, pedigree (1,2,1,5,3)
  Scaling to Australia diesel consumption
- Particulate Matter, < 2.5 um [air, non-urban air or from high stacks]: 0.00582191 kg; lognormal variance with pedigree 0.3201, pedigree (1,2,1,5,3)
  Scaling to Australia diesel consumption
- Selenium IV [air, non-urban air or from high stacks]: 1.075e-7 kg; lognormal variance with pedigree 0.0601, pedigree (1,2,1,5,3)
  Scaling to Australia diesel consumption
- Sulfur dioxide [air, non-urban air or from high stacks]: 0.0108466 kg; lognormal variance with pedigree 0.0201, pedigree (1,2,1,5,3)
  Scaling to Australia diesel consumption
- Zinc II [air, non-urban air or from high stacks]: 1.075e-5 kg; lognormal variance with pedigree 0.6601, pedigree (1,2,1,5,3)
  Scaling to Australia diesel consumption
- Cadmium II [soil, agricultural]: 1.25e-6 kg; lognormal variance with pedigree 0.044, pedigree (1,4,1,5,1)
  Emission from tyre abrasion, not related to diesel consumption
- Lead II [soil, agricultural]: 5.5e-6 kg; lognormal variance with pedigree 0.044, pedigree (1,4,1,5,1)
  Emission from tyre abrasion, not related to diesel consumption
- Zinc II [soil, agricultural]: 0.00328 kg; lognormal variance with pedigree 0.044, pedigree (1,4,1,5,1)
  Emission from tyre abrasion, not related to diesel consumption

## Sampling procedure
The inventoried HC, NOx, CO and fuel consumption values are measurements made following two test cycles (ISO 8178 C1 test and a specific 6-level-test created by the FAT) and on measurements made during the field work. The other emissions were calculated based on literature data and the measured fuel consumption.

## Extrapolations
Values given in the reference are representative for the chosen work processes. Dataset based on GLO parent dataset which was extrapolated from CH geography context without modification of exchanges. Processes are typical procedures for Switzerland around the year 2000, they are not statistical average processes. This dataset has been adapted only for diesel input representative of the Australia context and for combustion emissions scaled from the difference in diesel consumption. The uncertainty has been adjusted accordingly.

## Review by Christian Bauer 2013-11-19
passed

## Review by Thomas Nemecek 2013-11-19
The production volume must be updated, since the formula refers to a GLO PV, which has been changed meanwhile.
