# train production, passenger, long-distance

Dataset: EcoSpold 2, unit process
Geography: CH
Time period: 1993-01-01 to 2023-12-31
Technology level: current
Classification: ISIC rev.4 ecoinvent: 3020:Manufacture of railway locomotives and rolling stock
Classification: EcoSpold01Categories: transport systems/train
Scenario: Business-as-Usual
System model: Allocation, cut-off by classification
Generated by: Michael Spielmann (obsolete)
Published in: Spielmann M. 2004
Database: ecoinvent
isCopyrightProtected: true
accessRestrictedTo: 1

## General comment
The dataset represents the production of a long-distance train in Switzerland with a total weight of 317t and a life span of 40 years.

## Included activities start
Service starts with the material consumption for the production of the long-distance train.

## Included activities end
The dataset ends with the production of one long-distance train. The dataset includes material consumption, transport, energy and fuel consumption. The disposal of the long-distance train is included as well.

## Geography
Manufacturing data represents a train produced in Europe.

## Technology
In this study, a new SBB-intercity/interregio train composition, the IC 2000 (Dosto) is modelled. The IC 2000 usually is equipped with the Re 460 and a train composition comprises 7 cars offering about 1400 seats. In this study, a new SBB-intercity/interregio train composition, the IC 2000 (Dosto) is modelled. The IC 2000 usually is equipped with the Re 460 and a train composition comprises 7 cars offering about 1400 seats.The maximum speed is 200 km/h. In the year 2000 the SBB had 237 wagons in operation. The data presented here is taken from (Maibach, 1999). The total weight of a train composition is 317 t. The share of aluminium of the IC 2000 is significantly higher. The aim of the substitution of steel is to decrease the weight and hence the electricity consumption. The average load is assumed with 28 % (392 passengers). The yearly vehicle kilometre performance is 500’000 vkm (Maibach, 1999). In this project we assume a life span of 40 years, resulting in a total life time kilometric performance of 20’000’000 vkm and a life time transport performance of 7’840’000’000 pkm. Estimates for energy consumption for manufacturing is taken from Frischknecht (1996) assuming an electricity consumption and light fuel oil consumption of 2.7 MJ/kg material and 3.8 MJ/kg material, respectively.
References:
Frischknecht R., Bollens U., Bosshart S., Ciot M., Ciseri L., Doka G., Dones R., Gantner U. and Hischier R. (1996) Ökoinventare von Energiesystemen: Grundlagen für den ökologischen Vergleich von Energiesystemen und den Einbezug von Energiesystemen in Ökobilanzen für die Schweiz. Auflage No. 3. Gruppe Energie - Stoffe - Umwelt (ESU), Eidgenössische Technische Hochschule Zuerich und Sektion Ganzheitliche Systemanalysen, Paul Scherrer Institut, Villigen, Bundesamt für Energie (Hrsg.), Bern
Maibach M., Peter D. and Seiler B. (1999) Ökoinventar Transporte: Grundlagen für den ökologischen Vergleich von Transportsystemen und den Einbezug von Transportsystemen in Ökobilanzen. Technischer Schlussbericht. In: Schweizerischer Nationalfonds zur Förderung der wissenschaftlichen Forschung (ed. SPP Umwelt M.). 2nd Edition. INFRAS, Zürich

## Reference product
- train, passenger, long-distance: 1 unit; name RP_amount_1; By-product classification allocatable product; CPC 49520: Self-propelled railway or tramway coaches, vans and trucks (except maintenance or service vehicles); HS2017 8603: Railway or tramway coaches, vans and trucks; self-propelled tenders, other than those of heading no. 8604
  EcoSpold01Location=CH
  production volume 0.0336675 unit; name RP_PV_1
    This is a placeholder value that does not reflect real-world production volumes. This dataset does not currently require a real-world production volume to work in the database framework, and no actual data were collected yet. This has no negative effect on the results of the ecoinvent database. The placeholder value of this activity was scaled according to the nominal GDP of 2005 (source: United Nations, http://data.un.org/Glossary.aspx?q=GDP+%28current+US%24%29, accessed 20130726) to reflect an appropriate share of the global production volume, which is also a placeholder value.
  property price 436738 EUR2005
    Calculated based on inputs: The price of the product has been calculated as a sum of the values of the material and energy inputs for this product. This value is therefore a rough estimation. It may underestimate the real price since there are additional expenses when producing any product. These expences can include for example labour costs, treatment of waste materials and profit for the producer. Please consider carefully whether this level of data quality is acceptable for your application.
  properties: carbon allocation 0 kg, carbon content 0

## Inputs from technosphere
- alkyd paint, white, without solvent, in 60% solution state: 6340 kg; source Maibach M. 1999; lognormal variance with pedigree 0.0586, pedigree (4,3,5,1,1)
  Literature value. The data presented here is taken from (Maibach, 1999).
  EcoSpold01Location=RER
  Uncertainty: literature studies
  properties: carbon content, fossil 0.140367, carbon content, non-fossil 0.199629, dry mass 1 kg, heating value, net 10.3 MJ, wet mass 1 kg
  note on carbon content, fossil: C content was calculated as an addition of C content in the raw materials.
- aluminium, cast alloy: 51200 kg; = 0.32*1.6E+05; source Maibach M. 1999; lognormal variance with pedigree 0.0586, pedigree (4,3,5,1,1)
  1.6E+05 kg aluminium, production mix. Literature value. The data presented here is taken from (Maibach, 1999).
  0.32: part of aluminium cast alloy in aluminium, production mix. Based on the aluminium, production mix in ecoinvent v2.2.
  Uncertainty: literature studies
  properties: dry mass 1 kg, wet mass 1 kg
- aluminium, wrought alloy: 108800 kg; = 0.68*1.6E+05; source Maibach M. 1999; lognormal variance with pedigree 0.0586, pedigree (4,3,5,1,1)
  1.6E+05 kg aluminium, production mix. Literature value. The data presented here is taken from (Maibach, 1999).
  0.68: part of aluminium, wrought alloy in aluminium, production mix. Based on the aluminium, production mix in ecoinvent v2.2.
  Uncertainty: literature studies
  properties: dry mass 1 kg, wet mass 1 kg
- copper, cathode: 9980 kg; source Maibach M. 1999; lognormal variance with pedigree 0.0586, pedigree (4,3,5,1,1)
  (same comment as for alkyd paint, white, without solvent, in 60% solution state)
  properties: dry mass 1 kg, wet mass 1 kg
- electricity, medium voltage: 240000 kWh; source Frischknecht R. 1996; lognormal variance with pedigree 0.0586, pedigree (4,3,5,1,1)
  EcoSpold01Location=CH
  Calculated value. Estimates for energy consumption for manufacturing is taken from Frischknecht (1996) assuming an electricity consumption of 2.7 MJ/kg material.
  Uncertainty: literature studies
- flat glass, coated: 9510 kg; source Maibach M. 1999; lognormal variance with pedigree 0.0586, pedigree (4,3,5,1,1)
  (same comment as for alkyd paint, white, without solvent, in 60% solution state)
  properties: dry mass 1 kg, wet mass 1 kg
- heat, district or industrial, other than natural gas: 1.2e6 MJ; lognormal variance with pedigree 0.0586, pedigree (4,3,5,1,1)
  EcoSpold01Location=CH
  Uncertainty: literature studies
  properties: heating value, net 1 MJ
- polyethylene, high density, granulate: 77000 kg; source Maibach M. 1999; lognormal variance with pedigree 0.0586, pedigree (4,3,5,1,1)
  EcoSpold01Location=RER
  Literature value. The data presented here is taken from (Maibach, 1999).
  Uncertainty: literature studies
  properties: carbon content, fossil 0.857143, dry mass 1 kg, heating value, net 42.47 MJ, wet mass 1 kg
  note on carbon content, fossil: Polyethylene is formed out of a huge amount of ethylene monomers (C2H4) (ecoinvent v2.2 report 11_II). MW=28 g/mol
- reinforcing steel: 54200 kg; source Maibach M. 1999; lognormal variance with pedigree 0.0586, pedigree (4,3,5,1,1)
  (same comment as for polyethylene, high density, granulate)
  properties: carbon content, fossil 0.004, dry mass 1 kg, wet mass 1 kg
- tempering, flat glass: 9510 kg; source Maibach M. 1999; lognormal variance with pedigree 0.0586, pedigree (4,3,5,1,1)
  (same comment as for alkyd paint, white, without solvent, in 60% solution state)
- used train, passenger, long-distance: -1 unit; name BP_amount_1; lognormal variance with pedigree 0.3, pedigree (1,1,1,1,1)
  production volume; = RP_PV_1 * (BP_amount_1 / RP_amount_1)
    Calculated from production volume of reference product using the relative outputs.
  property carbon content, fossil 0.211693; name C_content_fossil
  property carbon content, non-fossil 0.00399258; name C_content_non_fossil
  property dry mass 317000 kg; name DM
  property water content 0; name water_content
  property water in wet mass 0 kg; name WWM
  property wet mass 317000 kg; name WM

## Sampling procedure
The data of the material composition and energy consumption is based on literature studies.

## Extrapolations
This train type is used as an estimate for the entire long-distance train fleet.

## Review by Niels Jungbluth 2004-04-01
Passed.

## Review by Roland Hischier 2011-09-23
Transfer of documentation done.

## Review by Carl Vadenbo 2012-06-29
In preparation for the release of ecoinvent v3.0, exchange for disposal of used long-distance train was added to 'train production, passenger, long-distance, CH 1993-2000'. The amounts and the uncertainty information of the exchanges were reviewed and were found to correspond to the disaggregated datasets, and the dataset was accepted for inclusion into the ecoinvent database on 2012.07.04.
