# transport, passenger train

Dataset: EcoSpold 2, unit process
Geography: FR
Time period: 2000-01-01 to 2023-12-31
Technology level: current
Classification: EcoSpold01Categories: transport systems/train
Classification: ISIC rev.4 ecoinvent: 4911:Passenger rail transport, interurban
Scenario: Business-as-Usual
System model: Allocation, cut-off by classification
Share of production covered: 1 %
Generated by: Michael Spielmann (obsolete)
Published in: Spielmann M. 2007
Database: ecoinvent
isCopyrightProtected: true
accessRestrictedTo: 1

## General comment
Inventory refers to the entire transport life cycle. For rail infrastructure, expenditures and environmental interventions due to construction of rail tracks have been allocated based on the Gross tonne kilometre performance. Expenditures due to operation of the rail infrastructure, as well as land use have been allocated based on the yearly train kilometre performance. Data of the energy use and operation emissions for the operation of average trains in France (regional trains, S-Bahn, long distance-trains), the data has been determined top down by International Rail Statistics. Particulate emissions due to abrasion of rail tracks, wheels, brakes and overhead contact line is included according to Swiss situation. Emission of sulphur hexafluoride (SF6) occurring during conversion at traction substations are accounted for.

## Included activities start
The dataset starts when the infrastructure input (train and railway tracks) starts to be used for passenger transport.

## Included activities end
The module calls the modules 'operation of vehicle'; 'production and maintenance of vehicles'; 'construction of railway tracks'. The inventory of energy use and operation emissions includes the actual energy consumption (183000 t Diesel and 4676.43786043001 GWh of electricity) due to traction of passenger trains.

## Geography
Data of the energy use and operation emissions refers to average transport conditions

## Technology
For vehicle operation all technologies are included in the average data. For the energy use and operation emissions, all technologies are included, the train is operated with the country electricity mix.

## Time period
For the energy use and operation emissions, all data is based on situation in the year 2000, except the specific energy consumption per pkm (year 2007)

## Reference product
- transport, passenger train: 1 person*km; By-product classification allocatable product; CPC 641: Local transport and sightseeing transportation services of passengers
  EcoSpold01Location=FR
  production volume 3.5606e10 person*km
    81664 Mio. pkm in 2007
    UIC statistical synopsis 2005 http://www.uic.org/IMG/xls/synth2005-2.xls (total minus high-speed)
  property price 0.0208844 EUR2005
    Calculated based on inputs: The price of the product has been calculated as a sum of the values of the material and energy inputs for this product. This value is therefore a rough estimation. It may underestimate the real price since there are additional expenses when producing any product. These expences can include for example labour costs, treatment of waste materials and profit for the producer. Please consider carefully whether this level of data quality is acceptable for your application.
  properties: carbon allocation 0 kg, carbon content 0

## Inputs from technosphere
All rows: lognormal variance with pedigree 0.04, pedigree (1,1,5,1,1)
- diesel: 0.0022409 kg
  Energy use and operation emissions
  properties: carbon content, fossil 0.865, dry mass 1 kg, heating value, net 42.8 MJ, wet mass 1 kg
  note on carbon content, fossil: C-content of diesel is 86.5% (ecoinvent v2.2 report 6_IV, Tab 3.14)
- electricity, high voltage: 0.057264 kWh
  Energy use and operation emissions
- maintenance, train, passenger, long distance: 2.418e-10 unit
- railway track: 6.9316e-5 m*year
  EcoSpold01Location=CH
- train, passenger, long-distance: 2.418e-10 unit
  EcoSpold01Location=CH

## Emissions to nature
All rows: lognormal variance with pedigree 0.04, pedigree (1,1,5,1,1)
- Ammonia [air, unspecified]: 4.4685e-8 kg
  Energy use and operation emissions
- Benzene [air, unspecified]: 2.2409e-7 kg
  Energy use and operation emissions
- Cadmium II [air, unspecified]: 2.2409e-11 kg
  Energy use and operation emissions
- Carbon dioxide, fossil [air, unspecified]: 0.0070504 kg
  Energy use and operation emissions
- Carbon monoxide, fossil [air, unspecified]: 3.5417e-5 kg
  Energy use and operation emissions
- Chromium III [air, unspecified]: 1.1221e-10 kg
  Energy use and operation emissions
- Copper ion [air, unspecified]: 3.8065e-9 kg
  Energy use and operation emissions
- Dinitrogen monoxide [air, unspecified]: 2.2409e-7 kg
  Energy use and operation emissions
- Lead II [air, unspecified]: 2.466e-13 kg
  Energy use and operation emissions
- Mercury II [air, unspecified]: 4.4685e-14 kg
  Energy use and operation emissions
- Methane, fossil [air, unspecified]: 2.9128e-7 kg
  Energy use and operation emissions
- NMVOC, non-methane volatile organic compounds [air, unspecified]: 1.1353e-5 kg
  Energy use and operation emissions
- Nickel II [air, unspecified]: 1.569e-10 kg
  Energy use and operation emissions
- Nitrogen oxides [air, unspecified]: 0.00012313 kg
  Energy use and operation emissions
- Particulate Matter, < 2.5 um [air, unspecified]: 2.875e-6 kg
  Energy use and operation emissions
- Particulate Matter, > 10 um [air, unspecified]: 1.1676e-5 kg
  Energy use and operation emissions
- Particulate Matter, > 2.5 um and < 10um [air, unspecified]: 1.0668e-5 kg
  Energy use and operation emissions
- Selenium IV [air, unspecified]: 2.2409e-11 kg
  Energy use and operation emissions
- Sulfur dioxide [air, unspecified]: 1.3439e-6 kg
  Energy use and operation emissions
- Sulfur hexafluoride [air, unspecified]: 2.5196e-9 kg
  Energy use and operation emissions
- Toluene [air, unspecified]: 8.9702e-8 kg
  Energy use and operation emissions
- Xylenes, unspecified [air, unspecified]: 8.9702e-8 kg
  Energy use and operation emissions
- Zinc II [air, unspecified]: 2.2409e-9 kg
  Energy use and operation emissions
- Iron ion [soil, unspecified]: 2.8132e-5 kg
  Energy use and operation emissions

## Sampling procedure
International railway statistics

## Extrapolations
see Technology and Geography

## Review by Christian Bauer 2010-02-07
passed

## Review by Carl Vadenbo 2012-06-29
In preparation for the release of ecoinvent v3.0, the datasets 'operation, average train FR' and 'transport, average train FR' in ecoinvent v2.2 were merged into the dataset 'transport, passenger train, FR 2008'. The amounts of the exchanges were reviewed and were found to correspond to the disaggregated datasets. The field Included Activities End and the uncertainty information need to be revised before subsequent releases of the database. Despite this shortcoming, the new dataset was accepted for inclusion into the ecoinvent database on 2012.07.04.
