# fava bean seed production, for sowing

Dataset: EcoSpold 2, unit process
Geography: RoW
Time period: 2021-01-01 to 2023-12-31
Technology level: current
Classification: ISIC rev.4 ecoinvent: 0164:Seed processing for propagation
Scenario: Business-as-Usual
System model: Allocation, cut-off by classification
Generated by: Avraam Symeonidis
Database: ecoinvent
isCopyrightProtected: true
accessRestrictedTo: 1

## General comment
The process prepares and produces seeds for sowing. Refers to 1 kg of fava bean seed (fresh weight).

## Included activities start
This activity start after the harvest of the crop.

## Included activities end
The seed produced at the farm is treated in the processing centre (pre-cleaning, cleaning, eventually drying, chemical dressing (for integrated production) and bag filling), stored and afterwards transported to the regional storage centre. No data on wastewater production were available.

## Technology
Refers to average seed processing

## Time period
Date of the major data sources.

## Reference product
- fava bean seed, for sowing: 1 kg; By-product classification allocatable product; CPC 01260: Vegetable seeds, except beet seeds; HS2017 070890: Vegetables, leguminous; (other than peas and beans), shelled or unshelled, fresh or chilled
  production volume 4.06925e7 kg; = 1140285*100/2.8
    Calculated from the PV of Switzerland. The value of Switzerland is 2.8% of the Global PV.
  property price 1.70295 EUR2005
    Calculated based on inputs: The price of the product has been calculated as a sum of the values of the material and energy inputs for this product. This value is therefore a rough estimation. It may underestimate the real price since there are additional expenses when producing any product. These expences can include for example labour costs, treatment of waste materials and profit for the producer. Please consider carefully whether this level of data quality is acceptable for your application.
  properties: carbon allocation 0.435765 kg, carbon content 0.475, carbon content, fossil 0, carbon content, non-fossil 0.475, dry mass 0.9174 kg, water content 0.0900371, water in wet mass 0.0826 kg, wet mass 1 kg

## Inputs from technosphere
- building, multi-storey: 2e-5 m3; lognormal variance with pedigree 0.3728, pedigree (5,3,2,5,1)
  See '01_crop production - seed production & processing_v1.0.pdf' - pdf-document on the dedicated talk page of ecoinvent (www.ecoinvent.org/documentation)
  Uncertainty: S
- electricity, low voltage: 0.00220272, 9.83262e-5, 0.00154624, 0.0320943, 0.00316786, 1.9732e-5, 0.00727382, 0.0110496, 0.000547404 kWh (9 suppliers, which the file names only by identifier); sum of these 0.058 kWh; = 58/1000; lognormal variance with pedigree 0.1226, pedigree (5,3,5,5,1)
  Electricity consumption is considered 58 kWh per tonned of seeds processed. See '01_crop production - seed production & processing_v1.0.pdf' - pdf-document on the dedicated talk page of ecoinvent (www.ecoinvent.org/documentation)
  Uncertainty: S
- fava bean: 1 kg; lognormal variance with pedigree 0.0014, pedigree (1,3,2,1,1)
  Uncertainty: D
  properties: carbon content, non-fossil 0.45651, dry mass 0.8 kg, water content 0.25, wet mass 1 kg
- packaging, for pesticides: 0.0032 kg; lognormal variance with pedigree 0.0514, pedigree (4,3,2,5,4)
  Total amount of active substance/s of pesticides needed for the production of pea seed, for sowing is calculated to be circa 1.60E-03 kg. Pesticide/s used in this dataset is/are: 'pesticide, unspecified'. The total amount of active substance/s is doubled in order to account for the packaging of the dilluted product of pesticide/s that is/are applied. Therefore, 3.20E-03 kg of packaging for pesticides is justified with this exchange.
  Uncertainty: S
  properties: carbon content, fossil 0.85714, dry mass 1 kg, price 0.0642 EUR2005, wet mass 1 kg
- pesticide, unspecified: 0.0016 kg; lognormal variance with pedigree 0.0129, pedigree (2,2,2,5,1)
  (same comment as for building, multi-storey)
  properties: carbon content, fossil 0.486978, dry mass 1 kg, wet mass 1 kg
  note on carbon content, fossil: Mean of C content in all pesticides whose formula has been documented in Sutter 2010

## Inputs from nature
- Occupation, construction site [natural resource, land]: 8e-6 m2*year; lognormal variance with pedigree 0.1228, pedigree (5,3,2,5,1)
  (same comment as for building, multi-storey)
- Occupation, industrial area [natural resource, land]: 0.0002 m2*year; lognormal variance with pedigree 0.1228, pedigree (5,3,2,5,1)
  (same comment as for building, multi-storey)
- Transformation, from unspecified [natural resource, land]: 4e-6 m2; lognormal variance with pedigree 0.1828, pedigree (5,3,2,5,1)
  (same comment as for building, multi-storey)
- Transformation, to industrial area [natural resource, land]: 4e-6 m2; lognormal variance with pedigree 0.1828, pedigree (5,3,2,5,1)
  (same comment as for building, multi-storey)

## Sampling procedure
Data based on a literature, expert information and enquiry of seed processing plants.

## Extrapolations
Extrapolated from 'pea seed production, for sowing'.
