# debarking, hardwood, meranti

Dataset: EcoSpold 2, unit process
Geography: MY
Time period: 2000-01-01 to 2023-12-31
Technology level: current
Classification: ISIC rev.4 ecoinvent: 0220:Logging
Synonyms: Lauan; Seraya; Shorea ssp.
Tags: Swiss brush-up completed
Scenario: Business-as-Usual
System model: Allocation, cut-off by classification
Generated by: Frank Werner
Published in: Althaus H.J. 2007
Database: ecoinvent
isCopyrightProtected: true
accessRestrictedTo: 1

## General comment
This dataset represents debarking of one m3 meranti wood from Malaysia . The meranti wood is produced by (close to) sustainable forest management in Malaysia.
No data on debarking is available and average European data for debarking pine in the forest is thus used is used, taking into account the modern equipment of the logging company. Mobile debarking is here assumed. It should be noted however, that Malaysia (and other Southeast-Asian countries) have built up considerable sawmilling and plywood processing facilities to process Meranti locally. Emissions from biomass burning are according to literature values.

## Included activities start
From debarking process of harvested meranti trees, at plantation site.

## Included activities end
This activity ends with the debarked meranti log at forest road. The dataset includes debarking and natural decomposition of the bark

## Geography
data for debarking in Malaysia is not available - instead, European processes are used, taking into account of the modern equipment used for harvesting.

## Technology
This dataset reflects a high technological standard for debarking. The transportation processes are average for transportation to Europe; transport distance however can vary. Site-specific debarking data are not available but takes place before shipping the logs to Europe, thus European data are used. The resulting bark is left to rot, which is not inventoried.
According to Collins et al. (2005), there is no consumption of diesel fuel and lubricating oil.
References:
Collins, M., K. Fisher, et al. (2005): Study and assessment of available information for a pilot project on a teak garden chair. European Commission - DG Environment, Brussels. http://ec.europa.eu/environment/ipp/pdf/teak_chair_final_report.pdf

## Reference product
- sawlog and veneer log, meranti, debarked, measured as solid wood: 1 m3; By-product classification allocatable product; CPC 3110: Wood, sawn or chipped lengthwise, sliced or peeled, of a thickness exceeding 6 mm; railway or tramway sleepers […]; HS2017 440341: Wood, tropical; as specified in Subheading Note 2 to this Chapter, dark red meranti, light red meranti and [...]
  production volume 0.0125597 m3; = 4*0.003139928
    This is a placeholder value that does not reflect real-world production volumes. This dataset does not currently require a real-world production volume to work in the database framework, and no actual data were collected yet. This has no negative effect on the results of the ecoinvent database. The placeholder value of this activity was scaled according to the nominal GDP of 2005 (source: United Nations, <http://data.un.org/Glossary.aspx?q=GDP+%28current+US%24%29>, accessed 20130726) to reflect an appropriate share of the global production volume, which is also a placeholder value.
  property heating value, net 7950.27 MJ
    LHV is calculated based on the Carbon content of the product. More details can be found on the respective documentation.The property is based on a value of 7.79MJ/kg
  property price 174.94 EUR2005
    Reference: FAOSTAT (accessed 20140112). The price is calculated by using data on total world import quantity (m3) and import value (1000 USD), year 2005. 15174881 m3 of Ind Rwd Wir (NC) Tropica was imported in the world in 2005. The import value was 3209966000 USD. The calculated price is thus (3209966000/15174881*0.8)=174.936586454945 Euro.
  properties: carbon allocation 296.4 kg, carbon content 0.494, carbon content, fossil 0, carbon content, non-fossil 0.494, dry mass 600 kg, water content 0.7, water in wet mass 420 kg, wet mass 1020 kg

## Inputs from technosphere
- sawlog and veneer log, meranti, measured as solid wood under bark: 1 m3; lognormal variance with pedigree 0.235, pedigree (5,5,5,5,5)
  Input of sawlog under bark for manuall debarking at forest road
  properties: UVEK_link_8 4417, UVEK_link_9 4558, carbon content, non-fossil 0.494, dry mass 600 kg, heating value, net 7950.27 MJ, water content 0.7, wet mass 1020 kg
  note on UVEK_link_8: This link has been introduced to model transport specifically for the SAM model; to be used only in special submissions in coordination with ecoinvent and the Swiss FOEN.
  note on carbon content, non-fossil: C content of dry mass is 0.494 kgC/kg dry wood (ecoinvent v2.2 report 21).

## Emissions to nature
- Carbon dioxide, non-fossil [air, unspecified]: 119.33 kg; lognormal variance with pedigree 0.235, pedigree (5,5,5,5,5)
  Calculated value from the share of bark after debarking, assuming 10% bark

## Sampling procedure
literature

## Extrapolations
see Technology
