# transport, passenger train

Dataset: EcoSpold 2, unit process
Geography: RoW
Time period: 2000-01-01 to 2023-12-31
Technology level: current
Classification: EcoSpold01Categories: transport systems/train
Classification: ISIC rev.4 ecoinvent: 4911:Passenger rail transport, interurban
Scenario: Business-as-Usual
System model: Allocation, cut-off by classification
Share of production covered: 1 %
Generated by: Michael Spielmann (obsolete)
Published in: Spielmann M. 2007
Database: ecoinvent
isCopyrightProtected: true
accessRestrictedTo: 1

## General comment
Based on "transport, passenger train, AT/BE/DE/FR/IT, 2008". Inventory refers to the entire transport life cycle. For rail infrastructure, expenditures and environmental interventions due to construction of rail tracks have been allocated based on the Gross tonne kilometre performance. Expenditures due to operation of the rail infrastructure, as well as land use have been allocated based on the yearly train kilometre performance. This dataset is considered to represent global average values.

## Included activities start
The dataset starts when the infrastructure input (train and railway tracks) starts to be used for passenger transport.

## Included activities end
The module calls the modules 'operation of vehicle'; 'production, maintenance and disposal of vehicles'; 'construction and maintenance and disposal of railway tracks'.

## Geography
Extrapolated from "transport, passenger train, AT/BE/DE/FR/IT, 2008".

## Technology
For vehicle operation all technologies are included in the average data. Rail construction addresses conventional gravel track beddings. For the manufacturing of vehicles, the data reflects the currently dominating train type (IC2000) of Switzerland.

## Parameters
All rows: lognormal variance with pedigree 0.0166, pedigree (4,5,1,1,1)
- production volume country 01: 8.586e9 dimensionless; name PV_01_AT
  Literature value. The "transport, passenger train, GLO" dataset is a weighted average (by volume) of 5 regional datasets; "transport, passenger train, AT" with production volume of 8.58E+09 pkm, "transport, passenger train, BE" with production volume of 9.15E+09 pkm, "transport, passenger train, DE" with production volume of 5.16E+10 pkm, "transport, passenger train, FR" with production volume of 3.56E+10 pkm and "transport, passenger train, IT" with production volume of 3.87E+10 pkm.
- production volume country 02: 9.15e9 dimensionless; name PV_02_BE
  (same comment as for production volume country 01)
- production volume country 03: 5.1668e10 dimensionless; name PV_03_DE
  (same comment as for production volume country 01)
- production volume country 04: 3.5606e10 dimensionless; name PV_04_FR
  (same comment as for production volume country 01)
- production volume country 05: 3.8768e10 dimensionless; name PV_05_IT
  (same comment as for production volume country 01)
- production volume sum: 1.43778e11 dimensionless; name PV_SUM_5_countries; = PV_01_AT+PV_02_BE+PV_03_DE+PV_04_FR+PV_05_IT
  (same comment as for production volume country 01)

## Reference product
- transport, passenger train: 1 person*km; By-product classification allocatable product; CPC 641: Local transport and sightseeing transportation services of passengers
  EcoSpold01Location=DE
  production volume 1.91633e12 person*km
    UIC statistical synopsis 2005 http://www.uic.org/IMG/xls/synth2005-2.xls (total minus high-speed and minus Swiss railroads that have subdivision in urban, regional and long-distance trains)
  property price 0.0208844 EUR2005
    Calculated based on inputs: The price of the product has been calculated as a sum of the values of the material and energy inputs for this product. This value is therefore a rough estimation. It may underestimate the real price since there are additional expenses when producing any product. These expences can include for example labour costs, treatment of waste materials and profit for the producer. Please consider carefully whether this level of data quality is acceptable for your application.
  properties: carbon allocation 0 kg, carbon content 0

## Inputs from technosphere
All rows: lognormal variance with pedigree 0.042, pedigree (1,1,5,5,1)
- diesel: 4.65222e-6, 0.00192857, 1.97736e-5, 1.37795e-14, 0.000195308, 1.36805e-5, 9.67719e-5 kg (7 suppliers, which the file names only by identifier); sum of these 0.00225875 kg; = ((0.0029687*PV_01_AT)+(0.0011075*PV_02_BE)+(0.0028255*PV_03_DE)+(0.0022409*PV_04_FR)+(0.0016343*PV_05_IT))/PV_SUM_5_countries
  Calculated value. The "transport, passenger train, GLO" dataset is a weighted average (by volume) of 5 regional datasets; "transport, passenger train, AT", "transport, passenger train, BE", "transport, passenger train, DE", "transport, passenger train, FR" and "transport, passenger train, IT". All the individual flows are weighted average (by production volume) of these 5 datasets.
  properties: carbon content, fossil 0.865, dry mass 1 kg, heating value, net 42.8 MJ, wet mass 1 kg
  note on carbon content, fossil: C-content of diesel is 86.5% (ecoinvent v2.2 report 6_IV, Tab 3.14)
- electricity, high voltage: 0.000150015, 2.63539e-5, 0.00019372, 1.66019e-5, 0.00014429, 0.000141836, 0.000164517, 0.00328741, 0.000110144, 0.0157058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 kWh (43 suppliers, which the file names only by identifier); sum of these 0.0801536 kWh; = ((0.1079*PV_01_AT)+(0.11287*PV_02_BE)+(0.08822*PV_03_DE)+(0.057264*PV_04_FR)+(0.076559*PV_05_IT))/PV_SUM_5_countries
  (same comment as for diesel)
- maintenance, train, passenger, long distance: 3.6601e-10 unit; = ((5.3472E-10*PV_01_AT)+(4.0624E-10*PV_02_BE)+(4.6473E-10*PV_03_DE)+(2.418E-10*PV_04_FR)+(3.0166E-10*PV_05_IT))/PV_SUM_5_countries
  (same comment as for diesel)
- railway track: 7.77901e-5 m*year; = ((0.00011808*PV_01_AT)+(0.00010354*PV_02_BE)+(8.4292E-05*PV_03_DE)+(6.9316E-05*PV_04_FR)+(6.1907E-05*PV_05_IT))/PV_SUM_5_countries
  Calculated value. The "transport, passenger train, GLO" dataset is a weighted average (by volume) of 5 regional datasets; "transport, passenger train, AT", "transport, passenger train, BE", "transport, passenger train, DE", "transport, passenger train, FR" and "transport, passenger train, IT". All the individual flows are weighted average (by production volume) of these 5 datasets.
  EcoSpold01Location=CH
- train, passenger, long-distance: 3.6601e-10 unit; = ((5.3472E-10*PV_01_AT)+(4.0624E-10*PV_02_BE)+(4.6473E-10*PV_03_DE)+(2.418E-10*PV_04_FR)+(3.0166E-10*PV_05_IT))/PV_SUM_5_countries
  EcoSpold01Location=CH
  Calculated value. The "transport, passenger train, GLO" dataset is a weighted average (by volume) of 5 regional datasets; "transport, passenger train, AT", "transport, passenger train, BE", "transport, passenger train, DE", "transport, passenger train, FR" and "transport, passenger train, IT". All the individual flows are weighted average (by production volume) of these 5 datasets.

## Emissions to nature
All rows: lognormal variance with pedigree 0.042, pedigree (1,1,5,5,1)
- Ammonia [air, unspecified]: 4.50416e-8 kg; = ((5.9199E-08*PV_01_AT)+(2.2085E-08*PV_02_BE)+(5.6343E-08*PV_03_DE)+(4.4685E-08*PV_04_FR)+(3.259E-08*PV_05_IT))/PV_SUM_5_countries
  (same comment as for diesel)
- Benzene [air, unspecified]: 2.25875e-7 kg; = ((2.9687E-07*PV_01_AT)+(1.1075E-07*PV_02_BE)+(2.8255E-07*PV_03_DE)+(2.2409E-07*PV_04_FR)+(1.6343E-07*PV_05_IT))/PV_SUM_5_countries
  (same comment as for diesel)
- Cadmium II [air, unspecified]: 2.25875e-11 kg; = ((2.9687E-11*PV_01_AT)+(1.1075E-11*PV_02_BE)+(2.8255E-11*PV_03_DE)+(2.2409E-11*PV_04_FR)+(1.6343E-11*PV_05_IT))/PV_SUM_5_countries
  (same comment as for diesel)
- Carbon dioxide, fossil [air, unspecified]: 0.00710661 kg; = ((0.0093403*PV_01_AT)+(0.0034846*PV_02_BE)+(0.0088897*PV_03_DE)+(0.0070504*PV_04_FR)+(0.005142*PV_05_IT))/PV_SUM_5_countries
  (same comment as for diesel)
- Carbon monoxide, fossil [air, unspecified]: 3.56998e-5 kg; = ((4.6921E-05*PV_01_AT)+(1.7505E-05*PV_02_BE)+(4.4657E-05*PV_03_DE)+(3.5417E-05*PV_04_FR)+(2.5831E-05*PV_05_IT))/PV_SUM_5_countries
  (same comment as for diesel)
- Chromium III [air, unspecified]: 1.13103e-10 kg; = ((1.4865E-10*PV_01_AT)+(5.5458E-11*PV_02_BE)+(1.4148E-10*PV_03_DE)+(1.1221E-10*PV_04_FR)+(8.1837E-11*PV_05_IT))/PV_SUM_5_countries
  (same comment as for diesel)
- Copper ion [air, unspecified]: 3.83689e-9 kg; = ((5.0429E-09*PV_01_AT)+(1.8813E-09*PV_02_BE)+(4.7996E-09*PV_03_DE)+(3.8065E-09*PV_04_FR)+(2.7762E-09*PV_05_IT))/PV_SUM_5_countries
  (same comment as for diesel)
- Dinitrogen monoxide [air, unspecified]: 2.25875e-7 kg; = ((2.9687E-07*PV_01_AT)+(1.1075E-07*PV_02_BE)+(2.8255E-07*PV_03_DE)+(2.2409E-07*PV_04_FR)+(1.6343E-07*PV_05_IT))/PV_SUM_5_countries
  (same comment as for diesel)
- Lead II [air, unspecified]: 2.48565e-13 kg; = ((3.2669E-13*PV_01_AT)+(1.2188E-13*PV_02_BE)+(3.1093E-13*PV_03_DE)+(2.466E-13*PV_04_FR)+(1.7985E-13*PV_05_IT))/PV_SUM_5_countries
  (same comment as for diesel)
- Mercury II [air, unspecified]: 4.50416e-14 kg; = ((5.9199E-14*PV_01_AT)+(2.2085E-14*PV_02_BE)+(5.6343E-14*PV_03_DE)+(4.4685E-14*PV_04_FR)+(3.259E-14*PV_05_IT))/PV_SUM_5_countries
  (same comment as for diesel)
- Methane, fossil [air, unspecified]: 2.93604e-7 kg; = ((3.8589E-07*PV_01_AT)+(1.4396E-07*PV_02_BE)+(3.6727E-07*PV_03_DE)+(2.9128E-07*PV_04_FR)+(2.1244E-07*PV_05_IT))/PV_SUM_5_countries
  (same comment as for diesel)
- NMVOC, non-methane volatile organic compounds [air, unspecified]: 1.14437e-5 kg; = ((1.5041E-05*PV_01_AT)+(5.6113E-06*PV_02_BE)+(1.4315E-05*PV_03_DE)+(1.1353E-05*PV_04_FR)+(8.2803E-06*PV_05_IT))/PV_SUM_5_countries
  (same comment as for diesel)
- Nickel II [air, unspecified]: 1.58149e-10 kg; = ((2.0785E-10*PV_01_AT)+(7.7544E-11*PV_02_BE)+(1.9783E-10*PV_03_DE)+(1.569E-10*PV_04_FR)+(1.1443E-10*PV_05_IT))/PV_SUM_5_countries
  (same comment as for diesel)
- Nitrogen oxides [air, unspecified]: 0.000124116 kg; = ((0.00016313*PV_01_AT)+(6.0857E-05*PV_02_BE)+(0.00015526*PV_03_DE)+(0.00012313*PV_04_FR)+(8.9804E-05*PV_05_IT))/PV_SUM_5_countries
  (same comment as for diesel)
- Particulate Matter, < 2.5 um [air, unspecified]: 2.89791e-6 kg; = ((3.8088E-06*PV_01_AT)+(1.4209E-06*PV_02_BE)+(3.625E-06*PV_03_DE)+(2.875E-06*PV_04_FR)+(2.0968E-06*PV_05_IT))/PV_SUM_5_countries
  (same comment as for diesel)
- Particulate Matter, > 10 um [air, unspecified]: 1.16766e-5 kg; = ((1.1715E-05*PV_01_AT)+(1.1614E-05*PV_02_BE)+(1.1707E-05*PV_03_DE)+(1.1676E-05*PV_04_FR)+(1.1643E-05*PV_05_IT))/PV_SUM_5_countries
  (same comment as for diesel)
- Particulate Matter, > 2.5 um and < 10um [air, unspecified]: 1.0669e-5 kg; = ((1.0706E-05*PV_01_AT)+(1.0608E-05*PV_02_BE)+(1.0699E-05*PV_03_DE)+(1.0668E-05*PV_04_FR)+(1.0636E-05*PV_05_IT))/PV_SUM_5_countries
  (same comment as for diesel)
- Selenium IV [air, unspecified]: 2.25875e-11 kg; = ((2.9687E-11*PV_01_AT)+(1.1075E-11*PV_02_BE)+(2.8255E-11*PV_03_DE)+(2.2409E-11*PV_04_FR)+(1.6343E-11*PV_05_IT))/PV_SUM_5_countries
  (same comment as for diesel)
- Sulfur dioxide [air, unspecified]: 1.35461e-6 kg; = ((1.7804E-06*PV_01_AT)+(6.6419E-07*PV_02_BE)+(1.6945E-06*PV_03_DE)+(1.3439E-06*PV_04_FR)+(9.8012E-07*PV_05_IT))/PV_SUM_5_countries
  (same comment as for diesel)
- Sulfur hexafluoride [air, unspecified]: 3.52676e-9 kg; = ((4.7477E-09*PV_01_AT)+(4.9662E-09*PV_02_BE)+(3.8817E-09*PV_03_DE)+(2.5196E-09*PV_04_FR)+(3.3686E-09*PV_05_IT))/PV_SUM_5_countries
  (same comment as for diesel)
- Toluene [air, unspecified]: 9.04163e-8 kg; = ((1.1884E-07*PV_01_AT)+(4.4334E-08*PV_02_BE)+(1.131E-07*PV_03_DE)+(8.9702E-08*PV_04_FR)+(6.5422E-08*PV_05_IT))/PV_SUM_5_countries
  (same comment as for diesel)
- Xylenes, unspecified [air, unspecified]: 9.04163e-8 kg; = ((1.1884E-07*PV_01_AT)+(4.4334E-08*PV_02_BE)+(1.131E-07*PV_03_DE)+(8.9702E-08*PV_04_FR)+(6.5422E-08*PV_05_IT))/PV_SUM_5_countries
  (same comment as for diesel)
- Zinc II [air, unspecified]: 2.25875e-9 kg; = ((2.9687E-09*PV_01_AT)+(1.1075E-09*PV_02_BE)+(2.8255E-09*PV_03_DE)+(2.2409E-09*PV_04_FR)+(1.6343E-09*PV_05_IT))/PV_SUM_5_countries
  (same comment as for diesel)
- Iron ion [soil, unspecified]: 2.8132e-5 kg; = ((2.8132E-05*PV_01_AT)+(2.8132E-05*PV_02_BE)+(2.8132E-05*PV_03_DE)+(2.8132E-05*PV_04_FR)+(2.8132E-05*PV_05_IT))/PV_SUM_5_countries
  (same comment as for diesel)

## Sampling procedure
International railway statistics

## Extrapolations
see Technology and Geography This dataset has been copied from an original dataset covering the geography AT, BE, DE, FR, IT. The uncertainty has been adjusted accordingly.

## Review by Christian Bauer 2010-02-07
passed
