# uranium hexafluoride production

Dataset: EcoSpold 2, unit process
Geography: RoW
Time period: 1982-01-01 to 2023-12-31
Technology level: current
Classification: ISIC rev.4 ecoinvent: 2011:Manufacture of basic chemicals
Classification: EcoSpold01Categories: nuclear power/production
Tags: ConvertedDataset
Scenario: Business-as-Usual
System model: Allocation, cut-off by classification
Generated by: Roberto Dones
Published in: Dones, R. 2007
Database: ecoinvent
isCopyrightProtected: true
accessRestrictedTo: 1

## General comment
Data are from old but accurate references. The wet process for converting yellowcake U3O8 to uraniumhexafloride UF6 is described. Data for the Sequoyah facility are used, although it has been shut down at the end of 1992, because the wet process is the mostly used worldwide and because of data availability. Particles have been assumed to be between 2.5 and 10 micrometer. Radioactive solid waste has been accurately accounted. Radioactive waste from decommissioning is taken from an old source, which does not differenciate between dry and wet process, and may not reflect current conditions. The non radioactive solid waste given from the used reference is interpreted as ashes, because most probably incineration occurs internally in the factory. However, the consideration of this waste species as “average incineration residue" should be understood as a guess done to cope with missing information on the specific composition.
[This dataset was already contained in the ecoinvent database version 2. It was not individually updated during the transfer to ecoinvent version 3. Life Cycle Impact Assessment results may still have changed, as they are affected by changes in the supply chain, i.e. in other datasets. This dataset was generated following the ecoinvent quality guidelines for version 2. It may have been subject to central changes described in the ecoinvent version 3 change report (http://www.ecoinvent.org/database/ecoinvent-version-3/reports-of-changes/), and the results of the central updates were reviewed extensively. The changes added e.g. consistent water flows and other information throughout the database. The documentation of this dataset can be found in the ecoinvent reports of version 2, which are still available via the ecoinvent website. The change report linked above covers all central changes that were made during the conversion process.]

## Included activities end
The module includes: input of yellowcake U3O8 from uranium milling; electricity and natural gas used for operation; chemicals for the wet process; water use; cement assumed to be used for conditioning of contaminated sludge; transport requirements of operation materials, industrial wastes, and contaminated waste from operation and decommissioning. Radioactive and non-radioactive emissions to air and to water from the operation are also included. The infrastructure requirements are accounted for, although construction and operation data partially refer to different plants rather than to one single unit.

## Geography
US data.

## Technology
Effluents correspond to operational characteristics in 1980s.

## Parameters
- fraction, cooling water, cooling pond system, to air: 0.032 dimensionless; name fraction_CW_CP_to_air; lognormal variance with pedigree 0.0413, pedigree (2,3,1,3,1)
  Calculated based on literature value (Scown, C.D., 2011, Water Footprint of U.S. Transportation Fuels and supplying information of the article) (Vionnet, S., Quantis Water Database - Technical Report, 2012).
- fraction, cooling water, once-through system, to air: 0.004 dimensionless; name fraction_CW_OT_to_air; lognormal variance with pedigree 0.0413, pedigree (2,3,1,3,1)
  (same comment as for fraction, cooling water, cooling pond system, to air)
- fraction, cooling water, recirculating system, to air: 0.771 dimensionless; name fraction_CW_R_to_air; lognormal variance with pedigree 0.0413, pedigree (2,3,1,3,1)
  (same comment as for fraction, cooling water, cooling pond system, to air)
- fraction, cooling water, to air: 0.3875 dimensionless; name fraction_CW_to_air; = (0.5*fraction_CW_OT_to_air)+(0.5*fraction_CW_R_to_air); lognormal variance with pedigree 0.092025, pedigree (4,4,3,2,4)
  Calculated value based on literature value (see comments of the other parametres present in this dataset) and expert opinion. In the case when no industry/literature data are available about the type of cooling or directly fraction, cooling water, to air specific for the process a default assumption is applied. It is assumed that the once-through cooling system is used in 50% of all cases and recirculating system is used in another 50% of all cases.
- fraction, water, decarbonised, to air: 0.3875 dimensionless; name fraction_WDC_to_air; lognormal variance with pedigree 0.092025, pedigree (4,4,3,2,4)

## Reference product
- uranium hexafluoride: 1 kg; By-product classification allocatable product; CPC 33620: Uranium enriched in U235 and its compounds; plutonium and its compounds; alloys, dispersions, ceramic products[…]; HS2017 284410: Uranium; natural uranium and its compounds, alloys, dispersions (including cermets), ceramic products and m[...]; CAS 7783-81-5
  EcoSpold01Location=US
  production volume 4.73078e7 kg
    1.48 kg UF6 per kg U in global mine production (http://www.world-nuclear.org/info/inf23.html), after an assumed 5% loss in yellowcake production
  property price 22.9 EUR2005
    Using price 2005 of "Short, Medium, and Long-Term Contracts (Weighted-Average Price)" in http://www.eia.gov/cneaf/nuclear/umar/summarytable1.html and including price increase.
  properties: carbon allocation 0 kg, carbon content 0, carbon content, fossil 0, carbon content, non-fossil 0, dry mass 1 kg, water content 0, water in wet mass 0 kg, wet mass 1 kg

## Inputs from technosphere
- ammonia, anhydrous, liquid: 0.00819401, 0.0352024, 0.0159062, 0.17631, 0.00745275, 0.00166715, 0.00526694 kg (7 suppliers, which the file names only by identifier); sum of these 0.25 kg; lognormal variance with pedigree 0.082, pedigree (1,1,5,5,1)
  EcoSpold01Location=RER
  own estimation
  properties: dry mass 1 kg, wet mass 1 kg
- average incineration residue: -8.18164e-6, -0.169992 kg (2 suppliers, which the file names only by identifier); sum of these -0.17 kg; lognormal variance with pedigree 0.012, pedigree (1,1,1,5,1)
  EcoSpold01Location=CH
  from interval of available data
  production volume
    Calculated from the production volume of uranium hexafluoride in proportion to the respective output amounts.
  properties: carbon content, fossil 0.0325466, carbon content, non-fossil 0.0511208, dry mass 1 kg, wet mass 1 kg
  note on carbon content, fossil: Tab A.1, ecoinvent v2.2 report 13_I. It is considered that 61.1% of the C has a biogenic origin
- cement, unspecified: 0.000973178, 0.0410455, 0.000460928, 0.0108713, 0.0677491, 0.00212657, 0.00155442, 0.000842454, 0.00167438, 0.00255983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 kg (11 suppliers, which the file names only by identifier); sum of these 0.81 kg; lognormal variance with pedigree 0.162, pedigree (1,1,5,5,1)
  EcoSpold01Location=CH
  own estimation
  properties: dry mass 1 kg, wet mass 1 kg
- chemical, inorganic: 0.052 kg; lognormal variance with pedigree 0.082, pedigree (1,1,5,5,1)
  EcoSpold01Location=GLO
  own estimation
  properties: carbon content, fossil 0.003, dry mass 1 kg, wet mass 1 kg
  note on carbon content, fossil: This dataset is an unweighted average of 20 inorganic substances (listed in Tab 88.1, ecoinvent v2.2 report 8, part II), being part of the top100 chemicals included in this database. The C-content has also been calculated as an unweighted average of the C content of the substances composing this dataset.
- chemical, organic: 0.03 kg; lognormal variance with pedigree 0.082, pedigree (1,1,5,5,1)
  EcoSpold01Location=GLO
  own estimation
  properties: carbon content, fossil 0.628, dry mass 1 kg, heating value, net 19.03 MJ, wet mass 1 kg
  note on carbon content, fossil: This dataset is an unweighted average of 20 organic substances (listed in Tab 88.1, ecoinvent v2.2 report 8, part II), being part of the top100 chemicals included in this database. The C-content has also been calculated as an unweighted average of the C content of the substances composing this dataset.
- electricity, medium voltage: 0.0178629, 0.00158875, 0.138522, 0.18152, 0.19223, 0.0979126, 0.0135232, 0.0855919, 0.00361305, 0.578467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 kWh (47 suppliers, which the file names only by identifier); sum of these 10.3 kWh; lognormal variance with pedigree 0.162, pedigree (1,1,5,5,1)
  own estimation
  EcoSpold01Location=UCTE
- heat, district or industrial, natural gas: 665 MJ; lognormal variance with pedigree 0.162, pedigree (1,1,5,5,1)
  own estimation
  EcoSpold01Location=RER
  properties: heating value, net 1 MJ
- hydrogen fluoride: 0.149984, 0.440016 kg (2 suppliers, which the file names only by identifier); sum of these 0.59 kg; lognormal variance with pedigree 0.082, pedigree (1,1,5,5,1)
  EcoSpold01Location=GLO
  own estimation
  properties: dry mass 1 kg, heating value, net 6.06 MJ, wet mass 1 kg
- low level radioactive waste: -0.00061 m3; lognormal variance with pedigree 0.042, pedigree (1,1,1,5,1)
  own estimation
  EcoSpold01Location=CH
  production volume
    (same comment as for average incineration residue)
  properties: dry mass 2500 kg, wet mass 2500 kg
- nitric acid, without water, in 50% solution state: 0.0311942, 0.115263, 0.0500768, 0.0552281, 0.0461782, 0.405813, 0.0463498, 0.149896 kg (8 suppliers, which the file names only by identifier); sum of these 0.9 kg; lognormal variance with pedigree 0.082, pedigree (1,1,5,5,1)
  EcoSpold01Location=RER
  own estimation
  properties: dry mass 1 kg, wet mass 1 kg
- quicklime, milled, loose: 0.495856, 0.00414394 kg (2 suppliers, which the file names only by identifier); sum of these 0.5 kg; lognormal variance with pedigree 0.082, pedigree (1,1,5,5,1)
  own estimation
  EcoSpold01Location=CH
  properties: dry mass 0.99 kg, water content 0.010101, wet mass 1 kg
- uranium conversion facility: 3.13e-9 unit; lognormal variance with pedigree 0.052, pedigree (1,1,5,5,1)
  own estimation
  EcoSpold01Location=US
- uranium, in yellowcake: 1 kg; lognormal variance with pedigree 0.042, pedigree (1,1,5,5,1)
  EcoSpold01Location=RNA
  range of data
  properties: dry mass 1 kg, wet mass 1 kg
- water, decarbonised: 0.0274609, 22.5524, 16.8758, 279.727, 28.6681, 43.9108, 1.58265, 43.2475, 2.15574, 8.71849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 kg (11 suppliers, which the file names only by identifier); sum of these 500 kg; lognormal variance with pedigree 0.082, pedigree (1,1,5,5,1)
  own estimation
  EcoSpold01Location=RER
  properties: wet mass 1 kg

## Emissions to nature
- Carbon monoxide, fossil [air, non-urban air or from high stacks]: 0.00069 kg; lognormal variance with pedigree 0.052, pedigree (1,1,5,5,1)
  own estimation
- Hexane [air, non-urban air or from high stacks]: 0.019 kg
- Hydrogen fluoride [air, non-urban air or from high stacks]: 0.00027 kg; lognormal variance with pedigree 0.052, pedigree (1,1,5,5,1)
  own estimation
- NMVOC, non-methane volatile organic compounds [air, non-urban air or from high stacks]: 0.00012 kg; lognormal variance with pedigree 0.052, pedigree (1,1,5,5,1)
  own estimation
- Nitrogen oxides [air, non-urban air or from high stacks]: 0.025 kg; lognormal variance with pedigree 0.052, pedigree (1,1,5,5,1)
  own estimation
- Particulate Matter, > 2.5 um and < 10um [air, non-urban air or from high stacks]: 0.00073 kg; lognormal variance with pedigree 0.072, pedigree (1,1,5,5,1)
  own estimation
- Protactinium-234 [air, non-urban air or from high stacks]: 0.27 kBq; lognormal variance with pedigree 0.342, pedigree (1,1,5,5,1)
  own estimation, uncertainty on radioactivity releases
- Radium-226 [air, non-urban air or from high stacks]: 3.7e-5 kBq; lognormal variance with pedigree 0.342, pedigree (1,1,5,5,1)
  own estimation, uncertainty on radioactivity releases
- Sulfur dioxide [air, non-urban air or from high stacks]: 0.0055 kg; lognormal variance with pedigree 0.052, pedigree (1,1,5,5,1)
  own estimation
- Thorium-230 [air, non-urban air or from high stacks]: 0.00022 kBq; lognormal variance with pedigree 0.692, pedigree (1,1,5,5,1)
  based on ranges from North American literature
- Thorium-234 [air, non-urban air or from high stacks]: 0.27 kBq; lognormal variance with pedigree 0.342, pedigree (1,1,5,5,1)
  based on ranges from North American literature
- Uranium-234 [air, non-urban air or from high stacks]: 0.25 kBq; lognormal variance with pedigree 0.342, pedigree (1,1,5,5,1)
  based on ranges from North American literature
- Uranium-235 [air, non-urban air or from high stacks]: 0.013 kBq; lognormal variance with pedigree 0.342, pedigree (1,1,5,5,1)
  based on ranges from North American literature
- Uranium-238 [air, non-urban air or from high stacks]: 0.27 kBq; lognormal variance with pedigree 0.342, pedigree (1,1,5,5,1)
  based on ranges from North American literature
- Water [air, unspecified]: 0.19375 m3; name water_to_air_unspecified; lognormal variance with pedigree 0.0827, pedigree (2,2,5,5,1)
  Calculated value based on literature values and expert opinion. See comments in the parametres' comment field.
  property fraction, origin: fresh water 1; name fraction_origin_fresh_water
  property fraction, origin: salt water 0; name fraction_origin_salt_water
  property fraction, origin: unspecified 0; name fraction_origin_unspecified
- Aluminium III [water, surface water]: 6.9e-5 kg; lognormal variance with pedigree 0.052, pedigree (1,1,5,5,1)
  own estimation
- Ammonium [water, surface water]: 0.00017 kg; lognormal variance with pedigree 0.052, pedigree (1,1,5,5,1)
  own estimation
- BOD5, Biological Oxygen Demand [water, surface water]: 0.00035 kg; lognormal variance with pedigree 0.052, pedigree (1,1,5,5,1)
  own estimation
- Barium II [water, surface water]: 2.2e-5 kg; lognormal variance with pedigree 0.052, pedigree (1,1,5,5,1)
  own estimation
- COD, Chemical Oxygen Demand [water, surface water]: 0.0017 kg; lognormal variance with pedigree 0.052, pedigree (1,1,5,5,1)
  own estimation
- Cadmium II [water, surface water]: 1.7e-6 kg; lognormal variance with pedigree 0.052, pedigree (1,1,5,5,1)
  own estimation
- Calcium II [water, surface water]: 0.0083 kg; lognormal variance with pedigree 0.052, pedigree (1,1,5,5,1)
  own estimation
- Chloride [water, surface water]: 0.0087 kg; lognormal variance with pedigree 0.052, pedigree (1,1,5,5,1)
  own estimation
- Chromium III [water, surface water]: 1e-5 kg; lognormal variance with pedigree 0.052, pedigree (1,1,5,5,1)
  own estimation
- Copper ion [water, surface water]: 1.6e-5 kg; lognormal variance with pedigree 0.052, pedigree (1,1,5,5,1)
  own estimation
- DOC, Dissolved Organic Carbon [water, surface water]: 0.00017 kg; lognormal variance with pedigree 0.052, pedigree (1,1,5,5,1)
  Calculated as equal to TOC.
- Fluoride [water, surface water]: 0.00027 kg; lognormal variance with pedigree 0.052, pedigree (1,1,5,5,1)
  own estimation
- Iron ion [water, surface water]: 0.00017 kg; lognormal variance with pedigree 0.052, pedigree (1,1,5,5,1)
  own estimation
- Lead II [water, surface water]: 1.7e-6 kg; lognormal variance with pedigree 0.052, pedigree (1,1,5,5,1)
  own estimation
- Magnesium [water, surface water]: 0.00035 kg; lognormal variance with pedigree 0.052, pedigree (1,1,5,5,1)
  own estimation
- Manganese II [water, surface water]: 0.00022 kg; lognormal variance with pedigree 0.052, pedigree (1,1,5,5,1)
  own estimation
- Mercury II [water, surface water]: 1.7e-7 kg; lognormal variance with pedigree 0.052, pedigree (1,1,5,5,1)
  own estimation
- Nitrate [water, surface water]: 0.00061 kg; lognormal variance with pedigree 0.052, pedigree (1,1,5,5,1)
  own estimation
- Phosphate [water, surface water]: 5.2e-5 kg; lognormal variance with pedigree 0.052, pedigree (1,1,5,5,1)
  own estimation
- Potassium I [water, surface water]: 0.00017 kg; lognormal variance with pedigree 0.052, pedigree (1,1,5,5,1)
  own estimation
- Protactinium-234 [water, surface water]: 5 kBq; lognormal variance with pedigree 0.342, pedigree (1,1,5,5,1)
  own estimation, uncertainty on radioactivity releases
- Radium-226 [water, surface water]: 0.0014 kBq; lognormal variance with pedigree 0.252, pedigree (1,1,5,5,1)
  based on ranges from North American literature
- Sodium I [water, surface water]: 0.0061 kg; lognormal variance with pedigree 0.052, pedigree (1,1,5,5,1)
  own estimation
- Sulfate [water, surface water]: 0.0028 kg; lognormal variance with pedigree 0.052, pedigree (1,1,5,5,1)
  own estimation
- Sulfide [water, surface water]: 1.7e-5 kg; lognormal variance with pedigree 0.052, pedigree (1,1,5,5,1)
  own estimation
- Suspended solids, unspecified [water, surface water]: 0.0035 kg; lognormal variance with pedigree 0.052, pedigree (1,1,5,5,1)
  own estimation
- TOC, Total Organic Carbon [water, surface water]: 0.00017 kg; lognormal variance with pedigree 0.052, pedigree (1,1,5,5,1)
  own estimation
- Thorium-230 [water, surface water]: 0.0012 kBq; lognormal variance with pedigree 0.342, pedigree (1,1,5,5,1)
  own estimation, uncertainty on radioactivity releases
- Thorium-234 [water, surface water]: 5 kBq; lognormal variance with pedigree 0.342, pedigree (1,1,5,5,1)
  own estimation, uncertainty on radioactivity releases
- Tin ion [water, surface water]: 6.9e-6 kg; lognormal variance with pedigree 0.052, pedigree (1,1,5,5,1)
  own estimation
- Titanium ion [water, surface water]: 1.7e-6 kg; lognormal variance with pedigree 0.052, pedigree (1,1,5,5,1)
  own estimation
- Uranium-234 [water, surface water]: 5.4 kBq; lognormal variance with pedigree 0.692, pedigree (1,1,5,5,1)
  based on ranges from North American literature
- Uranium-235 [water, surface water]: 0.2 kBq; lognormal variance with pedigree 0.692, pedigree (1,1,5,5,1)
  based on ranges from North American literature
- Uranium-238 [water, surface water]: 5.4 kBq; lognormal variance with pedigree 0.692, pedigree (1,1,5,5,1)
  based on ranges from North American literature
- Water [water, unspecified]: 0.30625 m3; name water_to_water_unspecified; lognormal variance with pedigree 0.0827, pedigree (2,2,5,5,1)
  (same comment as for Water)
  property carbon content, fossil 0; name C_content_fossil
  property carbon content, non-fossil 0; name C_content_non_fossil
  property dry mass 0 kg; name DM
  property fraction, origin: fresh water 1; name fraction_origin_fresh_water_Ww
  property fraction, origin: salt water 0; name fraction_origin_salt_water_Ww
  property fraction, origin: unspecified 0; name fraction_origin_unspecified_Ww
  property water in wet mass 1000 kg; name WWM
  property wet mass 1000 kg; name WM
- Zinc II [water, surface water]: 6.9e-6 kg; lognormal variance with pedigree 0.052, pedigree (1,1,5,5,1)
  own estimation

## Sampling procedure
Literature

## Extrapolations
none This dataset has been copied from an original dataset covering the geography US. The uncertainty has been adjusted accordingly.

## Review by Roberto Dones 2003-08-19
passed
for final calculation August 2003
