# heat and power co-generation unit construction, 1MWel, 6.4 MWth

Dataset: EcoSpold 2, unit process
Geography: RoW
Time period: 2016-01-01 to 2023-12-31
Technology level: current
Classification: ISIC rev.4 ecoinvent: 4220:Construction of utility projects
Classification: EcoSpold01Categories: natural gas/cogeneration
Scenario: Business-as-Usual
System model: Allocation, cut-off by classification
Generated by: Karin Treyer
Published in: S Hirchberg, S Wiemer, P Burgherr 2015
Database: ecoinvent
isCopyrightProtected: true
accessRestrictedTo: 1

## General comment
This activity represents the construction and deconstruction of a heat and power cogeneration unit working on an Organic Rankine Cycle with a capacity of 1MWel and 6.4 MWth. The dataset was created for modelling power production in a deep geothermal power plant.
Detailed information on this dataset is presented in the book 'Energy from the Earth. 2015. Hirschberg, Wiemer, Burgherr (eds.) (see field 'Data Generator and Publication').

## Included activities start
Starting from the materials and land available for the construction of the building and the machines

## Included activities end
Ends with decommissioning of the plant.

## Reference product
- solvent, organic: 1 kg; name BP_amount_1; = benzene; By-product classification allocatable product; CPC 341: Basic organic chemicals; HS2017 29: Organic chemicals
  production volume 2190.79 kg; = RP_PV_1 * (BP_amount_1 / RP_amount_1)
    Calculated from production volume of reference product using the relative outputs.
  property heating value, net 19.11 MJ
    LHV is calculated based on the Carbon content of the product. More details can be found on the respective documentation.
  property price 1.36 EUR2005
    Calculated based on literature value (UN Commodity Trade Statistics Database) using data on trade value and net weight (kg). UN classification: 3814 Organic composite solvents, paint, varnish remover et. Using exchange rate of 1EURO = 1.209 USD.
  properties: allocation factor 0.00944947, carbon allocation 0.63072 kg, carbon content 0.63072, carbon content, fossil 0.63072, carbon content, non-fossil 0, dry mass 1 kg, true value 592.96, water content 0, water in wet mass 0 kg, wet mass 1 kg

## Inputs from technosphere
- aluminium, cast alloy: 0.00693539 kg; name aluminium; lognormal variance with pedigree 0.093, pedigree (4,4,5,5,4)
  Literature value. The inventory for the heat and power cogenerating unit is basically taken from Bauer 2007, with some extrapolations.
  Bauer, C. (2007) Holzenergie. In: Dones, R. (Ed.) et al., Sachbilanzen von Energiesystemen: Grundlagen für den ökologischen Vergleich von Energiesystemen und den Einbezug von Energiesystemen in Ökobilanzen für die Schweiz. Final report ecoinvent No. 6-IX, Paul Scherrer Institut Villigen, Swiss Centre for Life Cycle Inventories, Dübendorf, CH.
  properties: dry mass 1 kg, wet mass 1 kg
- benzene: 0.00944947 kg; lognormal variance with pedigree 0.093, pedigree (4,4,5,5,4)
  Calculated from an input of 300kg Perfluoropentane (Density 1.664g/ml) and a desnity of 0.874g/ml for Benzene.
  Rogge, S. (2004). Geothermische Stromerzeugung in Deutschland. Ökonomie, Ökologie und Potenziale. Technical University Berlin, Germany.
  properties: carbon content, fossil 0.923077, dry mass 1 kg, heating value, net 42.5 MJ, wet mass 1 kg
- building, hall: 0.00541828 m2; lognormal variance with pedigree 0.093, pedigree (4,4,5,5,4)
  (same comment as for aluminium, cast alloy)
- concrete, normal strength: 3.56695e-6, 7.83285e-7, 5.09484e-7, 6.80325e-7, 1.5105e-5, 6.34125e-6, 7.51723e-6, 0.00026892 m3 (8 suppliers, which the file names only by identifier); sum of these 0.000303423 m3; lognormal variance with pedigree 0.093, pedigree (4,4,5,5,4)
  Literature value. The inventory for the heat and power cogenerating unit is basically taken from Bauer 2007, with some extrapolations.
  Bauer, C. (2007) Holzenergie. In: Dones, R. (Ed.) et al., Sachbilanzen von Energiesystemen: Grundlagen für den ökologischen Vergleich von Energiesystemen und den Einbezug von Energiesystemen in Ökobilanzen für die Schweiz. Final report ecoinvent No. 6-IX, Paul Scherrer Institut Villigen, Swiss Centre for Life Cycle Inventories, Dübendorf, CH.
  The original value of 34'000kg concrete for the foundation was divided by a density of 2380 kg/m3.
  properties: dry mass 2190 kg, water content 0.086758, wet mass 2380 kg
- copper, cathode: 0.00693539 kg; name copper; lognormal variance with pedigree 0.093, pedigree (4,4,5,5,4)
  (same comment as for aluminium, cast alloy)
  properties: dry mass 1 kg, wet mass 1 kg
- electricity, medium voltage: 0.00145298, 0.0289836, 0.00973841, 0.000444951, 8.90565e-5, 1.91224e-5, 0.00202384, 0.00299301, 0.00627045 kWh (9 suppliers, which the file names only by identifier); sum of these 0.0520154 kWh; lognormal variance with pedigree 0.093, pedigree (4,4,5,5,4)
  (same comment as for aluminium, cast alloy)
- heat, central or small-scale, other than natural gas: 8.80945e-5, 0.00641384 MJ (2 suppliers, which the file names only by identifier); sum of these 0.00650193 MJ; lognormal variance with pedigree 0.093, pedigree (4,4,5,5,4)
  (same comment as for aluminium, cast alloy)
  properties: heating value, net 1 MJ
- polyethylene, high density, granulate: 0.00736885 kg; name polyethylene; lognormal variance with pedigree 0.093, pedigree (4,4,5,5,4)
  (same comment as for aluminium, cast alloy)
  properties: carbon content, fossil 0.857143, dry mass 1 kg, heating value, net 42.47 MJ, wet mass 1 kg
  note on carbon content, fossil: Polyethylene is formed out of a huge amount of ethylene monomers (C2H4) (ecoinvent v2.2 report 11_II). MW=28 g/mol
- scrap aluminium: -0.0047022, -0.0022332 kg (2 suppliers, which the file names only by identifier); sum of these -0.00693539 kg; = aluminium
  production volume; = RP_PV_1 * (BP_amount_4 / RP_amount_1)
    Calculated from production volume of reference product using the relative outputs.
  properties: dry mass 1 kg, wet mass 1 kg
- scrap copper: -0.0047022, -0.0022332 kg (2 suppliers, which the file names only by identifier); sum of these -0.00693539 kg; = copper
  production volume; = RP_PV_1 * (BP_amount_2 / RP_amount_1)
    Calculated from production volume of reference product using the relative outputs.
  properties: dry mass 1 kg, wet mass 1 kg
- scrap steel: -0.578657, -0.276563 kg (2 suppliers, which the file names only by identifier); sum of these -0.855221 kg; = chromium_steel+steel
  production volume; = RP_PV_1 * (BP_amount_3 / RP_amount_1)
    Calculated from production volume of reference product using the relative outputs.
  properties: dry mass 1 kg, wet mass 1 kg
- sheet rolling, aluminium: 0.00693539 kg; = aluminium
- sheet rolling, chromium steel: 0.00996963 kg; = chromium_steel
- sheet rolling, steel: 0.845251 kg; = steel
- steel, chromium steel 18/8: 0.00996963 kg; name chromium_steel; lognormal variance with pedigree 0.093, pedigree (4,4,5,5,4)
  (same comment as for aluminium, cast alloy)
  properties: carbon content, fossil 0.0008, dry mass 1 kg, wet mass 1 kg
  note on carbon content, fossil: Stainless steel model is the grade 304 steel (18/8 stainless, 18% chromium 8% nickel; max. 0.08% C)
- steel, low-alloyed: 0.845251 kg; name steel; lognormal variance with pedigree 0.093, pedigree (4,4,5,5,4)
  Literature value/estimation. The amount of steel mass is estimated based on a 1MW plant in Rogge (2004). Weights of the different ORC components: Evaporator (11t), boiler (4t), turbine (3t), generator (4t), pump for working fluid (1t), condenser of the organic circulating fluid (16t).
  Rogge, S. (2004). Geothermische Stromerzeugung in Deutschland. Ökonomie, Ökologie und Potenziale. Technical University Berlin, Germany.
  properties: carbon content, fossil 0.005, dry mass 1 kg, wet mass 1 kg
- stone wool: 0.00195058 kg; name rock_wool; lognormal variance with pedigree 0.093, pedigree (4,4,5,5,4)
  (same comment as for aluminium, cast alloy)
  properties: carbon content, fossil 0.015401, dry mass 1 kg, wet mass 1 kg
  note on carbon content, fossil: The chemical composition of the glass fibres used in the rock wool production is similar to the composition of naturally cooled volcano basalt and has a composition listed in Tab. 3.1 and 3.2 in ecoinvent v2.2 report 16, part XIV. Rock wool contains: a minimum of 96% mineral fibres,between 0.5 and 3.0 weight percent of phenolic resin depending on the specific product characteristics, and about 0.2 percent mineral oil (ecoinvent v2.2 report 16, part XIV). An average composition of 1.8% phenolic resin, 0.2% mineral oil, and 98% mineral fibres has been assumed and used to calculate C content of the rock wool
- waste concrete: -2.07372e-5, -0.000282686 kg (2 suppliers, which the file names only by identifier); sum of these -0.000303423 kg; = concrete
  production volume; = RP_PV_1 * (BP_amount_6 / RP_amount_1)
    Calculated from production volume of reference product using the relative outputs.
  properties: dry mass 0.5 kg, water content 1, wet mass 1 kg
- waste mineral wool: -0.000567261, -0.00138332 kg (2 suppliers, which the file names only by identifier); sum of these -0.00195058 kg; = rock_wool
  production volume; = RP_PV_1 * (BP_amount_5 / RP_amount_1)
    Calculated from production volume of reference product using the relative outputs.
  properties: dry mass 1 kg, wet mass 1 kg
- waste polyethylene/polypropylene product: -0.00208446, -0.00528439 kg (2 suppliers, which the file names only by identifier); sum of these -0.00736885 kg; = polyethylene
  production volume; = RP_PV_1 * (BP_amount_7 / RP_amount_1)
    Calculated from production volume of reference product using the relative outputs.
  properties: carbon content, fossil 0.748045, dry mass 0.847 kg, heating value, net 42.47 MJ, water content 0.180638, wet mass 1 kg
  note on carbon content, fossil: Mixed various plastics was used to estimate the C content of this waste (Tab A.2, ecoinvent v2.2 report 13_I)
- wire drawing, copper: 0.00693539 kg; = copper

## Sampling procedure
Extrapolated from literature

## Extrapolations
Copied from a dataset made for Switzerland.
