# coffee green bean production, arabica, not irrigated

Dataset: EcoSpold 2, unit process
Geography: BR-MG
Time period: 2020-01-01 to 2023-12-31
Technology level: current
Classification: ISIC rev.4 ecoinvent: 0127:Growing of beverage crops
Synonyms: coffee cultivation, coffee beans production, green coffee beans production
Tags: No
Scenario: Business-as-Usual
System model: Allocation, cut-off by classification
Generated by: Nilza Patricia Ramos
Published in: Folegatti Matsuura, M. 2017
Database: ecoinvent
isCopyrightProtected: true
accessRestrictedTo: 1

## General comment
The raw data collected in interviews were organized in electronic spreadsheets and checked for completeness and consistency. Agricultural inputs were detailed as to their composition and physical characteristics. Agricultural operations were characterized in terms type of fuel and specific consumption. Precipitation is enought to supply water to the crop, no extra water needed. Emissions from the agricultural process were estimated using the BRCalc/ICVCalc tool, developed by Embrapa Environment, which includes specific climate and soil databases for the 137 Brazilian agricultural mesoregions, in addition to databases of parameters related to agricultural crops, fertilisers and pesticides.
The main emission models adopted by BRCalc/ICVCalc (Folegatti-Matsuura et al., 2022) derive from the references: Nemecek et al. (2015), IPCC (2019), Nemecek & Kagi (2007), Folegatti-Matsuura & Picoli (2018). It was used the model BRLUC (Donke et al., 2020) to estimate the LUC emissions.

## Included activities start
This activity starts with reforming and cleaning of the area after the harvest of the previous crop

## Included activities end
The dataset includes the inputs of correctives, mineral fertilisers and pesticides and organic fertiliser. The dataset includes the agricultural operations and the amount of fuel consumed during operations and emissions related. The dataset also includes direct field emissions and land use change emissions, with important regionalizations added. The dataset doesn't include: seedlings production, drying, cleaning and storage of harvested grains. The activity ends after harvest at the farm gate.

## Allocation
Coffee is a perennial crop and is cultivated in dedicated areas, not requiring any allocation actions.

## Geography
The inventory is modelled for Brazil, Minas Gerais

## Technology
This dataset represents the production of 1 kg of green coffee beans (Arabic) in the Mogiana region in the state of Sao Paulo, which is composed of the coffee production region of Campinas and Ribeirão Preto. Planting, cultivation and harvest are mechanized activities. This system is not irrigated. The period of 20 years was adopted as the average life span of a coffee plantation, from the cleaning of the land to the last year of the coffee plantation in production, before a new cleaning. In this study, it was assumed that the phases of implantation and formation of the coffee plantation last one year and two years, respectively. For the formation phase, the data collected correspond to the average of two years. The full production phase lasts 18 years. Grain production data were “annualized” (ie calculated for the reference of 1 hectare of coffee per year). Therefore, the input flows (natural resources, agricultural inputs and energy) and outflows (emissions to air, water and soil) of the initial phases were divided by 20. The input flows of the full production phase correspond to the average of two consecutive agricultural years, considering the behavior of the coffee plantation of alternating years of higher and lower production in succession. Mineral fertiliser input is 1534 kg ammonium sulphate, 255 kg monoammonium phosphate/ha, 1026 kg potassium chloride/ha, 15 kg N (inorganic nitrogen fertiliser)/ha and 20 kg P2O5 (inorganic phosphorus fertiliser)/ha. Total active ingredients (a.i.) applied as pesticides amount to 5.9 kg a.i./ha. The cattle manure input is 250 kg/ha. The average productivity is 2220 kg/ha, at 10% moisture.
The amount of packing for fertilisers was calculated by adding the NPK inputs (elements and not commercial fertiliser) multiplying this total by two.
Agricultural operation was modelled based on the total diesel consumed to perform the operation and the emissions to air related to diesel burning.

## Time period
Time period of the most of the data collected for this dataset.

## Reference product
- coffee, green bean: 1 kg; By-product classification allocatable product; CPC 01610: Coffee, green; HS2017 090111: Coffee; not roasted or decaffeinated
  This dataset represents the production of 1 kg of green coffee beans (Arabic) in the Mogiana region in the state of Sao Paulo, which is composed of the coffee production region of Campinas and Ribeirão Preto. Planting, cultivation and harvest are mechanized activities. This system is not irrigated. The period of 20 years was adopted as the average life span of a coffee plantation, from the cleaning of the land to the last year of the coffee plantation in production, before a new cleaning. In this study, it was assumed that the phases of implantation and formation of the coffee plantation last one year and two years, respectively. For the formation phase, the data collected correspond to the average of two years. The full production phase lasts 18 years. Grain production data were “annualized” (ie calculated for the reference of 1 hectare of coffee per year). Therefore, the input flows (natural resources, agricultural inputs and energy) and outflows (emissions to air, water and soil) of the initial phases were divided by 20. The input flows of the full production phase correspond to the average of two consecutive agricultural years, considering the behavior of the coffee plantation of alternating years of higher and lower production in succession. Mineral fertiliser input is 1534 kg ammonium sulphate, 255 kg monoammonium phosphate/ha, 1026 kg potassium chloride/ha, 15 kg N (inorganic nitrogen fertiliser)/ha and 20 kg P2O5 (inorganic phosphorus fertiliser)/ha. Total active ingredients (a.i.) applied as pesticides amount to 5.9 kg a.i./ha. The cattle manure input is 250 kg/ha. The average productivity is 2220 kg/ha, at 10% moisture.
  production volume 3.64986e8 kg
    IBGE, 2020. Brazilian Institute of Geography and Statistic. Municipal Agricultural Production – PAM. Produção Agrícola Municipal [in Portuguese]. Available at: https://sidra.ibge.gov.br/home/ipp/brasil
  property price 1.6 EUR2005
    Calculated value based on data from United Nations Commodity Trade Statistics Database (comtrade.un.org). UN comtrade category: 90111 Coffee, not roasted, not decaffeinated. Year: 2005. Using exchange rate of 1EURO = 1.209 USD. Average of price of import into 5 main markets (EU, US, JP, IN and CN).
  properties: carbon allocation 0.444722 kg, carbon content 0.490083, carbon content, fossil 0, carbon content, non-fossil 0.490083, dry mass 0.907441 kg, water content 0.102, water in wet mass 0.092559 kg, wet mass 1 kg

## Inputs from technosphere
- ammonium nitrate: 0.112 kg; lognormal variance with pedigree 1.0709, pedigree (2,2,2,1,1)
  The amount of fertiliser was obtained from interviews with producers and experts. The nutrient content in the input was obtained from technical literature and technical regulation documents. The selection of the fertiliser from the ecoinvent database and its ammount was based on the commercial product.
  properties: dry mass 1 kg, wet mass 1 kg
- application of plant protection product, by field sprayer: 0.00193 ha; lognormal variance with pedigree 1.0709, pedigree (2,2,2,1,1)
  Refers to application of pesticides
- boric acid, anhydrous, powder: 0.00157 kg; lognormal variance with pedigree 1.0709, pedigree (2,2,2,1,1)
  No specific inventory was found in ecoinvent with chemical formula corresponding to a fertilizer with micronutients. It was necessary to adapt the amount of micronutrients to a processes (flows) available in this database, based on the molar masse of the micronutrients.
  properties: dry mass 1 kg, wet mass 1 kg
- combine harvesting: 0.000312 ha; lognormal variance with pedigree 1.0709, pedigree (2,2,2,1,1)
  Refers to harvesting of coffee grains
- copper oxide: 3.87e-5 kg; lognormal variance with pedigree 1.0709, pedigree (2,2,2,1,1)
  (same comment as for boric acid, anhydrous, powder)
  properties: dry mass 1 kg, wet mass 1 kg
- diesel, low-sulfur: 0.00959 kg; lognormal variance with pedigree 1.2403, pedigree (3,2,2,1,3)
  The amount of diesel fuel (B12 mix in Brazil) used in agricultural operations not found in ecoinvent
  properties: carbon content, fossil 0.865, dry mass 1 kg, heating value, net 42.8 MJ, wet mass 1 kg
- dolomite: 0.36 kg; lognormal variance with pedigree 1.0709, pedigree (2,2,2,1,1)
  The amount of soil corrective was obtained from interviews with producers and experts.
  properties: carbon content, fossil 0.130435, dry mass 1 kg, wet mass 1 kg
- electricity, low voltage: 0.00217 kWh; lognormal variance with pedigree 1.0709, pedigree (2,2,2,1,1)
  Electricity amount used in agricultural field
- fatty acid methyl ester: 0.00135 kg; lognormal variance with pedigree 1.2403, pedigree (3,2,2,1,3)
  The amount of biodiesel fuel (B12 mix in Brazil) used in agricultural operations not found in ecoinvent plus the fatty acids used as pesticide adjuvant
  properties: carbon content, fossil 0.041, carbon content, non-fossil 0.732, dry mass 1 kg, heating value, net 37.2 MJ, wet mass 1 kg
  note on heating value, net: Based on literature, report 17, page 439. Jungbluth, N., Chudacoff, M., Dauriat, A., Dinkel, F., Doka, G., Faist Emmenegger, M., Gnansounou, E., Kljun, N., Schleiss, K., Spielmann, M., Stettler, C., Sutter, J. 2007: Life Cycle Inventories of Bioenergy. ecoinvent report No. 17, Swiss Centre for Life Cycle Inventories, Dübendorf, CH.
- fertilising, by broadcaster: 0.0016 ha; lognormal variance with pedigree 1.0709, pedigree (2,2,2,1,1)
  Refers to application of fertilisers
- fruit tree seedling, for planting: 0.0774 unit; lognormal variance with pedigree 1.0902, pedigree (1,1,2,1,1)
  The amount of coffee seedlings used to start coffee production
  properties: carbon content, non-fossil 1, dry mass 0.03 kg, wet mass 0.03 kg
- glyphosate: 0.000649 kg; lognormal variance with pedigree 1.0709, pedigree (2,2,2,1,1)
  The amount of pesticide or adjuvant was obtained from interviews with producers and experts. Concentration of the active ingredient was obtained in the Material Safety Data Sheet. The amount of dilution water was 200 L/ha per application.
  properties: carbon content, fossil 0.214286, dry mass 1 kg, wet mass 1 kg
- gypsum, mineral: 0.358 kg; lognormal variance with pedigree 1.0709, pedigree (2,2,2,1,1)
  The amount of soil corrective was obtained from interviews with producers and experts.
  properties: dry mass 1 kg, wet mass 1 kg
- inorganic nitrogen fertiliser, as N: 0.0369 kg; lognormal variance with pedigree 1.0709, pedigree (2,2,2,1,1)
  (same comment as for ammonium nitrate)
  properties: dry mass 1 kg, wet mass 1 kg
- inorganic phosphorus fertiliser, as P2O5: 0.0103 kg; lognormal variance with pedigree 1.0709, pedigree (2,2,2,1,1)
  (same comment as for ammonium nitrate)
  properties: dry mass 1 kg, wet mass 1 kg
- iron sulfate: 6.07e-5 kg; lognormal variance with pedigree 1.0709, pedigree (2,2,2,1,1)
  (same comment as for boric acid, anhydrous, powder)
  properties: dry mass 1 kg, wet mass 1 kg
- land use change, perennial crop: 1.43e-5 ha; lognormal variance with pedigree 1.22882, pedigree (2,1,2,2,3)
  LUC modeling implemented in ecoinvent for Brazil is based on Donke et al. (2020). LUC amount was updated, based on yield and crop expansion rate from IBGE (2022). Reference years: average among 2017, 2018, 2019. Equation: (1/yield * % crop expansion). The yield is the average for the years 2017 to 2019. Expansion: difference of the average area of the years 2017 to 2019 (t1=t0+20) for the years 1998 to 2000 (t0), by the formula (1-(t0/t1)).
- limestone and gypsum application, by spreader: 0.000382 ha; lognormal variance with pedigree 1.0709, pedigree (2,2,2,1,1)
  Refers to application of soil correctives
- magnesium sulfate: 3.12e-6 kg; lognormal variance with pedigree 1.0709, pedigree (2,2,2,1,1)
  (same comment as for boric acid, anhydrous, powder)
  properties: dry mass 1 kg, wet mass 1 kg
- manganese sulfate: 0.000147 kg; lognormal variance with pedigree 1.0709, pedigree (2,2,2,1,1)
  (same comment as for boric acid, anhydrous, powder)
  property molecular weight 0 g/mol; name manganese_sulfate_output_MW
  properties: dry mass 1 kg, wet mass 1 kg
- monoammonium phosphate: 0.0262 kg; lognormal variance with pedigree 1.0709, pedigree (2,2,2,1,1)
  (same comment as for ammonium nitrate)
  properties: dry mass 1 kg, nitrogen content 0.084, phosphorus content 0.226939, wet mass 1 kg
  note on nitrogen content: Nitrogen content (on a dry matter basis) of monoammonium phosphate is calculated from the molecular formula of the nutrient present in the substance.
  note on phosphorus content: Phosphorus content (on a dry matter basis) of monoammonium phosphate is calculated from the molecular formula of the nutrient present in the substance.
- packaging, for fertilisers: 0.314 kg; lognormal variance with pedigree 1.6408, pedigree (4,3,2,5,4)
  The HDPE packaging was considered for macronutrient fertilisers. Soil correctives were not considered in the packaging calculation since these are transported in bulk. The amount of packaging for pesticides was also estimated. It was considered twice the value of the active ingredient of fertilisers and pesticides applied in the field to account for the packaging of the diluted products. The production and disposal of the packaging were included in this exchange.
  properties: carbon content, fossil 0.825301, dry mass 1 kg, price 0.0642 EUR2005, wet mass 1 kg
  note on carbon content, fossil: Considering a chemical formula (C2H4)n for polyethylene, carbon content-fossil is calculated to be 0.856286 kg of Carbon per kg of dry mass.
- packaging, for pesticides: 0.00428 kg; lognormal variance with pedigree 1.6408, pedigree (4,3,2,5,4)
  (same comment as for packaging, for fertilisers)
  properties: carbon content, fossil 0.85714, dry mass 1 kg, price 0.0642 EUR2005, wet mass 1 kg
- pesticide, unspecified: 0.00149 kg; lognormal variance with pedigree 1.0709, pedigree (2,2,2,1,1)
  The commercial pesticides not found in the ecoinvent database were summed up and added as “pesticide, unspecified”
  properties: carbon content, fossil 0.486978, dry mass 1 kg, wet mass 1 kg
- planting with starter fertiliser, by no till planter: 1.56e-5 ha; lognormal variance with pedigree 1.0709, pedigree (2,2,2,1,1)
  Refers to seedlings planting
- potassium chloride: 0.103 kg; lognormal variance with pedigree 1.0709, pedigree (2,2,2,1,1)
  (same comment as for ammonium nitrate)
  properties: dry mass 1 kg, wet mass 1 kg
- poultry manure, dried: 0.0701 kg; lognormal variance with pedigree 1.0709, pedigree (2,2,2,1,1)
  This fertiliser is a mixture of animal manure and coffee straw, in a 50:50 ratio.
  property cadmium content 2.92e-7; name Cd_content
  property copper content 4.38e-5; name Cu_content
  property dry mass 0.865 kg; name DM
  property lead content 2.92e-6; name Pb_content
  property mercury content 2e-7; name Hg_content
  property nickel content 4e-5; name Ni_content
  property nitrogen content 0.532; name N_content
  property phosphorus content 0.0167; name P_content
  property potassium content 0.024; name K_content
  property zinc content 0.000349; name Zn_content
  properties: carbon content, non-fossil 0.33389, water content 0.156069, wet mass 1 kg
  note on cadmium content: pg 36 Tab 7. Original values are given in kg/m3, but this is an error and it is mg/kg DM
- sulfur: 3.27e-5 kg; lognormal variance with pedigree 1.0709, pedigree (2,2,2,1,1)
  (same comment as for boric acid, anhydrous, powder)
  properties: dry mass 1 kg, wet mass 1 kg
- tillage, subsoiling, by subsoiler plow: 1.56e-5 ha; lognormal variance with pedigree 1.0709, pedigree (2,2,2,1,1)
  Refers to the operation of subsoiling, for preparing the field before the seedlings are planted
- zinc monosulfate: 0.000123 kg; lognormal variance with pedigree 1.0709, pedigree (2,2,2,1,1)
  (same comment as for boric acid, anhydrous, powder)
  properties: dry mass 1 kg, wet mass 1 kg

## Inputs from nature
- Carbon dioxide, in air [natural resource, in air]: 1.65 kg; lognormal variance with pedigree 1.0709, pedigree (2,2,2,1,1)
  Carbon dioxide (CO2) absorption from air during photosynthesis was also included, according to Nemecek and Schnetzer (2012). It considers the carbon content of the reference product based on the ecoinvent database (Jungbluth et al., 2007).
- Occupation, arable land, unspecified use [natural resource, land]: 3.11 m2*year; lognormal variance with pedigree 1.1122, pedigree (3,1,2,1,1)
  The land occupation was calculated based on crop yield
- Transformation, from permanent crop, non-irrigated, intensive [natural resource, land]: 0.156 m2; lognormal variance with pedigree 1.0608, pedigree (2,1,2,1,1)
  The LUC input comprises the actual data related to land transformation. This land transformation flow is irrelevant to LUC and the amounts are equal in both the 'land transformation from' and 'land transformation to'.
- Transformation, to permanent crop, non-irrigated, intensive [natural resource, land]: 0.156 m2; lognormal variance with pedigree 1.0608, pedigree (2,1,2,1,1)
  (same comment as for Transformation, from permanent crop, non-irrigated, intensive)
- Water, river [natural resource, in water]: 0.000942 m3; lognormal variance with pedigree 1.0608, pedigree (2,1,2,1,1)
  Water consumed for pesticide dilution. Estimated volume based on interviews with producers and experts

## Emissions to nature
- Ammonia [air, non-urban air or from high stacks]: 0.00339019 kg; lognormal variance with pedigree 1.11033, pedigree (3,2,2,2,3)
  Ammonia releases to air, according to the AGRAMMON model: 'Plant production' (Nemecek & Schnetzer, 2011)
- Benzene [air, non-urban air or from high stacks]: 7e-8 kg; lognormal variance with pedigree 1.2403, pedigree (3,2,2,1,3)
  Emissions derived from fuel combustion (diesel 88%, and biodiesel 12%), using emission factors from Nemecek & Kagi (2007)
- Benzo(a)pyrene [air, non-urban air or from high stacks]: 2.88e-10 kg; lognormal variance with pedigree 1.1203, pedigree (3,2,2,1,3)
  (same comment as for Benzene)
- Cadmium II [air, non-urban air or from high stacks]: 9.59e-11 kg; lognormal variance with pedigree 1.2403, pedigree (3,2,2,1,3)
  (same comment as for Benzene)
- Carbon dioxide, fossil [air, non-urban air or from high stacks]: 0.2019 kg; lognormal variance with pedigree 1.1189, pedigree (4,3,2,3,1)
  Carbon dioxide releases from urea and limestone application, according to IPCC (2006) plus emissions derived from fuel combustion (diesel 88%, and biodiesel 12%), using emission factors from Nemecek & Kagi (2007)
- Carbon dioxide, non-fossil [air, non-urban air or from high stacks]: 0.00374 kg; lognormal variance with pedigree 1.1289, pedigree (4,3,2,3,1)
  (same comment as for Benzene)
- Carbon monoxide, fossil [air, non-urban air or from high stacks]: 5.12e-5 kg; lognormal variance with pedigree 1.1203, pedigree (3,2,2,1,3)
  (same comment as for Benzene)
- Carbon monoxide, non-fossil [air, non-urban air or from high stacks]: 0.0524 kg; lognormal variance with pedigree 1.1089, pedigree (4,3,2,3,1)
  Emissions from burning plant residues during coffee area renovation, according to IPCC (2019)
- Chromium III [air, non-urban air or from high stacks]: 4.79e-10 kg; lognormal variance with pedigree 1.1203, pedigree (3,2,2,1,3)
  (same comment as for Benzene)
- Copper ion [air, non-urban air or from high stacks]: 1.63e-8 kg; lognormal variance with pedigree 1.1203, pedigree (3,2,2,1,3)
  (same comment as for Benzene)
- Dinitrogen monoxide [air, non-urban air or from high stacks]: 0.00297018 kg; lognormal variance with pedigree 1.2269, pedigree (4,3,2,3,3)
  Direct and indirect N2O emissions according to IPCC (2019) plus emissions derived from fuel combustion (diesel 88%, and biodiesel 12%), using emission factors from Nemecek & Kagi (2007) plus emissions from burning coffee husks and from burning plant residues during coffee area renovation according to IPCC (2019)
- Hydrocarbons, unspecified [air, non-urban air or from high stacks]: 2.88e-5 kg; lognormal variance with pedigree 1.1203, pedigree (3,2,2,1,3)
  (same comment as for Benzene)
- Methane, fossil [air, non-urban air or from high stacks]: 1.24e-6 kg; lognormal variance with pedigree 1.1203, pedigree (3,2,2,1,3)
  (same comment as for Benzene)
- Methane, non-fossil [air, non-urban air or from high stacks]: 0.00186051 kg; lognormal variance with pedigree 1.3369, pedigree (4,3,2,3,3)
  Emissions derived from fuel combustion (diesel 88%, and biodiesel 12%), using emission factors from Nemecek & Kagi (2007) plus emissions from burning coffee husks and from burning plant residues during coffee area renovation, according to IPCC (2019)
- Nickel II [air, non-urban air or from high stacks]: 6.71e-10 kg; lognormal variance with pedigree 1.1203, pedigree (3,2,2,1,3)
  (same comment as for Benzene)
- Nitrogen oxides [air, non-urban air or from high stacks]: 0.00446 kg; lognormal variance with pedigree 1.3369, pedigree (4,3,2,3,3)
  Emissions of NOx from applied mineral fertilisers, according to WFLDB (2019) plus emissions from burning plant residues during coffee area renovation, according to IPCC (2019)
- PAH, polycyclic aromatic hydrocarbons [air, non-urban air or from high stacks]: 3.15e-8 kg; lognormal variance with pedigree 1.2403, pedigree (3,2,2,1,3)
  (same comment as for Benzene)
- Particulate Matter, < 2.5 um [air, non-urban air or from high stacks]: 5.36e-7 kg; lognormal variance with pedigree 1.1203, pedigree (3,2,2,1,3)
  (same comment as for Benzene)
- Selenium IV [air, non-urban air or from high stacks]: 9.59e-11 kg; lognormal variance with pedigree 1.2403, pedigree (3,2,2,1,3)
  (same comment as for Benzene)
- Sulfur dioxide [air, non-urban air or from high stacks]: 9.68e-6 kg; lognormal variance with pedigree 1.1203, pedigree (3,2,2,1,3)
  (same comment as for Benzene)
- Water [air, unspecified]: 0.000942 m3; lognormal variance with pedigree 0.0034, pedigree (2,1,2,5,1)
- Zinc II [air, non-urban air or from high stacks]: 9.59e-9 kg; lognormal variance with pedigree 1.1203, pedigree (3,2,2,1,3)
  (same comment as for Benzene)
- Abamectin [soil, agricultural]: 7.01e-6 kg; lognormal variance with pedigree 1.21232, pedigree (3,2,2,2,1)
  All the pesticides emissions were destinated to agricultural soil, according to Nemecek and Schnetzer (2012).
- Arsenic ion [soil, agricultural]: 4.11862e-6 kg; normal variance with pedigree 1.21, pedigree (5,5,5,5,5)
  Heavy metals emissions to agricultural soil through erosion are estimated by using the SALCA-heavy metal model (Nemecek et al., 2015).
  Uncertainty: Emissions of heavy metals to soil estimated based on WFLDB adapted to Brazil
- Azoxystrobin [soil, agricultural]: 0.000145 kg; lognormal variance with pedigree 1.23232, pedigree (3,2,2,2,1)
  (same comment as for Abamectin)
- Boscalid [soil, agricultural]: 3.89e-7 kg; lognormal variance with pedigree 1.21232, pedigree (3,2,2,2,1)
  (same comment as for Abamectin)
- Cadmium II [soil, agricultural]: 2.50074e-7 kg; normal variance with pedigree 1.21, pedigree (5,5,5,5,5)
  (same comment as for Arsenic ion)
- Chlorantraniliprole [soil, agricultural]: 3.42e-5 kg; lognormal variance with pedigree 1.23232, pedigree (3,2,2,2,1)
  (same comment as for Abamectin)
- Chlorpyrifos [soil, agricultural]: 7.48e-6 kg; lognormal variance with pedigree 1.21232, pedigree (3,2,2,2,1)
  (same comment as for Abamectin)
- Chromium III [soil, agricultural]: 7.74225e-6 kg; normal variance with pedigree 1.21, pedigree (5,5,5,5,5)
  (same comment as for Arsenic ion)
- Copper ion [soil, agricultural]: -6.79649e-6 kg; normal variance with pedigree 1.21, pedigree (5,5,5,5,5)
  (same comment as for Arsenic ion)
- Cyproconazole [soil, agricultural]: 0.000285 kg; lognormal variance with pedigree 1.11233, pedigree (3,2,2,2,1)
  (same comment as for Abamectin)
- Difenoconazole [soil, agricultural]: 2.49e-5 kg; lognormal variance with pedigree 1.23232, pedigree (3,2,2,2,1)
  (same comment as for Abamectin)
- Epoxiconazole [soil, agricultural]: 8.18e-6 kg; lognormal variance with pedigree 1.21232, pedigree (3,2,2,2,1)
  (same comment as for Abamectin)
- Flutriafol [soil, agricultural]: 3.12e-6 kg; lognormal variance with pedigree 1.21232, pedigree (3,2,2,2,1)
  (same comment as for Abamectin)
- Glyphosate [soil, agricultural]: 0.000649 kg; lognormal variance with pedigree 1.23232, pedigree (3,2,2,2,1)
  (same comment as for Abamectin)
- Imidacloprid [soil, agricultural]: 7.79e-5 kg; lognormal variance with pedigree 1.23232, pedigree (3,2,2,2,1)
  (same comment as for Abamectin)
- Lead II [soil, agricultural]: 4.39185e-6 kg; normal variance with pedigree 1.21, pedigree (5,5,5,5,5)
  (same comment as for Arsenic ion)
- Mercury II [soil, agricultural]: 1.40187e-8 kg; lognormal variance with pedigree 1.1183, pedigree (4,2,2,1,1)
  Heavy metals emissions to agricultural soil through erosion are estimated by using the SALCA-heavy metal model (Nemecek et al., 2015).
- Metsulfuron-methyl [soil, agricultural]: 1.87e-6 kg; lognormal variance with pedigree 1.21232, pedigree (3,2,2,2,1)
  (same comment as for Abamectin)
- Oxyfluorfen [soil, agricultural]: 1.5e-5 kg; lognormal variance with pedigree 1.23232, pedigree (3,2,2,2,1)
  (same comment as for Abamectin)
- Pesticides, unspecified [soil, agricultural]: 0.000524 kg; lognormal variance with pedigree 1.23232, pedigree (3,2,2,2,1)
  (same comment as for Abamectin)
- Pyraclostrobin [soil, agricultural]: 2.21e-5 kg; lognormal variance with pedigree 1.23232, pedigree (3,2,2,2,1)
  (same comment as for Abamectin)
- Tebuconazole [soil, agricultural]: 8.1e-7 kg; lognormal variance with pedigree 1.21232, pedigree (3,2,2,2,1)
  (same comment as for Abamectin)
- Thiamethoxam [soil, agricultural]: 0.000336 kg; lognormal variance with pedigree 1.23232, pedigree (3,2,2,2,1)
  (same comment as for Abamectin)
- Trifloxystrobin [soil, agricultural]: 4.05e-7 kg; lognormal variance with pedigree 1.21232, pedigree (3,2,2,2,1)
  (same comment as for Abamectin)
- Arsenic ion [water, surface water]: 4.11903e-10 kg; lognormal variance with pedigree 1.11233, pedigree (3,2,2,2,1)
  Emissions of heavy metals to surface water are calculated according to Schmidt (2007)
- Cadmium II [water, surface water]: 2.95945e-11 kg; lognormal variance with pedigree 1.11233, pedigree (3,2,2,2,1)
  Emissions of heavy metals to surface water are calculated according to Schmidt (2007)
- Chromium III [water, surface water]: 7.61554e-10 kg; lognormal variance with pedigree 1.11233, pedigree (3,2,2,2,1)
  Emissions of heavy metals to surface water are calculated according to Schmidt (2007)
- Copper ion [water, surface water]: 6.78643e-10 kg; lognormal variance with pedigree 1.11233, pedigree (3,2,2,2,1)
  Emissions of heavy metals to surface water are calculated according to Schmidt (2007)
- Lead II [water, surface water]: 4.27583e-10 kg; lognormal variance with pedigree 1.23232, pedigree (3,2,2,2,1)
  Emissions of heavy metals to surface water are calculated according to Schmidt (2007)
- Nitrate [water, ground-]: 0.106 kg; lognormal variance with pedigree 1.11233, pedigree (3,2,2,2,1)
  The SQCB-NO3 model was used according to Nemecek et al. (2015), considering only the quantity of water from precipitation (no irrigation was applied). Technical parameters are available in the BRCalc/ICVCalc tool (Folegatti-Matsuura et al., 2022).
- Phosphorus [water, surface water]: 5.91e-5 kg; lognormal variance with pedigree 1.11233, pedigree (3,2,2,2,1)
  Only the phosphorus emission to surface water caused by soil erosion was calculated, according to Nemecek et al., 2015. Required technical parameters are available in the BRCalc/ICVCalc tool (Folegatti-Matsuura et al., 2022).

## Sampling procedure
The main source of data for agricultural inputs and operations is interview with relevant coffee producers located in Minas Gerais state. Emissions from the agricultural process are estimated using BRCalc/ICVCalc (Folegatti-Matsuura et al., 2022).

## Review by Simone Fazio 2022-07-29
all the review comments have been addressed, solved or better explained
agricultural operations with minor consumption (fertilizer distribution, pesticide application, etc) should be better defined in the future updates, for the sake of precision even if the overall impact don't change significantly
