# packaging production for solid fertiliser or pesticide, per kilogram of packed product

Dataset: EcoSpold 2, unit process
Geography: GLO
Time period: 2009-01-01 to 2023-12-31
Technology level: current
Classification: ISIC rev.4 ecoinvent: 2220:Manufacture of plastics products
Tags: WFLDB
Scenario: Business-as-Usual
System model: Allocation, cut-off by classification
Generated by: [System]
Database: ecoinvent
isCopyrightProtected: true
accessRestrictedTo: 1

## General comment
This dataset represents the production and disposal of packaging material needed to pack 1 kg of dry (solid) fertiliser or pesticide.

## Included activities start
This activity starts with the production of the plastic bag for packaging solid fertilisers or pesticides.

## Included activities end
Included processes: production of HDPE and stretch blow moulding into plastic bag for packing solid fertilisers or pesticides.
This activity ends with the disposal of waste packaging.

## Reference product
- packaging, for fertilisers or pesticides: 1 kg; By-product classification allocatable product; CPC 36410: Sacks and bags, of plastics; HS2017 392321: Ethylene polymers; sacks and bags (including cones), for the conveyance or packing of goods
  The reference product represents the production of the packaging material that is needed to store 1 kg of solid fertilisers (or pesticides) in a plastic bag for storing 50 kg of solide fertilsers.
  production volume 5.31276e14 kg
    Source: www.fertilizer.org & DOI: 10.1007/978-81-322-1689-6_2. Assumption: 90% of fertilizer is solid, 10% liquid and 90% of pesticide is liquid, 10% solid
  property dry mass 0.00204918 kg; = PE_amount
  property heating value, net 27.31 MJ
    LHV is calculated based on the Carbon content of the product. More details can be found on the respective documentation.
  property price 0.0761185 EUR2005
    Calculated based on inputs: The price of the product has been calculated as a sum of the values of the material and energy inputs for this product. This value is therefore a rough estimation. It may underestimate the real price since there are additional expenses when producing any product. These expences can include for example labour costs, treatment of waste materials and profit for the producer. Please consider carefully whether this level of data quality is acceptable for your application.
  property wet mass 0.00204918 kg; = PE_amount
  properties: carbon allocation 0.00175643 kg, carbon content 0.85714, carbon content, fossil 0.85714, carbon content, non-fossil 0, water content 0, water in wet mass 0 kg

## Inputs from technosphere
- polyethylene, high density, granulate: 0.00204918 kg; name PE_amount
  Mass of 1 plastic bag for 50 kg solid fertiliser = 0.100 kg (measured data, Agroscope) which results in 0.002 kg packaging per kg stored fertiliser. The strech blow moulding process requiers 0.00205 kg of HDPE since 1.0 kg product of this process equals 0.976 kg of strech blow plastics.
  properties: carbon content, fossil 0.857143, dry mass 1 kg, heating value, net 42.47 MJ, wet mass 1 kg
- stretch blow moulding: 0.00204918 kg
  (same comment as for polyethylene, high density, granulate)
- waste polyethylene: -1.29752e-7, -5.94989e-6, -3.30817e-7, -1.36639e-7, -2.50191e-8, -0.0020376, -5.52007e-8, -4.95115e-6 kg (8 suppliers, which the file names only by identifier); sum of these -0.00204918 kg
  Waste treatment scenarios is not to be decided here.
  production volume
    Calculated from reference product production volume, reference product amount and byproduct amount.
  properties: carbon content, fossil 0.825301, dry mass 0.996 kg, heating value, net 42.47 MJ, water content 0.00401606, wet mass 1 kg
  note on heating value, net: Value taken from the general comment of the treatment dataset.

## Sampling procedure
Measured values (Agroscope)
