# internet access, videoconference, 0.7 Mbit/s

Dataset: EcoSpold 2, unit process
Geography: RoW
Time period: 2005-01-01 to 2023-12-31
Technology level: current
Classification: EcoSpold01Categories: electronics/services
Classification: ISIC rev.4 ecoinvent: 6110:Wired telecommunications activities
Tags: ConvertedDataset
Scenario: Business-as-Usual
System model: Allocation, cut-off by classification
Generated by: Marianne Leuenberger
Published in: Leuenberger M. 2010
Database: ecoinvent
isCopyrightProtected: true
accessRestrictedTo: 1

## General comment
The data set represents average values for one hour of IP network use during a videoconference per participant
[This dataset was already contained in the ecoinvent database version 2. It was not individually updated during the transfer to ecoinvent version 3. Life Cycle Impact Assessment results may still have changed, as they are affected by changes in the supply chain, i.e. in other datasets. This dataset was generated following the ecoinvent quality guidelines for version 2. It may have been subject to central changes described in the ecoinvent version 3 change report (http://www.ecoinvent.org/database/ecoinvent-version-3/reports-of-changes/), and the results of the central updates were reviewed extensively. The changes added e.g. consistent water flows and other information throughout the database. The documentation of this dataset can be found in the ecoinvent reports of version 2, which are still available via the ecoinvent website. The change report linked above covers all central changes that were made during the conversion process.]

## Included activities end
This data set includes the use of the IP core network for videoconference (0.7 Mbit/s) data exchange for one hour, taking into account IP router use and electricity consumption.

## Geography
Data for Swiss conditions

## Technology
IP core network device (IP router) derived from Cisco Service Router 1800 Series, maximal data rate: 100 Mbit/s, realistic: 25 Mbit/s. Power demand: 0.0042 kW at 1 Mbit/s. Band width for videoconference: 0.7Mbit/s

## Reference product
- internet access, videoconference, 0.7 Mbit/s: 1 hour; By-product classification allocatable product; CPC 8422: Internet access services
  EcoSpold01Location=CH
  production volume 3.96633 hour
    This is a placeholder value that does not reflect real-world production volumes. This dataset does not currently require a real-world production volume to work in the database framework, and no actual data were collected yet. This has no negative effect on the results of the ecoinvent database.
  property price 0.00958124 EUR2005
    Calculated based on inputs: The price of the product has been calculated as a sum of the values of the material and energy inputs for this product. This value is therefore a rough estimation. It may underestimate the real price since there are additional expenses when producing any product. These expences can include for example labour costs, treatment of waste materials and profit for the producer. Please consider carefully whether this level of data quality is acceptable for your application.
  properties: carbon allocation 0 kg, carbon content 0

## Inputs from technosphere
- electricity, low voltage: 0.00334966, 0.000149524, 0.00235136, 0.0488055, 0.00481734, 3.00062e-5, 0.0110612, 0.016803, 0.000832432 kWh (9 suppliers, which the file names only by identifier); sum of these 0.0882 kWh; lognormal variance with pedigree 0.0786, pedigree (4,3,5,5,3)
  Electricity demand: 4.2Wh ADSL, 1.3Wh DSLAM per port, 4.2Wh/Router at 1MBit/s
  EcoSpold01Location=CH
  Uncertainty: Electricity demand: 4.2Wh ADSL, 1.3Wh DSLAM per port, 4.2Wh/Router at 1MBit/s
- router, internet: 9.589e-6 unit; lognormal variance with pedigree 0.3786, pedigree (4,3,5,5,3)
  EcoSpold01Location=CH
  18 routers bandwidth 25MBits
  Uncertainty: 18 routers bandwidth 25MBits

## Extrapolations
Average technology This dataset has been copied from an original dataset covering the geography CH. The uncertainty has been adjusted accordingly.

## Review by Christian Bauer 2010-02-07
26.01.2010
passed
C:\Dokumente und Einstellungen\Marianne\Eigene Dateien\Projekte\277_Mobitool\Ecoinvent\Review\Upload 1\[Ecospold_Use_Devices-v1.1.xls]X-Process
