# cyanoacetic acid production

Dataset: EcoSpold 2, unit process
Geography: RER
Time period: 2010-01-01 to 2023-12-31
Technology level: current
Classification: ISIC rev.4 ecoinvent: 2011:Manufacture of basic chemicals
Synonyms: C3H3NO2
Scenario: Business-as-Usual
System model: Allocation, cut-off by classification
Share of production covered: 100 %
Generated by: Jürgen Sutter
Database: ecoinvent
isCopyrightProtected: true
accessRestrictedTo: 1

## General comment
The process “cyanoacetic acid, at plant, RER” is modelled for the production of cyanoacetic acid from chloroacetic acid in Europe. Raw materials are modelled with a stoechiometric calculation. Emissions are estimated. Energy consumptions, infrastructure and transports are calculated with standard values.
Cyanoacetic acid (C3H3NO2; CAS 372-09-8) forms colourless, hygroscopic crystals, that undergo decarboxylation above 160 °C to give acetonitrile. The compound has a dissociation constant of 3.65 × 10–3 in water (25 °C) and dissolves readily in water, but is only moderately soluble in ethanol, and sparingly in benzene. The industrially most important cyanoacetate is ethyl cyanoacetate, followed by the methyl ester. Both esters are colourless liquids, which are miscible with ethanol and diethyl ether but insoluble in water. Cyanoacetic acid and the cyanoacetates are produced by the same route (and often in the same plant) as the malonates by cyanidation of sodium chloroacetate followed by acidification of the sodium cyanoacetate solution. Cyanoacetic acid is isolated by extraction with an organic solvent and evaporation of the solvent, whereas the cyanoacetates are obtained by mineral acid-catalyzed esterification with subsequent azeotropic removal of water. Major byproducts are malonates and succinates. A process variation involves interchange of the cyanidation and esterification steps. In this case, however, the formation of the side product dimethyl or diethyl 2-cyanosuccinate is difficult to suppress. In order to avoid the isolation, most of the cyanoacetic acid outlets are produced directly from solution.
The world's largest cyanoacetate plant was brought on stream in 1987 in Mobile (Alabama) by Hüls. The annual production capacity of this plant was later expanded to 8000 t.
Alternative methods for the preparation of cyanoacetic acid involve the carboxylation of acetonitrile and the oxidation of partially oxidized propionitriles. Other methods for the preparation of cyanoacetates include the cleavage of cyanoacetaldehyde dimethyl acetal, formed by a palladium-catalyzed oxidation of acrylonitrile, the alkoxycarbonylation of chloroacetonitrile and pyrolysis of 3,3′-bisisoxazole in the presence of an alcohol. However, none of these processes have been used industrially.
The most important application of cyanoacetates is in the field of adhesives. Knoevenagel reaction of alkyl cyanoacetates with formaldehyde affords α-cyanoacrylates, which are stable under exclusion of air but polymerize rapidly to polycyanoacrylates after application on a surface even at room temperature. This polymerization is reversible on heating and the monomer can be formed back and subsequently polymerized again by traces of moisture. Esters of higher alcohols, such as 1-butanol, are also employed.
Otherwise, cyanoacetates are used for the synthesis of pharmaceuticals, agrochemicals, dyes, and UV absorbers. For many applications cyanoacetic acid, cyanoacetates, or cyanoacetamide can be used alternatively. Caffeine (R = CH3) is synthesized from theophylline (R = H), which is accessible in several steps from cyanoacetic acid and 1,3-dimethylurea. The traded cyanoacetic acid is mainly used for the production of the fungicide cymoxanil and the cough remedy dextromethorphan.
Frischknecht R., Jungbluth N., Althaus H.-J., Doka G., Dones R., Heck T., Hellweg S., Hischier R., Nemecek T., Rebitzer G. and Spielmann M. (2007) Overview and Methodology. Final report ecoinvent v2.0 No. 1. Swiss Centre for Life Cycle Inventories, Dübendorf, CH, retrieved from: www.ecoinvent.org.
Gendorf (2000) Umwelterklärung 2000, Werk Gendorf. Werk Gendorf, Burgkirchen as pdf-File under: http://www.gendorf.de/pdf/umwelterklaerung2000.pdf
Kim 2003: Kim S., Overcash M.: Energy in chemical manufacturing processes: gate-to-gate information for life cycle as-sessment. In: Journal of Chemical Technology & Biotechnology vol. 78, no. 9: 995-1005(11). 2003
Harald Strittmatter, Stefan Hildbrand, Peter Pollak: Malonic Acid and Derivatives. Published online: 2007. In: Ullmann's Encyclopedia of Industrial Chemistry, Seventh Edition, 2004 Electronic Release (ed. Fiedler E., Grossmann G., Kersebohm D., Weiss G. and Witte C.). 7 th Electronic Release Edition. Wiley InterScience, New York, Online-Version under: DOI: 10.1002/14356007.a16_063.pub2
The most important application of cyanoacetates is in the field of adhesives. Knoevenagel reaction of alkyl cyanoacetates with formaldehyde affords α-cyanoacrylates 16, which are stable under exclusion of air but polymerize rapidly to polycyanoacrylates 17 after application on a surface even at room temperature. This polymerization is reversible on heating and the monomer can be formed back and subsequently polymerized again by traces of moisture. Esters of higher alcohols, such as 1-butanol, are also employed.
Otherwise, cyanoacetates are used for the synthesis of pharmaceuticals, agrochemicals, dyes, and UV absorbers. For many applications cyanoacetic acid, cyanoacetates, or cyanoacetamide can be used alternatively. Caffeine (R = CH3) is synthesized from theophylline (R = H), which is accessible in several steps from cyanoacetic acid and 1,3-dimethylurea. The traded cyanoacetic acid is mainly used for the production of the fungicide cymoxanil and the cough remedy dextromethorphan.
The most important application of cyanoacetates is in the field of adhesives. Knoevenagel reaction of alkyl cyanoacetates with formaldehyde affords α-cyanoacrylates, which are stable under exclusion of air but polymerize rapidly to polycyanoacrylates after application on a surface even at room temperature. This polymerization is reversible on heating and the monomer can be formed back and subsequently polymerized again by traces of moisture. Esters of higher alcohols, such as 1-butanol, are also employed.
Otherwise, cyanoacetates are used for the synthesis of pharmaceuticals, agrochemicals, dyes, and UV absorber. For many applications cyanoacetic acid, cyanoacetates, or cyanoacetamide (can be used alternatively. Caffeine (R = CH3) is synthesized from theophylline (R = H), which is accessible in several steps from cyanoacetic acid and 1,3-dimethylurea. The traded cyanoacetic acid is mainly used for the production of the fungicide cymoxanil and the cough remedy dextromethorphan.

## Included activities end
production of cyanoacetic acid including materials, energy uses, infrastructure, and emissions

## Geography
The inventory is modelled for Europe.

## Technology
cyanidation of chloroacetic acid

## Time period
Time of publications

## Parameters
- fraction, cooling water, cooling pond system, to air: 0.032 dimensionless; name fraction_CW_CP_to_air; lognormal variance with pedigree 0.0413, pedigree (2,3,1,3,1)
  Calculated based on literature value (Scown, C.D., 2011, Water Footprint of U.S. Transportation Fuels and supplying information of the article) (Vionnet, S., Quantis Water Database - Technical Report, 2012).
- fraction, cooling water, once-through system, to air: 0.004 dimensionless; name fraction_CW_OT_to_air; lognormal variance with pedigree 0.0413, pedigree (2,3,1,3,1)
  (same comment as for fraction, cooling water, cooling pond system, to air)
- fraction, cooling water, recirculating system, to air: 0.771 dimensionless; name fraction_CW_R_to_air; lognormal variance with pedigree 0.0413, pedigree (2,3,1,3,1)
  (same comment as for fraction, cooling water, cooling pond system, to air)
- fraction, cooling water, to air: 0.3875 dimensionless; name fraction_CW_to_air; = (0.5*fraction_CW_OT_to_air)+(0.5*fraction_CW_R_to_air); lognormal variance with pedigree 0.092025, pedigree (4,4,3,2,4)
  Calculated value based on literature value (see comments of the other parametres present in this dataset) and expert opinion. In the case when no industry/literature data are available about the type of cooling or directly fraction, cooling water, to air specific for the process a default assumption is applied. It is assumed that the once-through cooling system is used in 50% of all cases and recirculating system is used in another 50% of all cases.

## Reference product
- cyanoacetic acid: 1 kg; By-product classification allocatable product; CPC 34150: Amine-function compounds; oxygen-function amino-compounds, except lysine and its esters and salts thereof and […]; HS2017 2915: Acids; saturated acyclic monocarboxylic acids and their anhydrides, halides, peroxides and peroxyacids; their[...]; CAS 372-09-8
  EcoSpold01Location=RER
  production volume 3.3e6 kg
    Expert judgment
  property carbon content, fossil 0.423607
    Calculated based on molecular structure. See tab "chemicals".
  property heating value, net 17.11 MJ
    LHV is calculated based on the elemental composition of the substance. Based on the CAS number of the substance (000372-09-8 ), which is found manually, the chemical formula of the substance is found to be: C3H3NO2, (PubChem 2020).
    Reference: Kim, S., Chen, J., Cheng, T., Gindulyte, A., He, J., He, S., Li, Q., Shoemaker, B. A., Thiessen, P. A., Yu, B., Zaslavsky, L., Zhang, J., & Bolton, E. E. (2019). PubChem 2019 update: improved access to chemical data. Nucleic acids research, 47(D1), D1102–D1109. https://doi.org/10.1093/nar/gky1033
  property price 1.51337 EUR2005
    Calculated based on inputs: The price of the product has been calculated as a sum of the values of the material and energy inputs for this product. This value is therefore a rough estimation. It may underestimate the real price since there are additional expenses when producing any product. These expences can include for example labour costs, treatment of waste materials and profit for the producer. Please consider carefully whether this level of data quality is acceptable for your application.
  properties: carbon allocation 0.423607 kg, carbon content 0.423607, carbon content, non-fossil 0, dry mass 1 kg, water content 0, water in wet mass 0 kg, wet mass 1 kg

## Inputs from technosphere
- chemical factory, organics: 4e-10 unit; lognormal variance with pedigree 0.3184, pedigree (4,5,5,5,5)
  No information was readily available about infrastructure and land-use of cyanoacetic acid production plants. Therefore, in this study, the infrastructure is estimated based on the module "chemical plant, organics". This module assumes a built area of about 4.2 ha, an average output of 50'000 t/a, and plant life of fifty years. For this study, the estimated value is 4.00 E-10 units per kg of produced chemical.
  EcoSpold01Location=RER
  Uncertainty: Estimation
- chloroacetic acid: 1.1641 kg; lognormal variance with pedigree 0.0655, pedigree (4,5,5,1,1)
  As there was no data available for the production of cyanoacetic acid, the values for the consumption of chloroacetic acid and hydrogen cycanide are calculated with an assumed yield of 95 % (Frischknecht et al. 2007).
  EcoSpold01Location=RER
  Uncertainty: Stoechiometric calculation
  properties: carbon content, fossil 0.255319, dry mass 1 kg, heating value, net 11.55 MJ, wet mass 1 kg
- electricity, medium voltage: 0.019722 kWh; lognormal variance with pedigree 0.0416, pedigree (1,2,5,1,1)
  EcoSpold01Location=UCTE
  Kim 2003
  Uncertainty: Kim 2003
- hydrogen cyanide: 0.33437 kg; lognormal variance with pedigree 0.0655, pedigree (4,5,5,1,1)
  EcoSpold01Location=RER
  As there was no data available for the production of cyanoacetic acid, the values for the consumption of chloroacetic acid and hydrogen cycanide are calculated with an assumed yield of 95 % (Frischknecht et al. 2007).
  Uncertainty: Stoechiometric calculation
  properties: carbon content, fossil 0.444444, dry mass 1 kg, heating value, net 17.95 MJ, wet mass 1 kg
- sodium hydroxide, without water, in 50% solution state: 0.47059 kg; lognormal variance with pedigree 0.0655, pedigree (4,5,5,1,1)
  EcoSpold01Location=RER
  The produced hydrochloric acid is considered to be neutralized with sodium hydroxide.
  Uncertainty: Stoechiometric calculation
  properties: dry mass 1 kg, heating value, net 3.03 MJ, wet mass 1 kg
- wastewater, average: -5.58244e-8, -2.2213e-6 m3 (2 suppliers, which the file names only by identifier); sum of these -2.27712e-6 m3; lognormal variance with pedigree 0.0438, pedigree (2,4,1,4,4)
  Calculated based on literature data published by the GENDORF Chemical Park. The factory produced an average of 2462760 tonnes of chemical substances (including intermediates) per year in the years 2015-2019. The average ouput of wastewater going to an external wastewater treatment plant in the years 2015-2019 was 5608 m3 per year. This equals 0.000002277 m3/kg chemical produced.
  References:
  Chemiepark GENDORF, Umwelterklärung 2016, https://www.gendorf.de/Nachbarn/Umweltschutz/Industrie%20und%20Nachhaltigkeit
  Chemiepark GENDORF, Umwelterklärung 2017, https://www.gendorf.de/Nachbarn/Umweltschutz/Industrie%20und%20Nachhaltigkeit
  Chemiepark GENDORF, Umwelterklärung 2020, https://www.gendorf.de/Nachbarn/Umweltschutz/Industrie%20und%20Nachhaltigkeit
  properties: carbon content, non-fossil 0.194039, dry mass 0.346837 kg, mass concentration, TOC 0.1091 kg/m3, mass concentration, calcium 0.039453 kg/m3, mass concentration, chlorine 0.030031 kg/m3, mass concentration, hydrogen 0.013365 kg/m3, mass concentration, nitrogen 0.031015 kg/m3, mass concentration, oxygen 0.069824 kg/m3, mass concentration, sodium 0.06456 kg/m3, mass concentration, sulfur 0.015602 kg/m3, water content 2882.2, wet mass 1000 kg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
  note on carbon content, non-fossil: 0.0673 kg TOC/m3 (Tab A.17, ecoinvent v2.2 report 13_I). TOC was considered as Total Carbon.

## Inputs from nature
- Water, cooling, unspecified natural origin [natural resource, in water]: 0.014707 m3; lognormal variance with pedigree 0.0838, pedigree (2,4,5,4,4)
  Calculated based on literature data published by the GENDORF Chemical Park. The factory produced an average of 2462760 tonnes of chemical substances (including intermediates) per year in the years 2015-2019. The average amount of cooling water released in the years 2015-2019 was 34408800 t per year. It was assumed that 5% of the cooling water was emitted to air during its use, therefore, to calculate the input of cooling water, the output value reported by GENDORF was scaled up by the factor 1/0.95. This equals 0.014707 m3/kg chemical produced.
  References:
  Chemiepark GENDORF, Umwelterklärung 2016, https://www.gendorf.de/Nachbarn/Umweltschutz/Industrie%20und%20Nachhaltigkeit
  Chemiepark GENDORF, Umwelterklärung 2017, https://www.gendorf.de/Nachbarn/Umweltschutz/Industrie%20und%20Nachhaltigkeit
  Chemiepark GENDORF, Umwelterklärung 2020, https://www.gendorf.de/Nachbarn/Umweltschutz/Industrie%20und%20Nachhaltigkeit
  Uncertainty: Estimation
- Water, river [natural resource, in water]: 0.000965426 m3; lognormal variance with pedigree 0.0838, pedigree (2,4,5,4,4)
  Calculated based on literature data published by the GENDORF Chemical Park. The factory produced an average of 2462760 tonnes of chemical substances (including intermediates) per year in the years 2015-2019. The average consumption of river water in the years 2015-2019 was 22000820 t per year. However, since the cooling water is modelled as an input, the amount of river water was adjusted to avoid double counting. 55% of the input amount of cooling water was deducted from the amount of river water, as that is the share of river water versus well water. This equals 0.00096543 m3/kg chemical produced.
  References:
  Chemiepark GENDORF, Umwelterklärung 2016, https://www.gendorf.de/Nachbarn/Umweltschutz/Industrie%20und%20Nachhaltigkeit
  Chemiepark GENDORF, Umwelterklärung 2017, https://www.gendorf.de/Nachbarn/Umweltschutz/Industrie%20und%20Nachhaltigkeit
  Chemiepark GENDORF, Umwelterklärung 2020, https://www.gendorf.de/Nachbarn/Umweltschutz/Industrie%20und%20Nachhaltigkeit
- Water, well, in ground [natural resource, in water]: 0.000816522 m3; lognormal variance with pedigree 0.0838, pedigree (2,4,5,4,4)
  Calculated based on literature data published by the GENDORF Chemical Park. The factory produced an average of 2462760 tonnes of chemical substances (including intermediates) per year in the years 2015-2019. The average consumption of well water in the years 2015-2019 was 18607480 t per year. However, since the cooling water is modelled as an input, the amount of well water was adjusted to avoid double counting. 45% of the input amount of cooling water was deducted from the amount of well water, as that is the share of well water versus river water. This equals 0.00081652 m3/kg chemical produced.
  References:
  Chemiepark GENDORF, Umwelterklärung 2016, https://www.gendorf.de/Nachbarn/Umweltschutz/Industrie%20und%20Nachhaltigkeit
  Chemiepark GENDORF, Umwelterklärung 2017, https://www.gendorf.de/Nachbarn/Umweltschutz/Industrie%20und%20Nachhaltigkeit
  Chemiepark GENDORF, Umwelterklärung 2020, https://www.gendorf.de/Nachbarn/Umweltschutz/Industrie%20und%20Nachhaltigkeit

## Emissions to nature
- Carbon dioxide, fossil [air, urban air close to ground]: 0.074323 kg; lognormal variance with pedigree 0.1786, pedigree (4,5,5,5,5)
  The unreacted hydrogen cyanide is considered to be burned. The carbon contained in the burned hydrogen cyanide and the removed chloroacetic acid is accounted as CO2 emissions to air.
  Uncertainty: Estimation
- Chloroacetic acid [air, urban air close to ground]: 0.0023282 kg; lognormal variance with pedigree 0.1786, pedigree (4,5,5,5,5)
  There was no data available on process emissions to air for the production. As approximation the air emissions occurring from the purge vent, the distillation vent and fugitive emission sources were estimated to 0.2% of the Chloroacetic acid input.
  Uncertainty: Estimation
- Water [air, unspecified]: 0.00147008 m3; lognormal variance with pedigree 0.1232, pedigree (2,4,5,4,4)
  Calculated based on literature data published by the GENDORF Chemical Park. The factory produced an average of 2462760 tonnes of chemical substances (including intermediates) per year in the years 2015-2019. To determine the emissions of water to air, the difference of all water inputs (from river, well, tap water and cooling) and outputs (wastewater, emissions to water) was calculated. The average ouput of water to air in the years 2015-2019 was 3620444 m3 per year. This equals 0.00147 m3/kg chemical produced. For more information on the other water exchanges please consult the respective exchange comment.
  References:
  Chemiepark GENDORF, Umwelterklärung 2016, https://www.gendorf.de/Nachbarn/Umweltschutz/Industrie%20und%20Nachhaltigkeit
  Chemiepark GENDORF, Umwelterklärung 2017, https://www.gendorf.de/Nachbarn/Umweltschutz/Industrie%20und%20Nachhaltigkeit
  Chemiepark GENDORF, Umwelterklärung 2020, https://www.gendorf.de/Nachbarn/Umweltschutz/Industrie%20und%20Nachhaltigkeit
  property fraction, origin: fresh water 0; name fraction_origin_fresh_water
  property fraction, origin: salt water 0; name fraction_origin_salt_water
  property fraction, origin: unspecified 1; name fraction_origin_unspecified
- AOX, Adsorbable Organic Halides [water, surface water]: 0.0020963 kg; lognormal variance with pedigree 0.1786, pedigree (4,5,5,5,5)
  Estimation from the emission of chloroacetic acid.
  Uncertainty: Estimation
- BOD5, Biological Oxygen Demand [water, surface water]: 0.0031786 kg; lognormal variance with pedigree 0.1786, pedigree (4,5,5,5,5)
  The values for COD, BOD, TOC, DOC, and AOX used in this inventory are calculated from the amount of chloroacetic acid in the treated waste water assuming a carbon conversion of 96% for COD. For the calculation of the values for BOD and DOC the worst case scenario BOD = COD and TOC = DOC is used.
  Uncertainty: Estimation
- COD, Chemical Oxygen Demand [water, surface water]: 0.0031786 kg; lognormal variance with pedigree 0.218, pedigree (4,5,5,5,5)
  (same comment as for BOD5, Biological Oxygen Demand)
- Chloride [water, surface water]: 0.41176 kg; lognormal variance with pedigree 0.3184, pedigree (4,5,5,5,5)
  Calculated from neutralization of hydrochloric acid and the removal of chloroacetic acid.
  Uncertainty: Estimation
- Chloroacetic acid [water, surface water]: 0.0055876 kg; lognormal variance with pedigree 0.3184, pedigree (4,5,5,5,5)
  The remaining amount of unreacted chloroacetic acid is assumed to leave the production process with the waste water. Further it was assumed that this wastewater is treated in a internal wastewater plant. The removal efficiency for chloroacetic acid is assumed with 90%.
  Uncertainty: Estimation
- DOC, Dissolved Organic Carbon [water, surface water]: 0.0014204 kg; lognormal variance with pedigree 0.218, pedigree (4,5,5,5,5)
  (same comment as for BOD5, Biological Oxygen Demand)
- Sodium I [water, surface water]: 0.27059 kg; lognormal variance with pedigree 0.6642, pedigree (4,5,5,5,5)
  Calculated from neutralization of hydrochloric acid.
  Uncertainty: Estimation
- TOC, Total Organic Carbon [water, surface water]: 0.0014204 kg; lognormal variance with pedigree 0.218, pedigree (4,5,5,5,5)
  (same comment as for BOD5, Biological Oxygen Demand)
- Water [water, unspecified]: 0.0150391 m3; lognormal variance with pedigree 0.1232, pedigree (2,4,5,4,4)
  Calculated based on literature data published by the GENDORF Chemical Park. The factory produced an average of 2462760 tonnes of chemical substances (including intermediates) per year in the years 2015-2019. The amount of water released back to the environment consists of the sum of the amount of process water treated in the internal WWTP that is then released back to the environment and the amount of cooling water released back to the environment. The average ouput of the internal WWTP in the years 2015-2019 was 2628800 m3 and that of cooling water released back to the environment was 34408800 m3. This gives a yearly average of 37037600 m3 emissions of water to water. This equals 0.01504 m3/kg chemical produced.
  References:
  Chemiepark GENDORF, Umwelterklärung 2016, https://www.gendorf.de/Nachbarn/Umweltschutz/Industrie%20und%20Nachhaltigkeit
  Chemiepark GENDORF, Umwelterklärung 2017, https://www.gendorf.de/Nachbarn/Umweltschutz/Industrie%20und%20Nachhaltigkeit
  Chemiepark GENDORF, Umwelterklärung 2020, https://www.gendorf.de/Nachbarn/Umweltschutz/Industrie%20und%20Nachhaltigkeit
  property fraction, origin: fresh water 0; name fraction_origin_fresh_water_Ww
  property fraction, origin: salt water 0; name fraction_origin_salt_water_Ww
  property fraction, origin: unspecified 1; name fraction_origin_unspecified_Ww

## Sampling procedure
Literature data

## Extrapolations
Emissions are modelled with standard methods.

## Review by Roland Hischier 2011-04-12
automatic validation in Excel
none
