# iron pellet production

Dataset: EcoSpold 2, unit process
Geography: CA-QC
Time period: 2011-01-01 to 2023-12-31
Technology level: current
Classification: ISIC rev.4 ecoinvent: 2410:Manufacture of basic iron and steel
Classification: EcoSpold01Categories: metals/extraction
Tags: single enterprise data
Scenario: Business-as-Usual
System model: Allocation, cut-off by classification
Share of production covered: 61 %
Generated by: Catherine Reid
Database: ecoinvent
isCopyrightProtected: true
accessRestrictedTo: 1

## General comment
This dataset represents the production of 1 kg of iron pellets in Quebec in 2011.
Specific data were collected from one compagny which represent, for the year 2011, more than 60% of the Quebec's production. The five types of iron pellets produced (BBS, BHF, BSA, BAF, BIN) are aggregated.
All the data were collected for the year 2011, excluding the waste and hazardous waste, which were collected for the year 2010.

## Included activities start
From the reception of iron ore beneficiated to 65% Fe.

## Included activities end
This activity ends at the stocking pile of the iron pellets.

The dataset includes the reception of the iron concentrate containing 65% of Fe and the additives, transport by train of the iron concentrate from the concentrator on a distance of 416 km, enrichment plant, shredding, filtration and mixing, agglomeration, screening the green pellets, baking and stacking. After the baking step, non conform pellets are sent back to the agglomeration. The datasets also includes a tailling site.

The dataset doesn't include :
1- Some emissions associated with the combustion of waste oil. Only CO2, CH4 and N2O are reported.
2- Some of the waste because of a lack of information and because the end of life of these waste didn't exist in ecoinvent when this data was created. Note that the quantities of these waste have a very low importance.
a) Landfill : waste petroleum product (2.593E-7 kg/kg), absorbent (6.021E-6 kg/kg) (end of life supposed - expert jugment),
b) Recycling : antifreeze and fluid brake (1.662E-7 kg/kg), used filter oil (9.56E-7 kg/kg) (end of life supposed - expert jugment), barrels or contaminated boilers (1.399E-7 kg/kg), lead batteries (2.546E-6 kg/kg) (end of life supposed - expert jugment), fluorescent (2.432E-7 kg/kg), spray bottle (1.919E-7 kg/kg)
c) Treatement : oily water (7.793E-8 kg/kg), sludge waste of oil/water separator (3.966E-6 kg/kg), soil contaminated with grease (1.295E-6 kg/kg)
d) Lack of information on the end of life process : alkaline batteries (1.009E-7 kg/kg), Fe/Hg analysis waste (6.153E-8 kg/kg)
e) Lack of information on the product (not able to add the input) : paint residue sludge (4.663E-7 kg/kg) and fuel (6.71E-8 kg/kg) sent to cement plant, municipal solid waste (1.322E-4 kg/kg) sent to landfill.

## Geography
Inputs relate to Québec production.

## Technology
Straight grate process.
Specific data were collected on one of the two production site in Quebec. No information was available to compare the technologies of the two production site. Uncertainity has been adjusted accordingly.

## Time period
Collected data for Quebec industry for the year 2011

## Parameters
- fraction, process water, to air: 0.15 dimensionless; name fraction_PW_to_air; lognormal variance with pedigree 0.25, pedigree (5,5,5,5,5)
  Literature value. In case when no industry/process specific data are available, default evaporation fraction value is used. This value is 15% and is based on literature (Statistics Canada, 2007 & Shaffer, K.H., 2008, Consumptive water use in the Great Lakes Basin, USGS & Shiklomanov, 2003, World Water Resources at the Beginning of the 21st Century) and has been approved by an expert.
  Uncertainty: Proxy. The uncertainty has been maximized.

## Reference product
- iron pellet: 1 kg; name prod_ironPellet_kg; By-product classification allocatable product; CPC 41116: Ferrous products obtained by direct reduction of iron ore and other spongy ferrous products, in lumps, pellets[…]; HS2017 720310: Ferrous products; obtained by direct reduction of iron ore, in lumps, pellets or similar forms; CAS 65996-65-8
  EcoSpold01Location=GLO
  production volume 1.01e10 kg; name annualProd_ironPellet
    Based on a producer of iron pellets in Quebec.
    References:
    ArcelorMittal, 2021. Facilities, ArcelorMittal Mining Canada G.P. (AMEM) Available from: https://www.transformerlavenir.com/en/facilities/ (accessed 17.08.2021).
  property carbon content, fossil 0
    In pellets, the ore particles are connected chiefly by bridges of ore. The formation of iron oxide bridges is supported by additional slag bridges. Pellets are thoroughly oxidised (a maximum of 0.5 % (w/w) FeO) (ecoinvent v2.2 report 10_partII)
  property carbon content, non-fossil 0
    (same comment as for iron pellet)
  property price 0.0723712 EUR2005
    Calculated based on inputs: The price of the product has been calculated as a sum of the values of the material and energy inputs for this product. This value is therefore a rough estimation. It may underestimate the real price since there are additional expenses when producing any product. These expences can include for example labour costs, treatment of waste materials and profit for the producer. Please consider carefully whether this level of data quality is acceptable for your application.
  properties: carbon allocation 0 kg, carbon content 0, dry mass 1 kg, water content 0, water in wet mass 0 kg, wet mass 1 kg

## Inputs from technosphere
- aluminium oxide factory: 2.5e-11 unit; lognormal variance with pedigree 0.51, pedigree (5,5,5,5,5)
  Estimation based on the ecoinvent iron pellet production, GLO dataset.
  No specific information was available except for an estimation on the surface of the site (10 km²).
  EcoSpold01Location=RER
  Uncertainty: rough estimation
- bentonite: 0.004442 kg; lognormal variance with pedigree 0.0087, pedigree (1,2,4,1,1)
  Measured Value. Activated on site with NaOH.
  properties: dry mass 1 kg, wet mass 1 kg
- chromium: 0.000183 kg; = grindingBalls_input*grindingBalls_chromiumFraction; lognormal variance with pedigree 0.008, pedigree (1,1,4,1,1)
  The grinding balls are made of about 15% chrome and 85% stell.
  Uncertainty: Calculated variable. Uncertainty will be determined from propagation of uncertainty factors of underlying variables.
  property chromium, fraction 0.15; name grindingBalls_chromiumFraction
  properties: dry mass 1 kg, wet mass 1 kg
- dolomite: 0.03765 kg; lognormal variance with pedigree 0.0087, pedigree (1,2,4,1,1)
  Measured Value.
  properties: carbon content, fossil 0.130435, dry mass 1 kg, heating value, net 3.95 MJ, wet mass 1 kg
- electricity, high voltage: 0.07016 kWh; lognormal variance with pedigree 0.0087, pedigree (1,2,4,1,1)
  Measured Value. Includes electricity consumed at the plant (93%), the railway buildings (1%) and at the port (6%).
- heat, district or industrial, other than natural gas: 1.95392e-5 MJ; = fuel_input_propane*density_propane*1000*Net_heat_value_propane*46.46/fuel_use_propane; lognormal variance with pedigree 0.008, pedigree (1,1,4,1,1)
  Calculated based on reported fuel input (in m³), the Net Heating Value of the fuel and efficiency (1/Fuel_use).
  Uncertainty: Calculated variable. Uncertainty will be determined from propagation of uncertainty factors of underlying variables.
  property Corresponding fuel use 1.05263 MJ; name fuel_use_propane; = 1/0.95
  property density 0.515 kg/l; name density_propane
  property fuel input in physical units, m3 8.596e-10 m3; name fuel_input_propane
  property heating value, net 1 MJ; name Net_heat_value_propane
  note on Corresponding fuel use: Lower heating value of the fuel input related to the heat/electricity output
  note on density: Density for liquid propane (at 15°C), taken from http://www.cfbp.fr/proprietes-des-gpl/caracteristiques-generales-et-physico-chimiques-n305.
  note on heating value, net: Net (lower) heating (calorific) value. Taken directly from ecoinvent v3.0 dataset "propane, burned in building machine, GLO 2013".
- heat, district or industrial, other than natural gas: 0.459925 MJ; = fuel_input_coke*Net_heat_value_coke*28.6/fuel_use_coke; lognormal variance with pedigree 0.008, pedigree (1,1,4,1,1)
  Proxy for the consumption and combustion of coke breeze.
  Calculated based on reported fuel input (in kg), the Net Heating Value of the fuel and efficiency (1/Fuel_use).
  Uncertainty: Calculated variable. Uncertainty will be determined from propagation of uncertainty factors of underlying variables.
  property Corresponding fuel use 1.2499 MJ; name fuel_use_coke
  property fuel input in physical units, kg 0.0201 kg; name fuel_input_coke
  property heating value, net 1 MJ; name Net_heat_value_coke
  note on Corresponding fuel use: Lower heating value of the fuel input related to the heat/electricity output. Calculated from heat production, at hard coal industrial furnace, based on hard coal NHV and fuel input. fuel input: 0,04325 kg/Mj of output Hard coal NHV= 28,9 MJ/kg Corresponding fuel use= 28,9* 0,04325
- heat, district or industrial, other than natural gas: 0.253891 MJ; = fuel_input_HFO*density_HFO*1000*Net_heat_value_HFO*41.2/fuel_use_HFO; lognormal variance with pedigree 0.008, pedigree (1,1,4,1,1)
  Calculated based on reported fuel input (in m3), the Net Heating Value of the fuel and efficiency (1/Fuel_use).
  Uncertainty: Calculated variable. Uncertainty will be determined from propagation of uncertainty factors of underlying variables.
  property Corresponding fuel use 1.133 MJ; name fuel_use_HFO
  property density 1 kg/l; name density_HFO
  property fuel input in physical units, m3 6.982e-6 m3; name fuel_input_HFO
  property heating value, net 1 MJ; name Net_heat_value_HFO
  note on Corresponding fuel use: Lower heating value of the fuel input related to the heat/electricity output Source : heat production, heavy fuel oil, at industrial furnace 1MW, GLO
  note on density: Density value. Value Taken from Table 5.1 of report "Overview and methodology, Data quality guideline for the ecoinvent database version 3" (ecoinvent report No. 1 (v3), 2011)
  note on heating value, net: Net (lower) heating (calorific) value. Value Taken from Table 5.1 of report "Overview and methodology, Data quality guideline for the ecoinvent database version 3" (ecoinvent report No. 1 (v3), 2011)
- iron ore concentrate: 0.9991 kg; lognormal variance with pedigree 0.0081, pedigree (1,2,4,1,1)
  Measured Value.
  ore transformed on site
  EcoSpold01Location=GLO
  properties: dry mass 1 kg, wet mass 1 kg
- lime: 0.01748 kg; lognormal variance with pedigree 0.0087, pedigree (1,2,4,1,1)
  Measured Value. Reported as limestone.
  properties: carbon content, fossil 0.120005, dry mass 1 kg, wet mass 1 kg
- lubricating oil: 1.6678e-5 kg; = wasteMineralOil+(used_oil_burned_onsite*lubricant_density); lognormal variance with pedigree 0.008, pedigree (1,1,4,1,1)
  Estimation based on the amount of waste oil burned on site in the iron ore beneficiation to 65% Fe, Quebec, 2011 and the ratio of the combustion emissions and with the amount of use oil sent to incineration plant.
  Uncertainty: Calculated variable. Uncertainty will be determined from propagation of uncertainty factors of underlying variables.
  property density 0.9 kg/l; name lubricant_density
  property input 1.558e-5 l; name used_oil_burned_onsite
  properties: carbon content, fossil 0.75, dry mass 1 kg, heating value, net 40.2 MJ, wet mass 1 kg
  note on carbon content, fossil: Lubricating oil is produced from diesel. C-content/dry mass of fats and oils considered 75%, from: ecoinvent v2.2 report, n 15a, pg 40
  note on density: Taken directly from http://www.engineeringtoolbox.com/liquids-densities-d_743.html.
  note on heating value, net: Literature value, Source: IPCC 2006, 2006 IPCC Guidelines for National Greenhouse Gas Inventories, Prepared by the National Greenhouse Gas Inventories Programme, Eggleston H.S., Buendia L., Miwa K., Ngara T. and Tanabe K. (eds). Published: IGES, Japan
  note on input: Calculated Value with the amount of waste oil burned on site in the iron ore beneficiation to 65% Fe, Quebec, 2011 and the ratio of the combustion emissions
- scrap steel: -9.996e-5 kg; name scrapSteel; lognormal variance with pedigree 0.0007, pedigree (1,2,1,1,1)
  Measured Value for the year 2010. No information on the end of life.
  production volume; = annualProd_ironPellet * (scrapSteel / prod_ironPellet_kg)
    Calculated from production volume of reference product using the relative outputs.
  properties: dry mass 1 kg, wet mass 1 kg
- sodium hydroxide, without water, in 50% solution state: 0.00010095 kg; = 2.019E-4*0.5; lognormal variance with pedigree 0.0087, pedigree (1,2,4,1,1)
  Measured Value. Reported as kg of solution.
  properties: dry mass 1 kg, heating value, net 3.03 MJ, wet mass 1 kg
- solvent, organic: 3.758e-6 kg; = spentSolventMixture; lognormal variance with pedigree 0.008, pedigree (1,1,4,1,1)
  Estimation based on the amount of waste solvent.
  Uncertainty: Calculated variable. Uncertainty will be determined from propagation of uncertainty factors of underlying variables.
  properties: carbon content, fossil 0.63072, dry mass 1 kg, heating value, net 19.11 MJ, wet mass 1 kg
- spent solvent mixture: -3.758e-6 kg; name spentSolventMixture; lognormal variance with pedigree 0.0007, pedigree (1,2,1,1,1)
  Measured Value for the year 2010. Reported as non-chlorinated solvent sent to cement plant (incineration as proxy).
  production volume; = annualProd_ironPellet * (spentSolventMixture / prod_ironPellet_kg)
    Calculated from production volume of reference product using the relative outputs.
  properties: carbon content, fossil 0.571257, dry mass 0.835 kg, heating value, net 21.7 MJ, water content 0.197605, wet mass 1 kg
  note on carbon content, fossil: Tab A.7, ecoinvent v2.2 report 13_I. C content has been calculated after data in the tables, and then referred to 1 kg DM
  note on heating value, net: Value taken from the general comment of the treatment dataset.
- steel, unalloyed: 0.001037 kg; = grindingBalls_input*grindingBalls_steelFraction; lognormal variance with pedigree 0.008, pedigree (1,1,4,1,1)
  (same comment as for chromium)
  property input_kg 0.00122 kg; name grindingBalls_input
  property steel, fraction 0.85; name grindingBalls_steelFraction
  properties: carbon content, fossil 0.0025, dry mass 1 kg, wet mass 1 kg
  note on input_kg: Measured Value. Represent the total quantity for the grinding balls made of about 15% chrome and 85% stell.
- tap water: 0.6608 kg; name water_UNO_input; lognormal variance with pedigree 0.0087, pedigree (1,2,4,1,1)
  Measured Value. Proxy for river water that undergoes a first filtration and chlorination (not potable).
  Water used for the dilution of sodium hydroxide, in50% solution state has been added (0.00010095 kg/kg).
  properties: carbon content, fossil 0.00178991, dry mass 0.000337476 kg, water content 2962.17, wet mass 1 kg
  note on carbon content, fossil: Bicarbonate content is 2.93 mol/m3. CO2 content is 0.1 mol/m3 (ecoinvent v2.2 report 8, Tab 93.1).
- transport, freight train: 0.135349 metric ton*km; = (fuel_input_diesel_train*density_diesel_train)/fuel_use_diesel_train; lognormal variance with pedigree 0.008, pedigree (1,1,4,1,1)
  Calculated Value. Transportation of the concentrate to the pellets plant.
  Uncertainty: Calculated variable. Uncertainty will be determined from propagation of uncertainty factors of underlying variables.
  property Corresponding fuel use, transport, freight train 0.0094148 kg; name fuel_use_diesel_train
  property density 0.84 kg/l; name density_diesel_train
  property input 0.001517 l; name fuel_input_diesel_train
  note on Corresponding fuel use, transport, freight train: Source : transport, freight train, diesel, GLO (ecoinvent data) Units : kg/tkm
- waste mineral oil: -2.656e-6 kg; name wasteMineralOil; lognormal variance with pedigree 0.0007, pedigree (1,2,1,1,1)
  Measured Value for the year 2010. Reported as grease and oil waste sent to cement plant (incineration as proxy).
  production volume; = annualProd_ironPellet * (wasteMineralOil / prod_ironPellet_kg)
    Calculated from production volume of reference product using the relative outputs.
  properties: carbon content, fossil 0.864444, dry mass 0.9 kg, heating value, net 34.7 MJ, water content 0.111111, wet mass 1 kg
  note on carbon content, fossil: Tab A.6, ecoinvent v2.2 report 13_I. C content has been calculated after data in the tables, and then referred to 1 kg DM

## Emissions to nature
- Carbon dioxide, fossil [air, non-urban air or from high stacks]: 0.02325 kg; lognormal variance with pedigree 0.0093, pedigree (2,2,4,1,1)
  Calculated Value. Process emissions and emissions related to the combustion of waste oil on site.
- Carbon monoxide, fossil [air, non-urban air or from high stacks]: 6.406e-7 kg; lognormal variance with pedigree 0.6587, pedigree (2,2,4,1,1)
  Calculated Value. Process emissions.
- Dinitrogen monoxide [air, non-urban air or from high stacks]: 4.592e-8 kg; lognormal variance with pedigree 0.0487, pedigree (2,2,4,1,1)
  (same comment as for Carbon dioxide, fossil)
- Hydrochloric acid [air, non-urban air or from high stacks]: 6.07e-6 kg; lognormal variance with pedigree 0.0501, pedigree (3,2,4,1,1)
  Calculated Value based on specific data for the entire process (including combustion) minus the emissions from combustion modelled in the current dataset (ecoinvent v3).
- Hydrogen fluoride [air, non-urban air or from high stacks]: 1.42e-5 kg; lognormal variance with pedigree 0.0501, pedigree (3,2,4,1,1)
  (same comment as for Hydrochloric acid)
- Mercury II [air, non-urban air or from high stacks]: 3.03e-9 kg; lognormal variance with pedigree 0.6601, pedigree (3,2,4,1,1)
  (same comment as for Hydrochloric acid)
- Methane, fossil [air, non-urban air or from high stacks]: 1.87e-9 kg; lognormal variance with pedigree 0.0487, pedigree (2,2,4,1,1)
  Calculated Value, Emissions related the combustion of waste oil on site.
- NMVOC, non-methane volatile organic compounds [air, non-urban air or from high stacks]: 1.287e-9 kg; lognormal variance with pedigree 0.0487, pedigree (2,2,4,1,1)
  Calculated Value. Process emissions, reported as COV.
- Nitrogen oxides [air, non-urban air or from high stacks]: 6.022e-6 kg; lognormal variance with pedigree 0.0487, pedigree (2,2,4,1,1)
  Calculated Value. Process emissions.
- Particulate Matter, < 2.5 um [air, non-urban air or from high stacks]: 1.039e-5 kg; lognormal variance with pedigree 0.3087, pedigree (2,2,4,1,1)
  Calculated Value. Emissions related to stationnary sources (process), material transfer activities, fugitive sources (tailings) and road dust.
- Particulate Matter, > 10 um [air, non-urban air or from high stacks]: 1.796e-5 kg; lognormal variance with pedigree 0.0487, pedigree (2,2,4,1,1)
  (same comment as for Particulate Matter, < 2.5 um)
- Particulate Matter, > 2.5 um and < 10um [air, non-urban air or from high stacks]: 1.231e-5 kg; lognormal variance with pedigree 0.1287, pedigree (2,2,4,1,1)
  (same comment as for Particulate Matter, < 2.5 um)
- Silver I [air, non-urban air or from high stacks]: 1.73e-9 kg; lognormal variance with pedigree 0.6601, pedigree (3,2,4,1,1)
  (same comment as for Hydrochloric acid)
- Sulfur dioxide [air, non-urban air or from high stacks]: 2.881e-5 kg; lognormal variance with pedigree 0.0093, pedigree (2,2,4,1,1)
  Calculated Value. Process emissions.
- Water [air, unspecified]: 9.912e-5 m3; name water_to_air_unspecified; = (water_UNO_input*fraction_PW_to_air/water_to_air_unspecified_density)*UnitConversion(1, 'l', 'm3'); lognormal variance with pedigree 0.0487, pedigree (2,2,4,1,1)
  Calculated value based on literature values and expert opinion. See comments in the parametres' comment field.
  property density 1 kg/l; name water_to_air_unspecified_density
- Arsenic ion [water, surface water]: 1.902e-10 kg; lognormal variance with pedigree 0.6587, pedigree (2,2,4,1,1)
  Calculated Value. Emissions in the final effluent.
- Cadmium II [water, surface water]: 9.509e-11 kg; lognormal variance with pedigree 0.6587, pedigree (2,2,4,1,1)
  Calculated Value. Emissions in the final effluent.
- Chromium III [water, surface water]: 1.521e-9 kg; lognormal variance with pedigree 0.6587, pedigree (2,2,4,1,1)
  Calculated Value. Emissions in the final effluent.
- Cobalt II [water, surface water]: 1.902e-10 kg; lognormal variance with pedigree 0.6587, pedigree (2,2,4,1,1)
  Calculated Value. Emissions in the final effluent.
- Copper ion [water, surface water]: 1.902e-10 kg; lognormal variance with pedigree 0.6587, pedigree (2,2,4,1,1)
  Calculated Value. Emissions in the final effluent.
- Iron ion [water, surface water]: 3.616e-7 kg; lognormal variance with pedigree 0.6587, pedigree (2,2,4,1,1)
  Calculated Value. Emissions in the final effluent.
- Lead II [water, surface water]: 1.902e-10 kg; lognormal variance with pedigree 0.6587, pedigree (2,2,4,1,1)
  Calculated Value. Emissions in the final effluent.
- Manganese II [water, surface water]: 5.705e-8 kg; lognormal variance with pedigree 0.6587, pedigree (2,2,4,1,1)
  Calculated Value. Emissions in the final effluent.
- Mercury II [water, surface water]: 2.472e-11 kg; lognormal variance with pedigree 0.6587, pedigree (2,2,4,1,1)
  Calculated Value. Emissions in the final effluent.
- Nickel II [water, surface water]: 1.902e-10 kg; lognormal variance with pedigree 0.6587, pedigree (2,2,4,1,1)
  Calculated Value. Emissions in the final effluent.
- Nitrate [water, surface water]: 3.499e-7 kg; lognormal variance with pedigree 0.0487, pedigree (2,2,4,1,1)
  Calculated Value. Emissions in the final effluent.
- Phosphorus [water, surface water]: 2.282e-8 kg; lognormal variance with pedigree 0.0487, pedigree (2,2,4,1,1)
  Calculated Value. Emissions in the final effluent.
- Suspended solids, unspecified [water, surface water]: 1.218e-6 kg; lognormal variance with pedigree 0.0487, pedigree (2,2,4,1,1)
  Calculated Value. Emissions in the final effluent.
- Water [water, unspecified]: 0.00056168 m3; name water_to_water_unspecified; = (water_UNO_input*(1-fraction_PW_to_air)/water_to_air_unspecified_density)*UnitConversion(1, 'l', 'm3'); lognormal variance with pedigree 0.0487, pedigree (2,2,4,1,1)
  (same comment as for Water)
  property carbon content, fossil 0; name C_content_fossil
  property carbon content, non-fossil 0; name C_content_non_fossil
  property density 1 kg/l; name water_to_water_unspecified_density
  property dry mass 0 kg; name DM
  property water in wet mass 1000 kg; name WWM
  property wet mass 1000 kg; name WM
- Zinc II [water, surface water]: 7.607e-10 kg; lognormal variance with pedigree 0.6587, pedigree (2,2,4,1,1)
  Calculated Value. Emissions in the final effluent.

## Extrapolations
Extrapolations were made from the GLO dataset for the infrastructure.
Specific data were collected on one of the two production site in Quebec. According to the documentation available, the technologies of the 2 mines seems similar. Uncertainity has been adjusted accordingly.

## Review by Emilia Moreno Ruiz 2014-05-22
AL added to input of iron

## Review by Emilia Moreno Ruiz 2015-11-04
AL to diesel train removed
