# ferrosilicon production

Dataset: EcoSpold 2, unit process
Geography: RoW
Time period: 2008-01-01 to 2023-12-31
Technology level: current
Classification: ISIC rev.4 ecoinvent: 2410:Manufacture of basic iron and steel
Scenario: Business-as-Usual
System model: Allocation, cut-off by classification
Generated by: Simone Ehrenberger
Published in: Simone Ehrenberger 2013
Database: ecoinvent
isCopyrightProtected: true
accessRestrictedTo: 1

## General comment
Ferrosilicon (FeSi) is produced via reduction of silica sand in presence of iron in an electric arc furnace. Coke is used as reduction agent. FeSi is used in various metallurgical processes as reduction agent or alloying material. For the FeSi production process, the data on material consumption is based on an average of three Chinese companies which have been surveyed in 2008.

## Included activities start
The process starts with the reception of raw materials at the factory gate.

## Included activities end
This activity ends with the production of ferrosilicon in an electric arc furnace. No further process steps are included.

## Technology
The module includes the production of the anode: the production of Söderberg paste has been developed according to data from ProBas (reference year 2003; www.probas.umweltbundesamt.de).
Theoretically, the main emission from the electric arc furnace where FeSi is produced is CO according to the following chemical reactions:
SiO2 + 2C = Si + 2 CO
SiO2 + C = SiO + CO
In reality, several further reactions lead to potential CO and CO2 emissions. Due to large uncertainties of the direct CO and CO2 emissions from the furnace, this module refers to the average amount of direct CO2 emissions from FeSi production which has been measured at Chinese Fe-alloy plants (Zhou 2001). Other elements of the off-gas are amorphous condensed SiO2, SO2 and NOx. The SiO2 dust is calculated in this study. It can be filtered and used for concrete or ceramic production. As there is no information whether this is done in China, there is no further use assumed. SO2 and NOx result from impurities of the raw materials and are not expected to be emitted in relevant amounts. Data on infrastructure is a rough estimation.

## Reference product
- ferrosilicon: 1 kg; name RP_amount_1; By-product classification allocatable product; CPC 41115: Other ferro-alloys; HS2017 7202: Ferro-alloys
  production volume 3.32e9 kg; name RP_PV_1
    estimated in 2008 USGS minerals yearbook (metals and minerals 2008), p.67.6
  property heating value, net 3.03 MJ
    LHV is calculated based on the Carbon content of the product. More details can be found on the respective documentation.
  property price 0.677 EUR2005
    Calculated based on literature value (UN Commodity Trade Statistics Database) using data on trade value and net weight (kg) for 5 reference countries/regions (EU-27, USA, JP, CN and IN) which weighted (by net weight) average is assumed to be a good approximation of the global price. The UN classification; 720229 Ferro-silicon, <55% silicon (accessed 20140506). Data for the year 2005.
  properties: carbon allocation 0.1 kg, carbon content 0.1, carbon content, fossil 0.1, carbon content, non-fossil 0, dry mass 1 kg, water content 0, water in wet mass 0 kg, wet mass 1 kg

## Inputs from technosphere
- coal tar: 0.01704 kg; lognormal variance with pedigree 0.2106, pedigree (5,5,5,5,5)
  for anode production
  properties: carbon content, fossil 0.83, dry mass 1 kg, heating value, net 28 MJ, wet mass 1 kg
  note on heating value, net: Literature value, Source: IPCC 2006, 2006 IPCC Guidelines for National Greenhouse Gas Inventories, Prepared by the National Greenhouse Gas Inventories Programme, Eggleston H.S., Buendia L., Miwa K., Ngara T. and Tanabe K. (eds). Published: IGES, Japan
- coke: 28 MJ; lognormal variance with pedigree 0.2106, pedigree (5,5,5,5,5)
  for FeSi production
  properties: carbon content, fossil 0.869149, dry mass 0.0328671 kg, heating value, net 28.6 MJ, water content 0.0638298, wet mass 0.034965 kg
- electric arc furnace converter: 4e-11 unit; lognormal variance with pedigree 0.2106, pedigree (5,5,5,5,5)
  estimation for infrastructure
- electricity, low voltage: 0.085678, 0.463599, 0.018017, 0.0070051, 0.488991, 0.116553, 0.00702906, 0.024022, 0.00959831, 0.00330766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 kWh (47 suppliers, which the file names only by identifier); sum of these 8.56 kWh; lognormal variance with pedigree 0.2106, pedigree (5,5,5,5,5)
  for FeSi and anode production; The energy consumption of the process are provided by BJUT based on the data survey for the Chinese LCI database.
- hard coal: 1.65143e-5, 3.91873e-6, 1.28579e-5, 2.74482e-5, 1.68525e-5, 2.4621e-5, 3.64206e-5, 7.16671e-6, 1.02002e-5 kg (9 suppliers, which the file names only by identifier); sum of these 0.000156 kg; lognormal variance with pedigree 0.2106, pedigree (5,5,5,5,5)
  for anode production
  properties: carbon content, fossil 0.845, dry mass 0.94 kg, heating value, net 27.91 MJ, water content 0.0638298, wet mass 1 kg
  note on carbon content, fossil: C content 75-94% (specified in Tab 1.1, report 6, part VI). A mean content of 0.845 kg C/ kg dry hard coal was considered
  note on heating value, net: Based on the Characterization factor of Hard coal in the CED method
- heavy fuel oil: 2.59211e-7, 1.50942e-7, 3.69567e-6, 7.6736e-7, 1.79382e-5, 1.93636e-7, 9.95e-7 kg (7 suppliers, which the file names only by identifier); sum of these 2.4e-5 kg; lognormal variance with pedigree 0.2106, pedigree (5,5,5,5,5)
  for anode production
  properties: carbon content, fossil 0.849, dry mass 1 kg, heating value, net 41.2 MJ, wet mass 1 kg
- inert waste: -1.4801, -0.419901 kg (2 suppliers, which the file names only by identifier); sum of these -1.9 kg; lognormal variance with pedigree 0.25, pedigree (5,5,5,5,5)
  estimation on slag from FeSi production and anode production; composition unknown, but slag should contain some carbon
  production volume; = RP_PV_1 * (BP_amount_1 / RP_amount_1)
    Calculated from production volume of reference product using the relative outputs.
  properties: dry mass 1 kg, wet mass 1 kg
- natural gas, low pressure: 4.51873e-6, 8.4672e-6, 1.25091e-5, 1.52793e-5, 2.38326e-5, 1.76445e-5, 3.69029e-6, 6.76368e-6, 6.15777e-5, 7.02427e-7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 m3 (16 suppliers, which the file names only by identifier); sum of these 0.000396 m3; lognormal variance with pedigree 0.2106, pedigree (5,5,5,5,5)
  for anode production
  properties: carbon content, fossil 0.695187, dry mass 1 kg, heating value, gross 40 MJ, heating value, net 36 MJ, wet mass 1 kg
  note on carbon content, fossil: C content considered the same as in high pressure (consumption mix)
  note on heating value, net: Literature value, Source: Christoph Meili;Niels Jungbluth;Maresa Bussa (2021) Life cycle inventories of crude oil and natural gas extraction. ESU-services Ltd. commissioned by BAFU & VSG, Schaffhausen, Switzerland, http://esu-services.ch/data/public-lci-reports/
- petroleum coke: 0.04278 kg; lognormal variance with pedigree 0.2106, pedigree (5,5,5,5,5)
  for anode production
  properties: carbon content, fossil 0.885, dry mass 1 kg, heating value, net 35 MJ, wet mass 1 kg
- silica sand: 1.9 kg; lognormal variance with pedigree 0.2106, pedigree (5,5,5,5,5)
  for FeSi production
  properties: dry mass 0.99 kg, water content 0.010101, wet mass 1 kg
- steel, unalloyed: 0.2375 kg; lognormal variance with pedigree 0.2106, pedigree (5,5,5,5,5)
  for FeSi production
  properties: carbon content, fossil 0.0025, dry mass 1 kg, wet mass 1 kg
- tap water: 0.09 kg; lognormal variance with pedigree 0.2106, pedigree (5,5,5,5,5)
  for anode production
  properties: carbon content, fossil 0.00178991, dry mass 0.000337476 kg, water content 2962.17, wet mass 1 kg
  note on carbon content, fossil: Bicarbonate content is 2.93 mol/m3. CO2 content is 0.1 mol/m3 (ecoinvent v2.2 report 8, Tab 93.1).
- wastewater, average: -3.68164e-7, -6.12642e-5, -1.46495e-5, -2.18124e-7 m3 (4 suppliers, which the file names only by identifier); sum of these -7.65e-5 m3; lognormal variance with pedigree 0.2106, pedigree (5,5,5,5,5)
  estimation for water balance
  production volume; = RP_PV_1 * (BP_amount_2 / RP_amount_1)
    Calculated from production volume of reference product using the relative outputs.
  properties: carbon content, non-fossil 0.194039, dry mass 0.346837 kg, water content 2882.2, wet mass 1000 kg
  note on carbon content, non-fossil: 0.0673 kg TOC/m3 (Tab A.17, ecoinvent v2.2 report 13_I). TOC was considered as Total Carbon.

## Emissions to nature
- Benzo(a)pyrene [air, unspecified]: 4.7e-9 kg; lognormal variance with pedigree 3.21, pedigree (5,5,5,5,5)
  emission from anode production
- Carbon dioxide, fossil [air, unspecified]: 0.01856 kg; lognormal variance with pedigree 0.2106, pedigree (5,5,5,5,5)
  emission from FeSi production (data from DLR / IMA study); The direct CO2 emissions of the process are provided by BJUT based on the data survey for the Chinese LCI database.
- Nitrogen oxides [air, unspecified]: 6.6e-6 kg; lognormal variance with pedigree 0.25, pedigree (5,5,5,5,5)
  emission from anode production
- PAH, polycyclic aromatic hydrocarbons [air, unspecified]: 5.52e-7 kg; lognormal variance with pedigree 0.51, pedigree (5,5,5,5,5)
  emission from anode production
- Particulate Matter, < 2.5 um [air, unspecified]: 0.03 kg; lognormal variance with pedigree 0.51, pedigree (5,5,5,5,5)
  emission from FeSi production based on estimation
- Particulate Matter, > 2.5 um and < 10um [air, unspecified]: 6.6e-6 kg; lognormal variance with pedigree 0.51, pedigree (5,5,5,5,5)
  emission from anode production
- Sulfur dioxide [air, unspecified]: 6e-5 kg; lognormal variance with pedigree 0.2106, pedigree (5,5,5,5,5)
  emission from anode production
- Water [air, unspecified]: 1.35e-5 m3; lognormal variance with pedigree 0.25, pedigree (5,5,5,5,5)
  estimation for water balance

## Extrapolations
The dataset is scaled up from regional dataset for China. The uncertainties have been adjusted accordingly.

## Review by Hans-Jörg Althaus 2014-02-04
ok
