# electricity production, natural gas, 10MW

Dataset: EcoSpold 2, unit process
Geography: CH
Time period: 1990-01-01 to 2023-12-31
Technology level: current
Classification: EcoSpold01Categories: natural gas/power plants
Classification: ISIC rev.4 ecoinvent: 3510:Electric power generation, transmission and distribution
Tags: ConvertedDataset
Scenario: Business-as-Usual
System model: Allocation, cut-off by classification
Generated by: [System]
Published in: Faist Emmenegger, M. 2007
Database: ecoinvent
isCopyrightProtected: true
accessRestrictedTo: 1

## General comment
[This dataset was already contained in the ecoinvent database version 2. It was not individually updated during the transfer to ecoinvent version 3. Life Cycle Impact Assessment results may still have changed, as they are affected by changes in the supply chain, i.e. in other datasets. This dataset was generated following the ecoinvent quality guidelines for version 2. It may have been subject to central changes described in the ecoinvent version 3 change report (http://www.ecoinvent.org/database/ecoinvent-version-3/reports-of-changes/), and the results of the central updates were reviewed extensively. The changes added e.g. consistent water flows and other information throughout the database. The documentation of this dataset can be found in the ecoinvent reports of version 2, which are still available via the ecoinvent website. The change report linked above covers all central changes that were made during the conversion process.]

## Included activities end
The module includes fuel input, infrastructure, and emissions to air.

## Geography
CO2 emissions derived from country-specific composition of gas.

## Technology
For infrastructure, a 10MWe gas turbine was assumed.

## Time period
Data of mid 1990s

## Parameters
- fraction, cooling water, to air: 0.0118019 dimensionless; name fraction_CW_to_air; lognormal variance with pedigree 0.092025, pedigree (4,4,3,2,4)
  Calculated
- scaling factor: 10.8696 dimensionless; name scaling_factor

## Reference product
- electricity, high voltage: 1 kWh; = 0.092 * scaling_factor; By-product classification allocatable product; CPC 17100: Electrical energy; HS2017 271600: Electrical energy
  EcoSpold01Location=CH
  Amount was scaled to 1.
  production volume 0.0336675 kWh
    This is a placeholder value that does not reflect real-world production volumes. This dataset does not currently require a real-world production volume to work in the database framework, and no actual data were collected yet. This has no negative effect on the results of the ecoinvent database. The placeholder value of this activity was scaled according to the nominal GDP of 2005 (source: United Nations, http://data.un.org/Glossary.aspx?q=GDP+%28current+US%24%29, accessed 20130726) to reflect an appropriate share of the global production volume, which is also a placeholder value.
  property price 0.0977 EUR2005
    Temporary price data. Calculated as 90% of purchasers price based on: 94% of the average price (to account for a 6% loss in transformation and transmission) for electricity for industrial consumersin 2005 (excluded taxes). From IEA.
  properties: Corresponding fuel use 1 MJ, carbon allocation 0 kg, carbon content 0

## Inputs from technosphere
- gas turbine, 10MW electrical: 1.25e-9 unit; = 1.15E-10 * scaling_factor; lognormal variance with pedigree 0.16, pedigree (1,1,5,1,1)
  EcoSpold01Location=RER
  uncertainty of lifetime
  Amount was scaled to the amount of reference product.
- natural gas, high pressure: 0.298913 m3; = 0.0275 * scaling_factor
  Amount was scaled to the amount of reference product.
  property carbon content, fossil 0.602381; name C_content_fossil
  property carbon content, non-fossil 0; name C_content_non_fossil
  property dry mass 0.84 kg; name DM
  property heating value, gross 40 MJ; name Gross_Heat_Value
  property water content 0; name water_content
  property water in wet mass 0 kg; name WWM
  property wet mass 0.84 kg; name WM
  properties: heating value, net 36 MJ
  note on heating value, net: Literature value, Source: Christoph Meili;Niels Jungbluth;Maresa Bussa (2021) Life cycle inventories of crude oil and natural gas extraction. ESU-services Ltd. commissioned by BAFU & VSG, Schaffhausen, Switzerland, http://esu-services.ch/data/public-lci-reports/

## Inputs from nature
- Water, cooling, unspecified natural origin [natural resource, in water]: 0.0746479 m3; name water_cooling_UNO_input; lognormal variance with pedigree 0.130025, pedigree (4,4,5,2,4)
  Calculated based on literature data.

## Emissions to nature
- Carbon dioxide, fossil [air, urban air close to ground]: 0.608696 kg; = 0.056 * scaling_factor; lognormal variance with pedigree 0.04, pedigree (1,1,5,1,1)
  composition of natural gas
  Amount was scaled to the amount of reference product.
- Carbon monoxide, fossil [air, urban air close to ground]: 0.000434783 kg; = 4E-05 * scaling_factor; lognormal variance with pedigree 0.34, pedigree (1,1,5,1,1)
  rough estimate
  Amount was scaled to the amount of reference product.
- Dinitrogen monoxide [air, urban air close to ground]: 1.08696e-5 kg; = 1E-06 * scaling_factor; lognormal variance with pedigree 0.34, pedigree (1,1,5,1,1)
  rough estimate
  Amount was scaled to the amount of reference product.
- Dioxins, measured as 2,3,7,8-tetrachlorodibenzo-p-dioxin [air, urban air close to ground]: 3.15217e-16 kg; = 2.9E-17 * scaling_factor; lognormal variance with pedigree 1.12, pedigree (1,1,5,1,1)
  rough estimate, high uncertainty
  Amount was scaled to the amount of reference product.
- Mercury II [air, urban air close to ground]: 3.26087e-10 kg; = 3E-11 * scaling_factor; lognormal variance with pedigree 0.69, pedigree (1,1,5,1,1)
  basic uncertainty for heavy metal; trace element in natural gas
  Amount was scaled to the amount of reference product.
- Methane, fossil [air, urban air close to ground]: 4.8913e-5 kg; = 4.5E-06 * scaling_factor; lognormal variance with pedigree 0.69, pedigree (1,1,5,1,1)
  rough estimate
  Amount was scaled to the amount of reference product.
- NMVOC, non-methane volatile organic compounds [air, urban air close to ground]: 1.08696e-5 kg; = 1E-06 * scaling_factor; lognormal variance with pedigree 0.69, pedigree (1,1,5,1,1)
  rough estimate
  Amount was scaled to the amount of reference product.
- Nitrogen oxides [air, urban air close to ground]: 0.00141304 kg; = 0.00013 * scaling_factor; lognormal variance with pedigree 0.34, pedigree (1,1,5,1,1)
  rough estimate
  Amount was scaled to the amount of reference product.
- Sulfur dioxide [air, urban air close to ground]: 5.97826e-6 kg; = 5.5E-07 * scaling_factor; lognormal variance with pedigree 0.04, pedigree (1,1,5,1,1)
  composition of natural gas
  Amount was scaled to the amount of reference product.
- Water [air, unspecified]: 0.000880988 m3; name water_to_air_unspecified; = water_cooling_UNO_input*fraction_CW_to_air; lognormal variance with pedigree 0.130025, pedigree (4,4,5,2,4)
  Calculated value based on literature values and expert opinion. See comments in the parametres' comment field.
  property fraction, origin: fresh water 0; name fraction_origin_fresh_water
  property fraction, origin: salt water 0; name fraction_origin_salt_water
  property fraction, origin: unspecified 1; name fraction_origin_unspecified
- Water [water, unspecified]: 0.0737669 m3; name water_to_water_unspecified; = water_cooling_UNO_input*(1-fraction_CW_to_air); lognormal variance with pedigree 0.130025, pedigree (4,4,5,2,4)
  (same comment as for Water)
  property fraction, origin: fresh water 0; name fraction_origin_fresh_water_Ww
  property fraction, origin: salt water 0; name fraction_origin_salt_water_Ww
  property fraction, origin: unspecified 1; name fraction_origin_unspecified_Ww

## Sampling procedure
Literature

## Review by Michael Spielmann (obsolete) 2003-07-25
passed
