# inorganic potassium fertiliser, as K2O to generic market for organo-mineral potassium fertiliser, as K2O

Dataset: EcoSpold 2, unit process
Geography: GLO
Time period: 2016-01-01 to 2023-12-31
Technology level: current
Classification: ISIC rev.4 ecoinvent: 0161:Support activities for crop production
Scenario: Business-as-Usual
System model: Allocation, cut-off by classification
Generated by: Avraam Symeonidis
Database: ecoinvent
isCopyrightProtected: true
accessRestrictedTo: 1

## General comment
This is a renaming activity that connects "inorganic potassium fertiliser, as K2O" with "organo-mineral potassium fertiliser, as K2O". It is assumed that in the shortage of "organo-mineral potassium fertiliser, as K2O", a consumer of it will turn its consumption pattern and use an "inorganic potassium fertiliser, as K2O". In theory, the "inorganic potassium fertiliser, as K2O" can substitute the "organo-mineral potassium fertiliser, as K2O" in an equal mass ratio, considering only the nutrient content.
This dataset is meant to be employed only in the consequential system model where it is assumed that inorganic can replace organic fertiliser. The production volume of this activity is set to zero so it does not react with attributional supply chains.

## Included activities start
The activity starts with the reception of inorganic potassium fertiliser, as K2O.

## Included activities end
The activity ends with organo-mineral potassium fertiliser, as K2O being ready for transportation.

## Technology
Inventory is based on the nutrient content of the fertiliser.

## Reference product
- organo-mineral potassium fertiliser, as K2O: 1 kg; By-product classification allocatable product; CPC 34659: Fertilizers n.e.c.; HS2017 310490: Fertilizers, mineral or chemical; potassic, n.e.c. in heading no. 3104
  production volume 0 kg
    Production volume is set on purpose equal to zero so this activity is not interacting in the attributional system model.
  property carbon content, fossil 0
    Carbon content, fossil is calculated based on the chemical formula of the substance.
  property oxygen content 0.169852
    Oxygen content (on a dry matter basis) of organo-mineral potassium fertiliser, as K2O is calculated from the molecular formula of the substance (Potassium).
  property potassium content 0.830148
    Potassium content (on a dry matter basis) of organo-mineral potassium fertiliser, as K2O is calculated from the molecular formula of the substance (Potassium).
  property price 0.188 EUR2005
    Set equal to the price of the corresponding inorganic fertiliser
  properties: carbon allocation 0 kg, carbon content 0, carbon content, non-fossil 0, dry mass 1 kg, water content 0, water in wet mass 0 kg, wet mass 1 kg

## Inputs from technosphere
- inorganic potassium fertiliser, as K2O: 0.00574294, 0.00186406, 0.000645566, 0.0276127, 0.000830601, 0.00319905, 0.00138296, 0.0380994, 5.20839e-5, 0.0802229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 kg (30 suppliers, which the file names only by identifier); sum of these 1 kg; lognormal variance with pedigree 0.0472, pedigree (3,3,3,5,4)
  It is assumed that in the shortage of organo-mineral fertiliser, a consumer of it will turn its consumption pattern and use an inorganic fertiliser. In theory, the inorganic fertiliser, can substitute the organo-mineral fertiliser, in an equal mass ratio, considering only the nutrient content.
  properties: dry mass 1 kg, wet mass 1 kg
