# sugarcane production

Dataset: EcoSpold 2, unit process
Geography: CO
Time period: 2005-01-01 to 2023-01-01
Technology level: current
Classification: EcoSpold01Categories: agricultural production/plant production
Classification: ISIC rev.4 ecoinvent: 0114:Growing of sugar cane
Scenario: Business-as-Usual
System model: Allocation, cut-off by classification
Share of production covered: 15 %
Generated by: Simon Gmünder
Published in: CUE 2012
Database: ecoinvent
isCopyrightProtected: true
accessRestrictedTo: 1

## General comment
This dataset represents the production of sugar cane in Colombia. All the exchanges are calculated per kg of sugar cane (wet mass). The inventory for the cultivation of sugar cane in Colombia is based on field data from the main industrial sugar cane cultivation area in Colombia (Valle geografico del Rio Cauca).
In Colombia the average crop cycle of sugar cane is 12.6 months and it is cultivated for 6 cycles (ratoon crops) before the plantation is renewed. The average productivity is 111.5 tons of sugar cane per hectare and year. Before harvesting, 70% of the area is burned. The inventory of sugar cane cultivation in Colombia includes the use of mineral and organic fertilizers, pesticides, irrigation, machinery and the field emissions from pre-harvest burning, as well as from the fertilizer and pesticide application.
The total nutrient application is 161 kg N, 13 kg P2O5 and 34 kg K2O per hectare and year from mineral fertilizers (urea, potassium chloride, DAP, ammonium sulphate, etc.) and organic fertilizers (manure, compost and vinasse).
The field is irrigated with 1140m3 per hectare and year.
The applied active ingredients for pest control include glyphosate, [sulfonyl]urea-compound, triazine-compound, atrazine and phenoxy-compound.

## Included activities start
From preparing the land and planting sugar cane.

## Included activities end
This dataset ends with the harvesting of sugarcane and includes the land preparation and the crop management (fertilizers, pesticides, and machinery).

## Geography
The inventory is modeled for Colombia (Valle geografico del Rio Cauca) based on field data representing 32215 ha (15% of the total sugar cane plantation area in Colombia).

## Technology
Cultivation of sugar cane with 30 % mechanical harvest and 70 % manual harvest.

## Time period
Time period of the most of the data collected for this dataset.

## Parameters
- LUC_crop_specific: 1 dimensionless; lognormal variance with pedigree 0.0018, pedigree (2,3,1,1,1)
  Crop sepcific appraoch used.
  Uncertainty: S
- Plant growing period: 12.7 month; name grow_period; lognormal variance with pedigree 0.0018, pedigree (2,3,1,1,1)
  Measured value (field data): Duration of growing season of plants (in months). The growing period of sugar cane cultivation in Colombia ranges from 12 months to 13.5 months and is in average 12.7 months.
  Uncertainty: S
- cadmium content: 5.4e-9 dimensionless; name Cd_content_sugarcane; = 0.0054*UnitConversion(1, 'mg', 'kg'); lognormal variance with pedigree 0.262, pedigree (5,5,3,5,5)
  Literature Value: HM sugarcane, 2002, Raymenta GE., Jeffreya AJ., Barry GA., Heavy Metals in Australian Sugarcane, Communications in Soil Science and Plant, 15, 33, Taylor & Francis, 1 - Article
  Uncertainty: S
- chromium content: 1.43e-7 dimensionless; name Cr_content_sugarcane; = 0.55*UnitConversion(1, 'mg', 'kg')* DM_sugarcane; lognormal variance with pedigree 0.262, pedigree (5,5,3,5,5)
  Literature Value: Heavy-metal content of plant material (approximation: generic mean) from the report "01_crop production_direct field emissions and natural resources_v1.0.pdf", Tab. A.1 - pdf-document on the dedicated talk page of ecoinvent (www.ecoinvent.org/documentation)
  Uncertainty: S
- compost field application: 2235 kg/ha; name compost; lognormal variance with pedigree 0.0018, pedigree (2,3,1,1,1)
  Measured value (field data): Per hectare 2235 kg of compost is applied during the land preparation.
  Uncertainty: S
- copper content: 3.9e-7 dimensionless; name Cu_content_sugarcane; = 0.39*UnitConversion(1, 'mg', 'kg'); lognormal variance with pedigree 0.262, pedigree (5,5,3,5,5)
  (same comment as for cadmium content)
- dry mass: 0.26 kg; name DM_sugarcane; lognormal variance with pedigree 0.0406, pedigree (1,1,5,1,1)
  Literature value: Dry mass of sugar cane in Colombia [%].
  Source: Cenicaña, 1995, Larrahondo JE., Calidad de la Caña de Azúcar, Cassalett D., Torres A., Isaacs E., El cultivo de la caña en la zona azucarera de Colombia, Cali, Colombia, Cenicaña, 0 - Undefined
  Uncertainty: S
- fraction, irrigation water to surface water: 0.2 dimensionless; name fraction_IW_to_surface_water; lognormal variance with pedigree 0.0886, pedigree (4,3,1,1,4)
  Literature value (Doll, 2011) cross referenced with expert opinion.
- fraction, irrigation water, to air: 0.43 dimensionless; name fraction_IW_to_air; = 0.825*0.5+(1-0.825)*0.1; lognormal variance with pedigree 0.0409, pedigree (2,2,2,1,1)
  Calculated value: The dominant sugar cane irrigation system in Colombia is the open gravity canal (82.5%) and on some plantations more efficient pipe irrigation systems are used (17.5%). The water emissions are calculated based on the irrigation efficiency of 50% for open gravity canals and 90% for drip irrigation.
- fraction, irrigation water, to ground water: 0.8 dimensionless; name fraction_IW_to_ground_water; lognormal variance with pedigree 0.0886, pedigree (4,3,1,1,4)
  Literature value (Doll, 2011) cross referenced with expert opinion.
- harvest residues: 12.7559 metric ton/ha; name harvest_residues; = 45*0.3*12/ grow_period; lognormal variance with pedigree 0.0018, pedigree (2,3,1,1,1)
  Measured value (field data): Harvest residues [t dry matter / hectare] in Colombia: 45 ton fresh matter per ha of sugar cane residues per growing period with a dry matter content of 30%.
  Uncertainty: S
- lead content: 2e-8 dimensionless; name Pb_content_sugarcane; = 0.02*UnitConversion(1, 'mg', 'kg'); lognormal variance with pedigree 0.262, pedigree (5,5,3,5,5)
  (same comment as for cadmium content)
- nickel content: 2.704e-7 dimensionless; name Ni_content_sugarcane; = 1.04*UnitConversion(1, 'mg', 'kg')*DM_sugarcane; lognormal variance with pedigree 0.262, pedigree (5,5,3,5,5)
  (same comment as for chromium content)
- nitrogen content: 0.0023 dimensionless; name N_content_sugarcane; lognormal variance with pedigree 0.1233, pedigree (1,3,3,3,5)
  Literature value: nitrogen uptake of sugarcane [kg N kg fresh matter] based on the SQCB background report - Table 8-3.
  Source: SQCB, 2009, Faist Emmenegger M., Reinhard J., Zah R., Ziep T., Weichbrodt R., Wohlgemuth V., Roches A., Freiermuth Knuchel R, Gaillard G., Sustainability Quick Check for Biofuels - Background report., Dübendorf, 0 - Undefined
  Uncertainty: S
- poultry manure field application: 11.15 kg/ha; name poultry_manure; lognormal variance with pedigree 0.0018, pedigree (2,3,1,1,1)
  Measured value (field data): Per hectare 11.15 kg of dried poultry manure is applied every year.
  Uncertainty: S
- pre-harvest burning: 0.7 dimensionless; name pre_harvest_burning; lognormal variance with pedigree 0.0018, pedigree (2,3,1,1,1)
  Estimation: Percent pre-harvest burning of sugar cane fields, based on personal communication with Cenicaña (2011).
  Uncertainty: S
- pre-harvest burning efficiency: 0.8 dimensionless; name burning_efficiency; lognormal variance with pedigree 0.21, pedigree (5,5,5,5,5)
  Literature value: Burning efficency of DM [%]
  Source: USP, 2000, Rípoli TCC., Molina WF., Rípoli MLC., Energy potential of sugar cane biomass in Brazil, Scientia Agricola, 57, 4, 667-681, 1 - Article
  Uncertainty: S
- precipitation: 1000 mm; lognormal variance with pedigree 0.3006, pedigree (2,1,1,1,1)
  Measured value (local data): Total annual precipitation (mm). The annual rainfall in the sugar cane valley of Colombia (Valle geographico del rio Cauca) ranges from 800 to 1600 mm and is in average 1000mm.
  Uncertainty: S
- rooting depth: 1.6 m; name L; lognormal variance with pedigree 0.0487, pedigree (1,5,1,3,2)
  Literature value: The plant rooting depth [m] is derived from Table 2.15 "Crops and their rooting depth as assumed for calculations" from the ecoinvent report "01_crop production_direct field emissions and natural resources_v1.0.pdf" - pdf-document on the dedicated talk page of ecoinvent (www.ecoinvent.org/documentation).
  Uncertainty: S
- total nitrogen: 160.876 kg/ha; name Ntot; = (urea*0.4664616327339393+ammonium_sulfate+vinasse_kg*0.00026211+nitrogen_fertiliser+compost_kg*0.7/100+pm_kg*4.6/100)*yield_agriculture*1000; lognormal variance with pedigree 0.0018, pedigree (2,3,1,1,1)
  Calculated value: Total nitrogen in mineral and organic fertilizers (kg N/ha). The total Nitrogen applied has been calculated based on the molecular composition of the applied fertilizers.
  The total N content of vinasse [kg/l] is taken fromthe report "01_crop production_direct field emissions and natural resources_v1.0.pdf", Tab. 2.5 - pdf-document on the dedicated talk page of ecoinvent (www.ecoinvent.org/documentation).
  Uncertainty: S
- vinasse field application: 1627 kg/ha; name vinasse; lognormal variance with pedigree 0.0018, pedigree (2,3,1,1,1)
  Measured value (field data): Per hectare 1627kg of Vinasse is applied every year.
  Uncertainty: S
- yield, agriculture: 111.53 metric ton/ha; name yield_agriculture; lognormal variance with pedigree 0.0018, pedigree (2,3,1,1,1)
  Measured value (field data): The average annual yield of sugar cane in Colombia is 113.5 ton/ha. However, for the establishment of sugar cane plantations 5 to 10 t of sugar cane cuttings are required per hectare. In this study 10 t seed per ha is assumed. The use of cuttings is included in the calculation of the sugar cane productivity, by reducing the yields.
  Uncertainty: S
- zinc_content: 1.43e-6 dimensionless; name Zn_content_sugarcane; = 1.43*UnitConversion(1, 'mg', 'kg'); lognormal variance with pedigree 0.262, pedigree (5,5,3,5,5)
  (same comment as for cadmium content)

## Reference product
- sugarcane: 1 kg; By-product classification allocatable product; CPC 01802: Sugar cane; HS2017 121293: Sugar cane; fit for human consumption, fresh, chilled, frozen or dried, whether or not ground
  Harvested sugar cane stalks from Colombia with a moisture content of 74%. Pre-harvest burning of 70% of the fields.
  production volume 2.11279e7 kg
    Average annual production volumes in Colombia for 2001-2009 according to Asocaña
  property cadmium content 5.4e-9; = Cd_content_sugarcane
    Literature Value
  property carbon content, non-fossil 0.461538; = 0.12/ DM_sugarcane
    Literature Value: biogene carbon content on a dry matter basis.
  property chromium content 1.43e-7; = Cr_content_sugarcane
    Literature Value: Heavy-metal content of plant material (approximation: generic mean) from the report "01_crop production_direct field emissions and natural resources_v1.0.pdf", Tab. A.1 - pdf-document on the dedicated talk page of ecoinvent (www.ecoinvent.org/documentation)
  property copper content 3.9e-7; = Cu_content_sugarcane
    Literature Value
  property dry mass 0.26 kg; = DM_sugarcane
  property heating value, gross 4.95 MJ
    Literature value: The gros heating value of 4.95 MJ/kg for sugar cane is derived from Jungluth et al (2007).
  property heating value, net 0.0023 MJ; = N_content_sugarcane
    Literature value: nitrogen uptake of sugarcane [kg N kg fresh matter] based on the SQCB background report - Table 8-3.
  property lead content 2e-8; = Pb_content_sugarcane
    Literature Value
  property nickel content 2.704e-7; = Ni_content_sugarcane
    (same comment as for sugarcane)
  property nitrogen content 0.0023; = N_content_sugarcane
    (same comment as for sugarcane)
  property price 0.0281 EUR2005
    Average 2005 prices for main producers of sugarcane, namely Brasil, India, China, Thailand, Pakistan and Mexico. from Import/Export data (US$ and tonnes) in FAO Producer prices Statistics Database; Comodity: sugar cane (Producer Prices)
  property water content 2.84615; = (1- DM_sugarcane)/ DM_sugarcane
  property zinc content 1.43e-6; = Zn_content_sugarcane
    Literature Value
  properties: carbon allocation 0.12 kg, carbon content 0.461538, wet mass 1 kg

## Inputs from technosphere
- [sulfonyl]urea-compound: 1.48839e-5 kg; name sulfonyl; = 1.66/yield_agriculture/1000; lognormal variance with pedigree 0.0098, pedigree (2,3,4,1,1)
  Measured value (field data): 1.66 kg [sulfonyl]urea-compounds are applied per hectare.
  Uncertainty: S
- ammonium sulfate: 0.00016626 kg; name ammonium_sulfate; = 88.3*0.21 / yield_agriculture/1000; lognormal variance with pedigree 0.0098, pedigree (2,3,4,1,1)
  Measured value (field data): Per hectare 88.3 kg of ammonium sulphate (N-content of 21%) is applied every year.
  Uncertainty: S
  property cadmium content 2.4e-7; name Cd_content_ammonium_s
  property chromium content 9.52e-6; name Cr_content_ammonium_s
  property copper content 1.91e-5; name Cu_content_ammonium_s
  property lead content 5.24e-6; name Pb_content_ammonium_s
  property nickel content 8.57e-6; name Ni_content_ammonium_s
  property zinc content 0.000143; name Zn_content_ammonium_s
  note on cadmium content: Literature value: Heavy-metal content of mineral fertilizer from the report "01_crop production_direct field emissions and natural resources_v1.0.pdf", Tab. A.2 - pdf-document on the dedicated talk page of ecoinvent.
- application of plant protection product, by field sprayer: 5.09443e-6 ha; = 1/1.76/(yield_agriculture*1000); lognormal variance with pedigree 0.1366, pedigree (4,3,4,1,1)
  Estimation: Annual application of plant protection products in Colombia (diesel consumption: 1 kg/ha). The values used for the processes are extrapolated from the diesel use of the datasets (Application of plant protection products, by field sprayer: 1.76 kg diesel per ha).
  Uncertainty: S
- atrazine: 5.02107e-6 kg; = 0.56/(1000*yield_agriculture); lognormal variance with pedigree 0.0098, pedigree (2,3,4,1,1)
  Measured value (field data): 0.56 kg Atrazine is applied per hectare.
  Uncertainty: S
- compost: 0.00315582 kg; name compost_kg; = compost/6/grow_period*12/yield_agriculture/1000; lognormal variance with pedigree 0.0098, pedigree (2,3,4,1,1)
  (same comment as for compost field application)
  property nitrogen content 0.014; name N_compost
  properties: cadmium content 3.6e-7, carbon content, non-fossil 0.183645, chromium content 2.23e-5, copper content 5.77e-5, dry mass 0.5 kg, lead content 4.9e-5, mercury content 1.2e-7, nickel content 1.63e-5, phosphorus content 0.0035, potassium content 0.01, water content 1, wet mass 1 kg, zinc content 0.000184
- fertilising, by broadcaster: 3.12295e-6 ha; = (4.2+5*1.5)/5.29/(6* grow_period/12*yield_agriculture*1000); lognormal variance with pedigree 0.1306, pedigree (2,4,4,1,1)
  Estimation: During land preparation fertilizers are applied (diesel consumption: 4.2 kg /ha). After every harvest (total 6 cuttings), additional fertilizer is applied to provide optimal growth conditions for the ratoon crop (diesel consumption: 1.5 kg/ha). The values used for the processes are extrapolated from the diesel use of the datasets (fertilizing, by broadcaster: 5.29 kg diesel per ha).
  Uncertainty: S
- fodder loading, by self-loading trailer: 0.000553646 m3; = 10.73/(1000*yield_agriculture)/0.106*0.61; lognormal variance with pedigree 0.1306, pedigree (2,4,4,1,1)
  Estimation: The diesel consumption for sugar cane harvesting depends on the harvesting technique. 61% of the area is harvested manually, only requiring a cane loader is needed (diesel consumption CO: 10.73 kg/ha; diesel consumption ecoinvent crane loader: 0.106 kg/m3). The values, which are used for the processes, are extrapolated from the diesel use of the datasets..
  Uncertainty: S
- glyphosate: 7.89025e-6 kg; name Glyphosate; = 0.88/(1000*yield_agriculture); lognormal variance with pedigree 0.0098, pedigree (2,3,4,1,1)
  Measured value (field data): 0.88 kg glyphosate is applied per hectare.
  Uncertainty: S
- harvesting, sugarcane: 3.32357e-6 ha; = 62.73/(1000*yield_agriculture)/66*0.39; lognormal variance with pedigree 0.0098, pedigree (2,3,4,1,1)
  Estimation: The diesel consumption for sugar cane harvesting depends on the harvesting technique. In Colombia 39% is harvested mechanically using a combine harvester (diesel consumption CO: 62.73 kg/ha; diesel consumption ecoinvent harvester: 166 kg/ha). The values, which are used for the processes, are extrapolated from the diesel use of the datasets.
  Uncertainty: S
- inorganic nitrogen fertiliser, as N: 1.2463e-5 kg; name nitrogen_fertiliser; = 1.39/yield_agriculture/1000; lognormal variance with pedigree 0.0098, pedigree (2,3,4,1,1)
  Measured value (field data): Per hectare 1.39 kg of nitrogen fertilizer is applied every year.
  Uncertainty: S
  property cadmium content 2.1e-7; name Cd_content_n_fertilizer
  property chromium content 7.81e-6; name Cr_content_n_fertilizer
  property copper content 2.225e-5; name Cu_content_n_fertilizer
  property lead content 5.37e-6; name Pb_content_n_fertilizer
  property nickel content 1.717e-5; name Ni_content_n_fertilizer
  property zinc content 0.000121; name Zn_content_n_fertilizer
- inorganic phosphorus fertiliser, as P2O5: 0.000102842 kg; name phosphate_fertilizer; = 11.47/yield_agriculture/1000; lognormal variance with pedigree 0.0098, pedigree (2,3,4,1,1)
  Measured value (field data): Per hectare 11.47 kg of P2O5 is applied every year.
  Uncertainty: S
  property cadmium content 5.13e-5; name phosphate_fertilizer_Cd_content
  property chromium content 0.000589; name phosphate_fertilizer_Cr_content
  property copper content 0.000118; name phosphate_fertilizer_Cu_content
  property lead content 4.94e-5; name phosphate_fertilizer_Pb_content
  property nickel content 0.0001; name phosphate_fertilizer_Ni_content
  property zinc content 0.000751; name phosphate_fertilizer_Zn_content
- irrigation: 0.0583968 m3; = 6513/yield_agriculture/1000; lognormal variance with pedigree 0.0098, pedigree (2,3,4,1,1)
  Measured value (field data): Depending on the location and the irrigation technique, the irrigated water amount ranges from 1800 to 9000 m3 per ha and year and is in average 6513 m3/ha (data from field visits).
  Uncertainty: S
- land use change, perennial crop: 1.2732e-6 ha; = 1/(yield_agriculture*1000)*0.142*LUC_crop_specific+1/(yield_agriculture*1000)*0*(1-LUC_crop_specific); lognormal variance with pedigree 0.1281, pedigree (4,2,5,1,4)
  Calculated value. Based on the yield and the crop expansion in the past 20 years (FAOSTAT). Sugarcane is considered as perennial crop.
- liquid manure spreading, by vacuum tanker: 1.4588e-5 m3; = vinasse_kg/1000; lognormal variance with pedigree 0.1467, pedigree (4,3,4,3,5)
  Proxy: for vinasse spreading.
  Uncertainty: S
- packaging, for fertilisers: 0.00304107 kg; lognormal variance with pedigree 0.0592, pedigree (4,3,4,5,4)
  Total amount of active substance/s of fertilisers needed for the production of "sugarcane" is calculated to be circa 1.52E-03 kg. Fertiliser/s used in this dataset is/are: "ammonium sulfate, as N", "nitrogen fertiliser, as N", "phosphate fertiliser, as P2O5", "potassium chloride, as K2O", "urea, as N". The total amount of active substance/s is doubled in order to account for the packaging of the dilluted product of fertiliser/s that is/are applied. Therefore, 3.04E-03 kg of packaging for fertilisers is justified with this exchange.
  properties: carbon content, fossil 0.825301, dry mass 1 kg, heating value, net 25.01 MJ, price 0.0642 EUR2005, wet mass 1 kg
  note on carbon content, fossil: Considering a chemical formula (C2H4)n for polyethylene, carbon content-fossil is calculated to be 0.856286 kg of Carbon per kg of dry mass.
- packaging, for pesticides: 0.00108909 kg; lognormal variance with pedigree 0.0592, pedigree (4,3,4,5,4)
  Total amount of active substance/s of pesticides needed for the production of sugarcane is calculated to be circa 5.45E-04 kg. Pesticide/s used in this dataset is/are: "[sulfonyl]urea-compound", "atrazine", "glyphosate", "phenoxy-compound", "stone meal" (This substance can be used also as fertiliser but here it is accounted as pesticide only), "sulfur", "triazine-compound, unspecified", "zinc monosulfate", "zinc sulfide". The total amount of active substance/s is doubled in order to account for the packaging of the dilluted product of pesticide/s that is/are applied. Therefore, 1.09E-03 kg of packaging for pesticides is justified with this exchange.
  properties: carbon content, fossil 0.85714, dry mass 1 kg, heating value, net 25.97 MJ, price 0.0642 EUR2005, wet mass 1 kg
- phenoxy-compound: 8.69721e-6 kg; name phenoxy_compund; = 0.97/(1000*yield_agriculture); lognormal variance with pedigree 0.0098, pedigree (2,3,4,1,1)
  Measured value (field data): 0.97 kg phenoxy-compounds are applied per hectare.
  Uncertainty: S
- planting: 4.87476e-7 ha; = 5.8/16.8/(6* grow_period/12*yield_agriculture*1000); lognormal variance with pedigree 0.0098, pedigree (2,3,4,1,1)
  Estimation: In commercial sugarcane plantations vegetative propagation is used. Sugarcane stalks are cut into three-budded setts and "planted" in rows (diesel consumption: 5.8 kg/ha). The values used for the processes are extrapolated from the diesel use of the datasets (planting: 16.8 kg diesel per ha).
  Uncertainty: S
- potassium chloride: 9.11163e-6 kg; name potassium_chloride; = (1.07*0.6 / yield_agriculture/1000)*1.58289736294535; lognormal variance with pedigree 0.0098, pedigree (2,3,4,1,1)
  The exchange has been updated from "potassium chloride, as K2O" into "potassium chloride" and therefore its amount has been scaled (multiplied) from 0 kg by 1.5829 kg of "potassium chloride" per kg of "potassium chloride, as K2O". Original comment of the exchange is: Measured value (field data): Per hectare 1.07 kg of potassium chloride (K2O-content of 60%) is applied every year.
  Uncertainty: S
  property cadmium content 1e-7; name Cd_content_potassium_chloride
  property chromium content 3.33e-6; name Cr_content_potassium_chloride
  property copper content 8.33e-6; name Cu_content_potassium_chloride
  property lead content 9.17e-6; name Pb_content_potassium_chloride
  property nickel content 3.5e-6; name Ni_content_potassium_chloride
  property zinc content 7.67e-5; name Zn_content_potassium_chloride
  note on cadmium content: Literature value: Heavy-metal content of mineral fertilizer from the report "01_crop production_direct field emissions and natural resources_v1.0.pdf", Tab. A.2 - pdf-document on the dedicated talk page of ecoinvent
- poultry manure, dried: 9.99731e-5 kg; name pm_kg; = poultry_manure/yield_agriculture/1000; lognormal variance with pedigree 0.0098, pedigree (2,3,4,1,1)
  (same comment as for poultry manure field application)
  properties: cadmium content 2.92e-7, carbon content, non-fossil 0.33389, copper content 4.38e-5, dry mass 0.865 kg, lead content 2.92e-6, mercury content 2e-7, nickel content 4e-5, nitrogen content 0.532, phosphorus content 0.0167, potassium content 0.024, water content 0.156069, wet mass 1 kg, zinc content 0.000349
  note on cadmium content: pg 36 Tab 7. Original values are given in kg/m3, but this is an error and it is mg/kg DM
- stone meal: 0.000493141 kg; name stone_meal; = 55 / yield_agriculture/1000; lognormal variance with pedigree 0.0098, pedigree (2,3,4,1,1)
  Measured value (field data): Per hectare 55 kg of stone meal is applied every year.
  Uncertainty: S
  property cadmium content 1.2e-7; name Cd_content_stone_meal
  property chromium content 0.000314; name Cr_content_stone_meal
  property copper content 4e-6; name Cu_content_stone_meal
  property lead content 3.6e-6; name Pb_content_stone_meal
  property nickel content 1.22e-5; name Ni_content_stone_meal
  property zinc content 8e-6; name Zn_content_stone_meal
  note on cadmium content: Literature value: Heavy-metal content of mineral fertilizer (proxy from limestone) from the report "01_crop production_direct field emissions and natural resources_v1.0.pdf", Tab. A.2 - pdf-document on the dedicated talk page of ecoinvent (www.ecoinvent.org/documentation)
- sulfur: 1.43459e-6 kg; = 0.16/(1000*yield_agriculture); lognormal variance with pedigree 0.0098, pedigree (2,3,4,1,1)
  Measured value (field data): Per hectare 0.16 kg sulphite is applied every year.
  Uncertainty: S
- tillage, harrowing, by rotary harrow: 1.20309e-5 ha; = (69.9+5*5.6)/11.49/(6* grow_period/12*yield_agriculture*1000); lognormal variance with pedigree 0.1306, pedigree (2,4,4,1,1)
  Estimation: In order to prepare the land, deep pans are shattered, the compact soil is broken up and the planting tilth is prepared for a good rooting depth (diesel consumption: 69.9 kg /ha). After every harvest (total 6 cuttings), the harvest residues are mixed into the soil (diesel consumption: 5.6kg/ha). The values used for the processes are extrapolated from the diesel use of the datasets (Tillage, harrowing: 11.49 kg diesel per ha).
  Uncertainty: S
- tillage, ploughing: 1.7846e-6 ha; = 33/26.11/(6* grow_period/12*yield_agriculture*1000); lognormal variance with pedigree 0.1306, pedigree (2,4,4,1,1)
  Estimation: The land preparation includes mixing the topsoil and establishing a planting forrow (diesel consumption: 33kg per ha). The values used for the processes are extrapolated from the diesel use of the datasets (Tillage, ploughing: 26.11 kg diesel per ha).
  Uncertainty: S
- tillage, rolling: 2.57535e-6 ha; = 5.8/3.18/(6* grow_period/12*yield_agriculture*1000); lognormal variance with pedigree 0.1306, pedigree (2,4,4,1,1)
  Estimation: The land preparation includes leveling (diesel consumption: 5.8 kg per ha). The values used for the processes are extrapolated from the diesel use of the datasets (Tillage, rolling: 3.18 kg diesel per ha).
  Uncertainty: S
- tillage, rotary cultivator: 1.50106e-6 ha; = (15/14.11)/(6* grow_period/12*yield_agriculture*1000); lognormal variance with pedigree 0.1306, pedigree (2,4,4,1,1)
  Estimation: The land preparation includes the stool destruction and mixing harvest residues, consuming 15 kg of diesel per ha. The values used for the processes are extrapolated from the diesel use of the datasets (Tillage, rotary cultivator: 14.1 kg diesel per ha). The sugar cane is harvested in average 6 times every 12.7 month before a new plant is planted.
  Uncertainty: S
- triazine-compound: 1.29113e-5 kg; name triazine; = 1.44/(1000*yield_agriculture); lognormal variance with pedigree 0.0098, pedigree (2,3,4,1,1)
  Measured value (field data): Per hectare 1.44 kg triazine compounds are applied every year.
  Uncertainty: S
- urea: 0.00264376 kg; = (299*0.46/ yield_agriculture/1000 )*2.14379903903132; lognormal variance with pedigree 0.0098, pedigree (2,3,4,1,1)
  The exchange has been updated from "urea, as N" into "urea" and therefore its amount has been scaled (multiplied) from 0.0012 kg by 2.1438 kg of "urea" per kg of "urea, as N". Original comment of the exchange is: Measured value (field data): Per hectare 299 kg of Urea (N-content of 46%) is applied every year.
  Uncertainty: S
  property cadmium content 1.1e-7; name Cd_content_urea
  property chromium content 4.35e-6; name Cr_content_urea
  property copper content 1.3e-5; name Cu_content_urea
  property lead content 2.39e-6; name Pb_content_urea
  property nickel content 4.35e-6; name Ni_content_urea
  property zinc content 9.57e-5; name Zn_content_urea
- vinasse, from fermentation of sugarcane: 0.014588 kg; name vinasse_kg; = vinasse/yield_agriculture/1000; lognormal variance with pedigree 0.0098, pedigree (2,3,4,1,1)
  (same comment as for vinasse field application)
  property nitrogen content 0; name vinasse_kg_N_content
  properties: carbon content, non-fossil 0.1288, dry mass 0.0554348 kg, water content 17.0392, wet mass 1 kg
- zinc monosulfate: 3.85546e-7 kg; name zinc_monosulfate; = 0.043/yield_agriculture/1000; lognormal variance with pedigree 0.0098, pedigree (2,3,4,1,1)
  Measured value (field data): Per hectare 0.043 kg of Zinc monosulphate is applied every year.
  Uncertainty: S
- zinc sulfide: 1.79324e-7 kg; name zinc_sulfide; = 0.02/ yield_agriculture/1000; lognormal variance with pedigree 0.0098, pedigree (2,3,4,1,1)
  Measured value (field data): Per hectare 0.02 kg of ZnS is applied every year.
  Uncertainty: S

## Inputs from nature
- Carbon dioxide, in air [natural resource, in air]: 0.44 kg; = 0.12*44/12; lognormal variance with pedigree 0.0286, pedigree (4,3,4,5,1)
  Calculated value: from carbon balance.
  Uncertainty: S
- Energy, gross calorific value, in biomass [natural resource, biotic]: 4.9478 MJ; lognormal variance with pedigree 0.0086, pedigree (1,1,4,1,1)
  Calorific value present in sugarcane. Based on Ecoinvent database.
- Occupation, permanent crop, irrigated, intensive [natural resource, land]: 0.089662 m2*year; = 10000/(yield_agriculture*1000); lognormal variance with pedigree 0.0101, pedigree (1,2,4,1,1)
  Calculated value. Sugar cane is considered as a perennial crop, with periodical irrigation and the application of fertilizer and pesticide near the economicallly optimal level.
  Uncertainty: S
  property Crop factor 0.3; name Crop_factor
  property Erodibility factor 0.13; name erodibility_factor
  property Erosivity factor 488.148 metric ton/ha; name R; = 587.8-1.219*precipitation+0.004105*(precipitation+(irrigation)*yield_agriculture*1000/10)^2*0.1
  property Organic Carbon content of soil 1.23077; name Corg; = 48*(1/3000)*(1/1.3)*100
  property Organic Nitrogen content of soil 6181.82 kg/ha; name Norg; = (Corg/100*5000*1300)/11*0.85
  property P to groundwater 0.07 kg/ha; name Pgwl
  property P to surface water 0.175 kg/ha; name Prol
  property Practice factor 0.5; name Practice_factor
  property Slope 0.005; name S
  property Slope Factor 0.296642; name LS
  property Slope length 100 m; name slope_length
  property Tillage factor 0.35; name tillage_factor
  property clay content 0.49; name clay_content
- Transformation, from permanent crop, irrigated, intensive [natural resource, land]: 0.0038465 m2; = 10000/(yield_agriculture*1000)/20*(1-0.142); lognormal variance with pedigree 0.0161, pedigree (1,2,4,1,1)
  Calculated value. All visited plantations are sugar cane plantations since decades. Annual Land use transformation from sugar cane to sugar cane.
  Uncertainty: S
- Transformation, to permanent crop, irrigated, intensive [natural resource, land]: 0.0038465 m2; = 10000/(yield_agriculture*1000)/20*(1-0.142); lognormal variance with pedigree 0.0161, pedigree (1,2,4,1,1)
  (same comment as for Transformation, from permanent crop, irrigated, intensive)

## Emissions to nature
- Ammonia [air, non-urban air or from high stacks]: 0.000203265 kg; name ammonia; = ammonium_sulfate*0.08+ nitrogen_fertiliser*0.02+ pm_kg* 9/1000* 0.3+ urea*0.466461632733939*0.15+ vinasse_kg*0.27*0.5*0.6/1000+ compost_kg* 1.3/1000*0.8; source Nemecek T. 2012; lognormal variance with pedigree 0.0386, pedigree (4,3,4,5,1)
  Calculated value: according to the "AGRAMMON model" described in "01_crop production_direct field emissions and natural resources_v1.0.pdf" - pdf-document on the dedicated talk page of ecoinvent (www.ecoinvent.org/documentation)
  Uncertainty: S
- Carbon dioxide, fossil [air, non-urban air or from high stacks]: 0.00193614 kg; = 1.57* urea*0.466461632733939; lognormal variance with pedigree 0.3, pedigree (5,5,5,5,5)
  Calculated value. Carbon dioxide emissions from urea application (1.57kg CO2 / kg Urea-N), following the guidleine of the WFLDB, chapter 3.09.10
- Carbon monoxide, non-fossil [air, non-urban air or from high stacks]: 0.00589244 kg; = harvest_residues/ yield_agriculture* pre_harvest_burning* burning_efficiency*0.092; lognormal variance with pedigree 0.0646, pedigree (4,5,4,4,1)
  Emissions of straw burning in the field. The emissions factors are based on Greet (2010).
- Dinitrogen monoxide [air, non-urban air or from high stacks]: 3.42653e-5 kg; name dinitrogen_monoxide; = 44/28*(0.01*( Ntot+ harvest_residues*1000*(1- (pre_harvest_burning*burning_efficiency))* 0.0026)+0.01*14/17* ammonia*1000* yield_agriculture+0.0075*14/62* Nitrate*1000* yield_agriculture)/(1000* yield_agriculture)+harvest_residues*1000* pre_harvest_burning* burning_efficiency*0.07*UnitConversion(1, 'g', 'kg')/yield_agriculture/1000; source Nemecek T. 2012; lognormal variance with pedigree 0.0686, pedigree (4,3,4,5,1)
  Calculated value: N2O emissions from fertilizer application based on calculations according to chapter "Emissions of N2O to the air" in "01_crop production_direct field emissions and natural resources_v1.0.pdf" - pdf-document on the dedicated talk page of ecoinvent (www.ecoinvent.org/documentation). Field emission factors from pre-harvest burning are based on the emission factor from IPCC (0.07g N2O /kg burned DM).
  Uncertainty: S
- Methane, non-fossil [air, non-urban air or from high stacks]: 0.00017293 kg; = harvest_residues/ yield_agriculture* pre_harvest_burning* burning_efficiency*0.0027; lognormal variance with pedigree 0.0646, pedigree (4,5,4,4,1)
  Emissions of straw burning in the field. The emissions factors are based on Greet (2010).
- NMVOC, non-methane volatile organic compounds [air, non-urban air or from high stacks]: 0.000448338 kg; = harvest_residues/ yield_agriculture* pre_harvest_burning* burning_efficiency*0.007; lognormal variance with pedigree 0.0646, pedigree (4,5,4,4,1)
  Emissions of straw burning in the field. The emissions factors are based on Greet (2010).
- Nitrogen oxides [air, non-urban air or from high stacks]: 0.000166375 kg; = 0.21* (dinitrogen_monoxide-harvest_residues*1000* pre_harvest_burning* burning_efficiency*0.07*UnitConversion(1, 'g', 'kg')/yield_agriculture/1000)+harvest_residues*1000* pre_harvest_burning* burning_efficiency*2.5*UnitConversion(1, 'g', 'kg')/yield_agriculture/1000; source Nemecek T. 2012; lognormal variance with pedigree 0.0686, pedigree (4,3,4,5,1)
  Calculated value: Field emissions from fertilizer application see chapter "Emissions of NOx to the air" in "01_crop production_direct field emissions and natural resources_v1.0.pdf" - pdf-document on the dedicated talk page of ecoinvent (www.ecoinvent.org/documentation). Field emissions from pre-harvest burning based on the emission factor from IPCC (2.5g NO /kg burned DM).
  Uncertainty: S
- Particulate Matter, < 2.5 um [air, non-urban air or from high stacks]: 0.000249788 kg; = harvest_residues/ yield_agriculture* pre_harvest_burning* burning_efficiency*0.0039; lognormal variance with pedigree 0.0646, pedigree (4,5,4,4,1)
  Emissions of straw burning in the field. The emissions factors are based on Greet (2010).
- Particulate Matter, > 2.5 um and < 10um [air, non-urban air or from high stacks]: 0.000499577 kg; = harvest_residues/ yield_agriculture* pre_harvest_burning* burning_efficiency*0.0078; lognormal variance with pedigree 0.0646, pedigree (4,5,4,4,1)
  Emissions of straw burning in the field. The emissions factors are based on Greet (2010).
- Sulfur dioxide [air, non-urban air or from high stacks]: 2.56193e-5 kg; = harvest_residues/ yield_agriculture* pre_harvest_burning* burning_efficiency*0.0004; lognormal variance with pedigree 0.0646, pedigree (4,5,4,4,1)
  Emissions of straw burning in the field. The emissions factors are based on Greet (2010).
- Water [air, unspecified]: 0.0251106 m3; name water_to_air; = irrigation* fraction_IW_to_air; lognormal variance with pedigree 0.0907, pedigree (4,4,5,3,4)
  Estimated value: The dominant sugar cane irrigation system in Colombia is the open gravity canal (82.5%) and on some plantations more efficient pipe irrigation systems are used (17.5%). The water emissions are calculated based on the irrigation efficiency of 50% for open gravity canals and 90% for drip irrigation. The water infiltrated is assussumed to reach the ground water (80%) and surface water (20%).
  Uncertainty: S
- 2,4-D [soil, agricultural]: 8.69721e-6 kg; = phenoxy_compund; source Nemecek T. 2012; lognormal variance with pedigree 0.218, pedigree (4,5,5,5,5)
  Calculated value: calculations according to chapter "Emissions of Pesticides to Agricultural Soil" in "01_crop production_direct field emissions and natural resources_v1.0.pdf" - pdf-document on the dedicated talk page of ecoinvent (www.ecoinvent.org/documentation)
  Uncertainty: S
- Ametryn [soil, agricultural]: 1.29113e-5 kg; = triazine; source Nemecek T. 2012; lognormal variance with pedigree 0.218, pedigree (4,5,5,5,5)
  Calculated value: calculations according to chapter "Emissions of Pesticides to Agricultural Soil" in "01_crop production_direct field emissions and natural resources_v1.0.pdf" - pdf-document on the dedicated talk page of ecoinvent (www.ecoinvent.org/documentation). 40% of the triazine herbicides are based on ametryn and 60% on terbutryn. Since the environmental emission "terbutryn to soil" does not exist, the emission is modeled as 100% ametryn to the soil (both active ingredients are classified as emthylthiotrazine herbicides).
  Uncertainty: S
- Atrazine [soil, agricultural]: 5.02107e-6 kg; = atrazine; source Nemecek T. 2012; lognormal variance with pedigree 0.218, pedigree (4,5,5,5,5)
  (same comment as for 2,4-D)
- Cadmium II [soil, agricultural]: 1.50496e-9 kg; = ( phosphate_fertilizer* phosphate_fertilizer_Cd_content+ammonium_sulfate*Cd_content_ammonium_s+ 1.9E-07* compost_kg+ Cd_content_n_fertilizer* nitrogen_fertiliser+ Cd_content_potassium_chloride* potassium_chloride*0.631752900351838+ pm_kg* 0.5 * 2.525E-07+ Cd_content_stone_meal* stone_meal+ Cd_content_urea* urea*0.466461632733939+ 5.34E-08* vinasse_kg)- Cd_content_sugarcane; source Nemecek T. 2012; lognormal variance with pedigree 0.268, pedigree (4,5,5,5,5)
  Calculated value: calculations according to chapter "Emissions of heavy metals to agricultural soil, surface water and ground water" in "01_crop production_direct field emissions and natural resources_v1.0.pdf" - pdf-document on the dedicated talk page of ecoinvent (www.ecoinvent.org/documentation)
  Heavy-metal content of compost approximated from "litter from broilers" with a dry matter content of 65% based on the report "01_crop production_direct field emissions and natural resources_v1.0.pdf", Tab. A.2 - pdf-document on the dedicated talk page of ecoinvent.
  Heavy-metal content of farmyard manure and organic fertilizers (litter from hens) from the report "01_crop production_direct field emissions and natural resources_v1.0.pdf", Tab. A.3 - pdf-document on the dedicated talk page of ecoinvent (www.ecoinvent.org/documentation <http://www.ecoinvent.org/documentation>)
  Heavy-metal content of vinasse is approximated from "Cattle liquid manure" with a dry matter content of 30% based on the report "01_crop production_direct field emissions and natural resources_v1.0.pdf", Tab. A.3 - pdf-document on the dedicated talk page of ecoinvent.
  Uncertainty: S
- Chromium III [soil, agricultural]: 1.1734e-7 kg; = ( phosphate_fertilizer* phosphate_fertilizer_Cr_content+ammonium_sulfate*Cr_content_ammonium_s+ 6.5E-06* compost_kg+ Cr_content_n_fertilizer* nitrogen_fertiliser+ Cr_content_potassium_chloride* potassium_chloride*0.631752900351838+ 5.5E-06* 0.5* pm_kg+ Cr_content_stone_meal* stone_meal+ Cr_content_urea* urea*0.466461632733939+1.17E-06* vinasse_kg)- Cr_content_sugarcane; source Nemecek T. 2012; lognormal variance with pedigree 0.268, pedigree (4,5,5,5,5)
  (same comment as for Cadmium II)
- Copper ion [soil, agricultural]: -1.02512e-7 kg; name Copper; = ( phosphate_fertilizer* phosphate_fertilizer_Cu_content+ammonium_sulfate*Cu_content_ammonium_s+ 2.85E-05* compost_kg+ Cu_content_n_fertilizer* nitrogen_fertiliser+ Cu_content_potassium_chloride* potassium_chloride*0.631752900351838+ 3.96E-05*0.5* pm_kg+ Cu_content_stone_meal* stone_meal+ Cu_content_urea* urea*0.466461632733939+ 1.11E-05* vinasse_kg)- Cu_content_sugarcane; source Nemecek T. 2012; normal variance with pedigree 0.09, pedigree (4,5,5,5,5)
  Calculated value: calculations according to chapter "Emissions of heavy metals to agricultural soil, surface water and ground water" in "01_crop production_direct field emissions and natural resources_v1.0.pdf" - pdf-document on the dedicated talk page of ecoinvent (www.ecoinvent.org/documentation)
  Heavy-metal content of compost approximated from "litter from broilers" with a dry matter content of 65% based on the report "01_crop production_direct field emissions and natural resources_v1.0.pdf", Tab. A.2 - pdf-document on the dedicated talk page of ecoinvent.
  Heavy-metal content of farmyard manure and organic fertilizers (litter from hens) from the report "01_crop production_direct field emissions and natural resources_v1.0.pdf", Tab. A.3 - pdf-document on the dedicated talk page of ecoinvent (www.ecoinvent.org/documentation <http://www.ecoinvent.org/documentation>)
  Heavy-metal content of vinasse is approximated from "Cattle liquid manure" with a dry matter content of 30% based on the report "01_crop production_direct field emissions and natural resources_v1.0.pdf", Tab. A.3 - pdf-document on the dedicated talk page of ecoinvent.
- Diuron [soil, agricultural]: 1.48839e-5 kg; = sulfonyl; source Nemecek T. 2012; lognormal variance with pedigree 0.218, pedigree (4,5,5,5,5)
  (same comment as for 2,4-D)
- Glyphosate [soil, agricultural]: 7.89025e-6 kg; = Glyphosate; source Nemecek T. 2012; lognormal variance with pedigree 0.268, pedigree (4,5,5,5,5)
  (same comment as for 2,4-D)
- Lead II [soil, agricultural]: 1.33865e-8 kg; name Lead; = ( phosphate_fertilizer* phosphate_fertilizer_Pb_content+ammonium_sulfate*Pb_content_ammonium_s+ 1.9E-06* compost_kg+ Pb_content_n_fertilizer* nitrogen_fertiliser+ Pb_content_potassium_chloride* potassium_chloride*0.631752900351838+ 2.24E-06*0.5* pm_kg+ Pb_content_stone_meal* stone_meal+ Pb_content_urea* urea*0.466461632733939+ 1.13E-06* vinasse_kg)- Pb_content_sugarcane; source Nemecek T. 2012; lognormal variance with pedigree 0.268, pedigree (4,5,5,5,5)
  (same comment as for Cadmium II)
- Nickel II [soil, agricultural]: -1.45811e-7 kg; = ( phosphate_fertilizer* phosphate_fertilizer_Ni_content+ammonium_sulfate*Ni_content_ammonium_s+ 2.6E-05* compost_kg+ Ni_content_n_fertilizer* nitrogen_fertiliser+ Ni_content_potassium_chloride* potassium_chloride*0.631752900351838+ 7.9E-06*0.5*pm_kg+ Ni_content_stone_meal* stone_meal+ Ni_content_urea* urea*0.466461632733939+1.29E-06* vinasse_kg)- Ni_content_sugarcane; source Nemecek T. 2012; normal variance with pedigree 0.09, pedigree (4,5,5,5,5)
  (same comment as for Copper ion)
- Sulfur [soil, unspecified]: 1.43459e-6 kg; = sulfur; source Nemecek T. 2012; lognormal variance with pedigree 0.218, pedigree (4,5,5,5,5)
  (same comment as for 2,4-D)
- Zinc II [soil, unspecified]: 2.45123e-7 kg; = ( phosphate_fertilizer* phosphate_fertilizer_Zn_content+ammonium_sulfate*Zn_content_ammonium_s+ 0.000227* compost_kg+ Zn_content_n_fertilizer* nitrogen_fertiliser+ Zn_content_potassium_chloride* potassium_chloride*0.631752900351838+ 0.000468* 0.5* pm_kg+ Zn_content_stone_meal* stone_meal+ Zn_content_urea* urea*0.466461632733939+ 4.87E-05* vinasse_kg)- Zn_content_sugarcane; source Nemecek T. 2012; lognormal variance with pedigree 0.268, pedigree (4,5,5,5,5)
  (same comment as for Cadmium II)
- Nitrate [water, ground-]: 0.000912454 kg; = (21.37+( precipitation+(irrigation)*yield_agriculture*1000/10)/( clay_content*L)*(0.0037* Ntot+0.0000601* Norg-0.00362* N_content_sugarcane*1000* yield_agriculture))/(1000* yield_agriculture); source Nemecek T. 2012; lognormal variance with pedigree 0.0586, pedigree (4,3,4,5,1)
  Calculated value: Modelled with the "SQCB-NO3 model" described in "01_crop production_direct field emissions and natural resources_v1.0.pdf" - pdf-document on the dedicated talk page of ecoinvent (www.ecoinvent.org/documentation).
  Uncertainty: S
- Phosphate [water, ground-]: 1.92339e-6 kg; = Pgwl*(1+0.2/80* 0.00029* vinasse_kg)*95/31/yield_agriculture/1000; source Faist Emmenegger M. 2009; lognormal variance with pedigree 0.2166, pedigree (4,5,5,4,5)
  Calculated value: calculated according to the "Phosphate leaching to ground water" approach described in "01_crop production_direct field emissions and natural resources_v1.0.pdf" -Chapter 2.3.1- pdf-document on the dedicated talk page of ecoinvent (www.ecoinvent.org/documentation). Molecular weight for PO4: 95 and for P: 31.
  Uncertainty: S
- Phosphorus [water, surface water]: 3.54451e-6 kg; = (R*erodibility_factor*LS* Crop_factor* tillage_factor* practice_factor)*0.2*2*1*12/12/yield_agriculture/1000; source Faist Emmenegger M. 2009; lognormal variance with pedigree 0.2166, pedigree (4,5,5,4,5)
  Calculated value: calculated according to the "Phosphorous emissions trough water erosion to surface water" approach in the SQCB background report. Fraction of phosphorus loss which effectively reaches the surface water system is 0.2. The enrichment factor is 2 and phosphorous concentration in the soil is 1 kg P / t soil.
  Uncertainty: S
- Water [water, ground-]: 0.026629 m3; = irrigation*(1- fraction_IW_to_air)* fraction_IW_to_ground_water; lognormal variance with pedigree 0.0907, pedigree (4,4,5,3,4)
  (same comment as for Water)
- Water [water, surface water]: 0.00665724 m3; = irrigation*(1- fraction_IW_to_air)* fraction_IW_to_surface_water; lognormal variance with pedigree 0.0907, pedigree (4,4,5,3,4)
  (same comment as for Water)

## Sampling procedure
Field data. The main sugar cane cultivation area (216768 ha) in Colombia is located in the "Valle geografico del Rio Cauca". Out of the total area under sugar cane cultivation, 7 plantations (32215 ha, 15% of the total area) were randomly selected for the LCI data collection. The average LCI values from the 7 plantations were used (weighted average by size of the plantation).

## Extrapolations
Carbon content and gross calorific value are based on ecoinvent database.

## Review by Jens Lansche 2017-12-11
All review comments considered
