# sweet gas, burned in gas turbine

Dataset: EcoSpold 2, unit process
Geography: GLO
Time period: 1991-01-01 to 2023-12-31
Technology level: current
Classification: EcoSpold01Categories: natural gas/power plants
Classification: ISIC rev.4 ecoinvent: 3510:Electric power generation, transmission and distribution
Scenario: Business-as-Usual
System model: Allocation, cut-off by classification
Share of production covered: 100 %
Generated by: Christoph Meili
Published in: Meili, C. 2022
Database: ecoinvent
isCopyrightProtected: true
accessRestrictedTo: 1

## General comment
Burning of sweet natural gas in a turbine for on-site electricity generation in the production of crude petroleum oil and natural gas.
Following the approach of Meili et al. (2021), region-specific emission data for the overall production of crude oil and natural gas are considered for CH4, NOx and SO2 (as described in chapters 9.2 and 9.5 in Meili et al., 2021). Only the remaining combustion gases released are included in this inventory for sweet natural gas burned in gas turbine.
Source: C. Meili, N. Jungbluth, M. Bussa (2021) Life cycle inventories of crude oil and natural gas extraction. ESU-services Ltd. commissioned by the Federal Office for the Environment (FOEN) and the “Verband der Schweizerischen Gasindustrie (VSG), Schaffhausen, Switzerland, DOI: 10.13140/RG.2.2.29142.78409, http://esu-services.ch/data/public-lci-reports/

## Included activities end
Providing of compression energy by the exploitation of (sweet) gas fields.

## Geography
Data for infrastructure requirements, CO2, CO and NMVOC is based on Norwegian data, data for the rest is not geographically defined.

## Technology
The main part of the inventory is based on the Norwegian data (offshore combined production). No information about technology. As the data is an average over all gas turbines, motors and boilers in the Norwegian gas and oil production it can be assumed that different technologies are represented.

## Time period
Average of 1999-2000 is used for CH4, CO2, NMVOC, NO2 (data from the Norwegian offshore combined production). Data for CO, N2O, SO2, Hg, Radon-222 and waste heat are based on data from 1991 in Frischknecht et al. 1996, Tab. V.6.7.

## Reference product
- sweet gas, burned in gas turbine: 1 MJ; name RP_amount; By-product classification allocatable product; CPC 17100: Electrical energy; HS2017 271121: Petroleum gases and other gaseous hydrocarbons; in gaseous state, natural gas
  EcoSpold01Location=NO
  production volume 6.46947e11 MJ
    2.98 E9 Sm3 burnt natural gas
    Dummy value to be replaced by measured, estimated or calculated value
    Estimated natural gas consumption in power plants in IEA key world energy statistics 2004-2006. It is assumed that shares of gas power plant, 100MWe is 45%, gas power plant, 300 MWe is 45%, gas motor 205 kW is 4.5%, gas turbine is 4.5%, gas combined cycle power plant is 1%. In Western Europe, shares of sweet natural gas is 91% and sour natural gas is 9%. For the world, sour gas is 30% and sweet gas is 70%.
  property price 3.08238e-5 EUR2005
    Calculated based on inputs: The price of the product has been calculated as a sum of the values of the material and energy inputs for this product. This value is therefore a rough estimation. It may underestimate the real price since there are additional expenses when producing any product. These expences can include for example labour costs, treatment of waste materials and profit for the producer. Please consider carefully whether this level of data quality is acceptable for your application.
  properties: carbon allocation 0 kg, carbon content 0, heating value, net 1 MJ

## Inputs from technosphere
- gas turbine, 10MW electrical: 3.37e-10 unit; = 3.37E-10*abs(RP_amount); lognormal variance with pedigree 0.022, pedigree (1,1,3,5,3)
  Literature value (environmental report for Norway).
  EcoSpold01Location=RER
  Uncertainty: environmental report for Norway

## Inputs from nature
- Gas, natural [natural resource, in ground]: 0.0278 Sm3; = 0.0278*abs(RP_amount); lognormal variance with pedigree 0.004, pedigree (1,1,3,5,1)
  Literature value (environmental report for Norway).
  Uncertainty: environmental report for Norway
- Oxygen [natural resource, in air]: 0.048721 kg; = (2*15.999)/(1*12.011+2*15.999)*CO2_amount+(1*15.999)/(1*12.011+1*15.999)*CO_amount+(1*15.999)/(2*14.007+1*15.999)*N2O_amount+(1.5*15.999)/(1*14.007+1.5*15.999)*NOx_amount+(2*15.999)/(1*32.06+2*15.999)*SO2_amount; lognormal variance with pedigree 0.004, pedigree (1,1,3,5,1)
  Input of oxygen from air, balanced stoichometrically against emissions of CO, CO2, NOx, and SO2. Uncertainty set equal to that of CO2.
  Uncertainty: environmental report for Norway

## Emissions to nature
- Carbon dioxide, fossil [air, non-urban air or from high stacks]: 0.0669 kg; name CO2_amount; = 0.0669*abs(RP_amount); lognormal variance with pedigree 0.004, pedigree (1,1,3,5,1)
  (same comment as for Gas, natural)
- Carbon monoxide, fossil [air, non-urban air or from high stacks]: 0.000139 kg; name CO_amount; = 1.39E-4*abs(RP_amount); lognormal variance with pedigree 0.654, pedigree (1,1,3,5,1)
  (same comment as for Gas, natural)
- Dinitrogen monoxide [air, non-urban air or from high stacks]: 2.5e-7 kg; name N2O_amount; = 2.5E-7*abs(RP_amount); lognormal variance with pedigree 0.046, pedigree (3,1,3,5,1)
  Estimated value.
  Uncertainty: based on assumptions
- Mercury II [air, non-urban air or from high stacks]: 2.78e-9 kg; = 2.78E-9*abs(RP_amount); lognormal variance with pedigree 0.046, pedigree (3,1,3,5,1)
  Estimated value.
  Uncertainty: based on assumptions
- NMVOC, non-methane volatile organic compounds [air, non-urban air or from high stacks]: 3.07e-6 kg; = 3.07E-6*abs(RP_amount); lognormal variance with pedigree 0.124, pedigree (1,1,3,5,1)
  (same comment as for Gas, natural)
- Radon-222 [air, non-urban air or from high stacks]: 0.00556 kBq; = 0.00556*abs(RP_amount); lognormal variance with pedigree 0.316, pedigree (3,1,3,5,1)
  Estimated value.
  Uncertainty: based on assumptions

## Sampling procedure
Data is based on the annual reports on emissions and discharges submitted by each individual operator. The emissions and discharges are estimated
according to guidelines given by the Norwegian authorities and OLF (Norwegian Oil Industry Association)

## Extrapolations
Extrapolated from norwegian dataset. Uncertainty is adjusted accordingly.
