# calcium carbonate production, precipitated

Dataset: EcoSpold 2, unit process
Geography: RER
Time period: 2015-01-01 to 2023-12-31
Technology level: current
Classification: ISIC rev.4 ecoinvent: 2011:Manufacture of basic chemicals
Synonyms: Aragonite; Calcite; Limestone; Calcium Milk; Vaterite; Chalk
Scenario: Business-as-Usual
System model: Allocation, cut-off by classification
Generated by: Lucia Valsasina
Database: ecoinvent
isCopyrightProtected: true
accessRestrictedTo: 1

## General comment
Calcium carbonate is the main component of limestone. The majority of product used comes from mining and quarrying. Calcium carbonate can also be produced industrially and referred to as precipitated calcium carbonate (Kenny and Oates 2007). This activity describes the production of 1 kg of precipitated calcium carbonate. No additional coating is included in this activity. Precipitated calcium carbonate purity is higher than the same product derived from mining.
Reference(s):
Gendorf, 2020, Umwelterkärung, www.gendorf.de
European Lime Association (2019): A competitive and efficient lime industry, retrieved from https://www.eula.eu/wp-content/uploads/2019/02/A-Competitive-and-Efficient-Lime-Industry-Summary_0.pdf.
Kenny M., Oates T., (2007). Lime and Limestone. In Ullmann's Encyclopedia of Industrial Chemistry, Wiley-VCH, Weinheim.
Van der Zee S., Zeman F., (2016). Production of Carbon Negative Precipitated Calcium Carbonate from Waste Concrete, The Canadian Journal of Chemical Engineering, 94, 2153.

## Included activities start
The activity starts when the raw materials enter the process.

## Included activities end
Materials entering the process are included as well as energy uses, infrastructure and emissions.

## Geography
The inputs to the process are calculated based on stoichiometry and literature data, they are therefore considered to be valid for the chosen geography. The inputs of heat, electricity, water, factory and nitrogen are mostly taken as average of industry data. Industry data values are a 5-year average of data (2015 - 2019) published by the Gendorf factory (Gendorf, 2016, Umwelterklärung, www.gendorf.de), (Gendorf, 2017, Umwelterklärung, www.gendorf.de), (Gendorf, 2020, Umwelterklärung, www.gendorf.de). The Gendorf factory is based in Germany, it produces a wide range of chemical substances. The factory produced 1634200 tonnes of chemical substances in the year 2019 (Gendorf, 2016, Umwelterklärung, www.gendorf.de) and 870000
tonnes of intermediate products.

## Technology
Precipitated calcium carbonate is produced in the lime cycle.
The first reaction is the burning of limestone or caclcination to retrieve quicklime and carbon dioxide:
CaCO3 -> CaO + CO2
Quicklime is then slacked to get milk of lime:
CaO + H2O -> Ca(OH)2
In a third step, the milk of lime is carbonated with CO2 (by-product of reaction 1). Since calcium carbonate is insoluble in water, it precipitates:
Ca(OH)2 + CO2 -> CaCO3 ↓ + H2O. With controlled reaction conditions the result is a product with size of 0.02 to 0.2 micrometer and with high reflectivity (Kenny and Oates 2007). The process is usually done in a mixed-feed shaft kiln.
This inventory representing production of a particular chemical compound is at least partially based on a generic model on the production of chemicals. The data generated by this model have been improved by compound-specific data when available.
The model on production of chemicals is using specific industry or literature data wherever possible and more generic data on chemical production processes to fill compound-specific data gaps when necessary. The basic principles of the model have been published in literature (Hischier 2005, Establishing Life Cycle Inventories of Chemicals Based on Differing Data Availability). The model has been updated and extended with newly available data from the chemical industry.
In the model, unreacted fractions are treated in a waste treatment process, and emissions reported are after a waste treatment process that is included in the scope of this dataset. For volatile reactants, a small level of evaporation is assumed. Solvents and catalysts are mostly recycled in closed-loop systems within the scope of the dataset and reported flows are for losses from this system.
The main source of information for the values for heat, electricity, water (process and cooling), nitrogen, chemical factory is industry data from Gendorf. The values are a 5-year average of data (2015 - 2019) published by the Gendorf factory (Gendorf, 2016, Umwelterklärung, www.gendorf.de), (Gendorf, 2017, Umwelterklärung, www.gendorf.de), (Gendorf, 2020, Umwelterklärung, www.gendorf.de). The Gendorf factory is based in Germany, it produces a wide range of chemical substances. The factory produced 1634200 tonnes of chemical substances in the year 2019 (Gendorf, 2020, Umwelterklärung, www.gendorf.de) and 870000 tonnes of intermediate products.
Reference(s):
Hischier, R. (2005) Establishing Life Cycle Inventories of Chemicals Based on Differing Data Availability (9 pp). The International Journal of Life Cycle Assessment, Volume 10, Issue 1, pp 59–67. 10.1065/lca2004.10.181.7
Gendorf, 2020, Umwelterkärung, www.gendorf.de
European Lime Association (2019): A competitive and efficient lime industry, retrieved from https://www.eula.eu/wp-content/uploads/2019/02/A-Competitive-and-Efficient-Lime-Industry-Summary_0.pdf.
Kenny M., Oates T., (2007). Lime and Limestone. In Ullmann's Encyclopedia of Industrial Chemistry, Wiley-VCH, Weinheim.
Van der Zee S., Zeman F., (2016). Production of Carbon Negative Precipitated Calcium Carbonate from Waste Concrete, The Canadian Journal of Chemical Engineering, 94, 2153.
For more information on the model please refer to the dedicate ecoinvent report, access it in the Report section of ecoQuery (http://www.ecoinvent.org/login-databases.html)

## Time period
The inputs to the process are calculated based on stoichiometry and literature and overall form the most realistic picture of the production. Besides, the activity is partly generated, in terms of material inputs and outputs, based on a generic stoichiometry-based model, using literature or estimated yields, which does not expect to change over time. The inputs of heat, electricity, water, factory and nitrogen are mostly taken as average of industry data. Industry data values are a 5-year average of data (2015 - 2019) published by the Gendorf factory (Gendorf, 2016, Umwelterklärung, www.gendorf.de), (Gendorf, 2017, Umwelterklärung, www.gendorf.de), (Gendorf, 2020, Umwelterklärung, www.gendorf.de). The Gendorf factory is based in Germany, it produces a wide range of chemical substances. The factory produced 1634200 tonnes of chemical substances in the year 2019 (Gendorf, 2016, Umwelterklärung, www.gendorf.de) and 870000
tonnes of intermediate products. The time period is therefore set based on the years from Gendorf reference.

## Reference product
- calcium carbonate, precipitated: 1 kg; name RP; By-product classification allocatable product; CPC 34240: Phosphates of triammonium; salts and peroxysalts of inorganic acids and metals n.e.c.; HS2017 283650: Carbonates; calcium carbonate; CAS 471-34-1
  Calcium carbonate is the main component of limestone. The majority of product used comes from mining and quarrying. Calcium carbonate can also be produced industrially and referred to as precipitated calcium carbonate (Kenny and Oates 2007).
  Reference(s):
  Kenny, M. and Oates, T. 2007. Lime and Limestone. In Ullmann's Encyclopedia of Industrial Chemistry, Electronic Release, Vol.21, pp.61. Wiley-VCH, Weinheim.
  production volume 1.0962e9 kg; name RP_PV; = 126000000000*0.05*0.174
    Estimated value.No information for Production Volume was found, therefore a placeholder value is used. The majority of calcium carbonte (limestone) is extracted (see the ecoinvent activity 'limestone quarry operation'). Precipitated calcium carbonate is a specialist chemical, being produced in laboratory conditions it has higher purity then extracted limestone (Kenny and Oates 2007). For this reason it also has a higher price (Kenny and Oates 2007), see the properties section.
    The production volume of limestone in ecoinvent is reported as 360 128 617 363 kg, which is in the same order of magnitute than what reported in Kenny and Oates (2007) (126 000 000 tonnes). Being a speciality production, the production volume is set to be 5% of the production volume of limestone starting from the value reported in Kenny and Oates 2007.
    Reference(s):
    Kenny, M. and Oates, T. 2007. Lime and Limestone. In Ullmann's Encyclopedia of Industrial Chemistry, Electronic Release, Vol.21, pp.61. Wiley-VCH, Weinheim.
    The European production volume is extrapolated from the GLO. The GLO production volumes is set to the placeholder value 4 and the European one is estimated based on information from Cefic (European Chemical Industry Council) and the American Chemistry Council.
    According to Cefic (2016) the Global sales of chemicals in the year 2015 was 3,534 billion euros. The reported share of sales per regions are: EU28 14.7%; Other Europe (Switzerland, Norway, Turkey, Russia and Ukraine) 2.7%; NAFTA (USA, Canada and Mexico) 16.5%; Latin America 3.8%; China 39.9%; Japan 3.9%; Republic of Korea 3.2%; India 2.2%; Rest of Asia 11.9%; Rest of the World 1.3%. Cefic also reports the USA total sales, 518.7 billion euros of the global 3534 billion euros (14.7%). The same share is reported from the American Chemistry Council (2016), according to this source the USA sales account for 15% of global sales for the year 2016.
    The European production volume is calculated based on the sales share from RER, which is here defined as EU28 plus Other Europe, share of sales (14.7% + 2.7% = 17.4%).
    Reference(s):
    Cefic 2016. Facts and figures 2016 of the European chemical industry. Accessible at: http://www.cefic.org/Facts-and-Figures/Chemicals-Industry-Profile/, accessed 1 June 2017
    American Chemistry Council 2016. Outlook: U.S. Chemical Industry Continues to Outpace Industrial Output; Accounts for More Than One-Half of Construction Spending by Manufacturing Sector. Accessible at: https://www.americanchemistry.com/Media/PressReleasesTranscripts/ACC-news-releases/US-Chemical-Industry-Continues-to-Outpace-Industrial-Output.html, accessed 1 June 2017
  property calcium content 0.400436; name RP_Ca_content
    calcium content on a dry matter basis
  property price 0.452 EUR2005
    Estimated value. This price is averaged from 4 different suppliers available in the commercial webstore of alibaba. The price refers to a bulk quantity purchase. All websites were retrieved on the 19th Sept 2017. THe exchange rate used is from 2010 when 1 USD - 0.755 EUR.
    Price range:
    supplier 1: 230-260 $ per ton, https://www.alibaba.com/product-detail/Hot-calcium-carbonate-light-or-heavy_1677405130.html?spm=a2700.7724838.2017115.20.3c93b095BC0Sce&s=p
    supplier 2: 100-140 $ per ton, https://www.alibaba.com/product-detail/China-manufacturer-precipitated-calcium-carbonate_60613120303.html?spm=a2700.7724838.2017115.10.3c93b095BC0Sce&s=p
    supplier 3: 460-1600 $ per ton, https://www.alibaba.com/product-detail/Professional-AR-grade-precipitated-calcium-carbonate_60713789652.html?spm=a2700.7724838.2017115.1.3c93b095BC0Sce&s=p
    supplier 4: 800-1,200 $ per ton, https://www.alibaba.com/product-detail/Precipitated-Calcium-Carbonate-products_60232652437.html?spm=a2700.7724838.2017115.27.3c93b095BC0Sce&s=p
  properties: carbon allocation 0.120005 kg, carbon content 0.120005, carbon content, fossil 0.120005, carbon content, non-fossil 0, dry mass 1 kg, water content 0, water in wet mass 0 kg, wet mass 1 kg

## Inputs from technosphere
- chemical factory, organics: 4e-10 unit; lognormal variance with pedigree 0.2106, pedigree (5,5,5,5,5)
  Calculated based on literature data published by the industry. For this activity, no information was readily available concerning infrastructure and land-use. Therefore, the infrastructure is estimated based on data from two chemical factories, the BASF site of Ludwigshafen and the chemical factory in Gendorf (which are both located in Germany), which produce a wide range of chemical substances. Based on this data, the following assumptions are made: the built area amounts to about 4.2 ha, the plant has an average output of 50'000 t/a and a lifespan of fifty years. The estimated infrastructure amount is therefore 4.00 E-10 units per kg of produced chemical.
  References:
  Althaus H.-J., Chudacoff M., Hischier R., Jungbluth N., Osses M. and Primas A. (2007) Life Cycle Inventories of Chemicals. ecoinvent report No. 8, v2.0. EMPA Dübendorf, Swiss Centre for Life Cycle Inventories, Dübendorf, CH.
  Gendorf (2000) Umwelterklärung 2000, Werk Gendorf. Werk Gendorf, Burgkirchen.
- electricity, medium voltage: 0.06 kWh; lognormal variance with pedigree 0.0106, pedigree (2,3,2,4,3)
  Based on information of the European Lime Association (access report here: (https://www.eula.eu/wp-content/uploads/2019/02/A-Competitive-and-Efficient-Lime-Industry-Summary_0.pdf)
- heat, district or industrial, natural gas: 3.672 MJ; lognormal variance with pedigree 0.0106, pedigree (2,3,2,4,3)
  (same comment as for electricity, medium voltage)
  properties: heating value, net 1 MJ
- heat, from steam, in chemical industry: 0.408 MJ; lognormal variance with pedigree 0.0106, pedigree (2,3,2,4,3)
  (same comment as for electricity, medium voltage)
  properties: heating value, net 1 MJ
- industrial machine, heavy, unspecified: 9.23e-6 kg; lognormal variance with pedigree 0.51, pedigree (5,5,5,5,5)
  Assumption.
- limestone, crushed, washed: 1.28571 kg; lognormal variance with pedigree 0.2106, pedigree (5,5,5,5,5)
  Based on a estimated yield of 99%,
  properties: calcium content 0.400436, carbon content, fossil 0.117257, dry mass 0.998 kg, water content 0.00200401, wet mass 1 kg
  note on carbon content, fossil: Table 3.1, ecoinvent v2.2 report 7, part VII, pg 3. MW CaCO3=100, MW MgCO3=84. C content of limestone is 0.117257 kg/kg DM
- tap water: 0.0225 kg; lognormal variance with pedigree 0.2106, pedigree (5,5,5,5,5)
  Calculated based on literature data published by the GENDORF Chemical Park. The factory produced an average of 2462760 tonnes of chemical substances (including intermediates) per year in the years 2015-2019. The average consumption of tap water in the years 2015-2019 was 55352 t per year. This equals 0.0225 kg/kg chemical produced.
  properties: carbon content, fossil 0.00178991, dry mass 0.000337476 kg, water content 2962.17, wet mass 1 kg
  note on carbon content, fossil: Bicarbonate content is 2.93 mol/m3. CO2 content is 0.1 mol/m3 (ecoinvent v2.2 report 8, Tab 93.1).
- wastewater, average: -5.58244e-8, -2.2213e-6 m3 (2 suppliers, which the file names only by identifier); sum of these -2.27712e-6 m3; lognormal variance with pedigree 0.0438, pedigree (2,4,1,4,4)
  Calculated based on literature data published by the GENDORF Chemical Park. The factory produced an average of 2462760 tonnes of chemical substances (including intermediates) per year in the years 2015-2019. The average ouput of wastewater going to an external wastewater treatment plant in the years 2015-2019 was 5608 m3 per year. This equals 0.000002277 m3/kg chemical produced.
  References:
  Chemiepark GENDORF, Umwelterklärung 2016, https://www.gendorf.de/Nachbarn/Umweltschutz/Industrie%20und%20Nachhaltigkeit
  Chemiepark GENDORF, Umwelterklärung 2017, https://www.gendorf.de/Nachbarn/Umweltschutz/Industrie%20und%20Nachhaltigkeit
  Chemiepark GENDORF, Umwelterklärung 2020, https://www.gendorf.de/Nachbarn/Umweltschutz/Industrie%20und%20Nachhaltigkeit
  production volume; = BP_wastewater_average*RP_PV/ABS(RP)
    Calculated from the production volume of the reference product in proportion to the respective output amounts.
  properties: carbon content, non-fossil 0.194039, dry mass 0.346837 kg, water content 2882.2, wet mass 1000 kg
  note on carbon content, non-fossil: 0.0673 kg TOC/m3 (Tab A.17, ecoinvent v2.2 report 13_I). TOC was considered as Total Carbon.
- water, decarbonised: 7.66594e-5, 0.0800295, 0.0044181, 0.120729, 0.0243384 kg (5 suppliers, which the file names only by identifier); sum of these 0.229592 kg; lognormal variance with pedigree 0.2106, pedigree (5,5,5,5,5)
  Based on stoichiometric calculations.
  properties: wet mass 1 kg

## Inputs from nature
- Water, cooling, unspecified natural origin [natural resource, in water]: 0.014707 m3; lognormal variance with pedigree 0.044, pedigree (2,4,2,4,4)
  Calculated based on literature data published by the GENDORF Chemical Park. The factory produced an average of 2462760 tonnes of chemical substances (including intermediates) per year in the years 2015-2019. The average amount of cooling water released in the years 2015-2019 was 34408800 t per year. It was assumed that 5% of the cooling water was emitted to air during its use, therefore, to calculate the input of cooling water, the output value reported by GENDORF was scaled up by the factor 1/0.95. This equals 0.014707 m3/kg chemical produced.
  References:
  Chemiepark GENDORF, Umwelterklärung 2016, https://www.gendorf.de/Nachbarn/Umweltschutz/Industrie%20und%20Nachhaltigkeit
  Chemiepark GENDORF, Umwelterklärung 2017, https://www.gendorf.de/Nachbarn/Umweltschutz/Industrie%20und%20Nachhaltigkeit
  Chemiepark GENDORF, Umwelterklärung 2020, https://www.gendorf.de/Nachbarn/Umweltschutz/Industrie%20und%20Nachhaltigkeit
- Water, river [natural resource, in water]: 0.000965426 m3; lognormal variance with pedigree 0.044, pedigree (2,4,2,4,4)
  Calculated based on literature data published by the GENDORF Chemical Park. The factory produced an average of 2462760 tonnes of chemical substances (including intermediates) per year in the years 2015-2019. The average consumption of river water in the years 2015-2019 was 22000820 t per year. However, since the cooling water is modelled as an input, the amount of river water was adjusted to avoid double counting. 55% of the input amount of cooling water was deducted from the amount of river water, as that is the share of river water versus well water. This equals 0.00096543 m3/kg chemical produced.
  References:
  Chemiepark GENDORF, Umwelterklärung 2016, https://www.gendorf.de/Nachbarn/Umweltschutz/Industrie%20und%20Nachhaltigkeit
  Chemiepark GENDORF, Umwelterklärung 2017, https://www.gendorf.de/Nachbarn/Umweltschutz/Industrie%20und%20Nachhaltigkeit
  Chemiepark GENDORF, Umwelterklärung 2020, https://www.gendorf.de/Nachbarn/Umweltschutz/Industrie%20und%20Nachhaltigkeit
- Water, well, in ground [natural resource, in water]: 0.000816522 m3; lognormal variance with pedigree 0.044, pedigree (2,4,2,4,4)
  Calculated based on literature data published by the GENDORF Chemical Park. The factory produced an average of 2462760 tonnes of chemical substances (including intermediates) per year in the years 2015-2019. The average consumption of well water in the years 2015-2019 was 18607480 t per year. However, since the cooling water is modelled as an input, the amount of well water was adjusted to avoid double counting. 45% of the input amount of cooling water was deducted from the amount of well water, as that is the share of well water versus river water. This equals 0.00081652 m3/kg chemical produced.
  References:
  Chemiepark GENDORF, Umwelterklärung 2016, https://www.gendorf.de/Nachbarn/Umweltschutz/Industrie%20und%20Nachhaltigkeit
  Chemiepark GENDORF, Umwelterklärung 2017, https://www.gendorf.de/Nachbarn/Umweltschutz/Industrie%20und%20Nachhaltigkeit
  Chemiepark GENDORF, Umwelterklärung 2020, https://www.gendorf.de/Nachbarn/Umweltschutz/Industrie%20und%20Nachhaltigkeit

## Emissions to nature
- Carbon dioxide, fossil [air, unspecified]: 0.0282245 kg; lognormal variance with pedigree 0.0106, pedigree (2,3,2,4,3)
  Calculated value. Assumed loss within the system. The amount of CO2 incorporated in PCC was calculated stoichiometricly, the remaing is released to air,
- Carbon monoxide, fossil [air, unspecified]: 0.00477 kg; lognormal variance with pedigree 0.86, pedigree (5,5,5,5,5)
  Literature value. Reference(s): Kellenberger D., Althaus H.-J., Jungbluth N., Künniger T., Lehmann M. and Thalmann P. (2007) Life Cycle Inventories of Building Products. Final report ecoinvent Data v2.0 No. 7. EMPA Dübendorf, Swiss Centre for Life Cycle Inventories, Dübendorf, CH.
- NMVOC, non-methane volatile organic compounds [air, unspecified]: 4.55e-5 kg; lognormal variance with pedigree 0.25, pedigree (5,5,5,5,5)
  (same comment as for Carbon monoxide, fossil)
- Nitrogen oxides [air, unspecified]: 0.000336 kg; lognormal variance with pedigree 0.25, pedigree (5,5,5,5,5)
  (same comment as for Carbon monoxide, fossil)
- Particulate Matter, < 2.5 um [air, non-urban air or from high stacks]: 1.36e-5 kg; lognormal variance with pedigree 0.51, pedigree (5,5,5,5,5)
  Estimation, based on literature values. The distribution of the dust emissions to the different categories of sizes are made based on the information of the CEPMEIP-Database and adapted, as the amount of PM2.5 emitted increases when TSP is reduced by filters, which are most effective in retaining the particulates of larger size. The 20% are PM<2.5, the 40% are PM>10 and the rest 40% are 2.5<PM<10.
- Particulate Matter, > 10 um [air, unspecified]: 2.73e-5 kg; lognormal variance with pedigree 0.25, pedigree (5,5,5,5,5)
  (same comment as for Particulate Matter, < 2.5 um)
- Particulate Matter, > 2.5 um and < 10um [air, unspecified]: 2.73e-5 kg; lognormal variance with pedigree 0.33, pedigree (5,5,5,5,5)
  (same comment as for Particulate Matter, < 2.5 um)
- Sulfur dioxide [air, unspecified]: 0.000336 kg; lognormal variance with pedigree 0.2106, pedigree (5,5,5,5,5)
  (same comment as for Carbon monoxide, fossil)
- Water [air, unspecified]: 0.00147008 m3; lognormal variance with pedigree 0.0834, pedigree (2,4,2,4,4)
  Calculated based on literature data published by the GENDORF Chemical Park. The factory produced an average of 2462760 tonnes of chemical substances (including intermediates) per year in the years 2015-2019. To determine the emissions of water to air, the difference of all water inputs (from river, well, tap water and cooling) and outputs (wastewater, emissions to water) was calculated. The average ouput of water to air in the years 2015-2019 was 3620444 m3 per year. This equals 0.00147 m3/kg chemical produced. For more information on the other water exchanges please consult the respective exchange comment.
  References:
  Chemiepark GENDORF, Umwelterklärung 2016, https://www.gendorf.de/Nachbarn/Umweltschutz/Industrie%20und%20Nachhaltigkeit
  Chemiepark GENDORF, Umwelterklärung 2017, https://www.gendorf.de/Nachbarn/Umweltschutz/Industrie%20und%20Nachhaltigkeit
  Chemiepark GENDORF, Umwelterklärung 2020, https://www.gendorf.de/Nachbarn/Umweltschutz/Industrie%20und%20Nachhaltigkeit
- Calcium II [water, unspecified]: 0.135439 kg; lognormal variance with pedigree 0.0106, pedigree (2,3,2,4,3)
  Calculated value, based on losses within the system.
- Carbonate [water, unspecified]: 0.09938 kg; lognormal variance with pedigree 0.25, pedigree (5,5,5,5,5)
  Calculated value, based on losses within the system.
- Water [water, unspecified]: 0.0150391 m3; lognormal variance with pedigree 0.0834, pedigree (2,4,2,4,4)
  Calculated based on literature data published by the GENDORF Chemical Park. The factory produced an average of 2462760 tonnes of chemical substances (including intermediates) per year in the years 2015-2019. The amount of water released back to the environment consists of the sum of the amount of process water treated in the internal WWTP that is then released back to the environment and the amount of cooling water released back to the environment. The average ouput of the internal WWTP in the years 2015-2019 was 2628800 m3 and that of cooling water released back to the environment was 34408800 m3. This gives a yearly average of 37037600 m3 emissions of water to water. This equals 0.01504 m3/kg chemical produced.
  References:
  Chemiepark GENDORF, Umwelterklärung 2016, https://www.gendorf.de/Nachbarn/Umweltschutz/Industrie%20und%20Nachhaltigkeit
  Chemiepark GENDORF, Umwelterklärung 2017, https://www.gendorf.de/Nachbarn/Umweltschutz/Industrie%20und%20Nachhaltigkeit
  Chemiepark GENDORF, Umwelterklärung 2020, https://www.gendorf.de/Nachbarn/Umweltschutz/Industrie%20und%20Nachhaltigkeit

## Sampling procedure
Literature data and stochiometric calculation.

## Review by Emilia Moreno Ruiz 2017-08-10
This dataset was additionally reviewed in a separate review process by Eric Johnson of Atlantic Consulting as well as Emilia Moreno Ruiz and Gregor Wernet of ecoinvent.
