# electricity production, photovoltaic, 3kWp slanted-roof installation, single-Si, panel, mounted, renewable energy produc

Dataset: EcoSpold 2, unit process
Geography: CH
Time period: 2010-01-01 to 2023-12-31
Technology level: current
Classification: ISIC rev.4 ecoinvent: 3510:Electric power generation, transmission and distribution
Classification: EcoSpold01Categories: photovoltaic/power plants
Synonyms: monocrystalline; single crystalline; silicon
Tags: photovoltaic power; certified electricity
Scenario: Business-as-Usual
System model: Allocation, cut-off by classification
Share of production covered: 100 %
Generated by: Christian Bauer
Published in: Jungbluth, N. 2007
Database: ecoinvent
isCopyrightProtected: true
accessRestrictedTo: 1

## General comment
This dataset represents the production of certified low-voltage electricity with photvoltaics on the world and has entierly been copied from a dataset valid for Switzerland.
Assumption for electricity production of photovoltaic plants with good performance. Average performance is lower while optimum performance would be higher. Total capacity in Switzerland for the year 2005 was 23.8 MWp. Dataset can be used for comparison of energy technologies in Switzerland, but not for assessment of average production patterns. Yield data must be corrected for the installations used in other countries.
[This dataset was already contained in the ecoinvent database version 2. It was not individually updated during the transfer to ecoinvent version 3. Life Cycle Impact Assessment results may still have changed, as they are affected by changes in the supply chain, i.e. in other datasets. This dataset was generated following the ecoinvent quality guidelines for version 2. It may have been subject to central changes described in the ecoinvent version 3 change report (http://www.ecoinvent.org/database/ecoinvent-version-3/reports-of-changes/), and the results of the central updates were reviewed extensively. The changes added e.g. consistent water flows and other information throughout the database. The documentation of this dataset can be found in the ecoinvent reports of version 2, which are still available via the ecoinvent website. The change report linked above covers all central changes that were made during the conversion process.]

## Included activities end
Infrastructure for 3kWp PV-plant. Water use for cleaning. Amount of solar energy transformed to electricity. Waste heat emission due to losses of electricity in the system.

## Geography
Inventory represents Swiss data for label-certified electricity.

## Technology
Electricity production with grid-connected photovoltaic power plants mounted on buildings slanted roof.

## Time period
Calculation for yield based on production with a state of the art plant.

## Parameters
- fraction, process water, to air: 0.15 dimensionless; name fraction_PW_to_air; lognormal variance with pedigree 0.092025, pedigree (4,4,3,2,4)
  Literature value. In case when no industry/process specific data are available, default evaporation fraction value is used. This value is 15% and is based on literature (Statistics Canada, 2007 & Shaffer, K.H., 2008, Consumptive water use in the Great Lakes Basin, USGS & Shiklomanov, 2003, World Water Resources at the Beginning of the 21st Century) and has been approved by an expert.
- fraction, tap water, to air: 0.15 dimensionless; name fraction_TW_to_air; = fraction_PW_to_air; lognormal variance with pedigree 0.092025, pedigree (4,4,3,2,4)
  Calculated value. See comment in the other parametres present in this dataset. Tap water is considered to be always used as process water, thus process water fractions to air are applied to all tap water input flows to calculate the amount of water consumed in the processes.

## Reference product
- electricity, low voltage, renewable energy products: 1 kWh; By-product classification allocatable product; CPC 17100: Electrical energy; HS2017 271600: Electrical energy
  production volume 2.04547e8 kWh; name apv_el; = 33000000*0.45
    Literature value/statistics. Net production of grid-connected certified electricity in 2011 with this technology in Switzerland. Share of si-Si PV panels: 45%.
  property price 0.0669 EUR2005
    Temporary price data. Calculated as 90% of purchasers price based on: Price for industrial users from IEA Key world energy statistics 2004 (www.iea.org). In addition, regarding label-certified electricity, the Swiss government has a market instrument for renewable energy which is calculated as the difference between the market price and the production price. This was started in 2009 and is 0.45 Rp/kWh (http://www.bfe.admin.ch/themen/00612/02073/index.html?lang=de). Therefore, the production price of label certified energy is assumed to be the supplyer price plus the 0.45Rp/kWh.The unit conversion from CH to EUR is based on the ecoinvent unit conversion file (1 CHF2005 = 0.644 EUR2005).
  properties: carbon allocation 0 kg, carbon content 0

## Inputs from technosphere
- photovoltaic slanted-roof installation, 3kWp, single-Si, panel, mounted, on roof: 1.2051e-5 unit; lognormal variance with pedigree 0.0221, pedigree (3,2,4,5,1)
  EcoSpold01Location=CH
  Yield at good installation, average is lower while optimum would be higher, basic uncertainty = 1.2
  Uncertainty: yield at good installation, average is lower while optimum would be higher, basic uncertainty = 1.2
- tap water: 0.0051648 kg; name tapwater; lognormal variance with pedigree 0.0107, pedigree (2,2,4,5,1)
  Estimation 20l/m2 panel
  EcoSpold01Location=CH
  Uncertainty: Estimation 20l/m2 panel
  properties: carbon content, fossil 0.00178991, dry mass 0.000337476 kg, water content 2962.17, wet mass 1 kg
  note on carbon content, fossil: Bicarbonate content is 2.93 mol/m3. CO2 content is 0.1 mol/m3 (ecoinvent v2.2 report 8, Tab 93.1).
- wastewater, average: -5.1648e-6 m3; name sewage; lognormal variance with pedigree 0.0027, pedigree (2,2,1,5,1)
  EcoSpold01Location=CH
  Estimation 20l/m2 panel
  Uncertainty: Estimation 20l/m2 panel
  production volume; = apv_el*sewage
    Calculated from the production volume of electricity, low voltage in proportion to the respective output amounts.
  properties: carbon content, non-fossil 0.194039, dry mass 0.346837 kg, mass concentration, TOC 0.1091 kg/m3, mass concentration, calcium 0.039453 kg/m3, mass concentration, chlorine 0.030031 kg/m3, mass concentration, hydrogen 0.013365 kg/m3, mass concentration, nitrogen 0.031015 kg/m3, mass concentration, oxygen 0.069824 kg/m3, mass concentration, sodium 0.06456 kg/m3, mass concentration, sulfur 0.015602 kg/m3, water content 2882.2, wet mass 1000 kg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
  note on carbon content, non-fossil: 0.0673 kg TOC/m3 (Tab A.17, ecoinvent v2.2 report 13_I). TOC was considered as Total Carbon.

## Inputs from nature
- Energy, solar, converted [natural resource, in air]: 3.8503 MJ; lognormal variance with pedigree 0.00988441, pedigree (2,2,4,1,1)
  Energy loss in the system is included.

## Emissions to nature
- Water [air, unspecified]: 7.7472e-7 m3; name water_to_air_unspecified; = (tapwater/1000)*fraction_TW_to_air; lognormal variance with pedigree 0.130025, pedigree (4,4,5,2,4)
  Calculated value based on literature values and expert opinion. See comments in the parametres' comment field.
  property fraction, origin: fresh water 1; name fraction_origin_fresh_water
  property fraction, origin: salt water 0; name fraction_origin_salt_water
  property fraction, origin: unspecified 0; name fraction_origin_unspecified

## Sampling procedure
Statistical data for CH.

## Review by Carl Vadenbo 2015-05-22
The update of the whole electricity sector for the ecoinvent v3.2 database consist of hundreds of datasets. All these datasets have passed through a streamlined review processes where the underlying modelling of production volumes, technology shares and efficiencies was reviewed in detail prior to the datasets being submitted to the database.
