# cement production, CEM II/A

Dataset: EcoSpold 2, unit process
Geography: RoW
Time period: 2005-01-01 to 2023-12-31
Technology level: current
Classification: ISIC rev.4 ecoinvent: 2394:Manufacture of cement, lime and plaster
Synonyms: Portland composite cement; CEM II/A
Tags: combined production
Scenario: Business-as-Usual
System model: Allocation, cut-off by classification
Share of production covered: 10 %
Generated by: Michael Elias Boesch
Published in: Boesch, M.E. 2010
Database: ecoinvent
isCopyrightProtected: true
accessRestrictedTo: 1

## General comment
The dataset describes the production of cement (CEM II/A)

## Included activities start
From cradle, i.e. including all upstream activities. As source of gypsum, waste gypsum from flue gas treatment is assumed.

## Included activities end
This activity ends with the cement produced in the cement mill. The dataset does not include packaging and administration.

## Reference product
- cement, CEM II/A: 1 kg; name cement; source Boesch, M.E. 2010; By-product classification allocatable product; CPC 37440: Portland cement, aluminous cement, slag cement and similar hydraulic cements, except in the form of clinkers; HS2017 252329: Cement; portland, other than white, whether or not artificially coloured
  production volume 1.27834e12 kg; name APV_cement; = 4130*10^9*33.15%
    Total global production volume of hydraulic cement in 2019: 4'130'000'000 ton. Source: USGS (2019). U.S. Geological Survey, Minerals Yearbook Annual Tables, 2019. Available at: https://www.usgs.gov/centers/national-minerals-information-center/cement-statistics-and-information
    Market share of Portland cement of 47.73% was estimated from global production volume amounts of hydraulic cement (4.4E+12 kg) (USGS, 2022) and of Portland cement in (2.1E+12 kg) (IMARC Group, 2022) in 2021. Sources: U.S. Geological Survey, Mineral Commodity Summaries, January 2022. Available at: https://pubs.usgs.gov/periodicals/mcs2022/mcs2022-cement.pdf IMARC Group. Portland Cement Market: Global Industry Trends, Share, Size, Growth, Opportunity and Forecast 2022-2027. Available at: https://www.imarcgroup.com/portland-cement-market
    The shares between the other cement technologies were estimated from the Europe without Switzerland datasets. The shares were then scaled according to the global Portland cement share (47.73%).
  property price 0.0615 EUR2005
    2005 import and export prices (total trades (USD) divided by total weight (kg) in China, India, USA, Japan, Russia and Europe, major producers and consumers (http://www.cementchina.net/freport/showfre.asp?id=749) from UN Commodity Trade Statistics Database (http://data.un.org/Explorer.aspxDatabase [Accessed 2 July 2010]). Commodity: Cement (portland, aluminious, slag or hydraulic)
  properties: carbon allocation 0 kg, carbon content 0, carbon content, fossil 0, carbon content, non-fossil 0, dry mass 1 kg, water content 0, water in wet mass 0 kg, wet mass 1 kg

## Inputs from technosphere
- burnt shale: 0.002 kg; name bshale; = 0.002*cement; lognormal variance with pedigree 0.216, pedigree (5,5,5,5,5)
  Literature Value
  properties: dry mass 1 kg, wet mass 1 kg
- cement factory: 5.36e-11 unit; = 5.36e-11* cement+silica_fume*0+ ggbfs*0; source Kellenberger D. 2007; lognormal variance with pedigree 0.3092, pedigree (2,1,4,4,1)
  Literature Value
  Uncertainty: Variance of log-transformed data was taken from ecoinvent report no 1, table 10.3. Value represents demand of infrastructure for input/output group c.
- clinker: 0.8265 kg; = 0.8265* cement; source Boesch, M.E. 2010; lognormal variance with pedigree 0.0113, pedigree (3,3,4,3,1)
  Literature Value
  Uncertainty: Variance of log-transformed data was taken from ecoinvent report no 1, table 10.3. Value represents demand of products, electricity etc. for input/output group c.
  properties: dry mass 1 kg, wet mass 1 kg
- electricity, medium voltage: 0.00125469, 0.0250282, 0.000626547, 0.000384228, 7.69028e-5, 1.65128e-5, 0.00258455, 0.00742841 kWh (8 suppliers, which the file names only by identifier); sum of these 0.0374 kWh; = 0.0374* cement; source Boesch, M.E. 2010; lognormal variance with pedigree 0.0113, pedigree (3,3,4,3,1)
  (same comment as for clinker)
- ethylene glycol: 0.00021 kg; = 2.1e-4* cement; source Kellenberger D. 2007; lognormal variance with pedigree 0.0113, pedigree (3,3,4,3,1)
  Ancillary product for grinding
  Uncertainty: Variance of log-transformed data was taken from ecoinvent report no 1, table 10.3. Value represents demand of products, electricity etc. for input/output group c.
  properties: carbon content, fossil 0.387097, dry mass 1 kg, heating value, net 23.44 MJ, wet mass 1 kg
- ground granulated blast furnace slag: 0.00236993, 4.2592e-5, 0.00313089, 0.00425659 kg (4 suppliers, which the file names only by identifier); sum of these 0.0098 kg; = 0.0098* cement; source Boesch, M.E. 2010; lognormal variance with pedigree 0.0113, pedigree (3,3,4,3,1)
  (same comment as for clinker)
  properties: dry mass 1 kg, wet mass 1 kg
- gypsum, mineral: 0.0424156, 0.000885546, 0.000198891 kg (3 suppliers, which the file names only by identifier); sum of these 0.0435 kg; = 0.0435* cement; source Boesch, M.E. 2010; lognormal variance with pedigree 0.0113, pedigree (3,3,4,3,1)
  (same comment as for clinker)
  properties: dry mass 1 kg, wet mass 1 kg
- heat, district or industrial, other than natural gas: 0.003136 MJ; = 0.32*ABS(GGBFS); source Boesch, M.E. 2010; lognormal variance with pedigree 0.0008, pedigree (1,1,2,1,1)
  Heat for drying of blast furnace slag. Literature Value
  property corresponding fuel use, propane, furnace >100kW 0 MJ; name fuel_use
  properties: heating value, net 1 MJ
  note on corresponding fuel use, propane, furnace >100kW: Lower heating value of the fuel input related to the heat/electricity output, taken directly from ecoinvent v3.0 dataset "heat production, natural gas, at industrial furnace >100kW, GLO 2000".
- limestone, crushed, for mill: 0.103585, 0.000415312 kg (2 suppliers, which the file names only by identifier); sum of these 0.104 kg; = 0.1040*cement; source Boesch, M.E. 2010; lognormal variance with pedigree 0.0113, pedigree (3,3,4,3,1)
  (same comment as for clinker)
  properties: carbon content, fossil 0.117492, dry mass 0.998 kg, water content 0.00200401, wet mass 1 kg
- steel, low-alloyed: 0.00011 kg; name steel; = 0.00011* cement; source Kellenberger D. 2007; lognormal variance with pedigree 0.0113, pedigree (3,3,4,3,1)
  Literature value
  Uncertainty: Variance of log-transformed data was taken from ecoinvent report no 1, table 10.3. Value represents demand of products, electricity etc. for input/output group c.
  properties: carbon content, fossil 0.005, dry mass 1 kg, wet mass 1 kg

## Emissions to nature
- Heat, waste [air, unspecified]: 0.135 MJ; = 0.135* cement; source Boesch, M.E. 2010; lognormal variance with pedigree 0.0507, pedigree (3,3,4,3,1)
  Literature Value
  Uncertainty: Variance of log-transformed data was taken from ecoinvent report no 1, table 10.3. Value represents others emitted to air for input/output group p.

## Sampling procedure
Data approximates average European production
