# helium, crude stockpiling

Dataset: EcoSpold 2, unit process
Geography: RoW
Time period: 2005-01-01 to 2023-12-31
Technology level: current
Classification: ISIC rev.4 ecoinvent: 2011:Manufacture of basic chemicals
Scenario: Business-as-Usual
System model: Allocation, cut-off by classification
Generated by: Emilia Moreno Ruiz
Database: ecoinvent
isCopyrightProtected: true
accessRestrictedTo: 1

## General comment
The only helium storage facility curently in operation is the Cliffside Storage Facility (also known as US National Helium Reserve) which is located in the United States, 19km far from Amarillo, Texas.
USGS, Pacheco, N., Helium, 2000 (http://minerals.usgs.gov/minerals/pubs/commodity/helium/330400.pdf, accessed 20130404)
Between 1960 and 1975 the strategy of the United States related to helium was to store this gas for the future uses. This strategy has changed by decision taken in 1996 that helium should no longer be accumulated. The figure below shows the quantities of helium sold versus quantities of helium recovered (USGS). It is obvious, that since 1999 growing amount of helium supplied to the market is coming from the reserves. These reserves are being close to be depleted, which causes lack of helium on the market and subsequently increased price (Reuters, Salmon, F., published 20130328, http://blogs.reuters.com/felix-salmon/2013/03/28/how-helium-is-like-mortgages/, accessed 20130405).
USGS, Pacheco, N., Helium, 2000 (http://minerals.usgs.gov/minerals/pubs/commodity/helium/330400.pdf, accessed 20130404)

## Included activities start
This activity starts with the helium, crude being pumped into the underground storage facility.

## Included activities end
This activity delivers the service of helium, crude stockpiling.

## Technology
This dataset represents very simplified modelling of helium storage. The uncertainty is adjusted accordingly.

## Reference product
- helium, crude stockpiling: 1 kg; name helium_stockpiling; By-product classification allocatable product; CPC 34231: Chemical elements n.e.c.; inorganic acids except phosphoric, nitric and sulphonitric; inorganic oxygen compoun[…]; HS2017 280429: Gases, rare; other than argon; CAS 7440-59-7
  production volume 24856.3 kg; = 57100*0.165/0.274856880438401
    Total crude helium put into storage in the frame of the BLM (Bureau of Land Management) conservation program in 2005, as reflected in T3 in: minerals.usgs.gov/minerals/pubs/commodity/helium/myb1-2007-heliu.xls
    0.165 kg/m3 is density of helium
    The PV in US have been upscaled using the relative GDP of 2005 to reflect global PV (source: United Nations, <http://data.un.org/Glossary.aspx?q=GDP+%28current+US%24%29>, accessed 20130726).
  property price 2.53381 EUR2005
    Calculated based on inputs: The price of the product has been calculated as a sum of the values of the material and energy inputs for this product. This value is therefore a rough estimation. It may underestimate the real price since there are additional expenses when producing any product. These expences can include for example labour costs, treatment of waste materials and profit for the producer. Please consider carefully whether this level of data quality is acceptable for your application.
  properties: carbon allocation 0 kg, carbon content 0

## Inputs from technosphere
- building, hall: 0.00208714 m2; = (688757/(1E+9*0.000165*1000)*0.5)* helium_stockpiling; lognormal variance with pedigree 0.2106, pedigree (5,5,5,5,5)
  Estimated. The Cliffside Storage Facility has a capacity of 1E+9m3 of helium gas. The storage itself (the "dome") is a natural underground cavity and as such did not require any transformation.
  Based on aerial picture the transformed above the ground area has a size of app 0.69km2. It is estimated, that half of this area is used for different kinds of building structures.
- pump station: 1.34327e-7 unit; = (1/7444506)* helium_stockpiling; lognormal variance with pedigree 0.2106, pedigree (5,5,5,5,5)
  Calculated based on information provided in the pump station production activity. The pump station is used as a proxy for different types of equipment (pumps, pipes, etc.) used in the storage facility.
  644546 m3/year is the capacity of the pump station
  70 years is the life time of the pump station
  (644546*70*0.167=) 7444506 kg of helium is the capacity over the whole lifetime

## Inputs from nature
- Occupation, dump site [natural resource, land]: 0.333943 m2*year; = ((688757/(1E+9*0.000165*1000))*(2005-1925))* helium_stockpiling; lognormal variance with pedigree 0.1312, pedigree (2,1,4,5,2)
  Estimated. The Cliffside Storage Facility has a capacity of 1E+9m3 of helium gas. The storage itself (the "dome") is a natural underground cavity and as such did not require any transformation.
  Based on aerial picture the transformed above the ground area has a size of app 0.69km2. It is estimated, that half of this area is used for different kinds of building structures.
  The storage facility is in operation since 1925 (Committee on the Impact of Selling the Federal Helium Reserve, Commission on Physical Sciences, Mathematics, and Applications, Commission on Engineering and Technical Systems, National Research Council, The Impact of Selling the Federal Helium Reserve, 2000).
- Transformation, from unspecified [natural resource, land]: 0.00417428 m2; name transformation_from; = (688757/(1E+9*0.000165*1000))* helium_stockpiling; lognormal variance with pedigree 0.1312, pedigree (2,1,4,5,2)
  Estimated. The Cliffside Storage Facility has a capacity of 1E+9m3 of helium gas. The storage itself (the "dome") is a natural underground cavity and as such did not require any transformation.
  Based on aerial picture the transformed above the ground area has a size of app 0.69km2.
- Transformation, to industrial area [natural resource, land]: 0.00417428 m2; name transformation_to; = transformation_from; lognormal variance with pedigree 0.1312, pedigree (2,1,4,5,2)
  (same comment as for Transformation, from unspecified)

## Extrapolations
This DS is copied from the US one, uncertainties have been adjusted accordingly
