# treatment of bottom ash, MSWI-WWT-SLF, waste plastic plaster, slag compartment

Dataset: EcoSpold 2, unit process
Geography: GLO
Time period: 1994-01-01 to 2023-12-31
Technology level: current
Classification: ISIC rev.4 ecoinvent: 3821:Treatment and disposal of non-hazardous waste
Scenario: Business-as-Usual
System model: Allocation, cut-off by classification
Generated by: Nikolia Stoikou
Database: ecoinvent
isCopyrightProtected: true
accessRestrictedTo: 1

## General comment
The process represents the treatment of controlled landfilling in slag compartment of a waste (bottom ash) that is exclusively generated in another waste treatment. Bottom ash is the by-product of municipal solid waste incineration (MSWI) of sewage sludge (with 70% water) that in turn is generated during wastewater treatment (WWT) of leachate from the sanitary landfilling (SLF) of 'waste plastic plaster, for final disposal'. Recommended use of this dataset: to be used within the specific chain of treatments for 'waste plastic plaster, for final disposal'. Share of biogenic carbon in the sludge: 0%.

## Included activities start
The activity starts with the waste being available at the gate of the treatment facility. Collection and transportation of the waste to the treatment plant is not included.

## Included activities end
The activity ends with the waste being treated and waste-specific emissions from the slag compartment landfill are released to water (short-term emissions to surface water and long-term emissions to ground water).

## Geography
Modelling parameters affecting the treatment technology are not specific to this geography.

## Technology
Slag compartment for bottom ash from incineration with base seal and leachate collection system (Landfill type D). Recultivation after closure.

## Reference product
- bottom ash, MSWI-WWT-SLF, waste plastic plaster: -1 kg; By-product classification Waste; CPC 39320: Ash and residue (except from the manufacture of iron or steel), containing metals or metallic compounds, excep[…]; HS2017 262110: Slag and ash; ash and residues from the incineration of municipal waste
  main reference product of this activity
  production volume 0.594589 kg
    calculated in proportion to incinerated waste reference product
  property price 0 EUR2005
    Waste products are assigned a price of zero as they are assumed to require further treatment.
  properties: arsenic content 3.23291e-6, cadmium content 1.77249e-6, calcium content 0.447715, carbon allocation 7.6516e-5 kg, carbon content 8.6343e-5, carbon content, fossil 8.6343e-5, carbon content, non-fossil 0, chromium content 4.2939e-6, cobalt content 0.000241975, dry mass 0.886187 kg, lead content 4.14474e-6, mercury content 2.17789e-9, molybdenum content 1.22114e-5, nickel content 5.56838e-6, nitrogen content 6.20465e-5, oxygen content 0.377653, silicon content 0.174181, tin content 3.51619e-6, water content 0.12843, water in wet mass 0.113813 kg, wet mass 1 kg, zinc content 2.604e-5

## Inputs from technosphere
- process-specific burdens, slag landfill: 0.00841689, 0.280494, 0.71109 kg (3 suppliers, which the file names only by identifier); sum of these 1 kg
  mass-specific expenditures required for landfilling of bottom ash.
- slag landfill: 1.7778e-9 unit
  slag compartment infrastructure required for landfilling of bottom ash.

## Inputs from nature
- Organic carbon, placed in landfill [inventory indicator, waste]: 3.8258e-5 kg; lognormal variance with pedigree 0.64371, pedigree (1,1,5,1,1)
  Mass of organic carbon in waste (without inorganic carbon), initially put in slag compartment. The exchange represents a flow that is within the technosphere. This exchange should only be used to apply ecofactors for the Swiss LCIA method of Ecological Scarcity and not any other purpose.
  Uncertainty: Uncertainty calculated from uncertainty of composition of incinerated waste, and incinerator model uncertainty and slag compartment transfer coefficient uncertainty.
- Waste mass, total, placed in landfill [inventory indicator, waste]: 1 kg
  Mass of waste initially put in a slag compartment. The exchange represents a flow that is within the technosphere. This exchange should only be used to apply ecofactors for the Swiss LCIA method of Ecological Scarcity and not any other purpose.

## Emissions to nature
- Non-hazardous waste disposed [inventory indicator, waste]: 1 kg
  Inventory indicator for waste mass disposed. To be used in EN15804 "other data" results.
- Arsenic ion [water, ground-, long-term]: 2.8607e-6 kg; lognormal variance with pedigree 1.0766, pedigree (1,1,5,1,1)
  complement of long-term emissions from incinerator bottom ash in slag compartment
  Uncertainty: Uncertainty calculated from uncertainty of composition of incinerated waste, and incinerator model uncertainty and slag compartment transfer coefficient uncertainty.
- Arsenic ion [water, surface water]: 4.3096e-9 kg; lognormal variance with pedigree 1.6767, pedigree (1,1,5,1,1)
  short-term emissions from incinerator bottom ash in slag compartment
  Uncertainty: Uncertainty calculated from uncertainty of composition of incinerated waste, and incinerator model uncertainty and slag compartment transfer coefficient uncertainty.
- BOD5, Biological Oxygen Demand [water, ground-, long-term]: 3.1511e-5 kg; lognormal variance with pedigree 0.64371, pedigree (1,1,5,1,1)
  (same comment as for Arsenic ion)
- BOD5, Biological Oxygen Demand [water, surface water]: 1.1374e-7 kg; lognormal variance with pedigree 1.1332, pedigree (1,1,5,1,1)
  (same comment as for Arsenic ion)
- COD, Chemical Oxygen Demand [water, ground-, long-term]: 9.6336e-5 kg; lognormal variance with pedigree 0.64371, pedigree (1,1,5,1,1)
  (same comment as for Arsenic ion)
- COD, Chemical Oxygen Demand [water, surface water]: 3.4773e-7 kg; lognormal variance with pedigree 1.1332, pedigree (1,1,5,1,1)
  (same comment as for Arsenic ion)
- Cadmium II [water, ground-, long-term]: 1.5699e-6 kg; lognormal variance with pedigree 1.02138, pedigree (1,1,5,1,1)
  (same comment as for Arsenic ion)
- Cadmium II [water, surface water]: 8.0815e-10 kg; lognormal variance with pedigree 1.7609, pedigree (1,1,5,1,1)
  (same comment as for Arsenic ion)
- Calcium II [water, ground-, long-term]: 0.39503 kg; lognormal variance with pedigree 0.17322, pedigree (1,1,5,1,1)
  (same comment as for Arsenic ion)
- Calcium II [water, surface water]: 0.0017312 kg; lognormal variance with pedigree 0.63861, pedigree (1,1,5,1,1)
  (same comment as for Arsenic ion)
- Chromium VI [water, ground-, long-term]: 2.49e-8 kg; lognormal variance with pedigree 4.4588, pedigree (1,1,5,1,1)
  (same comment as for Arsenic ion)
- Chromium VI [water, surface water]: 1.0881e-10 kg; lognormal variance with pedigree 2.2623, pedigree (1,1,5,1,1)
  (same comment as for Arsenic ion)
- Cobalt II [water, ground-, long-term]: 0.00021441 kg; lognormal variance with pedigree 0.76618, pedigree (1,1,5,1,1)
  (same comment as for Arsenic ion)
- Cobalt II [water, surface water]: 2.9833e-8 kg; lognormal variance with pedigree 1.678, pedigree (1,1,5,1,1)
  (same comment as for Arsenic ion)
- DOC, Dissolved Organic Carbon [water, ground-, long-term]: 3.812e-5 kg; lognormal variance with pedigree 0.64371, pedigree (1,1,5,1,1)
  (same comment as for Arsenic ion)
- DOC, Dissolved Organic Carbon [water, surface water]: 1.376e-7 kg; lognormal variance with pedigree 1.1332, pedigree (1,1,5,1,1)
  (same comment as for Arsenic ion)
- Lead II [water, ground-, long-term]: 3.6729e-6 kg; lognormal variance with pedigree 1.1398, pedigree (1,1,5,1,1)
  (same comment as for Arsenic ion)
- Lead II [water, surface water]: 6.7046e-11 kg; lognormal variance with pedigree 2.3204, pedigree (1,1,5,1,1)
  (same comment as for Arsenic ion)
- Mercury II [water, ground-, long-term]: 1.8795e-9 kg; lognormal variance with pedigree 1.5135, pedigree (1,1,5,1,1)
  (same comment as for Arsenic ion)
- Mercury II [water, surface water]: 5.0562e-11 kg; lognormal variance with pedigree 1.7676, pedigree (1,1,5,1,1)
  (same comment as for Arsenic ion)
- Molybdenum VI [water, ground-, long-term]: 1.0317e-5 kg; lognormal variance with pedigree 1.01749, pedigree (1,1,5,1,1)
  (same comment as for Arsenic ion)
- Molybdenum VI [water, surface water]: 5.042e-7 kg; lognormal variance with pedigree 1.2105, pedigree (1,1,5,1,1)
  (same comment as for Arsenic ion)
- Nickel II [water, ground-, long-term]: 4.9315e-6 kg; lognormal variance with pedigree 1.105, pedigree (1,1,5,1,1)
  (same comment as for Arsenic ion)
- Nickel II [water, surface water]: 3.1074e-9 kg; lognormal variance with pedigree 1.8181, pedigree (1,1,5,1,1)
  (same comment as for Arsenic ion)
- Nitrate [water, ground-, long-term]: 0.00019752 kg
  complement of long-term emissions from incinerator bottom ash in slag compartment
- Nitrate [water, surface water]: 4.5982e-5 kg
  short-term emissions from incinerator bottom ash in slag compartment
- Silicon [water, ground-, long-term]: 0.0013207 kg; lognormal variance with pedigree 5.9357, pedigree (1,1,5,1,1)
  (same comment as for Arsenic ion)
- Silicon [water, surface water]: 5.6954e-6 kg; lognormal variance with pedigree 1.3562, pedigree (1,1,5,1,1)
  (same comment as for Arsenic ion)
- TOC, Total Organic Carbon [water, ground-, long-term]: 3.812e-5 kg; lognormal variance with pedigree 0.64371, pedigree (1,1,5,1,1)
  (same comment as for Arsenic ion)
- TOC, Total Organic Carbon [water, surface water]: 1.376e-7 kg; lognormal variance with pedigree 1.1332, pedigree (1,1,5,1,1)
  (same comment as for Arsenic ion)
- Tin ion [water, ground-, long-term]: 3.0986e-6 kg; lognormal variance with pedigree 1.1271, pedigree (1,1,5,1,1)
  (same comment as for Arsenic ion)
- Tin ion [water, surface water]: 4.9841e-11 kg; lognormal variance with pedigree 2.3251, pedigree (1,1,5,1,1)
  (same comment as for Arsenic ion)
- Zinc II [water, ground-, long-term]: 2.3076e-5 kg; lognormal variance with pedigree 0.89017, pedigree (1,1,5,1,1)
  (same comment as for Arsenic ion)
- Zinc II [water, surface water]: 6.8693e-10 kg; lognormal variance with pedigree 2.0061, pedigree (1,1,5,1,1)
  (same comment as for Arsenic ion)
