# treatment of bottom ash, MSWI, spent anion exchange resin from potable water production, slag compartment

Dataset: EcoSpold 2, unit process
Geography: GLO
Time period: 1994-01-01 to 2023-12-31
Technology level: current
Classification: ISIC rev.4 ecoinvent: 3821:Treatment and disposal of non-hazardous waste
Scenario: Business-as-Usual
System model: Allocation, cut-off by classification
Generated by: Nikolia Stoikou
Database: ecoinvent
isCopyrightProtected: true
accessRestrictedTo: 1

## General comment
The process represents the treatment of controlled landfilling in slag compartment of a waste (bottom ash) that is exclusively generated in another waste treatment. Bottom ash is the by-product that is generated during the municipal solid waste incineration (MSWI) of 'spent anion exchange resin from potable water production'. Recommended use of this dataset: to be used within the specific chain of treatments for 'spent anion exchange resin from potable water production'. Share of biogenic carbon in the sludge: 0%.

## Included activities start
The activity starts with the waste being available at the gate of the treatment facility. Collection and transportation of the waste to the treatment plant is not included.

## Included activities end
The activity ends with the waste being treated and waste-specific emissions from the slag compartment landfill are released to water (short-term emissions to surface water and long-term emissions to ground water).

## Geography
Modelling parameters affecting the treatment technology are not specific to this geography.

## Technology
Slag compartment for bottom ash from incineration with base seal and leachate collection system (Landfill type D). Recultivation after closure.

## Reference product
- bottom ash, MSWI, spent anion exchange resin from potable water production: -1 kg; By-product classification Waste; CPC 39320: Ash and residue (except from the manufacture of iron or steel), containing metals or metallic compounds, excep[…]; HS2017 262110: Slag and ash; ash and residues from the incineration of municipal waste
  main reference product of this activity (supply of disposal service).
  production volume 64876 kg
    calculated in proportion to incinerated waste reference product
  property price 0 EUR2005
    Waste products are assigned a price of zero as they are assumed to require further treatment.
  properties: cadmium content 2.5279e-6, carbon allocation 0.0287059 kg, carbon content 0.0312507, carbon content, fossil 0.0312507, carbon content, non-fossil 0, chlorine content 0.00206236, copper content 0.000345349, dry mass 0.918567 kg, lead content 0.000105903, nitrogen content 0.00678821, oxygen content 0.603404, phosphorus content 0.000203318, silicon content 0.0405907, sulfur content 0.312994, tin content 0.00200911, water content 0.0886528, water in wet mass 0.0814335 kg, wet mass 1 kg, zinc content 0.000243109

## Inputs from technosphere
- process-specific burdens, slag landfill: 0.00841689, 0.280494, 0.71109 kg (3 suppliers, which the file names only by identifier); sum of these 1 kg
  mass-specific expenditures required for landfilling of bottom ash.
- slag landfill: 1.7778e-9 unit
  slag compartment infrastructure required for landfilling of bottom ash.

## Inputs from nature
- Organic carbon, placed in landfill [inventory indicator, waste]: 0.014353 kg
  Mass of organic carbon in waste (without inorganic carbon), initially put in slag compartment. The exchange represents a flow that is within the technosphere. This exchange should only be used to apply ecofactors for the Swiss LCIA method of Ecological Scarcity and not any other purpose.
- Waste mass, total, placed in landfill [inventory indicator, waste]: 1 kg
  Mass of waste initially put in a slag compartment. The exchange represents a flow that is within the technosphere. This exchange should only be used to apply ecofactors for the Swiss LCIA method of Ecological Scarcity and not any other purpose.

## Emissions to nature
- Non-hazardous waste disposed [inventory indicator, waste]: 1 kg
  Inventory indicator for waste mass disposed. To be used in EN15804 "other data" results.
- BOD5, Biological Oxygen Demand [water, ground-, long-term]: 0.011822 kg
  complement of long-term emissions from incinerator bottom ash in slag compartment
- BOD5, Biological Oxygen Demand [water, surface water]: 4.2671e-5 kg; lognormal variance with pedigree 0.46318, pedigree (1,1,5,1,1)
  short-term emissions from incinerator bottom ash in slag compartment
  Uncertainty: Uncertainty calculated from uncertainty of composition of incinerated waste, and incinerator model uncertainty and slag compartment transfer coefficient uncertainty.
- COD, Chemical Oxygen Demand [water, ground-, long-term]: 0.036142 kg
  complement of long-term emissions from incinerator bottom ash in slag compartment
- COD, Chemical Oxygen Demand [water, surface water]: 0.00013045 kg; lognormal variance with pedigree 0.46318, pedigree (1,1,5,1,1)
  (same comment as for BOD5, Biological Oxygen Demand)
- Cadmium II [water, ground-, long-term]: 2.3208e-6 kg; lognormal variance with pedigree 1.4391, pedigree (1,1,5,1,1)
  complement of long-term emissions from incinerator bottom ash in slag compartment
  Uncertainty: Uncertainty calculated from uncertainty of composition of incinerated waste, and incinerator model uncertainty and slag compartment transfer coefficient uncertainty.
- Cadmium II [water, surface water]: 1.1947e-9 kg; lognormal variance with pedigree 2.1785, pedigree (1,1,5,1,1)
  (same comment as for BOD5, Biological Oxygen Demand)
- Chloride [water, ground-, long-term]: 0.00025804 kg; lognormal variance with pedigree 0.35117, pedigree (1,1,5,1,1)
  (same comment as for Cadmium II)
- Chloride [water, surface water]: 0.0016364 kg; lognormal variance with pedigree 0.33241, pedigree (1,1,5,1,1)
  (same comment as for BOD5, Biological Oxygen Demand)
- Copper ion [water, ground-, long-term]: 0.00031722 kg; lognormal variance with pedigree 1.1298, pedigree (1,1,5,1,1)
  (same comment as for Cadmium II)
- Copper ion [water, surface water]: 1.1014e-8 kg; lognormal variance with pedigree 2.2254, pedigree (1,1,5,1,1)
  (same comment as for BOD5, Biological Oxygen Demand)
- DOC, Dissolved Organic Carbon [water, ground-, long-term]: 0.014301 kg
  complement of long-term emissions from incinerator bottom ash in slag compartment
- DOC, Dissolved Organic Carbon [water, surface water]: 5.1621e-5 kg; lognormal variance with pedigree 0.46318, pedigree (1,1,5,1,1)
  (same comment as for BOD5, Biological Oxygen Demand)
- Lead II [water, ground-, long-term]: 9.7277e-5 kg; lognormal variance with pedigree 1.2051, pedigree (1,1,5,1,1)
  (same comment as for Cadmium II)
- Lead II [water, surface water]: 1.7757e-9 kg; lognormal variance with pedigree 2.3857, pedigree (1,1,5,1,1)
  (same comment as for BOD5, Biological Oxygen Demand)
- Nitrate [water, ground-, long-term]: 0.0224 kg; lognormal variance with pedigree 0.18455, pedigree (1,1,5,1,1)
  (same comment as for Cadmium II)
- Nitrate [water, surface water]: 0.0052144 kg; lognormal variance with pedigree 0.25134, pedigree (1,1,5,1,1)
  (same comment as for BOD5, Biological Oxygen Demand)
- Phosphate [water, ground-, long-term]: 7.5551e-6 kg; lognormal variance with pedigree 5.8764, pedigree (1,1,5,1,1)
  (same comment as for Cadmium II)
- Phosphate [water, surface water]: 1.2613e-8 kg; lognormal variance with pedigree 2.3503, pedigree (1,1,5,1,1)
  (same comment as for BOD5, Biological Oxygen Demand)
- Silicon [water, ground-, long-term]: 0.00031902 kg; lognormal variance with pedigree 6.1695, pedigree (1,1,5,1,1)
  (same comment as for Cadmium II)
- Silicon [water, surface water]: 1.3757e-6 kg; lognormal variance with pedigree 1.59, pedigree (1,1,5,1,1)
  (same comment as for BOD5, Biological Oxygen Demand)
- Sulfate [water, ground-, long-term]: 0.78386 kg; lognormal variance with pedigree 0.19357, pedigree (1,1,5,1,1)
  (same comment as for Cadmium II)
- Sulfate [water, surface water]: 0.078657 kg; lognormal variance with pedigree 0.3214, pedigree (1,1,5,1,1)
  (same comment as for BOD5, Biological Oxygen Demand)
- TOC, Total Organic Carbon [water, ground-, long-term]: 0.014301 kg
  complement of long-term emissions from incinerator bottom ash in slag compartment
- TOC, Total Organic Carbon [water, surface water]: 5.1621e-5 kg; lognormal variance with pedigree 0.46318, pedigree (1,1,5,1,1)
  (same comment as for BOD5, Biological Oxygen Demand)
- Tin ion [water, ground-, long-term]: 0.0018352 kg; lognormal variance with pedigree 0.78062, pedigree (1,1,5,1,1)
  (same comment as for Cadmium II)
- Tin ion [water, surface water]: 2.9519e-8 kg; lognormal variance with pedigree 1.9786, pedigree (1,1,5,1,1)
  (same comment as for BOD5, Biological Oxygen Demand)
- Zinc II [water, ground-, long-term]: 0.00022331 kg; lognormal variance with pedigree 1.03086, pedigree (1,1,5,1,1)
  (same comment as for Cadmium II)
- Zinc II [water, surface water]: 6.6475e-9 kg; lognormal variance with pedigree 2.1468, pedigree (1,1,5,1,1)
  (same comment as for BOD5, Biological Oxygen Demand)
