# treatment of waste polystyrene isolation, flame-retardant, collection for final disposal

Dataset: EcoSpold 2, unit process
Geography: Europe without Switzerland
Time period: 1994-01-01 to 2023-12-31
Technology level: current
Classification: ISIC rev.4 ecoinvent: 3821:Treatment and disposal of non-hazardous waste
Classification: EcoSpold01Categories: waste management/building demolition
Synonyms: EPS
Tags: Treatment
Scenario: Business-as-Usual
System model: Allocation, cut-off by classification
Generated by: Lucia Valsasina
Published in: Doka G. 2007
Database: ecoinvent
isCopyrightProtected: true
accessRestrictedTo: 1

## General comment
This is a renaming activity.The waste contains 1kg flame retarded EPS (GSD=100%). Waste density is 20 kg/m3.

## Included activities end
transport to dismantling facilities, final disposal of waste material,

## Technology
Building demolition with skid-steer loaders.

## Reference product
- waste polystyrene isolation, flame-retardant: -1 kg; name RP; By-product classification Waste; CPC 39270: Waste, parings and scrap of plastics; HS2017 391590: Plastics n.e.c. in heading no. 3915; waste, parings and scrap; CAS 9003-53-6
  EcoSpold01Location=CH
  production volume 1.12197 kg; name RP_PV; = 4*0.280493523
    Estimated. The EU without CH production volume is extrapolated from the global production volume using the nominal GDP of 2010 (source: United Nations, http://data.un.org/Glossary.aspx?q=GDP+%28current+US%24%29, accessed 20130726 and 20130312). Where the Global GDP is set to a dummy value of 4.
    Gross domestic product (GDP) at current prices is GDP at prices of the current reporting period. Also known as nominal GDP.
  property carbon content, fossil 0.918145
    Polystyrene isolation (EPS) is flame-retarded with hexa-bromo-cyclo-dodecan (C12H18Br6) and contains 0.67 w% bromine (ecoinvent v2.2 report 13_I, pg 39). The rest is polystyrene: (C8H8)n.
  property price 0 EUR2005
    Waste products are assigned a price of zero as they are assumed to require further treatment.
  properties: carbon allocation 0.91632 kg, carbon content 0.918145, carbon content, non-fossil 0, dry mass 0.998012 kg, heating value, net 38.67 MJ, water content 0.00199232, water in wet mass 0.00198835 kg, wet mass 1 kg

## Inputs from technosphere
- waste expanded polystyrene: -1 kg; name waste_epolystyrene; lognormal variance with pedigree 0.002, pedigree (1,1,1,5,1)
  disposed masses. Uncertainty calculated from uncertainty of waste composition
  EcoSpold01Location=CH
  production volume; = waste_epolystyrene*RP_PV/ABS(RP)
    Calculated from the production volume of waste polystyrene isolation, flame-retardant in proportion to the respective output amounts.
  properties: carbon content, fossil 0.864875, dry mass 0.95 kg, heating value, net 38.67 MJ, water content 0.0526316, wet mass 1 kg
  note on carbon content, fossil: Average of different polystyrene extruded. Shares are 50% (w/w) extruded using CO2/acetone as blowing agent, 25% (w/w) using HFC-134a as a blowing agent and 25% (w/w) using HFC-152a as a blowing agent (ecoinvent v2.2 report 16, part XIV, Tab 4.21). Similar result is reported in Tab A.5, ecoinvent report 13_I.

## Sampling procedure
waste-specific calculation based on literature data

## Extrapolations
none This dataset has been copied from an original dataset covering the geography CH. The uncertainty has been adjusted accordingly.
