# blow moulding

Dataset: EcoSpold 2, unit process
Geography: CA-QC
Time period: 1993-01-01 to 2023-12-31
Technology level: current
Classification: EcoSpold01Categories: plastics/processing
Classification: ISIC rev.4 ecoinvent: 2220:Manufacture of plastics products
Tags: recontextualization
Scenario: Business-as-Usual
System model: Allocation, cut-off by classification
Generated by: Pascal Lesage
Published in: Hischier R. 2007
Database: ecoinvent
isCopyrightProtected: true
accessRestrictedTo: 1

## General comment
1 kg of this process equals 0.997 kg of blow moulded plastics (e.g. bottles).
[This dataset was already contained in the ecoinvent database version 2. It was not individually updated during the transfer to ecoinvent version 3. Life Cycle Impact Assessment results may still have changed, as they are affected by changes in the supply chain, i.e. in other datasets. This dataset was generated following the ecoinvent quality guidelines for version 2. It may have been subject to central changes described in the ecoinvent version 3 change report (http://www.ecoinvent.org/database/ecoinvent-version-3/reports-of-changes/), and the results of the central updates were reviewed extensively. The changes added e.g. consistent water flows and other information throughout the database. The documentation of this dataset can be found in the ecoinvent reports of version 2, which are still available via the ecoinvent website. The change report linked above covers all central changes that were made during the conversion process.]
Child dataset exchanges identical to GLO dataset. Created to enable linking to regional markets (e.g. for electricity). Data quality indicators adjusted accordingly.

## Included activities end
This process contains the auxillaries and energy demand for the mentioned convertion process of plastics. The converted amount of plastics is NOT included into the dataset.

## Geography
information from different European and Swiss converting companies
Child dataset exchanges identical to GLO dataset. Created to enable linking to regional markets (e.g. for electricity). Data quality indicators adjusted accordingly.

## Technology
present technologies

## Time period
time to which data refer

## Parameters
- Quebec gross domestic product 2011: 3.11e11 USD(2011); name quebecGDP2011; lognormal variance with pedigree 0.0006, pedigree (1,1,1,1,1)
  Quebec Gross domestic product for 2011, expressed in 2011 USD. Source: Institut de la statistique du Québec. Converted from CAD to USD using a yearly average exchange rate of 0.989 CAD/USD (Source: bank of Canada).
- fraction, cooling water, cooling pond system, to air: 0.032 dimensionless; lognormal variance with pedigree 0.0413, pedigree (2,3,1,3,1)
- fraction, cooling water, once-through system, to air: 0.004 dimensionless; lognormal variance with pedigree 0.0413, pedigree (2,3,1,3,1)
- fraction, cooling water, recirculating system, to air: 0.771 dimensionless; lognormal variance with pedigree 0.0413, pedigree (2,3,1,3,1)
- fraction, cooling water, to air: 0.3875 dimensionless; lognormal variance with pedigree 0.092025, pedigree (4,4,3,2,4)
- world gross domestic product 2011: 7e13 USD(2011); name worldGDP2011; lognormal variance with pedigree 0.0006, pedigree (1,1,1,1,1)
  Comment: World Gross domestic product for 2011, expressed in 2011 USD. Source: World Bank.

## Reference product
- blow moulding: 1 kg; By-product classification allocatable product; CPC 89200: Moulding, pressing, stamping, extruding and similar plastic manufacturing services
  production volume 0.0177714 kg
    Gross approximation of Quebec production volume using relative value of Quebec GDP to world GDP
  property price 0.346283 EUR2005
    Calculated based on inputs: The price of the product has been calculated as a sum of the values of the material and energy inputs for this product. This value is therefore a rough estimation. It may underestimate the real price since there are additional expenses when producing any product. These expences can include for example labour costs, treatment of waste materials and profit for the producer. Please consider carefully whether this level of data quality is acceptable for your application.
  properties: carbon allocation 0 kg, carbon content 0

## Inputs from technosphere
- EUR-flat pallet: 0.000363 unit; lognormal variance with pedigree 0.0612, pedigree (2,3,5,5,3)
  Typical values, based on a European and a Swiss study
  Uncertainty: t
  properties: carbon content, fossil 0.0311351, carbon content, non-fossil 0.58833, dry mass 18.3333 kg, heating value, net 335.11 MJ, water content 0.2, wet mass 22 kg
  note on carbon content, fossil: C content in components of the pallet (ecoinvent v2.2 report 7_part XVIII)
- electricity, medium voltage: 1.7 kWh; lognormal variance with pedigree 0.0612, pedigree (2,3,5,5,3)
  Typical values, based on a European and a Swiss study
  Uncertainty: t
- packaging box factory: 1.43e-9 unit; lognormal variance with pedigree 0.448, pedigree (4,5,5,5,5)
  Estimation
  Uncertainty: e
- polyethylene, low density, granulate: 0.0299 kg; lognormal variance with pedigree 0.0612, pedigree (2,3,5,5,3)
  Typical values, based on a European and a Swiss study
  Uncertainty: t
  properties: carbon content, fossil 0.857143, dry mass 1 kg, heating value, net 42.47 MJ, wet mass 1 kg
  note on carbon content, fossil: Polyethylene is formed out of a huge amount of ethylene monomers (C2H4) (ecoinvent v2.2 report 11_II). MW=28 g/mol
- solid bleached and unbleached board carton: 0.0957 kg; lognormal variance with pedigree 0.0612, pedigree (2,3,5,5,3)
  Typical values, based on a European and a Swiss study
  Uncertainty: t
  properties: carbon content, fossil 0.0190874, carbon content, non-fossil 0.327779, dry mass 0.945 kg, heating value, net 9.8 MJ, water content 0.0582011, wet mass 1 kg
- waste plastic, mixture: -0.00299 kg; lognormal variance with pedigree 0.0214, pedigree (2,3,2,5,3)
  Typical values, based on a European and a Swiss study
  Uncertainty: t
  production volume
    (same comment as for blow moulding)
  properties: carbon content, fossil 0.747344, dry mass 0.847 kg, heating value, net 30.79 MJ, water content 0.180638, wet mass 1 kg
  note on carbon content, fossil: C content in 1 kg DM was calculated using data in Tab A.2, ecoinvent v2.2 report 13_I
  note on heating value, net: Value taken from the general comment of the treatment dataset.

## Inputs from nature
- Water, cooling, unspecified natural origin [natural resource, in water]: 0.00299 m3; lognormal variance with pedigree 0.0612, pedigree (2,3,5,5,3)
  Typical values, based on a European and a Swiss study
  Uncertainty: t

## Emissions to nature
- Water [air, unspecified]: 0.00115862 m3; lognormal variance with pedigree 0.0827, pedigree (2,2,5,5,1)
  Calculated value based on literature values and expert opinion. See comments in the parametres" comment field.
- Water [water, unspecified]: 0.00183138 m3; lognormal variance with pedigree 0.0827, pedigree (2,2,5,5,1)
  (same comment as for Water)
  property carbon content, fossil 0; name C_content_fossil
  property carbon content, non-fossil 0; name C_content_non_fossil
  property dry mass 0 kg; name DM
  property water in wet mass 1000 kg; name WWM
  property wet mass 1000 kg; name WM

## Sampling procedure
company data

## Extrapolations
no extrapolation This dataset has been copied from an original dataset covering the geography RER. The uncertainty has been adjusted accordingly.Child dataset exchanges identical to GLO dataset. Created to enable linking to regional markets (e.g. for electricity). Data quality indicators adjusted accordingly.
