# sweet corn production

Dataset: EcoSpold 2, unit process
Geography: TH
Time period: 2010-01-01 to 2023-12-31
Technology level: current
Classification: ISIC rev.4 ecoinvent: 0111:Growing of cereals (except rice), leguminous crops and oil seeds
Tags: WFLDB
Scenario: Business-as-Usual
System model: Allocation, cut-off by classification
Generated by: Tuija Waldvogel
Published in: Nemecek T. 2015
Database: ecoinvent
isCopyrightProtected: true
accessRestrictedTo: 1

## General comment
This dataset represents the production of 1 kg of sweet corn. The average yield from 2010 - 2011 is 13 t/ha. The data are representative for sweet corn production in Thailand Pakchong, Nakhon Ratchasima province. Mineral NPK fertiliser input is 100-40-0 kg/ha. Organic fertilisers applied amount to 2 m3/ha of liquid manure and 1 t/ha of solid manure. Total active ingredients (a.i.) applied as pesticides amount to 0.11 kg a.i./ha.
The dataset was modelled within the project 'World Food LCA database (WFLDB)'. The aim of this project was to provide inventories of a broad variety of agricultural products and processes and to cover for each product at least 50% of the global export market. The export share of sweet corn produced in the Thailand amounts to 25% of the global export (tonnage exported in 2010). The production system regarded in this dataset aimed at representing sweet corn produced in the Thailand for the export market.
PEF-Quality: data quality rating (DQR) = 1.8 (i.e. very good quality). This dataset refers to an average situation; for specific situations exchanges might differ substantially due to site specific parameters

## Included activities start
This activity starts with soil cultivation after the harvest of the previous crop.

## Included activities end
This activity ends with the harvest of sweet corn at farm gate. The dataset includes all machine operations, corresponding infrastructure, fuel use and sheds. Machine operations are: soil cultivation, sowing, fertilisation, pesticide application, harvesting, and on-farm transport. Further, direct field emissions and land use change are included. Heavy metal uptake by the crop is considered. The inputs of seeds, fertilisers and pesticides as well as packaging of fertilisers and pesticides are considered. The dataset doesn't include emissions from manure storage because these are within the system boundary of animal production.

## Technology
Conventional production

## Parameters
- LUC_crop_specific: 1 dimensionless
  This parameter allows to switch between a 'crop specific' and a 'country specific' approach when calculating the LUC of a crop. By default, the chosen approach is 'crop specific', so the value of the parameter is 1. If you want to apply a 'country specific' approach, turn the parameter to 0.
- heavyMetalUptakeSwitch: 1 dimensionless

## Reference product
- sweet corn: 1 kg; By-product classification allocatable product; CPC 01290: Vegetables, fresh, n.e.c.; HS2017 070999: Vegetables; edible, n.e.c. in chapter 07, fresh or chilled
  Reference flow: Yield = 13000.0 kg/ha
  production volume 1.726e8 kg
    Source: FAOSTAT. Average, 2009-2012
  property carbon content, non-fossil 0.435017
    calculation: C-content of components according to ecoinvent report No. 15a. Source of composition: Souci, S.W., Fachmann, W., Kraut, H. (Hg.: Bundesminsiterium fur Ernahrung, Landwirtschaft und Forsten, Bonn) 'Die Zusammensetzung der Lebensmittel - Nahrwerttabellen', medpharm Scientific Publishers Stuttgart, CRC Press; 2000.
  property price 0.88 EUR2005
    Calculated value based on data from United Nations Commodity Trade Statistics Database (comtrade.un.org). UN comtrade category: 200580 Sweet corn, prepared or preserved, not frozen/vinegar. Year: 2005. Using exchange rate of 1EURO = 1.209 USD. Average of price of import into 5 main markets (EU, US, JP, IN and CN).
  properties: carbon allocation 0.252917 kg, carbon content 0.435017, carbon content, fossil 0, dry mass 0.581395 kg, water content 0.72, water in wet mass 0.418605 kg, wet mass 1 kg

## Inputs from technosphere
- application of plant protection product, by field sprayer: 0.000461538 ha; source Nawanich S. 2014; lognormal variance with pedigree 0.124664, pedigree (2,2,4,1,1)
  Literature value or expert estimation (Nawanich et al. 2014).
- chopping, maize: 7.69231e-5 ha; source Nawanich S. 2014; lognormal variance with pedigree 0.124177, pedigree (2,1,4,1,1)
  Literature value or expert estimation (Nawanich et al. 2014).
- cyclic N-compound: 7.07692e-6 kg; source Nawanich S. 2014; lognormal variance with pedigree 0.0138498, pedigree (2,2,4,1,1)
  Literature value or expert estimation (Nawanich et al. 2014).
  properties: carbon content, fossil 0.641962, dry mass 1 kg, wet mass 1 kg
- fertilising, by broadcaster: 0.000153846 ha; source Nawanich S. 2014; lognormal variance with pedigree 0.124177, pedigree (2,1,4,1,1)
  Literature value or expert estimation (Nawanich et al. 2014).
- inorganic phosphorus fertiliser, as P2O5: 0.00307692 kg
  Calculated based on literature values or expert estimation: The total amount of nutrient (Personal written communication, Miles Harriman, Yara, 2015) multiplied by the share of fertiliser type (Personal written communication, Miles Harriman, Yara, 2015). See supporting documentation 'WFLDB-Documentation.pdf' chapter 'Fertiliser application' for L3 and L4 data (https://ecoquery.ecoinvent.org/File/Reports).
  Corresponds to 40.0 kg/ha
  properties: dry mass 1 kg, wet mass 1 kg
- irrigation: 0.0482347 m3; lognormal variance with pedigree 0.124177, pedigree (2,1,4,1,1)
  Calculated value: The total amount of water used for irrigation (calculated from evapotranspiration, Pfister et al. 2011) multiplied by the country-share of irrigation technique (WFLDB-Guidelines.pdf, Appendix 6.1). See supporting documentation 'WFLDB-Documentation.pdf' chapter 'Water use for irrigation' for L2 data (https://ecoquery.ecoinvent.org/File/Reports).
  properties: dry mass 0.11 kg, water content 9089.91, wet mass 1000 kg
- liquid manure spreading, by vacuum tanker: 0.000153846 m3; lognormal variance with pedigree 0.124177, pedigree (2,1,4,1,1)
  This amount corresponds to the input of liquid manure.
- maize seed, Swiss integrated production, for sowing: 0.00123077 kg; source Nordby D.E. 2004; lognormal variance with pedigree 0.124177, pedigree (2,1,4,1,1)
  Literature value or expert estimation (Nordby et al. 2004). Sowing density: 16kg/ha.
  properties: carbon content, non-fossil 0.46957, dry mass 0.88 kg, water content 0.136364, wet mass 1 kg
- manure, liquid, cattle: 0.116208 kg; source Miles Harriman 2015; lognormal variance with pedigree 0.124177, pedigree (2,1,4,1,1)
  Calculated based on literature values: The total amount of manure (Personal written communication, Miles Harriman, Yara, 2015) multiplied by the country-share of manure per animal category (FAOSTAT 2015). See supporting documentation 'WFLDB-Documentation.pdf' chapter 'Fertiliser application' (https://ecoquery.ecoinvent.org/File/Reports).
  Corresponds to 1.51 m3/ha
  properties: carbon content, non-fossil 0.68, dry mass 0.075 kg, water content 12.333, wet mass 1 kg
- manure, liquid, swine: 0.0301831 kg; source Miles Harriman 2015; lognormal variance with pedigree 0.124177, pedigree (2,1,4,1,1)
  Calculated based on literature values: The total amount of manure (Personal written communication, Miles Harriman, Yara, 2015) multiplied by the country-share of manure per animal category (FAOSTAT 2015). See supporting documentation 'WFLDB-Documentation.pdf' chapter 'Fertiliser application' (https://ecoquery.ecoinvent.org/File/Reports).
  Corresponds to 0.392 m3/ha
  properties: carbon content, non-fossil 0.64, dry mass 0.05 kg, water content 19, wet mass 1 kg
- manure, solid, cattle: 0.0599925 kg; source Miles Harriman 2015; lognormal variance with pedigree 0.124177, pedigree (2,1,4,1,1)
  Calculated based on literature values: The total amount of manure (Personal written communication, Miles Harriman, Yara, 2015) multiplied by the country-share of manure per animal category (FAOSTAT 2015). See supporting documentation 'WFLDB-Documentation.pdf' chapter 'Fertiliser application' (https://ecoquery.ecoinvent.org/File/Reports).
  Corresponds to 780.0 kg/ha
  properties: carbon content, non-fossil 0.441, dry mass 0.22 kg, water content 3.5454, wet mass 1 kg
- nitrile-compound: 2.21538e-6 kg; source Nawanich S. 2014; lognormal variance with pedigree 0.0138498, pedigree (2,2,4,1,1)
  Literature value or expert estimation (Nawanich et al. 2014).
  properties: carbon content, fossil 0.344995, dry mass 1 kg, wet mass 1 kg
- packaging, for fertilisers: 0.0215385 kg; lognormal variance with pedigree 0.0592, pedigree (4,3,4,5,4)
  Total amount of active substance/s of fertilisers needed for the production of 'sweet corn' is calculated to be circa 1.08E-02 kg. Fertiliser/s used in this dataset is/are: 'phosphate fertiliser, as P2O5', 'urea, as N'. The total amount of active substance/s is doubled in order to account for the packaging of the dilluted product of fertiliser/s that is/are applied. Therefore, 2.15E-02 kg of packaging for fertilisers is justified with this exchange.
  properties: carbon content, fossil 0.825301, dry mass 1 kg, heating value, net 25.01 MJ, price 0.0642 EUR2005, wet mass 1 kg
  note on carbon content, fossil: Considering a chemical formula (C2H4)n for polyethylene, carbon content-fossil is calculated to be 0.856286 kg of Carbon per kg of dry mass.
- packaging, for pesticides: 1.85846e-5 kg; lognormal variance with pedigree 0.0592, pedigree (4,3,4,5,4)
  Total amount of active substance/s of pesticides needed for the production of sweet corn is calculated to be circa 9.29E-06 kg. Pesticide/s used in this dataset is/are: 'cyclic N-compound', 'nitrile-compound'. The total amount of active substance/s is doubled in order to account for the packaging of the dilluted product of pesticide/s that is/are applied. Therefore, 1.86E-05 kg of packaging for pesticides is justified with this exchange.
  properties: carbon content, fossil 0.85714, dry mass 1 kg, heating value, net 25.97 MJ, price 0.0642 EUR2005, wet mass 1 kg
- poultry manure, dried: 0.0169306 kg; source Miles Harriman 2015; lognormal variance with pedigree 0.124177, pedigree (2,1,4,1,1)
  Calculated based on literature values: The total amount of manure (Personal written communication, Miles Harriman, Yara, 2015) multiplied by the country-share of manure per animal category (FAOSTAT 2015). See supporting documentation 'WFLDB-Documentation.pdf' chapter 'Fertiliser application' (https://ecoquery.ecoinvent.org/File/Reports).
  Corresponds to 220.0 kg/ha
  properties: cadmium content 2.92e-7, carbon content, non-fossil 0.33389, copper content 4.38e-5, dry mass 0.865 kg, lead content 2.92e-6, mercury content 2e-7, nickel content 4e-5, nitrogen content 0.532, phosphorus content 0.0167, potassium content 0.024, water content 0.156069, wet mass 1 kg, zinc content 0.000349
- poultry manure, fresh: 0.00372752 kg; source Miles Harriman 2015; lognormal variance with pedigree 0.124177, pedigree (2,1,4,1,1)
  Calculated based on literature values: The total amount of manure (Personal written communication, Miles Harriman, Yara, 2015) multiplied by the country-share of manure per animal category (FAOSTAT 2015). See supporting documentation 'WFLDB-Documentation.pdf' chapter 'Fertiliser application' (https://ecoquery.ecoinvent.org/File/Reports).
  Corresponds to 0.0969 m3/ha
  properties: carbon content, non-fossil 0.33389, dry mass 0.38 kg, water content 1.63158, wet mass 1 kg
- solid manure loading and spreading, by hydraulic loader and spreader: 0.0769231 kg; lognormal variance with pedigree 0.124177, pedigree (2,1,4,1,1)
  This amount corresponds the input of solid manure.
- sowing: 7.69231e-5 ha; source Nawanich S. 2014; lognormal variance with pedigree 0.124177, pedigree (2,1,4,1,1)
  Literature value or expert estimation (Nawanich et al. 2014).
- tillage, harrowing, by rotary harrow: 7.69231e-5 ha; source Nawanich S. 2014; lognormal variance with pedigree 0.124177, pedigree (2,1,4,1,1)
  Literature value or expert estimation (Nawanich et al. 2014).
- tillage, ploughing: 7.69231e-5 ha; source Nawanich S. 2014; lognormal variance with pedigree 0.124177, pedigree (2,1,4,1,1)
  Literature value or expert estimation (Nawanich et al. 2014).
- transport, freight train: 0.000848 metric ton*km
  This represent the transport of fertilizers that are directly linked to their supplying activities, to better represent the fertilizer mix of the activity. Transport distance based on US BTS Commodity Flow Surveys 1993, 1997, 2002, 2007, US Dep. Of Transportation, Bureau of Transportation Statistics.
- transport, freight, inland waterways, barge: 0.000143385 metric ton*km
  (same comment as for transport, freight train)
- transport, freight, lorry, unspecified: 0.000456923 metric ton*km
  This represent the transport of fertilizers that are directly linked to their supplying activities, to better represent the fertilizer mix of the activity. Transport distance based on US BTS Commodity Flow Surveys 1993, 1997, 2002, 2007, US Dep. Of Transportation, Bureau of Transportation Statistics. Of the total road transport, 6% is assumed to be by delivery van for goods with a large share of retail sale, and 3% for goods that are mainly sold via wholesale.
- transport, freight, sea, container ship: 0.00258738 metric ton*km
  This represent the transport of fertilizers that are directly linked to their supplying activities, to better represent the fertilizer mix of the activity. The total marine transport volume differentiated into major commodity groups based on data from FearnResearch (2001): Fearnley's Annual Review 2000. Oslo: Fearnley/AS, p. 1-78. The category 'Other cargo' accounts for 38% of total maritime transport volume and has been distributed on commodity groups based on the proportions of transport by rail and inland waterways.
  The total marine transport volume differentiated into major commodity groups based on data from FearnResearch (2001): Fearnley's Annual Review 2000. Oslo: Fearnley/AS, p. 1-78. The category 'Other cargo' accounts for 38% of total maritime transport volume and has been distributed on commodity groups based on the proportions in the marine import and export of the US in 2001-2010.
- transport, tractor and trailer, agricultural: 0.002 metric ton*km; lognormal variance with pedigree 0.162439, pedigree (4,1,4,1,1)
  On-farm transport: Yield (in tonnes) multiplied by the average distance from field to farm. The distance was assumed to be 2 km (proxy).
- urea: 0.0164908 kg; source Miles Harriman 2015; lognormal variance with pedigree 0.124177, pedigree (2,1,4,1,1)
  The exchange has been updated from 'urea, as N' into 'urea' and therefore its amount has been scaled (multiplied) from 0.0077 kg by 2.1438 kg of 'urea' per kg of 'urea, as N'. Original comment of the exchange is: Calculated based on literature values or expert estimation: The total amount of nutrient (Personal written communication, Miles Harriman, Yara, 2015) multiplied by the share of fertiliser type (Personal written communication, Miles Harriman, Yara, 2015). See supporting documentation 'WFLDB-Documentation.pdf' chapter 'Fertiliser application' for L3 and L4 data (https://ecoquery.ecoinvent.org/File/Reports).
  Corresponds to 100.0 kg/ha
  properties: carbon content, fossil 0.2, dry mass 1 kg, wet mass 1 kg

## Inputs from nature
- Carbon dioxide, in air [natural resource, in air]: 0.446069 kg; lognormal variance with pedigree 0.0138498, pedigree (2,2,4,1,1)
  CO2 uptake by biomass
- Energy, gross calorific value, in biomass [natural resource, biotic]: 5.18008 MJ; lognormal variance with pedigree 0.0138498, pedigree (2,2,4,1,1)
  Gross energy content is related to MJ/kg dry matter of product. Source: ecoinvent data.
- Occupation, annual crop [natural resource, land]: 0.259223 m2*year; lognormal variance with pedigree 0.0200616, pedigree (2,1,4,1,1)
  Related to the duration from harvest date of previous crop to harvest date of main crop: 123 days.
- Transformation, from arable land, unspecified use [natural resource, land]: 0.769231 m2; lognormal variance with pedigree 0.0442144, pedigree (2,1,4,1,1)
  10000 m2 divided by the life time of the crop.
- Transformation, to arable land, unspecified use [natural resource, land]: 0.769231 m2; lognormal variance with pedigree 0.0442144, pedigree (2,1,4,1,1)
  10000 m2 divided by the life time of the crop.

## Emissions to nature
- Ammonia [air, non-urban air or from high stacks]: 0.00207469 kg; source EEA 2013; lognormal variance with pedigree 0.0447216, pedigree (2,2,4,1,1)
  Calculated value - EMEP/EEA (2013). See 'WFLDB-Guidelines.pdf', available at https://ecoquery.ecoinvent.org/File/Reports.
- Carbon dioxide, fossil [air, non-urban air or from high stacks]: 0.0120769 kg; lognormal variance with pedigree 0.0138498, pedigree (2,2,4,1,1)
  Calculated value - CO2 emissions from urea and lime. See 'WFLDB-Guidelines.pdf', available at https://ecoquery.ecoinvent.org/File/Reports.
- Dinitrogen monoxide [air, non-urban air or from high stacks]: 0.000180225 kg; source IPCC 2006; lognormal variance with pedigree 0.124664, pedigree (2,2,4,1,1)
  Calculated value - IPCC (2006). See 'WFLDB-Guidelines.pdf', available at https://ecoquery.ecoinvent.org/File/Reports.
- Nitrogen oxides [air, non-urban air or from high stacks]: 0.000320354 kg; source EEA 2013; lognormal variance with pedigree 0.124664, pedigree (2,2,4,1,1)
  Calculated value - EEA/EMEP (2013). See 'WFLDB-Guidelines.pdf', available at https://ecoquery.ecoinvent.org/File/Reports.
- Water [air, non-urban air or from high stacks]: 0.0219723 m3; lognormal variance with pedigree 0.124177, pedigree (2,1,4,1,1)
  Calculated value - Emission calculated from water balance. See 'WFLDB-Guidelines.pdf', available at https://ecoquery.ecoinvent.org/File/Reports.
- Cadmium II [soil, agricultural]: 1.35331e-7 kg; = 1.61130769231e-07 + ( - 2.58e-08)*heavyMetalUptakeSwitch; source Freiermuth R.  2006
  Comment on mathematicalRelation:
  1.61130769231e-07 from Calculated value - Freiermuth (2006). See 'WFLDB-Guidelines.pdf', available at https://ecoquery.ecoinvent.org/File/Reports.
  -2.58e-08 from Maize grains, heavy metals uptake model
  Heavy metal uptake can be excluded by setting the parameter heavyMetalUptakeSwitch to zero.
- Chromium III [soil, agricultural]: 9.60492e-7 kg; = 1.23569230769e-06 + ( - 2.752e-07)*heavyMetalUptakeSwitch; source Freiermuth R.  2006
  Comment on mathematicalRelation:
  1.23569230769e-06 from Calculated value - Freiermuth (2006). See 'WFLDB-Guidelines.pdf', available at https://ecoquery.ecoinvent.org/File/Reports.
  -2.752e-07 from Maize grains, heavy metals uptake model
  Heavy metal uptake can be excluded by setting the parameter heavyMetalUptakeSwitch to zero.
- Copper ion [soil, agricultural]: -7.85462e-7 kg; = 1.36453846154e-06 + ( - 2.15e-06)*heavyMetalUptakeSwitch; source Freiermuth R.  2006
  Comment on mathematicalRelation:
  1.36453846154e-06 from Calculated value - Freiermuth (2006). See 'WFLDB-Guidelines.pdf', available at https://ecoquery.ecoinvent.org/File/Reports.
  -2.15e-06 from Maize grains, heavy metals uptake model
  Heavy metal uptake can be excluded by setting the parameter heavyMetalUptakeSwitch to zero.
- Fipronil [soil, agricultural]: 1.10769e-6 kg; lognormal variance with pedigree 0.0447216, pedigree (2,2,4,1,1)
  Calculated value - 100% emission in soil. See 'WFLDB-Guidelines.pdf', available at https://ecoquery.ecoinvent.org/File/Reports.
- Imidacloprid [soil, agricultural]: 7.07692e-6 kg; lognormal variance with pedigree 0.0447216, pedigree (2,2,4,1,1)
  (same comment as for Fipronil)
- Lead II [soil, agricultural]: -4.85231e-8 kg; = 2.09476923077e-07 + ( - 2.58e-07)*heavyMetalUptakeSwitch; source Freiermuth R.  2006
  Comment on mathematicalRelation:
  2.09476923077e-07 from Calculated value - Freiermuth (2006). See 'WFLDB-Guidelines.pdf', available at https://ecoquery.ecoinvent.org/File/Reports.
  -2.58e-07 from Maize grains, heavy metals uptake model
  Heavy metal uptake can be excluded by setting the parameter heavyMetalUptakeSwitch to zero.
- Mercury II [soil, agricultural]: 1.54623e-8 kg; source Freiermuth R.  2006; lognormal variance with pedigree 0.175866, pedigree (2,2,4,1,1)
  Calculated value - Freiermuth (2006). See 'WFLDB-Guidelines.pdf', available at https://ecoquery.ecoinvent.org/File/Reports.
- Nickel II [soil, agricultural]: -5.183e-7 kg; = 4.793e-07 + ( - 9.976e-07)*heavyMetalUptakeSwitch; source Freiermuth R.  2006
  Comment on mathematicalRelation:
  4.793e-07 from Calculated value - Freiermuth (2006). See 'WFLDB-Guidelines.pdf', available at https://ecoquery.ecoinvent.org/File/Reports.
  -9.976e-07 from Maize grains, heavy metals uptake model
  Heavy metal uptake can be excluded by setting the parameter heavyMetalUptakeSwitch to zero.
- Zinc II [soil, agricultural]: -7.91231e-6 kg; = 1.05776923077e-05 + ( - 1.849e-05)*heavyMetalUptakeSwitch; source Freiermuth R.  2006
  Comment on mathematicalRelation:
  1.05776923077e-05 from Calculated value - Freiermuth (2006). See 'WFLDB-Guidelines.pdf', available at https://ecoquery.ecoinvent.org/File/Reports.
  -1.849e-05 from Maize grains, heavy metals uptake model
  Heavy metal uptake can be excluded by setting the parameter heavyMetalUptakeSwitch to zero.
- Cadmium II [water, ground-]: 9.76769e-10 kg; source Freiermuth R.  2006; lognormal variance with pedigree 0.356938, pedigree (2,2,4,1,1)
  (same comment as for Mercury II)
- Cadmium II [water, surface water]: 2.423e-9 kg; source Freiermuth R.  2006; lognormal variance with pedigree 0.356938, pedigree (2,2,4,1,1)
  (same comment as for Mercury II)
- Chromium III [water, ground-]: 4.81885e-7 kg; source Freiermuth R.  2006; lognormal variance with pedigree 0.356938, pedigree (2,2,4,1,1)
  (same comment as for Mercury II)
- Chromium III [water, surface water]: 2.83262e-7 kg; source Freiermuth R.  2006; lognormal variance with pedigree 0.356938, pedigree (2,2,4,1,1)
  (same comment as for Mercury II)
- Copper ion [water, ground-]: 8.43846e-8 kg; source Freiermuth R.  2006; lognormal variance with pedigree 0.356938, pedigree (2,2,4,1,1)
  (same comment as for Mercury II)
- Copper ion [water, surface water]: 2.42615e-7 kg; source Freiermuth R.  2006; lognormal variance with pedigree 0.356938, pedigree (2,2,4,1,1)
  (same comment as for Mercury II)
- Lead II [water, ground-]: 2.30423e-9 kg; source Freiermuth R.  2006; lognormal variance with pedigree 0.356938, pedigree (2,2,4,1,1)
  (same comment as for Mercury II)
- Lead II [water, surface water]: 3.87162e-8 kg; source Freiermuth R.  2006; lognormal variance with pedigree 0.356938, pedigree (2,2,4,1,1)
  (same comment as for Mercury II)
- Mercury II [water, ground-]: 3.74608e-10 kg; source Freiermuth R.  2006; lognormal variance with pedigree 0.356938, pedigree (2,2,4,1,1)
  (same comment as for Mercury II)
- Mercury II [water, surface water]: 7.91385e-10 kg; source Freiermuth R.  2006; lognormal variance with pedigree 0.356938, pedigree (2,2,4,1,1)
  (same comment as for Mercury II)
- Nickel II [water, ground-]: 4.913e-11 kg; source Freiermuth R.  2006; lognormal variance with pedigree 0.356938, pedigree (2,2,4,1,1)
  (same comment as for Mercury II)
- Nickel II [water, surface water]: 1.88746e-7 kg; source Freiermuth R.  2006; lognormal variance with pedigree 0.356938, pedigree (2,2,4,1,1)
  (same comment as for Mercury II)
- Nitrate [water, ground-]: 0.00943671 kg; source Faist Emmenegger M. 2009; lognormal variance with pedigree 0.175866, pedigree (2,2,4,1,1)
- Phosphate [water, ground-]: 5.57492e-6 kg; source Prasuhn V.  2006; lognormal variance with pedigree 0.175866, pedigree (2,2,4,1,1)
  Calculated value - Prasuhn (2006). See 'WFLDB-Guidelines.pdf', available at https://ecoquery.ecoinvent.org/File/Reports.
- Phosphate [water, surface water]: 1.55338e-5 kg; source Prasuhn V.  2006; lognormal variance with pedigree 0.175866, pedigree (2,2,4,1,1)
  (same comment as for Phosphate)
- Phosphorus [water, surface water]: 3.51354e-6 kg; source Prasuhn V.  2006; lognormal variance with pedigree 0.175866, pedigree (2,2,4,1,1)
  Calculated value - Prasuhn (2006) and SQCB-Erosion. See 'WFLDB-Guidelines.pdf', available at https://ecoquery.ecoinvent.org/File/Reports.
- Water [water, ground-]: 0.00525254 m3; lognormal variance with pedigree 0.124177, pedigree (2,1,4,1,1)
  (same comment as for Water)
- Water [water, surface water]: 0.02101 m3; lognormal variance with pedigree 0.124177, pedigree (2,1,4,1,1)
  (same comment as for Water)
- Zinc II [water, ground-]: 5.333e-7 kg; source Freiermuth R.  2006; lognormal variance with pedigree 0.356938, pedigree (2,2,4,1,1)
  (same comment as for Mercury II)
- Zinc II [water, surface water]: 4.14815e-7 kg; source Freiermuth R.  2006; lognormal variance with pedigree 0.356938, pedigree (2,2,4,1,1)
  (same comment as for Mercury II)

## Sampling procedure
WFLDB Methodological Guidelines for the Life Cycle Inventory of Agricultural Products in the latest version, available at: (Report section: https://v30.ecoquery.ecoinvent.org/File/Reports). Data sources: Data were categorised from level 0 (L0) to level (L4) as follows: L0 = estimate, proxy; L1 = statistical data (e.g. FAOSTAT); L2 = L1 adapted to crop and country;L3 = literature data or L1 resp. L2 data approved by experts; medium detailing (i.e. kg of total N-fertiliser); L4 = L3 data of high detailing (i.e. portion N-fertiliser types).In this dataset data were obtained for yield: L3; Fertilisers: L4; Pesticides: L4; Machinery: L4; Irrigation: L2. For information regarding the calculation of individual exchanges see supporting documentation WFLDB-Documentation.pdf.

## Extrapolations
If used, extrapolations are documented on the flow level.

## Review by Assumpció ANTON 2016-05-30
Be aware that the use of statistics in input calculations could provide some specific inputs not common for specific crops, this should be corrected if better information is available and better reflexed in DQR . Currently, I would dissent for some of good marks provided, being a revision of criteria applied advisable.
Pesticides will need to be amended periodically checking for update of pesticides' ban.
