# collector field area construction, solar tower power plant, 20 MW

Dataset: EcoSpold 2, unit process
Geography: ZA
Time period: 2010-01-01 to 2023-01-01
Technology level: current
Classification: ISIC rev.4 ecoinvent: 4220:Construction of utility projects
Synonyms: solar-field aperture area
Tags: CSP; Concentrated Solar Power
Scenario: Business-as-Usual
System model: Allocation, cut-off by classification
Generated by: Karin Treyer
Published in: Telsnig, Thomas 2015
Database: ecoinvent
isCopyrightProtected: true
accessRestrictedTo: 1

## General comment
This activity represents the construction of large two-axis tracked mirrors that are installed around a receiver tower to serve as component of a solar tower power plant in Upington, South Africa. These slightly curved mirrors are also called heliostats; a computer calculates the ideal position for each of these, and a motor drive moves them according to sunshine . The total collector field area amounts to 215'520 m2. Total land use for the concentrated solar power plant is accounted for in the dataset "concentrated solar power plant construction, solar tower, 20 MW".
This dataset is entirely based on the detailed life cycle inventory as presented in the dissertation report by
Telsnig, Thomas. 2015. Standortabhängige Analyse und Bewertung solarthermischer Kraftwerke am Beispiel Südafrikas. Forschungsbericht. Band 123. ISSN 0938-1228. Institut für Energiewirtschaft und Rationelle Energieanwendung, Universität Stuttgart, Germany.

## Included activities start
The activity starts with the construction of the mirrors. It includes operationalization and maintenance of the heliostats to transfer the sunlight onto a receiver.

Total land use for the CSP plant is accounted for in the dataset "concentrated solar power plant construction, solar tower, 20 MW".

## Included activities end
The activity concludes after setting up the entire heliostat field with the respective wire connectivity for power, monitoring and maintenance.

## Geography
The CSP plant represented in this dataset has been modelled specifically for South African conditions (see Telsnig 2015).

## Reference product
- collector field area, solar tower power plant, 20 MW: 1 unit; name RP_amount_1; By-product classification allocatable product; CPC 53262: Power plants
  production volume 1 unit; name RP_PV_1
    Assumption
  property Surface 215520 m2
    Calculated collector field area (mirror area) for the considered plant design. This does not represent the land area covered.
  property lifetime 30 year; name lifetime
    The economic lifetime of the plant is assumed to be 30 years.
  property price 3.9e7 EUR2005
    Telsnig 2015: Investment cost for the collector field area of a 20MW CSP solar tower plant in South Africa (EUR2010) with limited storage capacity (see Table 4-4 in Telsnig, 2015).
    Reference(s): Telsnig, Thomas. 2015. Standortabhängige Analyse und Bewertung solarthermischer Kraftwerke am Beispiel Südafrikas. Forschungsbericht. Band 123. ISSN 0938-1228. Institut für Energiewirtschaft und Rationelle Energieanwendung, Universität Stuttgart, Germany.
  properties: carbon allocation 0 kg, carbon content 0

## Inputs from technosphere
- cast iron: 990793 kg; name castiron; lognormal variance with pedigree 0.0197, pedigree (4,4,4,3,2)
  Used to setup the mirror holders
  properties: carbon content, fossil 0.04, dry mass 1 kg, wet mass 1 kg
  note on carbon content, fossil: Cast iron is made by remelting pig iron in small furnaces (e.g. cupola furnaces or electric arc furnaces) and poured into moulds to make castings. It usually contains 2% to 6% carbon (ecoinvent v2.2 report 10_partII). An average content of 4% was considered
- concrete, normal strength: 2783 m3; name concrete; lognormal variance with pedigree 0.0197, pedigree (4,4,4,3,2)
  Setting up the rigid frame to hold the mirrors.
  properties: dry mass 2190 kg, water content 0.086758, wet mass 2380 kg
- copper, cathode: 29818 kg; name copper; lognormal variance with pedigree 0.0197, pedigree (4,4,4,3,2)
  Copper mainly used for wire drawing to produce wires and cables for ground networks.
  properties: dry mass 1 kg, wet mass 1 kg
- flat glass, coated: 2.17974e6 kg; name glass; lognormal variance with pedigree 0.0197, pedigree (4,4,4,3,2)
  Used in the construction of the mirrors
  properties: dry mass 1 kg, wet mass 1 kg
- reinforcing steel: 5.9005e6 kg; name steel; lognormal variance with pedigree 0.0197, pedigree (4,4,4,3,2)
  Used to setup the mirror holders
  properties: carbon content, fossil 0.004, dry mass 1 kg, wet mass 1 kg
- scrap copper: -29818 kg; name BP_amount_2; = copper; lognormal variance with pedigree 0.0137, pedigree (4,4,3,3,2)
  Copper sent for municipal incineration
  production volume; = RP_PV_1 * (BP_amount_2 / RP_amount_1)
    Calculated from production volume of reference product using the relative outputs.
  properties: dry mass 1 kg, wet mass 1 kg
- waste concrete: -6.1226e6 kg; name BP_amount_4; = concrete*2200; lognormal variance with pedigree 0.0137, pedigree (4,4,3,3,2)
  Disposal of concrete. The density is assumed to be 2200kg/m3.
  production volume; = RP_PV_1 * (BP_amount_4 / RP_amount_1)
    Calculated from production volume of reference product using the relative outputs.
  properties: dry mass 0.5 kg, water content 1, wet mass 1 kg
- waste glass: -2.17974e6 kg; name BP_amount_3; = glass; lognormal variance with pedigree 0.0137, pedigree (4,4,3,3,2)
  treatment of waste glass. Collected for disposal.
  production volume; = RP_PV_1 * (BP_amount_3 / RP_amount_1)
    Calculated from production volume of reference product using the relative outputs.
  properties: dry mass 1 kg, heating value, net 0.05 MJ, wet mass 1 kg
  note on heating value, net: Value extracted from "treatment of waste glass, open dump, very wet infiltration class (1000mm)"
- waste reinforcement steel: -4.47934e6 kg; name BP_amount_1; = (steel+castiron)*0.65; lognormal variance with pedigree 0.0137, pedigree (4,4,3,3,2)
  All steel types are assumed to be treated as reinforcing steel due to lack of other appropriate datasets in ecoinvent.
  For the time period 2003-2012, average steel recycling rate in South Africa amounted to 35% fo the total steel mass according to Telsnig 2015. The remaining steel is assumed to be sent to final disposal.
  production volume; = RP_PV_1 * (BP_amount_1 / RP_amount_1)
    Calculated from production volume of reference product using the relative outputs.
  properties: dry mass 1 kg, wet mass 1 kg
- waste reinforcement steel: -2.41195e6 kg; name BP_amount_5; = (steel+castiron)*0.35
  (same comment as for waste reinforcement steel)
  production volume; = RP_PV_1 * (BP_amount_5 / RP_amount_1)
    Calculated from production volume of reference product using the relative outputs.
- welding, arc, steel: 29124 m; lognormal variance with pedigree 0.0197, pedigree (4,4,4,3,2)
  Parts of the steel input is welded to contribute to setting up of the solar tower and the heliostat stands.
- wire drawing, copper: 29758.4 kg; = 0.998*copper; lognormal variance with pedigree 0.0197, pedigree (4,4,4,3,2)
  Process to convert the raw copper to field wires and cables etc. The 0.998 represents the share of copper that is used for wire drawing.

## Sampling procedure
This dataset is entirely based on the detailed life cycle inventory as presented in the dissertation report by
Telsnig, Thomas. 2015. Standortabhängige Analyse und Bewertung solarthermischer Kraftwerke am Beispiel Südafrikas. Forschungsbericht. Band 123. ISSN 0938-1228. Institut für Energiewirtschaft und Rationelle Energieanwendung, Universität Stuttgart, Germany.

Further, data in Telsnig 2015 are not shown explicitely for the downscaled 20 MW solar tower power plant. This gap is filled in the ecoinvent report.

## Extrapolations
The original data modelling a 440 MW power plant have been scaled down with parameter specific linear and non-linear equations to represent a 20 MW plant design.

## Review by Christopher Oberschelp 2017-03-13
Very detailed, structured and well-documented datasets. Main exchanges have been checked and make sense.
