# precious metal refinery construction

Dataset: EcoSpold 2, unit process
Geography: SE
Time period: 2000-01-01 to 2023-12-31
Technology level: current
Classification: EcoSpold01Categories: metals/extraction
Classification: ISIC rev.4 ecoinvent: 4100:Construction of buildings
Tags: ConvertedDataset
Scenario: Business-as-Usual
System model: Allocation, cut-off by classification
Generated by: Wolfram Scharnhorst
Published in: Classen M. 2009
Database: ecoinvent
isCopyrightProtected: true
accessRestrictedTo: 1

## General comment
The precious metal plant is equipped as follows: 1 Electrolyte cell, 1 Eluation cell, 5 Electrowinning cell, 1 Calcination furnace, 1 Smelting furnace, 1 Electrorefining cell. A building hall houses the equipment covering 5'000m2. The service life time assumed is 25 years, the yearly capacity of anode slime treatment is 243 t.
[This dataset was already contained in the ecoinvent database version 2. It was not individually updated during the transfer to ecoinvent version 3. Life Cycle Impact Assessment results may still have changed, as they are affected by changes in the supply chain, i.e. in other datasets. This dataset was generated following the ecoinvent quality guidelines for version 2. It may have been subject to central changes described in the ecoinvent version 3 change report (http://www.ecoinvent.org/database/ecoinvent-version-3/reports-of-changes/), and the results of the central updates were reviewed extensively. The changes added e.g. consistent water flows and other information throughout the database. The documentation of this dataset can be found in the ecoinvent reports of version 2, which are still available via the ecoinvent website. The change report linked above covers all central changes that were made during the conversion process.]

## Included activities start
The activity starts with the occupaiton and transformation of unspecifield land.

## Included activities end
Construction of facilities and housing, and their disposal. No transports and construction work considered.

## Geography
Data describes a Swedish plant that is singular in the region and ranges worldwide among the big producer. It may be taken as approximation for the global situation

## Technology
Due to high temperature chromium steel and refractory materials are used. Kaldo converter and converter aisle considered.

## Reference product
- precious metal refinery: 1 unit; By-product classification allocatable product; CPC 53269: Other constructions for manufacturing
  production volume 0.0324272 unit
    This is a placeholder value that does not reflect real-world production volumes. This dataset does not currently require a real-world production volume to work in the database framework, and no actual data were collected yet. This has no negative effect on the results of the ecoinvent database. The placeholder value of this activity was scaled according to the nominal GDP of 2005 (source: United Nations, http://data.un.org/Glossary.aspx?q=GDP+%28current+US%24%29, accessed 20130726) to reflect an appropriate share of the global production volume, which is also a placeholder value.
  property price 351474 EUR2005
    Calculated based on inputs: The price of the product has been calculated as a sum of the values of the material and energy inputs for this product. This value is therefore a rough estimation. It may underestimate the real price since there are additional expenses when producing any product. These expences can include for example labour costs, treatment of waste materials and profit for the producer. Please consider carefully whether this level of data quality is acceptable for your application.
  properties: carbon allocation 0 kg, carbon content 0

## Inputs from technosphere
- building, hall, steel construction: 2000 m2; lognormal variance with pedigree 0.0581, pedigree (4,1,5,3,1)
- calcium carbide, technical grade: 0.37373 kg; lognormal variance with pedigree 0.1107, pedigree (2,1,5,3,4)
  properties: carbon content, fossil 0.375, dry mass 1 kg, heating value, net 11.36 MJ, wet mass 1 kg
- concrete, medium strength: 3.6202 m3; lognormal variance with pedigree 0.0407, pedigree (2,1,5,3,1)
  properties: dry mass 2190 kg, water content 0.086758, wet mass 2380 kg
- glass fibre reinforced plastic, polyamide, injection moulded: 1786.5 kg; lognormal variance with pedigree 0.0407, pedigree (2,1,5,3,1)
  properties: carbon content, fossil 0.446018, dry mass 1 kg, wet mass 1 kg
  note on carbon content, fossil: Polyamide resin assimilate to Nylon 66 (ecoinvent v2.2 report 7_XIII). Nylon 66 is derived from hexamethylene diamine and adipic acid and has the following structure: -(HN-(CH2)6-NH-CO-(CH2)4-CO)n- (ecoinvent v2.2 report 11_II), C12H22N2O2. MW=226 g/mol. Here Nylon 66 is – mainly for improved stiffness and stability – modified with glass fibres. The glass fibre content in the product is assumed of 30%. (ecoinvent v2.2 report 11_II)
- lead: 2704.1 kg; lognormal variance with pedigree 0.1107, pedigree (2,1,5,3,4)
  properties: dry mass 1 kg, wet mass 1 kg
- nickel smelter slag: -101880 kg; lognormal variance with pedigree 0.1401, pedigree (5,1,1,3,4)
  production volume
    Calculated from the production volume of precious metal refinery in proportion to the respective output amounts.
  properties: carbon content, fossil 0.00345, dry mass 1 kg, wet mass 1 kg
- refractory spent pot liner from Al electrolysis: -3706.7 kg; lognormal variance with pedigree 0.1401, pedigree (5,1,1,3,4)
  production volume
    (same comment as for nickel smelter slag)
  properties: dry mass 1 kg, wet mass 1 kg
- refractory, basic, packed: 113510 kg; lognormal variance with pedigree 0.0407, pedigree (2,1,5,3,1)
  properties: dry mass 1 kg, wet mass 1 kg
- section bar rolling, steel: 2548.6 kg; lognormal variance with pedigree 0.040625, pedigree (2,1,5,2,1)
  activityLink introduced to establish a direct link to the corresponding regional supply of this product
- sheet rolling, chromium steel: 8373.8 kg; lognormal variance with pedigree 0.040625, pedigree (2,1,5,2,1)
  (same comment as for section bar rolling, steel)
- steel, chromium steel 18/8, hot rolled: 8581.6 kg; lognormal variance with pedigree 0.040625, pedigree (2,1,5,2,1)
  properties: carbon content, fossil 0.0008, dry mass 1 kg, wet mass 1 kg
  note on carbon content, fossil: Stainless steel model is the grade 304 steel (18/8 stainless, 18% chromium 8% nickel; max. 0.08% C)
- tin: 26.439 kg; lognormal variance with pedigree 0.1107, pedigree (2,1,5,3,4)
  properties: dry mass 1 kg, wet mass 1 kg
- waste concrete, not reinforced: -3.6202 kg; lognormal variance with pedigree 0.0007, pedigree (2,1,1,3,1)
  production volume
    (same comment as for nickel smelter slag)
  properties: dry mass 1 kg, wet mass 1 kg

## Inputs from nature
- Occupation, industrial area [natural resource, land]: 50000 m2*year; lognormal variance with pedigree 0.082, pedigree (3,1,5,1,1)
- Transformation, from unspecified [natural resource, land]: 2000 m2; lognormal variance with pedigree 0.16, pedigree (1,1,5,1,1)
- Transformation, to industrial area [natural resource, land]: 2000 m2; lognormal variance with pedigree 0.16, pedigree (1,1,5,1,1)

## Sampling procedure
estimation

## Extrapolations
see Geography and Technology

## Review by Roberto Dones 2007-08-22
Passed
