# activated bentonite production

Dataset: EcoSpold 2, unit process
Geography: RoW
Time period: 1997-01-01 to 2023-12-31
Technology level: current
Classification: ISIC rev.4 ecoinvent: 2011:Manufacture of basic chemicals
Scenario: Business-as-Usual
System model: Allocation, cut-off by classification
Generated by: Daniel Kellenberger (obsolete)
Published in: Kellenberger D. 2004
Database: ecoinvent
isCopyrightProtected: true
accessRestrictedTo: 1

## General comment
This dataset represents the production of 1 kg of activated bentonite, which represents a mix of products, put together from the production processes of alkaline activated bentonite (38%), acid activated bentonite (61%) and catalytic converter (1%). Bentonite is an industrial mineral with a high content of swellable threelayer clay minerals, which originate mostly from the transformation of volcanic ashes and tuffs. Alkaline activated bentonite is used for the production of casting moulds, for various applications in the construction sector, for wine clarification and for paper recycling. Acid activated bentonite is mostly used for the production of bleaching earth and self-copying paper. This dataset is based on an environmental report of a German company (Süd-Chemie AG).
References:
Kellenberger D., Althaus H.-J., Jungbluth N., Künniger T., Lehmann M. and Thalmann P. (2007) Life Cycle Inventories of Building Products. Final report ecoinvent Data v2.0 No. 7. EMPA Dübendorf, Swiss Centre for Life Cycle Inventories, Dübendorf, CH.

## Included activities start
The activity starts when the raw materials enter the process.

## Included activities end
This activity ends with the production of acid and alkaline activated bentonite (using two separate production processes). The production process of acid activated bentonite includes milling, activation, filtration/washing, milling, drying and storage. The production process of alkaline activated bentonite includes mixing, activation, grinding-drying, mixing/milling/granulation and storage. The dataset includes emissions to water, which is released into a river after treatment, as well as emissions to air.

## Geography
This dataset is based on data from a German company. The data are assumed to be representative of the global production.

## Technology
Mix of different production processes for different products in one German plant: 61% acid activated bentonite, 38% alkaline activated bentonite and 1% catalytic converter.
References:
Kellenberger D., Althaus H.-J., Jungbluth N., Künniger T., Lehmann M. and Thalmann P. (2007) Life Cycle Inventories of Building Products. Final report ecoinvent Data v2.0 No. 7. EMPA Dübendorf, Swiss Centre for Life Cycle Inventories, Dübendorf, CH.

## Parameters
- fraction, process water, to air: 0.15 dimensionless; name fraction_PW_to_air; lognormal variance with pedigree 0.092025, pedigree (4,4,3,2,4)
  Literature value. In case when no industry/process specific data are available, default evaporation fraction value is used. This value is 15% and is based on literature (Statistics Canada, 2007 & Shaffer, K.H., 2008, Consumptive water use in the Great Lakes Basin, USGS & Shiklomanov, 2003, World Water Resources at the Beginning of the 21st Century) and has been approved by an expert.
- fraction, tap water, to air: 0.15 dimensionless; name fraction_TW_to_air; = fraction_PW_to_air; lognormal variance with pedigree 0.092025, pedigree (4,4,3,2,4)
  Calculated value. See comment in the other parametres present in this dataset. Tap water is considered to be always used as process water, thus process water fractions to air are applied to all tap water input flows to calculate the amount of water consumed in the processes.

## Reference product
- activated bentonite: 1 kg; name RP; By-product classification allocatable product; CPC 15400: Clays; HS2017 250810: Clays (excluding expanded clays of heading no. 6806); bentonite, whether or not calcined
  Bentonite is an industrial mineral with a high content of swellable threelayer clay minerals, which originate mostly from the transformation of volcanic ashes and tuffs. Alkaline activated bentonite is used for the production of casting moulds, for various applications in the construction sector, for wine clarification and for paper recycling. Acid activated bentonite is mostly used for the production of bleaching earth and self-copying paper.
  production volume 9.51e8 kg; name RP_PV; = 0.06*16210000000
    Estimated based on the global production volume of bentonite, which was 16210 thousand tonnes in 2016 (USGS 2017). According to the Industrial Minerals Magazine (2016), about 6% of the bentonite consumed in China is used for the production of activated clays. This share is assumed to be the same at the global level. Therefore, the amount of activated bentonite produced globally in 2016 is estimated to be 972.6 thousand tonnes.
    References:
    U.S. Geological Survey (USGS) (2017) Mineral Commodity Summaries, Clays, January 2017, https://minerals.usgs.gov/minerals/pubs/commodity/clays/mcs-2017-clays.pdf (accessed on the 2017-08-08).
    Industrial Minerals Magazine (2016) Soaking it up: Bentonite’s global reach, June issue, pages 37-42.
  property carbon content, fossil 0
    Bentonite is an absorbent aluminium phyllosilicate, generally impure clay consisting mostly of montmorillonite, whose chemical formula is (Na,Ca)0.33(Al,Mg)2(Si4O10)(OH)2·nH2O (ecoinvent v2.2 report 7_part XIX)
  property carbon content, non-fossil 0
    (same comment as for activated bentonite)
  property price 0.096 EUR2005
    Literature data; http://data.un.org/Data.aspx?q=bentonite&d=ComTrade&f=_l1Code%3a26%3bcmdCode%3a250810.
  properties: carbon allocation 0 kg, carbon content 0, dry mass 1 kg, water content 0, water in wet mass 0 kg, wet mass 1 kg

## Inputs from technosphere
- bentonite: 1 kg; lognormal variance with pedigree 0.0426, pedigree (1,3,5,5,1)
  Literature data.
  Reference:
  Süd-Chemie (1999) vereinfachte Umwelterklärung Bentonit 1999, Standort Moosburg. Süd-Chemie AG, München und Moosburg, D-80333 München.
  Activity link: The original ecoinvent report for this datasets stated that "the bentonite factory is practically attached to the mine" (Kellenberger et al. 2007 - Part XIX, p.6). In addition, the diesel consumption in quarry operation and subsequent processing has remained the same as in the orginal ecoinvent v2 datasets. It is therefore assumed justifed to link the production of activated bentonite directly to the bentonite quarry operation through an activity link, and that this modelling is representative for global supply as well.
  Reference:
  Kellenberger D., Althaus H.-J., Jungbluth N., Künniger T., Lehmann M. and Thalmann P. (2007) Life Cycle Inventories of Building Products. Final report ecoinvent Data v2.0 No. 7. EMPA Dübendorf, Swiss Centre for Life Cycle Inventories, Dübendorf, CH
  properties: dry mass 1 kg, wet mass 1 kg
- bentonite quarry infrastructure: 5.78e-11 unit; lognormal variance with pedigree 0.3426, pedigree (1,3,5,5,1)
  Literature data.
  Reference:
  Süd-Chemie (1999) vereinfachte Umwelterklärung Bentonit 1999, Standort Moosburg. Süd-Chemie AG, München und Moosburg, D-80333 München.
- chemical, organic: 0.0918 kg; lognormal variance with pedigree 0.0426, pedigree (1,3,5,5,1)
  (same comment as for bentonite quarry infrastructure)
  properties: carbon content, fossil 0.628, dry mass 1 kg, heating value, net 19.03 MJ, wet mass 1 kg
  note on carbon content, fossil: This dataset is an unweighted average of 20 organic substances (listed in Tab 88.1, ecoinvent v2.2 report 8, part II), being part of the top100 chemicals included in this database. The C-content has also been calculated as an unweighted average of the C content of the substances composing this dataset.
- diesel, burned in building machine: 0.00934 MJ; lognormal variance with pedigree 0.0426, pedigree (1,3,5,5,1)
  (same comment as for bentonite quarry infrastructure)
  properties: heating value, net 1 MJ
- electricity, medium voltage: 4.81641e-5, 7.20966e-5, 2.2776e-5, 0.000423949, 0.000248826, 0.000295007, 0.00358335, 8.54631e-6, 0.0714798, 0.024017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 kWh (47 suppliers, which the file names only by identifier); sum of these 0.126 kWh; lognormal variance with pedigree 0.0426, pedigree (1,3,5,5,1)
  (same comment as for bentonite quarry infrastructure)
- hard coal: 0.00177293, 0.000420702, 0.00138038, 0.0125474, 0.00294675, 0.00180923, 0.00264322, 0.00390999, 0.000769394 kg (9 suppliers, which the file names only by identifier); sum of these 0.0282 kg; lognormal variance with pedigree 0.0426, pedigree (1,3,5,5,1)
  (same comment as for bentonite quarry infrastructure)
  properties: carbon content, fossil 0.845, dry mass 0.94 kg, heating value, net 27.91 MJ, water content 0.0638298, wet mass 1 kg
  note on carbon content, fossil: C content 75-94% (specified in Tab 1.1, report 6, part VI). A mean content of 0.845 kg C/ kg dry hard coal was considered
  note on heating value, net: Based on the Characterization factor of Hard coal in the CED method
- hazardous waste, for underground deposit: -0.0113 kg; name BP_hazardous_waste_for_underground; lognormal variance with pedigree 0.0026, pedigree (1,3,1,5,1)
  (same comment as for bentonite quarry infrastructure)
  production volume; = RP_PV*BP_hazardous_waste_for_underground/ABS(RP)
    Calculated from the production volume of activated bentonite in proportion to the respective output amounts.
  properties: carbon content, fossil 0.554667, dry mass 1 kg, wet mass 1 kg
  note on carbon content, fossil: Tab A.6, ecoinvent v2.2 report 13_I, average hazardous waste composition was used, and referred to 0% water mass. No waste-specific emission are currently inventoried for underground deposits. Accordingly, no waste composition must be specified. For generic, average waste to underground deposit deposition in a 200 liter steel drum without cement solidification is assumed (ecoinvent v2.2 report 13_I).
- heat, district or industrial, natural gas: 0.00368008, 0.223951, 6.92076e-5 MJ (3 suppliers, which the file names only by identifier); sum of these 0.2277 MJ; lognormal variance with pedigree 0.0426, pedigree (1,3,5,5,1)
  properties: heating value, net 1 MJ
- hydrochloric acid, without water, in 30% solution state: 0.164 kg; lognormal variance with pedigree 0.1126, pedigree (5,3,5,5,1)
  (same comment as for bentonite quarry infrastructure)
  properties: dry mass 1 kg, heating value, net 3.32 MJ, wet mass 1 kg
- inert waste, for final disposal: -0.0713356, -0.000464413 kg (2 suppliers, which the file names only by identifier); sum of these -0.0718 kg; lognormal variance with pedigree 0.0026, pedigree (1,3,1,5,1)
  (same comment as for bentonite quarry infrastructure)
  production volume; = RP_PV*BP_inert_waste_for_final_disposal/ABS(RP)
    (same comment as for hazardous waste, for underground deposit)
  properties: dry mass 0.995 kg, water content 0.00502513, wet mass 1 kg
- soda ash, light: 0.0331 kg; lognormal variance with pedigree 0.0426, pedigree (1,3,5,5,1)
  (same comment as for bentonite quarry infrastructure)
  properties: carbon content, fossil 0.0517241, dry mass 1 kg, heating value, net 3.43 MJ, wet mass 1 kg
- sodium hydroxide, without water, in 50% solution state: 0.00328 kg; lognormal variance with pedigree 0.0426, pedigree (1,3,5,5,1)
  (same comment as for bentonite quarry infrastructure)
  properties: dry mass 1 kg, heating value, net 3.03 MJ, wet mass 1 kg
- sulfuric acid: 0.164 kg; lognormal variance with pedigree 0.1126, pedigree (5,3,5,5,1)
  (same comment as for bentonite quarry infrastructure)
  properties: dry mass 1 kg, wet mass 1 kg
- tap water: 6.20734e-5, 9.46257e-5, 0.000176567, 0.000475658, 5.72564e-5, 0.00238608, 4.25532e-5, 0.0273052 kg (8 suppliers, which the file names only by identifier); sum of these 0.0306 kg; lognormal variance with pedigree 0.0426, pedigree (1,3,5,5,1)
  (same comment as for bentonite quarry infrastructure)
  properties: carbon content, fossil 0.00178991, dry mass 0.000337476 kg, water content 2962.17, wet mass 1 kg
  note on carbon content, fossil: Bicarbonate content is 2.93 mol/m3. CO2 content is 0.1 mol/m3 (ecoinvent v2.2 report 8, Tab 93.1).
- wastewater, average: -3.03577e-7, -5.05166e-5, -1.79858e-7 m3 (3 suppliers, which the file names only by identifier); sum of these -5.1e-5 m3; lognormal variance with pedigree 0.0026, pedigree (1,3,1,5,1)
  (same comment as for bentonite quarry infrastructure)
  production volume; = RP_PV*BP_wastewater_from_residence/ABS(RP)
    (same comment as for hazardous waste, for underground deposit)
  properties: carbon content, non-fossil 0.194039, dry mass 0.346837 kg, mass concentration, TOC 0.1091 kg/m3, mass concentration, calcium 0.039453 kg/m3, mass concentration, chlorine 0.030031 kg/m3, mass concentration, hydrogen 0.013365 kg/m3, mass concentration, nitrogen 0.031015 kg/m3, mass concentration, oxygen 0.069824 kg/m3, mass concentration, sodium 0.06456 kg/m3, mass concentration, sulfur 0.015602 kg/m3, water content 2882.2, wet mass 1000 kg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
  note on carbon content, non-fossil: 0.0673 kg TOC/m3 (Tab A.17, ecoinvent v2.2 report 13_I). TOC was considered as Total Carbon.

## Inputs from nature
- Water, well, in ground [natural resource, in water]: 0.00749 m3; name water_well_in_ground_input; lognormal variance with pedigree 0.0426, pedigree (1,3,5,5,1)
  (same comment as for bentonite quarry infrastructure)

## Emissions to nature
- Ammonia [air, unspecified]: 2.89e-6 kg; lognormal variance with pedigree 0.0826, pedigree (1,3,5,5,1)
  (same comment as for bentonite quarry infrastructure)
- Hydrochloric acid [air, unspecified]: 2.89e-8 kg; lognormal variance with pedigree 0.0826, pedigree (1,3,5,5,1)
  (same comment as for bentonite quarry infrastructure)
- NMVOC, non-methane volatile organic compounds [air, unspecified]: 3.18e-6 kg; lognormal variance with pedigree 0.0826, pedigree (1,3,5,5,1)
  (same comment as for bentonite quarry infrastructure)
- Particulate Matter, < 2.5 um [air, unspecified]: 2.83e-5 kg; lognormal variance with pedigree 0.2526, pedigree (1,3,5,5,1)
  (same comment as for bentonite quarry infrastructure)
- Particulate Matter, > 10 um [air, unspecified]: 4.21e-5 kg; lognormal variance with pedigree 0.2526, pedigree (1,3,5,5,1)
  (same comment as for bentonite quarry infrastructure)
- Particulate Matter, > 2.5 um and < 10um [air, unspecified]: 9.15e-5 kg; lognormal variance with pedigree 0.2526, pedigree (1,3,5,5,1)
  (same comment as for bentonite quarry infrastructure)
- Sulfur dioxide [air, unspecified]: 1.97e-6 kg; lognormal variance with pedigree 0.0426, pedigree (1,3,5,5,1)
  (same comment as for bentonite quarry infrastructure)
- Water [air, unspecified]: 0.00112809 m3; = (tap_water_input/1000*fraction_TW_to_air)+(water_well_in_ground_input*fraction_PW_to_air); lognormal variance with pedigree 0.0827, pedigree (2,2,5,5,1)
  Calculated as a fraction of the input of water. For more details, refer to the mathematical relation and the parameters.
  property fraction, origin: fresh water 1; name fraction_origin_fresh_water
  property fraction, origin: salt water 0; name fraction_origin_salt_water
  property fraction, origin: unspecified 0; name fraction_origin_unspecified
- AOX, Adsorbable Organic Halides [water, surface water]: 8.68e-9 kg; lognormal variance with pedigree 0.0826, pedigree (1,3,5,5,1)
  (same comment as for bentonite quarry infrastructure)
- Aluminium III [water, surface water]: 4.74e-7 kg; lognormal variance with pedigree 0.6926, pedigree (1,3,5,5,1)
  (same comment as for bentonite quarry infrastructure)
- Ammonium [water, surface water]: 2.89e-7 kg; lognormal variance with pedigree 0.0826, pedigree (1,3,5,5,1)
  (same comment as for bentonite quarry infrastructure)
- Arsenic ion [water, surface water]: 3.18e-8 kg; lognormal variance with pedigree 0.6926, pedigree (1,3,5,5,1)
  (same comment as for bentonite quarry infrastructure)
- BOD5, Biological Oxygen Demand [water, surface water]: 7.12e-5 kg; lognormal variance with pedigree 0.0826, pedigree (1,3,5,5,1)
  Calculated as 0.5*COD.
- COD, Chemical Oxygen Demand [water, surface water]: 3.56e-5 kg; lognormal variance with pedigree 0.0826, pedigree (1,3,5,5,1)
  (same comment as for bentonite quarry infrastructure)
- Cadmium II [water, surface water]: 5.78e-9 kg; lognormal variance with pedigree 0.6926, pedigree (1,3,5,5,1)
  (same comment as for bentonite quarry infrastructure)
- Chloride [water, surface water]: 0.00166 kg; lognormal variance with pedigree 0.1526, pedigree (5,3,5,5,1)
  (same comment as for bentonite quarry infrastructure)
- Chromium III [water, surface water]: 5.78e-9 kg; lognormal variance with pedigree 0.6926, pedigree (1,3,5,5,1)
  (same comment as for bentonite quarry infrastructure)
- Copper ion [water, surface water]: 8.68e-9 kg; lognormal variance with pedigree 0.6926, pedigree (1,3,5,5,1)
  (same comment as for bentonite quarry infrastructure)
- DOC, Dissolved Organic Carbon [water, surface water]: 1.31852e-5 kg; lognormal variance with pedigree 0.0826, pedigree (1,3,5,5,1)
  Calculated as equal to TOC.
- Hydrocarbons, unspecified [water, surface water]: 1.45e-8 kg; lognormal variance with pedigree 0.3426, pedigree (1,3,5,5,1)
  (same comment as for bentonite quarry infrastructure)
- Iron ion [water, surface water]: 3.88e-7 kg; lognormal variance with pedigree 0.6926, pedigree (1,3,5,5,1)
  (same comment as for bentonite quarry infrastructure)
- Lead II [water, surface water]: 5.78e-9 kg; lognormal variance with pedigree 0.6926, pedigree (1,3,5,5,1)
  (same comment as for bentonite quarry infrastructure)
- Mercury II [water, surface water]: 8.68e-9 kg; lognormal variance with pedigree 0.6926, pedigree (1,3,5,5,1)
  (same comment as for bentonite quarry infrastructure)
- Nickel II [water, surface water]: 1.45e-8 kg; lognormal variance with pedigree 0.6926, pedigree (1,3,5,5,1)
  (same comment as for bentonite quarry infrastructure)
- Nitrate [water, surface water]: 2.14e-5 kg; lognormal variance with pedigree 0.0826, pedigree (1,3,5,5,1)
  (same comment as for bentonite quarry infrastructure)
- Phosphorus [water, surface water]: 6.94e-5 kg; lognormal variance with pedigree 0.0826, pedigree (1,3,5,5,1)
  (same comment as for bentonite quarry infrastructure)
- Sodium I [water, surface water]: 0.00199 kg; lognormal variance with pedigree 0.1526, pedigree (5,3,5,5,1)
  (same comment as for bentonite quarry infrastructure)
- Sulfate [water, surface water]: 0.00188 kg; lognormal variance with pedigree 0.1526, pedigree (5,3,5,5,1)
  (same comment as for bentonite quarry infrastructure)
- Suspended solids, unspecified [water, surface water]: 0.0182 kg; lognormal variance with pedigree 0.0826, pedigree (1,3,5,5,1)
  (same comment as for bentonite quarry infrastructure)
- TOC, Total Organic Carbon [water, surface water]: 1.31852e-5 kg; lognormal variance with pedigree 0.0826, pedigree (1,3,5,5,1)
  Calculated by default as TOC (gC) = COD/2.7 (COD measured in g O2). Should more correctly be calculated from the carbon content of the specified emissions to water.
- Water [water, unspecified]: 0.00639251 m3; = (tap_water_input/1000)*(1-fraction_TW_to_air)+water_well_in_ground_input*(1-fraction_PW_to_air); lognormal variance with pedigree 0.0827, pedigree (2,2,5,5,1)
  (same comment as for Water)
  property carbon content, fossil 0; name C_content_fossil
  property carbon content, non-fossil 0; name C_content_non_fossil
  property dry mass 0 kg; name DM
  property fraction, origin: fresh water 1; name fraction_origin_fresh_water_Ww
  property fraction, origin: salt water 0; name fraction_origin_salt_water_Ww
  property fraction, origin: unspecified 0; name fraction_origin_unspecified_Ww
  property water in wet mass 1000 kg; name WWM
  property wet mass 1000 kg; name WM
- Zinc II [water, surface water]: 1.16e-8 kg; lognormal variance with pedigree 0.6926, pedigree (1,3,5,5,1)
  (same comment as for bentonite quarry infrastructure)

## Sampling procedure
Environmental report of a German company (Süd-Chemie AG).

## Extrapolations
This dataset has been copied from an original dataset covering the geography DE. The uncertainty has been adjusted accordingly. For isopropanol the proxy 'NMVOC to water' is used. The salt in the waste water is assumed to be made of 50% sodium chloride and 50% sodium sulphate. Sodium chloride is divided into 'sodium ion' and 'chloride ion' and sodium sulphate into 'sodium ion' and 'sulphate ion'. For unspecified metals to water, aluminium is used as proxy.

## Review by Emilia Moreno Ruiz 2017-08-09
This dataset was additionally reviewed in a separate review process by Eric Johnson of Atlantic Consulting as well as Emilia Moreno Ruiz and Gregor Wernet of ecoinvent.
