# limestone production, crushed, washed

Dataset: EcoSpold 2, unit process
Geography: CA-QC
Time period: 2012-01-01 to 2023-12-31
Technology level: current
Classification: ISIC rev.4 ecoinvent: 0810:Quarrying of stone, sand and clay
Classification: EcoSpold01Categories: construction materials/additives
Tags: single enterprise data
Scenario: Business-as-Usual
System model: Allocation, cut-off by classification
Share of production covered: 100 %
Generated by: Geneviève Martineau
Published in: Kellenberger D. 2007
Database: ecoinvent
isCopyrightProtected: true
accessRestrictedTo: 1

## General comment
This dataset represents the production of crushed limestone, washed. In Quebec, crushed limestone is generally an intermediate product (not intended for sale): Limestone, crushed, washed is usually a pre-product for the transformation process into quicklime and hydrated lime.
Diesel, electricity and water consumption, as well as air emissions were provided by the only limetone producer in Quebec. A weighted average of their three (3) limestone plants is used.
Infrastructure data was extrapolated from "limestone production, crushed, washed, GLO 2002" ecoinvent dataset: The value of the infrastructure is normalized with a annual production capacity of about 195'000 tons of product per year. The estimated lifespan of the machines is 25 years.

## Included activities start
From limestone unprocessesd

## Included activities end
This activity ends with the limestone, crushed, washed. In Quebec, this product is sent to kiln for quicklime production (on the same site).

This dataset includes the processes: crushing, washing, and onsite material transportation by conveyor belts and building machines. One part of the total heating energy for "production" and "administration" is included. Equipment included in the infrastructure: 2 crushers, 2 sieves, and 2 small silos.

## Geography
Quebec data are from the only company that produces limestone on the territory. Unavalable data were extrapolated based on the GLO dataset exchanges.

## Technology
Heavy machines (excl. building machines) are operated electrically; ground water used for washing.

## Parameters
- fraction, process water, to air: 0.291902 dimensionless; name fraction_PW_to_air; lognormal variance with pedigree 0.094, pedigree (4,4,3,5,4)
  Extrapolated data, based on "limestone production, crushed, washed, GLO 2002" dataset.

## Reference product
- limestone, crushed, washed: 1 kg; name limestone_out; By-product classification allocatable product; CPC 15200: Gypsum; anhydrite; limestone flux; limestone and other calcareous stone, of a kind used for the manufacture of[…]; HS2017 252100: Limestone flux; limestone and other calcareous stone, of a kind used for the manufacture of lime or cement; CAS 1317-65-3
  EcoSpold01Location=CH
  production volume 1.266e9 kg
    Source: questionnaire. Primary data for 2012 limestone, crushed, washed production for kiln in Quebec.
  property carbon content, fossil 0.117257
    Table 3.1, ecoinvent v2.2 report 7, part VII, pg 3. MW CaCO3=100, MW MgCO3=84. C content of limestone is 0.117257 kg/kg DM
  property price 0.014 EUR2005
    Calculated value based on data from United Nations Commodity Trade Statistics Database (comtrade.un.org). UN comtrade category: 252100 Limestone materials for manufacture of lime or cement. Using exchange rate of 1EURO = 1.209 USD. Average of price of import into 5 main markets (EU, US, JP, IN and CN).
  properties: carbon allocation 0.117023 kg, carbon content 0.117257, carbon content, non-fossil 0, dry mass 0.998 kg, heating value, net 0 MJ, water content 0.00200401, water in wet mass 0.002 kg, wet mass 1 kg

## Inputs from technosphere
- conveyor belt: 2.07e-8 m; source Kellenberger D. 2007; lognormal variance with pedigree 0.3712, pedigree (4,3,5,5,2)
  Extrapolated value, based on "limestone production, crushed, washed, GLO 2002" dataset.
  EcoSpold01Location=RER
- diesel, burned in building machine: 0.00340282 MJ; = diesel_consumption/building_machine_yield; lognormal variance with pedigree 0.008, pedigree (1,1,4,1,1)
  Calculated value. See Exchange properties.
  Diesel is used for on site transportation of material. Source : Questionnaire.
  Uncertainty: Calculated variable. Uncertainty will be determined from propagation of uncertainty factors of underlying variables. Uncertainty of actual relation between variables not accounted at this time.
  property fuel input in physical units, kg 7.9626e-5 kg; name diesel_consumption
  property kgFuel_Input 0.0234 kg; name building_machine_yield
  properties: heating value, net 1 MJ
  note on fuel input in physical units, kg: Amount of diesel for on site transportation of 1 kg of limestone. Source: questionnaire. Considering diesel density of 0,84 kg/l (ecoinvent report 1, Table 4.6)
  note on kgFuel_Input: Amount of diesel burned in building machine per MJ. Source: "diesel, burned in building machine, GLO 2001" dataset, ecoinvent v 3.01
- electricity, medium voltage: 0.000255163 kWh; lognormal variance with pedigree 0.0101, pedigree (1,2,4,5,1)
  Measured value (weighted average over all Quebec sites). Electricity is used for conveyors and rock crushers. Source: questionnaire.
  EcoSpold01Location=CH
- heat, central or small-scale, other than natural gas: 0.00141 MJ; source Kellenberger D. 2007; lognormal variance with pedigree 0.0427, pedigree (1,2,5,5,2)
  EcoSpold01Location=CH
  Extrapolated value, based on "limestone production, crushed, washed, GLO 2002" dataset.
  properties: heating value, net 1 MJ
- industrial machine, heavy, unspecified: 9.11e-6 kg; source Kellenberger D. 2007; lognormal variance with pedigree 0.3712, pedigree (4,3,5,5,2)
  (same comment as for conveyor belt)
- limestone, unprocessed: 1 kg; = limestone_out; lognormal variance with pedigree 0.008, pedigree (1,1,4,1,1)
  EcoSpold01Location=CH
  Measured value: No loss during the process. Source questionnaire.
  Uncertainty: Calculated variable. Uncertainty will be determined from propagation of uncertainty factors of underlying variables. Uncertainty of actual relation between variables not accounted at this time.
  properties: carbon content, fossil 0.117257, dry mass 0.998 kg, water content 0.00200401, wet mass 1 kg
  note on carbon content, fossil: Table 3.1, ecoinvent v2.2 report 7, part VII, pg 3. MW CaCO3=100, MW MgCO3=84. C content of limestone is 0.117257 kg/kg DM

## Inputs from nature
- Water, well, in ground [natural resource, in water]: 3.75e-5 m3; name water_in; lognormal variance with pedigree 0.0086, pedigree (1,1,4,1,1)
  Measured value (weighted average over all Quebec sites). . Source: questionnaire. The water used to wash the limestone is pumped from the quarry.

## Emissions to nature
- Particulate Matter, < 2.5 um [air, non-urban air or from high stacks]: 1.75e-5 kg; lognormal variance with pedigree 0.308, pedigree (1,1,4,1,1)
  Measured value (weighted average over all Quebec sites). Source: questionnaire
- Particulate Matter, > 10 um [air, non-urban air or from high stacks]: 0.000148 kg; lognormal variance with pedigree 0.048, pedigree (1,1,4,1,1)
  Measured value (weighted average over all Quebec sites). Source: questionnaire
- Particulate Matter, > 2.5 um and < 10um [air, non-urban air or from high stacks]: 7.51e-5 kg; lognormal variance with pedigree 0.128, pedigree (1,1,4,1,1)
  Measured value (weighted average over all Quebec sites). Source: questionnaire
- Water [air, unspecified]: 1.09463e-5 m3; = water_in*fraction_PW_to_air; source Kellenberger D. 2007; lognormal variance with pedigree 0.008, pedigree (1,1,4,1,1)
  Extrapolated value, based on "limestone production, crushed, washed, GLO 2002" dataset.
  Uncertainty: Calculated variable. Uncertainty will be determined from propagation of uncertainty factors of underlying variables. Uncertainty of actual relation between variables not accounted at this time.
- Water [water, unspecified]: 2.65537e-5 m3; = water_in*(1-fraction_PW_to_air); source Kellenberger D. 2007; lognormal variance with pedigree 0.008, pedigree (1,1,4,1,1)
  (same comment as for Water)
  property carbon content, fossil 0; name C_content_fossil
  property carbon content, non-fossil 0; name C_content_non_fossil
  property dry mass 0 kg; name DM
  property water in wet mass 1000 kg; name WWM
  property wet mass 1000 kg; name WM

## Sampling procedure
Information provided by the only Quebec producer

## Extrapolations
A weighted average of the three limestone production plants in Quebec was used.
When no information available, GLO exchanges have been used as proxy for Quebec. The uncertainty has been adjusted accordingly.

See Geography and Technolgy fields for details.
