# bitumen seal production, VA4

Dataset: EcoSpold 2, unit process
Geography: RoW
Time period: 1994-01-01 to 2023-12-31
Technology level: current
Classification: EcoSpold01Categories: plastics/others
Classification: ISIC rev.4 ecoinvent: 2399:Manufacture of other non-metallic mineral products n.e.c.
Tags: ConvertedDataset
Scenario: Business-as-Usual
System model: Allocation, cut-off by classification
Generated by: Martin Lehmann
Published in: Kellenberger D. 2007
Database: ecoinvent
isCopyrightProtected: true
accessRestrictedTo: 1

## General comment
The dataset is applicable in the construction building sector. Bitumen sealing is used to protect the construction against water intrusion.
[This dataset was already contained in the ecoinvent database version 2. It was not individually updated during the transfer to ecoinvent version 3. Life Cycle Impact Assessment results may still have changed, as they are affected by changes in the supply chain, i.e. in other datasets. This dataset was generated following the ecoinvent quality guidelines for version 2. It may have been subject to central changes described in the ecoinvent version 3 change report (http://www.ecoinvent.org/database/ecoinvent-version-3/reports-of-changes/), and the results of the central updates were reviewed extensively. The changes added e.g. consistent water flows and other information throughout the database. The documentation of this dataset can be found in the ecoinvent reports of version 2, which are still available via the ecoinvent website. The change report linked above covers all central changes that were made during the conversion process.]

## Included activities end
The dataset describes the production of bitumen sealing VA4. Included processes are the extrusion of polypropylene foil, the fabrication of the sealing, the infrastructure, the transport by road and rail as well as the disposal of the bitumen cuttings in a municipal incineration. The production of bitumen sealing does not include any chemical processes. In this specific type of bitumen sealing VA4, aluminium is being sputtered onto a PE-foil.

## Geography
The data of this dataset is taken from literature studies and producer information.

## Technology
Simple processes involved (beside sputtering), a carrier material is being soaked with bitumen. The bitumen coatings are then gritted with minerals (talcum, sand).

## Time period
The production of bitumen sealing has not changed very much over the years, as there are no chemical processes involved.

## Parameters
- fraction, process water, to air: 0.15 dimensionless; name fraction_PW_to_air; lognormal variance with pedigree 0.092025, pedigree (4,4,3,2,4)
  Literature value. In case when no industry/process specific data are available, default evaporation fraction value is used. This value is 15% and is based on literature (Statistics Canada, 2007 & Shaffer, K.H., 2008, Consumptive water use in the Great Lakes Basin, USGS & Shiklomanov, 2003, World Water Resources at the Beginning of the 21st Century) and has been approved by an expert.
- fraction, tap water, to air: 0.15 dimensionless; name fraction_TW_to_air; = fraction_PW_to_air; lognormal variance with pedigree 0.092025, pedigree (4,4,3,2,4)
  Calculated value. See comment in the other parametres present in this dataset. Tap water is considered to be always used as process water, thus process water fractions to air are applied to all tap water input flows to calculate the amount of water consumed in the processes.

## Reference product
- bitumen seal, VA4: 1 kg; name RP_amount_1; By-product classification allocatable product; CPC 37940: Bituminous mixtures based on natural and artificial stone materials and bitumen, natural asphalt or related su[…]; HS2017 271500: Bituminous mixtures based on natural asphalt, on natural bitumen, on petroleum bitumen, on mineral tar or o[...]
  EcoSpold01Location=RER
  production volume 2.67763 kg; name RP_PV_1
    This is a placeholder value that does not reflect real-world production volumes. This dataset does not currently require a real-world production volume to work in the database framework, and no actual data were collected yet. This has no negative effect on the results of the ecoinvent database.
  property carbon content, fossil 0.624361
    The production of bitumen sealing does not include any chemical processes (ecoinvent v2.2 report 7_part XXIII), C content was then calculated as a weighted average of C content of the different components
  property heating value, net 39.33 MJ
    Value taken from the general comment of the treatment dataset.
  properties: carbon allocation 0.624361 kg, carbon content 0.624361, carbon content, non-fossil 0, dry mass 1 kg, price 1.28 EUR2005, water content 0, water in wet mass 0 kg, wet mass 1 kg

## Inputs from technosphere
- aluminium, wrought alloy: 0.000545 kg; lognormal variance with pedigree 0.0527, pedigree (2,2,5,5,1)
  EcoSpold01Location=RER
  properties: dry mass 1 kg, wet mass 1 kg
- argon, liquid: 0.000656 kg; = 0.00328*0.2; lognormal variance with pedigree 0.0421, pedigree (1,2,5,5,1)
  This flow is issued during the process "selective coating, copper sheet, sputtering" which is used as an input in bitumen seal production. The ecoinvent dataset with the same name has been merged into this activity. This flow refers to 1 m2 of selective coat, copper sheet, sputter deposition. 0.2 m2 are used as an input for bitumen seal production.
  Uncertainty: Questionnaire (plus helium)
  properties: dry mass 1 kg, wet mass 1 kg
- chemical factory, organics: 4e-10 unit; lognormal variance with pedigree 0.3546, pedigree (2,4,5,5,1)
  EcoSpold01Location=RER
- corrugated board box: 0.00109949, 4.09562e-5, 0.00239955 kg (3 suppliers, which the file names only by identifier); sum of these 0.00354 kg; = 0.0177*0.2; lognormal variance with pedigree 0.0421, pedigree (1,2,5,5,1)
  This flow is issued during the process "selective coating, copper sheet, sputtering" which is used as an input in bitumen seal production. The ecoinvent dataset with the same name has been merged into this activity. This flow refers to 1 m2 of selective coat, copper sheet, sputter deposition. 0.2 m2 are used as an input for bitumen seal production.
  Uncertainty: Questionnaire
  properties: carbon content, fossil 0.000656085, carbon content, non-fossil 0.432275, dry mass 0.945 kg, heating value, net 12.86 MJ, water content 0.0582011, wet mass 1 kg
  note on carbon content, fossil: Fossil C content was calculated after fossil C contents of chemicals used in the production of board (Tab 10-15 & 10.16 ecoinvent v2.2 report 11_III, part 10)
  note on carbon content, non-fossil: Biogenic C content was calculated after biogenic C contents of chemicals used in the production of board (Tab 10.15 & 10.16, ecoinvent v2.2 report 11_III, part 10).
- diesel, burned in building machine: 0.045 MJ; = 0.225*0.2; lognormal variance with pedigree 0.0421, pedigree (1,2,5,5,1)
  This flow is issued during the process "selective coating, copper sheet, sputtering" which is used as an input in bitumen seal production. The ecoinvent dataset with the same name has been merged into this activity. This flow refers to 1 m2 of selective coat, copper sheet, sputter deposition. 0.2 m2 are used as an input for bitumen seal production.
  Uncertainty: Questionnaire, use for vehicles in plant operation
  properties: heating value, net 1 MJ
- electricity, medium voltage: 0.0370213, 0.738493, 0.248131, 0.0113372, 0.00226913, 0.000487233, 0.0762608 kWh (7 suppliers, which the file names only by identifier); sum of these 1.114 kWh; = 0.42+3.47*0.2; lognormal variance with pedigree 0.0532, pedigree (2,3,5,5,1)
  EcoSpold01Location=UCTE
  sum of (1) electricity used in bitumen seal production process + (1) electricity used for producing 0,2m2 of selective coat, copper sheet, sputter deposition
- fleece, polyethylene: 0.00889 kg; lognormal variance with pedigree 0.0546, pedigree (2,4,5,5,1)
  EcoSpold01Location=RER
  properties: carbon content, fossil 0.857143, dry mass 1 kg, heating value, net 42.47 MJ, wet mass 1 kg
  note on carbon content, fossil: Polyethylene is formed out of a huge amount of ethylene monomers (C2H4) (ecoinvent v2.2 report 11_II). MW=28 g/mol
- glass fibre: 0.0131 kg; lognormal variance with pedigree 0.0546, pedigree (2,4,5,5,1)
  EcoSpold01Location=RER
  properties: dry mass 1 kg, wet mass 1 kg
- kraft paper: 0.000111 kg; = 0.000555*0.2; lognormal variance with pedigree 0.0421, pedigree (1,2,5,5,1)
  (same comment as for corrugated board box)
  properties: carbon content, fossil 0.0020219, carbon content, non-fossil 0.41662, dry mass 0.945 kg, heating value, net 14.11 MJ, water content 0.0582011, wet mass 1 kg
  note on carbon content, fossil: Fossil C content was calculated after fossil C contents of chemicals used in the production of the paper (in Tab 9.4 ecoinvent v2.2 report 11_III, part 9).
  note on carbon content, non-fossil: Biogenic C content was calculated after biogenic C contents of chemicals used in the production of the paper (in Tab 9.4 ecoinvent v2.2 report 11_III, part 9). The cellulose content in 1 kg of paper (on a wet mas basis) was estimated as (1-chemical content), C content of cellulose was considered 0.44 kgC/kg dry mass (ecoinvent v2.2 report, n 15a, pg 40)
- light fuel oil: 1.01004e-5, 0.00105833, 5.2049e-5, 0.000105047, 7.5063e-6, 6.97081e-6 kg (6 suppliers, which the file names only by identifier); sum of these 0.00124 kg; = 0.0062*0.2; lognormal variance with pedigree 0.0421, pedigree (1,2,5,5,1)
  This flow is issued during the process "selective coating, copper sheet, sputtering" which is used as an input in bitumen seal production. The ecoinvent dataset with the same name has been merged into this activity. This flow refers to 1 m2 of selective coat, copper sheet, sputter deposition. 0.2 m2 are used as an input for bitumen seal production.
  Uncertainty: Questionnaire, including heating
  properties: carbon content, fossil 0.862, dry mass 1 kg, heating value, net 42.6 MJ, wet mass 1 kg
- lime: 0.142 kg; lognormal variance with pedigree 0.052, pedigree (1,1,5,5,1)
  EcoSpold01Location=CH
  composite
  properties: carbon content, fossil 0.120005, dry mass 1 kg, wet mass 1 kg
- lubricating oil: 0.0001546 kg; = 0.000773*0.2; lognormal variance with pedigree 0.0421, pedigree (1,2,5,5,1)
  (same comment as for corrugated board box)
  properties: carbon content, fossil 0.75, dry mass 1 kg, heating value, net 40.2 MJ, wet mass 1 kg
  note on carbon content, fossil: Lubricating oil is produced from diesel. C-content/dry mass of fats and oils considered 75%, from: ecoinvent v2.2 report, n 15a, pg 40
  note on heating value, net: Literature value, Source: IPCC 2006, 2006 IPCC Guidelines for National Greenhouse Gas Inventories, Prepared by the National Greenhouse Gas Inventories Programme, Eggleston H.S., Buendia L., Miwa K., Ngara T. and Tanabe K. (eds). Published: IGES, Japan
- metal coating facility: 6.66e-8 unit; = 3.33E-07*0.2; lognormal variance with pedigree 0.3421, pedigree (1,2,5,5,1)
  (same comment as for corrugated board box)
- municipal solid waste: -6.19267e-6, -7.35352e-7, -4.57665e-6, -0.0034939, -5.14571e-7, -1.65168e-7, -3.73325e-7, -1.55416e-5 kg (8 suppliers, which the file names only by identifier); sum of these -0.003522 kg; = 0.00284+0.00341*0.2; lognormal variance with pedigree 0.0346, pedigree (2,4,3,5,3)
  EcoSpold01Location=CH
  sum of (1) electricity used in bitumen seal production process + (1) electricity used for producing 0,2m2 of selective coat, copper sheet, sputter deposition
  production volume
    Calculated from the production volume of bitumen seal, VA4 in proportion to the respective output amounts.
  properties: carbon content, fossil 0.171549, carbon content, non-fossil 0.261655, dry mass 0.771 kg, heating value, net 11.74 MJ, water content 0.297017, wet mass 1 kg
  note on carbon content, fossil: MSW composition in tab 4.1, ecoinvent v2.2 report 13_I. C content referred to 1 kg DM
  note on heating value, net: Value taken from the general comment of the treatment dataset.
- nitrogen, liquid: 0.000364 kg; = 0.00182*0.2; lognormal variance with pedigree 0.0421, pedigree (1,2,5,5,1)
  (same comment as for corrugated board box)
  properties: dry mass 1 kg, wet mass 1 kg
- oxygen, liquid: 0.0001818 kg; = 0.000909*0.2; lognormal variance with pedigree 0.0421, pedigree (1,2,5,5,1)
  (same comment as for corrugated board box)
  properties: dry mass 1 kg, wet mass 1 kg
- pitch: 0.100813, 0.00451886, 0.00222743, 0.0390834, 0.00645109, 0.569906 kg (6 suppliers, which the file names only by identifier); sum of these 0.723 kg; lognormal variance with pedigree 0.0546, pedigree (2,4,5,5,1)
  EcoSpold01Location=RER
  properties: carbon content, fossil 0.83, dry mass 1 kg, heating value, net 28 MJ, wet mass 1 kg
- polyethylene, low density, granulate: 0.0001036 kg; = 0.000518*0.2; lognormal variance with pedigree 0.0421, pedigree (1,2,5,5,1)
  This flow is issued during the process "selective coating, copper sheet, sputtering" which is used as an input in bitumen seal production. The ecoinvent dataset with the same name has been merged into this activity. This flow refers to 1 m2 of selective coat, copper sheet, sputter deposition. 0.2 m2 are used as an input for bitumen seal production.
  Uncertainty: Plastic packagings
  properties: carbon content, fossil 0.857143, dry mass 1 kg, heating value, net 42.47 MJ, wet mass 1 kg
- sand: 0.00181595, 0.118175, 9.42758e-6 kg (3 suppliers, which the file names only by identifier); sum of these 0.12 kg; lognormal variance with pedigree 0.0546, pedigree (2,4,5,5,1)
  EcoSpold01Location=CH
  properties: dry mass 1 kg, wet mass 1 kg
- scrap aluminium: -5.45e-6 kg; lognormal variance with pedigree 0.0346, pedigree (2,4,3,5,3)
  EcoSpold01Location=CH
  production volume
    (same comment as for municipal solid waste)
  properties: dry mass 1 kg, wet mass 1 kg
- tap water: 0.00293979, 0.00448147, 0.0083622, 0.0225271, 0.00271166, 0.113005, 1.29317 kg (7 suppliers, which the file names only by identifier); sum of these 1.4472 kg; = 7.236*0.2; lognormal variance with pedigree 0.0546, pedigree (3,3,5,5,1)
  (same comment as for corrugated board box)
  properties: carbon content, fossil 0.00178991, dry mass 0.000337476 kg, water content 2962.17, wet mass 1 kg
  note on carbon content, fossil: Bicarbonate content is 2.93 mol/m3. CO2 content is 0.1 mol/m3 (ecoinvent v2.2 report 8, Tab 93.1).
- waste bitumen sheet: -0.00723 kg; lognormal variance with pedigree 0.0346, pedigree (2,4,3,5,3)
  EcoSpold01Location=CH
  production volume
    (same comment as for municipal solid waste)
  properties: carbon content, fossil 0.643207, dry mass 0.985 kg, heating value, net 40.2 MJ, water content 0.0152284, wet mass 1 kg
  note on carbon content, fossil: The bitumen sheet is made of 63% bitumen, 24% surface spread and filler (assumed to be pure SiO2), 6% carrier fleece (assumed to be PE) and 7% elastomer (assumed to be PS) (ecoinvent v2.2 report 13_I, pg 40). C content of bitumen, PE and PS from Tab A.6 and A.1 (ecoinvent v2.2 report 13_I, pg 40), respectively. C content of waste also given in the dataset
- waste mineral oil: -0.0001546 kg; name BP_amount_2; = 0.000773*0.2
  This flow is issued during the process "selective coating, copper sheet, sputtering" which is used as an input in bitumen seal production. The ecoinvent dataset with the same name has been merged into this activity. This flow refers to 1 m2 of selective coat, copper sheet, sputter deposition. 0.2 m2 are used as an input for bitumen seal production.
  production volume; = RP_PV_1 * (BP_amount_2 / RP_amount_1)
    Calculated from production volume of reference product using the relative outputs.
  properties: carbon content, fossil 0.864444, dry mass 0.9 kg, heating value, net 34.7 MJ, water content 0.111111, wet mass 1 kg
  note on carbon content, fossil: Tab A.6, ecoinvent v2.2 report 13_I. C content has been calculated after data in the tables, and then referred to 1 kg DM
- wastewater, average: -4.52389e-5, -1.61068e-7 m3 (2 suppliers, which the file names only by identifier); sum of these -4.54e-5 m3; = 0.000227*0.2
  (same comment as for waste mineral oil)
  production volume; = RP_PV_1 * (BP_amount_1 / RP_amount_1)
    Calculated from production volume of reference product using the relative outputs.
  properties: carbon content, non-fossil 0.194039, dry mass 0.346837 kg, mass concentration, TOC 0.1091 kg/m3, mass concentration, calcium 0.039453 kg/m3, mass concentration, chlorine 0.030031 kg/m3, mass concentration, hydrogen 0.013365 kg/m3, mass concentration, nitrogen 0.031015 kg/m3, mass concentration, oxygen 0.069824 kg/m3, mass concentration, sodium 0.06456 kg/m3, mass concentration, sulfur 0.015602 kg/m3, water content 2882.2, wet mass 1000 kg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
  note on carbon content, non-fossil: 0.0673 kg TOC/m3 (Tab A.17, ecoinvent v2.2 report 13_I). TOC was considered as Total Carbon.

## Emissions to nature
- Benzo(a)pyrene [air, unspecified]: 1.8e-9 kg; lognormal variance with pedigree 0.692, pedigree (1,1,5,5,1)
  estimation
- NMVOC, non-methane volatile organic compounds [air, unspecified]: 0.00108 kg; lognormal variance with pedigree 0.1746, pedigree (2,4,5,5,1)
- Water [air, unspecified]: 0.00021708 m3; name water_to_air_unspecified; = 0.0010854*0.2; lognormal variance with pedigree 1.21, pedigree (5,5,5,5,5)
  (same comment as for waste mineral oil)
  property fraction, origin: fresh water 1; name fraction_origin_fresh_water
  property fraction, origin: salt water 0; name fraction_origin_salt_water
  property fraction, origin: unspecified 0; name fraction_origin_unspecified
- Water [water, unspecified]: 0.00123012 m3; name water_to_water_unspecified; = 0.0061506*0.2; lognormal variance with pedigree 1.21, pedigree (5,5,5,5,5)
  (same comment as for waste mineral oil)
  property fraction, origin: fresh water 1; name fraction_origin_fresh_water_Ww
  property fraction, origin: salt water 0; name fraction_origin_salt_water_Ww
  property fraction, origin: unspecified 0; name fraction_origin_unspecified_Ww

## Sampling procedure
Literature, database

## Extrapolations
see Geography This dataset has been copied from an original dataset covering the geography RER. The uncertainty has been adjusted accordingly.

## Review by Rolf Frischknecht 2007-11-07
passed
