# potato production

Dataset: EcoSpold 2, unit process
Geography: RoW
Time period: 2001-01-01 to 2023-12-31
Technology level: current
Classification: ISIC rev.4 ecoinvent: 0113:Growing of vegetables and melons, roots and tubers
Scenario: Business-as-Usual
System model: Allocation, cut-off by classification
Share of production covered: 100 %
Generated by: Thomas Kägi
Published in: Nemecek, T. 2007
Database: ecoinvent
isCopyrightProtected: true
accessRestrictedTo: 1

## General comment
This dataset represents the production of 1 kg of potatoes (fresh matter). The yield is 41001 kg/ha at a moisture content at storage of 78%.

## Included activities start
This activity starts after the harvest of the previous crop. The inputs of seeds, mineral fertilisers, pesticides and irrigation water are considered. It is assumed that no organic fertilisers are applied.

## Included activities end
The dataset includes all machine operations and corresponding machine infrastructure and sheds. Machine operations are: soil cultivation, sowing, fertilisation, irrigation, weed control, pest and pathogen control, harvest, transport from field to farm (1 km) and grading of potatoes. Further, direct field emissions are included. This activity ends after harvest and drying of grains at the farm gate.

## Technology
Conventional production typical for the country. Water for irrigation is pumped from 48 meter depth by electric pumps.

## Time period
The yield data have been collected for the years 2001-2006.

## Parameters
- fraction, irrigation water to surface water: 0.2 dimensionless; name fraction_IW_to_surface_water; lognormal variance with pedigree 0.0886, pedigree (4,3,1,1,4)
- fraction, irrigation water, to air: 0.586986 dimensionless; name fraction_IW_to_air; lognormal variance with pedigree 0.0409, pedigree (2,2,2,1,1)
- fraction, irrigation water, to ground water: 0.8 dimensionless; name fraction_IW_to_ground_water; lognormal variance with pedigree 0.0886, pedigree (4,3,1,1,4)

## Reference product
- potato: 1 kg; name REF_PRODUCT; By-product classification allocatable product; CPC 01510: Potatoes; HS2017 070190: Vegetables; potatoes (other than seed), fresh or chilled
  EcoSpold01Location=US
  production volume 1.90677e11 kg
    FAOSTAT 2014: data world production for 2012, CH production and organic world production subtracted
  property carbon content, fossil 0; name REF_PRODUCT_C_content_fossil
    fossil carbon content on a dry matter basis
  property carbon content, non-fossil 0.413567; name REF_PRODUCT_C_content_non_fossil
    biogene carbon content on a dry matter basis
  property dry mass 0.22 kg; name REF_PRODUCT_DM
  property energy content 3.8698 MJ; name REF_PRODUCT_energy_content
    See chapter 'Product Properties' in "01_crop production - yields & inputs CH & Europe_v1.0.pdf", section "AGRICULTURAL PRODUCTION IN SWITZERLAND" - pdf-document on the dedicated talk page of ecoinvent (www.ecoinvent.org/documentation)
  property price 0.28 EUR2005
    Calculated value based on data from United Nations Commodity Trade Statistics Database (comtrade.un.org). UN comtrade category: 1701 Potatoes, fresh or chilled. Using exchange rate of 1EURO = 1.209 USD. Average of price of import into 5 main markets (EU, US, JP, IN and CN).
  property water content 3.54545; name REF_PRODUCT_water_content; = (1-REF_PRODUCT_DM)/REF_PRODUCT_DM
  property water in wet mass 0.78 kg; name REF_PRODUCT_WWM; = 1-REF_PRODUCT_DM
  property wet mass 1 kg; name REF_PRODUCT_WM
  properties: carbon allocation 0.0909847 kg, carbon content 0.413567

## Inputs from technosphere
- [sulfonyl]urea-compound: 9.7486e-7 kg; lognormal variance with pedigree 0.0426, pedigree (2,1,5,5,1)
  EcoSpold01Location=CH
  See chapter 'Yields and Inputs of Arable Crop Production' in "01_crop production - yields & inputs US_v1.0.pdf" - pdf-document on the dedicated talk page of ecoinvent (www.ecoinvent.org/documentation)
  properties: carbon content, fossil 0.540853, dry mass 1 kg, wet mass 1 kg
  note on carbon content, fossil: Approximated as an unweighted average of the C-content of the [sulfonyl]urea-compounds (Tab 2.25 Sutter, 2010) chlorotoluron, Diuron, Linuron and Isoproturon.
- [thio]carbamate-compound: 0.00067046 kg; lognormal variance with pedigree 0.0426, pedigree (2,1,5,5,1)
  (same comment as for [sulfonyl]urea-compound)
  properties: carbon content, fossil 0.626349, dry mass 1 kg, wet mass 1 kg
  note on carbon content, fossil: Approximated as an unweighted average of the C-content of the [thio]carbamate-compounds (Tab 2.25 Sutter, 2010) carbofuran,orbencarb, prosulfocarb
- acetamide-anillide-compound, unspecified: 5.0592e-6 kg; lognormal variance with pedigree 0.0426, pedigree (2,1,5,5,1)
  (same comment as for [sulfonyl]urea-compound)
  properties: carbon content, fossil 0.659175, dry mass 1 kg, wet mass 1 kg
  note on carbon content, fossil: Approximated as an unweighted average of the C-content of the acetamide-anillide-compound (Tab 2.25 Sutter, 2010) alachor, metolachlor, propachlor and teflubenzuron
- ammonia, anhydrous, liquid: 0.000863132, 0.000785051, 0.000175612, 0.000554804 kg (4 suppliers, which the file names only by identifier); sum of these 0.0023786 kg; lognormal variance with pedigree 0.0427, pedigree (2,2,5,5,1)
  See chapter 'Yields and Inputs of Arable Crop Production' in "01_crop production - yields & inputs US_v1.0.pdf" - pdf-document on the dedicated talk page of ecoinvent (www.ecoinvent.org/documentation)
  EcoSpold01Location=RER
  properties: dry mass 1 kg, wet mass 1 kg
- ammonium nitrate: 0.00191682, 0.00132938 kg (2 suppliers, which the file names only by identifier); sum of these 0.0032462 kg; lognormal variance with pedigree 0.0427, pedigree (2,2,5,5,1)
  EcoSpold01Location=RER
  The exchange has been updated from 'ammonium nitrate, as N' into 'ammonium nitrate' and therefore its amount has been scaled (multiplied) from 0.0011 kg by 2.8573 kg of 'ammonium nitrate' per kg of 'ammonium nitrate, as N'. Original comment of the exchange is: See chapter 'Yields and Inputs of Arable Crop Production' in "01_crop production - yields & inputs US_v1.0.pdf" - pdf-document on the dedicated talk page of ecoinvent (www.ecoinvent.org/documentation)
  properties: dry mass 1 kg, wet mass 1 kg
- application of plant protection product, by field sprayer: 9.7559e-5 ha; lognormal variance with pedigree 0.044, pedigree (3,1,5,5,1)
  See chapter 'Yields and Inputs of Arable Crop Production' in "01_crop production - yields & inputs US_v1.0.pdf" - pdf-document on the dedicated talk page of ecoinvent (www.ecoinvent.org/documentation)
  EcoSpold01Location=CH
- bipyridylium-compound: 3.3423e-6 kg; lognormal variance with pedigree 0.0426, pedigree (2,1,5,5,1)
  (same comment as for application of plant protection product, by field sprayer)
  properties: carbon content, fossil 0.418929, dry mass 1 kg, wet mass 1 kg
  note on carbon content, fossil: C content was calculated after C content of Diquat (C12H12Br2N2). The herbicide Diquat is classified as a bipyridylium-compound in Tab 10.3 in ecoinvent v2.2 report 15a
- dinitroaniline-compound: 4.624e-6 kg; lognormal variance with pedigree 0.0426, pedigree (2,1,5,5,1)
  (same comment as for [sulfonyl]urea-compound)
  properties: carbon content, fossil 0.55516, dry mass 1 kg, wet mass 1 kg
  note on carbon content, fossil: C content of dinitroaniline-compound was calculated after the C content of the herbicide pendimethalin, classified as dinitroaniline-compound in Tab 2.25 of Sutter 2010
- dithiocarbamate-compound: 6.17987e-5 kg; lognormal variance with pedigree 0.0426, pedigree (2,1,5,5,1)
  (same comment as for [sulfonyl]urea-compound)
  properties: carbon content, fossil 0.179339, dry mass 1 kg, wet mass 1 kg
  note on carbon content, fossil: Approximated as an unweighted average of the C-content of the dithiocarbamate-compounds (Tab 2.25 Sutter, 2010) Maneb and Mancozeb
- fertilising, by broadcaster: 4.878e-5 ha; lognormal variance with pedigree 0.044, pedigree (3,1,5,5,1)
  (same comment as for application of plant protection product, by field sprayer)
- glyphosate: 2.4371e-7 kg; lognormal variance with pedigree 0.0426, pedigree (2,1,5,5,1)
  (same comment as for [sulfonyl]urea-compound)
  properties: carbon content, fossil 0.214286, dry mass 1 kg, wet mass 1 kg
- harvesting, by complete harvester, ground crops: 2.3881e-5 ha; lognormal variance with pedigree 0.044, pedigree (3,1,5,5,1)
  (same comment as for application of plant protection product, by field sprayer)
- inorganic nitrogen fertiliser, as N: 8.0399e-8, 2.20797e-6, 1.47598e-6, 3.92395e-7, 1.88662e-5, 2.23797e-6, 1.45918e-6, 2.84396e-7, 1.22998e-6, 5.49713e-6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 kg (58 suppliers, which the file names only by identifier); sum of these 0.0016933 kg; lognormal variance with pedigree 0.0427, pedigree (2,2,5,5,1)
  (same comment as for ammonia, anhydrous, liquid)
  properties: dry mass 1 kg, wet mass 1 kg
- inorganic phosphorus fertiliser, as P2O5: 1.92187e-6, 5.21993e-7, 1.42081e-6, 3.46623e-6, 4.32489e-5, 9.59973e-5, 1.31785e-5, 1.613e-6, 2.00904e-5, 8.92296e-7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 kg (58 suppliers, which the file names only by identifier); sum of these 0.0043273 kg; lognormal variance with pedigree 0.0427, pedigree (2,2,5,5,1)
  EcoSpold01Location=RER
  See chapter 'Yields and Inputs of Arable Crop Production' in "01_crop production - yields & inputs US_v1.0.pdf" - pdf-document on the dedicated talk page of ecoinvent (www.ecoinvent.org/documentation)
  properties: dry mass 1 kg, wet mass 1 kg
- irrigation: 0.000190227, 0.00380423, 0.00293082, 0.0078581, 0.0108016, 0.0017144, 4.4092e-5, 0.0259689, 0.00175816, 0.0434862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 m3 (12 suppliers, which the file names only by identifier); sum of these 0.113162 m3; source Siebert, S. 2010; lognormal variance with pedigree 0.0447, pedigree (2,2,5,5,1)
  EcoSpold01Location=US
  See chapter 'Yields and Inputs of Arable Crop Production' in "01_crop production - yields & inputs US_v1.0.pdf" - pdf-document on the dedicated talk page of ecoinvent (www.ecoinvent.org/documentation)
  Calculated based on literature values (Döll, 2010) and partially modelled at ETH (Pfister, S.).
  See chapter 'Yields and Inputs of Arable Crop Production' in "01_crop production - yields & inputs US_v1.0.pdf" - pdf-document on the dedicated talk page of ecoinvent (www.ecoinvent.org/documentation)
  Calculated based on literature values (Döll, 2010) and partially modelled at ETH (Pfister, S.).
  properties: dry mass 0.11 kg, water content 9089.91, wet mass 1000 kg
- organophosphorus-compound, unspecified: 2.9817e-5 kg; lognormal variance with pedigree 0.0426, pedigree (2,1,5,5,1)
  (same comment as for application of plant protection product, by field sprayer)
  properties: carbon content, fossil 0.260898, dry mass 1 kg, wet mass 1 kg
  note on carbon content, fossil: C content was calculated as an unweighted average of glyphosate, parathion, and fosetyl-Al. Those substances are classified as organo-phosphorous compounds in Tab 2.25, Sutter 2010
- packaging, for fertilisers: 0.0289728 kg; lognormal variance with pedigree 0.0912, pedigree (4,3,5,5,4)
  Total amount of active substance/s of fertilisers needed for the production of 'potato' is calculated to be circa 1.45E-02 kg. Fertiliser/s used in this dataset is/are: 'ammonia, liquid', 'ammonium nitrate, as N', 'nitrogen fertiliser, as N', 'phosphate fertiliser, as P2O5', 'potassium chloride, as K2O', 'urea, as N'. The total amount of active substance/s is doubled in order to account for the packaging of the dilluted product of fertiliser/s that is/are applied. Therefore, 2.90E-02 kg of packaging for fertilisers is justified with this exchange.
  properties: carbon content, fossil 0.825301, dry mass 1 kg, heating value, net 25.01 MJ, price 0.0642 EUR2005, wet mass 1 kg
  note on carbon content, fossil: Considering a chemical formula (C2H4)n for polyethylene, carbon content-fossil is calculated to be 0.856286 kg of Carbon per kg of dry mass.
- packaging, for pesticides: 0.00361381 kg; lognormal variance with pedigree 0.0912, pedigree (4,3,5,5,4)
  Total amount of active substance/s of pesticides needed for the production of potato is calculated to be circa 1.81E-03 kg. Pesticide/s used in this dataset is/are: '[sulfonyl]urea-compound', '[thio]carbamate-compound', 'acetamide-anillide-compound, unspecified', 'bipyridylium-compound', 'dinitroaniline-compound', 'dithiocarbamate-compound', 'glyphosate', 'organophosphorus-compound, unspecified', 'pesticide, unspecified', 'phenoxy-compound', 'pyridazine-compound', 'triazine-compound, unspecified'. The total amount of active substance/s is doubled in order to account for the packaging of the dilluted product of pesticide/s that is/are applied. Therefore, 3.61E-03 kg of packaging for pesticides is justified with this exchange.
  properties: carbon content, fossil 0.85714, dry mass 1 kg, heating value, net 25.97 MJ, price 0.0642 EUR2005, wet mass 1 kg
- pesticide, unspecified: 0.0010174 kg; lognormal variance with pedigree 0.0426, pedigree (2,1,5,5,1)
  (same comment as for application of plant protection product, by field sprayer)
  properties: carbon content, fossil 0.486978, dry mass 1 kg, wet mass 1 kg
  note on carbon content, fossil: Mean of C content in all pesticides whose formula has been documented in Sutter 2010
- phenoxy-compound: 2.4083e-6 kg; lognormal variance with pedigree 0.0426, pedigree (2,1,5,5,1)
  (same comment as for [sulfonyl]urea-compound)
  properties: carbon content, fossil 0.532559, dry mass 1 kg, wet mass 1 kg
  note on carbon content, fossil: An unweighted average of the C content in mCPA, mCPB, mecoprop, fluazifop-P-butyl, and 2,4-D. Those substances are classified as phenoxy-compounds in Tab 2.25, Sutter 2010
- potassium chloride: 0.00653483 kg; lognormal variance with pedigree 0.0427, pedigree (2,2,5,5,1)
  EcoSpold01Location=RER
  The exchange has been updated from 'potassium chloride, as K2O' into 'potassium chloride' and therefore its amount has been scaled (multiplied) from 0.0041 kg by 1.5829 kg of 'potassium chloride' per kg of 'potassium chloride, as K2O'. Original comment of the exchange is: See chapter 'Yields and Inputs of Arable Crop Production' in "01_crop production - yields & inputs US_v1.0.pdf" - pdf-document on the dedicated talk page of ecoinvent (www.ecoinvent.org/documentation)
  properties: dry mass 1 kg, wet mass 1 kg
- potato grading: 1 kg; lognormal variance with pedigree 0.044, pedigree (3,1,5,5,1)
  (same comment as for [sulfonyl]urea-compound)
- potato haulm cutting: 2.439e-5 ha; lognormal variance with pedigree 0.044, pedigree (3,1,5,5,1)
  (same comment as for application of plant protection product, by field sprayer)
- potato planting: 2.439e-5 ha; lognormal variance with pedigree 0.044, pedigree (3,1,5,5,1)
  (same comment as for [sulfonyl]urea-compound)
- potato seed, for setting: 0.057408 kg; name SEED; lognormal variance with pedigree 0.0427, pedigree (2,2,5,5,1)
  See chapter 'Yields and Inputs of Arable Crop Production' in "01_crop production - yields & inputs US_v1.0.pdf" - pdf-document on the dedicated talk page of ecoinvent (www.ecoinvent.org/documentation)
  property carbon content, non-fossil 0.413567; name SEED_C_content_non_fossil
  property dry mass 0.2 kg; name SEED_DM
  property energy content 3.518 MJ; name SEED_energy_content
  property water content 4; name potato_seed_setting_water_content
  property water in wet mass 0.8 kg; name potato_seed_setting_WWM
  property wet mass 1 kg; name potato_seed_setting_WM
  note on carbon content, non-fossil: biogene carbon content on a dry matter basis; Composition data obtained from Potatoes, raw, skin, in (http://www.nal.usda.gov/fnic/foodcomp/search/). First, composition data were refered to 1 kg dry mass. Then, C-contents were calculated considering a C-content/dry mass of 44% in carbohydrates (including fibres), 53% in proteins and 75% in fats. All data from ecoinvent report, n 15a, pg 40, except C-content in protein, that comes from Determination of protein concentration by total organic carbon analysis, Rouwenhorst et al., 1991, J Biochem and Biophys Methods, 22:119-128.
  note on energy content: See chapter 'Product Properties' in "01_crop production - yields & inputs CH & Europe_v1.0.pdf", section "AGRICULTURAL PRODUCTION IN SWITZERLAND" - pdf-document on the dedicated talk page of ecoinvent (www.ecoinvent.org/documentation)
- pyridazine-compound: 4.1127e-6 kg; lognormal variance with pedigree 0.0426, pedigree (2,1,5,5,1)
  (same comment as for [sulfonyl]urea-compound)
  properties: carbon content, fossil 0.541901, dry mass 1 kg, wet mass 1 kg
  note on carbon content, fossil: The herbicide Chloridazon was used as a significative example to calculate C content of pyridazine compounds. This substance is identified as a pyridazine in Tab 1.5, Sutter 2010
- tillage, cultivating, chiselling: 2.439e-5 ha; lognormal variance with pedigree 0.044, pedigree (3,1,5,5,1)
  (same comment as for [sulfonyl]urea-compound)
- tillage, harrowing, by spring tine harrow: 4.878e-5 ha; lognormal variance with pedigree 0.044, pedigree (3,1,5,5,1)
  (same comment as for [sulfonyl]urea-compound)
- tillage, hoeing and earthing-up, potatoes: 4.878e-5 ha; lognormal variance with pedigree 0.044, pedigree (3,1,5,5,1)
  (same comment as for application of plant protection product, by field sprayer)
- tillage, ploughing: 2.439e-5 ha; lognormal variance with pedigree 0.044, pedigree (3,1,5,5,1)
  (same comment as for application of plant protection product, by field sprayer)
- triazine-compound: 6.6651e-6 kg; lognormal variance with pedigree 0.0426, pedigree (2,1,5,5,1)
  (same comment as for [sulfonyl]urea-compound)
  properties: carbon content, fossil 0.475616, dry mass 1 kg, wet mass 1 kg
  note on carbon content, fossil: An unweighted average of the C content in Atrazine, Cyanazine, metamitron, simazine, and terbuthylazine. Those substances are classified as triazine-compounds in Tab 2.25, Sutter 2010
- urea: 0.000787503, 0.000976243 kg (2 suppliers, which the file names only by identifier); sum of these 0.00176375 kg; lognormal variance with pedigree 0.0427, pedigree (2,2,5,5,1)
  The exchange has been updated from 'urea, as N' into 'urea' and therefore its amount has been scaled (multiplied) from 0.0008 kg by 2.1438 kg of 'urea' per kg of 'urea, as N'. Original comment of the exchange is: See chapter 'Yields and Inputs of Arable Crop Production' in "01_crop production - yields & inputs US_v1.0.pdf" - pdf-document on the dedicated talk page of ecoinvent (www.ecoinvent.org/documentation)
  EcoSpold01Location=RER
  properties: carbon content, fossil 0.2, dry mass 1 kg, wet mass 1 kg

## Inputs from nature
- Carbon dioxide, in air [natural resource, in air]: 0.3162 kg; = 44/12 * (REF_PRODUCT_C_content_non_fossil * REF_PRODUCT * REF_PRODUCT_DM - SEED_C_content_non_fossil * SEED * SEED_DM); lognormal variance with pedigree 0.0426, pedigree (2,1,5,5,1)
  Modelled,see chapter 'CO2 binding' in "01_crop production_direct field emissions and natural resources_v1.0.pdf" - pdf-document on the dedicated talk page of ecoinvent (www.ecoinvent.org/documentation)
- Energy, gross calorific value, in biomass [natural resource, biotic]: 3.6476 MJ; lognormal variance with pedigree 0.0411891, pedigree (2,1,5,1,1)
- Occupation, annual crop [natural resource, land]: 0.2439 m2*year; lognormal variance with pedigree 0.1626, pedigree (2,1,5,5,1)
  Modelled, see chapter 'Land use' in "01_crop production_direct field emissions and natural resources_v1.0.pdf" - pdf-document on the dedicated talk page of ecoinvent (www.ecoinvent.org/documentation)
- Transformation, from annual crop [natural resource, land]: 0.2439 m2; lognormal variance with pedigree 0.1626, pedigree (2,1,5,5,1)
  (same comment as for Occupation, annual crop)
- Transformation, to annual crop [natural resource, land]: 0.2439 m2; lognormal variance with pedigree 0.1626, pedigree (2,1,5,5,1)
  (same comment as for Occupation, annual crop)

## Emissions to nature
- Ammonia [air, non-urban air or from high stacks]: 0.000331389 kg; lognormal variance with pedigree 0.0527, pedigree (2,2,5,5,1)
  Modelled with the 'AGRAMMON model' described in "01_crop production_direct field emissions and natural resources_v1.0.pdf" - pdf-document on the dedicated talk page of ecoinvent (www.ecoinvent.org/documentation)
- Carbon dioxide, fossil [air, non-urban air or from high stacks]: 0.0012917 kg; lognormal variance with pedigree 0.0427, pedigree (2,2,5,5,1)
  Modelled, see chapter 'Release of fossil CO2 after urea applications' in "01_crop production_assessment methods of direct field emissions_v1.0.pdf" - pdf-document on the dedicated talk page of ecoinvent (www.ecoinvent.org/documentation)
- Dinitrogen monoxide [air, non-urban air or from high stacks]: 0.000123247 kg; name N2O; lognormal variance with pedigree 0.0727, pedigree (2,2,5,5,1)
  Modelled, see chapter 'Emissions of N2O to the air' in "01_crop production_direct field emissions and natural resources_v1.0.pdf" - pdf-document on the dedicated talk page of ecoinvent (www.ecoinvent.org/documentation)
- Nitrogen oxides [air, non-urban air or from high stacks]: 2.58819e-5 kg; = 0.21 * N2O; lognormal variance with pedigree 0.0727, pedigree (2,2,5,5,1)
  Modelled, see chapter 'Emissions of NOx to the air' in "01_crop production_direct field emissions and natural resources_v1.0.pdf" - pdf-document on the dedicated talk page of ecoinvent (www.ecoinvent.org/documentation)
- Water [air, unspecified]: 0.0786364 m3; name water_to_air_unspecified; lognormal variance with pedigree 0.0827, pedigree (2,2,5,5,1)
  Calculated value based on literature values and expert opinion. See comments in the parametres' comment field.
  property fraction, origin: fresh water 1; name fraction_origin_fresh_water
  property fraction, origin: salt water 0; name fraction_origin_salt_water
  property fraction, origin: unspecified 0; name fraction_origin_unspecified
- 2,4-D [soil, agricultural]: 5.984e-9 kg; lognormal variance with pedigree 0.0526, pedigree (2,1,5,5,1)
  Modelled, see chapter 'Emissions of pesticides to agricultural soil' in "01_crop production_direct field emissions and natural resources_v1.0.pdf" - pdf-document on the dedicated talk page of ecoinvent (www.ecoinvent.org/documentation)
- Aldicarb [soil, agricultural]: 4.1431e-6 kg; lognormal variance with pedigree 0.0526, pedigree (2,1,5,5,1)
  (same comment as for 2,4-D)
- Azinphos-methyl [soil, agricultural]: 3.9603e-7 kg; lognormal variance with pedigree 0.0526, pedigree (2,1,5,5,1)
  (same comment as for 2,4-D)
- Azoxystrobin [soil, agricultural]: 1.9584e-6 kg; lognormal variance with pedigree 0.0526, pedigree (2,1,5,5,1)
  (same comment as for 2,4-D)
- Beta-cyfluthrin [soil, agricultural]: 2.6983e-7 kg; lognormal variance with pedigree 0.0526, pedigree (2,1,5,5,1)
  (same comment as for 2,4-D)
- Cadmium II [soil, agricultural]: 3.00685e-7 kg; lognormal variance with pedigree 0.0827, pedigree (2,2,5,5,1)
  Modelled, see chapter 'Emissions of heavy metals to agricultural soil, surface water and ground water' in "01_crop production_direct field emissions and natural resources_v1.0.pdf" - pdf-document on the dedicated talk page of ecoinvent (www.ecoinvent.org/documentation)
- Carbaryl [soil, agricultural]: 6.0928e-8 kg; lognormal variance with pedigree 0.0526, pedigree (2,1,5,5,1)
  (same comment as for 2,4-D)
- Carbofuran [soil, agricultural]: 6.7891e-7 kg; lognormal variance with pedigree 0.0526, pedigree (2,1,5,5,1)
  (same comment as for 2,4-D)
- Chlorothalonil [soil, agricultural]: 5.0327e-5 kg; lognormal variance with pedigree 0.0526, pedigree (2,1,5,5,1)
  (same comment as for 2,4-D)
- Chromium III [soil, agricultural]: 2.89873e-6 kg; lognormal variance with pedigree 0.0827, pedigree (2,2,5,5,1)
  (same comment as for Cadmium II)
- Clethodim [soil, agricultural]: 4.896e-9 kg; lognormal variance with pedigree 0.0526, pedigree (2,1,5,5,1)
  (same comment as for 2,4-D)
- Copper ion [soil, agricultural]: 6.45258e-7 kg; lognormal variance with pedigree 0.0827, pedigree (2,2,5,5,1)
  (same comment as for Cadmium II)
- Cymoxanil [soil, agricultural]: 1.8278e-7 kg; lognormal variance with pedigree 0.0526, pedigree (2,1,5,5,1)
  (same comment as for 2,4-D)
- Diazinon [soil, agricultural]: 1.5014e-6 kg; lognormal variance with pedigree 0.0526, pedigree (2,1,5,5,1)
  (same comment as for 2,4-D)
- Dichlorprop-P [soil, agricultural]: 0.00010134 kg; lognormal variance with pedigree 0.0526, pedigree (2,1,5,5,1)
  (same comment as for 2,4-D)
- Dimethoate [soil, agricultural]: 1.038e-6 kg; lognormal variance with pedigree 0.0526, pedigree (2,1,5,5,1)
  (same comment as for 2,4-D)
- Dimethomorph [soil, agricultural]: 3.9168e-8 kg; lognormal variance with pedigree 0.0526, pedigree (2,1,5,5,1)
  (same comment as for 2,4-D)
- Diquat [soil, agricultural]: 3.1335e-6 kg; lognormal variance with pedigree 0.0526, pedigree (2,1,5,5,1)
  (same comment as for 2,4-D)
- EPTC [soil, agricultural]: 1.6229e-5 kg; lognormal variance with pedigree 0.0526, pedigree (2,1,5,5,1)
  (same comment as for 2,4-D)
- Endosulfan [soil, agricultural]: 1.3578e-6 kg; lognormal variance with pedigree 0.0526, pedigree (2,1,5,5,1)
  (same comment as for 2,4-D)
- Endothall [soil, agricultural]: 1.2512e-8 kg; lognormal variance with pedigree 0.0526, pedigree (2,1,5,5,1)
  (same comment as for 2,4-D)
- Esfenvalerate [soil, agricultural]: 2.2195e-7 kg; lognormal variance with pedigree 0.0526, pedigree (2,1,5,5,1)
  (same comment as for 2,4-D)
- Ethoprop [soil, agricultural]: 3.7601e-6 kg; lognormal variance with pedigree 0.0526, pedigree (2,1,5,5,1)
  (same comment as for 2,4-D)
- Fentin hydroxide [soil, agricultural]: 6.5063e-7 kg; lognormal variance with pedigree 0.0526, pedigree (2,1,5,5,1)
  (same comment as for 2,4-D)
- Flutolanil [soil, agricultural]: 7.3984e-7 kg; lognormal variance with pedigree 0.0526, pedigree (2,1,5,5,1)
  (same comment as for 2,4-D)
- Glufosinate [soil, agricultural]: 3.2205e-7 kg; lognormal variance with pedigree 0.0526, pedigree (2,1,5,5,1)
  (same comment as for 2,4-D)
- Glyphosate [soil, agricultural]: 2.4371e-7 kg; lognormal variance with pedigree 0.0526, pedigree (2,1,5,5,1)
  (same comment as for 2,4-D)
- Imidacloprid [soil, agricultural]: 1.0706e-6 kg; lognormal variance with pedigree 0.0526, pedigree (2,1,5,5,1)
  (same comment as for 2,4-D)
- Iprodione [soil, agricultural]: 1.3252e-6 kg; lognormal variance with pedigree 0.0526, pedigree (2,1,5,5,1)
  (same comment as for 2,4-D)
- Lead II [soil, agricultural]: 2.69953e-7 kg; lognormal variance with pedigree 0.0827, pedigree (2,2,5,5,1)
  (same comment as for Cadmium II)
- Linuron [soil, agricultural]: 8.7476e-7 kg; lognormal variance with pedigree 0.0526, pedigree (2,1,5,5,1)
  (same comment as for 2,4-D)
- Malathion [soil, agricultural]: 5.9296e-8 kg; lognormal variance with pedigree 0.0526, pedigree (2,1,5,5,1)
  (same comment as for 2,4-D)
- Maleic hydrazide [soil, agricultural]: 4.1127e-6 kg; lognormal variance with pedigree 0.0526, pedigree (2,1,5,5,1)
  (same comment as for 2,4-D)
- Mancozeb [soil, agricultural]: 5.8909e-5 kg; lognormal variance with pedigree 0.0526, pedigree (2,1,5,5,1)
  (same comment as for 2,4-D)
- Maneb [soil, agricultural]: 9.5744e-8 kg; lognormal variance with pedigree 0.0526, pedigree (2,1,5,5,1)
  (same comment as for 2,4-D)
- Mercury II [soil, agricultural]: -7.43954e-9 kg
  (same comment as for Cadmium II)
- Metalaxil [soil, agricultural]: 2.1151e-6 kg; lognormal variance with pedigree 0.0526, pedigree (2,1,5,5,1)
  (same comment as for 2,4-D)
- Metam-sodium [soil, agricultural]: 0.00066972 kg; lognormal variance with pedigree 0.0526, pedigree (2,1,5,5,1)
  (same comment as for 2,4-D)
- Metolachlor [soil, agricultural]: 4.5304e-6 kg; lognormal variance with pedigree 0.0526, pedigree (2,1,5,5,1)
  (same comment as for 2,4-D)
- Metribuzin [soil, agricultural]: 6.4562e-6 kg; lognormal variance with pedigree 0.0526, pedigree (2,1,5,5,1)
  (same comment as for 2,4-D)
- Nickel II [soil, agricultural]: 5.26007e-7 kg; lognormal variance with pedigree 0.0827, pedigree (2,2,5,5,1)
  (same comment as for Cadmium II)
- Oxamyl [soil, agricultural]: 3.1509e-6 kg; lognormal variance with pedigree 0.0526, pedigree (2,1,5,5,1)
  (same comment as for 2,4-D)
- Paraquat [soil, agricultural]: 2.089e-7 kg; lognormal variance with pedigree 0.0526, pedigree (2,1,5,5,1)
  (same comment as for 2,4-D)
- Pendimethalin [soil, agricultural]: 4.1344e-6 kg; lognormal variance with pedigree 0.0526, pedigree (2,1,5,5,1)
  (same comment as for 2,4-D)
- Permethrin [soil, agricultural]: 1.3056e-7 kg; lognormal variance with pedigree 0.0526, pedigree (2,1,5,5,1)
  (same comment as for 2,4-D)
- Phorate [soil, agricultural]: 6.7979e-6 kg; lognormal variance with pedigree 0.0526, pedigree (2,1,5,5,1)
  (same comment as for 2,4-D)
- Phosmet [soil, agricultural]: 7.4855e-7 kg; lognormal variance with pedigree 0.0526, pedigree (2,1,5,5,1)
  (same comment as for 2,4-D)
- Piperonyl butoxide [soil, agricultural]: 2.2304e-8 kg; lognormal variance with pedigree 0.0526, pedigree (2,1,5,5,1)
  (same comment as for 2,4-D)
- Propamocarb HCl [soil, agricultural]: 3.264e-8 kg; lognormal variance with pedigree 0.0526, pedigree (2,1,5,5,1)
  (same comment as for 2,4-D)
- Propargite [soil, agricultural]: 2.1804e-6 kg; lognormal variance with pedigree 0.0526, pedigree (2,1,5,5,1)
  (same comment as for 2,4-D)
- Pymetrozine [soil, agricultural]: 2.089e-7 kg; lognormal variance with pedigree 0.0526, pedigree (2,1,5,5,1)
  (same comment as for 2,4-D)
- Quintozene [soil, agricultural]: 4.0822e-6 kg; lognormal variance with pedigree 0.0526, pedigree (2,1,5,5,1)
  (same comment as for 2,4-D)
- Rimsulfuron [soil, agricultural]: 1.001e-7 kg; lognormal variance with pedigree 0.0526, pedigree (2,1,5,5,1)
  (same comment as for 2,4-D)
- Sethoxydim [soil, agricultural]: 8.704e-8 kg; lognormal variance with pedigree 0.0526, pedigree (2,1,5,5,1)
  (same comment as for 2,4-D)
- Spinosad [soil, agricultural]: 4.352e-9 kg; lognormal variance with pedigree 0.0526, pedigree (2,1,5,5,1)
  (same comment as for 2,4-D)
- Sulfur [soil, agricultural]: 1.1359e-5 kg; lognormal variance with pedigree 0.0526, pedigree (2,1,5,5,1)
  (same comment as for 2,4-D)
- Sulfuric acid [soil, agricultural]: 0.00076712 kg; lognormal variance with pedigree 0.0526, pedigree (2,1,5,5,1)
  (same comment as for 2,4-D)
- TCMTB [soil, agricultural]: 6.3383e-5 kg; lognormal variance with pedigree 0.0526, pedigree (2,1,5,5,1)
  (same comment as for 2,4-D)
- Thiamethoxam [soil, agricultural]: 1.9149e-7 kg; lognormal variance with pedigree 0.0526, pedigree (2,1,5,5,1)
  (same comment as for 2,4-D)
- Trichlorfon [soil, agricultural]: 3.264e-9 kg; lognormal variance with pedigree 0.0526, pedigree (2,1,5,5,1)
  (same comment as for 2,4-D)
- Trifluralin [soil, agricultural]: 4.896e-7 kg; lognormal variance with pedigree 0.0526, pedigree (2,1,5,5,1)
  (same comment as for 2,4-D)
- Zinc II [soil, agricultural]: 3.78956e-6 kg; lognormal variance with pedigree 0.0827, pedigree (2,2,5,5,1)
  (same comment as for Cadmium II)
- Zineb [soil, agricultural]: 2.794e-6 kg; lognormal variance with pedigree 0.0506, pedigree (2,1,5,1,1)
  (same comment as for 2,4-D)
- Cadmium II [water, ground-]: 1.15584e-9 kg; lognormal variance with pedigree 0.1327, pedigree (2,2,5,5,1)
  (same comment as for Cadmium II)
- Cadmium II [water, surface water]: 6.11997e-10 kg; lognormal variance with pedigree 0.1327, pedigree (2,2,5,5,1)
  (same comment as for Cadmium II)
- Chromium III [water, ground-]: 5.04511e-7 kg; lognormal variance with pedigree 0.1327, pedigree (2,2,5,5,1)
  (same comment as for Cadmium II)
- Chromium III [water, surface water]: 6.32647e-8 kg; lognormal variance with pedigree 0.1327, pedigree (2,2,5,5,1)
  (same comment as for Cadmium II)
- Copper ion [water, ground-]: 8.52777e-8 kg; lognormal variance with pedigree 0.1327, pedigree (2,2,5,5,1)
  (same comment as for Cadmium II)
- Copper ion [water, surface water]: 5.25217e-8 kg; lognormal variance with pedigree 0.1327, pedigree (2,2,5,5,1)
  (same comment as for Cadmium II)
- Lead II [water, ground-]: 6.31679e-9 kg; lognormal variance with pedigree 0.1327, pedigree (2,2,5,5,1)
  (same comment as for Cadmium II)
- Lead II [water, surface water]: 2.26459e-8 kg; lognormal variance with pedigree 0.1327, pedigree (2,2,5,5,1)
  (same comment as for Cadmium II)
- Mercury II [water, ground-]: 1.26417e-10 kg; lognormal variance with pedigree 0.1327, pedigree (2,2,5,5,1)
  (same comment as for Cadmium II)
- Mercury II [water, surface water]: 9.00863e-11 kg; lognormal variance with pedigree 0.1327, pedigree (2,2,5,5,1)
  (same comment as for Cadmium II)
- Nickel II [water, surface water]: 5.10795e-8 kg; lognormal variance with pedigree 0.1327, pedigree (2,2,5,5,1)
  (same comment as for Cadmium II)
- Nitrate [water, ground-]: 0.00893411 kg; lognormal variance with pedigree 0.0827, pedigree (2,2,5,5,1)
  (same comment as for Cadmium II)
- Phosphate [water, ground-]: 1.7073e-6 kg; lognormal variance with pedigree 0.0827, pedigree (2,2,5,5,1)
  Modelled, see chapter 'Emissions of phosphorous to the water' in "01_crop production_direct field emissions and natural resources_v1.0.pdf" - pdf-document on the dedicated talk page of ecoinvent (www.ecoinvent.org/documentation)
- Phosphate [water, surface water]: 0.0002029 kg; lognormal variance with pedigree 0.0827, pedigree (2,2,5,5,1)
  (same comment as for Phosphate)
- Phosphorus [water, surface water]: 0.00015016 kg; lognormal variance with pedigree 0.0827, pedigree (2,2,5,5,1)
  (same comment as for Phosphate)
- Water [water, ground-]: 0.0276206 m3; name water_to_water_ground; lognormal variance with pedigree 0.1306, pedigree (4,3,5,5,4)
  Calculated value. See the parameters and their comments to understand the calculation.
  property carbon content, fossil 0; name C_content_fossil
  property carbon content, non-fossil 0; name C_content_non_fossil
  property dry mass 0 kg; name DM
  property fraction, origin: fresh water 1; name fraction_origin_fresh_water_Wgw
  property fraction, origin: salt water 0; name fraction_origin_salt_water_Wgw
  property fraction, origin: unspecified 0; name fraction_origin_unspecified_Wgw
  property water in wet mass 1000 kg; name WWM
  property wet mass 1000 kg; name WM
- Water [water, surface water]: 0.00690516 m3; name water_to_water_surface; lognormal variance with pedigree 0.1306, pedigree (4,3,5,5,4)
  Calculated value. See the parameters and their comments to understand the calculation.
  property fraction, origin: fresh water 1; name fraction_origin_fresh_water_Wsw
  property fraction, origin: salt water 0; name fraction_origin_salt_water_Wsw
- Zinc II [water, ground-]: 6.04955e-7 kg; lognormal variance with pedigree 0.1327, pedigree (2,2,5,5,1)
  (same comment as for Cadmium II)
- Zinc II [water, surface water]: 1.003e-7 kg; lognormal variance with pedigree 0.1327, pedigree (2,2,5,5,1)
  (same comment as for Cadmium II)

## Sampling procedure
Data come from the NREL database and from varoius U.S database. Data were compiled from statistics, literature, farm survey reports, documents from extension services, and expert knowledge.

## Extrapolations
This dataset has been copied from an original dataset covering the geography US. If the dataset is used for other countries, particular care must be taken to the pesticides used, as there might be pesticides that are not allowed in a particular country.

## Review by Roberto Dones 2009-01-22
automatic validation in Excel
none
