# ethylene dichloride production

Dataset: EcoSpold 2, unit process
Geography: RER
Time period: 1997-01-01 to 2023-12-31
Technology level: current
Classification: ISIC rev.4 ecoinvent: 2011:Manufacture of basic chemicals
Classification: EcoSpold01Categories: chemicals/organics
Synonyms: EDC; 1,2-dichloroethane
Tags: ConvertedDataset
Scenario: Business-as-Usual
System model: Allocation, cut-off by classification
Generated by: Mike Chudacoff
Published in: Althaus H.-J. 2007
Database: ecoinvent
isCopyrightProtected: true
accessRestrictedTo: 1

## General comment
This data represents the production of 1 kg of ethylene dichloride via direct chlorination and oxy chlorination of ethylene. Raw materials, energy consumption and emissions are modelled with an average of available literature data. Infrastructure is included with a default value.
[This dataset was already contained in the ecoinvent database version 2. It was not individually updated during the transfer to ecoinvent version 3. Life Cycle Impact Assessment results may still have changed, as they are affected by changes in the supply chain, i.e. in other datasets. This dataset was generated following the ecoinvent quality guidelines for version 2. It may have been subject to central changes described in the ecoinvent version 3 change report (http://www.ecoinvent.org/database/ecoinvent-version-3/reports-of-changes/), and the results of the central updates were reviewed extensively. The changes added e.g. consistent water flows and other information throughout the database. The documentation of this dataset can be found in the ecoinvent reports of version 2, which are still available via the ecoinvent website. The change report linked above covers all central changes that were made during the conversion process.]

## Included activities start
From the reception of ethylene at the factory gate.

## Included activities end
This activity ends with 1 kg of ethylene dichloride,100% at the factory gate. The dataset includes the input materials, energy uses, infrastructure and emissions.

## Technology
EDC is produced industrially by the chlorination of ethylene, either directly with chlorine or by using hydrogen chloride (HCl). In practice, both routes are carried out together, the HCl stems from the cracking of EDC to vinyl chloride. HCl from other processes can also be used. The major outlet is for the production of vinyl chloride monomer (VCM). There are both integrated EDC / VCM plants as well as stand-alone EDC plants.
In 1997, European production of EDC was 9.4 million tons, according to (IPPC Chemicals, 2002). This makes it Europe’s most produced halogenated product. Global demand is expected to grow at roughly 6% per year in the short run, while future growth depends on the global demand for PVC. Major plants with capacities greater than 600’000 tons per year are located in Belgium, France, the Netherlands, Italy, Norway, the US, Canada, Brazil, Saudi Arabia, Japan and Taiwan.
Available data from production sites often refer to the entire EDC/VCM chain and do not differentiate between the production lines. There is some information on stand-alone sites, however, and this data forms the basis for part of the inventory developed in this report.
EDC can be produced by two routes, both involving the chlorination of ethylene. One route involves direct chlorination, the other is carried out with hydrochloric acid (HCl) and oxygen. In practice, both routes are carried out together. This study includes an average of the available literature data from both routes.
EDC by direct chlorination of ethylene:
C2H4 + Cl2  C2H4Cl2
Yield on ethylene 96-98% / on chlorine 98%
Liquid chlorine and pure ethylene are reacted in the presence of a catalyst (ferric chloride). The chlorination reaction can be carried out at low or high temperature. In the low-temperature process takes place at 20 ºC – 70 ºC. The reaction is exothermic and heat exchangers are needed. The advantage of this process is that there are few by-products.
The high-temperature process takes place at 100 ºC – 150 ºC. The heat generated is used to distill the EDC, which conserves energy. the reaction product consists of more than 99% EDC, the rest being chlorinated hydrocarbons that are removed with the light ends and then combusted or sold.
EDC by direct chlorination of ethylene:
C2H4 + Cl2  C2H4Cl2
Yield on ethylene 96-98% / on chlorine 98%
Liquid chlorine and pure ethylene are reacted in the presence of a catalyst (ferric chloride). The chlorination reaction can be carried out at low or high temperature. In the low-temperature process takes place at 20 ºC – 70 ºC. The reaction is exothermic and heat exchangers are needed. The advantage of this process is that there are few by-products.
The high-temperature process takes place at 100 ºC – 150 ºC. The heat generated is used to distill the EDC, which conserves energy.
Tthe reaction product consists of more than 99% EDC, the rest being chlorinated hydrocarbons that are removed with the light ends and then combusted or sold.
EDC by chlorination and oxychlorination:
C2H4 + Cl2  C2H4Cl2 (1)
C2H4 + 1/2 O2 + 2HCl  C2H4Cl2 + H2O (2)
Yield on ethylene 93-97% / on HCl 96-99%
Pure ethylene and hydrogen chloride are heated and mixed with oxygen. The reaction occurs at 200 ºC – 300 ºC at 4-6 bar in the presence of a catalyst (cupric chloride). After reaction the gases are quenched with water. The acid and water are removed, the gases are cooled and the organic layer is washed and dried. If air is used instead of oxygen, the reaction is easier to control. However, oxygen-based processes operate at lower temperatures, reducing vent gas volume. By-products are ethyl chloride, 1,1,2-trichloromethane and chloral (trichloroacetaldehyde).
Thermal cracking of EDC:
Thermal cracking of dry, pure EDC produces VCM and HCl. Often all the HCl generated in the cracking section is reused in producing EDC by oxychlorination. Plants that exhibit this characteristic and also do not export EDC are called “balanced”. The balanced process is the common process used as a Best Available Technology benchmark.
C2H4 + Cl2  C2H4Cl2 (Chlorination of ethylene to EDC)
C2H4Cl  CH2CHCl + HCl (Cracking of EDC to form VCM)
C2H4 + 1/2 O2 + 2HCl  C2H4Cl2 + H2O (Oxychlorination route to EDC)
Reference:
IPPC Chemicals, 2002 European Commission, Directorate General, Joint Research Center, “Reference Document on Best Available Techniques in the Large Volume Organic Chemical Industry”, February 2002
Wells, 1999 G. Margaret Wells, “Handbook of Petrochemicals and Processes”, 2nd edition, Ashgate, 1999

## Reference product
- ethylene dichloride: 1 kg; source Wells, M. 1991; By-product classification allocatable product; CPC 34110: Hydrocarbons and their halogenated, sulphonated, nitrated or nitrosated derivatives; HS2017 290315: Saturated chlorinated derivatives of acyclic hydrocarbons; ethylene dichloride (ISO) (1,2-dichloroethane); CAS 107-06-2
  EDC is a highly volatile liquid that is toxic and flammable. It is a dangerous fire and explosion hazard. ECD is miscible with most chlorinated organics and most organic solvents
  EDC is used primarily for the production of vinyl chloride monomer (VCM), a precursor for the production of the plastic polyvinyl chloride or PVC. There are both integrated EDC / VCM plants as well as stand-alone EDC plants
  EcoSpold01Location=RER
  production volume 5.5e9 kg
    Based on ECHA (2019), 1,2-dichloro-ethane, available here: https://echa.europa.eu/substance-information/-/substanceinfo/100.003.145, last accessed 12-07-2022.
  property heating value, net 12.25 MJ
    LHV is calculated based on the elemental composition of the substance. Based on the name of the substance, the chemical formula of the substance is manually found to be: C2H4Cl2.
  property price 0.256557 EUR2005
    Calculated value based on data from United Nations Commodity Trade Statistics Database (comtrade.un.org) based on an average price from the years 2015-2019. UN comtrade category: 290315 1.2-dichloroethane(ethylene dihcloride), last accessed 2022-08-07.
    The prices were converted to EUR based on the annual exchange rates published by the European Central Bank (https://sdw.ecb.europa.eu/quickview.do?SERIES_KEY=120.EXR.A.USD.EUR.SP00.A, last accessed on 2022-02-15) and adjusted for inflation relative to 2005 using the producer price index (PPI) of the euro area, published by eurostat (https://appsso.eurostat.ec.europa.eu/nui/show.do?dataset=sts_inpp_a&lang=en, last accessed on 2022-05-04).
  properties: carbon allocation 0.244898 kg, carbon content 0.244898, carbon content, fossil 0.244898, carbon content, non-fossil 0, dry mass 1 kg, water content 0, water in wet mass 0 kg, wet mass 1 kg

## Inputs from technosphere
- chemical factory, organics: 4e-10 unit; lognormal variance with pedigree 0.058725, pedigree (2,2,5,2,3)
  Estimation. Data was estimated based on the dataset "chemical plant, organics". This module assumes a built area of about 4.2 ha, an average output of 50'000 t/a, and plant life of fifty years.
  EcoSpold01Location=RER
  Uncertainty: inifrastructure of a typical plant
- chlorine, liquid: 0.735 kg; source Wells, M. 1991; lognormal variance with pedigree 0.058725, pedigree (2,2,5,2,3)
  EcoSpold01Location=RER
  Literature value. It is assumed that half of the EDC is produced by direct chlorination in a stand-alone plant and that half of the EDC is produced by oxychlorination. Therefore, literature values from two sources are combined.
  Additional sources:
  IPPC Chemicals, 2002. European Commission, Directorate General, Joint Research Center, "Reference Document on Best Available Techniques in the Large Volume Organic Chemical Industry", February 2002
  Uncertainty: precursor compound
  properties: dry mass 1 kg, wet mass 1 kg
- copper, cathode: 2.3e-5 kg; lognormal variance with pedigree 0.052, pedigree (1,4,5,1,1)
  Estimation. Copper used in catalysts.
  EcoSpold01Location=RER
  Uncertainty: copper catalyst used in the chlorination process
  properties: dry mass 1 kg, wet mass 1 kg
- ethylene: 0.295 kg; source Wells, M. 1991; lognormal variance with pedigree 0.058725, pedigree (2,2,5,2,3)
  Literature value. It is assumed that half of the EDC is produced by direct chlorination in a stand-alone plant and that half of the EDC is produced by oxychlorination. Therefore, literature values from two sources are combined.
  Additional sources:
  IPPC Chemicals, 2002. European Commission, Directorate General, Joint Research Center, "Reference Document on Best Available Techniques in the Large Volume Organic Chemical Industry", February 2002
  EcoSpold01Location=RER
  Uncertainty: precursor compound
  properties: carbon content, fossil 0.857143, dry mass 1 kg, heating value, net 43.22 MJ, wet mass 1 kg

## Emissions to nature
All rows: lognormal variance with pedigree 0.052, pedigree (1,4,5,1,1)
- Carbon dioxide, fossil [air, urban air close to ground]: 0.029 kg; source APME 2002
  Estimation. Estimated from different literature sources. Emission sources include losses from flanges, valves, decoupling of tanks, etc.
  Additional References:
  IPPC Chemicals, 2002. European Commission, Directorate General, Joint Research Center, "Reference Document on Best Available Techniques in the Large Volume Organic Chemical Industry", February 2002
  Uncertainty: one plant producing EDC
- Carbon monoxide, fossil [air, urban air close to ground]: 8e-6 kg; source APME 2002
  (same comment as for Carbon dioxide, fossil)
- Hydrocarbons, chlorinated [air, urban air close to ground]: 1e-7 kg; source APME 2002
  (same comment as for Carbon dioxide, fossil)
- Hydrochloric acid [air, urban air close to ground]: 1.5e-6 kg; source APME 2002
  (same comment as for Carbon dioxide, fossil)
- NMVOC, non-methane volatile organic compounds [air, urban air close to ground]: 6.5e-5 kg; source APME 2002
  (same comment as for Carbon dioxide, fossil)
- Nitrogen oxides [air, urban air close to ground]: 2e-5 kg; source APME 2002
  (same comment as for Carbon dioxide, fossil)
- Copper ion [soil, industrial]: 2.3e-5 kg; source IPPC 2002
  Estimation. Estimated from available literature data.
  Spent oxychlorination catalyst is found in heavy ends and in wastewater purification sludge. This type of catalyst typically contains about 5.5 % copper. The wastes are usually disposed of in hazardous waste landfills or incinerated in a hazardous waste incinerator. This report assumes a 50:50 split.
  Uncertainty: copper catalyst used in the chlorination process
- AOX, Adsorbable Organic Halides [water, surface water]: 2e-7 kg; source IPPC 2002
  Literature value. Liquid wastes stem from the EDC distillation unit. The residues are a mix of light ends (chlorinated C1 and C2 hydrocarbons with a boiling point lower than EDC) and heavy ends (e.g. chlorinated aromatics or cyclic hydrocarbons). Dioxin-related compounds formed by the oxychlorination reactions adhere to catalyst residues in metal sludge.
  Because of the high chlorine content, the residues are treated either by high-temperature incineration (produces HCl, which is either recycled or sold) or used as feedstock for high-temperature chlorination of a hydrocarbon (produces CCl4 or other highly chlorinated hydrocarbons).
  Value after wastewater treatment.
  Uncertainty: one plant producing EDC
- BOD5, Biological Oxygen Demand [water, surface water]: 5e-7 kg; source IPPC 2002
  (same comment as for AOX, Adsorbable Organic Halides)
- COD, Chemical Oxygen Demand [water, surface water]: 5e-7 kg; source IPPC 2002
  (same comment as for AOX, Adsorbable Organic Halides)
- Chlorinated solvents, unspecified [water, surface water]: 5e-8 kg; source IPPC 2002
  (same comment as for AOX, Adsorbable Organic Halides)
- Copper ion [water, surface water]: 1e-9 kg; source IPPC 2002
  Literature value. Liquid wastes stem from the EDC distillation unit. The residues are a mix of light ends (chlorinated C1 and C2 hydrocarbons with a boiling point lower than EDC) and heavy ends (e.g. chlorinated aromatics or cyclic hydrocarbons). Dioxin-related compounds formed by the oxychlorination reactions adhere to catalyst residues in metal sludge.
  Because of the high chlorine content, the residues are treated either by high-temperature incineration (produces HCl, which is either recycled or sold) or used as feedstock for high-temperature chlorination of a hydrocarbon (produces CCl4 or other highly chlorinated hydrocarbons).
  Value after wastewater treatment.
  Uncertainty: copper catalyst used in the chlorination process
- DOC, Dissolved Organic Carbon [water, surface water]: 1.85185e-7 kg; source IPPC 2002
  Calculated as equal to TOC.
  Uncertainty: one plant producing EDC
- TOC, Total Organic Carbon [water, surface water]: 1.85185e-7 kg; source IPPC 2002
  Calculated by default as TOC (gC) = COD/2.7 (COD measured in g O2). Should more correctly be calculated from the carbon content of the specified emissions to water.
  Uncertainty: one plant producing EDC

## Review by Heiko Kunst 2003-08-20
Passed.

## Review by Emilia Moreno Ruiz 2012-05-11
trainee dataset, ok, Helen Hamilton
