# chloronitrobenzene production

Dataset: EcoSpold 2, unit process
Geography: RoW
Time period: 2010-01-01 to 2023-12-31
Technology level: current
Classification: ISIC rev.4 ecoinvent: 2011:Manufacture of basic chemicals
Synonyms: C6H4ClNO2
Scenario: Business-as-Usual
System model: Allocation, cut-off by classification
Share of production covered: 100 %
Generated by: Jürgen Sutter
Database: ecoinvent
isCopyrightProtected: true
accessRestrictedTo: 1

## General comment
The process “chloronitrobenzene, at plant, GLO" is modelled for the production of chloronitrobenzene from chlorobenzene. Raw materials are modelled with a stoechiometric calculation. Emissions are estimated. Energy consumptions, infrastructure and transports are calculated with standard values.
o-Chloronitrobenzene (C6H4ClNO2; CAS 88-73-3, OCNB) crystallizes as light yellow monoclinic needles. The compound is very soluble in ether, benzene, or hot ethanol, but insoluble in water. Nitration of chlorobenzene with mixed acid typically gives an isomer mix in 98 % yield consisting of 34 – 36 % 2- chloronitrobenzene, 63 – 65 % 4- chloronitrobenzene, and only ca. 1 % 3- chloronitrobenzene. The ortho – para ratio of about 0.55 is in sharp contrast to the 1.6 obtained with nitrotoluene isomers. As with the nitration of toluene, much work has been done on isomer control so that the producer might have some flexibility towards the balance of isomer demand. Although no major change in ratio has been achieved, the situation is better for nitrochlorobenzene than nitrotoluenes, because the favored isomer is in much greater demand. In further contrast to the nitration of toluene, the nitration of chlorobenzene in the presence of phosphoric acid decreases the proportion of 4- chloronitrobenzene, and the use of phosphoric acid in the presence of a transition-metal catalyst is said to increase the ortho – para ratio to ca. 0.8.
Even though the rate of nitration of chlorobenzene is an order of magnitude slower than that of benzene, comparable temperatures (40 –70 °C) are adequate, and the techniques and equipment are very similar to those described for benzene. In Meissner units the slower reaction rate is compensated by placing additional reactors in series, thereby facilitating flexible operation of this plant type as a basis for multipurpose installations.
The mixed product output stream is the same whether produced by a batch or continuous process, and the isomers are separated by a combination of fractional crystallization and distillation. For a simple first separation the isomer mixture is held at a temperature slightly above its crystallization point (15 °C), whereby much of the 4- chloronitrobenzene crystallizes and can be separated. Fractional distillation gives a para-rich distillate containing all the meta isomer and an ortho-rich still residue. Each of these is crystallized, separated, and the liquid component is refractionated to gradually accumulate high-purity ortho and para products, together with intermediate fractions for continual recycle. point (15 °C), whereby much of the 4- chloronitrobenzene crystallizes and can be separated. Fractional distillation gives a para-rich distillate containing all the meta isomer and an ortho-rich still residue. Each of these is crystallized, separated, and the liquid component is refractionated to gradually accumulate high-purity ortho and para products, together with intermediate fractions for continual recycle.
2-Chloronitrobenzene derivatives find many outlets in the synthesis of colorants and effect chemicals. Reduction with iron produces 2-chloroaniline, and electrolytic reduction followed by rearrangement of the resulting hydrazo derivative leads to 3,3′-dichlorobenzidine, both of which are important diazo components. In the alternative, more economical hydrogenation process, a modified catalyst is required to inhibit dechlorination as a side reaction. Typically, a platinum on carbon catalyst, together with a small quantity of an inorganic acid acceptor such as magnesium oxide, is used; however, up to 2 % aniline may still be formed. The alternative use of morpholine as a dechlorination suppressor, rather than just an acid acceptor, is recommended for 2- and 4- chloronitrobenzene, this reduces the extent of dechlorination to 0.5 %. The use of modified catalyst systems based on platinum, rather than the conventional nickel catalyst used in the production of most aniline derivatives, is essential for hydrogenation of all nitrohalo aromatics.
Frischknecht R., Jungbluth N., Althaus H.-J., Doka G., Dones R., Heck T., Hellweg S., Hischier R., Nemecek T., Rebitzer G. and Spielmann M. (2007) Overview and Methodology. Final report ecoinvent v2.0 No. 1. Swiss Centre for Life Cycle Inventories, Dübendorf, CH, retrieved from: www.ecoinvent.org.
Gendorf (2000) Umwelterklärung 2000, Werk Gendorf. Werk Gendorf, Burgkirchen as pdf-File under: http://www.gendorf.de/pdf/umwelterklaerung2000.pdf
Kim S., Overcash M.: Energy in chemical manufacturing processes: gate-to-gate information for life cycle as-sessment. In: Journal of Chemical Technology & Biotechnology vol. 78, no. 9: 995-1005(11). 2003
Gerald Booth: Nitro Compounds, Aromatic. Published online: 2000. In: Ullmann's Encyclopedia of Industrial Chemistry, Seventh Edition, 2004 Electronic Release (ed. Fiedler E., Grossmann G., Kersebohm D., Weiss G. and Witte C.). 7 th Electronic Release Edition. Wiley InterScience, New York, Online-Version under: DOI: 10.1002/14356007.a17_411

## Included activities end
production of chloronitrobenzene including materials, energy uses, infrastructure, and emissions

## Geography
The inventory is modelled for the world.

## Technology
nitration of chlorobenzene

## Time period
Time of publications

## Parameters
- fraction, cooling water, cooling pond system, to air: 0.032 dimensionless; name fraction_CW_CP_to_air; lognormal variance with pedigree 0.0413, pedigree (2,3,1,3,1)
  Calculated based on literature value (Scown, C.D., 2011, Water Footprint of U.S. Transportation Fuels and supplying information of the article) (Vionnet, S., Quantis Water Database - Technical Report, 2012).
- fraction, cooling water, once-through system, to air: 0.004 dimensionless; name fraction_CW_OT_to_air; lognormal variance with pedigree 0.0413, pedigree (2,3,1,3,1)
  (same comment as for fraction, cooling water, cooling pond system, to air)
- fraction, cooling water, recirculating system, to air: 0.771 dimensionless; name fraction_CW_R_to_air; lognormal variance with pedigree 0.0413, pedigree (2,3,1,3,1)
  (same comment as for fraction, cooling water, cooling pond system, to air)
- fraction, cooling water, to air: 0.3875 dimensionless; name fraction_CW_to_air; = (0.5*fraction_CW_OT_to_air)+(0.5*fraction_CW_R_to_air); lognormal variance with pedigree 0.092025, pedigree (4,4,3,2,4)
  Calculated value based on literature value (see comments of the other parametres present in this dataset) and expert opinion. In the case when no industry/literature data are available about the type of cooling or directly fraction, cooling water, to air specific for the process a default assumption is applied. It is assumed that the once-through cooling system is used in 50% of all cases and recirculating system is used in another 50% of all cases.

## Reference product
- chloronitrobenzene: 1 kg; By-product classification allocatable product; CPC 34110: Hydrocarbons and their halogenated, sulphonated, nitrated or nitrosated derivatives; HS2017 290399: Halogenated derivatives of aromatic hydrocarbons; n.e.c. in item no. 2903.91, 2903.92, 2903.93 and 2903.94; CAS 88-73-3
  EcoSpold01Location=RER
  production volume 8.5e7 kg
    1985 (Ullmanns (2004)
  property carbon content, fossil 0.457399
    Calculated based on molecular structure. See tab "chemicals".
  property heating value, net 16.94 MJ
    LHV is calculated based on the elemental composition of the substance. Based on the CAS number of the substance (025167-93-5 ), which is found manually, the chemical formula of the substance is found to be: C6H4ClNO2, (PubChem 2020).
    Reference: Kim, S., Chen, J., Cheng, T., Gindulyte, A., He, J., He, S., Li, Q., Shoemaker, B. A., Thiessen, P. A., Yu, B., Zaslavsky, L., Zhang, J., & Bolton, E. E. (2019). PubChem 2019 update: improved access to chemical data. Nucleic acids research, 47(D1), D1102–D1109. https://doi.org/10.1093/nar/gky1033
  property price 0.907707 EUR2005
    Calculated based on inputs: The price of the product has been calculated as a sum of the values of the material and energy inputs for this product. This value is therefore a rough estimation. It may underestimate the real price since there are additional expenses when producing any product. These expences can include for example labour costs, treatment of waste materials and profit for the producer. Please consider carefully whether this level of data quality is acceptable for your application.
  properties: carbon allocation 0.457399 kg, carbon content 0.457399, carbon content, non-fossil 0, dry mass 1 kg, water content 0, water in wet mass 0 kg, wet mass 1 kg

## Inputs from technosphere
- chemical factory, organics: 4e-10 unit; lognormal variance with pedigree 0.3184, pedigree (4,5,5,5,5)
  No information was readily available about infrastructure and land-use of o-chloronitrobenzene production plants. Therefore, in this study, the infrastructure is estimated based on the module "chemical plant, organics". This module assumes a built area of about 4.2 ha, an average output of 50'000 t/a, and plant life of fifty years. For this study, the estimated value is 4.00 E-10 units per kg of produced chemical.
  EcoSpold01Location=RER
  Uncertainty: Estimation
- electricity, medium voltage: 0.000816962, 0.0162966, 0.0054756, 0.000250182, 5.00736e-5, 1.07519e-5, 0.00168287 kWh (7 suppliers, which the file names only by identifier); sum of these 0.024583 kWh; lognormal variance with pedigree 0.0416, pedigree (1,2,5,1,1)
  EcoSpold01Location=UCTE
  Kim 2003
  Uncertainty: Kim 2003
- heat, from steam, in chemical industry: 6.43 MJ; lognormal variance with pedigree 0.0416, pedigree (1,2,5,1,1)
  EcoSpold01Location=RER
  Kim 2003
  Uncertainty: Kim 2003
  properties: heating value, net 1 MJ
- monochlorobenzene: 0.75092 kg; lognormal variance with pedigree 0.0655, pedigree (4,5,5,1,1)
  As there was no data available for the production process, the values for the consumption of the raw materials are calculated with an assumed yield of 95 % (Frischknecht et al. 2007).
  EcoSpold01Location=RER
  Uncertainty: Stoechiometric calculation
  properties: carbon content, fossil 0.642857, dry mass 1 kg, heating value, net 24.78 MJ, wet mass 1 kg
- nitric acid, without water, in 50% solution state: 0.0133635, 0.0493785, 0.150761, 0.0813737, 0.0236596, 0.0197826, 0.0198561, 0.0642153 kg (8 suppliers, which the file names only by identifier); sum of these 0.42239 kg; lognormal variance with pedigree 0.0655, pedigree (4,5,5,1,1)
  EcoSpold01Location=RER
  As there was no data available for the production process, the values for the consumption of the raw materials are calculated with an assumed yield of 95 % (Frischknecht et al. 2007).
  Uncertainty: Stoechiometric calculation
  properties: dry mass 1 kg, wet mass 1 kg
- sodium hydroxide, without water, in 50% solution state: 0.013409 kg; lognormal variance with pedigree 0.0655, pedigree (4,5,5,1,1)
  Stoechiometric calculation for neutralization of nitric acid.
  EcoSpold01Location=RER
  Uncertainty: Stoechiometric calculation
  properties: dry mass 1 kg, heating value, net 3.03 MJ, wet mass 1 kg
- wastewater, average: -2.26904e-6, -8.07865e-9 m3 (2 suppliers, which the file names only by identifier); sum of these -2.27712e-6 m3; lognormal variance with pedigree 0.0452, pedigree (2,4,1,5,4)
  Calculated based on literature data published by the GENDORF Chemical Park. The factory produced an average of 2462760 tonnes of chemical substances (including intermediates) per year in the years 2015-2019. The average ouput of wastewater going to an external wastewater treatment plant in the years 2015-2019 was 5608 m3 per year. This equals 0.000002277 m3/kg chemical produced.
  References:
  Chemiepark GENDORF, Umwelterklärung 2016, https://www.gendorf.de/Nachbarn/Umweltschutz/Industrie%20und%20Nachhaltigkeit
  Chemiepark GENDORF, Umwelterklärung 2017, https://www.gendorf.de/Nachbarn/Umweltschutz/Industrie%20und%20Nachhaltigkeit
  Chemiepark GENDORF, Umwelterklärung 2020, https://www.gendorf.de/Nachbarn/Umweltschutz/Industrie%20und%20Nachhaltigkeit
  properties: carbon content, non-fossil 0.194039, dry mass 0.346837 kg, mass concentration, TOC 0.1091 kg/m3, mass concentration, calcium 0.039453 kg/m3, mass concentration, chlorine 0.030031 kg/m3, mass concentration, hydrogen 0.013365 kg/m3, mass concentration, nitrogen 0.031015 kg/m3, mass concentration, oxygen 0.069824 kg/m3, mass concentration, sodium 0.06456 kg/m3, mass concentration, sulfur 0.015602 kg/m3, water content 2882.2, wet mass 1000 kg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
  note on carbon content, non-fossil: 0.0673 kg TOC/m3 (Tab A.17, ecoinvent v2.2 report 13_I). TOC was considered as Total Carbon.

## Inputs from nature
- Water, cooling, unspecified natural origin [natural resource, in water]: 0.014707 m3; lognormal variance with pedigree 0.0852, pedigree (2,4,5,5,4)
  Calculated based on literature data published by the GENDORF Chemical Park. The factory produced an average of 2462760 tonnes of chemical substances (including intermediates) per year in the years 2015-2019. The average amount of cooling water released in the years 2015-2019 was 34408800 t per year. It was assumed that 5% of the cooling water was emitted to air during its use, therefore, to calculate the input of cooling water, the output value reported by GENDORF was scaled up by the factor 1/0.95. This equals 0.014707 m3/kg chemical produced.
  References:
  Chemiepark GENDORF, Umwelterklärung 2016, https://www.gendorf.de/Nachbarn/Umweltschutz/Industrie%20und%20Nachhaltigkeit
  Chemiepark GENDORF, Umwelterklärung 2017, https://www.gendorf.de/Nachbarn/Umweltschutz/Industrie%20und%20Nachhaltigkeit
  Chemiepark GENDORF, Umwelterklärung 2020, https://www.gendorf.de/Nachbarn/Umweltschutz/Industrie%20und%20Nachhaltigkeit
  Uncertainty: Estimation
- Water, river [natural resource, in water]: 0.000965426 m3; lognormal variance with pedigree 0.0852, pedigree (2,4,5,5,4)
  Calculated based on literature data published by the GENDORF Chemical Park. The factory produced an average of 2462760 tonnes of chemical substances (including intermediates) per year in the years 2015-2019. The average consumption of river water in the years 2015-2019 was 22000820 t per year. However, since the cooling water is modelled as an input, the amount of river water was adjusted to avoid double counting. 55% of the input amount of cooling water was deducted from the amount of river water, as that is the share of river water versus well water. This equals 0.00096543 m3/kg chemical produced.
  References:
  Chemiepark GENDORF, Umwelterklärung 2016, https://www.gendorf.de/Nachbarn/Umweltschutz/Industrie%20und%20Nachhaltigkeit
  Chemiepark GENDORF, Umwelterklärung 2017, https://www.gendorf.de/Nachbarn/Umweltschutz/Industrie%20und%20Nachhaltigkeit
  Chemiepark GENDORF, Umwelterklärung 2020, https://www.gendorf.de/Nachbarn/Umweltschutz/Industrie%20und%20Nachhaltigkeit
- Water, well, in ground [natural resource, in water]: 0.000816522 m3; lognormal variance with pedigree 0.0852, pedigree (2,4,5,5,4)
  Calculated based on literature data published by the GENDORF Chemical Park. The factory produced an average of 2462760 tonnes of chemical substances (including intermediates) per year in the years 2015-2019. The average consumption of well water in the years 2015-2019 was 18607480 t per year. However, since the cooling water is modelled as an input, the amount of well water was adjusted to avoid double counting. 45% of the input amount of cooling water was deducted from the amount of well water, as that is the share of well water versus river water. This equals 0.00081652 m3/kg chemical produced.
  References:
  Chemiepark GENDORF, Umwelterklärung 2016, https://www.gendorf.de/Nachbarn/Umweltschutz/Industrie%20und%20Nachhaltigkeit
  Chemiepark GENDORF, Umwelterklärung 2017, https://www.gendorf.de/Nachbarn/Umweltschutz/Industrie%20und%20Nachhaltigkeit
  Chemiepark GENDORF, Umwelterklärung 2020, https://www.gendorf.de/Nachbarn/Umweltschutz/Industrie%20und%20Nachhaltigkeit

## Emissions to nature
- Carbon dioxide, fossil [air, urban air close to ground]: 0.076465 kg; lognormal variance with pedigree 0.1786, pedigree (4,5,5,5,5)
  The carbon contained in the removed chlorobenzene is accounted as CO2 emissions to air.
  Uncertainty: Estimation
- Water [air, unspecified]: 0.00147008 m3; lognormal variance with pedigree 0.1246, pedigree (2,4,5,5,4)
  Calculated based on literature data published by the GENDORF Chemical Park. The factory produced an average of 2462760 tonnes of chemical substances (including intermediates) per year in the years 2015-2019. To determine the emissions of water to air, the difference of all water inputs (from river, well, tap water and cooling) and outputs (wastewater, emissions to water) was calculated. The average ouput of water to air in the years 2015-2019 was 3620444 m3 per year. This equals 0.00147 m3/kg chemical produced. For more information on the other water exchanges please consult the respective exchange comment.
  References:
  Chemiepark GENDORF, Umwelterklärung 2016, https://www.gendorf.de/Nachbarn/Umweltschutz/Industrie%20und%20Nachhaltigkeit
  Chemiepark GENDORF, Umwelterklärung 2017, https://www.gendorf.de/Nachbarn/Umweltschutz/Industrie%20und%20Nachhaltigkeit
  Chemiepark GENDORF, Umwelterklärung 2020, https://www.gendorf.de/Nachbarn/Umweltschutz/Industrie%20und%20Nachhaltigkeit
  property fraction, origin: fresh water 0; name fraction_origin_fresh_water
  property fraction, origin: salt water 0; name fraction_origin_salt_water
  property fraction, origin: unspecified 1; name fraction_origin_unspecified
- o-Dichlorobenzene [air, urban air close to ground]: 0.0015018 kg; lognormal variance with pedigree 0.1786, pedigree (4,5,5,5,5)
  There was no data available on process emissions to air for the o-chloronitrobenzene production process. As approximation the air emissions occurring from the purge vent, the distillation vent and fugitive emission sources were estimated to 0.2% of the chlorobenzene input.
  Uncertainty: Estimation
- AOX, Adsorbable Organic Halides [water, surface water]: 0.0011353 kg; lognormal variance with pedigree 0.1786, pedigree (4,5,5,5,5)
  Estimation from chlorobenzene emissions.
  Uncertainty: Estimation
- BOD5, Biological Oxygen Demand [water, surface water]: 0.0071316 kg; lognormal variance with pedigree 0.218, pedigree (4,5,5,5,5)
  The values for COD, BOD, TOC, and DOC used in this inventory are calculated from the amount of chlorobenzene in the treated waste water assuming a carbon conversion of 96% for COD. For the calculation of the values for BOD and DOC the worst case scenario BOD = COD and TOC = DOC is used.
  Uncertainty: Estimation
- COD, Chemical Oxygen Demand [water, surface water]: 0.0071316 kg; lognormal variance with pedigree 0.218, pedigree (4,5,5,5,5)
  (same comment as for BOD5, Biological Oxygen Demand)
- Chloride [water, surface water]: 0.010137 kg; lognormal variance with pedigree 0.3184, pedigree (4,5,5,5,5)
  Estimation from wastewater treatment.
  Uncertainty: Estimation
- DOC, Dissolved Organic Carbon [water, surface water]: 0.0023077 kg; lognormal variance with pedigree 0.218, pedigree (4,5,5,5,5)
  (same comment as for BOD5, Biological Oxygen Demand)
- Monochlorobenzene [water, surface water]: 0.0036044 kg; lognormal variance with pedigree 0.3184, pedigree (4,5,5,5,5)
  The remaining amount of unreacted chlorobenzene (4.8 % of the input) was assumed to leave the production process with the waste water. Further it was assumed that this wastewater is treated in a internal wastewater plant. The removal efficiency for chlorobenzene is assumed with 90%. The carbon contained in the removed chlorobenzene is accounted as CO2 emissions to air.
  Uncertainty: Estimation
- Nitrate [water, surface water]: 0.020784 kg; lognormal variance with pedigree 0.1786, pedigree (4,5,5,5,5)
  Estimation from nitric acid neutralization.
  Uncertainty: Estimation
- Sodium I [water, surface water]: 0.0077104 kg; lognormal variance with pedigree 0.6642, pedigree (4,5,5,5,5)
  Estimation
  Uncertainty: Estimation
- TOC, Total Organic Carbon [water, surface water]: 0.0023077 kg; lognormal variance with pedigree 0.218, pedigree (4,5,5,5,5)
  (same comment as for BOD5, Biological Oxygen Demand)
- Water [water, unspecified]: 0.0150391 m3; lognormal variance with pedigree 0.1246, pedigree (2,4,5,5,4)
  Calculated based on literature data published by the GENDORF Chemical Park. The factory produced an average of 2462760 tonnes of chemical substances (including intermediates) per year in the years 2015-2019. The amount of water released back to the environment consists of the sum of the amount of process water treated in the internal WWTP that is then released back to the environment and the amount of cooling water released back to the environment. The average ouput of the internal WWTP in the years 2015-2019 was 2628800 m3 and that of cooling water released back to the environment was 34408800 m3. This gives a yearly average of 37037600 m3 emissions of water to water. This equals 0.01504 m3/kg chemical produced.
  References:
  Chemiepark GENDORF, Umwelterklärung 2016, https://www.gendorf.de/Nachbarn/Umweltschutz/Industrie%20und%20Nachhaltigkeit
  Chemiepark GENDORF, Umwelterklärung 2017, https://www.gendorf.de/Nachbarn/Umweltschutz/Industrie%20und%20Nachhaltigkeit
  Chemiepark GENDORF, Umwelterklärung 2020, https://www.gendorf.de/Nachbarn/Umweltschutz/Industrie%20und%20Nachhaltigkeit
  property fraction, origin: fresh water 0; name fraction_origin_fresh_water_Ww
  property fraction, origin: salt water 0; name fraction_origin_salt_water_Ww
  property fraction, origin: unspecified 1; name fraction_origin_unspecified_Ww

## Sampling procedure
Literature data

## Extrapolations
Emissions are modelled with standard methods.
