# sulfate pulp production, from hardwood, bleached

Dataset: EcoSpold 2, unit process
Geography: RER
Time period: 2020-01-01 to 2023-12-31
Technology level: current
Classification: ISIC rev.4 ecoinvent: 1701:Manufacture of pulp, paper and paperboard
Synonyms: Kraftzellstoff; kraft pulp
Scenario: Business-as-Usual
System model: Allocation, cut-off by classification
Share of production covered: 100 %
Generated by: AISBL
Database: ecoinvent
isCopyrightProtected: true
accessRestrictedTo: 1

## General comment
This dataset represents an aggregation of the European production of Elemental Chlorine Free (ECF) and Totally Chlorine Free (TCF) kraft pulp, obtained from hardwood in 2020. Industry data was used which was provided by the European Pulp Industry Sector (EPIS). Values represent weighted average of 7 corresponding pulp mills located in Nordic countries. The represented technology is considered state of the art for a European average.
PULP is a wood-based raw material to make different paper, board and other products. The pulp, or fibers from the wood are separated in a kraft cooking process in a so-called fiber line. In a recovery line, the chemicals used in the cooking process are recovered to be used again and energy is produced. The third process is effluent treatment where gaseous and liquid discharges to the environment are continuously minimized and monitored.
MAIN END USES FOR MARKET PULP • Tissue (toilet paper) • Graphic papers • Specialty products • Packaging • Fluff pulp • Viscose • CMC etc.
PRODUCTS GENERATED IN THE PULPING PROCESS include biogas from sludge, electricity, heat etc.
CAPACITIES World’s total market capacities for softwood kraft pulp, hardwood kraft pulp, and eucalyptus kraft pulp were 28.9 million tons, 15 million tons, and 26.2 million tons, respectively.
SPECIES Softwood pulp is made from coniferous trees, most typically from different species of pine and spruce. Hardwood pulp is made from non-coniferous trees, in Nordic countries primarily of birch. Eucalyptus hardwood pulp is made exclusively of eucalyptus species.
CHARACTERISTICS Softwood fibers are long and slender and are used to give the paper and board products their strength properties. Hardwood fibers are short and can be rounder and their number per gram of pulp is much larger; they give the end product its smoothness, softness and optical properties like opacity (that you cannot see through the paper).

## Included activities start
This activity starts with the transport of pulpwood to the pulp factory. Pulpwood inputs have activity links to their supplying activities and are therefore not supplied via market datasets

## Included activities end
The process includes transports to the pulp mill, wood handling, chemical pulping and bleaching, drying process, energy production on-site, recovery cycles of chemicals and internal waste water treatment. The following air emissions were reported in the industry: CO2 (fossil and biogenic), CO, SOx (as SO2), NOx, TRS (as S), SO2 (reported as S), and Dust (unspecified). Next to these key emissions, additional emissions from on-site energy production from external and internal fuels were calculated, using emission profiles from ecoinvent combustion processes. Internal biogenic fuels are represented by the calculated emissions but do not have the corresponding fuel input from technosphere, because they are supplied from within the system boundaries. The amounts of internal fuels used in the process are: Biogas (6.34E+01 MJ/t), Bark (1.34E+02MJ/t), Black liquor(1.98E+04MJ/t), Sludge (3.64E+00MJ/t), Methanol (1.73E+02MJ7t), Biomass (1.12E+02 MJ/t), tall oil pitch (4.14E+02 MJ/t). Black liquor, sludge, tall oil pitch, tar oil and sodium formiate were not included in the emissions calculations because no specific emission profiles were available. Emissions from these internal energy generation processes are therefore only reflected in the key emission factors provided by the industry, other emissions constitute a data gap. The production of 5.86E-06 kg of the by-product “white liquor” per kg of pulp was excluded from the activity since no appropriate proxy could be found. Tar oil which is an external fuel (4.44E+01 MJ/t) has also no corresponding fuel input from technosphere because no appropriate proxy could be found

## Geography
Representing European countries. Data is coming from mills in Nordic countries.

## Technology
Average European technology in 2020 of kraft pulp production of ECF and TCF pulp

## Time period
Data gathered in 2021 and represents data of 2020 values. Recent technology valid for the upcoming years.

## Reference product
- methanol, from biomass: 1 kg; name a_meth; By-product classification allocatable product; CPC 34139: Other alcohols, phenols, phenol-alcohols, and their halogenated, sulphonated, nitrated or nitrosated derivativ[…]; HS2017 290511: Alcohols; saturated monohydric, methanol (methyl alcohol); CAS 67-56-1
  Data provided by industry (EPIS) 2020. By-product of pulp production.
  production volume 134598 kg; = a_meth*APV_RP
    Calculated from production volume of reference product using the relative outputs.
  property heating value, net 26.48 MJ
    LHV is calculated based on the elemental composition of the substance. Based on the CAS number of the substance (000067-56-1), the chemical formula of the substance is found to be: CH4O, (PubChem 2020). Reference: Kim, S., Chen, J., Cheng, T., Gindulyte, A., He, J., He, S., Li, Q., Shoemaker, B. A., Thiessen, P. A., Yu, B., Zaslavsky, L., Zhang, J., & Bolton, E. E. (2019). PubChem 2019 update: improved access to chemical data. Nucleic acids research, 47(D1), D1102–D1109. https://doi.org/10.1093/nar/gky1033
  property price 0.216 EUR2005
    Methyl alcohol, import prices for EU-27, USA, Japan, China, and India(http://data.un.org/browse.aspx?d=Comtrade; downloaded 13 September 2010)
  properties: allocation factor 3.47997e-5, carbon allocation 0.375 kg, carbon content 0.375375, carbon content, fossil 0, carbon content, non-fossil 0.375375, dry mass 0.999 kg, true value 1.39304e-5, water content 0.001001, water in wet mass 0.001 kg, wet mass 1 kg

## Inputs from technosphere
- EDTA, ethylenediaminetetraacetic acid: 5.37813e-5 kg; lognormal variance with pedigree 0.0009, pedigree (1,2,2,1,1)
  Data provided by industry (EPIS) 2020
  properties: carbon content, fossil 0.410959, dry mass 1 kg, heating value, net 19.09 MJ, wet mass 1 kg
- aluminium scrap, post-consumer: -2.11922e-5 kg; name a_al_scrap; lognormal variance with pedigree 0.0007, pedigree (1,2,1,1,1)
  Data provided by industry (EPIS) 2020. Represents 9.5 % of the total metal waste.
  production volume; = a_al_scrap*APV_RP
    Calculated from production volume of reference product using the relative outputs.
  properties: dry mass 1 kg, price 0.685 EUR2005, wet mass 1 kg
- aluminium sulfate, powder: 0.000383201 kg; lognormal variance with pedigree 0.0009, pedigree (1,2,2,1,1)
  Data provided by industry (EPIS) 2020
  properties: dry mass 1 kg, wet mass 1 kg
- bark chips, wet, measured as dry mass: 0.00400121, 5.48903e-5 kg (2 suppliers, which the file names only by identifier); sum of these 0.0040561 kg; lognormal variance with pedigree 0.0095, pedigree (2,2,2,1,3)
  Data provided by industry (EPIS) 2020, indicated in energy content and given as 0.1022 MJ/kg . Calculation into mass/volume was done by using the following conversion factor: Bark: MJ/kg 13.6
  properties: carbon content, non-fossil 0.494, dry mass 1 kg, heating value, net 4.81 MJ, water content 1.4, wet mass 2.4 kg
- biogas: 0.00346809 m3; lognormal variance with pedigree 0.0095, pedigree (2,2,2,1,3)
  Data provided by industry (EPIS) 2020, indicated in energy content and given as 0.1461 MJ/kg . Calculation into mass/volume was done by using the following conversion factor: Biogas: MJ/kg 22.73. Value taken from the general comment of "heat and power co-generation, biogas, gas engine" dataset. Source: https://ecoinvent.org/wp-content/uploads/2021/09/LHV_fuels.xlsx
  properties: carbon content, non-fossil 0.449939, dry mass 1.15 kg, heating value, net 22.73 MJ, wet mass 1.15 kg
- calcium carbonate, precipitated: 0.000827282 kg; lognormal variance with pedigree 0.0009, pedigree (1,2,2,1,1)
  Data provided by industry (EPIS) 2020. Represents Make-up limestone (CaCO3)
  properties: carbon content, fossil 0.120005, dry mass 1 kg, wet mass 1 kg
- chemical, inorganic: 0.000125187 kg; lognormal variance with pedigree 0.002, pedigree (2,3,2,1,1)
  Data provided by industry (EPIS) 2020. Represents Magnesium hydroxide Mg(OH)2.
  properties: carbon content, fossil 0.003, dry mass 1 kg, wet mass 1 kg
- chemical, organic: 0.000290559 kg; lognormal variance with pedigree 0.002, pedigree (2,3,2,1,1)
  Data provided by industry (EPIS) 2020. Represents Polymer, Peracetic acid (C2H4O3) and Defoamer
  properties: carbon content, fossil 0.628, dry mass 1 kg, heating value, net 19.03 MJ, wet mass 1 kg
- chlorine dioxide: 0.0041634 kg; lognormal variance with pedigree 0.0009, pedigree (1,2,2,1,1)
  Data provided by industry (EPIS) 2020
  properties: dry mass 1 kg, wet mass 1 kg
- copper scrap, sorted, pressed: -2.23076e-6 kg; name a_cu_scrap; lognormal variance with pedigree 0.0007, pedigree (1,2,1,1,1)
  Data provided by industry (EPIS) 2020. Represents 1 % of the total metal waste.
  production volume; = a_cu_scrap*APV_RP
    Calculated from production volume of reference product using the relative outputs.
  properties: dry mass 1 kg, price 2.84 EUR2005, wet mass 1 kg
- digester sludge: -0.0015041 kg; name a_digester_sludge; lognormal variance with pedigree 0.0007, pedigree (1,2,1,1,1)
  Data provided by industry (EPIS) 2020. Represents water treatment sludge
  production volume; = a_digester_sludge*APV_RP
    Calculated from production volume of reference product using the relative outputs.
  properties: carbon content, non-fossil 0.3444, dry mass 0.05 kg, heating value, net 2.42 MJ, water content 19, wet mass 1 kg
- electricity, high voltage: 0.0115344 kWh; lognormal variance with pedigree 0.0009, pedigree (1,2,2,1,1)
  Data provided by industry (EPIS) 2020. Represents external supply.
- electronics scrap: -0.00025985 kg; name a_electr_scrap; lognormal variance with pedigree 0.0007, pedigree (1,2,1,1,1)
  Data provided by industry (EPIS) 2020. Represents electric batteries.
  production volume; = a_electr_scrap*APV_RP
    Calculated from production volume of reference product using the relative outputs.
  properties: carbon content, fossil 0.317311, carbon content, non-fossil 0.004557, dry mass 1 kg, price 16.1 EUR2005, wet mass 1 kg
- green liquor dregs: -0.00438322 kg; name a_green_liquor_dregs; lognormal variance with pedigree 0.0007, pedigree (1,2,1,1,1)
  Data provided by industry (EPIS) 2020. Represents green liquor sludge
  production volume; = a_green_liquor_dregs*APV_RP
    Calculated from the production volume of sulfate pulp in proportion to the respective output amounts.
  properties: carbon content, non-fossil 0.390667, dry mass 0.75 kg, water content 0.333333, wet mass 1 kg
- hard coal: 0.000129856 kg; lognormal variance with pedigree 0.0095, pedigree (2,2,2,1,3)
  Data provided by industry (EPIS) 2020, indicated in energy content and given as 0.0067 MJ/kg . Calculation into mass/volume was done by using the following conversion factor: Hard coal: MJ/kg 27.91. Based on the Characterization factor of Hard coal in the CED method. Source: https://ecoinvent.org/wp-content/uploads/2021/09/LHV_fuels.xlsx
  properties: carbon content, fossil 0.845, dry mass 0.94 kg, heating value, net 27.91 MJ, water content 0.0638298, wet mass 1 kg
- hazardous waste, for incineration: -4.80149e-5, -1.25508e-6 kg (2 suppliers, which the file names only by identifier); sum of these -4.927e-5 kg; lognormal variance with pedigree 0.0007, pedigree (1,2,1,1,1)
  Data provided by industry (EPIS) 2020. Represents e.g. laboratory chemicals, solvents that must be disposed of in a controlled manner in a specialized external facility.
  production volume; = a_hazardous*APV_RP
    Calculated from production volume of reference product using the relative outputs.
  properties: carbon content, fossil 0.554667, dry mass 0.75 kg, heating value, net 17 MJ, water content 0.333333, wet mass 1 kg
- heat, district or industrial, other than natural gas: 0.0314575 MJ; lognormal variance with pedigree 0.0009, pedigree (1,2,2,1,1)
  Data provided by industry (EPIS) 2020. Represents external supply.
  properties: heating value, net 1 MJ
- heavy fuel oil: 0.00177315 kg; lognormal variance with pedigree 0.0095, pedigree (2,2,2,1,3)
  Data provided by industry (EPIS) 2020, indicated in energy content and given as 0.135MJ/kg . Calculation into mass/volume was done by using the following conversion factor: Heavy fuel oil: MJ/kg 41.2. Based on literature, page 21, Report6, part 4. Source: https://ecoinvent.org/wp-content/uploads/2021/09/LHV_fuels.xlsx
  properties: carbon content, fossil 0.849, dry mass 1 kg, heating value, net 41.2 MJ, wet mass 1 kg
- hydrogen peroxide, without water, in 50% solution state: 0.00389376 kg; lognormal variance with pedigree 0.0009, pedigree (1,2,2,1,1)
  Data provided by industry (EPIS) 2020
  properties: dry mass 1 kg, heating value, net 7.13 MJ, wet mass 1 kg
- iron scrap, unsorted: -0.000199653 kg; name a_iron_scrap; lognormal variance with pedigree 0.0007, pedigree (1,2,1,1,1)
  Data provided by industry (EPIS) 2020. Represents 89.5 % of the total metal waste.
  production volume; = a_iron_scrap*APV_RP
    Calculated from production volume of reference product using the relative outputs.
  properties: dry mass 1 kg, price 0.149 EUR2005, wet mass 1 kg
- light fuel oil: 1.57205e-5 kg; lognormal variance with pedigree 0.0095, pedigree (2,2,2,1,3)
  Data provided by industry (EPIS) 2020, indicated in energy content and given as 0.00124 MJ. Calculation into mass/volume was done by using the following conversion factor: Light fuel oil: MJ/kg 42.6. Based on literature, page 18, Report6, part 4. Source: https://ecoinvent.org/wp-content/uploads/2021/09/LHV_fuels.xlsx
  properties: carbon content, fossil 0.862, dry mass 1 kg, heating value, net 42.6 MJ, wet mass 1 kg
- limestone residue: -0.00215181 kg; name a_limestone_residues; lognormal variance with pedigree 0.0007, pedigree (1,2,1,1,1)
  Data provided by industry (EPIS) 2020; including ash, lime mud and lime sludge
  production volume; = a_limestone_residues*APV_RP
    (same comment as for green liquor dregs)
  properties: carbon content, fossil 0.0463689, dry mass 0.995 kg, water content 0.00502513, wet mass 1 kg
  note on carbon content, fossil: Calculated based on the carbon content of the input “calcium carbonate, precipitated”
- magnesium sulfate: 0.000340521 kg; lognormal variance with pedigree 0.0009, pedigree (1,2,2,1,1)
  Data provided by industry (EPIS) 2020
  properties: dry mass 1 kg, wet mass 1 kg
- malusil: 0.00227228 kg; lognormal variance with pedigree 0.0009, pedigree (1,2,2,1,1)
  Data provided by industry (EPIS) 2020. Represents Talc.
  properties: dry mass 1 kg, wet mass 1 kg
- methanol: 0.00010997 kg; lognormal variance with pedigree 0.0009, pedigree (1,2,2,1,1)
  Data provided by industry (EPIS) 2020
  properties: carbon content, fossil 0.375, dry mass 1 kg, heating value, net 20 MJ, wet mass 1 kg
  note on heating value, net: Based on literature, page 533, Report 17: Jungbluth, N., Chudacoff, M., Dauriat, A., Dinkel, F., Doka, G., Faist Emmenegger, M., Gnansounou, E., Kljun, N., Schleiss, K., Spielmann, M., Stettler, C., Sutter, J. 2007: Life Cycle Inventories of Bioenergy. ecoinvent report No. 17, Swiss Centre for Life Cycle Inventories, Dübendorf, CH.
- methanol, from biomass: 0.000904036 kg; lognormal variance with pedigree 0.0095, pedigree (2,2,2,1,3)
  Data provided by industry (EPIS) 2020. Proxy for tar oil, indicated in energy content and given as 0.0444 MJ/kg. . Calculated from energetic value with conversion factor 26.48 MJ/kg. The LHV is calculated based on the elemental composition of the substance. Based on the CAS number of the substance (000067-56-1), the chemical formula of the substance is found to be: CH4O, (PubChem 2020). Reference: Kim, S., Chen, J., Cheng, T., Gindulyte, A., He, J., He, S., Li, Q., Shoemaker, B. A., Thiessen, P. A., Yu, B., Zaslavsky, L., Zhang, J., & Bolton, E. E. (2019). PubChem 2019 update: improved access to chemical data. Nucleic acids research, 47(D1), D1102–D1109. https://doi.org/10.1093/nar/gky1033
  properties: carbon content, non-fossil 0.375375, dry mass 0.999 kg, heating value, net 26.48 MJ, water content 0.001001, wet mass 1 kg
- municipal solid waste: -0.000216348 kg; name a_msw; lognormal variance with pedigree 0.0007, pedigree (1,2,1,1,1)
  Data provided by industry (EPIS) 2020. Represents domestic waste and waste classified as "others"
  production volume; = a_msw*APV_RP
    (same comment as for green liquor dregs)
  properties: carbon content, fossil 0.171549, carbon content, non-fossil 0.261655, dry mass 0.771 kg, heating value, net 11.74 MJ, water content 0.297017, wet mass 1 kg
- natural gas, high pressure: 7.65109e-5, 0.0109732 m3 (2 suppliers, which the file names only by identifier); sum of these 0.0110498 m3; lognormal variance with pedigree 0.0095, pedigree (2,2,2,1,3)
  Data provided by industry (EPIS) 2020, indicated in energy content and given as 0.7986 MJ/kg. Calculation into mass/volume was done by using the following conversion factor: Natural gas: MJ/m3 39. Literature value, Source: United Nations Statistics Division (2018) International Recommendations for Energy Statistics (IRES). Available at: http://unstats.un.org/unsd/statcom/doc11/BG-IRES.pdf.
  properties: carbon content, fossil 0.75, dry mass 0.84 kg, heating value, net 36 MJ, wet mass 0.84 kg
  note on heating value, net: Literature value, Source: Christoph Meili;Niels Jungbluth;Maresa Bussa (2021) Life cycle inventories of crude oil and natural gas extraction. ESU-services Ltd. commissioned by BAFU & VSG, Schaffhausen, Switzerland, http://esu-services.ch/data/public-lci-reports/
- oxygen, liquid: 0.0120267 kg; lognormal variance with pedigree 0.0009, pedigree (1,2,2,1,1)
  Data provided by industry (EPIS) 2020
  properties: dry mass 1 kg, wet mass 1 kg
- peat: 0.00129214 kg; lognormal variance with pedigree 0.0095, pedigree (2,2,2,1,3)
  Data provided by industry (EPIS) 2020, indicated in energy content and given as 0.0239 MJ/kg. converted with a LHV of 10 MJ/kg. LHV represents an indicative value. Reference: Nature and Management of Tropical Peat Soils, FAO Soils Bulletin 59, available at: http://www.fao.org/3/x5872e/x5872e00.htm#Contents
  properties: carbon content, fossil 0.59, dry mass 0.42 kg, heating value, net 10 MJ, water content 1.38095, wet mass 1 kg
- pulp factory: 2.58464e-11 unit; lognormal variance with pedigree 0.3023, pedigree (3,2,2,1,1)
  Own estimation with yearly production volume and a lifetime of a factory of 50 years; activityLink introduced to establish a direct link to the corresponding regional supply of this product
- pulpwood, hardwood, measured as solid wood under bark: 0.00183258 m3; lognormal variance with pedigree 0.0029, pedigree (3,2,2,1,1)
  This value represents a calculated value, i.e., it is not based on EPIS (2020) data. There was found to be an imbalance in carbon and therefore this value had to be recalculated to close the balance. The original amount reported by EPIS (2020) is 1.832 BDt/Adt. This input represents the input of birch
  properties: basic wood density 563.2, carbon content, non-fossil 0.494, dry mass 623.644 kg, heating value, net 6071.3 MJ, water content 0.8, wet mass 1122.56 kg
- quicklime, milled, loose: 0.00652549 kg; lognormal variance with pedigree 0.0009, pedigree (1,2,2,1,1)
  Data provided by industry (EPIS) 2020. Calcium oxide (CaO)
  properties: dry mass 0.99 kg, water content 0.010101, wet mass 1 kg
- residual softwood, wet: 3.24882e-5 m3; = 0.0270940591568772/dry_mass_residual_wood; lognormal variance with pedigree 0.0009, pedigree (1,2,2,1,1)
  Data provided by industry (EPIS) 2020. Represents saw mill residsues from softwood. Amount given as 0.02709 kg dry mass. Converted to m3 using dry mass property.
  property dry mass 450 kg; name dry_mass_residual_wood
  properties: carbon content, non-fossil 0.494, heating value, net 5962.7 MJ, water content 0.7, wet mass 765 kg
- sludge from pulp and paper production: -0.00163555, -1.20951e-6 kg (2 suppliers, which the file names only by identifier); sum of these -0.00163676 kg; lognormal variance with pedigree 0.0007, pedigree (1,2,1,1,1)
  Data provided by industry (EPIS) 2020. Represents fibre (primary sludge) (87 %) and biological treatment sludge (13 %)
  production volume; = a_sludge*APV_RP
    Calculated from production volume of reference product using the relative outputs.
  properties: carbon content, non-fossil 0.21, dry mass 0.75 kg, heating value, net 2.65 MJ, water content 0.333333, wet mass 1 kg
- sodium chlorate, powder: 0.00498221 kg; lognormal variance with pedigree 0.0009, pedigree (1,2,2,1,1)
  Data provided by industry (EPIS) 2020
  properties: dry mass 1 kg, wet mass 1 kg
- sodium formate: 1.77407e-5 kg; lognormal variance with pedigree 0.0095, pedigree (2,2,2,1,3)
  Data provided by industry (EPIS) 2020, indicated in energy content and given as 0.000234 MJ/kg . Calculation into mass/volume was done by using the following conversion factor 7.133 MJ/kg. LHV is calculated based on the elemental composition of the substance. Based on the CAS number of the substance (000141-53-7), the chemical formula of the substance is found to be: CHNaO2, (PubChem 2020). Reference: Kim, S., Chen, J., Cheng, T., Gindulyte, A., He, J., He, S., Li, Q., Shoemaker, B. A., Thiessen, P. A., Yu, B., Zaslavsky, L., Zhang, J., & Bolton, E. E. (2019). PubChem 2019 update: improved access to chemical data. Nucleic acids research, 47(D1), D1102–D1109. https://doi.org/10.1093/nar/gky1033
  properties: carbon content, fossil 0.176471, dry mass 1 kg, heating value, net 7.13 MJ, wet mass 1 kg
- sodium hydrogen sulfite: 0.000857044 kg; lognormal variance with pedigree 0.0009, pedigree (1,2,2,1,1)
  Data provided by industry (EPIS) 2020. Represents Sodium Bisulfite (NaHSO3).
  properties: dry mass 1 kg, wet mass 1 kg
- sodium hydroxide, without water, in 50% solution state: 0.0153928 kg; lognormal variance with pedigree 0.0009, pedigree (1,2,2,1,1)
  Data provided by industry (EPIS) 2020
  properties: dry mass 1 kg, heating value, net 3.03 MJ, wet mass 1 kg
- sodium sulfate, anhydrite: 7.00345e-6 kg; lognormal variance with pedigree 0.0009, pedigree (1,2,2,1,1)
  Data provided by industry (EPIS) 2020
  properties: dry mass 1 kg, wet mass 1 kg
- sulfuric acid: 0.0134702 kg; lognormal variance with pedigree 0.0009, pedigree (1,2,2,1,1)
  Data provided by industry (EPIS) 2020
  properties: dry mass 1 kg, wet mass 1 kg
- transport, freight train: 0.220153 metric ton*km; lognormal variance with pedigree 0.0009, pedigree (1,2,2,1,1)
  Data provided by industry (EPIS) 2020. Represents transport of pulpwood.
- transport, freight, inland waterways, barge: 0.0287062 metric ton*km; lognormal variance with pedigree 0.0009, pedigree (1,2,2,1,1)
  Data provided by industry (EPIS) 2020. Represents transport of pulpwood.
- transport, freight, lorry >32 metric ton, EURO5: 0.148387 metric ton*km; lognormal variance with pedigree 0.0009, pedigree (1,2,2,1,1)
  Data provided by industry (EPIS) 2020. Represents transport of pulpwood.
- transport, freight, sea, bulk carrier for dry goods: 0.347496 metric ton*km; lognormal variance with pedigree 0.0009, pedigree (1,2,2,1,1)
  Data provided by industry (EPIS) 2020. Represents transport of pulpwood.
- waste mineral oil: -1.78463e-5, -0.000720886 kg (2 suppliers, which the file names only by identifier); sum of these -0.000738732 kg; lognormal variance with pedigree 0.0007, pedigree (1,2,1,1,1)
  Data provided by industry (EPIS) 2020. Represents lubricants residues: The running of the equipment and conveyors and their maintenance require lubrication. lubricants are oils and greases
  production volume; = a_waste_mineral_oil*APV_RP
    Calculated from production volume of reference product using the relative outputs.
  properties: carbon content, fossil 0.864444, dry mass 0.9 kg, heating value, net 34.7 MJ, water content 0.111111, wet mass 1 kg
- waste packaging paper: -0.000118907 kg; name a_waste_paper; lognormal variance with pedigree 0.0007, pedigree (1,2,1,1,1)
  Data provided by industry (EPIS) 2020. Represents waste packaging
  production volume; = a_waste_paper*APV_RP
    Calculated from production volume of reference product using the relative outputs.
  properties: carbon content, fossil 0.3635, carbon content, non-fossil 0.1432, dry mass 1 kg, heating value, net 14.11 MJ, price 0.1 EUR2005, wet mass 1 kg
- waste plastic, mixture: -1.93698e-6 kg; name a_plastic; lognormal variance with pedigree 0.0007, pedigree (1,2,1,1,1)
  Data provided by industry (EPIS) 2020. Represents plastic waste
  production volume; = a_plastic*APV_RP
    Calculated from production volume of reference product using the relative outputs.
  properties: carbon content, fossil 0.747344, dry mass 0.847 kg, heating value, net 30.79 MJ, water content 0.180638, wet mass 1 kg
- waste wood, untreated: -0.000889701 kg; name a_waste_wood; lognormal variance with pedigree 0.0007, pedigree (1,2,1,1,1)
  Data provided by industry (EPIS) 2020. Represents bark waste and wood waste.
  production volume; = a_waste_wood*APV_RP
    Calculated from production volume of reference product using the relative outputs.
  properties: carbon content, non-fossil 0.48632, dry mass 0.8 kg, heating value, net 13.99 MJ, water content 0.25, wet mass 1 kg
- wood ash mixture, pure: -0.000258665, -7.92785e-6 kg (2 suppliers, which the file names only by identifier); sum of these -0.000266593 kg; lognormal variance with pedigree 0.0007, pedigree (1,2,1,1,1)
  Data provided by industry (EPIS) 2020; Represents "fiber reject".
  production volume; = a_wood_ash*APV_RP
    Calculated from production volume of reference product using the relative outputs.
  properties: carbon content, non-fossil 0.012, dry mass 1 kg, wet mass 1 kg
- wood chips, wet, measured as dry mass: 0.00205953, 0.0541326 kg (2 suppliers, which the file names only by identifier); sum of these 0.0561921 kg; lognormal variance with pedigree 0.0009, pedigree (1,2,2,1,1)
  Data provided by industry (EPIS) 2020. Represents wood chips and saw mill residues
  properties: carbon content, non-fossil 0.494, dry mass 1 kg, heating value, net 10.84 MJ, water content 1.1, wet mass 2.1 kg

## Inputs from nature
- Carbon dioxide, non-fossil, resource correction [natural resource, in air]: 0.495312 kg
- Oxygen [natural resource, in air]: 0.986628 kg; name O2; = (CO2_fossil+CO2_non_fossil)/(16*2+12) * (16*2) + (CO_fossil+CO_non_fossil)/(16+12) *16; lognormal variance with pedigree 0.0494, pedigree (2,5,2,1,4)
  Oxygen is required for the combustion process. Calculated value
- Water, unspecified natural origin [natural resource, in water]: 0.0441149 m3; lognormal variance with pedigree 0.0009, pedigree (1,2,2,1,1)
  Data provided by industry (EPIS) 2020. Represents surface water.

## Emissions to nature
- Acetaldehyde [air, urban air close to ground]: 2.28832e-8 kg; lognormal variance with pedigree 0.1388, pedigree (2,5,2,1,4)
  Estimation based on fuel input data and emission factors from corresponding ecoinvent fuel combustion datasets (see "Extrapolations" comment). Apart from external fuel inputs, internal fuels such as bark, black liquor, sludge, tall oil pitch, wood pellets are generated during the process and supply considerable amounts of process energy. Internal fuels are represented by the calculated emissions but do not have the corresponding fuel input from technosphere, because they are supplied from within the system boundaries. The amounts of internal fuels used in the process are: Biogas (6.34E+01 MJ/t), Bark (1.34E+02MJ/t), Black liquor(1.98E+04MJ/t), Sludge (3.64E+00MJ/t), Methanol (1.73E+02MJ/t), Biomass (1.12E+02 MJ/t), tall oil pitch (4.14E+02 MJ/t) Black liquor, sludge, tall oil pitch, tar oil and sodium formiate were not included in the emissions calculations because no specific emission profiles, e.g. for the black liquor recovery process, were available. Emissions from these internal energy generation processes are therefore only reflected in the key emission factors provided by the industry, other emissions constitute a data gap.
- Acetic acid [air, urban air close to ground]: 1.3882e-7 kg; lognormal variance with pedigree 0.1388, pedigree (2,5,2,1,4)
  (same comment as for Acetaldehyde)
- Acetone [air, urban air close to ground]: 1.07987e-8 kg; lognormal variance with pedigree 0.1388, pedigree (2,5,2,1,4)
  (same comment as for Acetaldehyde)
- Acetylene [air, urban air close to ground]: 6.6419e-8 kg; lognormal variance with pedigree 0.0888, pedigree (2,5,2,1,4)
  (same comment as for Acetaldehyde)
- Aluminium III [air, urban air close to ground]: 1.92546e-7 kg; lognormal variance with pedigree 0.6988, pedigree (2,5,2,1,4)
  (same comment as for Acetaldehyde)
- Ammonia [air, urban air close to ground]: 3.25463e-7 kg; lognormal variance with pedigree 0.1388, pedigree (2,5,2,1,4)
  (same comment as for Acetaldehyde)
- Antimony ion [air, urban air close to ground]: 3.32637e-10 kg; lognormal variance with pedigree 0.6988, pedigree (2,5,2,1,4)
  (same comment as for Acetaldehyde)
- Arsenic ion [air, urban air close to ground]: 1.86777e-9 kg; lognormal variance with pedigree 0.1388, pedigree (2,5,2,1,4)
  (same comment as for Acetaldehyde)
- Barium II [air, urban air close to ground]: 3.72579e-9 kg; lognormal variance with pedigree 0.6988, pedigree (2,5,2,1,4)
  (same comment as for Acetaldehyde)
- Benzene [air, urban air close to ground]: 4.92197e-7 kg; lognormal variance with pedigree 0.1388, pedigree (2,5,2,1,4)
  (same comment as for Acetaldehyde)
- Benzo(a)pyrene [air, urban air close to ground]: 3.607e-10 kg; lognormal variance with pedigree 0.1388, pedigree (2,5,2,1,4)
  (same comment as for Acetaldehyde)
- Beryllium II [air, urban air close to ground]: 3.72579e-11 kg; lognormal variance with pedigree 0.6988, pedigree (2,5,2,1,4)
  (same comment as for Acetaldehyde)
- Boron [air, urban air close to ground]: 1.49021e-7 kg; lognormal variance with pedigree 0.6988, pedigree (2,5,2,1,4)
  (same comment as for Acetaldehyde)
- Bromine [air, urban air close to ground]: 1.14901e-8 kg; lognormal variance with pedigree 0.1388, pedigree (2,5,2,1,4)
  (same comment as for Acetaldehyde)
- Butane [air, urban air close to ground]: 4.46463e-7 kg; lognormal variance with pedigree 0.3988, pedigree (2,5,2,1,4)
  (same comment as for Acetaldehyde)
- Cadmium II [air, urban air close to ground]: 2.36709e-10 kg; lognormal variance with pedigree 0.6988, pedigree (2,5,2,1,4)
  (same comment as for Acetaldehyde)
- Calcium II [air, urban air close to ground]: 1.7628e-6 kg; lognormal variance with pedigree 0.3988, pedigree (2,5,2,1,4)
  (same comment as for Acetaldehyde)
- Carbon dioxide, fossil [air, urban air close to ground]: 0.0314171 kg; name CO2_fossil; lognormal variance with pedigree 0.0494, pedigree (2,5,2,1,4)
  This value represents a calculated value, i.e., it is not based on EPIS (2020) data. It was calculated based on the fossil fuel input data and emission factors from corresponding ecoinvent fuel combustion datasets (see "Extrapolations" comment).
- Carbon dioxide, non-fossil [air, urban air close to ground]: 1.32496 kg; name CO2_non_fossil; lognormal variance with pedigree 0.0009, pedigree (1,2,2,1,1)
  Key emission provided by industry (EPIS) 2020
- Carbon monoxide, fossil [air, urban air close to ground]: 5.48142e-6 kg; name CO_fossil; lognormal variance with pedigree 0.6542, pedigree (3,4,2,1,1)
  Key emission provided by industry (EPIS) 2020. CO is reported as total CO. Assumed the same split of fossil and non-fossil as for CO2.
- Carbon monoxide, non-fossil [air, urban air close to ground]: 0.000292448 kg; name CO_non_fossil; lognormal variance with pedigree 0.6542, pedigree (3,4,2,1,1)
  (same comment as for Carbon monoxide, fossil)
- Chlorine [air, urban air close to ground]: 3.37779e-8 kg; lognormal variance with pedigree 0.3988, pedigree (2,5,2,1,4)
  (same comment as for Acetaldehyde)
- Chromium III [air, urban air close to ground]: 2.08681e-9 kg; lognormal variance with pedigree 0.6988, pedigree (2,5,2,1,4)
  (same comment as for Acetaldehyde)
- Chromium VI [air, urban air close to ground]: 3.03302e-11 kg; lognormal variance with pedigree 0.6988, pedigree (2,5,2,1,4)
  (same comment as for Acetaldehyde)
- Cobalt II [air, urban air close to ground]: 2.87689e-9 kg; lognormal variance with pedigree 0.6988, pedigree (2,5,2,1,4)
  (same comment as for Acetaldehyde)
- Copper ion [air, urban air close to ground]: 6.15053e-9 kg; lognormal variance with pedigree 0.6988, pedigree (2,5,2,1,4)
  (same comment as for Acetaldehyde)
- Dinitrogen monoxide [air, urban air close to ground]: 5.63436e-7 kg; lognormal variance with pedigree 0.1388, pedigree (2,5,2,1,4)
  (same comment as for Acetaldehyde)
- Dioxins, measured as 2,3,7,8-tetrachlorodibenzo-p-dioxin [air, urban air close to ground]: 5.96746e-15 kg; lognormal variance with pedigree 0.1388, pedigree (2,5,2,1,4)
  (same comment as for Acetaldehyde)
- Ethane [air, urban air close to ground]: 1.99257e-7 kg; lognormal variance with pedigree 0.0888, pedigree (2,5,2,1,4)
  (same comment as for Acetaldehyde)
- Ethanol [air, urban air close to ground]: 2.15974e-8 kg; lognormal variance with pedigree 0.1388, pedigree (2,5,2,1,4)
  (same comment as for Acetaldehyde)
- Ethyl benzene [air, urban air close to ground]: 5.62965e-9 kg; lognormal variance with pedigree 0.1388, pedigree (2,5,2,1,4)
  (same comment as for Acetaldehyde)
- Ethylene [air, urban air close to ground]: 3.98514e-7 kg; lognormal variance with pedigree 0.0888, pedigree (2,5,2,1,4)
  (same comment as for Acetaldehyde)
- Fluorine [air, urban air close to ground]: 9.38275e-9 kg; lognormal variance with pedigree 0.1388, pedigree (2,5,2,1,4)
  (same comment as for Acetaldehyde)
- Formaldehyde [air, urban air close to ground]: 1.22725e-7 kg; lognormal variance with pedigree 0.1388, pedigree (2,5,2,1,4)
  (same comment as for Acetaldehyde)
- Hexachlorobenzene [air, urban air close to ground]: 1.35112e-15 kg; lognormal variance with pedigree 0.1388, pedigree (2,5,2,1,4)
  (same comment as for Acetaldehyde)
- Hydrocarbons, aliphatic, alkanes, unspecified [air, urban air close to ground]: 2.80701e-7 kg; lognormal variance with pedigree 0.1388, pedigree (2,5,2,1,4)
  (same comment as for Acetaldehyde)
- Hydrocarbons, aliphatic, unsaturated [air, urban air close to ground]: 6.5031e-7 kg; lognormal variance with pedigree 0.1388, pedigree (2,5,2,1,4)
  (same comment as for Acetaldehyde)
- Hydrocarbons, aromatic [air, urban air close to ground]: 1.08188e-8 kg; lognormal variance with pedigree 0.1388, pedigree (2,5,2,1,4)
  (same comment as for Acetaldehyde)
- Hydrochloric acid [air, urban air close to ground]: 2.93292e-7 kg; lognormal variance with pedigree 0.1388, pedigree (2,5,2,1,4)
  (same comment as for Acetaldehyde)
- Hydrogen fluoride [air, urban air close to ground]: 9.63072e-9 kg; lognormal variance with pedigree 0.1388, pedigree (2,5,2,1,4)
  (same comment as for Acetaldehyde)
- Hydrogen sulfide [air, urban air close to ground]: 1.9329e-5 kg; lognormal variance with pedigree 0.0403, pedigree (1,2,2,1,1)
  Key emission provided by industry (EPIS) 2020. Hydrogen sulfide is expressing the total of the TRS (Total Reduced Sulphur Compounds), namely H2S, CS2, COS, C2H6S, CH4S, C2H6S2. Reported as TRS (as S)
- Iodine [air, urban air close to ground]: 6.29241e-10 kg; lognormal variance with pedigree 0.6988, pedigree (2,5,2,1,4)
  (same comment as for Acetaldehyde)
- Iron ion [air, urban air close to ground]: 2.50784e-7 kg; lognormal variance with pedigree 0.6988, pedigree (2,5,2,1,4)
  (same comment as for Acetaldehyde)
- Lead II [air, urban air close to ground]: 1.58946e-8 kg; lognormal variance with pedigree 0.6988, pedigree (2,5,2,1,4)
  (same comment as for Acetaldehyde)
- Lead-210 [air, urban air close to ground]: 9.69663e-7 kBq; lognormal variance with pedigree 0.6988, pedigree (2,5,2,1,4)
  (same comment as for Acetaldehyde)
- Magnesium [air, urban air close to ground]: 1.79237e-7 kg; lognormal variance with pedigree 0.6988, pedigree (2,5,2,1,4)
  (same comment as for Acetaldehyde)
- Manganese II [air, urban air close to ground]: 3.23084e-8 kg; lognormal variance with pedigree 0.6988, pedigree (2,5,2,1,4)
  (same comment as for Acetaldehyde)
- Mercury II [air, urban air close to ground]: 2.44151e-10 kg; lognormal variance with pedigree 0.6988, pedigree (2,5,2,1,4)
  (same comment as for Acetaldehyde)
- Methane, fossil [air, urban air close to ground]: 4.99118e-6 kg; lognormal variance with pedigree 0.1388, pedigree (2,5,2,1,4)
  (same comment as for Acetaldehyde)
- Methane, non-fossil [air, urban air close to ground]: 9.76091e-7 kg; lognormal variance with pedigree 0.1388, pedigree (2,5,2,1,4)
  (same comment as for Acetaldehyde)
- Methanol [air, urban air close to ground]: 3.67156e-8 kg; lognormal variance with pedigree 0.1388, pedigree (2,5,2,1,4)
  (same comment as for Acetaldehyde)
- Molybdenum VI [air, urban air close to ground]: 1.16424e-9 kg; lognormal variance with pedigree 0.6988, pedigree (2,5,2,1,4)
  (same comment as for Acetaldehyde)
- NMVOC, non-methane volatile organic compounds [air, urban air close to ground]: 1.54465e-6 kg; lognormal variance with pedigree 0.1388, pedigree (2,5,2,1,4)
  (same comment as for Acetaldehyde)
- Nickel II [air, urban air close to ground]: 3.72058e-8 kg; lognormal variance with pedigree 0.6988, pedigree (2,5,2,1,4)
  (same comment as for Acetaldehyde)
- Nitrogen oxides [air, urban air close to ground]: 0.000787968 kg; lognormal variance with pedigree 0.0403, pedigree (1,2,2,1,1)
  Key emission provided by industry (EPIS) 2020
- PAH, polycyclic aromatic hydrocarbons [air, urban air close to ground]: 8.50015e-9 kg; lognormal variance with pedigree 0.1388, pedigree (2,5,2,1,4)
  (same comment as for Acetaldehyde)
- Particulate Matter, < 2.5 um [air, unspecified]: 8.60332e-5 kg; lognormal variance with pedigree 0.3042, pedigree (3,4,2,1,1)
  Key emission provided by industry (EPIS) 2020: Represents dust (unspecified)
- Particulate Matter, > 10 um [air, urban air close to ground]: 2.01801e-6 kg; lognormal variance with pedigree 0.0888, pedigree (2,5,2,1,4)
  (same comment as for Acetaldehyde)
- Particulate Matter, > 2.5 um and < 10um [air, unspecified]: 1.14487e-6 kg; lognormal variance with pedigree 0.1688, pedigree (2,5,2,1,4)
  (same comment as for Acetaldehyde)
- Pentachlorophenol [air, urban air close to ground]: 1.52001e-12 kg; lognormal variance with pedigree 0.1388, pedigree (2,5,2,1,4)
  (same comment as for Acetaldehyde)
- Pentane [air, urban air close to ground]: 7.65145e-7 kg; lognormal variance with pedigree 0.1388, pedigree (2,5,2,1,4)
  (same comment as for Acetaldehyde)
- Phenol [air, urban air close to ground]: 6.46068e-9 kg; lognormal variance with pedigree 0.0888, pedigree (2,5,2,1,4)
  (same comment as for Acetaldehyde)
- Phosphorus [air, urban air close to ground]: 5.78306e-8 kg; lognormal variance with pedigree 0.1388, pedigree (2,5,2,1,4)
  (same comment as for Acetaldehyde)
- Polonium-210 [air, urban air close to ground]: 1.78112e-6 kBq; lognormal variance with pedigree 0.6988, pedigree (2,5,2,1,4)
  (same comment as for Acetaldehyde)
- Potassium I [air, urban air close to ground]: 4.41534e-6 kg; lognormal variance with pedigree 0.6988, pedigree (2,5,2,1,4)
  (same comment as for Acetaldehyde)
- Potassium-40 [air, urban air close to ground]: 2.64717e-7 kBq; lognormal variance with pedigree 0.6988, pedigree (2,5,2,1,4)
  (same comment as for Acetaldehyde)
- Propane [air, urban air close to ground]: 2.62512e-7 kg; lognormal variance with pedigree 0.1388, pedigree (2,5,2,1,4)
  (same comment as for Acetaldehyde)
- Propionic acid [air, urban air close to ground]: 1.27501e-8 kg; lognormal variance with pedigree 0.1388, pedigree (2,5,2,1,4)
  (same comment as for Acetaldehyde)
- Propylene [air, urban air close to ground]: 6.6419e-8 kg; lognormal variance with pedigree 0.0888, pedigree (2,5,2,1,4)
  (same comment as for Acetaldehyde)
- Radium-226 [air, urban air close to ground]: 2.50236e-7 kBq; lognormal variance with pedigree 0.6988, pedigree (2,5,2,1,4)
  (same comment as for Acetaldehyde)
- Radium-228 [air, urban air close to ground]: 3.46716e-7 kBq; lognormal variance with pedigree 0.6988, pedigree (2,5,2,1,4)
  (same comment as for Acetaldehyde)
- Radon-220 [air, urban air close to ground]: 5.53099e-8 kBq; lognormal variance with pedigree 0.6988, pedigree (2,5,2,1,4)
  (same comment as for Acetaldehyde)
- Radon-222 [air, urban air close to ground]: 5.53099e-8 kBq; lognormal variance with pedigree 0.6988, pedigree (2,5,2,1,4)
  (same comment as for Acetaldehyde)
- Scandium [air, urban air close to ground]: 1.27332e-11 kg; lognormal variance with pedigree 0.6988, pedigree (2,5,2,1,4)
  (same comment as for Acetaldehyde)
- Selenium IV [air, urban air close to ground]: 1.8777e-9 kg; lognormal variance with pedigree 0.6988, pedigree (2,5,2,1,4)
  (same comment as for Acetaldehyde)
- Silicon [air, urban air close to ground]: 1.62075e-6 kg; lognormal variance with pedigree 0.6988, pedigree (2,5,2,1,4)
  (same comment as for Acetaldehyde)
- Sodium I [air, urban air close to ground]: 3.29567e-7 kg; lognormal variance with pedigree 0.6988, pedigree (2,5,2,1,4)
  (same comment as for Acetaldehyde)
- Strontium II [air, urban air close to ground]: 4.11281e-9 kg; lognormal variance with pedigree 0.6988, pedigree (2,5,2,1,4)
  (same comment as for Acetaldehyde)
- Sulfur dioxide [air, urban air close to ground]: 6.02025e-5 kg; lognormal variance with pedigree 0.0009, pedigree (1,2,2,1,1)
  Key emission provided by industry (EPIS) 2020. SO2 (reported as S)
- Sulfur oxides [air, unspecified]: 4.92037e-5 kg; lognormal variance with pedigree 0.0009, pedigree (1,2,2,1,1)
  Key emission provided by industry (EPIS) 2020. SOx (as SO2)
- Thallium I [air, urban air close to ground]: 7.3548e-12 kg; lognormal variance with pedigree 0.6988, pedigree (2,5,2,1,4)
  (same comment as for Acetaldehyde)
- Thorium [air, urban air close to ground]: 4.60383e-11 kg; lognormal variance with pedigree 0.6988, pedigree (2,5,2,1,4)
  (same comment as for Acetaldehyde)
- Thorium-228 [air, urban air close to ground]: 1.15553e-7 kBq; lognormal variance with pedigree 0.6988, pedigree (2,5,2,1,4)
  (same comment as for Acetaldehyde)
- Thorium-232 [air, urban air close to ground]: 7.2124e-8 kBq; lognormal variance with pedigree 0.6988, pedigree (2,5,2,1,4)
  (same comment as for Acetaldehyde)
- Tin ion [air, urban air close to ground]: 2.83918e-11 kg; lognormal variance with pedigree 0.6988, pedigree (2,5,2,1,4)
  (same comment as for Acetaldehyde)
- Titanium ion [air, urban air close to ground]: 4.64279e-9 kg; lognormal variance with pedigree 0.6988, pedigree (2,5,2,1,4)
  (same comment as for Acetaldehyde)
- Toluene [air, urban air close to ground]: 1.99261e-7 kg; lognormal variance with pedigree 0.1388, pedigree (2,5,2,1,4)
  (same comment as for Acetaldehyde)
- Uranium [air, urban air close to ground]: 7.44228e-11 kg; lognormal variance with pedigree 0.6988, pedigree (2,5,2,1,4)
  (same comment as for Acetaldehyde)
- Uranium-238 [air, urban air close to ground]: 2.09391e-7 kBq; lognormal variance with pedigree 0.6988, pedigree (2,5,2,1,4)
  (same comment as for Acetaldehyde)
- Vanadium V [air, urban air close to ground]: 7.38473e-8 kg; lognormal variance with pedigree 0.6988, pedigree (2,5,2,1,4)
  (same comment as for Acetaldehyde)
- Water [air, unspecified]: 0.0003908 m3; lognormal variance with pedigree 0.0428, pedigree (3,3,2,1,1)
  Calculated value. Represents evaporated water from the combustion process of wood. It is assumed that all hydrogen contained in the wood evaporates as water. The H content of wood is assumed to be 6 %.
- Xylenes, unspecified [air, urban air close to ground]: 4.30029e-8 kg; lognormal variance with pedigree 0.0888, pedigree (2,5,2,1,4)
  (same comment as for Acetaldehyde)
- Zinc II [air, urban air close to ground]: 6.08657e-8 kg; lognormal variance with pedigree 0.6988, pedigree (2,5,2,1,4)
  (same comment as for Acetaldehyde)
- m-Xylene [air, urban air close to ground]: 2.25186e-8 kg; lognormal variance with pedigree 0.1388, pedigree (2,5,2,1,4)
  (same comment as for Acetaldehyde)
- AOX, Adsorbable Organic Halides [water, surface water]: 5.07975e-5 kg; lognormal variance with pedigree 0.0403, pedigree (1,2,2,1,1)
  Data provided by industry (EPIS) 2020
- BOD5, Biological Oxygen Demand [water, surface water]: 0.000114839 kg; lognormal variance with pedigree 0.0403, pedigree (1,2,2,1,1)
  Data provided by industry (EPIS) 2020
- COD, Chemical Oxygen Demand [water, surface water]: 0.00553084 kg; lognormal variance with pedigree 0.0403, pedigree (1,2,2,1,1)
  Data provided by industry (EPIS) 2020
- DOC, Dissolved Organic Carbon [water, surface water]: 0.00198933 kg; lognormal variance with pedigree 0.0403, pedigree (1,2,2,1,1)
  Data provided by industry (EPIS) 2020
- Nitrogen [water, surface water]: 5.95548e-5 kg; lognormal variance with pedigree 0.0403, pedigree (1,2,2,1,1)
  Data provided by industry (EPIS) 2020
- Phosphorus [water, surface water]: 3.85198e-6 kg; lognormal variance with pedigree 0.0403, pedigree (1,2,2,1,1)
  Data provided by industry (EPIS) 2020
- Suspended solids, unspecified [water, surface water]: 0.000258835 kg; lognormal variance with pedigree 0.0414, pedigree (2,3,2,1,1)
  assumed to be equal to TOC
- TOC, Total Organic Carbon [water, surface water]: 0.00198933 kg; lognormal variance with pedigree 0.0403, pedigree (1,2,2,1,1)
  Data provided by industry (EPIS) 2020
- Water [water, unspecified]: 0.0441149 m3; lognormal variance with pedigree 0.0403, pedigree (1,2,2,1,1)
  Data provided by industry (EPIS) 2020. Represents cooling water ( 46.99 m3/t) and process water (32.28 m3/t), and the difference between reported water in and output (0.423 m3/t).

## Sampling procedure
Weighted average of about 7 mills providing 100 % of the European capacity of bleached kraft pulp from hardwood.

## Extrapolations
Industry data provided key emission factors for CO2 (biogenic), CO, SOx (as SO2), NOx, TRS (as S), SO2 (reported as S), and Dust (unspecified). Additional air emissions resulting from on-site energy production, i.e. the combustion of fuels, were calculated based on industrial heating datasets from the ecoinvent database. The following combustion processes were used: Biofuel - Biogas: heat production, natural gas, at industrial furnace >100kW, Europe without Switzerland; Peat: heat production, lignite briquette, at stove 5-15kW; Hard coal: heat production, at hard coal industrial furnace 1-10MW, Europe without Switzerland; Heavy fuel oil: heat production, heavy fuel oil, at industrial furnace 1MW, Europe without Switzerland; Light fuel oil: heat production, light fuel oil, at industrial furnace 1MW, Europe without Switzerland; Methanol: heat production, natural gas, at industrial furnace >100kW, Europe without Switzerland; Natural gas: heat production, natural gas, at industrial furnace >100kW, Europe without Switzerland; Biofuel - Bark : heat production, wood chips from industry, at furnace 1000kW, CH; Biofuel - Biomass: heat production, wood chips from industry, at furnace 1000kW, CH; CO2, CO and CH4 emissions from biogas and methanol were modelled as non-fossil.
