# chromium production

Dataset: EcoSpold 2, unit process
Geography: RER
Time period: 1994-01-01 to 2023-12-31
Technology level: current
Classification: ISIC rev.4 ecoinvent: 2420:Manufacture of basic precious and other non-ferrous metals
Classification: EcoSpold01Categories: metals/extraction
Synonyms: chrome
Tags: ConvertedDataset
Scenario: Business-as-Usual
System model: Allocation, cut-off by classification
Share of production covered: 100 %
Generated by: [System]
Published in: Althaus H.-J. 2000
Database: ecoinvent
isCopyrightProtected: true
accessRestrictedTo: 1

## General comment
The module describes the chromium metal consumed Europe in 1994. It is designed solely for the use of the metal as alloying element in super-alloys (Ni-Cr). Usually stainless steels are made from ferrochrome and not from chromium metal. Chromium is considered to be made by aluminothermic process (75%) and electrolysis (25%). This module does not consider secondary sources of chromium. The general date quality is not satisfying, due to a lack of information.
[This dataset was already contained in the ecoinvent database version 2. It was not individually updated during the transfer to ecoinvent version 3. Life Cycle Impact Assessment results may still have changed, as they are affected by changes in the supply chain, i.e. in other datasets. This dataset was generated following the ecoinvent quality guidelines for version 2. It may have been subject to central changes described in the ecoinvent version 3 change report (http://www.ecoinvent.org/database/ecoinvent-version-3/reports-of-changes/), and the results of the central updates were reviewed extensively. The changes added e.g. consistent water flows and other information throughout the database. The documentation of this dataset can be found in the ecoinvent reports of version 2, which are still available via the ecoinvent website. The change report linked above covers all central changes that were made during the conversion process.]
[Dataset to be replaced by 'chromium production, RU, 2005 - 2017']

## Included activities start
From transport of raw materials to the factory.

## Included activities end
This activity ends with a mix of aluminothermy and electrolysis of Cr2O3.

The dataset includes the production of Cr2O3 as intermediary product.

This dataset does not include the use of hydrogen and ammonia for reduction and leaching in the electrolytic process, nor the consumption of calcium fluoride and emissions of hydrogen fluoride in the aluminothermic process, nor the overall emissions from the production process, nor the secondary production of chromium.

## Geography
World-wide production mix is chosen as proxy for the consumption mix in Europe.

## Technology
Metallic chromium is produced by aluminothermic process (75%) and electroylsis of dissolved ferrochromium (25%)
ALUMINOTHERMIC PROCESS
The thermic process uses aluminium as a reducing agent for chromium hydroxide. The charge is weighed and loaded into a bin, which is taken to an enclosed room to mix the contents. The firing pot is prepared by ramming refractory sand mixed with water around a central former. After ramming the firing pot, the inner surface is coated with a weak binder solution and dried under a gas fired hood before being transferred to the firing station. The raw material mix is automatically fed at a controlled rate into the firing pot, where the exothermic reaction takes place. When the metal has solidified following the reaction, the firing pot is removed and transferred by crane to a cooling conveyor. On removal from the cooling conveyor (by crane), the firing pot is placed on a stripping bogie for transferral to a stripping booth. Inside the closed booth, the pot casing is hoisted off the solidified metal/slag. The slag is separated from the Chromium metal “button” and sent to a despatch storage area. Water is used to reduce button temperature to below 100 ºC. After cooling the metal button is transferred to other departments on site for cleaning, breaking, crushing and grinding to achieve the desired product size.
ELECTROLYTIC PROCESS
In the electrolytic process normally high carbon ferrochrome is used as the feed material which is then converted into chromium alum by dissolution with sulphuric acid at temperatures at about 200 ºC. After several process steps using crystallisation filtration ageing, a second filtration and a clarifying operation the alum becomes the electrolyte for a diaphragm cell. Chromium is plated onto stainless steel cathodes until it attains a thickness of ca. 3 mm. The process is very sensitive. The additional de-gassing (heating at 420 °C) stage is necessary because the carbon content of the electrolytic chromium is sometimes too high for further industrial applications. The cooled chromium metal is fragmented with a breaker prior to crushing and drumming. The generated slag can be reused as refractory lining or sold as abrasive or refractory material.
Overall emissions and waste: Emissions to air consist of dust and fume emissions from smelting, hard metal and carbide production; other emissions to air are ammonia (NH3), acid fume (HCl), hydrogen fluoride (HF), VOC’s and heavy metals. Emissions to water are overflow water from wet scrubbing systems, wastewater from slag and metal granulation, and blow down from cooling water cycles. Solid waste is composed of dust, fume and sludge, and slag.
References:
IPPC (2001) Integrated Pollution Prevention and Control (IPPC); Reference Document on Best Available Techniques in the Non Ferrous Metals Industries. European Commission. Retrieved from http://www.jrc.es/pub/english.cgi/ 0/733169

## Reference product
- chromium: 1 kg; By-product classification allocatable product; CPC 41603: Bismuth, antimony, manganese, chromium and articles thereof; including waste and scrap of bismuth or manganese; HS2017 8106: Bismuth; articles thereof, including waste and scrap; CAS 7440-47-3
  EcoSpold01Location=RER
  At room temperature Chromium is resistant to ordinary corrosive agents, which explains its use as an electroplated, protective coating. It dissolves in non-oxidising mineral acids, such as hydrochloric and sulphuric acids, but not in cold aqua regia or nitric acid, which passivate the metal. At elevated temperature it reacts with halogens, silicon, boron, nitrogen, oxygen, and carbon. Chromium and chromium-rich alloys are brittle at room temperature (Downing et al. (1997)).
  Uses: Pure chromium metal, produced by electrolytic or aluminothermic processes, is used for alloying non-ferrous engineering materials. Chromium metal is a major source of chromium for non-ferrous alloys that exclude iron, such as certain superalloys. The most common materials are nickel-based and cobalt-based alloys, most of which are used as high temperature alloys (Downing et al. (1997)).
  The aerospace industry is the major source of demand for chromium metal in the form of superalloys, which are manufactured and consumed mostly in North America and Europe.
  Besides aerospace industry, the major end use industries are gas turbine, and petrochemical (USGS (2003)).
  Estimation from dataset author.
  production volume 1.32237 kg
    This is a placeholder value that does not reflect real-world production volumes. This dataset does not currently require a real-world production volume to work in the database framework, and no actual data were collected yet. This has no negative effect on the results of the ecoinvent database. The placeholder value of this activity was scaled according to the nominal GDP of 2005 (source: United Nations, http://data.un.org/Glossary.aspx?q=GDP+%28current+US%24%29, accessed 20130726) to reflect an appropriate share of the global production volume, which is also a placeholder value.
  property price 1.243 EUR2005
    Literature value (USGS, http://minerals.usgs.gov/minerals/pubs/commodity/chromium/myb1-2012-chrom.pdf, accessed 20160222).
  properties: carbon allocation 0 kg, carbon content 0, carbon content, fossil 0, carbon content, non-fossil 0, dry mass 1 kg, water content 0, water in wet mass 0 kg, wet mass 1 kg

## Inputs from technosphere
- aluminium, wrought alloy: 0.498 kg; lognormal variance with pedigree 0.1301, pedigree (5,2,5,1,1)
  EcoSpold01Location=RER
  Modelled, based on “ISIC 2420” - pdf-document on the dedicated talk page of ecoinvent (www.ecoinvent.org/documentation).
  See part Regarding “chromium production, RER 2003” dataset.
  Further references:
  Hall F. W. (1997) Nickel. In: Ullmann's encyclopedia of industrial chemistry (ed. Processes A.). 5th edition on CD-ROM Edition. Wiley & Sons, London.
  Adelhardt W. and Antrekowitsch H. (1998) Stoffmengenflüsse und Energiebedarf bei der Gewinnung ausgewählter mineralischer Rohstoffe; Teilstudie Chrom. In: Geologisches Jahrbuch, Vol. Sonderhefte SH 3. Bundesanstalt für Geowissenschaften und Rohstoffe, Hannover. ISBN 3-510-95831-4.
  Uncertainty: estimate based on assumptions
  properties: dry mass 1 kg, wet mass 1 kg
- chromite ore concentrate: 2.53 kg; lognormal variance with pedigree 0.1301, pedigree (5,2,5,1,1)
  EcoSpold01Location=GLO
  Modelled, based on “ISIC 2420” - pdf-document on the dedicated talk page of ecoinvent (www.ecoinvent.org/documentation).
  See part Regarding “chromium production, RER 2003” dataset.
  Further references:
  Hall F. W. (1997) Nickel. In: Ullmann's encyclopedia of industrial chemistry (ed. Processes A.). 5th edition on CD-ROM Edition. Wiley & Sons, London.
  Adelhardt W. and Antrekowitsch H. (1998) Stoffmengenflüsse und Energiebedarf bei der Gewinnung ausgewählter mineralischer Rohstoffe; Teilstudie Chrom. In: Geologisches Jahrbuch, Vol. Sonderhefte SH 3. Bundesanstalt für Geowissenschaften und Rohstoffe, Hannover. ISBN 3-510-95831-4.
  Uncertainty: estimate based on assumptions
  properties: dry mass 1 kg, wet mass 1 kg
- electricity, high voltage: 22.6 kWh; lognormal variance with pedigree 0.0541, pedigree (3,2,5,5,1)
  Modelled, based on “ISIC 2420” - pdf-document on the dedicated talk page of ecoinvent (www.ecoinvent.org/documentation).
  See part Regarding “chromium production, RER 2003” dataset.
- electricity, medium voltage: 20.8 kWh; source Adelhardt W. 1998; lognormal variance with pedigree 0.0521, pedigree (3,2,5,1,1)
  EcoSpold01Location=UCTE
  Calculated value: The total medium voltage electricity consumption equals the consumption of the aluminothermic and electrolytic steps. The individual consumption of each of these is Modelled, based on ISIC 2420” - pdf-document on the dedicated talk page of ecoinvent (www.ecoinvent.org/documentation). (See part Regarding “chromium production, RER 2003” dataset).
  Further references:
  Papp J. F. (1994) Chromium Life Cycle Study. IC-9411. U.S. Department of the Interior, U.S. Geological Survey, Online-Version under: http://pubs.usgs.gov/ usbmic/ic-9411/ic-9411.pdf <http://pubs.usgs.gov/usbmic/ic-9411/ic-9411.pdf>.
- ferrochromium, high-carbon, 68% Cr: 0.25 kg; source Adelhardt W. 1998; lognormal variance with pedigree 0.0407, pedigree (2,2,5,1,1)
  Literature value.
  EcoSpold01Location=GLO
  properties: carbon content, fossil 0.07, dry mass 1 kg, heating value, net 2.12 MJ, wet mass 1 kg
  note on carbon content, fossil: Ferrochromium is a master alloy of iron and chromium, containing 45 – 95 % Cr and various amounts of iron, carbon, and other elements. High-carbon ferrochromium (HC ferrochromium) contains 4 – 10 % C (ecoinvent v2.2 report 20_part VI). An average content of 7% C was considered
- heat, district or industrial, natural gas: 97.85 MJ; source Adelhardt W. 1998; lognormal variance with pedigree 0.0407, pedigree (2,2,5,1,1)
  Modelled, based on “ISIC 2420” - pdf-document on the dedicated talk page of ecoinvent (www.ecoinvent.org/documentation).
  See part Regarding “chromium production, RER 2003” dataset.
  EcoSpold01Location=RER
- non-ferrous metal smelter: 1.08e-11 unit; lognormal variance with pedigree 0.428, pedigree (5,5,5,1,1)
  Proxy: "non-ferrous metal smelter" is used as a proxy for unspecified infrastructure for aluminothermy and electrolysis.
  Estimation from dataset author: All mas input (2.84 kg) is accounted for.
  EcoSpold01Location=GLO
  Uncertainty: rough estimate
- sodium dichromate: 0.366 kg; lognormal variance with pedigree 0.1301, pedigree (5,2,5,1,1)
  Modelled, based on “ISIC 2420” - pdf-document on the dedicated talk page of ecoinvent (www.ecoinvent.org/documentation).
  See part Regarding “chromium production, RER 2003” dataset.
  Further references:
  Hall F. W. (1997) Nickel. In: Ullmann's encyclopedia of industrial chemistry (ed. Processes A.). 5th edition on CD-ROM Edition. Wiley & Sons, London.
  Adelhardt W. and Antrekowitsch H. (1998) Stoffmengenflüsse und Energiebedarf bei der Gewinnung ausgewählter mineralischer Rohstoffe; Teilstudie Chrom. In: Geologisches Jahrbuch, Vol. Sonderhefte SH 3. Bundesanstalt für Geowissenschaften und Rohstoffe, Hannover. ISBN 3-510-95831-4.
  EcoSpold01Location=RER
  Uncertainty: estimate based on assumptions
  properties: dry mass 1 kg, wet mass 1 kg

## Sampling procedure
literature

## Extrapolations
see Geography and Technology

## Review by Roland Hischier 2003-07-03
Passed.

## Review by Roland Hischier 2011-09-19
Transfer of documentation done.

## Review by Bo Weidema 2012-10-01
replaced input of "electricity, high voltage, hydro, run-of-river" with "electricity, high voltage" with a direct activity link to "electricity production, high voltage, hydro, run-of-river".
