# cyclohexanone production

Dataset: EcoSpold 2, unit process
Geography: RoW
Time period: 1991-01-01 to 2023-12-31
Technology level: current
Classification: ISIC rev.4 ecoinvent: 2011:Manufacture of basic chemicals
Synonyms: Sextone; Nadone; Ketohexamethylene; 108-94-1; Pimelic ketone
Scenario: Business-as-Usual
System model: Allocation, cut-off by classification
Share of production covered: 100 %
Generated by: Jürgen Sutter
Published in: Sutter, J. 2007
Database: ecoinvent
isCopyrightProtected: true
accessRestrictedTo: 1

## General comment
This dataset represents the production of 1 kg of cyclohexanone via the boric acid modified oxidation of cyclohexane. Cyclohexanone is a colorless to pale yellow liquid having an odor similar to that of acetone. It is very soluble in most organic solvents.
Over 97 % of all cyclohexanone produced is oxidized to adipic acid or converted to cyclohexanone oxime, which is then rearranged with sulfuric acid to caprolactam. Other uses for cyclohexanone include the use as a thinner or solvent for synthetic resins, polymers, and lacquers. It is also used as a starting material in the synthesis of many insecticides, herbicides, and pharmaceuticals, as well as being a good solvent for many insecticides.
The raw materials, auxiliaries and energy consumptions are modelled with data from literature sources. The emissions are estimated and the water exchanges are approximated based on data from a large chemical factory (Gendorf 2016).
References:
Sutter, J. (2007) Life Cycle Inventories of Petrochemical Solvents. ecoinvent report No. 22. Swiss Centre for Life Cycle Inventories, Dübendorf, 2007.
Gendorf (2016) Umwelterklärung 2015, Werk Gendorf Industriepark, www.gendorf.de.

## Included activities start
From the reception of cyclohexane at the factory gate.

## Included activities end
This activity ends with 1 kg of cyclohexanone at the factory gate. The dataset includes the consumption of raw materials, the energy uses, infrastructure use and emissions.

## Geography
The inventory is modelled for Europe but is assumed to be representative of the global production. Some values are based on data from a large chemical factory located in Germany. These are assumed to be valid for this geography.

## Technology
This dataset models the production of cyclohexanone by the boric acid modified oxidation of cyclohexane.
In this process, anhydrous metaboric acid is added as a slurry to the first of several staged air oxidation vessels. The cyclohexyl hydroperoxide formed is trapped as the cyclohexyl perborate ester. The perborate ester then reacts with additional cyclohexane in the air oxidizer to yield the borate ester and additional cyclohexanol. This borate ester is relatively stable in the air oxidizer and is protected from over oxidation to ring-opened products. The ester is subsequently hydrolyzed to cyclohexanol and boric acid. The boric acid is dehydrated to metaboric acid and is recycled to the air oxidizer.
a) Air oxidizers; b) Ester hydrolysis vessel; c) Decanter; d) Extraction column; e) Cyclohexane recovery column; f) Refining column; g) Stripping column; h) Vaccuum crystallizer; i) Boric acid centrifuge; j) Boric acid slurry tank; k) Dehydrator
Both cyclohexanol and cyclohexanone are produced on a large commercial scale. The vast majority of these compounds and their mixtures is consumed in the production of caprolactam and adipic acid, intermediates in the manufacture of nylon 6 and nylon 66. 95 % of the cyclohexanone worldwide is produced by the oxidation of cyclohexane (Wells 1991).
References:
Musser, M. T.:Cyclohexanol and cyclohexanonepter 10. In: Ullmann's Encyclopedia of Industrial Chemistry, Seventh Edition, 2004 Electronic Release (ed. Fiedler E., Grossmann G., Kersebohm D., Weiss G. and Witte C.). 7 th Electronic Release Edition. Wiley InterScience, New York, Online-Version under: http://www.mrw.interscience.wiley.com/ueic/articles/a08_217/frame.html
Wells, G. Margaret (1991) Handbook of petrochemicals and processes. Aldershot, Hampshire.

## Time period
Time of publications. Some values are based on data published by the Gendorf factory that were collected between 2011 and 2015. The time period has been adjusted accordingly. For more details, see the comments of the exchanges.

## Reference product
- cyclohexanone: 1 kg; name RP; By-product classification allocatable product; CPC 34170: Ethers, alcohol peroxides, ether peroxides, epoxides, acetals and hemiacetals, and their halogenated, sulphona[…]; HS2017 291422: Ketones; cyclanic, cyclenic or cycloterpenic, without other oxygen function, cyclohexanone and methylcycloh[...]; CAS 108-94-1
  Cyclohexanone is a colorless to pale yellow liquid having an odor similar to that of acetone.
  Over 97 % of all cyclohexanone produced is oxidized to adipic acid or converted to cyclohexanone oxime, which is then rearranged with sulfuric acid to caprolactam. Other uses for cyclohexanone include thinner or solvent for synthetic resins, polymers, and lacquers. It is also used as a starting material in the synthesis of many insecticides, herbicides, and pharmaceuticals, as well as being a good solvent for many insecticides.
  production volume 2.87201e10 kg; name RP_PV
    Estimated value. The global production volume is extrapolated from the European production volume based on reports from Cefic (European Chemical Industry Council), and the American Chemistry Council.
    According to Cefic (2016a) the global sales of chemicals in the year 2015 was 3 534 billion euros. The reported share of sales per region are: EU28 14.7%; Other Europe (Switzerland, Norway, Turkey, Russia and Ukraine) 2.7%; NAFTA (US, Canada and Mexico) 16.5%; Latin America 3.8%; China 39.9%; Japan 3.9%; Republic of Korea 3.2%; India 2.2%; Rest of Asia 11.9%; Rest of the World 1.3%. Cefic also reports the US total sales, which amount to 518.7 billion euros out of the global 3 534 billion euros (14.7%). The same share is reported by the American Chemistry Council (2016), according to which the USA sales account for 15% of global sales for the year 2016.
    European production volume:
    Estimated value. According to the European Chemical Agency, the consumption of Cyclohexanone for the year of 2016 is estimated to be 5500000000 kg. The aforementioned value is the average of the range given in the literature. According to the European Chemical Industry Council (Cefic, 2016a), the total sales of chemicals of the European Union in 2016 amounted to 519 billion euros. Chemical imports were valued at 91 billion euros for the first 11 months of 2016. Based on this, the value for the total imports for the year 2016 was extrapolated, yielding a value of 99.3 billion euros. Furthermore, Cefic (2016b) reports a trade surplus (exports-imports) of 46.4 billion euros (once again extrapolated for the whole year using the value of 42 billion euros for the first 11 months of 2016). Considering all the aforementioned information, the total chemical consumption in the EU is calculated to be 472.6 billion euros (total sales-exports+imports). It is therefore calculated that production is 110% of consumption. This value is used to scale the information on chemical consumption to production. The European production volume is therefore 6050000000 kg. Since no data were found for the global production this value was scaled accordingly.
    References:
    American Chemistry Council 2016. Outlook: U.S. Chemical Industry Continues to Outpace Industrial Output; Accounts for More Than One-Half of Construction Spending by Manufacturing Sector. Accessible at: https://www.americanchemistry.com/Media/PressReleasesTranscripts/ACC-news-releases/US-Chemical-Industry-Continues-to-Outpace-Industrial-Output.html
    European Chemical Agency, Brief profile of Cyclohexanone, Accessible at: https://echa.europa.eu/brief-profile/-/briefprofile/100.003.302
    Cefic 2016a. Facts and figures 2016 of the European chemical industry. Accessible at: http://www.cefic.org/Facts-and-Figures/Chemicals-Industry-Profile/
    Cefic 2016b. 2016: EU chemicals output posts positive growth for third year running. Accessible at: http://www.cefic.org/Documents/RESOURCES/Chemical%20Trends%20Report/March-2017-Cefic-Chemicals-Trends-Report.pdf
  property heating value, net 34.6 MJ
    LHV is calculated based on the elemental composition of the substance. Based on the CAS number of the substance (000108-94-1), the chemical formula of the substance is found to be: C6H10O, (PubChem 2020).
    Reference: Kim, S., Chen, J., Cheng, T., Gindulyte, A., He, J., He, S., Li, Q., Shoemaker, B. A., Thiessen, P. A., Yu, B., Zaslavsky, L., Zhang, J., & Bolton, E. E. (2019). PubChem 2019 update: improved access to chemical data. Nucleic acids research, 47(D1), D1102–D1109. https://doi.org/10.1093/nar/gky1033
  property price 1.08 EUR2005
    Calculated value based on data from United Nations Commodity Trade Statistics Database (comtrade.un.org). UN comtrade category: 291422 Cyclohexanone and methylcyclohexanones. Year 2005. Using exchange rate of 1EURO = 1.209 USD. Average of price of import into 5 main markets (EU, US, JP, IN and CN).
  properties: carbon allocation 0.734694 kg, carbon content 0.734694, carbon content, fossil 0.734694, carbon content, non-fossil 0, dry mass 1 kg, water content 0, water in wet mass 0 kg, wet mass 1 kg

## Inputs from technosphere
- boric acid, anhydrous, powder: 0.005 kg; source Wells, M. 1991; lognormal variance with pedigree 0.0726, pedigree (1,3,5,5,1)
  Literature value.
  Uncertainty: W
  properties: dry mass 1 kg, wet mass 1 kg
- chemical factory, organics: 4e-10 unit; lognormal variance with pedigree 0.31, pedigree (2,3,2,4,3)
  Calculated based on literature data published by the industry. For this activity, no information was readily available concerning infrastructure and land-use. Therefore, the infrastructure is estimated based on data from two chemical factories, the BASF site of Ludwigshafen and the chemical factory in Gendorf (which are both located in Germany), which produce a wide range of chemical substances. Based on this data, the following assumptions are made: the built area amounts to about 4.2 ha, the plant has an average output of 50'000 t/a and a lifespan of fifty years. The estimated infrastructure amount is therefore 4.00 E-10 units per kg of produced chemical.
  References:
  Althaus H.-J., Chudacoff M., Hischier R., Jungbluth N., Osses M. and Primas A. (2007) Life Cycle Inventories of Chemicals. ecoinvent report No. 8, v2.0. EMPA Dübendorf, Swiss Centre for Life Cycle Inventories, Dübendorf, CH.
  Gendorf (2000) Umwelterklärung 2000, Werk Gendorf. Werk Gendorf, Burgkirchen.
- cyclohexane: 0.925 kg; source Wells, M. 1991; lognormal variance with pedigree 0.0726, pedigree (1,3,5,5,1)
  Literature value.
  Uncertainty: W
  properties: carbon content, fossil 0.857143, dry mass 1 kg, heating value, net 43.22 MJ, wet mass 1 kg
- electricity, medium voltage: 0.0113, 0.225409, 0.0757366, 0.00346043, 0.000692602, 0.000148717, 0.0232769 kWh (7 suppliers, which the file names only by identifier); sum of these 0.340024 kWh; source United States Department of Energy 2001; lognormal variance with pedigree 0.0028, pedigree (1,3,2,5,1)
  Estimation.
  Uncertainty: D
- heat, district or industrial, natural gas: 0.249423, 15.1786 MJ (2 suppliers, which the file names only by identifier); sum of these 15.428 MJ; source United States Department of Energy 2001; lognormal variance with pedigree 0.0028, pedigree (1,3,2,5,1)
  Estimation.
  Uncertainty: D
  properties: heating value, net 1 MJ
- heat, district or industrial, other than natural gas: 8.62341, 0.00399507 MJ (2 suppliers, which the file names only by identifier); sum of these 8.62741 MJ; source United States Department of Energy 2001; lognormal variance with pedigree 0.0028, pedigree (1,3,2,5,1)
  Estimation.
  Uncertainty: D
  properties: heating value, net 1 MJ
- sodium hydroxide, without water, in 50% solution state: 0.033 kg; source Wells, M. 1991; lognormal variance with pedigree 0.0726, pedigree (1,3,5,5,1)
  Literature value.
  Uncertainty: W
  properties: dry mass 1 kg, heating value, net 3.03 MJ, wet mass 1 kg
- tap water: 5.28156e-5, 8.05128e-5, 0.000150233, 0.000404717, 4.8717e-5, 0.00203022, 0.0232328 kg (7 suppliers, which the file names only by identifier); sum of these 0.026 kg; lognormal variance with pedigree 0.0106, pedigree (2,3,2,4,3)
  Calculated based on literature data published by the industry. This value is a 5-year average of data (2011 - 2015) published by the Gendorf factory (Gendorf, 2016, Umwelterklärung, www.gendorf.de), (Gendorf, 2015, Umwelterklärung, www.gendorf.de), (Gendorf, 2014, Umwelterklärung, www.gendorf.de). The amount of tap water per kg of chemical substance produced is calculated using literature data published by the Gendorf factory based in Germany, which produces a wide range of chemical substances. The factory produced 1657400 tonnes of chemical substances in the year 2015 (Gendorf, 2016, Umwelterklärung, www.gendorf.de) and 740000 tonnes of intermediate products. The amount of tap water consumed in the year 2015 was 55100 tonnes (Gendorf, 2016, Umwelterklärung, www.gendorf.de). The resulting amount of tap water is 0.023 kg/kg of chemical product produced. The 5-year average (2011 - 2015, weighted by production volume) is 0.026 kg/kg.
  properties: carbon content, fossil 0.00178991, dry mass 0.000337476 kg, water content 2962.17, wet mass 1 kg
  note on carbon content, fossil: Bicarbonate content is 2.93 mol/m3. CO2 content is 0.1 mol/m3 (ecoinvent v2.2 report 8, Tab 93.1).
- wastewater, average: -2.26904e-6, -8.07865e-9 m3 (2 suppliers, which the file names only by identifier); sum of these -2.27712e-6 m3; lognormal variance with pedigree 0.0452, pedigree (2,4,1,5,4)
  Calculated based on literature data published by the GENDORF Chemical Park. The factory produced an average of 2462760 tonnes of chemical substances (including intermediates) per year in the years 2015-2019. The average ouput of wastewater going to an external wastewater treatment plant in the years 2015-2019 was 5608 m3 per year. This equals 0.000002277 m3/kg chemical produced.
  References:
  Chemiepark GENDORF, Umwelterklärung 2016, https://www.gendorf.de/Nachbarn/Umweltschutz/Industrie%20und%20Nachhaltigkeit
  Chemiepark GENDORF, Umwelterklärung 2017, https://www.gendorf.de/Nachbarn/Umweltschutz/Industrie%20und%20Nachhaltigkeit
  Chemiepark GENDORF, Umwelterklärung 2020, https://www.gendorf.de/Nachbarn/Umweltschutz/Industrie%20und%20Nachhaltigkeit
  production volume; = RP_PV*BP_wastewater_average/ABS(RP)
    Calculated from the production volume of cyclohexanone in proportion to the respective output amounts.
  properties: carbon content, non-fossil 0.194039, dry mass 0.346837 kg, water content 2882.2, wet mass 1000 kg
  note on carbon content, non-fossil: 0.0673 kg TOC/m3 (Tab A.17, ecoinvent v2.2 report 13_I). TOC was considered as Total Carbon.
- zinc: 0.00060185 kg; source Wells, M. 1991; lognormal variance with pedigree 0.0726, pedigree (1,3,5,5,1)
  Literature value.
  Uncertainty: W
  properties: dry mass 1 kg, wet mass 1 kg

## Inputs from nature
- Water, cooling, unspecified natural origin [natural resource, in water]: 0.014707 m3; lognormal variance with pedigree 0.0454, pedigree (2,4,2,5,4)
  Calculated based on literature data published by the GENDORF Chemical Park. The factory produced an average of 2462760 tonnes of chemical substances (including intermediates) per year in the years 2015-2019. The average amount of cooling water released in the years 2015-2019 was 34408800 t per year. It was assumed that 5% of the cooling water was emitted to air during its use, therefore, to calculate the input of cooling water, the output value reported by GENDORF was scaled up by the factor 1/0.95. This equals 0.014707 m3/kg chemical produced.
  References:
  Chemiepark GENDORF, Umwelterklärung 2016, https://www.gendorf.de/Nachbarn/Umweltschutz/Industrie%20und%20Nachhaltigkeit
  Chemiepark GENDORF, Umwelterklärung 2017, https://www.gendorf.de/Nachbarn/Umweltschutz/Industrie%20und%20Nachhaltigkeit
  Chemiepark GENDORF, Umwelterklärung 2020, https://www.gendorf.de/Nachbarn/Umweltschutz/Industrie%20und%20Nachhaltigkeit
- Water, river [natural resource, in water]: 0.000965426 m3; lognormal variance with pedigree 0.0454, pedigree (2,4,2,5,4)
  Calculated based on literature data published by the GENDORF Chemical Park. The factory produced an average of 2462760 tonnes of chemical substances (including intermediates) per year in the years 2015-2019. The average consumption of river water in the years 2015-2019 was 22000820 t per year. However, since the cooling water is modelled as an input, the amount of river water was adjusted to avoid double counting. 55% of the input amount of cooling water was deducted from the amount of river water, as that is the share of river water versus well water. This equals 0.00096543 m3/kg chemical produced.
  References:
  Chemiepark GENDORF, Umwelterklärung 2016, https://www.gendorf.de/Nachbarn/Umweltschutz/Industrie%20und%20Nachhaltigkeit
  Chemiepark GENDORF, Umwelterklärung 2017, https://www.gendorf.de/Nachbarn/Umweltschutz/Industrie%20und%20Nachhaltigkeit
  Chemiepark GENDORF, Umwelterklärung 2020, https://www.gendorf.de/Nachbarn/Umweltschutz/Industrie%20und%20Nachhaltigkeit
- Water, well, in ground [natural resource, in water]: 0.000816522 m3; lognormal variance with pedigree 0.0454, pedigree (2,4,2,5,4)
  Calculated based on literature data published by the GENDORF Chemical Park. The factory produced an average of 2462760 tonnes of chemical substances (including intermediates) per year in the years 2015-2019. The average consumption of well water in the years 2015-2019 was 18607480 t per year. However, since the cooling water is modelled as an input, the amount of well water was adjusted to avoid double counting. 45% of the input amount of cooling water was deducted from the amount of well water, as that is the share of well water versus river water. This equals 0.00081652 m3/kg chemical produced.
  References:
  Chemiepark GENDORF, Umwelterklärung 2016, https://www.gendorf.de/Nachbarn/Umweltschutz/Industrie%20und%20Nachhaltigkeit
  Chemiepark GENDORF, Umwelterklärung 2017, https://www.gendorf.de/Nachbarn/Umweltschutz/Industrie%20und%20Nachhaltigkeit
  Chemiepark GENDORF, Umwelterklärung 2020, https://www.gendorf.de/Nachbarn/Umweltschutz/Industrie%20und%20Nachhaltigkeit

## Emissions to nature
- Carbon dioxide, fossil [air, urban air close to ground]: 0.020931 kg; lognormal variance with pedigree 0.1786, pedigree (4,5,5,5,5)
  Estimation. Air emissions occurring from the purge vent, the distillation vent and fugitive emission sources were estimated to 0.2% of the raw material input.
  The carbon contained in the removed cyclohexane during wastewater treatment was accounted for as CO2 emissions to air.
  It is assumed that the manufacturing plants are located in an urban/industrial area and consequently the emissions are categorised as emanating in a high population density area.
  Uncertainty: C
- Cyclohexane [air, urban air close to ground]: 0.00185 kg; lognormal variance with pedigree 0.218, pedigree (4,5,5,5,5)
  Estimation. Air emissions occurring from the purge vent, the distillation vent and fugitive emission sources were estimated to 0.2% of the raw material input.
  It is assumed that the manufacturing plants are located in an urban/industrial area and consequently the emissions are categorised as emanating in a high population density area.
  Uncertainty: E
- Water [air, unspecified]: 0.00147008 m3; lognormal variance with pedigree 0.0848, pedigree (2,4,2,5,4)
  Calculated based on literature data published by the GENDORF Chemical Park. The factory produced an average of 2462760 tonnes of chemical substances (including intermediates) per year in the years 2015-2019. To determine the emissions of water to air, the difference of all water inputs (from river, well, tap water and cooling) and outputs (wastewater, emissions to water) was calculated. The average ouput of water to air in the years 2015-2019 was 3620444 m3 per year. This equals 0.00147 m3/kg chemical produced. For more information on the other water exchanges please consult the respective exchange comment.
  References:
  Chemiepark GENDORF, Umwelterklärung 2016, https://www.gendorf.de/Nachbarn/Umweltschutz/Industrie%20und%20Nachhaltigkeit
  Chemiepark GENDORF, Umwelterklärung 2017, https://www.gendorf.de/Nachbarn/Umweltschutz/Industrie%20und%20Nachhaltigkeit
  Chemiepark GENDORF, Umwelterklärung 2020, https://www.gendorf.de/Nachbarn/Umweltschutz/Industrie%20und%20Nachhaltigkeit
  property fraction, origin: fresh water 0; name fraction_origin_fresh_water
  property fraction, origin: salt water 0; name fraction_origin_salt_water
  property fraction, origin: unspecified 1; name fraction_origin_unspecified
- BOD5, Biological Oxygen Demand [water, unspecified]: 0.0243099 kg; lognormal variance with pedigree 0.218, pedigree (4,5,5,5,5)
  Calculated value. The BOD, COD, TOC and BOD5 are calculated based on the amount and type of emissions released to water in the same activity.
- Boron [water, surface water]: 0.0008871 kg; lognormal variance with pedigree 0.798, pedigree (4,5,5,5,5)
  Estimation. It is assumed that the manufacturing plants are located in an urban/industrial area and consequently the emissions are categorised as emanating in a high population density area.
  The emissions into water are assumed to be emitted into rivers.
  Uncertainty: E
- COD, Chemical Oxygen Demand [water, unspecified]: 0.0243099 kg; lognormal variance with pedigree 0.218, pedigree (4,5,5,5,5)
  (same comment as for BOD5, Biological Oxygen Demand)
- Cyclohexane [water, surface water]: 0.0074 kg; lognormal variance with pedigree 0.218, pedigree (4,5,5,5,5)
  Esimated. Water emissions were estimated to 0.8 % of the cyclohexane input.
  It is assumed that the manufacturing plants are located in an urban/industrial area and consequently the emissions are categorised as emanating in a high population density area.
  The emissions into water are assumed to be emitted into rivers.
  Uncertainty: E
- DOC, Dissolved Organic Carbon [water, unspecified]: 0.0063307 kg; lognormal variance with pedigree 0.218, pedigree (4,5,5,5,5)
  (same comment as for BOD5, Biological Oxygen Demand)
- Sodium I [water, surface water]: 0.018975 kg; lognormal variance with pedigree 0.798, pedigree (4,5,5,5,5)
  (same comment as for Boron)
- TOC, Total Organic Carbon [water, unspecified]: 0.0063307 kg; lognormal variance with pedigree 0.218, pedigree (4,5,5,5,5)
  (same comment as for BOD5, Biological Oxygen Demand)
- Water [water, unspecified]: 0.0150391 m3; lognormal variance with pedigree 0.0848, pedigree (2,4,2,5,4)
  Calculated based on literature data published by the GENDORF Chemical Park. The factory produced an average of 2462760 tonnes of chemical substances (including intermediates) per year in the years 2015-2019. The amount of water released back to the environment consists of the sum of the amount of process water treated in the internal WWTP that is then released back to the environment and the amount of cooling water released back to the environment. The average ouput of the internal WWTP in the years 2015-2019 was 2628800 m3 and that of cooling water released back to the environment was 34408800 m3. This gives a yearly average of 37037600 m3 emissions of water to water. This equals 0.01504 m3/kg chemical produced.
  References:
  Chemiepark GENDORF, Umwelterklärung 2016, https://www.gendorf.de/Nachbarn/Umweltschutz/Industrie%20und%20Nachhaltigkeit
  Chemiepark GENDORF, Umwelterklärung 2017, https://www.gendorf.de/Nachbarn/Umweltschutz/Industrie%20und%20Nachhaltigkeit
  Chemiepark GENDORF, Umwelterklärung 2020, https://www.gendorf.de/Nachbarn/Umweltschutz/Industrie%20und%20Nachhaltigkeit
  property carbon content, fossil 0; name C_content_fossil
  property carbon content, non-fossil 0; name C_content_non_fossil
  property dry mass 0 kg; name DM
  property fraction, origin: fresh water 0; name fraction_origin_fresh_water_Ww
  property fraction, origin: salt water 0; name fraction_origin_salt_water_Ww
  property fraction, origin: unspecified 1; name fraction_origin_unspecified_Ww
  property water in wet mass 1000 kg; name WWM
  property wet mass 1000 kg; name WM
- Zinc II [water, surface water]: 0.00060185 kg; lognormal variance with pedigree 0.798, pedigree (4,5,5,5,5)
  Estimation.It is assumed that the manufacturing plants are located in an urban/industrial area and consequently the emissions are categorised as emanating in a high population density area.
  The emissions into water are assumed to be emitted into rivers.
  Uncertainty: E

## Sampling procedure
Literature data Some values are calculated based on data from a large chemical factory located in Germany. For more details, see the comments of the exchanges.

## Extrapolations
This dataset has been copied from an original dataset covering the geography RER. The uncertainty has been adjusted accordingly.

## Review by Emilia Moreno Ruiz 2017-08-08
This dataset was additionally reviewed in a separate review process by Eric Johnson of Atlantic Consulting as well as Emilia Moreno Ruiz and Gregor Wernet of ecoinvent.
