# polyethylene production, high density, granulate, recycled

Dataset: EcoSpold 2, unit process
Geography: Europe without Switzerland
Time period: 2010-01-01 to 2023-12-31
Technology level: current
Classification: ISIC rev.4 ecoinvent: 3830:Materials recovery
Scenario: Business-as-Usual
System model: Allocation, cut-off by classification
Generated by: Thomas Kägi
Published in: Franklin Associates 2011
Database: ecoinvent
isCopyrightProtected: true
accessRestrictedTo: 1

## General comment
The functional unit represents the produciton of 1 kg of polyethylene, high density, granulate, recycled.
Energy demand and auxiliary materials of recycling process was extrapolated from the production of recycled PE granulate in the USA. Data for material losses was derived from the production of recycled PE granulate in Switzerland
The delivered sorted waste polyethylene is further sorted and cleaned in a first step in order to remove any unwanted debris. The plastic then needs to be homogenised, so that only HDPE will be processed. If there are other plastic polymers in the batch, this can ruin the recycled end-product.
HDPE has a lower specific density than PET, meaning that these plastic polymers can be separated by using sink-float separation. However, HDPE has a similar specific density to PP. In this case, Near Infrared Radiation (NIR) techniques can be used, unless the plastic is too dark and absorbs the infrared waves.
HDPE is then shredded and melted down to further refine the polymer. The plastic is then cooled into pellets which can be used in manufacturing.
For further information see Kägi et al. (2017). Life Cycle Inventories for Swiss Recycling Processes - Part Carbotech: Recycling of Cardboard, Glass, PE, PET, Tinplate

## Included activities start
Service is starting with the receipt of bales of sorted waste PE

## Included activities end
This module includes all processes of the production of recycled PE granulate, high density, up to the factory gate. Machinery infrastructure is excluded

## Allocation
no allocation involved

## Reference product
- polyethylene, high density, granulate, recycled: 1 kg; name RP_amount; source Franklin Associates 2011; By-product classification allocatable product; CPC 34710: Polymers of ethylene, in primary forms; HS2017 390120: Ethylene polymers; in primary forms, polyethylene having a specific gravity of 0.94 or more; CAS 9002-88-4
  production volume 2.5e9 kg; name RP_PV
    Assumption: 5 mio tonnes of plastic recycling in Europe, half of it PET; waste input material (for treatment) and by-product/waste generated scaled accordingly
  property price 0.7 EUR2005
    From UN data (http://data.un.org/Data.aspx?q=polyethylene&d=ComTrade&f=_l1Code%3a40%3bcmdCode%3a390120); Polyethylene HDPE has gravity >0.94 from http://www.dynalabcorp.com/technical_info_hd_polyethylene.asp.
  properties: carbon allocation 0.857 kg, carbon content 0.857, carbon content, fossil 0.857, carbon content, non-fossil 0, dry mass 1 kg, heating value, net 42.47 MJ, water content 0, water in wet mass 0 kg, wet mass 1 kg

## Inputs from technosphere
All rows: source Franklin Associates 2011
- chemical, inorganic: 0.00292 kg; lognormal variance with pedigree 0.0586, pedigree (4,5,5,5,1)
  Proxy for cleaning chemicals
  properties: carbon content, fossil 0.003, dry mass 1 kg, wet mass 1 kg
  note on carbon content, fossil: This dataset is an unweighted average of 20 inorganic substances (listed in Tab 88.1, ecoinvent v2.2 report 8, part II), being part of the top100 chemicals included in this database. The C-content has also been calculated as an unweighted average of the C content of the substances composing this dataset.
- electricity, low voltage: 0.489426 kWh; lognormal variance with pedigree 0.0586, pedigree (4,5,5,5,1)
- heat, district or industrial, natural gas: 0.27648 MJ; lognormal variance with pedigree 0.0586, pedigree (4,5,5,5,1)
  properties: heating value, net 1 MJ
- municipal solid waste: -0.07067 kg; name BP_MSW; lognormal variance with pedigree 0.0128, pedigree (3,5,2,5,1)
  production volume; = ABS(BP_MSW/RP_amount*RP_PV)
    (same comment as for polyethylene, high density, granulate, recycled)
  properties: carbon content, fossil 0.171549, carbon content, non-fossil 0.261655, dry mass 0.771 kg, heating value, net 11.74 MJ, water content 0.297017, wet mass 1 kg
  note on carbon content, fossil: MSW composition in tab 4.1, ecoinvent v2.2 report 13_I. C content referred to 1 kg DM
  note on heating value, net: Value taken from the general comment of the treatment dataset.
- propane, burned in building machine: 0.0001024 MJ; lognormal variance with pedigree 0.0586, pedigree (4,5,5,5,1)
  properties: heating value, net 1 MJ
- sodium hydroxide, without water, in 50% solution state: 0.00027 kg; lognormal variance with pedigree 0.0586, pedigree (4,5,5,5,1)
  properties: dry mass 1 kg, heating value, net 3.03 MJ, wet mass 1 kg
- waste polyethylene, for recycling, sorted: 1.0585 kg; lognormal variance with pedigree 0.0586, pedigree (4,5,5,5,1)
  properties: carbon content, fossil 0.829, dry mass 0.994 kg, heating value, net 42.47 MJ, water content 0.00603622, wet mass 1 kg
- waste preparation facility: 2e-9 unit; lognormal variance with pedigree 0.2106, pedigree (5,5,5,5,5)
  properties: lifetime 50 year, lifetime capacity [kg] 5e8 kg
- wastewater, average: -0.000394762 m3; name BP_ww; lognormal variance with pedigree 0.0128, pedigree (3,5,2,5,1)
  production volume; = ABS(BP_ww/RP_amount*RP_PV)
    (same comment as for polyethylene, high density, granulate, recycled)
  properties: carbon content, non-fossil 0.194039, dry mass 0.346837 kg, water content 2882.2, wet mass 1000 kg
  note on carbon content, non-fossil: 0.0673 kg TOC/m3 (Tab A.17, ecoinvent v2.2 report 13_I). TOC was considered as Total Carbon.

## Inputs from nature
- Water, unspecified natural origin [natural resource, in water]: 0.000394762 m3; source Franklin Associates 2011; lognormal variance with pedigree 0.0526, pedigree (3,5,5,5,1)

## Emissions to nature
- Particulate Matter, < 2.5 um [air, unspecified]: 1.5e-5 kg; source Franklin Associates 2011; lognormal variance with pedigree 0.0526, pedigree (3,5,5,5,1)
- Particulate Matter, > 2.5 um and < 10um [air, unspecified]: 2.3e-5 kg; source Franklin Associates 2011; lognormal variance with pedigree 0.0526, pedigree (3,5,5,5,1)

## Sampling procedure
Uncertainty estimation according to the pedigree matrix

## Extrapolations
Energy demand and auxiliary materials of recycling process was extrapolated from PE recycling in the USA. Data for material losses was derived from Switzerland.

## Review by Ivan Muñoz Ortiz 2017-08-10
An offline review in excel has been carried out for all the PE recycling activities, checking mass balances, data sources, etc. Several comments were made to the data provider and improvements have been made to the datasets.
