# fuel cell production, stack polymer electrolyte membrane, 2kW electrical, future

Dataset: EcoSpold 2, unit process
Geography: RoW
Time period: 2000-01-01 to 2023-12-31
Technology level: current
Classification: ISIC rev.4 ecoinvent: 2790:Manufacture of other electrical equipment
Classification: EcoSpold01Categories: natural gas/cogeneration
Synonyms: Membran Brennstoffzelle; PEFC; proton exchange membrane fuel cell; polymer electrolyte fuel cell; Polymer Elektrolyt Membran Brennstoffzelle; PEMFC
Tags: ConvertedDataset
Scenario: Business-as-Usual
System model: Allocation, cut-off by classification
Generated by: Alex Primas
Published in: Primas A. 2007
Database: ecoinvent
isCopyrightProtected: true
accessRestrictedTo: 1

## General comment
The module reflects a polymer electrolyte membrane (PEM) fuel cell stack with 2 kW electrical output. Inventory based on information from literature for future production based on manufacturer data. Life time operation is 6 years or 32'000 h.
[This dataset was already contained in the ecoinvent database version 2. It was not individually updated during the transfer to ecoinvent version 3. Life Cycle Impact Assessment results may still have changed, as they are affected by changes in the supply chain, i.e. in other datasets. This dataset was generated following the ecoinvent quality guidelines for version 2. It may have been subject to central changes described in the ecoinvent version 3 change report (http://www.ecoinvent.org/database/ecoinvent-version-3/reports-of-changes/), and the results of the central updates were reviewed extensively. The changes added e.g. consistent water flows and other information throughout the database. The documentation of this dataset can be found in the ecoinvent reports of version 2, which are still available via the ecoinvent website. The change report linked above covers all central changes that were made during the conversion process.]

## Included activities end
The module includes the most important materials used for production. Also included is the transport of these materials and the energy needed for production.

## Geography
Process applicable in central European conditions.

## Technology
polymer electrolyte membrane (PEM) fuel cell stack for stationary cogeneration. Performance, stack lifetime and catalyst use according to expected future values for serial production. Electrical efficiency 32%, total efficiency 87%.

## Parameters
- fraction, process water, to air: 0.15 dimensionless; name fraction_PW_to_air; lognormal variance with pedigree 0.092025, pedigree (4,4,3,2,4)
  Literature value (Statistics Canada, 2007 & Shaffer, K.H., 2008, Consumptive water use in the Great Lakes Basin, USGS) (Vionnet, S., Quantis Water Database - Technical Report, 2012).
- fraction, water, deionised, to air: 0.15 dimensionless; name fraction_WDI_to_air; = fraction_PW_to_air; lognormal variance with pedigree 0.092025, pedigree (4,4,3,2,4)
  Calculated value. See comment in the other parametres present in this dataset. Deionised water is considered to be always used as process water, thus process water fractions to air are applied to all deionised water input flows to calculate the amount of water consumed in the processes.

## Reference product
- fuel cell, stack polymer electrolyte membrane, 2kW electrical, future: 1 unit; By-product classification allocatable product; CPC 46410: Primary cells and primary batteries; HS2017 8506: Cells and batteries; primary
  EcoSpold01Location=CH
  production volume 3.96633 unit
    This is a placeholder value that does not reflect real-world production volumes. This dataset does not currently require a real-world production volume to work in the database framework, and no actual data were collected yet. This has no negative effect on the results of the ecoinvent database.
  property price 44.3311 EUR2005
    Calculated based on inputs: The price of the product has been calculated as a sum of the values of the material and energy inputs for this product. This value is therefore a rough estimation. It may underestimate the real price since there are additional expenses when producing any product. These expences can include for example labour costs, treatment of waste materials and profit for the producer. Please consider carefully whether this level of data quality is acceptable for your application.
  properties: carbon allocation 0 kg, carbon content 0

## Inputs from technosphere
- activated carbon, granular: 0.0016 kg; lognormal variance with pedigree 0.282, pedigree (4,4,5,5,5)
  Same amount as initial proxy (carbon black) for activated carbon.
  Uncertainty: proxy for activated carbon
  property carbon content, fossil 0.81; name GAC_C_content_fossil
  property carbon content, non-fossil 0; name GAC_C_content_non_fossil
  property dry mass 0.97 kg; name GAC_DM
  property water content 0.030928; name GAC_water_content
  property water in wet mass 0.03 kg; name GAC_WWM
  property wet mass 1 kg; name GAC_WM
  properties: heating value, net 30.23 MJ
  note on carbon content, fossil: Literature value. From Biomass and Bioenergy: Processing and Properties (2014) edited by Khalid Rehman Hakeem, Mohammad Jawaid, Umer Rashid (p. 252). Carbon content is in the range of 72-90%, an average value of 81% is taken.
- aluminium, wrought alloy: 0.6 kg; lognormal variance with pedigree 0.0726, pedigree (2,4,5,5,3)
  EcoSpold01Location=RER
  Value for expected serial production
  Uncertainty: value for expected serial production
  properties: dry mass 1 kg, wet mass 1 kg
- building, hall, steel construction: 0.00044 m2; lognormal variance with pedigree 0.442, pedigree (4,4,5,5,4)
  EcoSpold01Location=CH
  Rough estimation based on company data of similar branch
  Uncertainty: rough estimation based on company data of similar branch
- building, multi-storey: 0.0026 m3; lognormal variance with pedigree 0.442, pedigree (4,4,5,5,4)
  Rough estimation based on company data of similar branch
  EcoSpold01Location=RER
  Uncertainty: rough estimation based on company data of similar branch
- electricity, medium voltage: 0.944154, 18.8338, 6.32809, 0.289132, 0.0578695, 0.0124259, 1.3151, 1.94488, 4.07458 kWh (9 suppliers, which the file names only by identifier); sum of these 33.8 kWh; lognormal variance with pedigree 0.0726, pedigree (2,4,5,5,3)
  Approximation with company data of similar branch
  EcoSpold01Location=UCTE
  Uncertainty: approximation with company data of similar branch
- glass fibre: 0.2 kg; lognormal variance with pedigree 0.0726, pedigree (2,4,5,5,3)
  Value for expected serial production
  EcoSpold01Location=RER
  Uncertainty: value for expected serial production
  properties: dry mass 1 kg, wet mass 1 kg
- graphite: 9 kg; lognormal variance with pedigree 0.074, pedigree (3,4,5,5,3)
  High value for a future serial production
  EcoSpold01Location=RER
  Uncertainty: high value for a future serial production
  properties: carbon content, fossil 1, dry mass 1 kg, heating value, net 30.3 MJ, wet mass 1 kg
- heat, district or industrial, natural gas: 0.529476, 32.2211, 11.8994 MJ (3 suppliers, which the file names only by identifier); sum of these 44.65 MJ; lognormal variance with pedigree 0.0726, pedigree (2,4,5,5,3)
  Approximation with company data of similar branch
  EcoSpold01Location=RER
  Uncertainty: approximation with company data of similar branch
  properties: heating value, net 1 MJ
- isopropanol: 0.019 kg; lognormal variance with pedigree 0.074, pedigree (3,4,5,5,3)
  EcoSpold01Location=RER
  Approximation based on similar process
  Uncertainty: approximation based on similar process
  properties: carbon content, fossil 0.6, dry mass 1 kg, heating value, net 34.3 MJ, wet mass 1 kg
- phenolic resin: 2.2 kg; lognormal variance with pedigree 0.074, pedigree (3,4,5,5,3)
  (same comment as for graphite)
  properties: carbon content, fossil 0.772277, dry mass 1 kg, heating value, net 33.57 MJ, wet mass 1 kg
  note on carbon content, fossil: (C6H5OH)-CH2-(C6H5OH) was considered to be the basic structure in phenolic resin (ecoinvent v2.2 report 8-part 61). C13H14O2, MW=202 g/mol
- platinum: 0.0015 kg; lognormal variance with pedigree 0.0726, pedigree (2,4,5,5,3)
  (same comment as for glass fibre)
  properties: dry mass 1 kg, wet mass 1 kg
- steel, chromium steel 18/8, hot rolled: 0.2 kg; lognormal variance with pedigree 0.0726, pedigree (2,4,5,5,3)
  (same comment as for glass fibre)
  properties: carbon content, fossil 0.0008, dry mass 1 kg, wet mass 1 kg
  note on carbon content, fossil: Stainless steel model is the grade 304 steel (18/8 stainless, 18% chromium 8% nickel; max. 0.08% C)
- tetrafluoroethylene: 0.104 kg; lognormal variance with pedigree 0.0726, pedigree (2,4,5,5,3)
  (same comment as for glass fibre)
  properties: carbon content, fossil 0.24, dry mass 1 kg, heating value, net 7.27 MJ, wet mass 1 kg
- waste plastic, industrial electronics: -13.216 kg; lognormal variance with pedigree 0.1022, pedigree (4,4,2,5,4)
  Proxy for disposal of moulded bipolar plates
  EcoSpold01Location=CH
  Uncertainty: proxy for disposal of moulded bipolar plates
  production volume
    Calculated from the production volume of fuel cell, stack polymer electrolyte membrane, 2kWe, future in proportion to the respective output amounts.
  properties: carbon content, fossil 0.81386, dry mass 0.847 kg, heating value, net 34.78 MJ, water content 0.180638, wet mass 1 kg
  note on carbon content, fossil: C content in 1 kg DM was calculated using data in Tab A.2, ecoinvent v2.2 report 13_I
- waste polyvinylfluoride: -0.104 kg; lognormal variance with pedigree 0.0328, pedigree (2,4,2,5,3)
  Disposal of membrane material
  EcoSpold01Location=CH
  Uncertainty: disposal of membrane material
  production volume
    (same comment as for waste plastic, industrial electronics)
  properties: carbon content, fossil 0.571142, dry mass 0.998 kg, heating value, net 27.89 MJ, water content 0.00200401, wet mass 1 kg
  note on heating value, net: Value taken from the general comment of the treatment dataset.
- water, deionised: 0.00282598, 0.00917402 kg (2 suppliers, which the file names only by identifier); sum of these 0.012 kg; lognormal variance with pedigree 0.074, pedigree (3,4,5,5,3)
  EcoSpold01Location=CH
  Data from 3kWel unit for use in photovoltaics
  Uncertainty: data from 3kWel unit for use in photovoltaics
  properties: wet mass 1 kg

## Inputs from nature
- Occupation, industrial area [natural resource, land]: 0.079 m2*year; lognormal variance with pedigree 0.182, pedigree (4,4,5,5,4)
  Rough estimation based on company data of similar branch
  Uncertainty: rough estimation based on company data of similar branch
- Transformation, from unspecified [natural resource, land]: 0.0016 m2; lognormal variance with pedigree 0.262, pedigree (4,4,5,5,4)
  (same comment as for Occupation, industrial area)
- Transformation, to industrial area [natural resource, land]: 0.0016 m2; lognormal variance with pedigree 0.262, pedigree (4,4,5,5,4)
  (same comment as for Occupation, industrial area)

## Emissions to nature
- Propanol [air, urban air close to ground]: 0.019 kg; lognormal variance with pedigree 0.12, pedigree (4,4,5,5,3)
  Estimation based on material input
  Uncertainty: estimation based on material input
- Water [air, unspecified]: 1.8e-6 m3; name water_to_air_unspecified; lognormal variance with pedigree 0.0827, pedigree (2,2,5,5,1)
  Calculated value based on literature values and expert opinion. See comments in the parametres' comment field.
  property fraction, origin: fresh water 1; name fraction_origin_fresh_water
  property fraction, origin: salt water 0; name fraction_origin_salt_water
  property fraction, origin: unspecified 0; name fraction_origin_unspecified
- Water [water, unspecified]: 1.02e-5 m3; name water_to_water_unspecified; lognormal variance with pedigree 0.0827, pedigree (2,2,5,5,1)
  (same comment as for Water)
  property carbon content, fossil 0; name C_content_fossil
  property carbon content, non-fossil 0; name C_content_non_fossil
  property dry mass 0 kg; name DM
  property fraction, origin: fresh water 1; name fraction_origin_fresh_water_Ww
  property fraction, origin: salt water 0; name fraction_origin_salt_water_Ww
  property fraction, origin: unspecified 0; name fraction_origin_unspecified_Ww
  property water in wet mass 1000 kg; name WWM
  property wet mass 1000 kg; name WM

## Sampling procedure
Literature data and manufacturer information

## Extrapolations
none This dataset has been copied from an original dataset covering the geography CH. The uncertainty has been adjusted accordingly.

## Review by Rolf Frischknecht 2007-08-13
passed
none
