# zirconium oxide to generic market for electrolyte, for solid oxide fuel cell

Dataset: EcoSpold 2, unit process
Geography: GLO
Time period: 2021-01-01 to 2023-12-31
Technology level: current
Classification: ISIC rev.4 ecoinvent: 2720:Manufacture of batteries and accumulators
Scenario: Business-as-Usual
System model: Allocation, cut-off by classification
Generated by: David FitzGerald
Database: ecoinvent
isCopyrightProtected: true
accessRestrictedTo: 1

## General comment
This activity links zirconium oxide to the generic market for electrolyte used in solid oxide fuel cells, which is one of the possible applications of zirconium oxide (zirconia) (Zircon Industry Association, 2019).
The product "electrolyte, for solid oxide fuel cell" should be used only in cases where the specific electrolyte is not known. The two electrolytes that supply the market for electrolyte, for solid oxide fuel cell are scandium oxide and zirconium oxide.
Reference:
Zircon Industry Association (2019). Zircon's critical and unique uses. https://www.zircon-association.org/applications.html (last accessed on 2021-07-30).

## Included activities start
The activity starts with the reception of zirconium oxide.

## Included activities end
The activity ends with the renaming of zirconium oxide to a generic electrolyte, which supplies the market for electrolyte, for solid oxide fuel cell. As this is a renaming activity, no other inputs or outputs are included.

## Reference product
- electrolyte, for solid oxide fuel cell: 1 kg; By-product classification allocatable product; CPC 34290: Compounds of rare earth metals, of yttrium or of scandium; HS2017 2846: Compounds, inorganic or organic, of rare-earth metals; of yttrium or of scandium or of mixtures of these metals
  production volume 7.75e6 kg; = AVERAGE(75000; 80000)*1000*0.1
    The production volume is approximated with 10% of the production volume of zirconium oxide.
    The global production volume of fused zirconia (zirconium oxide) was reported to be between 75'000 and 80'000 tonnes per year in 2018 (Fastmarkets IM, 2018).
    Reference:
    Fastmarkets IM (2018-03-29). INTERVIEW: Vladimir Gerasimov signals end to era of low silicon carbide, fused zirconia prices. https://www.indmin.com/Article/3797485/INTERVIEW-Vladimir-Gerasimov-signals-end-to-era-of-low-silicon-carbide-fused-zirconia-prices.html (last accessed on 2021-07-30).
  properties: carbon allocation 0 kg, carbon content 0, carbon content, fossil 0, carbon content, non-fossil 0, dry mass 1 kg, price 30.3 EUR2005, water content 0, water in wet mass 0 kg, wet mass 1 kg

## Inputs from technosphere
- zirconium oxide: 1 kg
  properties: dry mass 1 kg, wet mass 1 kg
