# tofu production

Dataset: EcoSpold 2, unit process
Geography: RoW
Time period: 2010-01-01 to 2023-12-31
Technology level: current
Classification: ISIC rev.4 ecoinvent: 1030:Processing and preserving of fruit and vegetables
Scenario: Business-as-Usual
System model: Allocation, cut-off by classification
Generated by: Pierre-Olivier Roy
Database: ecoinvent
isCopyrightProtected: true
accessRestrictedTo: 1

## General comment
This dataset represents the soybase production and the following tofu production.
Organic soybeans received at the facility by truck or rail are sampled and analyzed for moisture content, foreign matter, and damaged seeds. The soybeans which are not up to specifications are eliminated. Soybeans are not dehulled. They are first soaked and remain there for a certain period of time (approximately 24 hours). The soaking water is continuously removed as fresh water enters the vessels. The soybeans are then grounded under airless condition. The resulting slurry is then centrifuged to obtain a soy base at 5% protein, separated from a moist solid co-product, the okara, which is valorized as animal feed. A coagulant is then added to the soy base for protein coagulation and, although there is a number of useable coagulant, calcium sulfate is typically used. This step results in whey and curds. The curd is pressed to remove the whey, submitted to heat for pasteurization (around 80°C), cooled and then cut into blocks. Note that different methods exist where the soy base is first heated before coagulation and pressing or where heat treatment is applied on packaged tofu blocks. In any case, a refrigerated storage is necessary afterwards. A more advanced sterilization process using UHT and aseptic packaging allows room temperature storage but is not common yet in Canada. Moizuddin et al. (1999) evaluated that nearly 70% (on a volume basis) of the input soy base will generate whey at an optimal calcium sulfate concentration.
Moizuddin, S.; Johnson, L. D.; Wilson, L. A., Rapid Method for Determining Optimum Coagulant Concentration in Tofu Manufacture. Journal of food science 1999, 64, (4).

## Included activities start
Starts with the arrival of the organic soybeans at plant

## Included activities end
This activity ends with the tofu production and storage
The dataset includes the production of soy base at a protein content of 5%, the coagulation process, heating, pressing, pasturisation, cutting and storage. The dataset doesn't include infrastructures and cleaning processes.

## Geography
This dataset was extrapolated from the Quebec dataset.

## Technology
Current technology in US consisting of the addition of coagulant followed by pressing of the curds, heat for pasteurization (around 80°C), cooling, cutting into blocks and refrigeration.

## Time period
Collected data for Quebec industries in 2012-13 period while soybean production and characterisation was taken from 2010 data and extrapolated

## Parameters
- electricity input: 0.47 kWh; name electricity; = 0.1+0.37; lognormal variance with pedigree 0.0454, pedigree (2,4,2,5,4)
  electricity from soybase production + tofu production; from ProSoya and Plate (2013) ; extrapolated from the Québec dataset.
  Pro Soya, VS 1000/2000/4000 specifications.www.prosoya.com <http://www.prosoya.com> (March 16, 2013),
  Plate, T. Tofu's carbon footprint. http://tofuscarbonfootprint.weebly.com/the-tofu-factory.html (March 16, 2013),
- energy heat: 8.141 MJ; name heat; lognormal variance with pedigree 0.0454, pedigree (2,4,2,5,4)
  MJ/kg soybean; for the tofu production ; extrapolated from the Québec dataset.
- enthalpy: 2675.43 kJ/kg
  kJ/kg; for evaluating the heat loss
- fraction, process water, to air: 0.18 dimensionless; name fraction_PW_to_air; lognormal variance with pedigree 0.092025, pedigree (4,4,3,2,4)
  Calculated value based on knowledge of the amount of tapwater entering the activity and the amount of wastewater leaving the activity.
- fraction, tap water, to air: 0.18 dimensionless; name fraction_TW_to_air; = fraction_PW_to_air; lognormal variance with pedigree 0.092025, pedigree (4,4,3,2,4)
  Calculated value. See comment in the other parametres present in this dataset. Tap water is considered to be always used as process water, thus process water fractions to air are applied to all tap water input flows to calculate the amount of water consumed in the processes.
- mass coagulant: 2.5e-6 kg; name coagulant; = 0.0025/1000; lognormal variance with pedigree 0.0454, pedigree (2,4,2,5,4)
  kg/kg soybean; coagualant is CaSO4. Data was given in g. Unit conversion from g to kg is 1/1000 ; extrapolated from the Québec dataset.
- mass discarded soybeans: 0.02 kg; name m_discarded; lognormal variance with pedigree 0.0454, pedigree (2,4,2,5,4)
  kg/kg soybean ; extrapolated from the Québec dataset.
- mass okara: 1.75 kg; name okara; lognormal variance with pedigree 0.0454, pedigree (2,4,2,5,4)
  kg/kg soybean; okara is a by-product of soybase production ; extrapolated from the Québec dataset.
- mass soybean: 1 kg; name soybean; lognormal variance with pedigree 0.0454, pedigree (2,4,2,5,4)
- mass steam: 1.25 kg; name steam; lognormal variance with pedigree 0.0454, pedigree (2,4,2,5,4)
  kg/kg soybeansteam from soybase production ; extrapolated from the Québec dataset.
- mass tofu: 1.8 kg; name tofu; lognormal variance with pedigree 0.0454, pedigree (2,4,2,5,4)
  kg/kg soybean ; extrapolated from the Québec dataset.
- mass wastewater: 2.98 kg; name wastewater; = soybean+water+steam-m_discarded-okara-soybase; lognormal variance with pedigree 0.0454, pedigree (2,4,2,5,4)
  from mass balance calculations ; extrapolated from the Québec dataset.
- mass water (coagulant): 0.125 kg; name water_coa; lognormal variance with pedigree 0.0454, pedigree (2,4,2,5,4)
  kg/kg soybean; from the coagulation ; extrapolated from the Québec dataset.
- mass water (process): 7.5 kg; name water; lognormal variance with pedigree 0.0454, pedigree (2,4,2,5,4)
  kg/kg soybean; for the soy base production ; extrapolated from the Québec dataset.
- soy base: 5 kg; name soybase; lognormal variance with pedigree 0.0454, pedigree (2,4,2,5,4)
  L/kg soybeay; @ 5% protein; assumption on soy base density = water density ; extrapolated from the Québec dataset.
- tofu whey: 3.325 kg; name whey; = soybean+steam+coagulant+water_coa+water-wastewater-tofu-okara-m_discarded; lognormal variance with pedigree 0.0454, pedigree (2,4,2,5,4)
  from mass balance calculations; extrapolated from the Québec dataset.

## Reference product
- whey: 1 kg; name BP_amount_4; = whey/tofu; source Moizudding, S.,  1999; By-product classification allocatable product; CPC 22130: Whey; HS2017 0404: Whey and products consisting of natural milk constituents; whether or not containing added sugar or other swe[...]
  The quantity of discarded (trashed) whey related to1 kg of organic soybean. The mathematical relationship is to put the value in regards to a reference flow of 1kg of tofu
  production volume 1.81597e7 kg; = ref_pv * (BP_amount_4 / RP_amount_1)
    Calculated from production volume of reference product using the relative outputs.
  property price 0.0354 EUR2005
    Temporary price data. Calculated as 90% of purchasers price based on: 2005 import prices (total trades (USD) divided by total weight (kg) in biggest economies of the world: EU27, USA, Brasil, China, India, Japan and Russia) from UN Commodity Trade Statistics Database (http://data.un.org/Explorer.aspxDatabase [Accessed 2011.06.23]). Commodity: Whey. The calculated price is 0.553 EUR/kg of dry mass of whey. The dry mass content is 0.064 kg/kg of wet mass of whey. Thus the price is (0.553*0.064=) 0.035 EUR/ kg of wet mass of whey. Cross-reference: the price of wet whey on the Swiss market is 0.02 CHF/kg (0.022 EUR/kg). Source: http://www.esu-services.ch/fileadmin/download/kopf-2015-agrarforschung-molke.pdf, accessed 20150917.
  properties: allocation factor 0.177897, carbon allocation 0.0617087 kg, carbon content 0.845325, carbon content, fossil 0, carbon content, non-fossil 0.845325, dry mass 0.073 kg, true value 0.0653917, water in wet mass 0.927 kg, wet mass 1 kg

## Inputs from technosphere
- anhydrite rock: 1.33483e-7, 2.74092e-10 kg (2 suppliers, which the file names only by identifier); sum of these 1.33757e-7 kg; = coagulant/tofu; source Moizudding, S.,  1999; lognormal variance with pedigree 0.128, pedigree (1,1,4,1,5)
  the quantity of calcium sulfate related to1 kg of organic soybean. The mathematical relationship is to put the value in regards to a reference flow of 1kg of tofu. Anhydrite rock used as a proxy for calcium sulphate
  Uncertainty: Calculated variable. Uncertainty will be determined from propagation of uncertainty factors of underlying variables. Uncertainty of actual relation between variables not accounted at this time, although this could be included in a future update
  properties: dry mass 1 kg, wet mass 1 kg
- biowaste: -0.00018441, -0.00022308, -0.000662564 kg (3 suppliers, which the file names only by identifier); sum of these -0.00107005 kg; = m_discarded/tofu; source Dalgaard, R. 2008
  The quantity of discarded (trashed) soybeans related to1 kg of organic soybean. The mathematical relationship is to put the value in regards to a reference flow of 1kg of tofu
  production volume; = ref_pv* BP_amount_2 / RP_amount_1
    Calculated from production volume of reference product using the relative outputs.
  properties: carbon content, non-fossil 0.1624, dry mass 0.4 kg, heating value, net 4.29 MJ, water content 1.5, wet mass 1 kg
  note on heating value, net: Value taken from the general comment of the treatment dataset.
- electricity, medium voltage: 0.000707964, 0.0141223, 0.000353533, 0.000216803, 0.00305697, 4.33928e-5, 9.31742e-6, 0.000986116, 0.00145835, 0.00419153 kWh (10 suppliers, which the file names only by identifier); sum of these 0.0251463 kWh; = electricity/tofu; source Pro Soya 2013; lognormal variance with pedigree 0.008, pedigree (1,1,4,1,1)
  The quantity of electricity related to1 kg of organic soybean. The mathematical relationship is to put the value in regards to a reference flow of 1kg of tofu.
  Uncertainty: Calculated variable. Uncertainty will be determined from propagation of uncertainty factors of underlying variables. Uncertainty of actual relation between variables not accounted at this time, although this could be included in a future update
- heat, from steam, in chemical industry: 0.37028, 0.065285 MJ (2 suppliers, which the file names only by identifier); sum of these 0.435565 MJ; = heat/tofu; source Plate, T.,  2013; lognormal variance with pedigree 0.008, pedigree (1,1,4,1,1)
  The quantity of heat related to1 kg of organic soybean. The mathematical relationship is to put the value in regards to a reference flow of 1kg of tofu.
  Uncertainty: Calculated variable. Uncertainty will be determined from propagation of uncertainty factors of underlying variables. Uncertainty of actual relation between variables not accounted at this time, although this could be included in a future update
  properties: heating value, net 1 MJ
- soybean, organic: 0.0535027 kg; = soybean/tofu; source Pro Soya 2013; lognormal variance with pedigree 0.008, pedigree (1,1,4,1,1)
  The mathematical relationship is to put the value in regards to a reference flow of 1kg of tofu.
  Uncertainty: Calculated variable. Uncertainty will be determined from propagation of uncertainty factors of underlying variables. Uncertainty of actual relation between variables not accounted at this time, although this could be included in a future update
  properties: carbon content, non-fossil 0.52451, dry mass 0.86 kg, oil/fat content 0.215, protein content 0.4, wet mass 1 kg
- steam, in chemical industry: 0.0568542, 0.0100241 kg (2 suppliers, which the file names only by identifier); sum of these 0.0668784 kg; = steam/tofu; source Pro Soya 2013; lognormal variance with pedigree 0.008, pedigree (1,1,4,1,1)
  The quantity of steam related to1 kg of organic soybean. The mathematical relationship is to put the value in regards to a reference flow of 1kg of tofu.
  Uncertainty: Calculated variable. Uncertainty will be determined from propagation of uncertainty factors of underlying variables. Uncertainty of actual relation between variables not accounted at this time, although this could be included in a future update
  properties: wet mass 1 kg
- tap water: 0.000497613, 0.000758569, 0.00141545, 0.00381312, 0.0191281, 0.218893, 0.163452 kg (7 suppliers, which the file names only by identifier); sum of these 0.407958 kg; = (water+ water_coa)/tofu; source Pro Soya 2013; lognormal variance with pedigree 0.008, pedigree (1,1,4,1,1)
  The quantity of water related to1 kg of organic soybean. The mathematical relationship is to put the value in regards to a reference flow of 1kg of tofu.
  Uncertainty: Calculated variable. Uncertainty will be determined from propagation of uncertainty factors of underlying variables. Uncertainty of actual relation between variables not accounted at this time, although this could be included in a future update
  properties: dry mass 0.000337476 kg, wet mass 1 kg
- wastewater, average: -7.69506e-7, -0.000128049, -3.06192e-5 m3 (3 suppliers, which the file names only by identifier); sum of these -0.000159438 m3; = (wastewater/tofu)/1000; source Pro Soya 2013
  The quantity of wastewater related to1 kg of organic soybean. The mathematical relationship is to put the value in regards to a reference flow of 1kg of tofu
  production volume; = ref_pv * (BP_amount_1 / RP_amount_1)
    Calculated from production volume of reference product using the relative outputs.
  properties: carbon content, non-fossil 0.000194039, dry mass 0.000346837 kg, wet mass 1 kg
  note on carbon content, non-fossil: 0.0673 kg TOC/m3 (Tab A.17, ecoinvent v2.2 report 13_I). TOC was considered as Total Carbon.

## Emissions to nature
- Heat, waste [air, unspecified]: 0.178928 MJ; = steam*enthalpy/tofu/1000; lognormal variance with pedigree 0.008, pedigree (1,1,4,1,1)
  the heat loss from the steam application; the heat loss is evaluated as the specific enthalpie of steam at 1 bar(http://www.engineeringtoolbox.com/saturated-steam-properties-d_457.html)
- Water [air, unspecified]: 7.34324e-5 m3; name water_to_air_unspecified; = (tap_water_input/1000)* fraction_TW_to_air
  Calculated value based on literature values and expert opinion. See comments in the parametres' comment field.

## Sampling procedure
Collected data for Quebec industries for soybean

## Extrapolations
This dataset was extrapolated from the Québec dataset; uncertainty has been adjusted accordingly

## Review by Guillaume Bourgault 2015-07-03
This revision aimed at correcting a unit conversion mistake in the wastewater, average byproduct.
