# transport, freight train, electricity

Dataset: EcoSpold 2, unit process
Geography: IN
Time period: 2016-04-01 to 2023-03-31
Technology level: current
Classification: ISIC rev.4 ecoinvent: 4912:Freight rail transport
Classification: EcoSpold01Categories: transport systems/train
Scenario: Business-as-Usual
System model: Allocation, cut-off by classification
Share of production covered: 100 %
Generated by: Philippa Notten
Published in: Notten, P.J. 2018
Database: ecoinvent
isCopyrightProtected: true
accessRestrictedTo: 1

## General comment
This dataset represents the transport of one metric ton.km of freight in India by an electric locomotive. The dataset represents the entire transport life cycle, including the production and maintenance of the locomotive, production and maintenance of the goods wagons, the transportation of goods and the construction, operation, maintenance and disposal of railway track. The scope of this dataset is the operation of the locomotive, which has inputs of locomotive and goods wagon, maintenance (goods wagon and locomotive) and railway track via linking to global datasets, i.e. the infrastructure and maintenance datasets are not Indian-specific.
Electricity consumption is calculated from the total annual rail electricity consumption (Indian Railways, 2017a), the percentage of electric gross metric ton.kms due to freight transport (65%) (Indian Railways, 2017b) and total electric freight metric ton.kms (Indian Railways, 2017c). The diesel use for shunting of electric freight locomotives is calculated from total diesel consumption for shunting (Indian Railways, 2017d), the percentage of shunting engine kilometres for freight movements (63%) (Indian Railways, 2017e) and the percentage of freight gross tonne.kms moved by electric locomotives (65%) (Indian Railways, 2017b) These figures represent all rail freight movements in India.
Emission of sulphur hexafluoride (SF6) is taken from the global dataset ("transport, freight train, electricity, GLO, 2004"). All other emissions to air are extrapolated on the basis of diesel consumption from the global dataset ("transport, freight train, diesel, GLO, 2004"). The global dataset is derived from data primarily of Swiss/European orgin, described in full in Spielmann et al. (2007).
Emissions of particulates, nitrogen oxides (NOx) and non-methane volatile organic compounds (NMVOC) from diesel consumed during shunting are calculated using emission factors from EcoTransIT (2016). It is assumed that the emission factor for non-regulated locomotives best fits Indian freight locomotives as these currently do not have to adhere to any emissions standards. The partitioning of particulate emissions into size classes is according to Spielmann et al. (2007). Sulphur dioxide (SO2) emissions are calculated from the sulphur content in local diesel and the assumption that all sulphur is emitted as sulphur dioxide. Personal communication with a representative of the Indian Oil Corporation Limited confirmed that all refineries in India produce only BS IV diesel, which has a sulphur content of 50 ppm.
Locomotive production and maintenance are described in the individual global datasets. Locomotive demand per metric ton.km is calculated from the number of electric locomotives (Indian Railways, 2017a), the percentage of electric gross metric ton.kms for freight movement (65%) (Indian Railways, 2017b) and the total metric ton.kms of freight moved by electric locomotives annually (Indian Railways, 2017b). A locomotive lifespan of 40 years is assumed (Spielmann et al., 2007). Goods wagon production and maintenance are described in the individual global datasets. Goods wagon demand per metric ton.km is calculated from the number of goods wagons (Indian Railways, 2017a), the percentage of electric gross metric ton.kms due to freight rail (65%) (Indian Railways, 2017b) and the total metric ton.kms of freight moved annually (Indian Railways, 2017a). A goods wagon lifespan of 40 years is assumed (Spielmann et al., 2007). The construction, operation, maintenance and disposal of railway track is described in the global dataset. Demand for railway track per metric ton.km is calculated from the total length of two-way railway track (Indian Railways, 2017a) and the total metric ton.kms of freight moved by diesel and electric locomotives annually (Indian Railways, 2017b).
References:
Indian Railways (2017a) Annual Report Accounts - Statistical Summary 2017. Indian Railways. Available at: http://www.indianrailways.gov.in/railwayboard/uploads/directorate/stat_econ/IRSP_2016-17/Annual_Report_Accounts_Eng/Statistical_Summary.pdf
Indian Railways (2017b) Integrated Report 2016/2017 - Statistical Statement 16: Tonne kilometrage pertaining to steam, diesel and electric locomotives for 2015-16 and 2016-17. Indian Railways. Available at: http://www.indianrailways.gov.in/railwayboard/uploads/directorate/stat_econ/IRSP_2016-17/IR_Statistical_Statements_BI/16.pdf; Indian Railways (2017c) Integrated Report 2016/2017 - Statistical Statement 19. Indian Railways. Available at: http://www.indianrailways.gov.in/railwayboard/uploads/directorate/stat_econ/IRSP_2016-17/IR_Statistical_Statements_BI/19B.pdf; Indian Railways (2017d) Integrated Report 2016/2017 - Statistics Statement 27. Indian Railways. Available at: http://www.indianrailways.gov.in/railwayboard/uploads/directorate/stat_econ/IRSP_2016-17/Facts_Figure/Indian%20Railway%20Annual%20Statistical%20Statements%20Final.pdf.; Indian Railwasy (2017e) Integrated Report 2016/2017 - Statistics Statement 17. Indian Railways. Available at: http://www.indianrailways.gov.in/railwayboard/uploads/directorate/stat_econ/IRSP_2016-17/Facts_Figure/Indian%20Railway%20Annual%20Statistical%20Statements%20Final.pdf;
Spielmann, M., Bauer, C., Dones, R. & Tuchschmid, M. (2007) Transport Services Data v2.0, ecoinvent association, Zurich, Switzerland.
EcoTransIT (2016) Ecological Transport Information Tool for Worldwide Transports - Methodology and Data Update

## Included activities start
The scope of this dataset is the operation of the locomotive and wagon train, with inputs of locomotives, goods wagons and railway track (covering their production, maintenance and disposal). The transportation service starts with the demand for electricity and diesel (for shunting), and the construction of locomotive, goods wagons and track.

## Included activities end
The dataset ends with the service of transporting freight 1 metric ton.km. . The dataset covers the operation of a electric locomotive, and includes the consumption of electricity and diesel (for shunting), and the associated emissions to air. The dataset calls global datasets on the production and maintenance of a locomotive and goods wagon, as well as the construction, operation, maintenance and disposal of railway track.

## Geography
Demand for electricity, diesel, locomotive, goods wagon and railway track from Indian rail transport statistics. Particulate, NOx, SOx and NMVOC emissions are calculated from EcoTransIT (2016) applying the emission factors most relevant to Indian locomotives (non-regulated). Emission of sulphur hexafluoride (SF6) is taken from the global dataset. All other emissions to air extrapolated from global dataset based on diesel consumption.

## Technology
Data is representative of national freight rail data for the 2016/2017 financial year

## Reference product
- transport, freight train: 1 metric ton*km; By-product classification allocatable product; CPC 6512: Railway transport services of freight
  EcoSpold01Location=US
  production volume 3.9957e11 metric ton*km
    Electric tonne.kms represent 64% of total Indian freight rail tonne.kms (Indian Railways, 2017c).
    References: Indian Railways (2017c) Integrated Report 2016/2017 - Statistical Statement 19. Indian Railways. Available at: http://www.indianrailways.gov.in/railwayboard/uploads/directorate/stat_econ/IRSP_2016-17/IR_Statistical_Statements_BI/19B.pdf;
  properties: carbon allocation 0 kg, carbon content 0, price 0.026 EUR2005

## Inputs from technosphere
- diesel: 0.000251878 kg; lognormal variance with pedigree 0.0426, pedigree (1,1,5,5,1)
  Diesel consumption for shunting of electric locomotive freight is calculated from the total shunting diesel consumption (Indian Railways, 2017d), the percentage of shunting engine kilometres for freight operations (63% on broad gauge railway, which account for over 99% of all Indian engine kilometres) (Indian Railways, 2017e) and the percentage of freight gross tonne.kms by electric locomotives (65%) (Indian Railways, 2017b). This is divided by the electric freight tonne.kms (Indian Railways, 2017c). A diesel density of 0.835 kg/L is assumed (Transport Policy, 2017). References: Indian Railways (2017a) Annual Report Accounts - Statistical Summary 2017. Indian Railways. Available at: http://www.indianrailways.gov.in/railway board/uploads/directorate/stat_econ/IRSP_2016-17/Annual_Report_Accounts_Eng/Statistical_Summary.pdf; Indian Railways (2017b) Integrated Report 2016/2017 - Statistical Statement 16: Tonne kilometrage pertaining to steam, diesel and electric locomotives for 2015-16 and 2016-17. Indian Railways. Available at: http://www.indianrailways.gov.in/railway board/uploads/directorate/stat_econ/IRSP_2016-17/IR_Statistical_Statements_BI/16.pdf; Indian Railways (2017c) Integrated Report 2016/2017 - Statistical Statement 19. Indian Railways. Available at: http://www.indianrailways.gov.in/railwayboard/uploads/directorate/stat_econ/IRSP_2016-17/IR_Statistical_Statements_BI/19B.pdf; Indian Railways (2017d) Integrated Report 2016/2017 - Statistics Statement 27. Indian Railways. Available at: http://www.indianrailways.gov.in/railwayboard/uploads/directorate/stat_econ/IRSP_2016-17/Facts_Figure/Indian%20Railway%20Annual%20Statistical%20Statements%20Final.pdf.; Indian Railwasy (2017e) Integrated Report 2016/2017 - Statistics Statement 17. Indian Railways. Available at: http://www.indianrailways.gov.in/railwayboard/uploads/directorate/stat_econ/IRSP_2016-17/Facts_Figure/Indian%20Railway%20Annual%20Statistical%20Statements%20Final.pdf; Transport Policy (2017) India: Fuels: Diesel and Gasoline, Available at: https://www.transportpolicy.net/standard/india-fuels-diesel-and-gasoline/ (23 May 2018).;
  properties: carbon content, fossil 0.865, dry mass 1 kg, heating value, net 42.8 MJ, wet mass 1 kg
  note on carbon content, fossil: C-content of diesel is 86.5% (ecoinvent v2.2 report 6_IV, Tab 3.14)
- electricity, high voltage: 0.0128124 kWh; lognormal variance with pedigree 0.0026, pedigree (1,1,3,1,1)
  Electricity usage is calculated from total electric freight rail tonne.kms (Indian Railways, 2017c) and the total electricity usage for freight transport. Total electricity usage for freight transport is calculated from total electricity usage for freight and passenger transport (Indian Railways, 2017a) and the fraction of electric gross tonne.kms due to freight transport (65%) (Indian Railways, 2017b). Due to a lack of data, a 50/50 split between medium and high voltage electricity is assumed. References: Indian Railways (2017a) Annual Report Accounts - Statistical Summary 2017. Indian Railways. Available at: http://www.indianrailways.gov.in/railway board/uploads/directorate/stat_econ/IRSP_2016-17/Annual_Report_Accounts_Eng/Statistical_Summary.pdf
  Indian Railways (2017b) Integrated Report 2016/2017 - Statistical Statement 16: Tonne kilometrage pertaining to steam, diesel and electric locomotives for 2015-16 and 2016-17. Indian Railways. Available at: http://www.indianrailways.gov.in/railway board/uploads/directorate/stat_econ/IRSP_2016-17/IR_Statistical_Statements_BI/16.pdf; Indian Railways (2017c) Integrated Report 2016/2017 - Statistical Statement 19. Indian Railways. Available at: http://www.indianrailways.gov.in/railwayboard/uploads/directorate/stat_econ/IRSP_2016-17/IR_Statistical_Statements_BI/19B.pdf
- electricity, medium voltage: 0.0128124 kWh; lognormal variance with pedigree 0.0026, pedigree (1,1,3,1,1)
  (same comment as for electricity, high voltage)
- goods wagon: 1.1206e-8 unit; lognormal variance with pedigree 0.302, pedigree (1,1,3,1,1)
  EcoSpold01Location=RER
  Calculated value for the demand of a goods wagon to fulfil one tonne.km of freight transport. Calculation based on the number of goods wagons used for freight transport (Indian Railways, 2017a) and the total tonne.kms freight transported in the year (Indian Railways, 2017c). A goods wagon lifetime of 40 years is assumed (Spielmann et al., 2007). References: Indian Railways (2017a) Annual Report Accounts - Statistical Summary 2017. Indian Railways. Available at: http://www.indianrailways.gov.in/railway board/uploads/directorate/stat_econ/IRSP_2016-17/Annual_Report_Accounts_Eng/Statistical_Summary.pdf; Indian Railways (2017c) Integrated Report 2016/2017 - Statistical Statement 19. Indian Railways. Available at: http://www.indianrailways.gov.in/railwayboard/uploads/directorate/stat_econ/IRSP_2016-17/IR_Statistical_Statements_BI/19B.pdf; Spielmann, M., Bauer, C., Dones, R. & Tuchschmid, M. (2007) Transport Services Data v2.0, ecoinvent association, Zurich, Switzerland.
- locomotive: 2.20772e-10 unit; lognormal variance with pedigree 0.302, pedigree (1,1,3,1,1)
  EcoSpold01Location=RER
  Calculated value for the demand of a locomotive to fulfil one tonne.km of freight transport. Calculation based on the number of electric locomotives used for freight transport and the total tonne.kms transported by electric locomotives in the year (Indian Railways, 2017c). The number of electric locomotives used is calculated from the total number of electric locomotives (Indian Railways, 2017a) and the percentage of electric gross tonne.kms due to freight movement (65%) (Indian Railways, 2017b).
  References: Indian Railways (2017a) Annual Report Accounts - Statistical Summary 2017. Indian Railways. Available at: http://www.indianrailways.gov.in/railway board/uploads/directorate/stat_econ/IRSP_2016-17/Annual_Report_Accounts_Eng/Statistical_Summary.pdf; Indian Railways (2017b) Integrated Report 2016/2017 - Statistical Statement 16: Tonne kilometrage pertaining to steam, diesel and electric locomotives for 2015-16 and 2016-17. Indian Railways. Available at: http://www.indianrailways.gov.in/railway board/uploads/directorate/stat_econ/IRSP_2016-17/IR_Statistical_Statements_BI/16.pdf; Indian Railways (2017c) Integrated Report 2016/2017 - Statistical Statement 19. Indian Railways. Available at: http://www.indianrailways.gov.in/railwayboard/uploads/directorate/stat_econ/IRSP_2016-17/IR_Statistical_Statements_BI/19B.pdf; Spielmann, M., Bauer, C., Dones, R. & Tuchschmid, M. (2007) Transport Services Data v2.0, ecoinvent association, Zurich, Switzerland.
- maintenance, goods wagon: 1.1206e-8 unit; lognormal variance with pedigree 0.302, pedigree (1,1,3,1,1)
  Calculated value for the demand of a goods wagon to fulfil one tonne.km of freight transport. Calculation based on the number of goods wagons used for freight transport (Indian Railways, 2017a) and the total tonne.kms freight transported in the year (Indian Railways, 2017c). A goods wagon lifetime of 40 years is assumed (Spielmann et al., 2007). References: Indian Railways (2017a) Annual Report Accounts - Statistical Summary 2017. Indian Railways. Available at: http://www.indianrailways.gov.in/railway board/uploads/directorate/stat_econ/IRSP_2016-17/Annual_Report_Accounts_Eng/Statistical_Summary.pdf; Indian Railways (2017c) Integrated Report 2016/2017 - Statistical Statement 19. Indian Railways. Available at: http://www.indianrailways.gov.in/railwayboard/uploads/directorate/stat_econ/IRSP_2016-17/IR_Statistical_Statements_BI/19B.pdf; Spielmann, M., Bauer, C., Dones, R. & Tuchschmid, M. (2007) Transport Services Data v2.0, ecoinvent association, Zurich, Switzerland.
- maintenance, locomotive: 2.20772e-10 unit; lognormal variance with pedigree 0.302, pedigree (1,1,3,1,1)
  Calculated value for the demand of a locomotive to fulfil one tonne.km of freight transport. Calculation based on the number of electric locomotives used for freight transport and the total tonne.kms transported by electric locomotives in the year (Indian Railways, 2017c). The number of electric locomotives used is calculated from the total number of electric locomotives (Indian Railways, 2017a) and the percentage of electric gross tonne.kms due to freight movement (65%) (Indian Railways, 2017b).
  References: Indian Railways (2017a) Annual Report Accounts - Statistical Summary 2017. Indian Railways. Available at: http://www.indianrailways.gov.in/railway board/uploads/directorate/stat_econ/IRSP_2016-17/Annual_Report_Accounts_Eng/Statistical_Summary.pdf; Indian Railways (2017b) Integrated Report 2016/2017 - Statistical Statement 16: Tonne kilometrage pertaining to steam, diesel and electric locomotives for 2015-16 and 2016-17. Indian Railways. Available at: http://www.indianrailways.gov.in/railway board/uploads/directorate/stat_econ/IRSP_2016-17/IR_Statistical_Statements_BI/16.pdf; Indian Railways (2017c) Integrated Report 2016/2017 - Statistical Statement 19. Indian Railways. Available at: http://www.indianrailways.gov.in/railwayboard/uploads/directorate/stat_econ/IRSP_2016-17/IR_Statistical_Statements_BI/19B.pdf; Spielmann, M., Bauer, C., Dones, R. & Tuchschmid, M. (2007) Transport Services Data v2.0, ecoinvent association, Zurich, Switzerland.
- railway track: 4.52379e-5 m*year; lognormal variance with pedigree 0.302, pedigree (1,1,3,1,1)
  EcoSpold01Location=CH
  Calculated value for the demand of railway track to fulfil one tonne.km of freight transport. Calculation based on the total two-way railway track length (Indian Railways, 2017a) and the total tonne.kms freight transported by electric locomotives in the year (Indian Railways, 2017c). References: Indian Railways (2017a) Annual Report Accounts - Statistical Summary 2017. Indian Railways. Available at: http://www.indianrailways.gov.in/railway board/uploads/directorate/stat_econ/IRSP_2016-17/Annual_Report_Accounts_Eng/Statistical_Summary.pdf
  Indian Railways (2017b) Integrated Report 2016/2017 - Statistical Statement 16: Tonne kilometrage pertaining to steam, diesel and electric locomotives for 2015-16 and 2016-17. Indian Railways. Available at: http://www.indianrailways.gov.in/railway board/uploads/directorate/stat_econ/IRSP_2016-17/IR_Statistical_Statements_BI/16.pdf; Indian Railways (2017c) Integrated Report 2016/2017 - Statistical Statement 19. Indian Railways. Available at: http://www.indianrailways.gov.in/railwayboard/uploads/directorate/stat_econ/IRSP_2016-17/IR_Statistical_Statements_BI/19B.pdf; Spielmann, M., Bauer, C., Dones, R. & Tuchschmid, M. (2007) Transport Services Data v2.0, ecoinvent association, Zurich, Switzerland.

## Emissions to nature
- Ammonia [air, unspecified]: 5.03586e-9 kg; lognormal variance with pedigree 0.0912, pedigree (2,3,5,5,3)
  Extrapolated from the global dataset (transport, freight train, diesel, GLO, 2004) using diesel consumption. The global dataset is derived from datasets described in full in Spielmann et al. (2007), with emissions in these datasets based on Swiss heavy goods vehicle emissions in urban traffic conditions. Reference: Spielmann, M., Bauer, C., Dones, R. & Tuchschmid, M. (2007) Transport Services Data v2.0, ecoinvent association, Zurich, Switzerland.
- Benzene [air, unspecified]: 2.51878e-8 kg; lognormal variance with pedigree 0.0912, pedigree (2,3,5,5,3)
  (same comment as for Ammonia)
- Cadmium II [air, unspecified]: 2.52017e-12 kg; lognormal variance with pedigree 0.708, pedigree (4,5,5,5,1)
  Extrapolated from the global dataset (transport, freight train, diesel, GLO, 2004) using diesel consumption. The global dataset is derived from datasets described in full in Spielmann et al. (2007), with heavy metal emissions in these datasets applying literature values from an EEA document, based on an expert panel review.
  Reference: Spielmann, M., Bauer, C., Dones, R. & Tuchschmid, M. (2007) Transport Services Data v2.0, ecoinvent association, Zurich, Switzerland.
- Carbon dioxide, fossil [air, unspecified]: 0.000791899 kg; lognormal variance with pedigree 0.0438, pedigree (2,3,5,5,1)
  Extrapolated from the global dataset (transport, freight train, diesel, GLO, 2004) using diesel consumption. The global dataset is derived from datasets described in full in Spielmann et al. (2007), with carbon dioxide emissions in these datasets calculated assuming that all carbon in the fuel is converted to carbon dioxide. The emission index is therefore 3,146 g/kg (Spielmann et al., 2007).
  Reference: Spielmann, M., Bauer, C., Dones, R. & Tuchschmid, M. (2007) Transport Services Data v2.0, ecoinvent association, Zurich, Switzerland.
- Carbon monoxide, fossil [air, unspecified]: 3.98625e-6 kg; lognormal variance with pedigree 0.6932, pedigree (2,3,5,5,1)
  Extrapolated from the global dataset (transport, freight train, diesel, GLO, 2004) using diesel consumption. The global dataset is derived from datasets described in full in Spielmann et al. (2007), with carbon monoxide emissions in these datasets based on a literature study on shunting specific emissions indices.
  Reference: Spielmann, M., Bauer, C., Dones, R. & Tuchschmid, M. (2007) Transport Services Data v2.0, ecoinvent association, Zurich, Switzerland.
- Chromium III [air, unspecified]: 1.25741e-11 kg; lognormal variance with pedigree 0.708, pedigree (4,5,5,5,1)
  (same comment as for Cadmium II)
- Copper ion [air, unspecified]: 4.28188e-10 kg; lognormal variance with pedigree 0.708, pedigree (4,5,5,5,1)
  (same comment as for Cadmium II)
- Dinitrogen monoxide [air, unspecified]: 2.51878e-8 kg; lognormal variance with pedigree 0.0912, pedigree (2,3,5,5,3)
  (same comment as for Ammonia)
- Lead II [air, unspecified]: 2.7556e-14 kg; lognormal variance with pedigree 0.708, pedigree (4,5,5,5,1)
  Extrapolated from the global dataset (transport, freight train, diesel, GLO, 2004) using diesel consumption. The global dataset is derived from datasets described in full in Spielmann et al. (2007), with lead emissions in these datasets are based on literature values from Jungbluth (Spielmann et al., 2007). Reference: Spielmann, M., Bauer, C., Dones, R. & Tuchschmid, M. (2007) Transport Services Data v2.0, ecoinvent association, Zurich, Switzerland.
- Mercury II [air, unspecified]: 5.03586e-15 kg; lognormal variance with pedigree 0.708, pedigree (4,5,5,5,1)
  Extrapolated from the global dataset (transport, freight train, diesel, GLO, 2004) using diesel consumption. The global dataset is derived from datasets described in full in Spielmann et al. (2007), with mercury emissions in these datasets are based on a literature value from Jungbluth (Spielmann et al., 2007). Reference: Spielmann, M., Bauer, C., Dones, R. & Tuchschmid, M. (2007) Transport Services Data v2.0, ecoinvent association, Zurich, Switzerland.
- Methane, fossil [air, unspecified]: 3.27276e-8 kg; lognormal variance with pedigree 0.0912, pedigree (2,3,5,5,3)
  (same comment as for Ammonia)
- NMVOC, non-methane volatile organic compounds [air, unspecified]: 9.99973e-7 kg; lognormal variance with pedigree 0.0912, pedigree (2,3,5,5,3)
  NMVOC emissions from diesel consumed during shunting are calculated from the hydrocarbon emission factor for non-regulated locomotives (US-EPA emission standards) in EcoTransIT (2016) (g/kg diesel), corrected for methane emissions. It was assumed that the non-regulated emission factor best fits Indian freight locomotives as these currently do not have to adhere to any emissions standards.
  References: EcoTransIT (2016) Ecological Transport Information Tool for Worldwide Transports - Methodology and Data Update
- Nickel II [air, unspecified]: 1.75848e-11 kg; lognormal variance with pedigree 0.708, pedigree (4,5,5,5,1)
  (same comment as for Cadmium II)
- Nitrogen oxides [air, unspecified]: 1.85886e-5 kg; lognormal variance with pedigree 0.0832, pedigree (2,3,5,5,1)
  Nitrogen oxide emissions from diesel consumed during shunting are calculated from emission factors for non-regulated locomotives (US-EPA emission standards) in EcoTransIT (2016). It was assumed that the non-regulated emission factor best fits Indian freight locomotives as these currently do not have to adhere to any emissions standards.
  References: EcoTransIT (2016) Ecological Transport Information Tool for Worldwide Transports - Methodology and Data Update.
- Particulate Matter, < 2.5 um [air, unspecified]: 1.08695e-7 kg; lognormal variance with pedigree 0.3446, pedigree (3,3,5,5,1)
  Particulate emissions from diesel consumed during shunting are calculated from the emission factor for non-regulated locomotives (US-EPA emission standards) in EcoTransIT (2016) (g/kg diesel). It was assumed that the non-regulated emission factor best fits Indian freight locomotives as these currently do not have to adhere to any emissions standards. The breakdown of particulates into size fractions is based on the global dataset (transport, freight train, diesel, GLO, 2004), with the global dataset derived from datasets described in full in Spielmann et al. (2007). In these datasets the particulate size distribution is assumed to match that of diesel locomotives without particulate filters, as presented by EU-Norm IIIa (Spielmann et al., 2007). References: Spielmann, M., Bauer, C., Dones, R. & Tuchschmid, M. (2007) Transport Services Data v2.0, ecoinvent association, Zurich, Switzerland; EcoTransIT (2016) Ecological Transport Information Tool for Worldwide Transports - Methodology and Data Update.
- Particulate Matter, > 10 um [air, unspecified]: 1.18554e-5 kg; lognormal variance with pedigree 0.0846, pedigree (3,3,5,5,1)
  Particulate emissions from both abrasion and fuel combustion are considered. Particulate emissions from the abrasion of railway tracks, wheels, brakes and overhead lines (1.17E-5) are taken from Spielmann et al. (2007). Particulate emissions from diesel use are calculated from emission factors for non-regulated locomotives (US-EPA emission standards) in EcoTransIT (2016) (g/kg diesel). It was assumed that the non-regulated emission factor best fits Indian freight locomotives as these currently do not have to adhere to any emissions standards. The breakdown of particulates into size fractions is based on the global dataset (transport, freight train, diesel, GLO, 2004), with the global dataset derived from datasets described in full in Spielmann et al. (2007). In these datasets the particulate size distribution is assumed to match that of diesel locomotives without particulate filters, as presented by EU-Norm IIIa (Spielmann et al., 2007). x References: Spielmann, M., Bauer, C., Dones, R. & Tuchschmid, M. (2007) Transport Services Data v2.0, ecoinvent association, Zurich, Switzerland; EcoTransIT (2016) Ecological Transport Information Tool for Worldwide Transports - Methodology and Data Update.
- Particulate Matter, > 2.5 um and < 10um [air, unspecified]: 1.64213e-5 kg; lognormal variance with pedigree 0.1646, pedigree (3,3,5,5,1)
  Particulate emissions from both abrasion and fuel combustion are considered. Particulate emissions from the abrasion of railway tracks, wheels, brakes and overhead lines (1.63E-5) are taken from Spielmann et al. (2007). Particulate emissions from diesel use are calculated from emission factors for non-regulated locomotives (US-EPA emission standards) in EcoTransIT (2016) (g/kg diesel). It was assumed that the non-regulated emission factor best fits Indian freight locomotives as these currently do not have to adhere to any emissions standards. The breakdown of particulates into size fractions is based on the global dataset (transport, freight train, diesel, GLO, 2004), with the global dataset derived from datasets described in full in Spielmann et al. (2007). In these datasets the particulate size distribution is assumed to match that of diesel locomotives without particulate filters, as presented by EU-Norm IIIa (Spielmann et al., 2007). References: Spielmann, M., Bauer, C., Dones, R. & Tuchschmid, M. (2007) Transport Services Data v2.0, ecoinvent association, Zurich, Switzerland; EcoTransIT (2016) Ecological Transport Information Tool for Worldwide Transports - Methodology and Data Update.
- Selenium IV [air, unspecified]: 2.52017e-12 kg; lognormal variance with pedigree 0.708, pedigree (4,5,5,5,1)
  (same comment as for Cadmium II)
- Sulfur dioxide [air, unspecified]: 2.51878e-8 kg; lognormal variance with pedigree 0.0438, pedigree (2,3,5,5,1)
  Sulphur dioxide emissions are calculated from diesel usage for shunting and assuming that all sulphur in the fuel is converted to sulphur dioxide (Spielmann et al., 2007). India currently uses diesel with a sulphur content of 50 ppm, resulting in an emission index of 1 g/kg.
  Reference: Spielmann, M., Bauer, C., Dones, R. & Tuchschmid, M. (2007) Transport Services Data v2.0, ecoinvent association, Zurich, Switzerland.
- Sulfur hexafluoride [air, unspecified]: 2.12529e-9 kg; lognormal variance with pedigree 0.1, pedigree (3,5,5,5,3)
  Sulphur hexafluoride (SF6) emissions are taken from the global dataset (transport, freight train, electricity, GLO, 2004). The global dataset is derived from datasets described in full in Spielmann et al. (2007), with SF6 emissions in these datasets based on literature emissions per kWh.
  Reference: Spielmann, M., Bauer, C., Dones, R. & Tuchschmid, M. (2007) Transport Services Data v2.0, ecoinvent association, Zurich, Switzerland.
- Toluene [air, unspecified]: 1.00593e-8 kg; lognormal variance with pedigree 0.0926, pedigree (3,3,5,5,3)
  (same comment as for Ammonia)
- Xylenes, unspecified [air, unspecified]: 1.00593e-8 kg; lognormal variance with pedigree 0.0926, pedigree (3,3,5,5,3)
  (same comment as for Ammonia)
- Zinc II [air, unspecified]: 2.52017e-10 kg; lognormal variance with pedigree 0.708, pedigree (4,5,5,5,1)
  (same comment as for Cadmium II)
- Iron ion [soil, unspecified]: 1.41793e-6 kg; lognormal variance with pedigree 0.25, pedigree (5,5,5,5,5)
  Extrapolated from the global dataset (transport, freight train, diesel, GLO, 2004) using diesel consumption. The global dataset is derived from datasets described in full in Spielmann et al. (2007), with iron emissions to soil in these datasets based on annual iron load and the assumption that all non-airborne abrasion emissions are emitted as iron to soil. Reference: Spielmann, M., Bauer, C., Dones, R. & Tuchschmid, M. (2007) Transport Services Data v2.0, ecoinvent association, Zurich, Switzerland.

## Sampling procedure
Demand for electricity, diesel, locomotive, goods wagon and railway track from Indian national rail transport statistics and representative of all rail freight movements in the reference year. Particulate, NOx, SOx and NMVOC emissions from EcoTransIT (2016) applying the emission factors most relevant to Indian locomotives (non-regulated).

## Extrapolations
Emission of sulphur hexafluoride (SF6) is taken from the global dataset. All other emissions to air (other than particulates, NOx, SOx and NMVOC) extrapolated from global dataset on the basis of diesel consumption.
