# treatment of scrap printed wiring boards, shredding and separation

Dataset: EcoSpold 2, unit process
Geography: RoW
Time period: 2005-01-01 to 2023-12-31
Technology level: current
Classification: ISIC rev.4 ecoinvent: 3830:Materials recovery
Classification: EcoSpold01Categories: waste management/recycling
Tags: ConvertedDataset; Treatment
Scenario: Business-as-Usual
System model: Allocation, cut-off by classification
Generated by: Roland Hischier
Published in: Hischier R. 2007
Database: ecoinvent
isCopyrightProtected: true
accessRestrictedTo: 1

## General comment
The multioutput-process "treatment PWB for further metallugical treatment" delivers the co-products "disposal, treatment of printed wiring boards” and "electronics scrap, for precious metal recovery, at preparation plant". The allocation is done 100% to the disposal process.
[This dataset was already contained in the ecoinvent database version 2. It was not individually updated during the transfer to ecoinvent version 3. Life Cycle Impact Assessment results may still have changed, as they are affected by changes in the supply chain, i.e. in other datasets. This dataset was generated following the ecoinvent quality guidelines for version 2. It may have been subject to central changes described in the ecoinvent version 3 change report (http://www.ecoinvent.org/database/ecoinvent-version-3/reports-of-changes/), and the results of the central updates were reviewed extensively. The changes added e.g. consistent water flows and other information throughout the database. The documentation of this dataset can be found in the ecoinvent reports of version 2, which are still available via the ecoinvent website. The change report linked above covers all central changes that were made during the conversion process.]

## Included activities end
This dataset represents the treatment of printed wiring boards (PWB) from electric and electronic devices for the recovery of precious metals in a metallurgical process. It includes infrastructure, energy consumption, and an estimation of the efforts for transportation. The process has no emissions to air / water.

## Geography
Estimation - used as global average data.

## Technology
Weighting, shredding and sampling of Printed Wiring Boards in a current preparation plant.

## Reference product
- used printed wiring boards: -1 kg; By-product classification Waste; CPC 39990: Other wastes n.e.c.
  EcoSpold01Location=GLO
  production volume 0.995557 kg
    Dummy value to be replaced by value to be calculated from the demand for this treatment activity
  property carbon content, fossil 0.193742
    Composition of printed wiring boards used to calculate C content
  property carbon content, non-fossil 0.000960142
    Composition of printed wiring boards used to calculate C content
  property price 0 EUR2005
    Waste products are assigned a price of zero as they are assumed to require further treatment.
  properties: carbon allocation 0.194702 kg, carbon content 0.194702, dry mass 1 kg, water content 0, water in wet mass 0 kg, wet mass 1 kg

## Inputs from technosphere
- electricity, medium voltage: 0.00112615, 0.0224642, 0.000562363, 0.000344867, 0.0048627, 6.90247e-5, 1.48212e-5, 0.00156861, 0.00231978, 0.00666744 kWh (10 suppliers, which the file names only by identifier); sum of these 0.04 kWh; lognormal variance with pedigree 0.0767, pedigree (4,3,5,3,3)
  EcoSpold01Location=UCTE
  Estimation, based on information in Huisman (2003)
  Uncertainty: estimation, based on information in Huisman (2003)
- electronics scrap: -1 kg
  EcoSpold01Location=GLO
  production volume
    Calculated from the production volume of used printed wiring boards in proportion to the respective output amounts.
  properties: carbon content, fossil 0.317311, carbon content, non-fossil 0.0045566, dry mass 1 kg, price 16.1 EUR2005, wet mass 1 kg
  note on carbon content, fossil: Carbon content assumed equal with the intermediate exchange of "electronic component, passive, unspecified"
- manual treatment facility, waste electric and electronic equipment: 4e-10 unit; lognormal variance with pedigree 0.5761, pedigree (4,5,5,3,5)
  Rough estimation of infrastructure
  EcoSpold01Location=GLO
  Uncertainty: rough estimation of infrastructure

## Sampling procedure
Company information & own estimation

## Extrapolations
see Geography & Technology

## Review by Jürgen Sutter 2007-08-31
passed.
