# transport, freight, lorry 3.5-7.5 metric ton, unregulated

Dataset: EcoSpold 2, unit process
Geography: ZA
Time period: 2017-01-01 to 2023-12-31
Technology level: current
Classification: EcoSpold01Categories: transport systems/road
Classification: ISIC rev.4 ecoinvent: 4923:Freight transport by road
Scenario: Business-as-Usual
System model: Allocation, cut-off by classification
Share of production covered: 100 %
Generated by: Philippa Notten
Published in: Notten, P.J. 2018
Database: ecoinvent
isCopyrightProtected: true
accessRestrictedTo: 1

## General comment
This dataset represents the transport of one metric ton.km of freight in South Africa by a 3.5-7.5 metric ton lorry not meeting any emission standard. The dataset represents the entire transport life cycle, including the production and maintenance of the vehicle, the transportation of goods and the construction, operation, maintenance and disposal of the road pavement. The scope of the dataset is the operation of the vehicle, which has inputs of vehicle production, vehicle maintenance, and road pavement construction, maintenance and operation, via linking to global datasets (i.e. the equipment and infrastructure datasets are not South African-specific). The dataset represents the average 3.5-7.5 metric ton lorry not meeting any emission standard vehicle within South Africa and is therefore an average across both petrol and diesel vehicles (i.e. the dataset represents the average of the entire fleet and shows the fuel use, both in terms of petrol and diesel, for the movement of a tonne.km of freight).
The average freight load of a 3.5-7.5 metric ton lorry is 3.9 tonnes, with an average freight load factor of 50% (both values calculated from SATIM model (ERC, 2015), which used factors from the Road Freight Association's vehicle cost schedule and calibrated these values to the 2014 tonne.kms reported by the Department of Logistics at the University of Stellenbosch. The load factor accounts for all transport trips). The average gross vehicle mass (GVW) is 7.1 tonnes (calculated from freight loading and that freight accounts for 55% of GVW in a heavy commercial vehicle (DoT,2009).
The dataset is not parameterised and factors cannot be changed by users.
Fuel consumption and the primary emissions (nitrogen oxides, nitrous oxide, methane, non-methane hydrocarbons, ammonia, benzene and lead) are modelled based on information and assumptions on fleet mixes and usage of vehicles in different road and traffic situations. Basic emission data is taken from HBEFA 3.4. (INFRAS, 2017), with extensive weighted averaging of vehicles in different traffic situations performed (see report for parameters applied and data sources for road and traffic conditions in South Africa). Emission factors for sulphur dioxide and for carbon dioxide are not taken directly from HBEFA but are calculated using the carbon content and the sulphur content of diesel and petrol in South Africa (and the fuel consumption). Heavy metal emissions to air (other than lead) are extrapolated from "transport, freight, lorry 3.5-7.5 metric ton, EURO3" on the basis of diesel consumption and "transport, passenger car, large size, petrol, EURO3, GLO, 2012" on the basis of petrol consumption. Emissions arising from wear of tyres, brakes and road are calculated from the applicable global datasets ("treatment of tyre/brake/road wear emissions, lorry, GLO, 2013") on the basis of GVW and freight loading.
Vehicle production and maintenance is described in the individual global datasets. Vehicle demand per tonne.km is calculated based on the lifetime kilometric performance, taken from Spielmann et al., (2007) (540,000 km for a heavy commercial vehicle), and the average freight load. The average freight load is calculated from the SATIM model (ERC, 2015), weighted to account for the current commercial vehicle fleet in South Africa (eNaTIS, 2017). Road construction, maintenance and disposal, and road operation are described in the individual global datasets. Road demand per tonne.km is calculated based on weighted road usage of each vehicle type of the road network in South Africa (see report for calculations and data sources).
References:
INFRAS (2017) Handbook Emission Factors for Road Transport (HBEFA) 3.4. INFRAS, Bern, Switzerland;
eNaTIS (2018) Vehicle population statistics for December 2017/January 2018, Electronic National Administration Traffic Information System (eNaTIS): Pretoria, SA.;
ERC (2015) South African TIMES Model (SATIM) Energy Research Centre - University of Cape Town: Cape Town, SA.;
Spielmann, M., Bauer, C., Dones, R. & Tuchschmid, M. (2007) Transport Services Data v2.0, ecoinvent association, Zurich, Switzerland.; DoT (2009) National Transport Master Plan: The Implications of Global Oil Depletion for Transport Systems in South Africa. Department of Transport. Pretoria, SA.

## Included activities start
The scope of this dataset is the operation of the vehicle, with inputs of vehicle and road infrastructure. The transportation service starts with the demand for fuel (diesel and petrol) and the requirement for construction and maintenance of the vehicle and road infrastructure.

## Included activities end
The dataset ends with the service of transporting freight 1 metric ton.km (tonnage includes the weight of items and any packaging/housing). The dataset includes the operation of an average light commercial vehicle and links to the production and maintenance of one average light commercial vehicle. It also links to the construction, operation, maintenance and disposal of road pavement. The dataset includes the consumption of fuel (diesel and petrol), emissions to air and operational wear emissions.

## Geography
Fuel consumption and primary emissions (nitrogen oxides, nitrous oxide, methane, non-methane hydrocarbons, ammonia, benzene and lead) are based on fleet composition and usage of vehicles in different road and traffic situations in South Africa (see report for parameters applied and data sources for road and traffic conditions in South Africa). Basic emission data is taken from HBEFA 3.4. (INFRAS, 2017) for the emission standard relevant to South Africa, and with weighted averaging of vehicles reflecting the different traffic situations in South Africa. Sulphur dioxide and carbon dioxide emissions reflect the sulphur and carbon content of fuels in South Africa. Heavy metal emissions to air (other than lead) and wear emissions (tyre, break and road) are not South African specific or emission-standard relevant (i.e. are extrapolated from a Euro 3 global transport dataset of the same vehicle. Equipment and infrastructure datasets are not South African specific.

## Technology
The dataset reflects current technology in that the calculations apply current/recent road infrastructure, commercial vehicle fleet and road freight data for South Africa. The calculations also reflect current fuel quality and emission standards in South Africa.

## Time period
Data are representative of vehicle fleet and road freight data for 2017.

## Reference product
- transport, freight, lorry 3.5-7.5 metric ton, unregulated: 1 metric ton*km; By-product classification allocatable product; CPC 6511: Road transport services of freight
  production volume 4.7983e9 metric ton*km; name PV
    South African tonne.kms calculated from current South African commercial vehicle fleet and road freight data. The commercial vehicle fleet is based on total vehicle fleet data for 2017 (eNaTIS, 2017) and SATIM model data (ERC, 2015), which includes data on the breakdown of the vehicle fleet into size classes, average freight payloads, annual mileage, annual mileage decay, historic sales and scrapping factors. Freight payloads account for 51% and 55% of gross vehicle weights (GVW) for light commercial vehicles (LVC) and heavy commercial vehicles respectively in South Africa (DoT, 2009), which is used to correlate the average freight payloads with the GVW categories in ecoinvent. Commercial vehicles are split into relevant emission classes based on Thambiran & Diab (2011) and the fact that all vehicles sold since 2006 have been of a Euro2 standard (Nare & Kamakate, 2017; SAPIA, 2015). References: eNaTIS (2018) Vehicle population statistics for December 2017/January 2018, Electronic National Administration Traffic Information System (eNaTIS): Pretoria, SA.; ERC (2015) South African TIMES Model (SATIM) Energy Research Centre - University of Cape Town: Cape Town, SA.; DoT (2009) National Transport Master Plan: The Implications of Global Oil Depletion for Transport Systems in South Africa, Department of Transport: Pretoria, SA.; Thambiran, T. and Diab, R. (2011) Air pollution and climate change co-benefit opportunities in the road transport sector in Durban, South Africa, Atmospheric Environment, 45(16), pp. 2683-2689.; Nare, H. and Kamakate, F. (2017) Developing a roadmap for the adoption of clean fuel and vehicle standards in Southern and Western Africa, International Council on Clean Transportation: Washington, USA.; SAPIA (2015) Cleaner fuels II. Johannesburg, SA: South African Petroleum Industry Association.
  property price 0.0376543 EUR2005
    Calculated based on inputs: The price of the product has been calculated as a sum of the values of the material and energy inputs for this product. This value is therefore a rough estimation. It may underestimate the real price since there are additional expenses when producing any product. These expences can include for example labour costs, treatment of waste materials and profit for the producer. Please consider carefully whether this level of data quality is acceptable for your application.
  properties: carbon allocation 0 kg, carbon content 0

## Inputs from technosphere
- brake wear emissions, lorry: -1.47818e-5 kg; name brake_wear; source Ntziachristos, L. 2013; lognormal variance with pedigree 0.0035, pedigree (2,2,2,5,1)
  Wear emissions are calaculated from the lorry brake wear emissions per GVW (8.13E-9 kg / kg GVW*km) presented in "treatment of brake wear emissions, lorry, GLO, 2013" dataset. The dataset uses wear emissions for lorries from EMEP/EEA (2013), scaled based on average gross vehicle weight and average freight load factor. The average load factor of a 3.5-7.5 metric ton lorry is 3.9 tonnes (calculated from SATIM model (ERC, 2015)), while the average gross vehicle mass (GVW) is 7.1 tonnes (calculated from load factor and data that freight accounts for 55% of GVW in heavy commercial vehicles (DoT, 2009)). Reference: Ntziachristos, L., Samaras, Z., Kouridis, C., Hassel, D., McCrae, I., Hickman, J., Zierock, K-H., Keller, M., Andre, M., Winther, M., Gorissen, N., Boulter, P., Katsis, P., Joumard, R., Rijkeboer, R., Geivanidis, S., Hausberger, S. (2013) Exhaust emissions from road transport, EMEP/EEA air pollutant emission inventory guidebook 2013, Copenhagen, European Commission.; ERC (2015) South African TIMES Model (SATIM) Energy Research Centre - University of Cape Town: Cape Town, SA.; DoT (2009) National Transport Master Plan: The Implications of Global Oil Depletion for Transport Systems in South Africa. Department of Transport. Pretoria, SA.
  production volume; = (brake_wear)/1*PV
    Calculated from production volume of reference product using the relative outputs.
  properties: carbon content, fossil 0.149, dry mass 1 kg, wet mass 1 kg
  note on carbon content, fossil: This amount equates to the amout for organic carbon reported in the Emissions Inventory Guidebook (Ntziachristos et al., 2013).
- diesel: 0.0267228 kg; lognormal variance with pedigree 0.0032, pedigree (2,1,3,1,1)
  Diesel use per tonne.km is calculated using HBEFA 3.4 (INFRAS, 2017) modelling data and current South Africa road infrastructure, commercial vehicle fleet and road freight data. Standard diesel (500 ppm) accounts for 73% of commercial diesel use, based on the assumption that all diesel sold to retail customers is low-sulphur (50 ppm) grade and diesel sales data (DoE, 2017). The road infrastructure data is based on the total length of paved and unpaved roads (Kannemeyer, 2016), pavement condition of national and provincial roads (Kannemeyer, 2016), road gradients (calculated from DoT (2018) data) and prevailing traffic flow (PBS-SA, 2015; Havenga & Pienaar, 2012). Changes in fuel use due to pavement type and condition are calculated according to du Plessis et al. (1990). The commercial vehicle fleet is based on total vehicle fleet data for 2017 (eNaTIS, 2017) and SATIM model data (ERC, 2015), which includes data on the breakdown of the vehicle fleet into size classes, average freight payloads, annual mileage, annual mileage decay, historic sales and scrapping factors. Freight payloads account for 51% and 55% of gross vehicle weights (GVW) for light commercial vehicles (LVC) and heavy commercial vehicles respectively in South Africa (DoT, 2009), which is used to correlate the average freight payloads with the GVW categories in ecoinvent. Commercial vehicles are split into relevant emission classes based on Thambiran & Diab (2011) and the fact that all vehicles sold since 2006 have been of a Euro2 standard (Nare & Kamakate, 2017; SAPIA, 2015). Maximum vehicle speeds are determined from road legislation (ArriveAlive, 2018) and vehicle legislation (Business Tech, 2016). Road freight data is calculated from the commercial vehicle fleet and SATIM data. This road freight is split into categories (major "corridor" freight, rural and urban) based on previous road freight studies (Havenga et al., 2016). This is used to determine average transport distance (CSIR, 2013) and to make various assumptions on the freight transport performed by different truck classes. These assumptions are based on the fact that larger vehicles are used to transport freight on major "corridors", while urban freight is transported using lighter vehicles. References: INFRAS (2017) Handbook Emission Factors for Road Transport (HBEFA) 3.4. INFRAS, Bern, Switzerland; Kannemeyer, L. (2016) South African Road Network Condition, Needs and Funding, South African National Roads Agency (SANRAL): Pretoria, SA.; DoT (2018) National Freight Databank. Pretoria, SA: Department of Transport.; du Plessis, H., Visser, A. & Curtayne, P. (1990) Fuel consumption of vehicles as affected by road-surface characteristics. ASTM Special Publication.; PBS-SA (2015) SANRAL Historic Traffic Data, PBS-SA.; Havenga, J. and Pienaar, W. (2012) The creation and application of a national freight flow model for South Africa, Journal of the South African Institute of Civil Engineering, 54(1), pp. 2-13.; eNaTIS (2018) Vehicle population statistics for December 2017/January 2018, Electronic National Administration Traffic Information System (eNaTIS): Pretoria, SA.; ERC (2015) South African TIMES Model (SATIM) Energy Research Centre - University of Cape Town: Cape Town, SA.; DoT (2009) National Transport Master Plan: The Implications of Global Oil Depletion for Transport Systems in South Africa, Department of Transport: Pretoria, SA.; Thambiran, T. and Diab, R. (2011) Air pollution and climate change co-benefit opportunities in the road transport sector in Durban, South Africa, Atmospheric Environment, 45(16), pp. 2683-2689.; Nare, H. and Kamakate, F. (2017) Developing a roadmap for the adoption of clean fuel and vehicle standards in Southern and Western Africa, International Council on Clean Transportation: Washington, USA.; SAPIA (2015) Cleaner fuels II. Johannesburg, SA: South African Petroleum Industry Association.; Arrive Alive (2018) Speed Limits And The Law. Pretoria, SA: Arrive Alive.; Business Tech (2016) Transport department signs off on new speed limit: Business tech.; Havenga, J., Simpson, Z., King, D., de Bod, A. and Braun, M. (2016) Logistics Barometer South Africa 2016, Stellenbosch University: Stellenbosch, SA.; CSIR (2013) 10th Annual State of Logistics Survey for South Africa, Council for Scientific and Industrial Research (CSIR): Pretoria, SA.; DoE (2017) Overview of the Petrol and Diesel Market in South Africa between 2007 and 2016, Department of Energy: Pretoria, SA.
  properties: carbon content, fossil 0.865, dry mass 1 kg, heating value, net 42.8 MJ, wet mass 1 kg
  note on carbon content, fossil: C-content of diesel is 86.5% (ecoinvent v2.2 report 6_IV, Tab 3.14)
- diesel, low-sulfur: 0.0100159 kg
  Diesel use per tonne.km is calculated using HBEFA 3.4 (INFRAS, 2017) modelling data and current South Africa road infrastructure, commercial vehicle fleet and road freight data. Low sulphur diesel (50 ppm) accounts for 27% of commercial diesel use, based on the assumption that all diesel sold to retail customers is low-sulphur (50 ppm) grade and diesel sales data (DoE, 2017). The road infrastructure data is based on the total length of paved and unpaved roads (Kannemeyer, 2016), pavement condition of national and provincial roads (Kannemeyer, 2016), road gradients (calculated from DoT (2018) data) and prevailing traffic flow (PBS-SA, 2015; Havenga & Pienaar, 2012). Changes in fuel use due to pavement type and condition are calculated according to du Plessis et al. (1990). The commercial vehicle fleet is based on total vehicle fleet data for 2017 (eNaTIS, 2017) and SATIM model data (ERC, 2015), which includes data on the breakdown of the vehicle fleet into size classes, average freight payloads, annual mileage, annual mileage decay, historic sales and scrapping factors. Freight payloads account for 51% and 55% of gross vehicle weights (GVW) for light commercial vehicles (LVC) and heavy commercial vehicles respectively in South Africa (DoT, 2009), which is used to correlate the average freight payloads with the GVW categories in ecoinvent. Commercial vehicles are split into relevant emission classes based on Thambiran & Diab (2011) and the fact that all vehicles sold since 2006 have been of a Euro2 standard (Nare & Kamakate, 2017; SAPIA, 2015). Maximum vehicle speeds are determined from road legislation (ArriveAlive, 2018) and vehicle legislation (Business Tech, 2016). Road freight data is calculated from the commercial vehicle fleet and SATIM data. This road freight is split into categories (major "corridor" freight, rural and urban) based on previous road freight studies (Havenga et al., 2016). This is used to determine average transport distance (CSIR, 2013) and to make various assumptions on the freight transport performed by different truck classes. These assumptions are based on the fact that larger vehicles are used to transport freight on major "corridors", while urban freight is transported using lighter vehicles. References: INFRAS (2017) Handbook Emission Factors for Road Transport (HBEFA) 3.4. INFRAS, Bern, Switzerland; Kannemeyer, L. (2016) South African Road Network Condition, Needs and Funding, South African National Roads Agency (SANRAL): Pretoria, SA.; DoT (2018) National Freight Databank. Pretoria, SA: Department of Transport.; du Plessis, H., Visser, A. & Curtayne, P. (1990) Fuel consumption of vehicles as affected by road-surface characteristics. ASTM Special Publication.; PBS-SA (2015) SANRAL Historic Traffic Data, PBS-SA.; Havenga, J. and Pienaar, W. (2012) The creation and application of a national freight flow model for South Africa, Journal of the South African Institute of Civil Engineering, 54(1), pp. 2-13.; eNaTIS (2018) Vehicle population statistics for December 2017/January 2018, Electronic National Administration Traffic Information System (eNaTIS): Pretoria, SA.; ERC (2015) South African TIMES Model (SATIM) Energy Research Centre - University of Cape Town: Cape Town, SA.; DoT (2009) National Transport Master Plan: The Implications of Global Oil Depletion for Transport Systems in South Africa, Department of Transport: Pretoria, SA.; Thambiran, T. and Diab, R. (2011) Air pollution and climate change co-benefit opportunities in the road transport sector in Durban, South Africa, Atmospheric Environment, 45(16), pp. 2683-2689.; Nare, H. and Kamakate, F. (2017) Developing a roadmap for the adoption of clean fuel and vehicle standards in Southern and Western Africa, International Council on Clean Transportation: Washington, USA.; SAPIA (2015) Cleaner fuels II. Johannesburg, SA: South African Petroleum Industry Association.; Arrive Alive (2018) Speed Limits And The Law. Pretoria, SA: Arrive Alive.; Business Tech (2016) Transport department signs off on new speed limit: Business tech.; Havenga, J., Simpson, Z., King, D., de Bod, A. and Braun, M. (2016) Logistics Barometer South Africa 2016, Stellenbosch University: Stellenbosch, SA.; CSIR (2013) 10th Annual State of Logistics Survey for South Africa, Council for Scientific and Industrial Research (CSIR): Pretoria, SA.; DoE (2017) Overview of the Petrol and Diesel Market in South Africa between 2007 and 2016, Department of Energy: Pretoria, SA.
  properties: carbon content, fossil 0.865, dry mass 1 kg, heating value, net 42.8 MJ, wet mass 1 kg
- lorry, 16 metric ton: 4.74834e-7 unit; lognormal variance with pedigree 0.384, pedigree (3,1,5,5,4)
  Calculated value for the demand of a 16 metric ton lorry to fulfill one tonne.km of freight transport. Calculation based on the lifetime kilometric performance of a HCV (540,000 km) (Spielmann et al., 2007) and the average freight load (3.9 tonne) of a 3.5-7.5 metric ton lorry in South Africa. The average freight load is calculated from SATIM model data (ERC, 2015), weighted to account for the current commercial vehicle fleet (eNaTIS, 2017). The 16 metric ton lorry production dataset accounts for the production of a 6.8 net tonne lorry, which most closely matches the 3.2 tonne net weight of a 3.5-7.5 metric ton lorry in South Africa (ERC, 2015; eNaTIS, 2017; DoT, 2009). References: Spielmann, M., Bauer, C., Dones, R. & Tuchschmid, M. (2007) Transport Services Data v2.0. ecoinvent association. Zurich, Switzerland.; eNaTIS (2018) Vehicle population statistics for December 2017/January 2018, Electronic National Administration Traffic Information System (eNaTIS): Pretoria, SA.; ERC (2015) South African TIMES Model (SATIM) Energy Research Centre - University of Cape Town: Cape Town, SA.; DoT (2009) National Transport Master Plan: The Implications of Global Oil Depletion for Transport Systems in South Africa, Department of Transport: Pretoria, SA
- maintenance, lorry 16 metric ton: 4.74834e-7 unit; lognormal variance with pedigree 0.352, pedigree (3,1,5,5,3)
  (same comment as for lorry, 16 metric ton)
- petrol, unleaded: 0.000676683 kg; lognormal variance with pedigree 0.0032, pedigree (2,1,3,1,1)
  Petrol use per tonne.km is calculated using HBEFA 3.4 (INFRAS, 2017) modelling data and current South Africa road infrastructure, commercial vehicle fleet and road freight data. The road infrastructure data is based on the total length of paved and unpaved roads (Kannemeyer, 2016), pavement condition of national and provincial roads (Kannemeyer, 2016), road gradients (calculated from DoT (2018) data) and prevailing traffic flow (PBS-SA, 2015; Havenga & Pienaar, 2012). Changes in fuel use due to pavement type and condition are calculated according to du Plessis et al. (1990). The commercial vehicle fleet is based on total vehicle fleet data for 2017 (eNaTIS, 2017) and SATIM model data (ERC, 2015), which includes data on the breakdown of the vehicle fleet into size classes, average freight payloads, annual mileage, annual mileage decay, historic sales and scrapping factors. Freight payloads account for 51% and 55% of gross vehicle weights (GVW) for light commercial vehicles (LVC) and heavy commercial vehicles respectively in South Africa (DoT, 2009), which is used to correlate the average freight payloads with the GVW categories in ecoinvent. Commercial vehicles are split into relevant emission classes based on Thambiran & Diab (2011) and the fact that all vehicles sold since 2006 have been of a Euro2 standard (Nare & Kamakate, 2017; SAPIA, 2015). Maximum vehicle speeds are determined from road legislation (ArriveAlive, 2018) and vehicle legislation (Business Tech, 2016). Road freight data is calculated from the commercial vehicle fleet and SATIM data. This road freight is split into categories (major "corridor" freight, rural and urban) based on previous road freight studies (Havenga et al., 2016). This is used to determine average transport distance (CSIR, 2013) and to make various assumptions on the freight transport performed by different truck classes. These assumptions are based on the fact that larger vehicles are used to transport freight on major "corridors", while urban freight is transported using lighter vehicles. References: INFRAS (2017) Handbook Emission Factors for Road Transport (HBEFA) 3.4. INFRAS, Bern, Switzerland; Kannemeyer, L. (2016) South African Road Network Condition, Needs and Funding, South African National Roads Agency (SANRAL): Pretoria, SA.; DoT (2018) National Freight Databank. Pretoria, SA: Department of Transport.; du Plessis, H., Visser, A. & Curtayne, P. (1990) Fuel consumption of vehicles as affected by road-surface characteristics. ASTM Special Publication.; PBS-SA (2015) SANRAL Historic Traffic Data, PBS-SA.; Havenga, J. and Pienaar, W. (2012) The creation and application of a national freight flow model for South Africa, Journal of the South African Institute of Civil Engineering, 54(1), pp. 2-13.; eNaTIS (2018) Vehicle population statistics for December 2017/January 2018, Electronic National Administration Traffic Information System (eNaTIS): Pretoria, SA.; ERC (2015) South African TIMES Model (SATIM) Energy Research Centre - University of Cape Town: Cape Town, SA.; DoT (2009) National Transport Master Plan: The Implications of Global Oil Depletion for Transport Systems in South Africa, Department of Transport: Pretoria, SA.; Thambiran, T. and Diab, R. (2011) Air pollution and climate change co-benefit opportunities in the road transport sector in Durban, South Africa, Atmospheric Environment, 45(16), pp. 2683-2689.; Nare, H. and Kamakate, F. (2017) Developing a roadmap for the adoption of clean fuel and vehicle standards in Southern and Western Africa, International Council on Clean Transportation: Washington, USA.; SAPIA (2015) Cleaner fuels II. Johannesburg, SA: South African Petroleum Industry Association.; Arrive Alive (2018) Speed Limits And The Law. Pretoria, SA: Arrive Alive.; Business Tech (2016) Transport department signs off on new speed limit: Business tech.; Havenga, J., Simpson, Z., King, D., de Bod, A. and Braun, M. (2016) Logistics Barometer South Africa 2016, Stellenbosch University: Stellenbosch, SA.; CSIR (2013) 10th Annual State of Logistics Survey for South Africa, Council for Scientific and Industrial Research (CSIR): Pretoria, SA.
  properties: carbon content, fossil 0.865, dry mass 1 kg, heating value, net 43.2 MJ, wet mass 1 kg
  note on heating value, net: Assumed equal to "petroleum". LHV for petroleum: Based on literature, page 7, Report6, part 4
- road: 0.0017154 m*year; lognormal variance with pedigree 0.352, pedigree (3,1,5,5,3)
  EcoSpold01Location=CH
  Calculated value for the demand of road infrastructure construction, maintenance and disposal to fulfill one tonne.km of freight transport. Calculation based on the total tonne.kms of all vehicles on South African roads and the relative shares, weighted according to gross tonne.kms, of each vehicle type. Net transport performance is calculated from the current South African vehicle fleet (eNaTIS, 2017) and SATIM model annual mileage and average loading data (ERC, 2015). Net vehicle weights for freight vehicles are calculated from average load data (ERC, 2015; eNaTIS, 2017) and the percentage (51% for LCV and 55% for HCV) of a vehicles gross weight due to freight in South Africa (DoT, 2009). Net vehicle weights for passenger vehicles are taken from Spielmann et al. (2007) and from Toyota Hi-Ace data for minibus taxis (Toyota, 2018). Gross vehicle masses are calculated as the sum of net vehicle masses and loadings and used to calculate the total gross tonne.kms per vehicle type. Gross tonne.kms are used to estimate the demand of the total road network kilometers (Kannemeyer, 2016) for each vehicle type. References: Kannemeyer, L. (2016) South African Road Network Condition, Needs and Funding, South African National Roads Agency (SANRAL): Pretoria, SA.; eNaTIS (2018) Vehicle population statistics for December 2017/January 2018, Electronic National Administration Traffic Information System (eNaTIS): Pretoria, SA.; ERC (2015) South African TIMES Model (SATIM) Energy Research Centre - University of Cape Town: Cape Town, SA.; DoT (2009) National Transport Master Plan: The Implications of Global Oil Depletion for Transport Systems in South Africa, Department of Transport: Pretoria, SA.; Spielmann, M., Bauer, C., Dones, R. & Tuchschmid, M. (2007) Transport Services Data v2.0. ecoinvent association. Zurich, Switzerland.; Toyota (2018) 75 Years of Toyota - Vehicle Lineage: Hiace. Available at: http://www.toyota-global.com/company/history_of_toyota/75years/vehicle_lineage/car/id60001935/index.html.
- road maintenance: 0.000825373 m*year; lognormal variance with pedigree 0.352, pedigree (3,1,5,5,3)
  Calculated value for the demand of road operation and maintenance (lighting, weed control, line marking etc.) to fulfill one tonne.km of freight transport. Calculation based on the total tonne.kms of all vehicles on South African roads and the relative shares, weighted according to vehicle.kms, of each vehicle type. Net transport performance is calculated from the current South African vehicle fleet (eNaTIS, 2017) and SATIM model annual mileage and average loading data (ERC, 2015). Total vehicle kilometers are used to estimate the demand of the total road network kilometers (Kannemeyer, 2016) for each vehicle type. References: Kannemeyer, L. (2016) South African Road Network Condition, Needs and Funding, South African National Roads Agency (SANRAL): Pretoria, SA.; eNaTIS (2018) Vehicle population statistics for December 2017/January 2018, Electronic National Administration Traffic Information System (eNaTIS): Pretoria, SA.; ERC (2015) South African TIMES Model (SATIM) Energy Research Centre - University of Cape Town: Cape Town, SA.
- road wear emissions, lorry: -1.27273e-5 kg; name road_wear; source Ntziachristos, L. 2013; lognormal variance with pedigree 0.0035, pedigree (2,2,2,5,1)
  Wear emissions are calaculated from the road wear emissions per GVW (7E-9 kg / kg GVW*km) presented in "treatment of road wear emissions, lorry, GLO, 2013" dataset. The dataset uses wear emissions for lorries from EMEP/EEA (2013), scaled based on average gross vehicle weight and average freight load factor. The average load factor of a 3.5-7.5 metric ton lorry is 3.9 tonnes (calculated from SATIM model (ERC, 2015)), while the average gross vehicle mass (GVW) is 7.1 tonnes (calculated from load factor and data that freight accounts for 55% of GVW in heavy commercial vehicles (DoT, 2009)). Reference: Ntziachristos, L., Samaras, Z., Kouridis, C., Hassel, D., McCrae, I., Hickman, J., Zierock, K-H., Keller, M., Andre, M., Winther, M., Gorissen, N., Boulter, P., Katsis, P., Joumard, R., Rijkeboer, R., Geivanidis, S., Hausberger, S. (2013) Exhaust emissions from road transport, EMEP/EEA air pollutant emission inventory guidebook 2013, Copenhagen, European Commission.; ERC (2015) South African TIMES Model (SATIM) Energy Research Centre - University of Cape Town: Cape Town, SA.; DoT (2009) National Transport Master Plan: The Implications of Global Oil Depletion for Transport Systems in South Africa. Department of Transport. Pretoria, SA.
  production volume; = (road_wear/1)*PV
    Calculated from production volume of reference product using the relative outputs.
  properties: carbon content, fossil 0.75, dry mass 1 kg, wet mass 1 kg
  note on carbon content, fossil: The amount of carbon released due to road wear is not given in theEmissions Inventory Guidebook (Ntziachristos et al., 2013). For road wear there are no individual substances reported. Here we assume that 75% of the particle emissions are carbon, fossil in their nature due to the bitumen road surfacing.
- tyre wear emissions, lorry: -0.000146455 kg; name tyre_wear; source Ntziachristos, L. 2013; lognormal variance with pedigree 0.0035, pedigree (2,2,2,5,1)
  Wear emissions are calaculated from the lorry tyre wear emissions per GVW (8.055E-8 kg / kg GVW*km) presented in "treatment of tyre wear emissions, lorry, GLO, 2013" dataset. The dataset uses wear emissions for lorries from EMEP/EEA (2013), scaled based on average gross vehicle weight and average freight load factor. The average load factor of a 3.5-7.5 metric ton lorry is 3.9 tonnes (calculated from SATIM model (ERC, 2015)), while the average gross vehicle mass (GVW) is 7.1 tonnes (calculated from load factor and data that freight accounts for 55% of GVW in heavy commercial vehicles (DoT, 2009)). Reference: Ntziachristos, L., Samaras, Z., Kouridis, C., Hassel, D., McCrae, I., Hickman, J., Zierock, K-H., Keller, M., Andre, M., Winther, M., Gorissen, N., Boulter, P., Katsis, P., Joumard, R., Rijkeboer, R., Geivanidis, S., Hausberger, S. (2013) Exhaust emissions from road transport, EMEP/EEA air pollutant emission inventory guidebook 2013, Copenhagen, European Commission.; ERC (2015) South African TIMES Model (SATIM) Energy Research Centre - University of Cape Town: Cape Town, SA.; DoT (2009) National Transport Master Plan: The Implications of Global Oil Depletion for Transport Systems in South Africa. Department of Transport. Pretoria, SA.
  production volume; = (tyre_wear/1)*PV
    Calculated from production volume of reference product using the relative outputs.
  properties: carbon content, fossil 0.675, dry mass 1 kg, wet mass 1 kg

## Emissions to nature
- Ammonia [air, unspecified]: 7.69231e-7 kg; source Keller, M. 2010; lognormal variance with pedigree 0.0427, pedigree (2,2,3,1,1)
  Ammonia emissions per tonne.km is calculated using HBEFA 3.4 (INFRAS, 2017) modelling data and current South Africa road infrastructure, commercial vehicle fleet and road freight data. The road infrastructure data is based on the total length of paved and unpaved roads (Kannemeyer, 2016), pavement condition of national and provincial roads (Kannemeyer, 2016), road gradients (calculated from DoT (2018) data) and prevailing traffic flow (PBS-SA, 2015; Havenga & Pienaar, 2012). The commercial vehicle fleet is based on total vehicle fleet data for 2017 (eNaTIS, 2017) and SATIM model data (ERC, 2015), which includes data on the breakdown of the vehicle fleet into size classes, average freight payloads, annual mileage, annual mileage decay, historic sales and scrapping factors. Freight payloads account for 51% and 55% of gross vehicle weights (GVW) for light commercial vehicles (LVC) and heavy commercial vehicles respectively in South Africa (DoT, 2009), which is used to correlate the average freight payloads with the GVW categories in ecoinvent. Commercial vehicles are split into relevant emission classes based on Thambiran & Diab (2011) and the fact that all vehicles sold since 2006 have been of a Euro2 standard (Nare & Kamakate, 2017; SAPIA, 2015). Maximum vehicle speeds are determined from road legislation (ArriveAlive, 2018) and vehicle legislation (Business Tech, 2016). Road freight data is calculated from the commercial vehicle fleet and SATIM data. This road freight is split into categories (major "corridor" freight, rural and urban) based on previous road freight studies (Havenga et al., 2016). This is used to determine average transport distance (CSIR, 2013) and to make various assumptions on the freight transport performed by different truck classes. These assumptions are based on the fact that larger vehicles are used to transport freight on major "corridors", while urban freight is transported using lighter vehicles. References: INFRAS (2017) Handbook Emission Factors for Road Transport (HBEFA) 3.4. INFRAS, Bern, Switzerland; Kannemeyer, L. (2016) South African Road Network Condition, Needs and Funding, South African National Roads Agency (SANRAL): Pretoria, SA.; DoT (2018) National Freight Databank. Pretoria, SA: Department of Transport.; PBS-SA (2015) SANRAL Historic Traffic Data, PBS-SA.; Havenga, J. and Pienaar, W. (2012) The creation and application of a national freight flow model for South Africa, Journal of the South African Institute of Civil Engineering, 54(1), pp. 2-13.; eNaTIS (2018) Vehicle population statistics for December 2017/January 2018, Electronic National Administration Traffic Information System (eNaTIS): Pretoria, SA.; ERC (2015) South African TIMES Model (SATIM) Energy Research Centre - University of Cape Town: Cape Town, SA.; DoT (2009) National Transport Master Plan: The Implications of Global Oil Depletion for Transport Systems in South Africa, Department of Transport: Pretoria, SA.; Thambiran, T. and Diab, R. (2011) Air pollution and climate change co-benefit opportunities in the road transport sector in Durban, South Africa, Atmospheric Environment, 45(16), pp. 2683-2689.; Nare, H. and Kamakate, F. (2017) Developing a roadmap for the adoption of clean fuel and vehicle standards in Southern and Western Africa, International Council on Clean Transportation: Washington, USA.; SAPIA (2015) Cleaner fuels II. Johannesburg, SA: South African Petroleum Industry Association.; Arrive Alive (2018) Speed Limits And The Law. Pretoria, SA: Arrive Alive.; Business Tech (2016) Transport department signs off on new speed limit: Business tech.; Havenga, J., Simpson, Z., King, D., de Bod, A. and Braun, M. (2016) Logistics Barometer South Africa 2016, Stellenbosch University: Stellenbosch, SA.; CSIR (2013) 10th Annual State of Logistics Survey for South Africa, Council for Scientific and Industrial Research (CSIR): Pretoria, SA.
- Arsenic ion [air, unspecified]: 3.67388e-12 kg; source Ntziachristos, L. 2013; lognormal variance with pedigree 0.6927, pedigree (2,2,5,5,1)
  Extrapolated from the "transport, freight, lorry 3.5-7.5 metric ton, EURO3, GLO, 2013" dataset using diesel consumption and the "transport, passenger car, large size, petrol, EURO3, GLO, 2012" dataset using petrol consumption (i.e. the emissions from diesel and petrol consumption are extrapolated separately and summed together). The global lorry dataset uses a literature value from EMEP/EEA (2013), while the global passenger car dataset uses literature values from Europe. Reference: Ntziachristos, L., Samaras, Z., Kouridis, C., Hassel, D., McCrae, I., Hickman, J., Zierock, K-H., Keller, M., Andre, M., Winther, M., Gorissen, N., Boulter, P., Katsis, P., Joumard, R., Rijkeboer, R., Geivanidis, S., Hausberger, S. (2013) Exhaust emissions from road transport, EMEP/EEA air pollutant emission inventory guidebook 2013, Copenhagen, European Commission..
- Benzene [air, unspecified]: 6.40264e-6 kg; lognormal variance with pedigree 0.0427, pedigree (2,2,3,1,1)
  Benzene emissions per tonne.km is calculated using HBEFA 3.4 (INFRAS, 2017) modelling data and current South Africa road infrastructure, commercial vehicle fleet and road freight data. The road infrastructure data is based on the total length of paved and unpaved roads (Kannemeyer, 2016), pavement condition of national and provincial roads (Kannemeyer, 2016), road gradients (calculated from DoT (2018) data) and prevailing traffic flow (PBS-SA, 2015; Havenga & Pienaar, 2012). The commercial vehicle fleet is based on total vehicle fleet data for 2017 (eNaTIS, 2017) and SATIM model data (ERC, 2015), which includes data on the breakdown of the vehicle fleet into size classes, average freight payloads, annual mileage, annual mileage decay, historic sales and scrapping factors. Freight payloads account for 51% and 55% of gross vehicle weights (GVW) for light commercial vehicles (LVC) and heavy commercial vehicles respectively in South Africa (DoT, 2009), which is used to correlate the average freight payloads with the GVW categories in ecoinvent. Currently the average GVW of commercial vehicles are: LVC - 1.96 tonnes; 3.5-7.5 metric ton - 7.09 tonnes; 7.5-16 metric ton - 13.15 tonnes; 16-32 metric ton - 23.47 tonnes; >32 metric ton - 38.05 tonnes. Commercial vehicles are split into relevant emission classes based on Thambiran & Diab (2011) and the fact that all vehicles sold since 2006 have been of a Euro2 standard (Nare & Kamakate, 2017; SAPIA, 2015). Maximum vehicle speeds are determined from road legislation (ArriveAlive, 2018) and vehicle legislation (Business Tech, 2016). Road freight data is calculated from the commercial vehicle fleet and SATIM data. This road freight is split into categories (major "corridor" freight, rural and urban) based on previous road freight studies (Havenga et al., 2016). This is used to determine average transport distance (CSIR, 2013) and to make various assumptions on the freight transport performed by different truck classes. These assumptions are based on the fact that larger vehicles are used to transport freight on major "corridors", while urban freight is transported using lighter vehicles. References: INFRAS (2017) Handbook Emission Factors for Road Transport (HBEFA) 3.4. INFRAS, Bern, Switzerland; Kannemeyer, L. (2016) South African Road Network Condition, Needs and Funding, South African National Roads Agency (SANRAL): Pretoria, SA.; DoT (2018) National Freight Databank. Pretoria, SA: Department of Transport.; PBS-SA (2015) SANRAL Historic Traffic Data, PBS-SA.; Havenga, J. and Pienaar, W. (2012) The creation and application of a national freight flow model for South Africa, Journal of the South African Institute of Civil Engineering, 54(1), pp. 2-13.; eNaTIS (2018) Vehicle population statistics for December 2017/January 2018, Electronic National Administration Traffic Information System (eNaTIS): Pretoria, SA.; ERC (2015) South African TIMES Model (SATIM) Energy Research Centre - University of Cape Town: Cape Town, SA.; DoT (2009) National Transport Master Plan: The Implications of Global Oil Depletion for Transport Systems in South Africa, Department of Transport: Pretoria, SA.; Thambiran, T. and Diab, R. (2011) Air pollution and climate change co-benefit opportunities in the road transport sector in Durban, South Africa, Atmospheric Environment, 45(16), pp. 2683-2689.; Nare, H. and Kamakate, F. (2017) Developing a roadmap for the adoption of clean fuel and vehicle standards in Southern and Western Africa, International Council on Clean Transportation: Washington, USA.; SAPIA (2015) Cleaner fuels II. Johannesburg, SA: South African Petroleum Industry Association.; Arrive Alive (2018) Speed Limits And The Law. Pretoria, SA: Arrive Alive.; Business Tech (2016) Transport department signs off on new speed limit: Business tech.; Havenga, J., Simpson, Z., King, D., de Bod, A. and Braun, M. (2016) Logistics Barometer South Africa 2016, Stellenbosch University: Stellenbosch, SA.; CSIR (2013) 10th Annual State of Logistics Survey for South Africa, Council for Scientific and Industrial Research (CSIR): Pretoria, SA.
- Cadmium II [air, unspecified]: 3.26394e-10 kg; source Ntziachristos, L. 2013; lognormal variance with pedigree 0.6927, pedigree (2,2,5,5,1)
  Extrapolated from the "transport, freight, lorry 3.5-7.5 metric ton, EURO3, GLO, 2013" dataset using diesel consumption and the "transport, passenger car, large size, petrol, EURO3, GLO, 2012" dataset using petrol consumption (i.e. the emissions from diesel and petrol consumption are extrapolated separately and summed together). The global lorry dataset uses a literature value from EMEP/EEA (2013), while the global passenger car dataset uses literature values from Europe. Reference: Ntziachristos, L., Samaras, Z., Kouridis, C., Hassel, D., McCrae, I., Hickman, J., Zierock, K-H., Keller, M., Andre, M., Winther, M., Gorissen, N., Boulter, P., Katsis, P., Joumard, R., Rijkeboer, R., Geivanidis, S., Hausberger, S. (2013) Exhaust emissions from road transport, EMEP/EEA air pollutant emission inventory guidebook 2013, Copenhagen, European Commission.
- Carbon dioxide, fossil [air, unspecified]: 0.118143 kg; lognormal variance with pedigree 0.0033, pedigree (2,2,3,1,1)
  Carbon dioxide emissions per tonne.km is calculated from fuel use and the carbon content of fuels (86.1% and 87% for diesel and petrol respectively) (INFRAS, 2017). Fuel use per tonne.km is calculated using HBEFA 3.4 (INFRAS, 2017) modelling data and current South Africa road infrastructure, commercial vehicle fleet and road freight data. The road infrastructure data is based on the total length of paved and unpaved roads (Kannemeyer, 2016), pavement condition of national and provincial roads (Kannemeyer, 2016), road gradients (calculated from DoT (2018) data) and prevailing traffic flow (PBS-SA, 2015; Havenga & Pienaar, 2012). Changes in fuel use due to pavement type and condition are calculated according to du Plessis et al. (1990). The commercial vehicle fleet is based on total vehicle fleet data for 2017 (eNaTIS, 2017) and SATIM model data (ERC, 2015), which includes data on the breakdown of the vehicle fleet into size classes, average freight payloads, annual mileage, annual mileage decay, historic sales and scrapping factors. Freight payloads account for 51% and 55% of gross vehicle weights (GVW) for light commercial vehicles (LVC) and heavy commercial vehicles respectively in South Africa (DoT, 2009), which is used to correlate the average freight payloads with the GVW categories in ecoinvent. Commercial vehicles are split into relevant emission classes based on Thambiran & Diab (2011) and the fact that all vehicles sold since 2006 have been of a Euro2 standard (Nare & Kamakate, 2017; SAPIA, 2015). Maximum vehicle speeds are determined from road legislation (ArriveAlive, 2018) and vehicle legislation (Business Tech, 2016). Road freight data is calculated from the commercial vehicle fleet and SATIM data. This road freight is split into categories (major "corridor" freight, rural and urban) based on previous road freight studies (Havenga et al., 2016). This is used to determine average transport distance (CSIR, 2013) and to make various assumptions on the freight transport performed by different truck classes. These assumptions are based on the fact that larger vehicles are used to transport freight on major "corridors", while urban freight is transported using lighter vehicles. References: INFRAS (2017) Handbook Emission Factors for Road Transport (HBEFA) 3.4. INFRAS, Bern, Switzerland; Kannemeyer, L. (2016) South African Road Network Condition, Needs and Funding, South African National Roads Agency (SANRAL): Pretoria, SA.; DoT (2018) National Freight Databank. Pretoria, SA: Department of Transport.; du Plessis, H., Visser, A. & Curtayne, P. (1990) Fuel consumption of vehicles as affected by road-surface characteristics. ASTM Special Publication.; PBS-SA (2015) SANRAL Historic Traffic Data, PBS-SA.; Havenga, J. and Pienaar, W. (2012) The creation and application of a national freight flow model for South Africa, Journal of the South African Institute of Civil Engineering, 54(1), pp. 2-13.; eNaTIS (2018) Vehicle population statistics for December 2017/January 2018, Electronic National Administration Traffic Information System (eNaTIS): Pretoria, SA.; ERC (2015) South African TIMES Model (SATIM) Energy Research Centre - University of Cape Town: Cape Town, SA.; DoT (2009) National Transport Master Plan: The Implications of Global Oil Depletion for Transport Systems in South Africa, Department of Transport: Pretoria, SA.; Thambiran, T. and Diab, R. (2011) Air pollution and climate change co-benefit opportunities in the road transport sector in Durban, South Africa, Atmospheric Environment, 45(16), pp. 2683-2689.; Nare, H. and Kamakate, F. (2017) Developing a roadmap for the adoption of clean fuel and vehicle standards in Southern and Western Africa, International Council on Clean Transportation: Washington, USA.; SAPIA (2015) Cleaner fuels II. Johannesburg, SA: South African Petroleum Industry Association.; Arrive Alive (2018) Speed Limits And The Law. Pretoria, SA: Arrive Alive.; Business Tech (2016) Transport department signs off on new speed limit: Business tech.; Havenga, J., Simpson, Z., King, D., de Bod, A. and Braun, M. (2016) Logistics Barometer South Africa 2016, Stellenbosch University: Stellenbosch, SA.; CSIR (2013) 10th Annual State of Logistics Survey for South Africa, Council for Scientific and Industrial Research (CSIR): Pretoria, SA.
- Carbon monoxide, fossil [air, unspecified]: 0.000584424 kg; lognormal variance with pedigree 0.6527, pedigree (2,2,3,1,1)
  Carbon monoxide emissions per tonne.km is calculated using HBEFA 3.4 (INFRAS, 2017) modelling data and current South Africa road infrastructure, commercial vehicle fleet and road freight data. The road infrastructure data is based on the total length of paved and unpaved roads (Kannemeyer, 2016), pavement condition of national and provincial roads (Kannemeyer, 2016), road gradients (calculated from DoT (2018) data) and prevailing traffic flow (PBS-SA, 2015; Havenga & Pienaar, 2012). The commercial vehicle fleet is based on total vehicle fleet data for 2017 (eNaTIS, 2017) and SATIM model data (ERC, 2015), which includes data on the breakdown of the vehicle fleet into size classes, average freight payloads, annual mileage, annual mileage decay, historic sales and scrapping factors. Freight payloads account for 51% and 55% of gross vehicle weights (GVW) for light commercial vehicles (LVC) and heavy commercial vehicles respectively in South Africa (DoT, 2009), which is used to correlate the average freight payloads with the GVW categories in ecoinvent. Commercial vehicles are split into relevant emission classes based on Thambiran & Diab (2011) and the fact that all vehicles sold since 2006 have been of a Euro2 standard (Nare & Kamakate, 2017; SAPIA, 2015). Maximum vehicle speeds are determined from road legislation (ArriveAlive, 2018) and vehicle legislation (Business Tech, 2016). Road freight data is calculated from the commercial vehicle fleet and SATIM data. This road freight is split into categories (major "corridor" freight, rural and urban) based on previous road freight studies (Havenga et al., 2016). This is used to determine average transport distance (CSIR, 2013) and to make various assumptions on the freight transport performed by different truck classes. These assumptions are based on the fact that larger vehicles are used to transport freight on major "corridors", while urban freight is transported using lighter vehicles. References: INFRAS (2017) Handbook Emission Factors for Road Transport (HBEFA) 3.4. INFRAS, Bern, Switzerland; Kannemeyer, L. (2016) South African Road Network Condition, Needs and Funding, South African National Roads Agency (SANRAL): Pretoria, SA.; DoT (2018) National Freight Databank. Pretoria, SA: Department of Transport.; PBS-SA (2015) SANRAL Historic Traffic Data, PBS-SA.; Havenga, J. and Pienaar, W. (2012) The creation and application of a national freight flow model for South Africa, Journal of the South African Institute of Civil Engineering, 54(1), pp. 2-13.; eNaTIS (2018) Vehicle population statistics for December 2017/January 2018, Electronic National Administration Traffic Information System (eNaTIS): Pretoria, SA.; ERC (2015) South African TIMES Model (SATIM) Energy Research Centre - University of Cape Town: Cape Town, SA.; DoT (2009) National Transport Master Plan: The Implications of Global Oil Depletion for Transport Systems in South Africa, Department of Transport: Pretoria, SA.; Thambiran, T. and Diab, R. (2011) Air pollution and climate change co-benefit opportunities in the road transport sector in Durban, South Africa, Atmospheric Environment, 45(16), pp. 2683-2689.; Nare, H. and Kamakate, F. (2017) Developing a roadmap for the adoption of clean fuel and vehicle standards in Southern and Western Africa, International Council on Clean Transportation: Washington, USA.; SAPIA (2015) Cleaner fuels II. Johannesburg, SA: South African Petroleum Industry Association.; Arrive Alive (2018) Speed Limits And The Law. Pretoria, SA: Arrive Alive.; Business Tech (2016) Transport department signs off on new speed limit: Business tech.; Havenga, J., Simpson, Z., King, D., de Bod, A. and Braun, M. (2016) Logistics Barometer South Africa 2016, Stellenbosch University: Stellenbosch, SA.; CSIR (2013) 10th Annual State of Logistics Survey for South Africa, Council for Scientific and Industrial Research (CSIR): Pretoria, SA.
- Chromium III [air, unspecified]: 1.13599e-9 kg; source Ntziachristos, L. 2013; lognormal variance with pedigree 0.6927, pedigree (2,2,5,5,1)
  (same comment as for Arsenic ion)
- Chromium VI [air, unspecified]: 2.27199e-12 kg; source Ntziachristos, L. 2013; lognormal variance with pedigree 0.6927, pedigree (2,2,5,5,1)
  (same comment as for Cadmium II)
- Copper ion [air, unspecified]: 1.92922e-9 kg; source Ntziachristos, L. 2013; lognormal variance with pedigree 0.6927, pedigree (2,2,5,5,1)
  (same comment as for Cadmium II)
- Dinitrogen monoxide [air, unspecified]: 1.31568e-6 kg; lognormal variance with pedigree 0.0427, pedigree (2,2,3,1,1)
  Dinitrogen monoxide emissions per tonne.km is calculated using HBEFA 3.4 (INFRAS, 2017) modelling data and current South Africa road infrastructure, commercial vehicle fleet and road freight data. The road infrastructure data is based on the total length of paved and unpaved roads (Kannemeyer, 2016), pavement condition of national and provincial roads (Kannemeyer, 2016), road gradients (calculated from DoT (2018) data) and prevailing traffic flow (PBS-SA, 2015; Havenga & Pienaar, 2012). The commercial vehicle fleet is based on total vehicle fleet data for 2017 (eNaTIS, 2017) and SATIM model data (ERC, 2015), which includes data on the breakdown of the vehicle fleet into size classes, average freight payloads, annual mileage, annual mileage decay, historic sales and scrapping factors. Freight payloads account for 51% and 55% of gross vehicle weights (GVW) for light commercial vehicles (LVC) and heavy commercial vehicles respectively in South Africa (DoT, 2009), which is used to correlate the average freight payloads with the GVW categories in ecoinvent. Commercial vehicles are split into relevant emission classes based on Thambiran & Diab (2011) and the fact that all vehicles sold since 2006 have been of a Euro2 standard (Nare & Kamakate, 2017; SAPIA, 2015). Maximum vehicle speeds are determined from road legislation (ArriveAlive, 2018) and vehicle legislation (Business Tech, 2016). Road freight data is calculated from the commercial vehicle fleet and SATIM data. This road freight is split into categories (major "corridor" freight, rural and urban) based on previous road freight studies (Havenga et al., 2016). This is used to determine average transport distance (CSIR, 2013) and to make various assumptions on the freight transport performed by different truck classes. These assumptions are based on the fact that larger vehicles are used to transport freight on major "corridors", while urban freight is transported using lighter vehicles. References: INFRAS (2017) Handbook Emission Factors for Road Transport (HBEFA) 3.4. INFRAS, Bern, Switzerland; Kannemeyer, L. (2016) South African Road Network Condition, Needs and Funding, South African National Roads Agency (SANRAL): Pretoria, SA.; DoT (2018) National Freight Databank. Pretoria, SA: Department of Transport.; PBS-SA (2015) SANRAL Historic Traffic Data, PBS-SA.; Havenga, J. and Pienaar, W. (2012) The creation and application of a national freight flow model for South Africa, Journal of the South African Institute of Civil Engineering, 54(1), pp. 2-13.; eNaTIS (2018) Vehicle population statistics for December 2017/January 2018, Electronic National Administration Traffic Information System (eNaTIS): Pretoria, SA.; ERC (2015) South African TIMES Model (SATIM) Energy Research Centre - University of Cape Town: Cape Town, SA.; DoT (2009) National Transport Master Plan: The Implications of Global Oil Depletion for Transport Systems in South Africa, Department of Transport: Pretoria, SA.; Thambiran, T. and Diab, R. (2011) Air pollution and climate change co-benefit opportunities in the road transport sector in Durban, South Africa, Atmospheric Environment, 45(16), pp. 2683-2689.; Nare, H. and Kamakate, F. (2017) Developing a roadmap for the adoption of clean fuel and vehicle standards in Southern and Western Africa, International Council on Clean Transportation: Washington, USA.; SAPIA (2015) Cleaner fuels II. Johannesburg, SA: South African Petroleum Industry Association.; Arrive Alive (2018) Speed Limits And The Law. Pretoria, SA: Arrive Alive.; Business Tech (2016) Transport department signs off on new speed limit: Business tech.; Havenga, J., Simpson, Z., King, D., de Bod, A. and Braun, M. (2016) Logistics Barometer South Africa 2016, Stellenbosch University: Stellenbosch, SA.; CSIR (2013) 10th Annual State of Logistics Survey for South Africa, Council for Scientific and Industrial Research (CSIR): Pretoria, SA.
- Lead II [air, unspecified]: 6.36183e-10 kg; lognormal variance with pedigree 0.6527, pedigree (2,2,3,1,1)
  Lead emissions per tonne.km is calculated using HBEFA 3.4 (INFRAS, 2017) modelling data and current South Africa road infrastructure, commercial vehicle fleet and road freight data. The road infrastructure data is based on the total length of paved and unpaved roads (Kannemeyer, 2016), pavement condition of national and provincial roads (Kannemeyer, 2016), road gradients (calculated from DoT (2018) data) and prevailing traffic flow (PBS-SA, 2015; Havenga & Pienaar, 2012). The commercial vehicle fleet is based on total vehicle fleet data for 2017 (eNaTIS, 2017) and SATIM model data (ERC, 2015), which includes data on the breakdown of the vehicle fleet into size classes, average freight payloads, annual mileage, annual mileage decay, historic sales and scrapping factors. Freight payloads account for 51% and 55% of gross vehicle weights (GVW) for light commercial vehicles (LVC) and heavy commercial vehicles respectively in South Africa (DoT, 2009), which is used to correlate the average freight payloads with the GVW categories in ecoinvent. Commercial vehicles are split into relevant emission classes based on Thambiran & Diab (2011) and the fact that all vehicles sold since 2006 have been of a Euro2 standard (Nare & Kamakate, 2017; SAPIA, 2015). Maximum vehicle speeds are determined from road legislation (ArriveAlive, 2018) and vehicle legislation (Business Tech, 2016). Road freight data is calculated from the commercial vehicle fleet and SATIM data. This road freight is split into categories (major "corridor" freight, rural and urban) based on previous road freight studies (Havenga et al., 2016). This is used to determine average transport distance (CSIR, 2013) and to make various assumptions on the freight transport performed by different truck classes. These assumptions are based on the fact that larger vehicles are used to transport freight on major "corridors", while urban freight is transported using lighter vehicles. References: INFRAS (2017) Handbook Emission Factors for Road Transport (HBEFA) 3.4. INFRAS, Bern, Switzerland; Kannemeyer, L. (2016) South African Road Network Condition, Needs and Funding, South African National Roads Agency (SANRAL): Pretoria, SA.; DoT (2018) National Freight Databank. Pretoria, SA: Department of Transport.; PBS-SA (2015) SANRAL Historic Traffic Data, PBS-SA.; Havenga, J. and Pienaar, W. (2012) The creation and application of a national freight flow model for South Africa, Journal of the South African Institute of Civil Engineering, 54(1), pp. 2-13.; eNaTIS (2018) Vehicle population statistics for December 2017/January 2018, Electronic National Administration Traffic Information System (eNaTIS): Pretoria, SA.; ERC (2015) South African TIMES Model (SATIM) Energy Research Centre - University of Cape Town: Cape Town, SA.; DoT (2009) National Transport Master Plan: The Implications of Global Oil Depletion for Transport Systems in South Africa, Department of Transport: Pretoria, SA.; Thambiran, T. and Diab, R. (2011) Air pollution and climate change co-benefit opportunities in the road transport sector in Durban, South Africa, Atmospheric Environment, 45(16), pp. 2683-2689.; Nare, H. and Kamakate, F. (2017) Developing a roadmap for the adoption of clean fuel and vehicle standards in Southern and Western Africa, International Council on Clean Transportation: Washington, USA.; SAPIA (2015) Cleaner fuels II. Johannesburg, SA: South African Petroleum Industry Association.; Arrive Alive (2018) Speed Limits And The Law. Pretoria, SA: Arrive Alive.; Business Tech (2016) Transport department signs off on new speed limit: Business tech.; Havenga, J., Simpson, Z., King, D., de Bod, A. and Braun, M. (2016) Logistics Barometer South Africa 2016, Stellenbosch University: Stellenbosch, SA.; CSIR (2013) 10th Annual State of Logistics Survey for South Africa, Council for Scientific and Industrial Research (CSIR): Pretoria, SA.
- Mercury II [air, unspecified]: 1.94763e-10 kg; source Ntziachristos, L. 2013; lognormal variance with pedigree 0.7427, pedigree (2,2,5,5,1)
  (same comment as for Cadmium II)
- Methane, fossil [air, unspecified]: 8.72054e-6 kg; lognormal variance with pedigree 0.0427, pedigree (2,2,3,1,1)
  Methane emissions per tonne.km is calculated using HBEFA 3.4 (INFRAS, 2017) modelling data and current South Africa road infrastructure, commercial vehicle fleet and road freight data. The road infrastructure data is based on the total length of paved and unpaved roads (Kannemeyer, 2016), pavement condition of national and provincial roads (Kannemeyer, 2016), road gradients (calculated from DoT (2018) data) and prevailing traffic flow (PBS-SA, 2015; Havenga & Pienaar, 2012). The commercial vehicle fleet is based on total vehicle fleet data for 2017 (eNaTIS, 2017) and SATIM model data (ERC, 2015), which includes data on the breakdown of the vehicle fleet into size classes, average freight payloads, annual mileage, annual mileage decay, historic sales and scrapping factors. Freight payloads account for 51% and 55% of gross vehicle weights (GVW) for light commercial vehicles (LVC) and heavy commercial vehicles respectively in South Africa (DoT, 2009), which is used to correlate the average freight payloads with the GVW categories in ecoinvent. Commercial vehicles are split into relevant emission classes based on Thambiran & Diab (2011) and the fact that all vehicles sold since 2006 have been of a Euro2 standard (Nare & Kamakate, 2017; SAPIA, 2015). Maximum vehicle speeds are determined from road legislation (ArriveAlive, 2018) and vehicle legislation (Business Tech, 2016). Road freight data is calculated from the commercial vehicle fleet and SATIM data. This road freight is split into categories (major "corridor" freight, rural and urban) based on previous road freight studies (Havenga et al., 2016). This is used to determine average transport distance (CSIR, 2013) and to make various assumptions on the freight transport performed by different truck classes. These assumptions are based on the fact that larger vehicles are used to transport freight on major "corridors", while urban freight is transported using lighter vehicles. References: INFRAS (2017) Handbook Emission Factors for Road Transport (HBEFA) 3.4. INFRAS, Bern, Switzerland; Kannemeyer, L. (2016) South African Road Network Condition, Needs and Funding, South African National Roads Agency (SANRAL): Pretoria, SA.; DoT (2018) National Freight Databank. Pretoria, SA: Department of Transport.; PBS-SA (2015) SANRAL Historic Traffic Data, PBS-SA.; Havenga, J. and Pienaar, W. (2012) The creation and application of a national freight flow model for South Africa, Journal of the South African Institute of Civil Engineering, 54(1), pp. 2-13.; eNaTIS (2018) Vehicle population statistics for December 2017/January 2018, Electronic National Administration Traffic Information System (eNaTIS): Pretoria, SA.; ERC (2015) South African TIMES Model (SATIM) Energy Research Centre - University of Cape Town: Cape Town, SA.; DoT (2009) National Transport Master Plan: The Implications of Global Oil Depletion for Transport Systems in South Africa, Department of Transport: Pretoria, SA.; Thambiran, T. and Diab, R. (2011) Air pollution and climate change co-benefit opportunities in the road transport sector in Durban, South Africa, Atmospheric Environment, 45(16), pp. 2683-2689.; Nare, H. and Kamakate, F. (2017) Developing a roadmap for the adoption of clean fuel and vehicle standards in Southern and Western Africa, International Council on Clean Transportation: Washington, USA.; SAPIA (2015) Cleaner fuels II. Johannesburg, SA: South African Petroleum Industry Association.; Arrive Alive (2018) Speed Limits And The Law. Pretoria, SA: Arrive Alive.; Business Tech (2016) Transport department signs off on new speed limit: Business tech.; Havenga, J., Simpson, Z., King, D., de Bod, A. and Braun, M. (2016) Logistics Barometer South Africa 2016, Stellenbosch University: Stellenbosch, SA.; CSIR (2013) 10th Annual State of Logistics Survey for South Africa, Council for Scientific and Industrial Research (CSIR): Pretoria, SA.
- NMVOC, non-methane volatile organic compounds [air, unspecified]: 0.00034799 kg; lognormal variance with pedigree 0.0427, pedigree (2,2,3,1,1)
  NMVOC emissions per tonne.km is calculated using HBEFA 3.4 (INFRAS, 2017) modelling data and current South Africa road infrastructure, commercial vehicle fleet and road freight data. The road infrastructure data is based on the total length of paved and unpaved roads (Kannemeyer, 2016), pavement condition of national and provincial roads (Kannemeyer, 2016), road gradients (calculated from DoT (2018) data) and prevailing traffic flow (PBS-SA, 2015; Havenga & Pienaar, 2012). The commercial vehicle fleet is based on total vehicle fleet data for 2017 (eNaTIS, 2017) and SATIM model data (ERC, 2015), which includes data on the breakdown of the vehicle fleet into size classes, average freight payloads, annual mileage, annual mileage decay, historic sales and scrapping factors. Freight payloads account for 51% and 55% of gross vehicle weights (GVW) for light commercial vehicles (LVC) and heavy commercial vehicles respectively in South Africa (DoT, 2009), which is used to correlate the average freight payloads with the GVW categories in ecoinvent. Currently the average GVW of commercial vehicles are: LVC - 1.96 tonnes; 3.5-7.5 metric ton - 7.09 tonnes; 7.5-16 metric ton - 13.15 tonnes; 16-32 metric ton - 23.47 tonnes; >32 metric ton - 38.05 tonnes. Commercial vehicles are split into relevant emission classes based on Thambiran & Diab (2011) and the fact that all vehicles sold since 2006 have been of a Euro2 standard (Nare & Kamakate, 2017; SAPIA, 2015). Maximum vehicle speeds are determined from road legislation (ArriveAlive, 2018) and vehicle legislation (Business Tech, 2016). Road freight data is calculated from the commercial vehicle fleet and SATIM data. This road freight is split into categories (major "corridor" freight, rural and urban) based on previous road freight studies (Havenga et al., 2016). This is used to determine average transport distance (CSIR, 2013) and to make various assumptions on the freight transport performed by different truck classes. These assumptions are based on the fact that larger vehicles are used to transport freight on major "corridors", while urban freight is transported using lighter vehicles. References: INFRAS (2017) Handbook Emission Factors for Road Transport (HBEFA) 3.4. INFRAS, Bern, Switzerland; Kannemeyer, L. (2016) South African Road Network Condition, Needs and Funding, South African National Roads Agency (SANRAL): Pretoria, SA.; DoT (2018) National Freight Databank. Pretoria, SA: Department of Transport.; PBS-SA (2015) SANRAL Historic Traffic Data, PBS-SA.; Havenga, J. and Pienaar, W. (2012) The creation and application of a national freight flow model for South Africa, Journal of the South African Institute of Civil Engineering, 54(1), pp. 2-13.; eNaTIS (2018) Vehicle population statistics for December 2017/January 2018, Electronic National Administration Traffic Information System (eNaTIS): Pretoria, SA.; ERC (2015) South African TIMES Model (SATIM) Energy Research Centre - University of Cape Town: Cape Town, SA.; DoT (2009) National Transport Master Plan: The Implications of Global Oil Depletion for Transport Systems in South Africa, Department of Transport: Pretoria, SA.; Thambiran, T. and Diab, R. (2011) Air pollution and climate change co-benefit opportunities in the road transport sector in Durban, South Africa, Atmospheric Environment, 45(16), pp. 2683-2689.; Nare, H. and Kamakate, F. (2017) Developing a roadmap for the adoption of clean fuel and vehicle standards in Southern and Western Africa, International Council on Clean Transportation: Washington, USA.; SAPIA (2015) Cleaner fuels II. Johannesburg, SA: South African Petroleum Industry Association.; Arrive Alive (2018) Speed Limits And The Law. Pretoria, SA: Arrive Alive.; Business Tech (2016) Transport department signs off on new speed limit: Business tech.; Havenga, J., Simpson, Z., King, D., de Bod, A. and Braun, M. (2016) Logistics Barometer South Africa 2016, Stellenbosch University: Stellenbosch, SA.; CSIR (2013) 10th Annual State of Logistics Survey for South Africa, Council for Scientific and Industrial Research (CSIR): Pretoria, SA.
- Nickel II [air, unspecified]: 3.70668e-10 kg; source Ntziachristos, L. 2013; lognormal variance with pedigree 0.6927, pedigree (2,2,5,5,1)
  (same comment as for Arsenic ion)
- Nitrogen oxides [air, unspecified]: 0.00127888 kg; source Keller, M. 2010; lognormal variance with pedigree 0.0427, pedigree (2,2,3,1,1)
  NOx emissions per tonne.km is calculated using HBEFA 3.4 (INFRAS, 2017) modelling data and current South Africa road infrastructure, commercial vehicle fleet and road freight data. The road infrastructure data is based on the total length of paved and unpaved roads (Kannemeyer, 2016), pavement condition of national and provincial roads (Kannemeyer, 2016), road gradients (calculated from DoT (2018) data) and prevailing traffic flow (PBS-SA, 2015; Havenga & Pienaar, 2012). The commercial vehicle fleet is based on total vehicle fleet data for 2017 (eNaTIS, 2017) and SATIM model data (ERC, 2015), which includes data on the breakdown of the vehicle fleet into size classes, average freight payloads, annual mileage, annual mileage decay, historic sales and scrapping factors. Freight payloads account for 51% and 55% of gross vehicle weights (GVW) for light commercial vehicles (LVC) and heavy commercial vehicles respectively in South Africa (DoT, 2009), which is used to correlate the average freight payloads with the GVW categories in ecoinvent. Commercial vehicles are split into relevant emission classes based on Thambiran & Diab (2011) and the fact that all vehicles sold since 2006 have been of a Euro2 standard (Nare & Kamakate, 2017; SAPIA, 2015). Maximum vehicle speeds are determined from road legislation (ArriveAlive, 2018) and vehicle legislation (Business Tech, 2016). Road freight data is calculated from the commercial vehicle fleet and SATIM data. This road freight is split into categories (major "corridor" freight, rural and urban) based on previous road freight studies (Havenga et al., 2016). This is used to determine average transport distance (CSIR, 2013) and to make various assumptions on the freight transport performed by different truck classes. These assumptions are based on the fact that larger vehicles are used to transport freight on major "corridors", while urban freight is transported using lighter vehicles. References: INFRAS (2017) Handbook Emission Factors for Road Transport (HBEFA) 3.4. INFRAS, Bern, Switzerland; Kannemeyer, L. (2016) South African Road Network Condition, Needs and Funding, South African National Roads Agency (SANRAL): Pretoria, SA.; DoT (2018) National Freight Databank. Pretoria, SA: Department of Transport.; PBS-SA (2015) SANRAL Historic Traffic Data, PBS-SA.; Havenga, J. and Pienaar, W. (2012) The creation and application of a national freight flow model for South Africa, Journal of the South African Institute of Civil Engineering, 54(1), pp. 2-13.; eNaTIS (2018) Vehicle population statistics for December 2017/January 2018, Electronic National Administration Traffic Information System (eNaTIS): Pretoria, SA.; ERC (2015) South African TIMES Model (SATIM) Energy Research Centre - University of Cape Town: Cape Town, SA.; DoT (2009) National Transport Master Plan: The Implications of Global Oil Depletion for Transport Systems in South Africa, Department of Transport: Pretoria, SA.; Thambiran, T. and Diab, R. (2011) Air pollution and climate change co-benefit opportunities in the road transport sector in Durban, South Africa, Atmospheric Environment, 45(16), pp. 2683-2689.; Nare, H. and Kamakate, F. (2017) Developing a roadmap for the adoption of clean fuel and vehicle standards in Southern and Western Africa, International Council on Clean Transportation: Washington, USA.; SAPIA (2015) Cleaner fuels II. Johannesburg, SA: South African Petroleum Industry Association.; Arrive Alive (2018) Speed Limits And The Law. Pretoria, SA: Arrive Alive.; Business Tech (2016) Transport department signs off on new speed limit: Business tech.; Havenga, J., Simpson, Z., King, D., de Bod, A. and Braun, M. (2016) Logistics Barometer South Africa 2016, Stellenbosch University: Stellenbosch, SA.; CSIR (2013) 10th Annual State of Logistics Survey for South Africa, Council for Scientific and Industrial Research (CSIR): Pretoria, SA.
- Particulate Matter, < 2.5 um [air, unspecified]: 9.20059e-5 kg; lognormal variance with pedigree 0.3027, pedigree (2,2,3,1,1)
  Particulate emissions per tonne.km is calculated using HBEFA 3.4 (INFRAS, 2017) modelling data and current South Africa road infrastructure, commercial vehicle fleet and road freight data. The road infrastructure data is based on the total length of paved and unpaved roads (Kannemeyer, 2016), pavement condition of national and provincial roads (Kannemeyer, 2016), road gradients (calculated from DoT (2018) data) and prevailing traffic flow (PBS-SA, 2015; Havenga & Pienaar, 2012). The commercial vehicle fleet is based on total vehicle fleet data for 2017 (eNaTIS, 2017) and SATIM model data (ERC, 2015), which includes data on the breakdown of the vehicle fleet into size classes, average freight payloads, annual mileage, annual mileage decay, historic sales and scrapping factors. Freight payloads account for 51% and 55% of gross vehicle weights (GVW) for light commercial vehicles (LVC) and heavy commercial vehicles respectively in South Africa (DoT, 2009), which is used to correlate the average freight payloads with the GVW categories in ecoinvent. Commercial vehicles are split into relevant emission classes based on Thambiran & Diab (2011) and the fact that all vehicles sold since 2006 have been of a Euro2 standard (Nare & Kamakate, 2017; SAPIA, 2015). Maximum vehicle speeds are determined from road legislation (ArriveAlive, 2018) and vehicle legislation (Business Tech, 2016). Road freight data is calculated from the commercial vehicle fleet and SATIM data. This road freight is split into categories (major "corridor" freight, rural and urban) based on previous road freight studies (Havenga et al., 2016). This is used to determine average transport distance (CSIR, 2013) and to make various assumptions on the freight transport performed by different truck classes. These assumptions are based on the fact that larger vehicles are used to transport freight on major "corridors", while urban freight is transported using lighter vehicles. References: INFRAS (2017) Handbook Emission Factors for Road Transport (HBEFA) 3.4. INFRAS, Bern, Switzerland; Kannemeyer, L. (2016) South African Road Network Condition, Needs and Funding, South African National Roads Agency (SANRAL): Pretoria, SA.; DoT (2018) National Freight Databank. Pretoria, SA: Department of Transport.; PBS-SA (2015) SANRAL Historic Traffic Data, PBS-SA.; Havenga, J. and Pienaar, W. (2012) The creation and application of a national freight flow model for South Africa, Journal of the South African Institute of Civil Engineering, 54(1), pp. 2-13.; eNaTIS (2018) Vehicle population statistics for December 2017/January 2018, Electronic National Administration Traffic Information System (eNaTIS): Pretoria, SA.; ERC (2015) South African TIMES Model (SATIM) Energy Research Centre - University of Cape Town: Cape Town, SA.; DoT (2009) National Transport Master Plan: The Implications of Global Oil Depletion for Transport Systems in South Africa, Department of Transport: Pretoria, SA.; Thambiran, T. and Diab, R. (2011) Air pollution and climate change co-benefit opportunities in the road transport sector in Durban, South Africa, Atmospheric Environment, 45(16), pp. 2683-2689.; Nare, H. and Kamakate, F. (2017) Developing a roadmap for the adoption of clean fuel and vehicle standards in Southern and Western Africa, International Council on Clean Transportation: Washington, USA.; SAPIA (2015) Cleaner fuels II. Johannesburg, SA: South African Petroleum Industry Association.; Arrive Alive (2018) Speed Limits And The Law. Pretoria, SA: Arrive Alive.; Business Tech (2016) Transport department signs off on new speed limit: Business tech.; Havenga, J., Simpson, Z., King, D., de Bod, A. and Braun, M. (2016) Logistics Barometer South Africa 2016, Stellenbosch University: Stellenbosch, SA.; CSIR (2013) 10th Annual State of Logistics Survey for South Africa, Council for Scientific and Industrial Research (CSIR): Pretoria, SA.
- Selenium IV [air, unspecified]: 1.04407e-11 kg; source Ntziachristos, L. 2013; lognormal variance with pedigree 0.6927, pedigree (2,2,5,5,1)
  (same comment as for Cadmium II)
- Sulfur dioxide [air, unspecified]: 2.84011e-5 kg; lognormal variance with pedigree 0.0033, pedigree (2,2,3,1,1)
  Sulphur dioxide emissions per tonne.km is calculated from fuel use and the sulphur content of fuels (SAPIA, 2015). Sulphur content in South African fuels is 500 ppm for petrol and a mixture of 500 ppm (73%) and 50 ppm (27%) for diesel (DoE, 2017). Fuel use per tonne.km is calculated using HBEFA 3.4 (INFRAS, 2017) modelling data and current South Africa road infrastructure, commercial vehicle fleet and road freight data. The road infrastructure data is based on the total length of paved and unpaved roads (Kannemeyer, 2016), pavement condition of national and provincial roads (Kannemeyer, 2016), road gradients (calculated from DoT (2018) data) and prevailing traffic flow (PBS-SA, 2015; Havenga & Pienaar, 2012). Changes in fuel use due to pavement type and condition are calculated according to du Plessis et al. (1990). The commercial vehicle fleet is based on total vehicle fleet data for 2017 (eNaTIS, 2017) and SATIM model data (ERC, 2015), which includes data on the breakdown of the vehicle fleet into size classes, average freight payloads, annual mileage, annual mileage decay, historic sales and scrapping factors. Freight payloads account for 51% and 55% of gross vehicle weights (GVW) for light commercial vehicles (LVC) and heavy commercial vehicles respectively in South Africa (DoT, 2009), which is used to correlate the average freight payloads with the GVW categories in ecoinvent. Commercial vehicles are split into relevant emission classes based on Thambiran & Diab (2011) and the fact that all vehicles sold since 2006 have been of a Euro2 standard (Nare & Kamakate, 2017; SAPIA, 2015). Maximum vehicle speeds are determined from road legislation (ArriveAlive, 2018) and vehicle legislation (Business Tech, 2016). Road freight data is calculated from the commercial vehicle fleet and SATIM data. This road freight is split into categories (major "corridor" freight, rural and urban) based on previous road freight studies (Havenga et al., 2016). This is used to determine average transport distance (CSIR, 2013) and to make various assumptions on the freight transport performed by different truck classes. These assumptions are based on the fact that larger vehicles are used to transport freight on major "corridors", while urban freight is transported using lighter vehicles. References: INFRAS (2017) Handbook Emission Factors for Road Transport (HBEFA) 3.4. INFRAS, Bern, Switzerland; Kannemeyer, L. (2016) South African Road Network Condition, Needs and Funding, South African National Roads Agency (SANRAL): Pretoria, SA.; DoT (2018) National Freight Databank. Pretoria, SA: Department of Transport.; du Plessis, H., Visser, A. & Curtayne, P. (1990) Fuel consumption of vehicles as affected by road-surface characteristics. ASTM Special Publication.; PBS-SA (2015) SANRAL Historic Traffic Data, PBS-SA.; Havenga, J. and Pienaar, W. (2012) The creation and application of a national freight flow model for South Africa, Journal of the South African Institute of Civil Engineering, 54(1), pp. 2-13.; eNaTIS (2018) Vehicle population statistics for December 2017/January 2018, Electronic National Administration Traffic Information System (eNaTIS): Pretoria, SA.; ERC (2015) South African TIMES Model (SATIM) Energy Research Centre - University of Cape Town: Cape Town, SA.; DoT (2009) National Transport Master Plan: The Implications of Global Oil Depletion for Transport Systems in South Africa, Department of Transport: Pretoria, SA.; Thambiran, T. and Diab, R. (2011) Air pollution and climate change co-benefit opportunities in the road transport sector in Durban, South Africa, Atmospheric Environment, 45(16), pp. 2683-2689.; Nare, H. and Kamakate, F. (2017) Developing a roadmap for the adoption of clean fuel and vehicle standards in Southern and Western Africa, International Council on Clean Transportation: Washington, USA.; SAPIA (2015) Cleaner fuels II. Johannesburg, SA: South African Petroleum Industry Association.; Arrive Alive (2018) Speed Limits And The Law. Pretoria, SA: Arrive Alive.; Business Tech (2016) Transport department signs off on new speed limit: Business tech.; Havenga, J., Simpson, Z., King, D., de Bod, A. and Braun, M. (2016) Logistics Barometer South Africa 2016, Stellenbosch University: Stellenbosch, SA.; CSIR (2013) 10th Annual State of Logistics Survey for South Africa, Council for Scientific and Industrial Research (CSIR): Pretoria, SA.; DoE (2017) Overview of the Petrol and Diesel Market in South Africa between 2007 and 2016, Department of Energy: Pretoria, SA.
- Zinc II [air, unspecified]: 6.45285e-8 kg; source Ntziachristos, L. 2013; lognormal variance with pedigree 0.6927, pedigree (2,2,5,5,1)
  (same comment as for Arsenic ion)

## Sampling procedure
Data is calculated using the South African TIMES Model (SATIM) (ERC, 2015), total South African vehicle fleet in 2017 (eNaTIS, 2017) and road freight data (Havenga et al., 2016; CSIR, 2013) as principal data sources. References: ERC (2015) South African TIMES Model. Energy Research Centre, University of Cape Town; eNaTIS (2017) Live Vehicle Population. Electronic National Administration Traffic Information System; Havenga, J., Simpson, Z., King, D., de Bod, A. and Braun, M. (2016) Logistics Barometer South Africa 2016, Stellenbosch University: Stellenbosch, SA.; CSIR (2013) 10th Annual State of Logistics Survey for South Africa, Council for Scientific and Industrial Research (CSIR): Pretoria, SA.

## Extrapolations
Emissions of heavy metals to air are extrapolated from global dataset on the basis of fuel consumption. Wear emissions are extrapolated from global lorry wear treatment datasets on the basis of GVW and load factor. Dataset utilises global emission factors and emission factors based on European data.

## Review by Lucia Valsasina 2018-10-25
The review recorded in the dataset is only part of the review that occurred. Both the ecoinvent team and the sector editors reviewed the documentation (word and excel files) provided by the data provider and agreed upon the methodology before dataset creation and submission.
